# heat production, softwood chips from forest, at furnace 300kW

Dataset: EcoSpold 2, unit process
Geography: RoW
Time period: 2000-01-01 to 2019-12-31
Technology level: current
Classification: EcoSpold01Categories: wood energy/heating systems
Classification: ISIC rev.4 ecoinvent: 3530:Steam and air conditioning supply
Synonyms: automatic wood heating system
Scenario: Business-as-Usual
System model: Allocation at the point of substitution
Share of production covered: 0.1 %
Generated by: Christian Bauer
Published in: Bauer, C. 2007
Database: ecoinvent
isCopyrightProtected: true
accessRestrictedTo: 1

## General comment
This activity represents the combustion of natural wood chips from forest in Switzerland and is used for the global activity as first approximation with uncertainty factors adjusted accordingly. Characteristics of the of wood chips to be burned: Dry wood density 430kg/m3; Energy content (LHV, oven-dry) 19.1 MJ/kg. The humidity when burned is assumed to be at an adequate level for appropriate combustion after some weeks of drying in the storage. Air emission factors as well as the boiler efficiency represent average annual operation including start and stop (warm-up and shut-down). Therefore, emission data will be higher and efficiency will be lower than rated values provided by manufacturers. The inventory shall be considered as being representative also for boilers with nominal capacities in the approximate range of 70 kW to 500 kW.
[This dataset is meant to replace the following datasets:
- heat production, softwood chips from forest, at furnace 300kW, GLO, 2000 - 2001]

## Included activities start
from delivery of wood chips

## Included activities end
This activity describes the combustion of natural wood chips from forest. Included are the infrastructure, the wood requirements (softwood chips from forest), the emissions to air, the electricity needed for operation, and the disposal of the ashes.

## Geography
LCI data for Switzerland were used for the GLO activityy as first approximation with uncertainty factors adjusted accordingly.

## Technology
Boiler of average technology available on the Swiss market.

## Time period
Key emission factors PM, CO, NMVOC, CH4, NOx as well as the average annual efficiency have been updated using the latest available information. Other emission data are from the second half of the 1990´s.

## Parameters
- scaling factor: 1.33333 dimensionless; name scaling_factor; = 1/0.75; lognormal variance with pedigree 0.0122, pedigree (2,3,1,5,3)
  The scaling factor corresponds to the inverse of the average annual efficiency of the heating system, including start/stop (warm up and cool down). Therefore, this efficiency will be lower than figures provided by manufacturers. The estimated value was provided by T.Nussbaumer, Verenum, and represents the average installed boiler in this size category in Switzerland. Uncertainty factors for the GLO activity have been increased accordingly.

## Reference product
- heat, district or industrial, other than natural gas: 1 MJ; = 0.75 * scaling_factor; source Thomas Nussbaumer 2014; CPC 17300: Steam and hot water; By-product classification allocatable product
  The numbers used in the mathematical relation refer to the input of one MJ of fuel with the heat output depending on the efficiency of the furnace. Using the "scling factor" (inverse of the efficiency) allows for scaling of the amount of the reference product to 1.
  EcoSpold01Location=CH
  production volume 5.9e10 MJ; name heat_apv
    Assumption. The original value from the global dataset was altered in order to model the correct shares of district/industrial heat producing datasets on the market for heat, district or industrial, other than natural gas according to http://www.iea.org/statistics/statisticssearch/report/?country=WORLD&product=electricityandheat&year=2012
    . See talk pages for further discussion.
    //Original comment from global dataset//:
    Total heat from biomass from industry and heat plants (7.47E12 MJ) according to IEA Renewables statistics for 2007 (http://www.iea.org/stats/renewdata.asp?COUNTRY_CODE=29) divided over available fuel types (forest/industry, hard/soft ; with 8.3% softwood from forestry) according to FAO forestry statistics (http://faostat.fao.org/site/626/DesktopDefault.aspx?PageID=626#ancor) and within these equally on 2 boiler sizes, multiplied by conversion efficiency of specific boiler type (0.82), all on a net heat value basis.
  property price 0.0106 EUR2005
    Average European district heat price from Ecoheatcool and Euroheat 2005-2006, Ecoheat Work package 1: The European heat market. Final report. 10.6 EUR/GJ i s the price of district heat. http://www.solarthermalworld.org/files/Ecoheatcool%20WP1%20Web.pdf?download
  property true value 0.0106
    allocation property applied in "true value" allocation // value calculated from revenue
  properties: Corresponding fuel use 1.21951 MJ

## By-products
- heat, for reuse in municipal waste incineration only: 0 MJ; CPC 17300: Steam and hot water; By-product classification allocatable product; pedigree (1,1,1,1,1)
  Net electricity generated from this waste and used in internal MSWI plant energy redistribution.
  Uncertainty: uncertainty is calculated from uncertainties in waste composition and uncertainties in energy efficiency and the uncertainty in internal energy demand
  production volume 631.185 MJ
  property exergy 0.1842 MJ; name E_th_prod_MSWI_exergy
    This exergy property is based on the exergy content of the product.
  property price 0.0106 EUR2005; name E_th_prod_MSWI_price_EUR2005
    (same comment as for heat, district or industrial, other than natural gas)
  property true value relation 0.1842; name E_th_prod_MSWI_true_value_relation
    property to calculate "true value" from
  property true value 4.75615e-11
    allocation property applied in "true value" allocation // value calculated from true value relation
- electricity, for reuse in municipal waste incineration only: 0 kWh; CPC 17100: Electrical energy; By-product classification allocatable product; pedigree (1,1,1,1,1)
  (same comment as for heat, for reuse in municipal waste incineration only)
  production volume 88.8879 kWh
  property price 0.1 EUR2005; name E_el_prod_MSWI_price_EUR2005
    Estimated to be the same price as in case of electricity, medium voltage.
  property exergy 3.6 MJ; name E_el_prod_MSWI_exergy
    This exergy property is based on the exergy content of the product.
  property true value relation 3.6; name E_el_prod_MSWI_true_value_relation
    property to calculate "true value" from
  property true value 1.30904e-10
    (same comment as for heat, for reuse in municipal waste incineration only)

## Inputs from technosphere
- wood ash mixture, pure: 0 kg; name wood_ash; source Bauer, C. 2007; pedigree (1,1,1,1,1)
  EcoSpold01Location=CH
  literature. Original value [per MJ fuel input] was scaled to 1 MJ reference product output
  production volume 0 kg
    Calculated from the production volume of wood chips, from forest, softwood, burned in furnace 300kW in proportion to the respective output amounts.
  property price 0 EUR2005; name wood_ash_price_EUR2005
  properties: carbon content, non-fossil 0.012, dry mass 1 kg, wet mass 1 kg
- furnace, wood chips, with silo, 300kW: 2.31481e-8 unit; = 1/(300*20*2000*3.6)
  estimation based on 20a lifetime, 2000h/a, 300kW capacity
- electricity, low voltage: 0 kWh; source Bauer, C. 2007; pedigree (1,1,1,1,1)
  literature. Original value [per MJ fuel input] was scaled to 1 MJ reference product output
  EcoSpold01Location=CH
- wood chips, wet, measured as dry mass: 0 kg; pedigree (1,1,1,1,1)
  EcoSpold01Location=RER
  uncertainty on energy and water content, and bulk density
  properties: water content 1.4, wet mass 2.4 kg, dry mass 1 kg, carbon content, non-fossil 0.494
  note on carbon content, non-fossil: C content of dry mass is 0.494 kgC/kg dry wood (ecoinvent v2.2 report 9).
- wood ash mixture, pure: -0.00020572, -0.000428947 kg (2 entries); source Bauer, C. 2007; lognormal variance with pedigree 0.004, pedigree (1,1,3,5,1)
  (same comment as for wood ash mixture, pure)
  production volume 3.74453e7 kg
- electricity, low voltage: 5.94133e-5, 1.04203e-5, 0.000236334, 0.000847316, 0.000171352, 0.00259134, 0.000427137, 0.00121668 kWh (8 entries); source Bauer, C. 2007; lognormal variance with pedigree 0.4733, pedigree (2,2,5,5,2)
  (same comment as for electricity, low voltage)
- wood chips, wet, measured as dry mass: 0.000154965, 0.000650123, 0.0690029 kg (3 entries); lognormal variance with pedigree 0.004, pedigree (1,1,3,5,1)
  EcoSpold01Location=RER
  uncertainty on energy and water content, and bulk density

## Emissions to nature
- Hydrocarbons, aliphatic, alkanes, unspecified [air, urban air close to ground]: 1.21333e-6 kg; = 9.1E-07 * scaling_factor; source Bauer, C. 2007; lognormal variance with pedigree 0.434, pedigree (1,1,3,5,1)
  literature. Original value [per MJ fuel input] was scaled to 1 MJ reference product output
- Carbon dioxide, non-fossil [air, urban air close to ground]: 0.136 kg; = 0.102 * scaling_factor; source Bauer, C. 2007; lognormal variance with pedigree 0.004, pedigree (1,1,3,5,1)
  literature. Original value [per MJ fuel input] was scaled to 1 MJ reference product output
- Benzene, ethyl- [air, urban air close to ground]: 4e-8 kg; = 3E-08 * scaling_factor; source Bauer, C. 2007; lognormal variance with pedigree 0.434, pedigree (1,1,3,5,1)
  literature. Original value [per MJ fuel input] was scaled to 1 MJ reference product output
- Benzo(a)pyrene [air, urban air close to ground]: 6.66667e-10 kg; = 5E-10 * scaling_factor; source Bauer, C. 2007; lognormal variance with pedigree 0.434, pedigree (1,1,3,5,1)
  literature. Original value [per MJ fuel input] was scaled to 1 MJ reference product output
- Chromium VI [air, urban air close to ground]: 5.33333e-11 kg; = 4E-11 * scaling_factor; source Bauer, C. 2007; lognormal variance with pedigree 0.484, pedigree (1,1,3,5,1)
  literature. Original value [per MJ fuel input] was scaled to 1 MJ reference product output
- Phosphorus [air, urban air close to ground]: 4e-7 kg; = 3E-07 * scaling_factor; source Bauer, C. 2007; lognormal variance with pedigree 0.434, pedigree (1,1,3,5,1)
  literature. Original value [per MJ fuel input] was scaled to 1 MJ reference product output
- Hydrocarbons, aliphatic, unsaturated [air, urban air close to ground]: 4.13333e-6 kg; = 3.1E-06 * scaling_factor; source Bauer, C. 2007; lognormal variance with pedigree 0.434, pedigree (1,1,3,5,1)
  literature. Original value [per MJ fuel input] was scaled to 1 MJ reference product output
- PAH, polycyclic aromatic hydrocarbons [air, urban air close to ground]: 1.48e-8 kg; = 1.11E-08 * scaling_factor; source Bauer, C. 2007; lognormal variance with pedigree 0.434, pedigree (1,1,3,5,1)
  literature. Original value [per MJ fuel input] was scaled to 1 MJ reference product output
- Benzene [air, urban air close to ground]: 1.21333e-6 kg; = 9.1E-07 * scaling_factor; source Bauer, C. 2007; lognormal variance with pedigree 0.434, pedigree (1,1,3,5,1)
  literature. Original value [per MJ fuel input] was scaled to 1 MJ reference product output
- Cadmium [air, urban air close to ground]: 9.33333e-10 kg; = 7E-10 * scaling_factor; source Bauer, C. 2007; lognormal variance with pedigree 0.434, pedigree (1,1,3,5,1)
  literature. Original value [per MJ fuel input] was scaled to 1 MJ reference product output
- Chromium [air, urban air close to ground]: 5.28e-9 kg; = 3.96E-09 * scaling_factor; source Bauer, C. 2007; lognormal variance with pedigree 0.434, pedigree (1,1,3,5,1)
  literature. Original value [per MJ fuel input] was scaled to 1 MJ reference product output
- Sulfur dioxide [air, urban air close to ground]: 3.33333e-6 kg; = 2.5E-06 * scaling_factor; source Bauer, C. 2007; lognormal variance with pedigree 0.434, pedigree (1,1,3,5,1)
  literature. Original value [per MJ fuel input] was scaled to 1 MJ reference product output
- Particulates, < 2.5 um [air, urban air close to ground]: 0.00012 kg; = 9E-05 * scaling_factor; source Thomas Nussbaumer 2014; lognormal variance with pedigree 0.124, pedigree (1,1,3,5,1)
  expert estimation (see source)
- Mercury [air, urban air close to ground]: 4e-10 kg; = 3E-10 * scaling_factor; source Bauer, C. 2007; lognormal variance with pedigree 0.434, pedigree (1,1,3,5,1)
  literature. Original value [per MJ fuel input] was scaled to 1 MJ reference product output
- Dinitrogen monoxide [air, urban air close to ground]: 3.33333e-6 kg; = 2.5E-06 * scaling_factor; source Bauer, C. 2007; lognormal variance with pedigree 0.434, pedigree (1,1,3,5,1)
  literature. Original value [per MJ fuel input] was scaled to 1 MJ reference product output
- Water [air, urban air close to ground]: 0.0001 m3; lognormal variance with pedigree 0.0103, pedigree (2,2,3,5,2)
  water emissions to air introduced in order to guarantee a correct water balance; emissions represent direct emissions from combustion plus previous emissions during natural drying of stored wood chips
- Formaldehyde [air, urban air close to ground]: 1.73333e-7 kg; = 1.3E-07 * scaling_factor; source Bauer, C. 2007; lognormal variance with pedigree 0.434, pedigree (1,1,3,5,1)
  literature. Original value [per MJ fuel input] was scaled to 1 MJ reference product output
- Sodium [air, urban air close to ground]: 1.73333e-6 kg; = 1.3E-06 * scaling_factor; source Bauer, C. 2007; lognormal variance with pedigree 0.434, pedigree (1,1,3,5,1)
  literature. Original value [per MJ fuel input] was scaled to 1 MJ reference product output
- Particulates, > 2.5 um, and < 10um [air, urban air close to ground]: 6.66667e-6 kg; = 5E-06 * scaling_factor; source Thomas Nussbaumer 2014; lognormal variance with pedigree 0.4353, pedigree (2,2,3,5,2)
  expert estimation (see source)
- Fluorine [air, urban air close to ground]: 6.66667e-8 kg; = 5E-08 * scaling_factor; source Bauer, C. 2007; lognormal variance with pedigree 0.434, pedigree (1,1,3,5,1)
  literature. Original value [per MJ fuel input] was scaled to 1 MJ reference product output
- Ammonia [air, urban air close to ground]: 2.30667e-6 kg; = 1.73E-06 * scaling_factor; source Bauer, C. 2007; lognormal variance with pedigree 0.434, pedigree (1,1,3,5,1)
  literature. Original value [per MJ fuel input] was scaled to 1 MJ reference product output
- Bromine [air, urban air close to ground]: 8e-8 kg; = 6E-08 * scaling_factor; source Bauer, C. 2007; lognormal variance with pedigree 0.434, pedigree (1,1,3,5,1)
  literature. Original value [per MJ fuel input] was scaled to 1 MJ reference product output
- Calcium [air, urban air close to ground]: 7.8e-6 kg; = 5.85E-06 * scaling_factor; source Bauer, C. 2007; lognormal variance with pedigree 0.434, pedigree (1,1,3,5,1)
  literature. Original value [per MJ fuel input] was scaled to 1 MJ reference product output
- Copper [air, urban air close to ground]: 2.93333e-8 kg; = 2.2E-08 * scaling_factor; source Bauer, C. 2007; lognormal variance with pedigree 0.434, pedigree (1,1,3,5,1)
  literature. Original value [per MJ fuel input] was scaled to 1 MJ reference product output
- Dioxins, measured as 2,3,7,8-tetrachlorodibenzo-p-dioxin [air, urban air close to ground]: 4.13333e-14 kg; = 3.1E-14 * scaling_factor; source Bauer, C. 2007; lognormal variance with pedigree 0.434, pedigree (1,1,3,5,1)
  literature. Original value [per MJ fuel input] was scaled to 1 MJ reference product output
- Benzene, hexachloro- [air, urban air close to ground]: 9.6e-15 kg; = 7.2E-15 * scaling_factor; source Bauer, C. 2007; lognormal variance with pedigree 0.434, pedigree (1,1,3,5,1)
  literature. Original value [per MJ fuel input] was scaled to 1 MJ reference product output
- Nickel [air, urban air close to ground]: 8e-9 kg; = 6E-09 * scaling_factor; source Bauer, C. 2007; lognormal variance with pedigree 0.434, pedigree (1,1,3,5,1)
  literature. Original value [per MJ fuel input] was scaled to 1 MJ reference product output
- Methane, non-fossil [air, urban air close to ground]: 6e-6 kg; = 4.5E-06 * scaling_factor; source Bauer, C. 2007; lognormal variance with pedigree 0.434, pedigree (1,1,3,5,1)
  literature. Original value [per MJ fuel input] was scaled to 1 MJ reference product output
- Magnesium [air, urban air close to ground]: 4.8e-7 kg; = 3.6E-07 * scaling_factor; source Bauer, C. 2007; lognormal variance with pedigree 0.434, pedigree (1,1,3,5,1)
  literature. Original value [per MJ fuel input] was scaled to 1 MJ reference product output
- NMVOC, non-methane volatile organic compounds, unspecified origin [air, urban air close to ground]: 1.4e-5 kg; = 10.5E-06 * scaling_factor; source Thomas Nussbaumer 2014; lognormal variance with pedigree 0.164, pedigree (1,1,3,5,1)
  expert estimation (see source)
- Manganese [air, urban air close to ground]: 2.26667e-7 kg; = 1.7E-07 * scaling_factor; source Bauer, C. 2007; lognormal variance with pedigree 0.434, pedigree (1,1,3,5,1)
  literature. Original value [per MJ fuel input] was scaled to 1 MJ reference product output
- Phenol, pentachloro- [air, urban air close to ground]: 1.08e-11 kg; = 8.1E-12 * scaling_factor; source Bauer, C. 2007; lognormal variance with pedigree 0.434, pedigree (1,1,3,5,1)
  literature. Original value [per MJ fuel input] was scaled to 1 MJ reference product output
- Toluene [air, urban air close to ground]: 4e-7 kg; = 3E-07 * scaling_factor; source Bauer, C. 2007; lognormal variance with pedigree 0.434, pedigree (1,1,3,5,1)
  literature. Original value [per MJ fuel input] was scaled to 1 MJ reference product output
- m-Xylene [air, urban air close to ground]: 1.6e-7 kg; = 1.2E-07 * scaling_factor; source Bauer, C. 2007; lognormal variance with pedigree 0.434, pedigree (1,1,3,5,1)
  literature. Original value [per MJ fuel input] was scaled to 1 MJ reference product output
- Zinc [air, urban air close to ground]: 4e-7 kg; = 3E-07 * scaling_factor; source Bauer, C. 2007; lognormal variance with pedigree 0.434, pedigree (1,1,3,5,1)
  literature. Original value [per MJ fuel input] was scaled to 1 MJ reference product output
- Acetaldehyde [air, urban air close to ground]: 8.13333e-8 kg; = 6.1E-08 * scaling_factor; source Bauer, C. 2007; lognormal variance with pedigree 0.434, pedigree (1,1,3,5,1)
  literature. Original value [per MJ fuel input] was scaled to 1 MJ reference product output
- Potassium [air, urban air close to ground]: 3.12e-5 kg; = 2.34E-05 * scaling_factor; source Bauer, C. 2007; lognormal variance with pedigree 0.434, pedigree (1,1,3,5,1)
  literature. Original value [per MJ fuel input] was scaled to 1 MJ reference product output
- Lead [air, urban air close to ground]: 3.33333e-8 kg; = 2.5E-08 * scaling_factor; source Bauer, C. 2007; lognormal variance with pedigree 0.434, pedigree (1,1,3,5,1)
  literature. Original value [per MJ fuel input] was scaled to 1 MJ reference product output
- Carbon monoxide, non-fossil [air, urban air close to ground]: 0.000666667 kg; = 5E-04 * scaling_factor; source Thomas Nussbaumer 2014; lognormal variance with pedigree 0.344, pedigree (1,1,3,5,1)
  expert estimation (see source)
- Chlorine [air, urban air close to ground]: 2.4e-7 kg; = 1.8E-07 * scaling_factor; source Bauer, C. 2007; lognormal variance with pedigree 0.434, pedigree (1,1,3,5,1)
  literature. Original value [per MJ fuel input] was scaled to 1 MJ reference product output
- Nitrogen oxides [air, urban air close to ground]: 0.000133333 kg; = 1e-4* scaling_factor; source Thomas Nussbaumer 2014; lognormal variance with pedigree 0.034, pedigree (1,1,3,5,1)
  expert estimation (see source)
- Arsenic [air, urban air close to ground]: 1.33333e-9 kg; = 1E-09 * scaling_factor; source Bauer, C. 2007; lognormal variance with pedigree 0.434, pedigree (1,1,3,5,1)
  literature. Original value [per MJ fuel input] was scaled to 1 MJ reference product output

## Sampling procedure
literature

## Extrapolations
This dataset has been copied from an original dataset covering the geography CH. The uncertainty has been adjusted accordingly.
