# treatment of waste polypropylene, sanitary landfill

Dataset: EcoSpold 2, unit process
Geography: CH
Time period: 1994-01-01 to 2019-12-31
Technology level: current
Classification: EcoSpold01Categories: waste management/sanitary landfill
Classification: ISIC rev.4 ecoinvent: 3821:Treatment and disposal of non-hazardous waste
Synonyms: PP
Tags: ConvertedDataset; Treatment
Scenario: Business-as-Usual
System model: Allocation at the point of substitution
Generated by: Gabor Doka (obsolete)
Published in: Doka G. 2007
Database: ecoinvent
isCopyrightProtected: true
accessRestrictedTo: 1

## General comment
Inventoried waste contains 100% PP; .
waste composition (wet, in ppm): upper heating value 36.16 MJ/kg; lower heating value 32.78 MJ/kg; H2O 159000; O 32454; H 103430; C 694120; S 360.46; N 1095.3; P n.a.; B n.a.; Cl 1234.1; Br 8.0972; F 12.146; I n.a.; Ag n.a.; As 1.5385; Ba 202.43; Cd 28.663; Co 1.417; Cr 10.526; Cu 34.93; Hg 0.040486; Mn 25.371; Mo n.a.; Ni 0.80972; Pb 19.079; Sb 8.5021; Se 1.7004; Sn 3.2205; V 1862.4; Zn 288.78; Be 0.40486; Sc n.a.; Sr 71.661; Ti 809.72; Tl 0.32389; W n.a.; Si n.a.; Fe 1295.6; Ca 2186.3; Al 161.94; K n.a.; Mg 80.972; Na 1186.6;
Share of carbon in waste that is biogenic 0%.
Overall degradability of waste during 100 years: 1%.
[This dataset was already contained in the ecoinvent database version 2. It was not individually updated during the transfer to ecoinvent version 3. Life Cycle Impact Assessment results may still have changed, as they are affected by changes in the supply chain, i.e. in other datasets. This dataset was generated following the ecoinvent quality guidelines for version 2. It may have been subject to central changes described in the ecoinvent version 3 change report (http://www.ecoinvent.org/database/ecoinvent-version-3/reports-of-changes/), and the results of the central updates were reviewed extensively. The changes added e.g. consistent water flows and other information throughout the database. The documentation of this dataset can be found in the ecoinvent reports of version 2, which are still available via the ecoinvent website. The change report linked above covers all central changes that were made during the conversion process.]

## Included activities end
Waste-specific short-term emissions to air via landfill gas incineration and landfill leachate. Burdens from treatment of short-term leachate (0-100a) in wastewater treatment plant (including WWTP sludge disposal in municipal incinerator). Long-term emissions from landfill to groundwater (after base lining failure).

## Geography
Technology encountered in Switzerland in 2000. Landfill includes base seal, leachate collection system, treatment of leachate in municipal wastewater treatment plant.

## Technology
Swiss municipal sanitary landfill for biogenic or untreated municipal waste ('reactive organic landfill'). Landfill gas and leachate collection system. Recultivation and monitoring for 150 years after closure.

## Reference product
- waste polypropylene: -1 kg; CPC 39270: Waste, parings and scrap of plastics; By-product classification Waste; CAS 9003-07-0
  production volume 0 kg
    estimated proportion; source: ecoinvent v2; value to be replaced by value to be calculated from the demand for this treatment activity
  property price 0 EUR2005
    Waste products are assigned a price of zero as they are assumed to require further treatment.
  property carbon content, fossil 0.825208
    C content in 1 kg DM was calculated using data in Tab A.1, ecoinvent v2.2 report 13_I
  property carbon content 0.825208
    carbon content on a dry matter basis (reserved; not for manual entry)
  properties: dry mass 0.841 kg, water content 0.189061, wet mass 1 kg, carbon content, non-fossil 0, water in wet mass 0.159 kg, carbon allocation 0.694 kg

## By-products
- electricity, for reuse in municipal waste incineration only: 0 kWh; CPC 17100: Electrical energy; By-product classification allocatable product; pedigree (1,1,1,1,1)
  Net electricity generated from this waste and used in internal MSWI plant energy redistribution.
  Uncertainty: uncertainty is calculated from uncertainties in waste composition and uncertainties in energy efficiency and the uncertainty in internal energy demand
  property exergy 3.6 MJ; name E_el_prod_MSWI_exergy
  property true value relation 3.6; name E_el_prod_MSWI_true_value_relation
  property price 0.1 EUR2005; name E_el_prod_MSWI_price_EUR2005
- heat, for reuse in municipal waste incineration only: 0 MJ; CPC 17300: Steam and hot water; By-product classification allocatable product; pedigree (1,1,1,1,1)
  Net useful heat generated from this waste and used in internal MSWI plant energy redistribution.
  Uncertainty: uncertainty is calculated from uncertainties in waste composition and uncertainties in energy efficiency and the uncertainty in internal energy demand
  property exergy 0.1842 MJ; name E_th_prod_MSWI_exergy
  property true value relation 0.1842; name E_th_prod_MSWI_true_value_relation
  property price 0.0106 EUR2005; name E_th_prod_MSWI_price_EUR2005
- zinc concentrate: 0 kg; CPC 14290: Other non-ferrous metal ores and concentrates (other than uranium or thorium ores and concentrates); By-product classification allocatable product
  Calculated value from the knowledge of the properties of both products.
  property price 0.38 EUR2005; name ByP_price_EUR2005
    Temporary price data. Calculated as 90% of purchasers price based on: Zinc content in concentrate 53%. Concentrate price per kg Zn 86.5% of refined Zn price (13.5% treatment charges according to CHR Metals Limited 2005: Dynamic cost curves. http://www.minecost.com/dynamic.pdf). 2004 zinc price from USGS (2007) Mineral commodity summaries 2007. <http://minerals.usgs.gov/minerals/pubs/mcs/2007/mcs2007.pdf> [Accessed 25 May 2010]
  property zinc content 0.53; name zinc_C_zinc_concentrate
    Zinc content on a dry matter basis. Value taken from teh "zinc mine operation" /GLO dataset.
  property dry mass 1 kg; name DM_zinc_concentrate
  property carbon content 0
    carbon content on a dry matter basis (reserved; not for manual entry)
  properties: wet mass 1 kg, water content 0, carbon content, non-fossil 0, carbon content, fossil 0, water in wet mass 0 kg, carbon allocation 0 kg

## Inputs from technosphere
- waste graphical paper: -3.88e-5 kg; lognormal variance with pedigree 0.2106, pedigree (5,5,5,5,5)
  burden from wastewater treatment of the short-term leachate (0-100a). Uncertainty calculated from unertainty of the waste composition of this waste, uncertainty in waste decomposition and short-term leaching in sanitary landfill
  production volume 0 kg
    Calculated from the production volume of waste polypropylene, 15.9% water in proportion to the respective output amounts.
  properties: wet mass 1 kg, water content 0.126126, dry mass 0.888 kg, carbon content, non-fossil 0.454955
- municipal waste incineration facility: 3.12e-14 unit; lognormal variance with pedigree 0.72, pedigree (1,1,5,1,1)
  Burden from incineration of sludge from wastewater treatment of the short-term leachate (0-100a).
  Burden from incineration of sludge from wastewater treatment of the short-term leachate (0-100a).
- iron (III) chloride, without water, in 40% solution state: 2.59e-8 kg; lognormal variance with pedigree 0.89, pedigree (1,1,5,1,1)
  burden from incineration of sludge from wastewater treatment of the short-term leachate (0-100a). uncertainty is calculated from uncertainties in waste composition and transfer coefficients in incinerator and uncertainty of waste decomposition and short-term leaching in sanitary landfill
  properties: dry mass 1 kg, wet mass 1 kg
- wastewater treatment facility, capacity 5E9l/year: 1.42e-11 unit; lognormal variance with pedigree 0.2106, pedigree (5,5,5,5,5)
  (same comment as for waste graphical paper)
- process-specific burdens, residual material landfill: 8.71e-7 kg; lognormal variance with pedigree 0.44, pedigree (1,1,5,1,1)
  burden from incineration of sludge from wastewater treatment of the short-term leachate (0-100a). uncertainty is calculated from uncertainties in waste composition and transfer coefficients in incinerator and uncertainty of waste decomposition and short-term leaching in sanitary landfill;activityLink introduced to establish a direct link to the corresponding regional supply of this product
- heat, for reuse in municipal waste incineration only: 0.000105 MJ; name E_th_prod_MSWI; lognormal variance with pedigree 0.72, pedigree (1,1,5,1,1)
  (same comment as for iron (III) chloride, without water, in 40% solution state)
- process-specific burdens, sanitary landfill: 1 kg; lognormal variance with pedigree 0.04, pedigree (1,1,5,1,1)
  demands per kilogram waste. uncertainty is heeded in the module;activityLink introduced to establish a direct link to the corresponding regional supply of this product
- electricity, for reuse in municipal waste incineration only: 1.8e-5 kWh; name E_el_prod_MSWI; lognormal variance with pedigree 1.11, pedigree (1,1,5,1,1)
  (same comment as for iron (III) chloride, without water, in 40% solution state)
- chromium oxide, flakes: 2.25e-11 kg; lognormal variance with pedigree 1.13, pedigree (5,5,5,5,5)
  burden from incineration of sludge from wastewater treatment of the short-term leachate (0-100a). Proxy for vanadium pentoxide V2O5 in SCR catalyst, uncertainty calculated from uncertainty in average DeNOx input, uncertainty in the share of thermal NOx, uncertainty of nitrogen content in average municipal waste and the unertainty in nitrogen content in *this* waste and uncertainty of waste decomposition and short-term leaching in sanitary landfill
  properties: wet mass 1 kg, dry mass 1 kg
- sewer grid, 5E9l/year, 110 km: 5.45e-10 km; lognormal variance with pedigree 0.2106, pedigree (5,5,5,5,5)
  (same comment as for waste graphical paper)
- residual material landfill: 1.82e-15 unit; lognormal variance with pedigree 0.44, pedigree (1,1,5,1,1)
  (same comment as for iron (III) chloride, without water, in 40% solution state)
- process-specific burdens, slag landfill: 5.14e-6 kg; lognormal variance with pedigree 0.56, pedigree (1,1,5,1,1)
  (same comment as for process-specific burdens, residual material landfill)
- cement, unspecified: 3.49e-7 kg; lognormal variance with pedigree 0.44, pedigree (1,1,5,1,1)
  (same comment as for iron (III) chloride, without water, in 40% solution state)
  properties: dry mass 1 kg, wet mass 1 kg
- heat, district or industrial, natural gas: 5.2431e-5 MJ; lognormal variance with pedigree 0.21, pedigree (5,5,5,5,5)
  (same comment as for iron (III) chloride, without water, in 40% solution state)
- chemical, organic: 7.72e-8 kg; lognormal variance with pedigree 1.77, pedigree (1,1,5,1,1)
  (same comment as for iron (III) chloride, without water, in 40% solution state)
  properties: wet mass 1 kg, dry mass 1 kg, carbon content, fossil 0.628
  note on carbon content, fossil: This dataset is an unweighted average of 20 organic substances (listed in Tab 88.1, ecoinvent v2.2 report 8, part II), being part of the top100 chemicals included in this database. The C-content has also been calculated as an unweighted average of the C content of the substances composing this dataset.
- sodium hydroxide, without water, in 50% solution state: 1.91e-9 kg; lognormal variance with pedigree 0.67, pedigree (1,1,5,1,1)
  (same comment as for iron (III) chloride, without water, in 40% solution state)
  properties: dry mass 1 kg, wet mass 1 kg
- hydrochloric acid, without water, in 30% solution state: 8.92e-11 kg; lognormal variance with pedigree 0.85, pedigree (1,1,5,1,1)
  (same comment as for iron (III) chloride, without water, in 40% solution state)
  properties: dry mass 1 kg, wet mass 1 kg
- heat, central or small-scale, other than natural gas: 3.5626e-5 MJ; lognormal variance with pedigree 0.21, pedigree (5,5,5,5,5)
  (same comment as for waste graphical paper)
- titanium dioxide: 1.1e-9 kg; lognormal variance with pedigree 1.01, pedigree (1,1,5,1,1)
  (same comment as for iron (III) chloride, without water, in 40% solution state)
  properties: dry mass 1 kg, wet mass 1 kg
- slag landfill: 9.14e-15 unit; lognormal variance with pedigree 0.56, pedigree (1,1,5,1,1)
  (same comment as for iron (III) chloride, without water, in 40% solution state)
- chemical, inorganic: 1.49e-10 kg; lognormal variance with pedigree 0.85, pedigree (1,1,5,1,1)
  (same comment as for iron (III) chloride, without water, in 40% solution state)
  properties: carbon content, fossil 0.003, wet mass 1 kg, dry mass 1 kg
  note on carbon content, fossil: This dataset is an unweighted average of 20 inorganic substances (listed in Tab 88.1, ecoinvent v2.2 report 8, part II), being part of the top100 chemicals included in this database. The C-content has also been calculated as an unweighted average of the C content of the substances composing this dataset.
- sanitary landfill facility: 5.56e-10 unit; lognormal variance with pedigree 0.04, pedigree (1,1,5,1,1)
  demands per kilogram waste. uncertainty is heeded in the module
  This exchange has an activity link directly to the producing activity because the product is primarily consumed in the same geographical area where it is produced.
- ammonia, liquid: 3.85e-8 kg; lognormal variance with pedigree 0.76, pedigree (1,1,5,1,1)
  (same comment as for iron (III) chloride, without water, in 40% solution state)
  properties: dry mass 1 kg, wet mass 1 kg
- electricity, low voltage: 0.00032 kWh; lognormal variance with pedigree 0.55, pedigree (5,5,5,5,5)
  (same comment as for waste graphical paper)
- quicklime, milled, packed: 3.47e-10 kg; lognormal variance with pedigree 0.67, pedigree (1,1,5,1,1)
  (same comment as for iron (III) chloride, without water, in 40% solution state)
  properties: dry mass 0.99 kg, water content 0.010101, wet mass 1 kg
- process-specific burdens, municipal waste incineration: 0.000125 kg; lognormal variance with pedigree 0.72, pedigree (1,1,5,1,1)
  Burden from incineration of sludge from wastewater treatment of the short-term leachate (0-100a).
  Burden from incineration of sludge from wastewater treatment of the short-term leachate (0-100a).;activityLink introduced to establish a direct link to the corresponding regional supply of this product
- waste cement, hydrated: -8.71e-7 kg; lognormal variance with pedigree 0.44, pedigree (1,1,5,1,1)
  (same comment as for iron (III) chloride, without water, in 40% solution state)
  production volume 0 kg
    (same comment as for waste graphical paper)
  properties: dry mass 1 kg, wet mass 1 kg
- waste plastic, mixture: -3.88e-5 kg; lognormal variance with pedigree 0.2106, pedigree (5,5,5,5,5)
  (same comment as for waste graphical paper)
  production volume 0 kg
    (same comment as for waste graphical paper)
  properties: water content 0.180638, wet mass 1 kg, carbon content, fossil 0.747344, dry mass 0.847 kg
  note on carbon content, fossil: C content in 1 kg DM was calculated using data in Tab A.2, ecoinvent v2.2 report 13_I

## Emissions to nature
- Selenium [water, surface water]: 1.2e-9 kg; lognormal variance with pedigree 2.19, pedigree (1,1,5,1,1)
  Emissions from short-term leachate treatment and incineration of resulting sludge. Uncertainty calculated depending on waste input and uncertainty of transfer coefficents in landfill, wastewater treatment and incineration model.
- Thallium [water, surface water]: 9.56e-11 kg; lognormal variance with pedigree 2.48, pedigree (1,1,5,1,1)
  (same comment as for Selenium)
- Carbon monoxide, fossil [air, urban air close to ground]: 3.74e-7 kg; lognormal variance with pedigree 0.92, pedigree (1,1,5,1,1)
  (same comment as for Selenium)
- Antimony [air, urban air close to ground]: 4.42e-13 kg; lognormal variance with pedigree 2.62, pedigree (1,1,5,1,1)
  (same comment as for Selenium)
- Fluoride [water, surface water]: 8.92e-9 kg; lognormal variance with pedigree 1.98, pedigree (1,1,5,1,1)
  Emissions from short-term leachate treatment. Uncertainty calculated depending on waste input and uncertainty of transfer coefficents in landfill and wastewater treatment.
- Cadmium, ion [water, surface water]: 2.56e-8 kg; lognormal variance with pedigree 1.75, pedigree (1,1,5,1,1)
  (same comment as for Selenium)
- Ammonia [air, urban air close to ground]: 2.44e-8 kg; lognormal variance with pedigree 0.67, pedigree (1,1,5,1,1)
  (same comment as for Selenium)
- Calcium [air, urban air close to ground]: 4.66e-10 kg; lognormal variance with pedigree 1.25, pedigree (1,1,5,1,1)
  (same comment as for Selenium)
- Vanadium, ion [water, surface water]: 9.97e-7 kg; lognormal variance with pedigree 1.27, pedigree (1,1,5,1,1)
  (same comment as for Selenium)
- Cobalt [water, ground-, long-term]: 1.41e-6 kg; lognormal variance with pedigree 1.56, pedigree (1,1,5,1,1)
  Emissions from long-term leachate (>100a) directly from MSW landfill and indirectly via incineration of treatement sludge from leachate treatement. Uncertainty calculated depending on waste input and uncertainty of long-term transfer coefficents in landfill.
- Hydrogen fluoride [air, non-urban air or from high stacks]: 4.84e-8 kg; lognormal variance with pedigree 1.76, pedigree (1,1,5,1,1)
  burden from direct release or incineration of landfill biogas. Uncertainty calculated from unertainty of the waste composition of this waste, uncertainty in waste decomposition and short-term leaching in sanitary landfill
- Selenium [air, non-urban air or from high stacks]: 4.48e-13 kg; lognormal variance with pedigree 3.27, pedigree (1,1,5,1,1)
  (same comment as for Hydrogen fluoride)
- Nickel, ion [water, surface water]: 2.86e-10 kg; lognormal variance with pedigree 2.36, pedigree (1,1,5,1,1)
  (same comment as for Selenium)
- Strontium [air, non-urban air or from high stacks]: 1.04e-11 kg; lognormal variance with pedigree 2.85, pedigree (1,1,5,1,1)
  (same comment as for Hydrogen fluoride)
- Vanadium, ion [water, ground-, long-term]: 0.000542 kg; lognormal variance with pedigree 1, pedigree (1,1,5,1,1)
  (same comment as for Cobalt)
- Iron, ion [water, surface water]: 9.03e-8 kg; lognormal variance with pedigree 1.58, pedigree (1,1,5,1,1)
  (same comment as for Selenium)
- Aluminium [water, surface water]: 4.86e-9 kg; lognormal variance with pedigree 1.68, pedigree (1,1,5,1,1)
  (same comment as for Selenium)
- Magnesium [water, ground-, long-term]: 8.05e-5 kg; lognormal variance with pedigree 1.03, pedigree (1,1,5,1,1)
  (same comment as for Cobalt)
- Sodium, ion [water, ground-, long-term]: 0.00114 kg; lognormal variance with pedigree 0.68, pedigree (1,1,5,1,1)
  (same comment as for Cobalt)
- Particulates, < 2.5 um [air, non-urban air or from high stacks]: 3.31e-7 kg; lognormal variance with pedigree 0.72, pedigree (1,1,5,1,1)
  (same comment as for Hydrogen fluoride)
- Lead [air, urban air close to ground]: 3.72e-14 kg; lognormal variance with pedigree 2.31, pedigree (1,1,5,1,1)
  (same comment as for Selenium)
- NMVOC, non-methane volatile organic compounds, unspecified origin [air, non-urban air or from high stacks]: 1.86e-8 kg; lognormal variance with pedigree 0.46, pedigree (1,1,5,1,1)
  (same comment as for Hydrogen fluoride)
- Lead [water, surface water]: 1.24e-10 kg; lognormal variance with pedigree 2.25, pedigree (1,1,5,1,1)
  (same comment as for Selenium)
- Bromine [water, ground-, long-term]: 7.89e-6 kg; lognormal variance with pedigree 1.34, pedigree (1,1,5,1,1)
  (same comment as for Cobalt)
- Mercury [air, urban air close to ground]: 0 kg; pedigree (1,1,1,1,1)
  (same comment as for Selenium)
- Strontium [water, surface water]: 2.12e-8 kg; lognormal variance with pedigree 1.77, pedigree (1,1,5,1,1)
  (same comment as for Selenium)
- Zinc [air, urban air close to ground]: 1.54e-12 kg; lognormal variance with pedigree 1.67, pedigree (1,1,5,1,1)
  (same comment as for Selenium)
- Carbon monoxide, fossil [air, non-urban air or from high stacks]: 9.85e-7 kg; lognormal variance with pedigree 1.06, pedigree (1,1,5,1,1)
  (same comment as for Hydrogen fluoride)
- Copper, ion [water, ground-, long-term]: 3.49e-5 kg; lognormal variance with pedigree 1.14, pedigree (1,1,5,1,1)
  (same comment as for Cobalt)
- NMVOC, non-methane volatile organic compounds, unspecified origin [air, urban air close to ground]: 5.16e-9 kg; lognormal variance with pedigree 1.03, pedigree (1,1,5,1,1)
  (same comment as for Selenium)
- Tin [air, non-urban air or from high stacks]: 4.74e-14 kg; lognormal variance with pedigree 3.55, pedigree (1,1,5,1,1)
  (same comment as for Hydrogen fluoride)
- Chloride [water, ground-, long-term]: 0.0012 kg; lognormal variance with pedigree 0.67, pedigree (1,1,5,1,1)
  (same comment as for Cobalt)
- Bromine [water, surface water]: 2.04e-7 kg; lognormal variance with pedigree 1.59, pedigree (1,1,5,1,1)
  (same comment as for Fluoride)
- DOC, Dissolved Organic Carbon [water, surface water]: 3.1e-5 kg; lognormal variance with pedigree 0.86, pedigree (1,1,5,1,1)
  (same comment as for Selenium)
- Antimony [water, ground-, long-term]: 8.55e-7 kg; lognormal variance with pedigree 2.65, pedigree (1,1,5,1,1)
  (same comment as for Cobalt)
- Cyanide [air, urban air close to ground]: 6.86e-10 kg; lognormal variance with pedigree 0.77, pedigree (1,1,5,1,1)
  (same comment as for Selenium)
- Sulfate [water, surface water]: 4.1e-6 kg; lognormal variance with pedigree 1.32, pedigree (1,1,5,1,1)
  (same comment as for Fluoride)
- BOD5, Biological Oxygen Demand [water, ground-, long-term]: 0.0456 kg; lognormal variance with pedigree 0.51, pedigree (1,1,5,1,1)
  (same comment as for Cobalt)
- Cadmium [air, urban air close to ground]: 1.38e-12 kg; lognormal variance with pedigree 1.81, pedigree (1,1,5,1,1)
  (same comment as for Selenium)
- Cobalt [water, surface water]: 2.31e-9 kg; lognormal variance with pedigree 2.07, pedigree (1,1,5,1,1)
  (same comment as for Selenium)
- Iron [air, urban air close to ground]: 2.93e-12 kg; lognormal variance with pedigree 1.63, pedigree (1,1,5,1,1)
  (same comment as for Selenium)
- Calcium, ion [water, ground-, long-term]: 0.00218 kg; lognormal variance with pedigree 0.6, pedigree (1,1,5,1,1)
  (same comment as for Cobalt)
- Nitrogen, organic bound [water, ground-, long-term]: 0.000712 kg; lognormal variance with pedigree 0.69, pedigree (1,1,5,1,1)
  (same comment as for Cobalt)
- TOC, Total Organic Carbon [water, surface water]: 3.23e-5 kg; lognormal variance with pedigree 0.86, pedigree (1,1,5,1,1)
  (same comment as for Selenium)
- Mercury [water, surface water]: 8.78e-12 kg; lognormal variance with pedigree 2.66, pedigree (1,1,5,1,1)
  (same comment as for Selenium)
- Hydrogen sulfide [water, ground-, long-term]: 2.61e-5 kg; lognormal variance with pedigree 0.83, pedigree (1,1,5,1,1)
  (same comment as for Cobalt)
- Barium [air, urban air close to ground]: 2.18e-9 kg; lognormal variance with pedigree 1.3, pedigree (1,1,5,1,1)
  (same comment as for Selenium)
- Mercury [air, non-urban air or from high stacks]: 1.11e-11 kg; lognormal variance with pedigree 2.79, pedigree (1,1,5,1,1)
  (same comment as for Hydrogen fluoride)
- Zinc, ion [water, surface water]: 4.23e-8 kg; lognormal variance with pedigree 1.61, pedigree (1,1,5,1,1)
  (same comment as for Selenium)
- Beryllium [water, surface water]: 1.2e-10 kg; lognormal variance with pedigree 2.45, pedigree (1,1,5,1,1)
  (same comment as for Selenium)
- Cobalt [air, urban air close to ground]: 0 kg; pedigree (1,1,1,1,1)
  (same comment as for Selenium)
- Sulfur dioxide [air, non-urban air or from high stacks]: 4.7e-7 kg; lognormal variance with pedigree 1.54, pedigree (1,1,5,1,1)
  (same comment as for Hydrogen fluoride)
- Calcium, ion [water, surface water]: 2.57e-6 kg; lognormal variance with pedigree 1.21, pedigree (1,1,5,1,1)
  (same comment as for Selenium)
- Antimony [air, non-urban air or from high stacks]: 2.24e-12 kg; lognormal variance with pedigree 3.06, pedigree (1,1,5,1,1)
  (same comment as for Hydrogen fluoride)
- Titanium [air, urban air close to ground]: 1.99e-10 kg; lognormal variance with pedigree 1.51, pedigree (1,1,5,1,1)
  (same comment as for Selenium)
- Nickel, ion [water, ground-, long-term]: 8.09e-7 kg; lognormal variance with pedigree 1.63, pedigree (1,1,5,1,1)
  (same comment as for Cobalt)
- Cadmium [air, non-urban air or from high stacks]: 3.36e-10 kg; lognormal variance with pedigree 2.41, pedigree (1,1,5,1,1)
  (same comment as for Hydrogen fluoride)
- Bromine [air, non-urban air or from high stacks]: 2.86e-9 kg; lognormal variance with pedigree 2.13, pedigree (1,1,5,1,1)
  (same comment as for Hydrogen fluoride)
- Aluminium [water, ground-, long-term]: 0.000162 kg; lognormal variance with pedigree 0.94, pedigree (1,1,5,1,1)
  (same comment as for Cobalt)
- Aluminium [air, urban air close to ground]: 1.19e-10 kg; lognormal variance with pedigree 1.72, pedigree (1,1,5,1,1)
  (same comment as for Selenium)
- Dinitrogen monoxide [air, urban air close to ground]: 6.73e-8 kg; lognormal variance with pedigree 0.6, pedigree (1,1,5,1,1)
  (same comment as for Selenium)
- Copper [air, non-urban air or from high stacks]: 4.89e-13 kg; lognormal variance with pedigree 3.24, pedigree (1,1,5,1,1)
  (same comment as for Hydrogen fluoride)
- Barium [air, non-urban air or from high stacks]: 5.8e-10 kg; lognormal variance with pedigree 2.34, pedigree (1,1,5,1,1)
  (same comment as for Hydrogen fluoride)
- Hydrogen chloride [air, non-urban air or from high stacks]: 4.48e-7 kg; lognormal variance with pedigree 1.46, pedigree (1,1,5,1,1)
  (same comment as for Hydrogen fluoride)
- Chromium, ion [water, surface water]: 1.88e-12 kg; lognormal variance with pedigree 2.28, pedigree (1,1,5,1,1)
  (same comment as for Selenium)
- Beryllium [water, ground-, long-term]: 4.05e-7 kg; lognormal variance with pedigree 1.72, pedigree (1,1,5,1,1)
  (same comment as for Cobalt)
- Nitrite [water, ground-, long-term]: 2.37e-5 kg; lognormal variance with pedigree 0.69, pedigree (1,1,5,1,1)
  (same comment as for Cobalt)
- Nickel [air, urban air close to ground]: 0 kg; pedigree (1,1,1,1,1)
  (same comment as for Selenium)
- Beryllium [air, urban air close to ground]: 1.16e-13 kg; lognormal variance with pedigree 2.49, pedigree (1,1,5,1,1)
  (same comment as for Selenium)
- Chloride [water, surface water]: 3.11e-5 kg; lognormal variance with pedigree 0.93, pedigree (1,1,5,1,1)
  (same comment as for Fluoride)
- COD, Chemical Oxygen Demand [water, ground-, long-term]: 0.193 kg; lognormal variance with pedigree 0.51, pedigree (1,1,5,1,1)
  (same comment as for Cobalt)
- Cobalt [air, non-urban air or from high stacks]: 1.14e-12 kg; lognormal variance with pedigree 3.15, pedigree (1,1,5,1,1)
  (same comment as for Hydrogen fluoride)
- Beryllium [air, non-urban air or from high stacks]: 5.88e-14 kg; lognormal variance with pedigree 3.53, pedigree (1,1,5,1,1)
  (same comment as for Hydrogen fluoride)
- Fluoride [water, ground-, long-term]: 1.21e-5 kg; lognormal variance with pedigree 1.28, pedigree (1,1,5,1,1)
  (same comment as for Cobalt)
- Chromium VI [water, ground-, long-term]: 4.77e-8 kg; lognormal variance with pedigree 8.59, pedigree (1,1,5,1,1)
  (same comment as for Cobalt)
- Nitrogen oxides [air, urban air close to ground]: 2.39e-7 kg; lognormal variance with pedigree 0.66, pedigree (1,1,5,1,1)
  (same comment as for Selenium)
- Mercury [water, ground-, long-term]: 4.04e-8 kg; lognormal variance with pedigree 1.96, pedigree (1,1,5,1,1)
  (same comment as for Cobalt)
- Nitrite [water, surface water]: 2.78e-7 kg; lognormal variance with pedigree 0.95, pedigree (1,1,5,1,1)
  (same comment as for Selenium)
- Lead [water, ground-, long-term]: 1.91e-5 kg; lognormal variance with pedigree 1.22, pedigree (1,1,5,1,1)
  (same comment as for Cobalt)
- Copper [air, urban air close to ground]: 9.35e-15 kg; lognormal variance with pedigree 2.27, pedigree (1,1,5,1,1)
  (same comment as for Selenium)
- Strontium [water, ground-, long-term]: 7.16e-5 kg; lognormal variance with pedigree 1.05, pedigree (1,1,5,1,1)
  (same comment as for Cobalt)
- Carbon dioxide, fossil [air, non-urban air or from high stacks]: 0.0174 kg; lognormal variance with pedigree 0.42, pedigree (1,1,5,1,1)
  (same comment as for Hydrogen fluoride)
- Nitrate [water, surface water]: 4.83e-5 kg; lognormal variance with pedigree 0.63, pedigree (1,1,5,1,1)
  (same comment as for Selenium)
- Nitrate [water, ground-, long-term]: 4.58e-5 kg; lognormal variance with pedigree 0.68, pedigree (1,1,5,1,1)
  (same comment as for Cobalt)
- Calcium [air, non-urban air or from high stacks]: 7.12e-10 kg; lognormal variance with pedigree 2.3, pedigree (1,1,5,1,1)
  (same comment as for Hydrogen fluoride)
- Zinc [air, non-urban air or from high stacks]: 3.04e-11 kg; lognormal variance with pedigree 2.71, pedigree (1,1,5,1,1)
  (same comment as for Hydrogen fluoride)
- Nickel [air, non-urban air or from high stacks]: 1.18e-13 kg; lognormal variance with pedigree 3.44, pedigree (1,1,5,1,1)
  (same comment as for Hydrogen fluoride)
- Ammonium, ion [water, surface water]: 1.32e-5 kg; lognormal variance with pedigree 0.7, pedigree (1,1,5,1,1)
  (same comment as for Selenium)
- Magnesium [air, urban air close to ground]: 6.75e-11 kg; lognormal variance with pedigree 1.49, pedigree (1,1,5,1,1)
  (same comment as for Selenium)
- Selenium [air, urban air close to ground]: 0 kg; pedigree (1,1,1,1,1)
  (same comment as for Selenium)
- COD, Chemical Oxygen Demand [water, surface water]: 0.000127 kg; lognormal variance with pedigree 0.86, pedigree (1,1,5,1,1)
  (same comment as for Selenium)
- Methane, fossil [air, urban air close to ground]: 1.14e-6 kg; lognormal variance with pedigree 0.91, pedigree (1,1,5,1,1)
  (same comment as for Selenium)
- Barium [water, ground-, long-term]: 0.000202 kg; lognormal variance with pedigree 0.89, pedigree (1,1,5,1,1)
  (same comment as for Cobalt)
- Copper, ion [water, surface water]: 4.44e-10 kg; lognormal variance with pedigree 2.19, pedigree (1,1,5,1,1)
  (same comment as for Selenium)
- Tin, ion [water, surface water]: 7.94e-11 kg; lognormal variance with pedigree 2.48, pedigree (1,1,5,1,1)
  (same comment as for Selenium)
- Zinc, ion [water, ground-, long-term]: 0.000238 kg; lognormal variance with pedigree 0.87, pedigree (1,1,5,1,1)
  (same comment as for Cobalt)
- Vanadium [air, urban air close to ground]: 9.67e-11 kg; lognormal variance with pedigree 1.32, pedigree (1,1,5,1,1)
  (same comment as for Selenium)
- Arsenic, ion [water, surface water]: 2.44e-9 kg; lognormal variance with pedigree 2.13, pedigree (1,1,5,1,1)
  (same comment as for Selenium)
- Magnesium [water, surface water]: 4.51e-7 kg; lognormal variance with pedigree 1.46, pedigree (1,1,5,1,1)
  (same comment as for Selenium)
- Chromium VI [water, surface water]: 6.28e-10 kg; lognormal variance with pedigree 2.24, pedigree (1,1,5,1,1)
  (same comment as for Selenium)
- Titanium [air, non-urban air or from high stacks]: 1.01e-10 kg; lognormal variance with pedigree 2.55, pedigree (1,1,5,1,1)
  (same comment as for Hydrogen fluoride)
- Ammonium, ion [water, ground-, long-term]: 0.000435 kg; lognormal variance with pedigree 0.69, pedigree (1,1,5,1,1)
  (same comment as for Cobalt)
- Manganese [water, ground-, long-term]: 2.47e-5 kg; lognormal variance with pedigree 1.18, pedigree (1,1,5,1,1)
  (same comment as for Cobalt)
- Chromium [air, urban air close to ground]: 0 kg; pedigree (1,1,1,1,1)
  (same comment as for Selenium)
- Manganese [air, non-urban air or from high stacks]: 7.26e-11 kg; lognormal variance with pedigree 2.61, pedigree (1,1,5,1,1)
  (same comment as for Hydrogen fluoride)
- Strontium [air, urban air close to ground]: 2.05e-12 kg; lognormal variance with pedigree 1.82, pedigree (1,1,5,1,1)
  (same comment as for Selenium)
- TOC, Total Organic Carbon [water, ground-, long-term]: 0.176 kg; lognormal variance with pedigree 0.51, pedigree (1,1,5,1,1)
  (same comment as for Cobalt)
- Tin, ion [water, ground-, long-term]: 3.22e-6 kg; lognormal variance with pedigree 1.46, pedigree (1,1,5,1,1)
  (same comment as for Cobalt)
- Nitrogen oxides [air, non-urban air or from high stacks]: 7.06e-9 kg; lognormal variance with pedigree 1.32, pedigree (1,1,5,1,1)
  (same comment as for Hydrogen fluoride)
- Magnesium [air, non-urban air or from high stacks]: 1.25e-10 kg; lognormal variance with pedigree 2.53, pedigree (1,1,5,1,1)
  (same comment as for Hydrogen fluoride)
- Barium [water, surface water]: 1.39e-7 kg; lognormal variance with pedigree 1.28, pedigree (1,1,5,1,1)
  (same comment as for Selenium)
- Thallium [air, non-urban air or from high stacks]: 4.71e-14 kg; lognormal variance with pedigree 3.56, pedigree (1,1,5,1,1)
  (same comment as for Hydrogen fluoride)
- Iron [air, non-urban air or from high stacks]: 4.45e-11 kg; lognormal variance with pedigree 2.65, pedigree (1,1,5,1,1)
  (same comment as for Hydrogen fluoride)
- Carbon dioxide, fossil [air, urban air close to ground]: 0.00058 kg; lognormal variance with pedigree 0.86, pedigree (1,1,5,1,1)
  (same comment as for Selenium)
- Sulfate [water, ground-, long-term]: 0.001 kg; lognormal variance with pedigree 0.83, pedigree (1,1,5,1,1)
  (same comment as for Cobalt)
- Manganese [water, surface water]: 1.47e-7 kg; lognormal variance with pedigree 1.53, pedigree (1,1,5,1,1)
  (same comment as for Selenium)
- Lead [air, non-urban air or from high stacks]: 3.75e-13 kg; lognormal variance with pedigree 3.28, pedigree (1,1,5,1,1)
  (same comment as for Hydrogen fluoride)
- Manganese [air, urban air close to ground]: 0 kg; pedigree (1,1,1,1,1)
  (same comment as for Selenium)
- Iron, ion [water, ground-, long-term]: 9.08e-5 kg; lognormal variance with pedigree 2.43, pedigree (1,1,5,1,1)
  (same comment as for Cobalt)
- Nitrogen [water, surface water]: 3.59e-7 kg; lognormal variance with pedigree 0.64, pedigree (1,1,5,1,1)
  (same comment as for Selenium)
- Titanium, ion [water, surface water]: 2.05e-7 kg; lognormal variance with pedigree 1.47, pedigree (1,1,5,1,1)
  (same comment as for Selenium)
- Thallium [water, ground-, long-term]: 3.24e-7 kg; lognormal variance with pedigree 1.75, pedigree (1,1,5,1,1)
  (same comment as for Cobalt)
- Thallium [air, urban air close to ground]: 9.27e-14 kg; lognormal variance with pedigree 2.52, pedigree (1,1,5,1,1)
  (same comment as for Selenium)
- DOC, Dissolved Organic Carbon [water, ground-, long-term]: 0.176 kg; lognormal variance with pedigree 0.51, pedigree (1,1,5,1,1)
  (same comment as for Cobalt)
- Titanium, ion [water, ground-, long-term]: 0.000809 kg; lognormal variance with pedigree 0.73, pedigree (1,1,5,1,1)
  (same comment as for Cobalt)
- Arsenic, ion [water, ground-, long-term]: 1.54e-6 kg; lognormal variance with pedigree 1.55, pedigree (1,1,5,1,1)
  (same comment as for Cobalt)
- Antimony [water, surface water]: 6.08e-9 kg; lognormal variance with pedigree 1.98, pedigree (1,1,5,1,1)
  (same comment as for Selenium)
- Arsenic [air, non-urban air or from high stacks]: 3.87e-11 kg; lognormal variance with pedigree 2.69, pedigree (1,1,5,1,1)
  (same comment as for Hydrogen fluoride)
- Sodium, ion [water, surface water]: 4.91e-5 kg; lognormal variance with pedigree 0.88, pedigree (1,1,5,1,1)
  (same comment as for Fluoride)
- Arsenic [air, urban air close to ground]: 7.78e-13 kg; lognormal variance with pedigree 2.18, pedigree (1,1,5,1,1)
  (same comment as for Selenium)
- Cadmium, ion [water, ground-, long-term]: 2.86e-5 kg; lognormal variance with pedigree 1.17, pedigree (1,1,5,1,1)
  (same comment as for Cobalt)
- Sodium [air, non-urban air or from high stacks]: 1.23e-8 kg; lognormal variance with pedigree 1.93, pedigree (1,1,5,1,1)
  (same comment as for Hydrogen fluoride)
- Selenium [water, ground-, long-term]: 4.8e-7 kg; lognormal variance with pedigree 1.94, pedigree (1,1,5,1,1)
  (same comment as for Cobalt)
- BOD5, Biological Oxygen Demand [water, surface water]: 4.01e-5 kg; lognormal variance with pedigree 0.86, pedigree (1,1,5,1,1)
  (same comment as for Selenium)
- Aluminium [air, non-urban air or from high stacks]: 2.02e-11 kg; lognormal variance with pedigree 2.76, pedigree (1,1,5,1,1)
  (same comment as for Hydrogen fluoride)
- Vanadium [air, non-urban air or from high stacks]: 4.91e-10 kg; lognormal variance with pedigree 2.35, pedigree (1,1,5,1,1)
  (same comment as for Hydrogen fluoride)
- Methane, fossil [air, non-urban air or from high stacks]: 0.00266 kg; lognormal variance with pedigree 0.46, pedigree (1,1,5,1,1)
  (same comment as for Hydrogen fluoride)
- Chromium [air, non-urban air or from high stacks]: 3e-13 kg; lognormal variance with pedigree 3.31, pedigree (1,1,5,1,1)
  (same comment as for Hydrogen fluoride)
- Tin [air, urban air close to ground]: 1.46e-13 kg; lognormal variance with pedigree 2.52, pedigree (1,1,5,1,1)
  (same comment as for Selenium)

## Sampling procedure
Landfill model based on observed leachate concentrations in literature. Extrapolated to 60'000 years heeding chemical characteristics. Initial waste composition from various literature sources.

## Extrapolations
This dataset has been extrapolated from year 2000 to the year of the calculation (2019). The uncertainty has been adjusted accordingly.

## Review by Niels Jungbluth 2003-07-21
Passed. Calculation for standard deviation 95 of, i.e., infrastructure,
land occupation, transport services or other services can differ from
standard Pedigree approach used in this project and figures obtained by
this procedure.
