# power supply unit production, for desktop computer

Dataset: EcoSpold 2, unit process
Geography: CN
Time period: 2005-01-01 to 2019-12-31
Technology level: current
Classification: EcoSpold01Categories: electronics/module
Classification: ISIC rev.4 ecoinvent: 2710:Manufacture of electric motors, generators, transformers and electricity di
Tags: ConvertedDataset
Scenario: Business-as-Usual
System model: Allocation at the point of substitution
Generated by: Roland Hischier
Published in: Hischier R. 2007
Database: ecoinvent
isCopyrightProtected: true
accessRestrictedTo: 1

## General comment
This represents the production and assembly of1 unit of a power supply unit (PSU) of a typical Desktop PC. It is based on a Switching Power Supply unit, model ST-235ATX, from the Chinese producer PC Winner. Main data about the composition and the weight are from dismantling activities of a PSU at Empa.
[This dataset was already contained in the ecoinvent database version 2. It was not individually updated during the transfer to ecoinvent version 3. Life Cycle Impact Assessment results may still have changed, as they are affected by changes in the supply chain, i.e. in other datasets. This dataset was generated following the ecoinvent quality guidelines for version 2. It may have been subject to central changes described in the ecoinvent version 3 change report (http://www.ecoinvent.org/database/ecoinvent-version-3/reports-of-changes/), and the results of the central updates were reviewed extensively. The changes added e.g. consistent water flows and other information throughout the database. The documentation of this dataset can be found in the ecoinvent reports of version 2, which are still available via the ecoinvent website. The change report linked above covers all central changes that were made during the conversion process.]

## Included activities start
From reception of metals and plastics at the factory gate.

## Included activities end
This dataset includes the material inputs that build up all together a power supply unit for a desktop PC. Requirements and emissions of the assembly process (energy, emissions, waste) are not included.

## Geography
Data of a Chinese product; commonly used in current desktop PC.

## Technology
Typical production of a PSU, model ST-235ATX, from a Chinese producer.

## Reference product
- power supply unit, for desktop computer: 1 unit; CPC 46113: Electric generating sets and rotary converters; By-product classification allocatable product
  Each Desktop PC has a power supply unit that transforms the 220V electricity from the plug to the adequate voltage used within such a device. The main components of such a PSU are (i) the housing, (ii) a fan for cooling, (iii) the printed wiring board with all its components and a whole bunch of various cables.
  EcoSpold01Location=CN
  production volume 0.197488 unit
    This is a placeholder value that does not reflect real-world production volumes. This dataset does not currently require a real-world production volume to work in the database framework, and no actual data were collected yet. This has no negative effect on the results of the ecoinvent database. The placeholder value of this activity was scaled according to the nominal GDP of 2005 (source: United Nations, http://data.un.org/Glossary.aspx?q=GDP+%28current+US%24%29, accessed 20130726) to reflect an appropriate share of the global production volume, which is also a placeholder value.
  property price 20.1055 EUR2005
    Calculated based on inputs: The price of the product has been calculated as a sum of the values of the material and energy inputs for this product. This value is therefore a rough estimation. It may underestimate the real price since there are additional expenses when producing any product. These expences can include for example labour costs, treatment of waste materials and profit for the producer. Please consider carefully whether this level of data quality is acceptable for your application.
  property carbon content, non-fossil 0.00159217
    Calculated as the addition of C contents in the product composition, then referred to 1 kg DM
  property carbon content, fossil 0.23443
    (same comment as for power supply unit, for desktop computer)
  property carbon content 0.236022
    carbon content on a dry matter basis (reserved; not for manual entry)
  properties: dry mass 1.47 kg, water in wet mass 0 kg, water content 0, wet mass 1.47 kg, carbon allocation 0.346952 kg

## Inputs from technosphere
All rows: lognormal variance with pedigree 0.18, pedigree (1,1,5,1,1)
- fan, for power supply unit, desktop computer: 0.0742 kg
  EcoSpold01Location=GLO
  Measured Value, based on dismantling activites at Empa.
  properties: wet mass 1 kg, dry mass 1 kg, carbon content, non-fossil 0.000300198, carbon content, fossil 0.693687
  note on carbon content, non-fossil: Calculated as the addition of C contents in the product composition
- printed wiring board, for power supply unit, desktop computer, Pb containing: 0.18114 kg
  EcoSpold01Location=GLO
  Measured Value, based on dismantling activites at Empa.
  properties: wet mass 1 kg, carbon content, non-fossil 0.00383938, carbon content, fossil 0.240291, dry mass 1 kg
  note on carbon content, non-fossil: C content was calculated as the addition of C content in the PWB components
- sheet rolling, steel: 0.5719 kg
  EcoSpold01Location=RER
  Measured Value, based on dismantling activites at Empa.
- plug, inlet and outlet, for computer cable: 1 unit
  Measured Value, based on dismantling activites at Empa.
  EcoSpold01Location=GLO
  properties: carbon content, fossil 0.3397, dry mass 0.0585 kg, wet mass 0.0585 kg
- cable, ribbon cable, 20-pin, with plugs: 0.1935 kg
  Measured Value, based on dismantling activites at Empa.
  EcoSpold01Location=GLO
  properties: carbon content, fossil 0.648653, dry mass 1 kg, wet mass 1 kg
  note on carbon content, fossil: Calculated as the addition of C contents in the product composition. Then referred to 1 kg DM
- printed wiring board, for power supply unit, desktop computer, Pb free: 0.42266 kg
  EcoSpold01Location=GLO
  Measured Value, based on dismantling activites at Empa.
  properties: wet mass 1 kg, carbon content, fossil 0.240291, dry mass 1 kg, carbon content, non-fossil 0.00383938
- steel, low-alloyed, hot rolled: 0.5719 kg
  Measured Value, based on dismantling activites at Empa.
  EcoSpold01Location=RER
  properties: wet mass 1 kg, dry mass 1 kg, carbon content, fossil 0.005
  note on carbon content, fossil: Low alloyed steel composition given in Tab. 3.2 ecoinvent v2.2 report 10_partII. Steel assumed to have a C content of 0.5%

## Sampling procedure
own dismantling & estimation

## Extrapolations
This dataset has been extrapolated from year 2005 to the year of the calculation (2019). The uncertainty has been adjusted accordingly.

## Review by Roland Hischier 2011-09-28
Transfer of documentation done.

## Review by Rolf Frischknecht 2007-09-14
passed
