# jute production, rainfed

Dataset: EcoSpold 2, unit process
Geography: BD
Time period: 2016-03-01 to 2019-12-31
Technology level: current
Classification: EcoSpold01Categories: agricultural production/plant production
Classification: ISIC rev.4 ecoinvent: 0116:Growing of fibre crops
Scenario: Business-as-Usual
System model: Allocation at the point of substitution
Generated by: Muhammed Noor Hossain
Database: ecoinvent
isCopyrightProtected: true
accessRestrictedTo: 1

## General comment
Jute farming activity in Bangladesh starts right after the harvest of the previous non-jute crops in the field. Jute farming covers soil preparation (fall tillage), inputs of seeds, application of mineral fertilizers, jute plant harvesting. The soil is prepared for the jute cultivation through fall plough by using auto-tiller machine in March-April. Then the seeds are sown. Mineral fertilizers are applied during the growth period. Usually jute cultivation does not involve heavy use of pesticides. Jute is generally harvested when the plants are at early pod stage. The harvest index remains more or less constant over 60–105 day period following sowing. The yield is 2680 kg/ha.The inventory is modelled for fresh matter.
The dataset represents the production of 1 kg of jute plant in Bangladesh in 2017. The activity covers soil preparation (fall tillage), inputs of seeds, mineral fertilizers, harvesting. Machinery and fixed overhead are excluded.
In Bangladesh, it is the time when rainy season starts. That's why irrigation is usually not required for jute cultivation. Accordingly, we considered the jute arming activity as a rainfed agronomic practice. Machinery and fixed overhead are excluded from life cycle inventory for the activity as their impacts per kg of jute plant is very low since the machineries and fixed overheads provide services over several years.
This dataset covers only the field activities for the production of jute. That means the technical boundary ends at the harvesting of the mature jute plant. The mature plant is not dried. The harvested plant goes to the jute retting process where transformation of raw jute from the jute plan happens. The retting process is covered in a separate dataset.

## Included activities start
This activity starts right after the harvest of the previous crop. The soil is prepared for the jute cultivation.

## Included activities end
The activity ends at the harvesting of the mature jute plant.

## Technology
Cultivation of Jute from conventional production standards

## Parameters
- LUC_crop_specific: 1
  This parameter allows to switch between a "crop specific" and a "country specific" approach when calculating the LUC of a crop. By default, the chosen approach is "crop specific", so the value of the parameter is 1. If you want to apply a "country specific" approach, turn the parameter to 0.

## Reference product
- jute plant, harvested: 1 kg; By-product classification allocatable product; CPC 01922: Jute, kenaf, and other textile bast fibres, raw or retted, except flax, true hemp and ramie
  The output of the jute cultivation activity. Mature jute plant is harvested.
  production volume 3.27844e9 kg
    The annual production volume data is not readily available. However, annual production volume of jute fibre is available. From the literature, we also know that 1 kg jute fibre as output of retting process requires 2.4 kg fresh jute plant. Hence, we have multiplied the annual production volume of jute fibre with 2.4. www.ijma.org/world-jute.html
  property carbon content, non-fossil 0.475
    Assumed carbon content, on a dry mass basis according to FAOSTAT.
    Reference: http://www.fao.org/forestry/17111/en
  property price 0.362736 EUR2005
    Literature value. Price from FAOSTAT data Producer Prices - Annual (retrieved from: http://www.fao.org/faostat/en/#data/PP, accessed 15Feb2018). Data from 2005.
  property carbon content 0.475
    carbon content on a dry matter basis (reserved; not for manual entry)
  properties: wet mass 1 kg, dry mass 0.177647 kg, carbon content, fossil 0, water content 4.62914, water in wet mass 0.822353 kg, carbon allocation 0.0843824 kg

## Inputs from technosphere
- packaging, for fertilisers: 0.0802416 kg; lognormal variance with pedigree 0.0514, pedigree (4,3,2,5,4)
  Total amount of active substance/s of fertilisers needed for the production of 'jute plant, harvested' is calculated to be circa 4.01E-02 kg. Fertiliser/s used in this dataset is/are: 'phosphate fertiliser, as P2O5', 'potassium chloride, as K2O', 'urea, as N'. The total amount of active substance/s is doubled in order to account for the packaging of the dilluted product of fertiliser/s that is/are applied. Therefore, 8.02E-02 kg of packaging for fertilisers is justified with this exchange.
  properties: wet mass 1 kg, carbon content, fossil 0.825301, dry mass 1 kg, price 0.0642 EUR2005
  note on carbon content, fossil: Considering a chemical formula (C2H4)n for polyethylene, carbon content-fossil is calculated to be 0.856286 kg of Carbon per kg of dry mass.
- phosphate fertiliser, as P2O5: 0.014467 kg; lognormal variance with pedigree 0.0008, pedigree (1,1,2,1,1)
  Calculated Value. The data was collected for a hactare area from the focus group discussion. The input to hactare is 93.06 kg.
  EcoSpold01Location=RER
  properties: dry mass 1 kg, wet mass 1 kg
- tillage, ploughing: 8.91638e-5 ha; lognormal variance with pedigree 0.0008, pedigree (1,1,2,1,1)
  The data was collected for a hactare area from the focus group discussion.
  EcoSpold01Location=CH
- linseed seed, for sowing: 0.000886525 kg; lognormal variance with pedigree 0.0009, pedigree (1,2,2,1,1)
  Calculated Value. The data was collected for a hactare area from the focus group discussion.
  properties: carbon content, non-fossil 1, wet mass 1 kg, dry mass 1 kg
- potassium chloride, as K2O: 0.0126053 kg; lognormal variance with pedigree 0.0008, pedigree (1,1,2,1,1)
  EcoSpold01Location=RER
  Calculated Value. The data was collected for a hactare area from the focus group discussion. The input to hactare is 81.08 kg.
  properties: wet mass 1 kg, dry mass 1 kg
- urea, as N: 0.0130485 kg; lognormal variance with pedigree 0.0008, pedigree (1,1,2,1,1)
  Calculated Value. The data was collected for a hactare area from the focus group discussion. The input to hactare is 83.93 kg.
  EcoSpold01Location=RER
  properties: wet mass 1 kg, dry mass 1 kg, carbon content, fossil 0.2

## Inputs from nature
- Energy, gross calorific value, in biomass [natural resource, biotic]: 4.6875 MJ; lognormal variance with pedigree 0.0088, pedigree (4,1,2,1,1)
  Calculated Value. This value has been calculated by using the ecoinvent LCI calculation tool for crop production.
  Uncertainty: The ecoinvent LCI calculation tool for crop production used India as a proxy for Bangladesh and Hemp as for Jute.
- Carbon dioxide, in air [natural resource, in air]: 0.403061 kg; lognormal variance with pedigree 0.0482, pedigree (4,1,2,1,1)
  Calculated Value. This value has been calculated by using the ecoinvent LCI calculation tool for crop production.
- Transformation, from arable land, unspecified use [natural resource, land]: 1.55456 m2; lognormal variance with pedigree 0.0162, pedigree (4,1,2,1,1)
  (same comment as for Energy, gross calorific value, in biomass)
- Transformation, to arable land, unspecified use [natural resource, land]: 1.55456 m2; lognormal variance with pedigree 0.0162, pedigree (4,1,2,1,1)
  (same comment as for Carbon dioxide, in air)
- Occupation, arable land, unspecified use [natural resource, land]: 0.454637 m2*year; lognormal variance with pedigree 0.0102, pedigree (4,1,2,1,1)
  (same comment as for Energy, gross calorific value, in biomass)

## Emissions to nature
- Lead [water, surface water]: 6.5688e-6 kg; lognormal variance with pedigree 0.0503, pedigree (4,4,2,3,1)
  (same comment as for Carbon dioxide, in air)
- Ammonia [air, non-urban air or from high stacks]: 0.00317469 kg; lognormal variance with pedigree 0.0503, pedigree (4,4,2,3,1)
  (same comment as for Carbon dioxide, in air)
- Zinc, ion [water, surface water]: 5.30791e-5 kg; lognormal variance with pedigree 0.0503, pedigree (4,4,2,3,1)
  (same comment as for Carbon dioxide, in air)
- Nitrate [water, ground-]: 0.0194462 kg; lognormal variance with pedigree 0.0503, pedigree (4,4,2,3,1)
  (same comment as for Carbon dioxide, in air)
- Mercury [water, surface water]: 8.67363e-8 kg; lognormal variance with pedigree 0.0503, pedigree (4,4,2,3,1)
  (same comment as for Carbon dioxide, in air)
- Lead [soil, agricultural]: -6.51523e-6 kg; normal variance with pedigree 0.0503, pedigree (4,4,2,3,1)
  (same comment as for Carbon dioxide, in air)
- Chromium, ion [water, ground-]: 9.42461e-7 kg; lognormal variance with pedigree 0.0503, pedigree (4,4,2,3,1)
  (same comment as for Carbon dioxide, in air)
- Phosphate [water, surface water]: 2.99897e-5 kg; lognormal variance with pedigree 0.0503, pedigree (4,4,2,3,1)
  (same comment as for Carbon dioxide, in air)
- Copper, ion [water, surface water]: 2.73276e-5 kg; lognormal variance with pedigree 0.0503, pedigree (4,4,2,3,1)
  (same comment as for Carbon dioxide, in air)
- Nitrogen oxides [air, non-urban air or from high stacks]: 0.000520158 kg; lognormal variance with pedigree 0.0503, pedigree (4,4,2,3,1)
  (same comment as for Carbon dioxide, in air)
- Lead [water, ground-]: 6.32705e-9 kg; lognormal variance with pedigree 0.0503, pedigree (4,4,2,3,1)
  (same comment as for Carbon dioxide, in air)
- Phosphate [water, ground-]: 9.73175e-6 kg; lognormal variance with pedigree 0.0503, pedigree (4,4,2,3,1)
  (same comment as for Carbon dioxide, in air)
- Chromium, ion [water, surface water]: 3.41872e-5 kg; lognormal variance with pedigree 0.0503, pedigree (4,4,2,3,1)
  (same comment as for Carbon dioxide, in air)
- Copper, ion [water, ground-]: 1.53387e-7 kg; lognormal variance with pedigree 0.0503, pedigree (4,4,2,3,1)
  (same comment as for Carbon dioxide, in air)
- Cadmium [soil, agricultural]: 1.26413e-6 kg; lognormal variance with pedigree 0.0503, pedigree (4,4,2,3,1)
  (same comment as for Carbon dioxide, in air)
- Cadmium, ion [water, surface water]: 3.40636e-7 kg; lognormal variance with pedigree 0.0503, pedigree (4,4,2,3,1)
  (same comment as for Carbon dioxide, in air)
- Carbon dioxide, from soil or biomass stock [air, non-urban air or from high stacks]: 0.0410448 kg; = 110/2680
  Due to lack o data related to land use change of annual crops in Bangladesh, this exchange is added to cover the impact of LUC, using the methodology applied in Global datasets.
  Global average LUC emissions according 2nd edition of the Quantis-modified tool developed by Blonk Consultants 'WFLDB-adapted-Blonk 2014 direct-land-use-change-assessment-tool_2015-05-18a.xlsx', tab. 'Country & land use unknown'. The emission are based on the relative change in production areas in all countries for a given crop. The weighted average is used which takes into acount relative difference in crop expansion into primary forest, secondary forest, grassland, perennial and annual land. The amount of 110 kg of CO2 per ha*year (taken from the tool) is divided with the yield of jute plant, harvested, 2680 kg/ha.
- Nickel [soil, agricultural]: -2.72393e-5 kg; normal variance with pedigree 0.0503, pedigree (4,4,2,3,1)
  (same comment as for Carbon dioxide, in air)
- Cadmium, ion [water, ground-]: 2.22302e-9 kg; lognormal variance with pedigree 0.0503, pedigree (4,4,2,3,1)
  (same comment as for Carbon dioxide, in air)
- Chromium [soil, agricultural]: -2.69843e-5 kg; normal variance with pedigree 0.0503, pedigree (4,4,2,3,1)
  (same comment as for Carbon dioxide, in air)
- Mercury [soil, agricultural]: -7.82321e-8 kg; normal variance with pedigree 0.0503, pedigree (4,4,2,3,1)
  (same comment as for Carbon dioxide, in air)
- Copper [soil, agricultural]: -2.58873e-5 kg; normal variance with pedigree 0.0503, pedigree (4,4,2,3,1)
  (same comment as for Carbon dioxide, in air)
- Zinc [soil, agricultural]: -4.55726e-5 kg; normal variance with pedigree 0.0503, pedigree (4,4,2,3,1)
  (same comment as for Carbon dioxide, in air)
- Carbon dioxide, fossil [air, non-urban air or from high stacks]: 0.0204994 kg; lognormal variance with pedigree 0.0503, pedigree (4,4,2,3,1)
  (same comment as for Carbon dioxide, in air)
- Zinc, ion [water, ground-]: 1.10672e-6 kg; lognormal variance with pedigree 0.0503, pedigree (4,4,2,3,1)
  (same comment as for Carbon dioxide, in air)
- Nickel, ion [water, surface water]: 2.85122e-5 kg; lognormal variance with pedigree 0.0503, pedigree (4,4,2,3,1)
  (same comment as for Carbon dioxide, in air)
- Dinitrogen monoxide [air, non-urban air or from high stacks]: 0.000300283 kg; lognormal variance with pedigree 0.0503, pedigree (4,4,2,3,1)
  (same comment as for Carbon dioxide, in air)
- Mercury [water, ground-]: 4.83468e-11 kg; lognormal variance with pedigree 0.0503, pedigree (4,4,2,3,1)
  (same comment as for Carbon dioxide, in air)
- Phosphorus [water, surface water]: 0.0029727 kg; lognormal variance with pedigree 0.0503, pedigree (4,4,2,3,1)
  (same comment as for Carbon dioxide, in air)

## Sampling procedure
Focus group discussion, expert interviews, literature data and assumptions. Data collection started off with the existing literature data survey. Bangladesh Yearbook of Agricultural Statistics documents the production statistics of jute goods. Bangladesh Agricultural Information Service describes a standard agricultural practice for the jute cultivation in Bangladesh. The literature data were supported by a total of three focus group discussions among the jute farmers and agricultural extension officers of jute growing areas in Bangladesh. Standardized questionnaires were developed and adapted to jute-specific cultivation and post-harvest situation. The secondary data from literature and the primary data from surveys were compared and matched to obtain highest data quality. The collected data on inputs to the field activities are then used to calculate impacts by using the Agriculture Life Cycle Inventory Generator tool from Quantis International.

## Extrapolations
This dataset has been extrapolated from year 2017 to the year of the calculation (2019). The uncertainty has been adjusted accordingly.
