# tap water production, underground water with disinfection

Dataset: EcoSpold 2, unit process
Geography: Europe without Switzerland
Time period: 2012-01-01 to 2019-12-31
Technology level: current
Classification: ISIC rev.4 ecoinvent: 3600:Water collection, treatment and supply
Classification: EcoSpold01Categories: water supply/production
Synonyms: potable water
Scenario: Business-as-Usual
System model: Allocation at the point of substitution
Generated by: Tereza Levova
Database: ecoinvent
isCopyrightProtected: true
accessRestrictedTo: 1

## General comment
This dataset is created as a child of global dataset with edited production volume.

This dataset represents production of 1 kg of tap water under pressure at facility gate, ready for distribution in network. This dataset is approximating the inventory for underground water pumping and disinfection using chlorine using data from two facilities of different technology in Quebec. Chlorine consumption is estimated using data from the artificial recharged wells dataset and energy inputs are estimated using data from underground water without treatment dataset.
[This dataset is meant to replace the following datasets:
- tap water production and supply, Europe without Switzerland, 2000 - 2000]

## Included activities start
From the intake pumping of raw surface water into the water treatment plant.

## Included activities end
This dataset ends with the production of tap water, at facility gate, under pressure. It includes energy for intake pumping, lighting and heating of the building as well as the energy of the pump pressurizing water to the beginning of the network. Infrastructure for the facility is estimated. It excludes energy for pumping stations and water losses within the network which is included in the tap water market. Emissions to the environment occurring during the treatment and during the distribution were not considered as they are assumed negligible. Main substance in water that would be released in the environment are assumed to be considered in wastewater processes.

## Geography
Extrapolated from data from two plants in Quebec (Canada).The uncertainty was adjusted accordingly.

## Time period
Time of publication.

## Reference product
- tap water: 1 kg; name tapwater; CPC 18000: Natural water; By-product classification allocatable product; CAS 7732-18-5
  production volume 2.00631e13 kg; name PV_tapwater; = (4.7824E14*0.184*0.228)
    Calculated based on estimates and literature values.
    4.78E11 m3/year is the amount of tap water produced in Europe (excluding Switzerland) yearly (Gleick, P., 2012, The World's Water, Volume 7).
    18.4% is the share of tap water produced without any treatment or minimal treatment from ground water
    38% is the share of conventional treatment
    38.5% is the share of direct filtration treatment
    2.4% is the share of microstainer treatment
    2.6% is the share of ultrafiltration
    Estimated based on literature values (European Environment Agency, 2009, Water resources across Europe - confronting water scarcity and drought).
    54.3% of the ground water is extracted and supplied to the distriubution network without treatment
    22.8% of the ground water is extracted and supplied to the distriubution network with chemical treatment
    22.8% of the ground water is extracted and supplied to the distriubution network with desinfection
  property price 0.000397 EUR2005
    Converted from EU price by using Purchasing Power Parities (0.8458 in 2003 and 0.8426 in 2004)
  property carbon content 0.0017899
    carbon content on a dry matter basis (reserved; not for manual entry)
  properties: water content 2940.18, dry mass 0.00034 kg, carbon content, non-fossil 0, wet mass 1 kg, water in wet mass 0.99966 kg, carbon content, fossil 0.0017899, carbon allocation 6.08566e-7 kg

## Inputs from technosphere
- electricity, medium voltage: 0.000399 kWh; lognormal variance with pedigree 0.0146, pedigree (4,4,3,5,1)
  Estimated value. Represents electricity consumption for pumping underground water and pressurizing tap water at facility gate. Value is based on energy consumption from the underground without treatment dataset.
  EcoSpold01Location=UCTE
- pump station: 2.0568e-11 unit; lognormal variance with pedigree 0.0466, pedigree (5,4,3,5,1)
  Approximated process. Used to represent facility pumping both intake and at facility gate. Value taken directly from ecoinvent V2.2 tap water, at user module.
- chlorine, liquid: 1.40443e-6 kg; lognormal variance with pedigree 0.0146, pedigree (4,4,3,5,1)
  Estimated value. Based on chlorine consumption for disinfection from the artificial recharged wells dataset.
  properties: dry mass 1 kg, wet mass 1 kg
- diesel, burned in building machine: 1.49144e-5 MJ; = diesel_use*density_diesel*NHV; lognormal variance with pedigree 0.002, pedigree (1,1,3,1,1)
  Calculated value.
  Uncertainty: Calculated variable. Uncertainty will be determined from propagation of uncertainty factors of underlying variables.
  property density 0.84 kg/l; name density_diesel
  property heating value, net 43.2 MJ; name NHV
  property fuel input in physical units, L 4.11e-7 l; name diesel_use
  note on heating value, net: Literature. net (lower) heating (calorific) value for diesel in MJ/kg
  note on fuel input in physical units, L: Estimated value. Represents diesel volume consumed in a year for routine runs of emergency generators. Value is based on diesel consumption from the underground water without treatment dataset.

## Inputs from nature
- Water, well, in ground [natural resource, in water]: 0.001 m3; name waterIn_1
  Measured value. Data provider reported that no loss occurs thoughout water treatment.

## Sampling procedure
Based on data collected from two treatment plants using underground water and with disinfection, located in Quebec (Canada). See corresponding Quebec dataset for more information.

## Extrapolations
This dataset has been extrapolated from year 2012 to the year of the calculation (2019). The uncertainty has been adjusted accordingly.
