# methane production, 96% by volume, from biogas, low pressure, at user

Dataset: EcoSpold 2, unit process
Geography: RoW
Time period: 2000-01-01 to 2019-12-31
Technology level: current
Classification: ISIC rev.4 ecoinvent: 3520:Manufacture of gas; distribution of gaseous fuels through mains
Classification: EcoSpold01Categories: biomass/fuels
Synonyms: Kompogas, Naturgas
Tags: ConvertedDataset
Scenario: Business-as-Usual
System model: Allocation at the point of substitution
Share of production covered: 100 %
Generated by: Mireille Faist Emmenegger (obsolete)
Published in: Jungbluth N. 2007
Database: ecoinvent
isCopyrightProtected: true
accessRestrictedTo: 1

## General comment
Total network losses are based on published data, repartition of losses on high and low pressure network on calculations with data for other countries.
[This dataset was already contained in the ecoinvent database version 2. It was not individually updated during the transfer to ecoinvent version 3. Life Cycle Impact Assessment results may still have changed, as they are affected by changes in the supply chain, i.e. in other datasets. This dataset was generated following the ecoinvent quality guidelines for version 2. It may have been subject to central changes described in the ecoinvent version 3 change report (http://www.ecoinvent.org/database/ecoinvent-version-3/reports-of-changes/), and the results of the central updates were reviewed extensively. The changes added e.g. consistent water flows and other information throughout the database. The documentation of this dataset can be found in the ecoinvent reports of version 2, which are still available via the ecoinvent website. The change report linked above covers all central changes that were made during the conversion process.]

## Included activities end
This dataset describes the energy requirement and the emissions of the low pressure distribution network in Switzerland.

## Geography
Energy requirements is based on environmental report of Italian company. Total leakages are specific for CH, HD-leakages are calculated out of the total with German data.

## Technology
The quantity of gas delivered in the low pressure network is estimated. Households and half of commercial and of others are assumed to be connected to the low pressure network

## Reference product
- methane, 96% by volume, from biogas, low pressure, at user: 1 MJ; CPC 17200: Coal gas, water gas, producer gas and similar gases, other than petroleum gases and other gaseous hydrocarbons; By-product classification allocatable product; CAS 74-82-8
  EcoSpold01Location=CH
  production volume 3.96633 MJ
    This is a placeholder value that does not reflect real-world production volumes. This dataset does not currently require a real-world production volume to work in the database framework, and no actual data were collected yet. This has no negative effect on the results of the ecoinvent database.
  property carbon content, non-fossil 0.695496
    C content is 0.7 kg C/kg methane 96%vol (tab 19.1, ecoinvent v2.2 report 17, part 19). This can be obtained from the composition of the gas, 96% (in vol) methane, 2% (in vol) CO2. The composition in %vol was converted in % weight using density data of the different gases from tab 19.1, ecoinvent v2.2 report 17, part 19.
  property price 0.144 EUR2005
    Temporary price data. Calculated as 90% of purchasers price based on: Same prices per energy output as natural gas, based on the proportional heating value (55.5 MJ/kg for methane; 54.8 MJ/kg for natural gas)
  property carbon content 0.695496
    carbon content on a dry matter basis (reserved; not for manual entry)
  properties: carbon content, fossil 0, dry mass 0.0218341 kg, water in wet mass 0 kg, water content 0, wet mass 0.0218341 kg, carbon allocation 0.0151855 kg

## Inputs from technosphere
- methane, 96% by volume, from biogas, high pressure, at user: 1.0072 MJ; lognormal variance with pedigree 0.0426, pedigree (1,3,5,5,1)
  EcoSpold01Location=CH
  Based on heating value, incl. leakage
  Uncertainty: based on heating value, incl. leakage
  properties: carbon content, non-fossil 0.695496, wet mass 0.0218341 kg, dry mass 0.0218341 kg
  note on carbon content, non-fossil: C content is 0.7 kg C/kg methane 96%vol (tab 19.1, ecoinvent v2.2 report 17, part 19). This can be obtained from the composition of the gas, 96% (in vol) methane, 2% (in vol) CO2. The composition in %vol was converted in % weight using density data of the different gases from tab 19.1, ecoinvent v2.2 report 17, part 19.
- heat, central or small-scale, natural gas: 0 MJ; pedigree (1,1,1,1,1)
  Gas statistics
  EcoSpold01Location=RER
  Uncertainty: gas statistics
- pipeline, natural gas, low pressure distribution network: 2.8149e-9 km; lognormal variance with pedigree 0.3426, pedigree (2,1,5,5,1)
  Based on statistics
  EcoSpold01Location=CH
  Uncertainty: based on statistics
- heat, central or small-scale, natural gas: 3.23711e-8, 0.000199968 MJ (2 entries); lognormal variance with pedigree 0.0426, pedigree (1,3,5,5,1)
  Gas statistics
  EcoSpold01Location=RER
  Uncertainty: gas statistics

## Emissions to nature
- Carbon dioxide, non-fossil [air, urban air close to ground]: 8.2047e-6 kg; lognormal variance with pedigree 0.044, pedigree (3,1,5,5,1)
  Calculation based on gas composition and leakages
  Uncertainty: calculation based on gas composition and leakages
- Methane, non-fossil [air, urban air close to ground]: 0.00014331 kg; lognormal variance with pedigree 0.164, pedigree (3,1,5,5,1)
  (same comment as for Carbon dioxide, non-fossil)
- Hydrogen sulfide [air, urban air close to ground]: 3.1703e-9 kg; lognormal variance with pedigree 0.084, pedigree (3,1,5,5,1)
  (same comment as for Carbon dioxide, non-fossil)

## Sampling procedure
statistics

## Extrapolations
none This dataset has been copied from an original dataset covering the geography CH. The uncertainty has been adjusted accordingly.

## Review by Arnaud Dauriat 2005-08-04
Passed.
