# treatment of lignite ash, opencast refill

Dataset: EcoSpold 2, unit process
Geography: SK
Time period: 1996-01-01 to 2019-12-31
Technology level: current
Classification: EcoSpold01Categories: waste management/others
Classification: ISIC rev.4 ecoinvent: 3822:Treatment and disposal of hazardous waste
Synonyms: ashes form lignite incineration disposed as backfill in opencast lignite mines
Tags: Treatment; ConvertedDataset
Scenario: Business-as-Usual
System model: Allocation at the point of substitution
Generated by: Gabor Doka (obsolete)
Published in: Doka G. 2008
Database: ecoinvent
isCopyrightProtected: true
accessRestrictedTo: 1

## General comment
backfilled waste composition is (in ppm): H2O n.a.; O n.a.; H n.a.; C n.a.; S 22006; N n.a.; P 64.661; B 340.14; Cl 2.4272; Br 2.589; F 8.0906; I 0.32362; Ag n.a.; As 8.0139; Ba 161.81; Cd 0.98117; Co 24.272; Cr 22.654; Cu 9.6962; Hg 0.016197; Mn 32.362; Mo 11.316; Ni 24.216; Pb 8.0504; Sb 6.4532; Se 2.7294; Sn 2.589; V 56.578; Zn 45.037; Be 1.6181; Sc 0.80906; Sr 113.21; Ti 161.81; Tl 0.032298; W 1.6181; Si 77670; Fe 8737.9; Ca 32362; Al 7605.2; K 970.87; Mg 4854.4; Na 1456.3;
[This dataset was already contained in the ecoinvent database version 2. It was not individually updated during the transfer to ecoinvent version 3. Life Cycle Impact Assessment results may still have changed, as they are affected by changes in the supply chain, i.e. in other datasets. This dataset was generated following the ecoinvent quality guidelines for version 2. It may have been subject to central changes described in the ecoinvent version 3 change report (http://www.ecoinvent.org/database/ecoinvent-version-3/reports-of-changes/), and the results of the central updates were reviewed extensively. The changes added e.g. consistent water flows and other information throughout the database. The documentation of this dataset can be found in the ecoinvent reports of version 2, which are still available via the ecoinvent website. The change report linked above covers all central changes that were made during the conversion process.]

## Included activities end
This module contains only direct emissions from lignite ash used as backfill in opencast lignite mines: short-term emissions (0-100a) and long-term emissions (>100a) both to ground water. E.g. land-use and energy consumption is *not* included.

## Geography
Ash composition calculated from country-specific coal composition (SK) and technology-specific transfer coefficients in power plant.

## Technology
Lignite ash as backfill in lignite opencast mine (together with tailings)

## Reference product
- lignite ash: -1 kg; By-product classification Waste; CPC 39: Wastes or scraps
  EcoSpold01Location=SK
  production volume 3.63003e7 kg
    Estimated. Electricity and synthetic natural gas production are responsible for more than 90% of lignite use (https://www.lignite.com/about-lignite/lignite-uses/, accessed 20151008) . The production volume is calculated as the sum of lignite ashes resulting from electricity and heat and power co-generation production from lignite, in the respective country.
  property price 0 EUR2005
    Waste products are assigned a price of zero as they are assumed to require further treatment.
  property carbon content 0
    carbon content on a dry matter basis (reserved; not for manual entry)
  properties: water content 0, wet mass 1 kg, dry mass 1 kg, carbon content, non-fossil 0, water in wet mass 0 kg, carbon content, fossil 0, carbon allocation 0 kg

## Emissions to nature
- Fluoride [water, ground-, long-term]: 7.0351e-6 kg; lognormal variance with pedigree 1.34, pedigree (1,1,5,1,1)
  Long-term emission from lignite ash backfill. Uncertainty derived from uncertainty in ash composition and uncertainty in transfer coefficients.
- Fluoride [water, ground-]: 1.0555e-6 kg; lognormal variance with pedigree 1.43, pedigree (1,1,5,1,1)
  Short-term emission from lignite ash backfill. Uncertainty derived from uncertainty in ash composition and uncertainty in transfer coefficients.
- Copper, ion [water, ground-, long-term]: 9.6946e-6 kg; lognormal variance with pedigree 1.31, pedigree (1,1,5,1,1)
  (same comment as for Fluoride)
- Tungsten [water, ground-, long-term]: 9.9409e-7 kg; lognormal variance with pedigree 1.55, pedigree (1,1,5,1,1)
  (same comment as for Fluoride)
- Boron [water, ground-]: 2.6651e-6 kg; lognormal variance with pedigree 1.23, pedigree (1,1,5,1,1)
  (same comment as for Fluoride)
- Bromine [water, ground-]: 2.5452e-6 kg; lognormal variance with pedigree 1.49, pedigree (1,1,5,1,1)
  (same comment as for Fluoride)
- Cadmium, ion [water, ground-, long-term]: 9.8114e-7 kg; lognormal variance with pedigree 1.61, pedigree (1,1,5,1,1)
  (same comment as for Fluoride)
- Calcium, ion [water, ground-]: 1.2248e-5 kg; lognormal variance with pedigree 1.05, pedigree (1,1,5,1,1)
  (same comment as for Fluoride)
- Sodium, ion [water, ground-, long-term]: 0.00044734 kg; lognormal variance with pedigree 0.66, pedigree (1,1,5,1,1)
  (same comment as for Fluoride)
- Manganese [water, ground-, long-term]: 3.2361e-5 kg; lognormal variance with pedigree 1.15, pedigree (1,1,5,1,1)
  (same comment as for Fluoride)
- Silicon [water, ground-]: 0.00043826 kg; lognormal variance with pedigree 0.62, pedigree (1,1,5,1,1)
  (same comment as for Fluoride)
- Aluminium [water, ground-]: 9.4563e-6 kg; lognormal variance with pedigree 1.07, pedigree (1,1,5,1,1)
  (same comment as for Fluoride)
- Scandium [water, ground-, long-term]: 5.8041e-7 kg; lognormal variance with pedigree 1.64, pedigree (1,1,5,1,1)
  (same comment as for Fluoride)
- Antimony [water, ground-]: 2.4887e-6 kg; lognormal variance with pedigree 1.39, pedigree (1,1,5,1,1)
  (same comment as for Fluoride)
- Sulfate [water, ground-, long-term]: 0.048248 kg; lognormal variance with pedigree 0.32, pedigree (1,1,5,1,1)
  (same comment as for Fluoride)
- Calcium, ion [water, ground-, long-term]: 0.03235 kg; lognormal variance with pedigree 0.27, pedigree (1,1,5,1,1)
  (same comment as for Fluoride)
- Boron [water, ground-, long-term]: 0.00021259 kg; lognormal variance with pedigree 0.89, pedigree (1,1,5,1,1)
  (same comment as for Fluoride)
- Selenium [water, ground-, long-term]: 1.6768e-6 kg; lognormal variance with pedigree 1.49, pedigree (1,1,5,1,1)
  (same comment as for Fluoride)
- Magnesium [water, ground-]: 2.3103e-6 kg; lognormal variance with pedigree 1.25, pedigree (1,1,5,1,1)
  (same comment as for Fluoride)
- Barium [water, ground-, long-term]: 0.00016181 kg; lognormal variance with pedigree 0.94, pedigree (1,1,5,1,1)
  (same comment as for Fluoride)
- Sulfate [water, ground-]: 0.017771 kg; lognormal variance with pedigree 0.36, pedigree (1,1,5,1,1)
  (same comment as for Fluoride)
- Molybdenum [water, ground-, long-term]: 1.5398e-11 kg; lognormal variance with pedigree 1.32, pedigree (1,1,5,1,1)
  (same comment as for Fluoride)
- Lead [water, ground-]: 1.7491e-10 kg; lognormal variance with pedigree 2.49, pedigree (1,1,5,1,1)
  (same comment as for Fluoride)
- Cobalt [water, ground-, long-term]: 2.4254e-5 kg; lognormal variance with pedigree 1.19, pedigree (1,1,5,1,1)
  (same comment as for Fluoride)
- Tin, ion [water, ground-]: 2.0549e-10 kg; lognormal variance with pedigree 2.47, pedigree (1,1,5,1,1)
  (same comment as for Fluoride)
- Aluminium [water, ground-, long-term]: 0.0075957 kg; lognormal variance with pedigree 0.44, pedigree (1,1,5,1,1)
  (same comment as for Fluoride)
- Phosphate [water, ground-, long-term]: 0.00011113 kg; lognormal variance with pedigree 1.14, pedigree (1,1,5,1,1)
  (same comment as for Fluoride)
- Magnesium [water, ground-, long-term]: 0.0048521 kg; lognormal variance with pedigree 0.5, pedigree (1,1,5,1,1)
  (same comment as for Fluoride)
- Iodide [water, ground-]: 3.2362e-7 kg; lognormal variance with pedigree 1.75, pedigree (1,1,5,1,1)
  (same comment as for Fluoride)
- Potassium, ion [water, ground-]: 0.00054786 kg; lognormal variance with pedigree 0.71, pedigree (1,1,5,1,1)
  (same comment as for Fluoride)
- Zinc, ion [water, ground-]: 2.312e-9 kg; lognormal variance with pedigree 2.15, pedigree (1,1,5,1,1)
  (same comment as for Fluoride)
- Thallium [water, ground-, long-term]: 3.2249e-8 kg; lognormal variance with pedigree 2.05, pedigree (1,1,5,1,1)
  (same comment as for Fluoride)
- Beryllium [water, ground-, long-term]: 1.6157e-6 kg; lognormal variance with pedigree 1.55, pedigree (1,1,5,1,1)
  (same comment as for Fluoride)
- Scandium [water, ground-]: 2.2865e-7 kg; lognormal variance with pedigree 1.68, pedigree (1,1,5,1,1)
  (same comment as for Fluoride)
- Molybdenum [water, ground-]: 1.1316e-5 kg; lognormal variance with pedigree 1.29, pedigree (1,1,5,1,1)
  (same comment as for Fluoride)
- Barium [water, ground-]: 5.5986e-9 kg; lognormal variance with pedigree 2.03, pedigree (1,1,5,1,1)
  (same comment as for Fluoride)
- Chloride [water, ground-]: 1.3848e-6 kg; lognormal variance with pedigree 1.5, pedigree (1,1,5,1,1)
  (same comment as for Fluoride)
- Iron, ion [water, ground-, long-term]: 0.0058392 kg; lognormal variance with pedigree 0.46, pedigree (1,1,5,1,1)
  (same comment as for Fluoride)
- Strontium [water, ground-]: 1.7168e-7 kg; lognormal variance with pedigree 1.58, pedigree (1,1,5,1,1)
  (same comment as for Fluoride)
- Lead [water, ground-, long-term]: 8.0502e-6 kg; lognormal variance with pedigree 1.34, pedigree (1,1,5,1,1)
  (same comment as for Fluoride)
- Phosphate [water, ground-]: 1.8553e-7 kg; lognormal variance with pedigree 1.72, pedigree (1,1,5,1,1)
  (same comment as for Fluoride)
- Arsenic, ion [water, ground-]: 8.0139e-6 kg; lognormal variance with pedigree 1.34, pedigree (1,1,5,1,1)
  (same comment as for Fluoride)
- Mercury [water, ground-]: 3.2024e-12 kg; lognormal variance with pedigree 3, pedigree (1,1,5,1,1)
  (same comment as for Fluoride)
- Cobalt [water, ground-]: 1.7381e-8 kg; lognormal variance with pedigree 1.89, pedigree (1,1,5,1,1)
  (same comment as for Fluoride)
- Arsenic, ion [water, ground-, long-term]: 8.0139e-15 kg; lognormal variance with pedigree 1.36, pedigree (1,1,5,1,1)
  (same comment as for Fluoride)
- Thallium [water, ground-]: 4.8978e-11 kg; lognormal variance with pedigree 2.64, pedigree (1,1,5,1,1)
  (same comment as for Fluoride)
- Chromium VI [water, ground-, long-term]: 2.2468e-6 kg; lognormal variance with pedigree 1.27, pedigree (1,1,5,1,1)
  (same comment as for Fluoride)
- Copper, ion [water, ground-]: 1.5634e-9 kg; lognormal variance with pedigree 2.2, pedigree (1,1,5,1,1)
  (same comment as for Fluoride)
- Strontium [water, ground-, long-term]: 0.00011304 kg; lognormal variance with pedigree 0.99, pedigree (1,1,5,1,1)
  (same comment as for Fluoride)
- Iodide [water, ground-, long-term]: 3.2362e-14 kg; lognormal variance with pedigree 1.78, pedigree (1,1,5,1,1)
  (same comment as for Fluoride)
- Potassium, ion [water, ground-, long-term]: 0.00042302 kg; lognormal variance with pedigree 0.71, pedigree (1,1,5,1,1)
  (same comment as for Fluoride)
- Nickel, ion [water, ground-]: 3.6722e-8 kg; lognormal variance with pedigree 1.79, pedigree (1,1,5,1,1)
  (same comment as for Fluoride)
- Manganese [water, ground-]: 1.1197e-9 kg; lognormal variance with pedigree 2.25, pedigree (1,1,5,1,1)
  (same comment as for Fluoride)
- Nickel, ion [water, ground-, long-term]: 2.418e-5 kg; lognormal variance with pedigree 1.19, pedigree (1,1,5,1,1)
  (same comment as for Fluoride)
- Beryllium [water, ground-]: 2.4538e-9 kg; lognormal variance with pedigree 2.15, pedigree (1,1,5,1,1)
  (same comment as for Fluoride)
- Vanadium, ion [water, ground-, long-term]: 3.0431e-5 kg; lognormal variance with pedigree 1.17, pedigree (1,1,5,1,1)
  (same comment as for Fluoride)
- Cadmium, ion [water, ground-]: 2.79e-11 kg; lognormal variance with pedigree 2.73, pedigree (1,1,5,1,1)
  (same comment as for Fluoride)
- Mercury [water, ground-, long-term]: 1.6194e-8 kg; lognormal variance with pedigree 2.13, pedigree (1,1,5,1,1)
  (same comment as for Fluoride)
- Titanium, ion [water, ground-]: 2.012e-7 kg; lognormal variance with pedigree 1.56, pedigree (1,1,5,1,1)
  (same comment as for Fluoride)
- Iron, ion [water, ground-]: 7.3112e-8 kg; lognormal variance with pedigree 1.71, pedigree (1,1,5,1,1)
  (same comment as for Fluoride)
- Chloride [water, ground-, long-term]: 1.0424e-6 kg; lognormal variance with pedigree 1.5, pedigree (1,1,5,1,1)
  (same comment as for Fluoride)
- Zinc, ion [water, ground-, long-term]: 4.5035e-5 kg; lognormal variance with pedigree 1.11, pedigree (1,1,5,1,1)
  (same comment as for Fluoride)
- Chromium VI [water, ground-]: 3.4167e-6 kg; lognormal variance with pedigree 1.29, pedigree (1,1,5,1,1)
  (same comment as for Fluoride)
- Titanium, ion [water, ground-, long-term]: 0.00016161 kg; lognormal variance with pedigree 0.94, pedigree (1,1,5,1,1)
  (same comment as for Fluoride)
- Silicon [water, ground-, long-term]: 0.055384 kg; lognormal variance with pedigree 0.21, pedigree (1,1,5,1,1)
  (same comment as for Fluoride)
- Antimony [water, ground-, long-term]: 3.9645e-6 kg; lognormal variance with pedigree 1.37, pedigree (1,1,5,1,1)
  (same comment as for Fluoride)
- Selenium [water, ground-]: 1.0526e-6 kg; lognormal variance with pedigree 1.5, pedigree (1,1,5,1,1)
  (same comment as for Fluoride)
- Tungsten [water, ground-]: 6.2404e-7 kg; lognormal variance with pedigree 1.57, pedigree (1,1,5,1,1)
  (same comment as for Fluoride)
- Tin, ion [water, ground-, long-term]: 2.5888e-6 kg; lognormal variance with pedigree 1.49, pedigree (1,1,5,1,1)
  (same comment as for Fluoride)
- Bromine [water, ground-, long-term]: 4.3782e-8 kg; lognormal variance with pedigree 1.51, pedigree (1,1,5,1,1)
  (same comment as for Fluoride)
- Vanadium, ion [water, ground-]: 3.4774e-7 kg; lognormal variance with pedigree 1.5, pedigree (1,1,5,1,1)
  (same comment as for Fluoride)
- Sodium, ion [water, ground-]: 0.001009 kg; lognormal variance with pedigree 0.65, pedigree (1,1,5,1,1)
  (same comment as for Fluoride)

## Sampling procedure
country-specific calculation based on literature data

## Extrapolations
This dataset has been extrapolated from year 2000 to the year of the calculation (2019). The uncertainty has been adjusted accordingly.

## Review by Niels Jungbluth 2009-01-22
passed.
