# wooden board factory construction, organic bonded boards

Dataset: EcoSpold 2, unit process
Geography: RER
Time period: 2002-01-01 to 2019-12-31
Technology level: current
Classification: ISIC rev.4 ecoinvent: 4290:Construction of other civil engineering projects
Synonyms: OSB-Werk; Sperrholzwerk; Faserplattenwerk; MDF-Werk; Spanplattenwerk
Tags: Swiss brush-up completed; ConvertedDataset
Scenario: Business-as-Usual
System model: Allocation at the point of substitution
Generated by: Frank Werner
Published in: Werner F. 2007
Database: ecoinvent
isCopyrightProtected: true
accessRestrictedTo: 1

## General comment
The service life is assumed to be 50 years. Thus the life time output is 30'000'000 m3 board. This data must only be used to consider the infrastructure needed for wood board production if this is not relevant.
[This dataset was already contained in the ecoinvent database version 2. It was not individually updated during the transfer to ecoinvent version 3. Life Cycle Impact Assessment results may still have changed, as they are affected by changes in the supply chain, i.e. in other datasets. This dataset was generated following the ecoinvent quality guidelines for version 2. It may have been subject to central changes described in the ecoinvent version 3 change report (http://www.ecoinvent.org/database/ecoinvent-version-3/reports-of-changes/), and the results of the central updates were reviewed extensively. The changes added e.g. consistent water flows and other information throughout the database. The documentation of this dataset can be found in the ecoinvent reports of version 2, which are still available via the ecoinvent website. The change report linked above covers all central changes that were made during the conversion process.]

## Included activities end
The land area and the material and their transports needed for building and disposal of a plant for organic bonded wooden boards with a yearly output of 600'000 m3 is included.

## Geography
Estimate is so rough that the Geograhpy is not relevant.

## Technology
Relates to a medium to large production plant for wooden boards using one or several Conti-presses.

## Reference product
- wooden board factory, organic bonded boards: 1 unit; CPC 53269: Other constructions for manufacturing; By-product classification allocatable product
  production volume 1.32237 unit
    This is a placeholder value that does not reflect real-world production volumes. This dataset does not currently require a real-world production volume to work in the database framework, and no actual data were collected yet. This has no negative effect on the results of the ecoinvent database. The placeholder value of this activity was scaled according to the nominal GDP of 2005 (source: United Nations, http://data.un.org/Glossary.aspx?q=GDP+%28current+US%24%29, accessed 20130726) to reflect an appropriate share of the global production volume, which is also a placeholder value.
  property price 1.28695e9 EUR2005
    Convert from EU 27 price to the world by currency exchange rate.
  property true value 1.28695e9
    allocation property applied in "true value" allocation // value calculated from revenue

## By-products
- iron scrap, sorted, pressed: 0 kg; By-product classification Recyclable; CPC 39310: Slag, dross, scalings and other waste from the manufacture of iron or steel; pedigree (1,1,1,1,1)
  Iron scrap recovered from this waste.
  production volume 4899.11 kg
  property price 0.175 EUR2005
    Temporary price data. Calculated as 90% of purchasers price based on: 2005 import and export prices (total trades (USD) divided by total weight (kg) in biggest economies of the world: EU27, USA, Brasil, China, India, Japan and Russia) from UN Commodity Trade Statistics Database (http://data.un.org/Explorer.aspxDatabase [Accessed 2011.06.20]). Commodity: Waste or scrap, of cast iron
  property carbon content 0
    carbon content on a dry matter basis (reserved; not for manual entry)
  property true value 70.6071
    allocation property applied in "true value" allocation // value calculated from revenue
  properties: water content 0, water in wet mass 0 kg, carbon content, fossil 0, dry mass 1 kg, carbon content, non-fossil 0, wet mass 1 kg, carbon allocation 0 kg

## Inputs from technosphere
- concrete, normal: 6360 m3; lognormal variance with pedigree 0.0831, pedigree (3,5,5,3,3)
  properties: water content 0.086758, wet mass 2380 kg, dry mass 2190 kg
- waste reinforced concrete: 0 kg; pedigree (1,1,1,1,1)
  production volume 0 kg
    Calculated from the production volume of wooden board factory, organic bonded boards in proportion to the respective output amounts.
  properties: SAM_activityLink_1 883, dry mass 0.99418 kg, SAM_activityLink_1_scaling_factor -1, water content 0.00585407, wet mass 1 kg
  note on SAM_activityLink_1: to be used only in special submissions in coordination with ecoinvent and the Swiss FOEN
- building, hall: 120000 m2; lognormal variance with pedigree 0.6081, pedigree (3,5,5,3,3)
  properties: SAM_activityLink_1 342, SAM_activityLink_1_scaling_factor 1
- steel, low-alloyed, hot rolled: 1.4e7 kg; lognormal variance with pedigree 0.0831, pedigree (3,5,5,3,3)
  properties: SAM_activityLink_8 4417, SAM_activityLink_8_scaling_factor 0.15, SAM_activityLink_1 4222, SAM_activityLink_1_scaling_factor 1, SAM_activityLink_2 2662, dry mass 1 kg, SAM_activityLink_2_scaling_factor 1, SAM_activityLink_9_scaling_factor 0.2, wet mass 1 kg, carbon content, fossil 0.005, SAM_activityLink_9 4433
  note on SAM_activityLink_8: This link has been introduced to model transport specifically for the SAM model; to be used only in special submissions in coordination with ecoinvent and the Swiss FOEN.
  note on SAM_activityLink_8_scaling_factor: Scaling factor = amount of transport in corresponding KBOB dataset/amount of this input from technosphere. Source for transport distance: Life Cycle Inventories of Wood as Fuel and Construction Material/2007/Werner F. To be used only in special submissions in coordination with ecoinvent and the Swiss FOEN
  note on carbon content, fossil: Low alloyed steel composition given in Tab. 3.2 ecoinvent v2.2 report 10_partII. Steel assumed to have a C content of 0.5%
- conveyor belt: 2000 m; lognormal variance with pedigree 0.0831, pedigree (3,5,5,3,3)
  Linking to specific geographical region where infrastructure is located
  properties: SAM_activityLink_1_scaling_factor 1, SAM_activityLink_1 579
- waste reinforced concrete: -1.38532e7, -146785 kg (2 entries); lognormal variance with pedigree 0.0662, pedigree (2,3,5,1,1)
  production volume 1.4e7 kg

## Inputs from nature
- Transformation, to industrial area [natural resource, land]: 520000 m2; lognormal variance with pedigree 0.4081, pedigree (3,5,5,3,3)
- Occupation, industrial area [natural resource, land]: 2.6e7 m2*year; lognormal variance with pedigree 0.2581, pedigree (3,5,5,3,3)
- Transformation, from unspecified [natural resource, land]: 520000 m2; lognormal variance with pedigree 0.4081, pedigree (3,5,5,3,3)

## Sampling procedure
estimation
