# import of sawnwood, paraná pine from sustainable forest management, kiln dried

Dataset: EcoSpold 2, unit process
Geography: RER
Time period: 2000-01-01 to 2019-12-31
Technology level: current
Classification: ISIC rev.4 ecoinvent: 1610:Sawmilling and planing of wood
Classification: EcoSpold01Categories: wooden materials/processing
Synonyms: Araucaria angustifolia
Tags: ConvertedDataset
Scenario: Business-as-Usual
System model: Allocation at the point of substitution
Generated by: Frank Werner (obsolete)
Published in: Althaus H.J. 2007
Database: ecoinvent
isCopyrightProtected: true
accessRestrictedTo: 1

## General comment
This dataset represents import of one m3 sawn Paraná pine timber from Brazil to European port. The imported wood is produced by (close to) sustainable forest management in Brazil.

It is assumed that the sawn timber is transported to a close harbour in Brazil by lorry. The main exportation port in Brazil is assumed in the dataset; this port is Sao Francisco in Santa Catarina, which directs 90% of the export production.
It is assumed that the imported wood arrives in one of the main ports in Europe (Rotterdam, Hamburg, Bremerhafen or Antwerpen).

Currently, there is an export ban in place for Brazilian Paraná pine; products might come from Argentina with slightly longer transport distances.

## Included activities start
From lorry transportation of sawn timber to the nearby harbour in Brazil.

## Included activities end
This activity ends with imported Paraná pine sawn timber at European harbour. The dataset includes transportation of the sawn timber from the sawmill to a main harbour in Europe by truck and freight ship to Europe.

## Technology
The dataset represents average processes for transportation to Europe. However, transport distances can vary from this dataset.

## Reference product
- sawnwood, paraná pine from sustainable forest management, kiln dried: 1 m3; CPC 31101: Wood, sawn or chipped lengthwise, sliced or peeled, of a thickness exceeding 6 mm, of coniferous wood; By-product classification allocatable product
  Reference product. Parana pine logs at large maritime harbour in Europe. Parana pine logs produced from (close to) sustainable forest management in Brazil.The logs will be used in wooden products.
  EcoSpold01Location=RER
  production volume 1 m3
    Unknown
    Volume of sustainable production unkniown
  properties: price 160 EUR2005, water content 0.15, carbon content, fossil 0, carbon content, non-fossil 0.494, water in wet mass 75 kg, wet mass 575 kg, dry mass 500 kg, carbon content 0.494, carbon allocation 247 kg

## Inputs from technosphere
- sawnwood, paraná pine from sustainable forest management, kiln dried: 1 m3; source Alexandrido, S. 2000; lognormal variance with pedigree 0.0541, pedigree (3,4,5,3,1)
  Estimation. Calculation based on given source. Reference product at sawmill in Brazil.
  EcoSpold01Location=BR
  properties: carbon content, non-fossil 0.494, water content 0.15, wet mass 575 kg, dry mass 500 kg
  note on carbon content, non-fossil: C content of dry mass is 0.494 kgC/kg dry wood (ecoinvent v2.2 report 21).

## Sampling procedure
literature

## Extrapolations
This dataset has been extrapolated from year 2005 to the year of the calculation (2019). The uncertainty has been adjusted accordingly.

## Review by Hans-Jörg Althaus 2007-09-25
Passed

## Review by Roland Hischier 2011-10-11
Transfer of documentation done.
