# maize seed production, organic, at farm

Dataset: EcoSpold 2, unit process
Geography: CH
Time period: 2000-01-01 to 2019-12-31
Technology level: current
Classification: ISIC rev.4 ecoinvent: 0111:Growing of cereals (except rice), leguminous crops and oil seeds
Synonyms: Zea mays L.; corn
Scenario: Business-as-Usual
System model: Allocation at the point of substitution
Generated by: Thomas Nemecek
Published in: Nemecek, T. 2007
Database: ecoinvent
isCopyrightProtected: true
accessRestrictedTo: 1

## General comment
This dataset represents the production of 1 kg of maize seed (fresh matter). The yield is 2600 kg/ha at a moisture content at storage of 14%.
[This dataset was already contained in the ecoinvent database version 2. It was not individually updated during the transfer to ecoinvent version 3. Life Cycle Impact Assessment results may still have changed, as they are affected by changes in the supply chain, i.e. in other datasets. This dataset was generated following the ecoinvent quality guidelines for version 2. It may have been subject to central changes described in the ecoinvent version 3 change report (http://www.ecoinvent.org/database/ecoinvent-version-3/reports-of-changes/), and the results of the central updates were reviewed extensively. The changes added e.g. consistent water flows and other information throughout the database. The documentation of this dataset can be found in the ecoinvent reports of version 2, which are still available via the ecoinvent website. The change report linked above covers all central changes that were made during the conversion process.]

## Included activities start
This activity starts after the harvest of the previous crop. The inputs of seeds is considered. Farm manure as an organic fertiliser is only accounted for in terms of direct field emissions; all pre-processes are included in the animal production systems.

## Included activities end
The dataset includes all machine operations and corresponding machine infrastructure and sheds. Machine operations are: soil cultivation, sowing, fertilisation, weed control, combine-harvest, transport from field to regional processing centre (10 km) and drying of grains. Further, direct field emissions are included. This activity ends after drying of grains at the regional processing centre.

## Geography
Values refer to the situation in Switzerland.

## Technology
Organic production

## Parameters
- fraction, irrigation water, to air: 0.3353; name fraction_IW_to_air; lognormal variance with pedigree 0.0409, pedigree (2,2,2,1,1)
  Literature value (Siebert, 2010) (Vionnet, S., Quantis Water Database - Technical Report, 2012).
- fraction, irrigation water to surface water: 0.2; name fraction_IW_to_surface_water; lognormal variance with pedigree 0.0886, pedigree (4,3,1,1,4)
  Literature value (Döll, 2011) cross referenced with expert opinion.
- fraction, irrigation water, to ground water: 0.8; name fraction_IW_to_ground_water; lognormal variance with pedigree 0.0886, pedigree (4,3,1,1,4)
  Literature value (Döll, 2011) cross referenced with expert opinion.

## Reference product
- maize seed, organic, at farm: 1 kg; name REF_PRODUCT; By-product classification allocatable product; CPC 01121: Maize (corn), seed
  production volume 43449.3 kg
    Maize seed production CH 507t, consumption CH 1557t in 1999-2000
    Calculated as 0.003215 kg seed / kg maize grain yield and 0.00055 kg seed / kg silage
  property price 0.170858 EUR2005; name REF_PRODUCT_price_EUR2005
    Calculated based on inputs: The price of the product has been calculated as a sum of the values of the material and energy inputs for this product. This value is therefore a rough estimation. It may underestimate the real price since there are additional expenses when producing any product. These expences can include for example labour costs, treatment of waste materials and profit for the producer. Please consider carefully whether this level of data quality is acceptable for your application.
  property carbon content, non-fossil 0.46957; name REF_PRODUCT_C_content_non_fossil
    biogene carbon content on a dry matter basis
    Composition data obtained from Corn Grain Whole, in (http://beefmagazine.com/images/2009%20feed%20table.pdf). First, composition data were refered to 1 kg dry mass. Then, C-contents were calculated considering a C-content/dry mass of 46% in carbohydrates (including fibres), 53% in proteins and 75% in fats. All data from 'Evolutionary and Biochemical Aspects', A.D. Kay and T. Vrede (in Global Ecology, 2010, Elsevier B.V., S.E. Jørgensen Ed.).
  property energy content 15.9272 MJ; name REF_PRODUCT_energy_content
    See chapter 'Product Properties' in '01_crop production - yields & inputs CH & Europe_v1.0.pdf', section 'AGRICULTURAL PRODUCTION IN SWITZERLAND' - pdf-document on the dedicated talk page of ecoinvent (www.ecoinvent.org/documentation)
  property dry mass 0.88 kg; name REF_PRODUCT_DM
  property carbon content 0.46957
    carbon content on a dry matter basis (reserved; not for manual entry)
  properties: water in wet mass 0.12 kg, wet mass 1 kg, carbon content, fossil 0, water content 0.136364, carbon allocation 0.413222 kg

## Inputs from technosphere
- green manure, organic, until April: 0.00038462 ha; lognormal variance with pedigree 0.0406, pedigree (2,1,5,1,1)
  Based on the inventory for commercial crop production 'maize production, organic CH'. Adaptations: see '01_crop production - seed production & processing_v1.0.pdf' - pdf-document on the dedicated talk page of ecoinvent (www.ecoinvent.org/documentation)
  Based on the inventory for commercial crop production 'maize production, organic CH'. Adaptations: see '01_crop production - seed production & processing_v1.0.pdf' - pdf-document on the dedicated talk page of ecoinvent (www.ecoinvent.org/documentation)
- irrigation: 0.0550005 m3; name water_irrigation_input; source Siebert, S. 2010; lognormal variance with pedigree 0.0427, pedigree (2,2,5,1,1)
  Calculated based on literature values (Döll, 2010) and partially modelled at ETH (Pfister, S.).
  property carbon content, non-fossil 0; name C_content_non_fossil
  property water in wet mass 999.89 kg; name WWM
  property carbon content, fossil 0; name C_content_fossil
  property dry mass 0.11 kg; name DM
  property water content 9089.91; name water_content
  property wet mass 1000 kg; name WM
- electricity, low voltage: 0.015 kWh; lognormal variance with pedigree 0.0406, pedigree (2,1,5,1,1)
  (same comment as for green manure, organic, until April)
- solid manure loading and spreading, by hydraulic loader and spreader: 7.0661 kg; lognormal variance with pedigree 0.0406, pedigree (2,1,5,1,1)
  Based on the inventory for commercial crop production 'maize production, organic CH'. Adaptations: see '01_crop production - seed production & processing_v1.0.pdf' - pdf-document on the dedicated talk page of ecoinvent (www.ecoinvent.org/documentation)
  This exchange has an activity link directly to the producing activity because the product is primarily consumed in the same geographical area where it is produced.
- drying of bread grain, seed and legumes: 0.35385 l; lognormal variance with pedigree 0.0406, pedigree (2,1,5,1,1)
  (same comment as for solid manure loading and spreading, by hydraulic loader and spreader)
- sowing: 0.0013462 ha; lognormal variance with pedigree 0.0406, pedigree (2,1,5,1,1)
  (same comment as for solid manure loading and spreading, by hydraulic loader and spreader)
- maize seed, organic, for sowing: 0.0057692 kg; name SEED; lognormal variance with pedigree 0.0406, pedigree (2,1,5,1,1)
  (same comment as for green manure, organic, until April)
  property dry mass 0.88 kg; name SEED_DM
  property carbon content, non-fossil 0.46957; name SEED_C_content_non_fossil
  property energy content 15.9272 MJ; name SEED_energy_content
  properties: wet mass 1 kg, water content 0.136364
  note on carbon content, non-fossil: biogene carbon content on a dry matter basis Composition data obtained from Corn Grain Whole, in (http://beefmagazine.com/images/2009%20feed%20table.pdf). First, composition data were refered to 1 kg dry mass. Then, C-contents were calculated considering a C-content/dry mass of 46% in carbohydrates (including fibres), 53% in proteins and 75% in fats. All data from 'Evolutionary and Biochemical Aspects', A.D. Kay and T. Vrede (in Global Ecology, 2010, Elsevier B.V., S.E. Jørgensen Ed.).
  note on energy content: See chapter 'Product Properties' in '01_crop production - yields & inputs CH & Europe_v1.0.pdf', section 'AGRICULTURAL PRODUCTION IN SWITZERLAND' - pdf-document on the dedicated talk page of ecoinvent (www.ecoinvent.org/documentation)
- mowing, by rotary mower: 0.0023077 ha; lognormal variance with pedigree 0.0406, pedigree (2,1,5,1,1)
  (same comment as for solid manure loading and spreading, by hydraulic loader and spreader)
- liquid manure spreading, by vacuum tanker: 0.017828 m3; lognormal variance with pedigree 0.0406, pedigree (2,1,5,1,1)
  (same comment as for solid manure loading and spreading, by hydraulic loader and spreader)
- tillage, harrowing, by spring tine harrow: 0.0011538 ha; lognormal variance with pedigree 0.0406, pedigree (2,1,5,1,1)
  (same comment as for solid manure loading and spreading, by hydraulic loader and spreader)
- combine harvesting: 0.00038462 ha; lognormal variance with pedigree 0.0406, pedigree (2,1,5,1,1)
  (same comment as for solid manure loading and spreading, by hydraulic loader and spreader)
- transport, tractor and trailer, agricultural: 0.01 metric ton*km; lognormal variance with pedigree 0.0406, pedigree (2,1,5,1,1)
  (same comment as for green manure, organic, until April)
- tillage, ploughing: 0.00038462 ha; lognormal variance with pedigree 0.0406, pedigree (2,1,5,1,1)
  (same comment as for solid manure loading and spreading, by hydraulic loader and spreader)

## Inputs from nature
- Energy, gross calorific value, in biomass [natural resource, biotic]: 16.204 MJ; lognormal variance with pedigree 0.12706, pedigree (2,1,5,1,1)
- Carbon dioxide, in air [natural resource, in air]: 1.5064 kg; = 44/12 * (REF_PRODUCT_C_content_non_fossil * REF_PRODUCT * REF_PRODUCT_DM - SEED_C_content_non_fossil * SEED * SEED_DM); lognormal variance with pedigree 0.1307, pedigree (2,2,5,1,1)
  Based on the inventory for commercial crop production 'maize production, organic CH'. Adaptations: see '01_crop production - seed production & processing_v1.0.pdf' - pdf-document on the dedicated talk page of ecoinvent (www.ecoinvent.org/documentation)
- Occupation, annual crop, non-irrigated, extensive [natural resource, land]: 1.9231 m2*year; lognormal variance with pedigree 0.0406, pedigree (2,1,5,1,1)
  (same comment as for Carbon dioxide, in air)
- Transformation, from annual crop, non-irrigated, extensive [natural resource, land]: 3.8462 m2; lognormal variance with pedigree 0.0506, pedigree (2,1,5,1,1)
  (same comment as for Carbon dioxide, in air)
- Transformation, to annual crop, non-irrigated, extensive [natural resource, land]: 3.8462 m2; lognormal variance with pedigree 0.0506, pedigree (2,1,5,1,1)
  (same comment as for Carbon dioxide, in air)

## Emissions to nature
- Cadmium, ion [water, ground-]: 1.0872e-8 kg; lognormal variance with pedigree 0.1307, pedigree (2,2,5,1,1)
  (same comment as for Carbon dioxide, in air)
- Chromium, ion [water, surface water]: 1.2034e-6 kg; lognormal variance with pedigree 0.1307, pedigree (2,2,5,1,1)
  (same comment as for Carbon dioxide, in air)
- Copper [soil, agricultural]: 5.3802e-5 kg; lognormal variance with pedigree 0.0807, pedigree (2,2,5,1,1)
  (same comment as for Carbon dioxide, in air)
- Chromium [soil, agricultural]: 1.3152e-7 kg; lognormal variance with pedigree 0.0807, pedigree (2,2,5,1,1)
  (same comment as for Carbon dioxide, in air)
- Dinitrogen monoxide [air, non-urban air or from high stacks]: 0.00154 kg; name N2O; lognormal variance with pedigree 0.0707, pedigree (2,2,5,1,1)
  (same comment as for Carbon dioxide, in air)
- Copper, ion [water, surface water]: 1.1498e-6 kg; lognormal variance with pedigree 0.1307, pedigree (2,2,5,1,1)
  (same comment as for Carbon dioxide, in air)
- Mercury [water, ground-]: 4.2532e-9 kg; lognormal variance with pedigree 0.1307, pedigree (2,2,5,1,1)
  (same comment as for Carbon dioxide, in air)
- Ammonia [air, non-urban air or from high stacks]: 0.0167804 kg; lognormal variance with pedigree 0.0507, pedigree (2,2,5,1,1)
  (same comment as for Carbon dioxide, in air)
- Lead [water, surface water]: 5.5145e-7 kg; lognormal variance with pedigree 0.1307, pedigree (2,2,5,1,1)
  (same comment as for Carbon dioxide, in air)
- Copper, ion [water, ground-]: 1.3631e-6 kg; lognormal variance with pedigree 0.1307, pedigree (2,2,5,1,1)
  (same comment as for Carbon dioxide, in air)
- Nitrate [water, ground-]: 0.0811909 kg; lognormal variance with pedigree 0.0807, pedigree (2,2,5,1,1)
  (same comment as for Carbon dioxide, in air)
- Zinc, ion [water, ground-]: 1.113e-5 kg; lognormal variance with pedigree 0.1307, pedigree (2,2,5,1,1)
  (same comment as for Carbon dioxide, in air)
- Phosphate [water, surface water]: 4.9735e-5 kg; lognormal variance with pedigree 0.0807, pedigree (2,2,5,1,1)
  (same comment as for Carbon dioxide, in air)
- Lead [water, ground-]: 1.1231e-7 kg; lognormal variance with pedigree 0.1307, pedigree (2,2,5,1,1)
  (same comment as for Carbon dioxide, in air)
- Lead [soil, agricultural]: 6.03e-6 kg; lognormal variance with pedigree 0.0807, pedigree (2,2,5,1,1)
  (same comment as for Carbon dioxide, in air)
- Nickel [soil, agricultural]: 7.5533e-6 kg; lognormal variance with pedigree 0.0807, pedigree (2,2,5,1,1)
  (same comment as for Carbon dioxide, in air)
- Zinc [soil, agricultural]: 0.00021784 kg; lognormal variance with pedigree 0.0807, pedigree (2,2,5,1,1)
  (same comment as for Carbon dioxide, in air)
- Zinc, ion [water, surface water]: 2.5273e-6 kg; lognormal variance with pedigree 0.1307, pedigree (2,2,5,1,1)
  (same comment as for Carbon dioxide, in air)
- Cadmium, ion [water, surface water]: 7.8839e-9 kg; lognormal variance with pedigree 0.1307, pedigree (2,2,5,1,1)
  (same comment as for Carbon dioxide, in air)
- Mercury [soil, agricultural]: 8.7129e-7 kg; lognormal variance with pedigree 0.0807, pedigree (2,2,5,1,1)
  (same comment as for Carbon dioxide, in air)
- Phosphate [water, ground-]: 4.9735e-5 kg; lognormal variance with pedigree 0.0807, pedigree (2,2,5,1,1)
  (same comment as for Carbon dioxide, in air)
- Nickel, ion [water, surface water]: 1.0932e-6 kg; lognormal variance with pedigree 0.1307, pedigree (2,2,5,1,1)
  (same comment as for Carbon dioxide, in air)
- Mercury [water, surface water]: 4.151e-9 kg; lognormal variance with pedigree 0.1307, pedigree (2,2,5,1,1)
  (same comment as for Carbon dioxide, in air)
- Nitrogen oxides [air, non-urban air or from high stacks]: 0.0003234 kg; = 0.21 * N2O; lognormal variance with pedigree 0.0707, pedigree (2,2,5,1,1)
  (same comment as for Carbon dioxide, in air)
- Water [air, unspecified]: 0.0184417 m3; name water_to_air_unspecified; = (water_irrigation_input*fraction_IW_to_air); lognormal variance with pedigree 0.0807, pedigree (2,2,5,1,1)
  Calculated value based on literature values and expert opinion. See comments in the parametres' comment field.
  property fraction, origin: salt water 0; name fraction_origin_salt_water
  property fraction, origin: unspecified 0; name fraction_origin_unspecified
  property fraction, origin: fresh water 1; name fraction_origin_fresh_water
- Phosphorus [water, surface water]: 5.52e-5 kg; lognormal variance with pedigree 0.0807, pedigree (2,2,5,1,1)
  (same comment as for Carbon dioxide, in air)
- Water [water, surface water]: 0.00731177 m3; name water_to_water_surface; = water_irrigation_input*(1-fraction_IW_to_air)*fraction_IW_to_surface_water; lognormal variance with pedigree 0.1286, pedigree (4,3,5,1,4)
  Calculated value. See the parameters and their comments to understand the calculation.
  property fraction, origin: salt water 0; name fraction_origin_salt_water_Wsw
  property fraction, origin: fresh water 1; name fraction_origin_fresh_water_Wsw
- Cadmium [soil, agricultural]: 3.1684e-7 kg; lognormal variance with pedigree 0.0807, pedigree (2,2,5,1,1)
  (same comment as for Carbon dioxide, in air)
- Water [water, ground-]: 0.0292471 m3; name water_to_water_ground; = water_irrigation_input*(1-fraction_IW_to_air)*fraction_IW_to_ground_water; lognormal variance with pedigree 0.1286, pedigree (4,3,5,1,4)
  Calculated value. See the parameters and their comments to understand the calculation.
  property fraction, origin: salt water 0; name fraction_origin_salt_water_Wgw
  property fraction, origin: unspecified 0; name fraction_origin_unspecified_Wgw
  property fraction, origin: fresh water 1; name fraction_origin_fresh_water_Wgw
- Chromium, ion [water, ground-]: 7.0072e-6 kg; lognormal variance with pedigree 0.1307, pedigree (2,2,5,1,1)
  (same comment as for Carbon dioxide, in air)

## Sampling procedure
Data derived from literature, recommendations and expert information

## Extrapolations
This dataset has been extrapolated from year 2000 to the year of the calculation (2019). The uncertainty has been adjusted accordingly.

## Review by Hans-Jörg Althaus 2007-11-07
passed
none
