# oxidation of manganese dioxide

Dataset: EcoSpold 2, unit process
Geography: RER
Time period: 1990-01-01 to 2020-12-31
Technology level: current
Classification: ISIC rev.4 ecoinvent: 2011:Manufacture of basic chemicals
Synonyms: 7722-64-7; Argucide; Chameleon mineral; Condy's crystals; Permanganate of potash
Scenario: Business-as-Usual
System model: Allocation at the point of substitution
Share of production covered: 100 %
Generated by: Jürgen Sutter
Published in: Althaus H.-J. 2007
Database: ecoinvent
isCopyrightProtected: true
accessRestrictedTo: 1

## General comment
This dataset represents the oxidation of manganese dioxide, which delivers the co-products potassium permanganate (KMnO4) and, to a minor extent, potassium carbonate (K2CO3). Hydrogen, which is also a byproduct of this process, has been omitted from this dataset.
In the United States, potassium permanganate is primarily used for environmental applications, such as drinking water treatment (removal of tastes, odors, iron, and manganese, and control of trihalomethanes), wastewater treatment (destruction of hydrogen sulfide and other toxic and/or corrosive compounds, including phenols and plating wastes), and air purification (degradation of malodorous or toxic constituents in industrial off-gases). In other parts of the world (particularly Eastern Europe and India), the principal use of potassium permanganate is in chemical processing, especially the manufacture of synthetic organics. Numerous intermediates for pharmaceuticals and pesticides are made via permanganate oxidation, as are many fine organics, including flavoring. Significant amounts are also consumed for the oxidative destruction or precipitation of undesirable impurities, often ones that impart unwanted colors or odors. In recent years, KMnO4 has played a major role in the bleaching of indigo and other dyes for cotton twill fashion garments. Permanganate is also used for bleaching beeswax, natural sponges, jute fibers, and certain clays. Other important uses include surface treatment of carbon steels and stainless steels (descaling and desmutting, especially in wire manufacture), etching of rubber and plastics, and decontamination of nuclear reactors. Fish farmers utilize KMnO4 to prevent oxygen depletion and to control fish parasites.
Anhydrous potassium carbonate (K2CO3) is a white, hygroscopic, powdery material that deliquesces in moist air. The glass industry is the most important consumer of K2CO3. Large amounts are also required for potassium silicate manufacture. Potassium carbonate is additonally used for many organic syntheses, such as the production of potassium salts, and as a starting material for the production of drying, neutralization, and condensation agents. Potassium carbonate is used as a fertilizer for acidic soil. Other users are the electrical industry, the dye industry, the printing trade, the textile industry, the leather goods industry, and the ceramic industry. The food industry uses potassium carbonate as a leavening agent in baked goods, as a debitterizing agent for cocoa beans, and as an additive for drying raisins. Potash is also frequently used in the pharmaceutical industry as a raw material and auxiliary.
This dataset is based on stoichiometric calculations as well as estimations based on data from a large chemical factory (Gendorf 2016).
References:
Reidies, A. H. 2000. Manganese Compounds. Ullmann's Encyclopedia of Industrial Chemistry.
Sutter J. (2007) Life Cycle Inventories of Highly Pure Chemicals. Final report ecoinvent data v2.0, No. 19. Swiss Centre for Life Cycle Inventories, Dübendorf, CH.
Gendorf (2016) Umwelterklärung 2015, Werk Gendorf Industriepark, www.gendorf.de.

## Included activities start
The activity starts when the raw materials enter the process.

## Included activities end
This activity ends with the production of potassium permanganate. It consists of the manganese dioxide oxidation process, including materials, energy uses, infrastructure and emissions. The amount of hydrogen byproduct has been omitted from the dataset.

## Geography
The inventory is modelled for Europe. Some values are based on data from a large chemical factory located in Germany. These are assumed to be valid for this geography.

## Technology
The production of potassium permanganate consists of two steps: first a fusion process (either by the roasting process or the liquid-phase process), followed by the anodic oxidation of manganate(VI) to permanganate by electrolysis (Reidies 2000).
References:
Reidies, A. H. 2000. Manganese Compounds. Ullmann's Encyclopedia of Industrial Chemistry.

## Time period
Time of publications. Some values are based on data published by the Gendorf factory that were collected between 2011 and 2015. The time period has been adjusted accordingly. For more details, see the comments of the exchanges.

## Reference product
- potassium permanganate: 1 kg; name potassium_RP; CPC 34250: Salts of oxometallic or peroxometallic acids; colloidal precious metals and compounds thereof; inorganic and o[…]; By-product classification allocatable product
  In the United States, potassium permanganate is primarily used for environmental applications, such as drinking water treatment (removal of tastes, odors, iron, and manganese, and control of trihalomethanes), wastewater treatment (destruction of hydrogen sulfide and other toxic and/or corrosive compounds, including phenols and plating wastes), and air purification (degradation of malodorous or toxic constituents in industrial off-gases). In other parts of the world (particularly Eastern Europe and India), the principal use of potassium permanganate is in chemical processing, especially the manufacture of synthetic organics. Numerous intermediates for pharmaceuticals and pesticides are made via permanganate oxidation, as are many fine organics, including flavoring. Significant amounts are also consumed for the oxidative destruction or precipitation of undesirable impurities, often ones that impart unwanted colors or odors. In recent years, KMnO4 has played a major role in the bleaching of indigo and other dyes for cotton twill fashion garments. Permanganate is also used for bleaching beeswax, natural sponges, jute fibers, and certain clays. Other important uses include surface treatment of carbon steels and stainless steels (descaling and desmutting, especially in wire manufacture), etching of rubber and plastics, and decontamination of nuclear reactors. Fish farmers utilize KMnO4 to prevent oxygen depletion and to control fish parasites.
  production volume 9.91777e6 kg; name RP_PV
    Estimated. The european production volume is extrapolated from the global production volume using the nominal GDP of 2005 (source: United Nations, http://data.un.org/Glossary.aspx?q=GDP+%28current+US%24%29, accessed 20130726 and 20130312).
    Gross domestic product (GDP) at current prices is GDP at prices of the current reporting period. Also known as nominal GDP.
  property price 1.51 EUR2005
    Temporary price data. Calculated as 90% of purchasers price based on: 2005 import and export prices (total trades (USD) divided by total weight (kg) in biggest economies of the world: EU27, USA, Brasil, China, India, Japan and Russia) from UN Commodity Trade Statistics Database (http://data.un.org/Explorer.aspxDatabase [Accessed 2011.06.22]). Commodity: Manganites, manganates and permanganates of metals
  property carbon content 0
    carbon content on a dry matter basis (reserved; not for manual entry)
  property true value 1.51; name potassium_RP_true_value
    allocation property applied in "true value" allocation // value calculated from revenue
  properties: water content 0, wet mass 1 kg, dry mass 1 kg, water in wet mass 0 kg, carbon content, fossil 0, carbon content, non-fossil 0, carbon allocation 0 kg

## By-products
- heat, for reuse in municipal waste incineration only: 0 MJ; CPC 17300: Steam and hot water; By-product classification allocatable product; pedigree (1,1,1,1,1)
  Net electricity generated from this waste and used in internal MSWI plant energy redistribution.
  Uncertainty: uncertainty is calculated from uncertainties in waste composition and uncertainties in energy efficiency and the uncertainty in internal energy demand
  production volume 6.05039 MJ
  property exergy 0.1842 MJ; name E_th_prod_MSWI_exergy
    This exergy property is based on the exergy content of the product.
  property price 0.0106 EUR2005; name E_th_prod_MSWI_price_EUR2005
    Average European district heat price from Ecoheatcool and Euroheat 2005-2006, Ecoheat Work package 1: The European heat market. Final report. 10.6 EUR/GJ i s the price of district heat. http://www.solarthermalworld.org/files/Ecoheatcool%20WP1%20Web.pdf?download
  property true value relation 0.1842; name E_th_prod_MSWI_true_value_relation
    property to calculate "true value" from
  property true value 1.16811e-9
    allocation property applied in "true value" allocation // value calculated from true value relation
- electricity, for reuse in municipal waste incineration only: 0 kWh; CPC 17100: Electrical energy; By-product classification allocatable product; pedigree (1,1,1,1,1)
  (same comment as for heat, for reuse in municipal waste incineration only)
  production volume 0.850729 kWh
  property true value relation 3.6; name E_el_prod_MSWI_true_value_relation
    property to calculate "true value" from
  property price 0.1 EUR2005; name E_el_prod_MSWI_price_EUR2005
    Estimated to be the same price as in case of electricity, medium voltage.
  property exergy 3.6 MJ; name E_el_prod_MSWI_exergy
    This exergy property is based on the exergy content of the product.
  property true value 3.17451e-9
    (same comment as for heat, for reuse in municipal waste incineration only)
- zinc concentrate: 0 kg; CPC 14290: Other non-ferrous metal ores and concentrates (other than uranium or thorium ores and concentrates); By-product classification allocatable product
  Calculated value from the knowledge of the properties of both products.
  production volume 0.000115093 kg
  property price 0.38 EUR2005; name ByP_price_EUR2005
    Temporary price data. Calculated as 90% of purchasers price based on: Zinc content in concentrate 53%. Concentrate price per kg Zn 86.5% of refined Zn price (13.5% treatment charges according to CHR Metals Limited 2005: Dynamic cost curves. http://www.minecost.com/dynamic.pdf). 2004 zinc price from USGS (2007) Mineral commodity summaries 2007. <http://minerals.usgs.gov/minerals/pubs/mcs/2007/mcs2007.pdf> [Accessed 25 May 2010]
  property zinc content 0.53; name zinc_C_zinc_concentrate
    Zinc content on a dry matter basis. Value taken from teh "zinc mine operation" /GLO dataset.
  property dry mass 1 kg; name DM_zinc_concentrate
  property carbon content 0
    carbon content on a dry matter basis (reserved; not for manual entry)
  property true value 4.30488e-13
    allocation property applied in "true value" allocation // value calculated from revenue
  properties: wet mass 1 kg, water content 0, carbon content, non-fossil 0, carbon content, fossil 0, water in wet mass 0 kg, carbon allocation 0 kg

## Inputs from technosphere
- electricity, medium voltage: 0.549997 kWh; lognormal variance with pedigree 0.0701, pedigree (1,1,5,3,1)
  Pletcher/Walsh 1990
  Uncertainty: P
- heat, from steam, in chemical industry: 0.2 MJ; lognormal variance with pedigree 0.009825, pedigree (2,3,1,2,3)
  Calculated based on literature data published by the industry. This value is a 5-year average of data (2011 - 2015) published by the Gendorf factory (Gendorf, 2016, Umwelterklärung, www.gendorf.de), (Gendorf, 2015, Umwelterklärung, www.gendorf.de), (Gendorf, 2014, Umwelterklärung, www.gendorf.de). The amount of heat used per kg of chemical substance produced is calculated using literature data published by the Gendorf factory based in Germany, which produces a wide range of chemical substances. The factory produced 1657400 tonnes of chemical substances in the year 2015 (Gendorf, 2016, Umwelterklärung, www.gendorf.de) and 740000 tonnes of intermediate products. The amount of heat in the year 2015 was 523500 GJ (Gendorf, 2016, Umwelterklärung, www.gendorf.de) of which 90% was obtained from natural gas and 10% from steam. The resulting amount of heat from steam is 0.22 MJ/kg of chemical product produced. The 5-year average (2011 - 2015, weighted by production volume) is 0.20 MJ/kg. Cross-reference: the amount of chemicals produced (excluding intermediate products) in the EU-28 in the year 2011 was 327 million tonnes (Eurostat, http://ec.europa.eu/eurostat/statistics-explained/index.php/Chemicals_production_statistics, accessed 20170126). The chemical and petrochemical industry sector consumed 2.33 EJ of energy in 2011 (European Commission - Joint Research Centre, 2014, BAT on Common Waste water and Waste Gas Treatment/Management Systems in the Chemical Sector). The resulting energy (both heat and electricity) consumed per kg of chemicals produced in 2011 is thus 7.13 MJ/kg. This is higher than the value calculated using data published by Gendorf – 3.85 MJ/kg, but that is to be expected as the intermediate products are not accounted for.
- potassium hydroxide: 0.393809 kg; lognormal variance with pedigree 0.036, pedigree (4,5,1,1,1)
  Stoechiometric calculation
  Uncertainty: S
  properties: wet mass 1 kg, dry mass 0.856 kg, water content 0.168224
- carbon dioxide, liquid: 0.0128076 kg; lognormal variance with pedigree 0.036, pedigree (4,5,1,1,1)
  Stoechiometric calculation
  Uncertainty: S
  properties: wet mass 1 kg, dry mass 1 kg, carbon content, fossil 0.272727
- heat, district or industrial, natural gas: 2.15 MJ; lognormal variance with pedigree 0.009825, pedigree (2,3,1,2,3)
  Calculated based on literature data published by the industry. This value is a 5-year average of data (2011 - 2015) published by the Gendorf factory (Gendorf, 2016, Umwelterklärung, www.gendorf.de), (Gendorf, 2015, Umwelterklärung, www.gendorf.de), (Gendorf, 2014, Umwelterklärung, www.gendorf.de). The amount of heat used per kg of chemical substance produced is calculated using literature data published by the Gendorf factory based in Germany, which produces a wide range of chemical substances. The factory produced 1657400 tonnes of chemical substances in the year 2015 (Gendorf, 2016, Umwelterklärung, www.gendorf.de) and 740000 tonnes of intermediate products. The amount of heat in the year 2015 was 523500 GJ (Gendorf, 2016, Umwelterklärung, www.gendorf.de) of which 90% was obtained from natural gas and 10% from steam. The resulting amount of heat from natural gas is 2.02 MJ/kg of chemical product produced. The 5-year average (2011 - 2015, weighted by production volume) is 2.15 MJ/kg. Cross-reference: the amount of chemicals produced (excluding intermediate products) in the EU-28 in the year 2011 was 327 million tonnes (Eurostat, http://ec.europa.eu/eurostat/statistics-explained/index.php/Chemicals_production_statistics, accessed 20170126). The chemical and petrochemical industry sector consumed 2.33 EJ of energy in 2011 (European Commission - Joint Research Centre, 2014, BAT on Common Waste water and Waste Gas Treatment/Management Systems in the Chemical Sector). The resulting energy (both heat and electricity) consumed per kg of chemicals produced in 2011 is thus 7.13 MJ/kg. This is higher than the value calculated using data published by Gendorf – 3.85 MJ/kg, but that is to be expected as the intermediate products are not accounted for.
- oxygen, liquid: 0.101266 kg; lognormal variance with pedigree 0.036, pedigree (4,5,1,1,1)
  Stoechiometric calculation
  Uncertainty: S
  properties: wet mass 1 kg, dry mass 1 kg
- wastewater, average: 0 m3; name BP_wastewater_average; pedigree (1,1,1,1,1)
  Calculated based on literature data published by the industry. This value is a 5-year average of data (2011 - 2015) published by the Gendorf factory (Gendorf, 2016, Umwelterklärung, www.gendorf.de), (Gendorf, 2015, Umwelterklärung, www.gendorf.de), (Gendorf, 2014, Umwelterklärung, www.gendorf.de). The amount of wastewater (which is later on treated in the municipal WWTP) per kg of chemical substance produced is calculated using literature data published by the Gendorf factory based in Germany, which produces a wide range of chemical substances. The factory produced 1657400 tonnes of chemical substances in the year 2015 (Gendorf, 2016, Umwelterklärung, www.gendorf.de) and 740000 tonnes of intermediate products. The amount of wastewater which is later on treated in the municipal WWTP in the year 2015 was 1200 tonnes (Gendorf, 2016, Umwelterklärung, www.gendorf.de). The resulting amount of wastewater is 2.7E-06 m3/kg of chemical product produced.
  production volume 0 m3
    Calculated from the production volume of potassium permanganate in proportion to the respective output amounts.
  property price 0 EUR2005; name BP_wastewater_average_price_EUR2005
  properties: water content 2882.2, carbon content, non-fossil 0.194039, dry mass 0.346837 kg, wet mass 1000 kg
  note on carbon content, non-fossil: 0.0673 kg TOC/m3 (Tab A.17, ecoinvent v2.2 report 13_I). TOC was considered as Total Carbon.
- chemical factory, organics: 4e-10 unit; lognormal variance with pedigree 0.309225, pedigree (2,3,1,2,3)
  Calculated based on literature data published by the industry. For this activity, no information was readily available concerning infrastructure and land-use. Therefore, the infrastructure is estimated based on data from two chemical factories, the BASF site of Ludwigshafen and the chemical factory in Gendorf (which are both located in Germany), which produce a wide range of chemical substances. Based on this data, the following assumptions are made: the built area amounts to about 4.2 ha, the plant has an average output of 50'000 t/a and a lifespan of fifty years. The estimated infrastructure amount is therefore 4.00 E-10 units per kg of produced chemical.
  References:
  Althaus H.-J., Chudacoff M., Hischier R., Jungbluth N., Osses M. and Primas A. (2007) Life Cycle Inventories of Chemicals. ecoinvent report No. 8, v2.0. EMPA Dübendorf, Swiss Centre for Life Cycle Inventories, Dübendorf, CH.
  Gendorf (2000) Umwelterklärung 2000, Werk Gendorf. Werk Gendorf, Burgkirchen.
- manganese concentrate: 0.611808 kg; lognormal variance with pedigree 0.036, pedigree (4,5,1,1,1)
  Stoechiometric calculation
  Uncertainty: S
  properties: wet mass 1 kg, dry mass 1 kg
- inert waste, for final disposal: -0.0908675 kg; name BP_inert_waste_for_final_disposal; lognormal variance with pedigree 0.036, pedigree (4,5,1,1,1)
  Stoechiometric calculation. Includes potassium carbonate that is produced during the process.
  Uncertainty: S
  production volume 901203 kg; = RP_PV*BP_inert_waste_for_final_disposal/ABS(potassium_RP)
    (same comment as for wastewater, average)
  property price 0 EUR2005; name BP_inert_waste_for_final_d_price_EUR2005
  properties: wet mass 1 kg, dry mass 0.995 kg, water content 0.00502513
- tap water: 0.026 kg; lognormal variance with pedigree 0.009825, pedigree (2,3,1,2,3)
  Calculated based on literature data published by the industry. This value is a 5-year average of data (2011 - 2015) published by the Gendorf factory (Gendorf, 2016, Umwelterklärung, www.gendorf.de), (Gendorf, 2015, Umwelterklärung, www.gendorf.de), (Gendorf, 2014, Umwelterklärung, www.gendorf.de). The amount of tap water per kg of chemical substance produced is calculated using literature data published by the Gendorf factory based in Germany, which produces a wide range of chemical substances. The factory produced 1657400 tonnes of chemical substances in the year 2015 (Gendorf, 2016, Umwelterklärung, www.gendorf.de) and 740000 tonnes of intermediate products. The amount of tap water consumed in the year 2015 was 55100 tonnes (Gendorf, 2016, Umwelterklärung, www.gendorf.de). The resulting amount of tap water is 0.023 kg/kg of chemical product produced. The 5-year average (2011 - 2015, weighted by production volume) is 0.026 kg/kg.
  properties: wet mass 1 kg, water content 2962.17, dry mass 0.000337476 kg, carbon content, fossil 0.00178991
  note on carbon content, fossil: Bicarbonate content is 2.93 mol/m3. CO2 content is 0.1 mol/m3 (ecoinvent v2.2 report 8, Tab 93.1).
- wastewater, average: -2.43642e-6, -2.63575e-7 m3 (2 entries); lognormal variance with pedigree 0.009825, pedigree (2,3,1,2,3)
  (same comment as for wastewater, average)
  production volume 26.778 m3

## Inputs from nature
- Water, well, in ground [natural resource, in water]: 0.00083 m3; lognormal variance with pedigree 0.009825, pedigree (2,3,1,2,3)
  Calculated based on literature data published by the industry. This value is a 5-year average of data (2011 - 2015) published by the Gendorf factory (Gendorf, 2016, Umwelterklärung, www.gendorf.de), (Gendorf, 2015, Umwelterklärung, www.gendorf.de), (Gendorf, 2014, Umwelterklärung, www.gendorf.de). The amount of groundwater and surface water (river) extracted per kg of chemical substance produced is calculated using literature data published by the Gendorf factory based in Germany, which produces a wide range of chemical substances. The factory produced 1657400 tonnes of chemical substances in the year 2015 (Gendorf, 2016, Umwelterklärung, www.gendorf.de) and 740000 tonnes of intermediate products. The amount of groundwater and surface water (river) extracted in the year 2015 was 19950000 tonnes and 21488100 tonnes respectively (Gendorf, 2016, Umwelterklärung, www.gendorf.de).
- Water, river [natural resource, in water]: 0.00086 m3; lognormal variance with pedigree 0.009825, pedigree (2,3,1,2,3)
  (same comment as for Water, well, in ground)
- Water, cooling, unspecified natural origin [natural resource, in water]: 0.0164 m3; lognormal variance with pedigree 0.009825, pedigree (2,3,1,2,3)
  Calculated based on literature data published by the industry. This value is a 5-year average of data (2011 - 2015) published by the Gendorf factory (Gendorf, 2016, Umwelterklärung, www.gendorf.de), (Gendorf, 2015, Umwelterklärung, www.gendorf.de), (Gendorf, 2014, Umwelterklärung, www.gendorf.de). The amount of water for cooling extracted per kg of chemical substance produced is calculated using literature data published by the Gendorf factory based in Germany, which produces a wide range of chemical substances. The factory produced 1657400 tonnes of chemical substances in the year 2015 (Gendorf, 2016, Umwelterklärung, www.gendorf.de) and 740000 tonnes of intermediate products. The reported amounts of water extracted as groundwater and surface water (river) are assumed to be used entirely for cooling purposes.

## Emissions to nature
- Water [water, unspecified]: 0.0167 m3; lognormal variance with pedigree 0.009825, pedigree (2,3,1,2,3)
  Calculated based on literature data published by the industry (Gendorf, 2016, Umwelterklärung, www.gendorf.de). The amount of water released back to the environment consists of the amount of process water treated in the internal WWTP and then released back to the environment and the amount of cooling water released back to the environment.
  property water in wet mass 1000 kg; name WWM
  property wet mass 1000 kg; name WM
  property fraction, origin: unspecified 1; name fraction_origin_unspecified_Ww
  property fraction, origin: fresh water 0; name fraction_origin_fresh_water_Ww
  property dry mass 0 kg; name DM
  property fraction, origin: salt water 0; name fraction_origin_salt_water_Ww
  property carbon content, non-fossil 0; name C_content_non_fossil
  property carbon content, fossil 0; name C_content_fossil
- Water [air, unspecified]: 0.0014 m3; lognormal variance with pedigree 0.009825, pedigree (2,3,1,2,3)
  Calculated to ensure the water balance. In general, in the case of recirculating cooling systems, 77% of the water input evaporates to air. In case of once-through cooling systems, 4% of the water input evaporates to air. The process water has in the chemical industry an average evaporation rate of 20.5%. In the specific case of the Gendorf factory, the calculated evaporation rate based on the data published is 6.3%. This matches the qualitative information, that the majority of the cooling systems in Gendorf are once-through and that the amount of cooling water used is significantly higher than the amount of process water used (Gendorf, 2016, Umwelterklärung, www.gendorf.de).
  property fraction, origin: unspecified 1; name fraction_origin_unspecified
  property fraction, origin: fresh water 0; name fraction_origin_fresh_water
  property fraction, origin: salt water 0; name fraction_origin_salt_water
- Carbon dioxide, fossil [air, urban air close to ground]: 0.000251123 kg; lognormal variance with pedigree 0.1786, pedigree (4,5,5,5,5)
  Estimation
  Uncertainty: E

## Sampling procedure
Literature data and stoechiometric calculations. Some values are calculated based on data from a large chemical factory located in Germany. For more details, see the comments of the exchanges.

## Review by Gregor Wernet 2017-08-04
This dataset was additionally reviewed in a separate review process by Eric Johnson of Atlantic Consulting as well as Emilia Moreno Ruiz and Gregor Wernet of ecoinvent.
