# tissue paper production, virgin

Dataset: EcoSpold 2, unit process
Geography: GLO
Time period: 1998-01-01 to 2019-12-31
Technology level: current
Classification: ISIC rev.4 ecoinvent: 1701:Manufacture of pulp, paper and paperboard
Classification: EcoSpold01Categories: paper & cardboard/graphic paper
Scenario: Business-as-Usual
System model: Allocation at the point of substitution
Generated by: Bo Weidema
Published in: European Commission (EC) 2011
Database: ecoinvent
isCopyrightProtected: true
accessRestrictedTo: 1

## General comment
This dataset is based on the Best Available Techniques (BAT) Reference Document for in the Production of Pulp, Paper and Board (May 2012). It may not in all aspects fulfill the requirements of the ecoinvent data quality guideline for version 3.

## Included activities start
from receipt of market pulp at the paper mill

## Included activities end
to the output of paper at the paper mill

## Technology
Average of present used technology

## Parameters
- fuel use: 9600 MJ; name fuel_in; lognormal variance with pedigree 0.0019, pedigree (2,3,1,3,1)
- fuel use efficiency: 0.9; name fuel_use_efficiency
- starch_use: 15 kg; name starch_dry; triangular min 0, mostLikely 15, max 30, pedigree (2,3,1,3,1)
  dry starch
- solid waste: 25 kg; name solid_waste; triangular min 10, mostLikely 25, max 40, pedigree (2,3,1,3,1)
- fraction, process water, to air: 0.15 dimensionless; name fraction_PW_to_air; lognormal variance with pedigree 0.092025, pedigree (4,4,3,2,4)
  Literature value. In case when no industry/process specific data are available, default evaporation fraction value is used. This value is 15% and is based on literature (Statistics Canada, 2007 & Shaffer, K.H., 2008, Consumptive water use in the Great Lakes Basin, USGS & Shiklomanov, 2003, World Water Resources at the Beginning of the 21st Century) and has been approved by an expert.

## Reference product
- tissue paper: 1 kg; By-product classification allocatable product; CPC 321: Pulp, paper and paperboard
  production volume 1.05e10 kg; = 21000000000*0.5
    21 million tonnes according to The European Tissue Symposium (http://www.europeantissue.com/about/profile-of-ets ; assessed 2012-08-06). Virgin production is estimated to with the rest made up by tissue paper with recycled content (an input of 50% recycled fibres in total is assumed, corresponding to the CEPI data for Europe).
  property price 1.34 EUR2005
    Calculated based on literature values. The price of 1 kg of tissue paper is calculated to be 1.34 euro/kg. This price is calculated as a weighted average of prices calculated based on import (net trade) of this material from the world into 5 big economies; EU, Japan, China, India, USA. The net weight and the trade value is obtained from the UN Comtrade database (average of commodity no. 730830 Doors, windows, frames of iron or steel and commodity no. 481820 Paper hankerchiefs, cleansing, facial tissues, towel), year 2005.
  property water content 0.0582011; name water_content
  property carbon content, fossil 2.22e-5; name C_content_fossil
  property water in wet mass 0.055 kg; name WWM
  property carbon content, non-fossil 0.36169; name C_content_non_fossil
  property dry mass 0.945 kg; name DM
  property wet mass 1 kg; name WM
  property carbon content 0.361712
    carbon content on a dry matter basis (reserved; not for manual entry)
  property true value 1340
    allocation property applied in "true value" allocation // value calculated from revenue
  properties: carbon allocation 0.341818 kg

## By-products
- iron scrap, sorted, pressed: 0 kg; By-product classification Recyclable; CPC 39310: Slag, dross, scalings and other waste from the manufacture of iron or steel; pedigree (1,1,1,1,1)
  metallic iron scrap removed from ash reamains and recycled.
  Uncertainty: uncertainty is calculated from uncertainties in waste composition and transfer coefficients to soild residues
  production volume 1.12709e6 kg
  property price 0.175 EUR2005
    Temporary price data. Calculated as 90% of purchasers price based on: 2005 import and export prices (total trades (USD) divided by total weight (kg) in biggest economies of the world: EU27, USA, Brasil, China, India, Japan and Russia) from UN Commodity Trade Statistics Database (http://data.un.org/Explorer.aspxDatabase [Accessed 2011.06.20]). Commodity: Waste or scrap, of cast iron
  property carbon content 0
    carbon content on a dry matter basis (reserved; not for manual entry)
  property true value 0.0160943
    allocation property applied in "true value" allocation // value calculated from revenue
  properties: carbon content, non-fossil 0, wet mass 1 kg, dry mass 1 kg, water content 0, carbon content, fossil 0, water in wet mass 0 kg, carbon allocation 0 kg
- copper: 0 kg; source Rentz O. 1999; By-product classification allocatable product; CPC 41413: Refined copper and copper alloys, unwrought; master alloys of copper
  Literature value. Copper uses: Before end-use copper is manufactured into semi fabricated products, such as shapes and ingots (known as 'semis'). These manufacturing processes are subdivided into hot working, cold working and, if necessary, process annealing. Few of the semis are ready for use as such. They more typically travel to first-stage manufacturers, who make metal rods, wire, and casting, and then to component manufacturers who produce such things as motors, valves, and insulated cables The components in turn are incorporated by final-stage manufacturers into a variety of finished products - automobiles, commercial buildings, residential housing, and so forth. These uses account for about 79% of the world-wide consumption of copper.
  production volume 36318.5 kg
  property price 5.52 EUR2005
    Literature value (http://www.economist.com/news/business/21576714-mining-industry-has-enriched-chile-its-future-precarious-copper-solution). Average price between 20015 and 2013.
  property carbon content 0
    carbon content on a dry matter basis (reserved; not for manual entry)
  property true value 0.016159
    allocation property applied in "true value" allocation // value calculated from revenue
  properties: dry mass 1 kg, water in wet mass 0 kg, wet mass 1 kg, carbon content, non-fossil 0, water content 0, carbon content, fossil 0, carbon allocation 0 kg
- electricity, for reuse in municipal waste incineration only: 0 kWh; CPC 17100: Electrical energy; By-product classification allocatable product; pedigree (1,1,1,1,1)
  Net electricity generated from this waste and used in internal MSWI plant energy redistribution.
  Uncertainty: uncertainty is calculated from uncertainties in waste composition and uncertainties in energy efficiency and the uncertainty in internal energy demand
  production volume 8.32629e6 kWh
  property exergy 3.6 MJ; name E_el_prod_MSWI_exergy
    This exergy property is based on the exergy content of the product.
  property true value relation 3.6; name E_el_prod_MSWI_true_value_relation
    property to calculate "true value" from
  property price 0.1 EUR2005; name E_el_prod_MSWI_price_EUR2005
    Estimated to be the same price as in case of electricity, medium voltage.
  property true value 0.0945122
    allocation property applied in "true value" allocation // value calculated from true value relation
- heat, for reuse in municipal waste incineration only: 0 MJ; CPC 17300: Steam and hot water; By-product classification allocatable product; pedigree (1,1,1,1,1)
  Net useful heat generated from this waste and used in internal MSWI plant energy redistribution.
  Uncertainty: uncertainty is calculated from uncertainties in waste composition and uncertainties in energy efficiency and the uncertainty in internal energy demand
  production volume 6.15049e7 MJ
  property true value relation 0.1842; name E_th_prod_MSWI_true_value_relation
    property to calculate "true value" from
  property exergy 0.1842 MJ; name E_th_prod_MSWI_exergy
    This exergy property is based on the exergy content of the product.
  property price 0.0106 EUR2005; name E_th_prod_MSWI_price_EUR2005
    Average European district heat price from Ecoheatcool and Euroheat 2005-2006, Ecoheat Work package 1: The European heat market. Final report. 10.6 EUR/GJ i s the price of district heat. http://www.solarthermalworld.org/files/Ecoheatcool%20WP1%20Web.pdf?download
  property true value 0.0357222
    (same comment as for electricity, for reuse in municipal waste incineration only)
- zinc concentrate: 0 kg; CPC 14290: Other non-ferrous metal ores and concentrates (other than uranium or thorium ores and concentrates); By-product classification allocatable product
  Calculated value from the knowledge of the properties of both products.
  production volume 2.8827e-5 kg
  property price 0.38 EUR2005; name ByP_price_EUR2005
    Temporary price data. Calculated as 90% of purchasers price based on: Zinc content in concentrate 53%. Concentrate price per kg Zn 86.5% of refined Zn price (13.5% treatment charges according to CHR Metals Limited 2005: Dynamic cost curves. http://www.minecost.com/dynamic.pdf). 2004 zinc price from USGS (2007) Mineral commodity summaries 2007. <http://minerals.usgs.gov/minerals/pubs/mcs/2007/mcs2007.pdf> [Accessed 25 May 2010]
  property zinc content 0.53; name zinc_C_zinc_concentrate
    Zinc content on a dry matter basis. Value taken from teh "zinc mine operation" /GLO dataset.
  property dry mass 1 kg; name DM_zinc_concentrate
  property carbon content 0
    carbon content on a dry matter basis (reserved; not for manual entry)
  property true value 8.82936e-13
    allocation property applied in "true value" allocation // value calculated from revenue
  properties: wet mass 1 kg, water content 0, carbon content, non-fossil 0, carbon content, fossil 0, water in wet mass 0 kg, carbon allocation 0 kg
- iron scrap, unsorted: 0 kg; source European Aluminium Association 2008; CPC 39310: Slag, dross, scalings and other waste from the manufacture of iron or steel; By-product classification Recyclable; pedigree (1,1,1,1,1)
  production volume 29.8181 kg
  property price 0.149 EUR2005; name ironScrapAmount_price_EUR2005
    Temporary price data. Calculated as 90% of purchasers price based on: estimated at 85% of sorted scrap
  property carbon content 0
    carbon content on a dry matter basis (reserved; not for manual entry)
  property true value 3.8986e-7
    allocation property applied in "true value" allocation // value calculated from revenue
  properties: water in wet mass 0 kg, water content 0, carbon content, fossil 0, carbon content, non-fossil 0, dry mass 1 kg, wet mass 1 kg, carbon allocation 0 kg
- aluminium oxide, non-metallurgical: 0 kg; source European Aluminium Association 2008; CPC 41432: Alumina (aluminium oxide), except artificial corundum; By-product classification allocatable product; CAS 1344-28-1; pedigree (1,1,1,1,1)
  production volume 1876.34 kg
  property carbon content, non-fossil 0; name C_content_non_fossil
  property price 0.28 EUR2005; name Al2O3Amount_price_EUR2005
    From UN trade database. http://data.un.org/ Import data from the largest economies of the world are used (Brazil, India, USA, China, Japan and EU-27).
  property dry mass 1 kg; name DM
  property water content 0; name water_content
  property wet mass 1 kg; name WM
  property water in wet mass 0 kg; name WWM
  property carbon content, fossil 0; name C_content_fossil
  property carbon content 0
    carbon content on a dry matter basis (reserved; not for manual entry)
  property true value 4.61012e-5
    allocation property applied in "true value" allocation // value calculated from revenue
  properties: carbon allocation 0 kg
- aluminium, cast alloy: 0 kg; source European Aluminium Association 2008; By-product classification allocatable product; CPC 41431: Unwrought aluminium; pedigree (1,1,1,1,1)
  EcoSpold01Location=RER
  production volume 17539.6 kg
  property price 1.3 EUR2005; name castAlloyAmount_price_EUR2005
    Temporary price data. Calculated as 90% of purchasers price based on: Source: London Metal Exchange, Aluminium alloy price for 2005
  property carbon content 0
    carbon content on a dry matter basis (reserved; not for manual entry)
  property true value 0.00200081
    allocation property applied in "true value" allocation // value calculated from revenue
  properties: water in wet mass 0 kg, carbon content, non-fossil 0, water content 0, dry mass 1 kg, carbon content, fossil 0, wet mass 1 kg, carbon allocation 0 kg
- aluminium, wrought alloy: 0 kg; source European Aluminium Association 2008; By-product classification allocatable product; CPC 4153: Semi-finished products of aluminium or aluminium alloys; pedigree (1,1,1,1,1)
  production volume 7678.52 kg
  property price 1.44 EUR2005; name secondaryAluminiumOutput_price_EUR2005
    Estimated based on literature values and expert judgement. Aluminium ccast alloys are about 90% of the price of aluminium wrought alloys.
  property carbon content 0
    carbon content on a dry matter basis (reserved; not for manual entry)
  property true value 0.000970246
    allocation property applied in "true value" allocation // value calculated from revenue
  properties: wet mass 1 kg, water content 0, carbon content, fossil 0, water in wet mass 0 kg, carbon content, non-fossil 0, dry mass 1 kg, carbon allocation 0 kg

## Inputs from technosphere
- municipal solid waste: 0 kg; pedigree (1,1,1,1,1)
  original provided in dry matter.
  production volume 0 kg
    Calculated from production volume of reference product using the relative outputs.
  property dry mass 0.771 kg; name DM_solid_waste
  property water in wet mass 0.229 kg; name WWM_solid_waste
  properties: wet mass 1 kg, water content 0.297017, carbon content, non-fossil 0.261655, carbon content, fossil 0.171549
  note on carbon content, non-fossil: MSW composition in tab 4.1, ecoinvent v2.2 report 13_I. C content referred to 1 kg DM
- heat, district or industrial, natural gas: 3.55512 MJ; = fuel_in/(3*fuel_use_efficiency); lognormal variance with pedigree 0.0406, pedigree (1,1,5,1,1)
  calculated from the original fuel input using efficiency factor and a default distribution between natural gas and other fuel sources.
- chemical, organic: 0.000999877 kg; triangular min 0, mostLikely 0.000999877, max 2, pedigree (2,3,5,3,1)
  colour agents
  properties: wet mass 1 kg, dry mass 1 kg, carbon content, fossil 0.628
  note on carbon content, fossil: This dataset is an unweighted average of 20 organic substances (listed in Tab 88.1, ecoinvent v2.2 report 8, part II), being part of the top100 chemicals included in this database. The C-content has also been calculated as an unweighted average of the C content of the substances composing this dataset.
- chemical, inorganic: 0.00999877 kg; triangular min 0, mostLikely 0.00999877, max 20, pedigree (2,3,5,3,1)
  other additives
  properties: carbon content, fossil 0.003, dry mass 1 kg, wet mass 1 kg
  note on carbon content, fossil: This dataset is an unweighted average of 20 inorganic substances (listed in Tab 88.1, ecoinvent v2.2 report 8, part II), being part of the top100 chemicals included in this database. The C-content has also been calculated as an unweighted average of the C content of the substances composing this dataset.
- electricity, medium voltage: 1.99975 kWh; triangular min 1.99975, mostLikely 1.99975, max 1.99975, pedigree (2,3,5,3,1)
  The upper end of the range refers to tissue mills using through-air drying (TAD) or re-creping techniques.
- potato starch: 0.0187477 kg; = starch_dry/ DM_starch; triangular min 0, mostLikely 0.0187477, max 0.03, pedigree (2,3,5,3,1)
  Starch, dry
  property dry mass 0.8 kg; name DM_starch
  properties: wet mass 1 kg, water content 0.25, carbon content, non-fossil 0.46
- rosin size, for paper production: 0 kg; pedigree (1,1,1,1,1)
  Wet strength resins
  properties: carbon content, non-fossil 0.515474, wet mass 1 kg, dry mass 1 kg
- heat, district or industrial, other than natural gas: 7.11023 MJ; = fuel_in*2/(3*fuel_use_efficiency); lognormal variance with pedigree 0.0406, pedigree (1,1,5,1,1)
  (same comment as for heat, district or industrial, natural gas)
- sulfite pulp, bleached: 1.01487 kg; triangular min 1.01487, mostLikely 1.01487, max 1.01487, pedigree (2,3,5,3,1)
  properties: wet mass 1 kg, dry mass 0.9 kg, water content 0.111111, carbon content, non-fossil 0.494
- paper mill, integrated: 5.43933e-11 unit; lognormal variance with pedigree 0.448, pedigree (4,5,5,5,5)
  added from the original tissue paper production dataset
  Uncertainty: own assumption
- municipal solid waste: -0.00248139, -1.52091e-5, -1.06428e-5, -4.22374e-5, -0.0298719 kg (5 entries); lognormal variance with pedigree 0.0473, pedigree (2,3,5,3,1)
  original provided in dry matter.
  production volume 3.40467e8 kg
  properties: dry mass 0.771 kg, wet mass 1 kg, water content 0.297017, carbon content, non-fossil 0.261655, carbon content, fossil 0.171549
- rosin size, for paper production: 0.0129346 kg; triangular min 0, mostLikely 0.0129346, max 80, pedigree (2,3,5,3,1)
  Wet strength resins
- rosin size, for paper production: 0.0270604 kg; triangular min 0, mostLikely 0.0270604, max 80, pedigree (2,3,5,3,1)
  Wet strength resins

## Inputs from nature
- Water, unspecified natural origin [natural resource, in water]: 0.00399951 m3; name water_in; lognormal variance with pedigree 0.0419, pedigree (2,3,5,3,1)

## Emissions to nature
- TOC, Total Organic Carbon [water, surface water]: 0.0014813 kg; = COD/2.7; lognormal variance with pedigree 0.08, pedigree (1,1,5,1,1)
  Default rule of thumb according to ecoinvent guidelines
- COD, Chemical Oxygen Demand [water, surface water]: 0.00399951 kg; name COD; triangular min 0.00399951, mostLikely 0.00399951, max 0.00399951, pedigree (2,3,5,3,1)
- Nitrogen [water, unspecified]: 4.99938e-5 kg; triangular min 4.99938e-5, mostLikely 4.99938e-5, max 4.99938e-5, pedigree (2,3,5,3,1)
- Water [water, surface water]: 0.00299963 m3; name water_to_water_surface; = water_in-water_air; lognormal variance with pedigree 0.08, pedigree (1,1,5,1,1)
- BOD5, Biological Oxygen Demand [water, surface water]: 0.00149981 kg; triangular min 0.00149981, mostLikely 0.00149981, max 0.00149981, pedigree (2,3,5,3,1)
- Water [air, unspecified]: 0.000999877 m3; name water_air; lognormal variance with pedigree 0.0419, pedigree (2,3,5,3,1)
  property fraction, origin: fresh water 0; name fraction_origin_fresh_water
  property fraction, origin: unspecified 1; name fraction_origin_unspecified
  property fraction, origin: salt water 0; name fraction_origin_salt_water
- Suspended solids, unspecified [water, surface water]: 0.00199975 kg; triangular min 0.00199975, mostLikely 0.00199975, max 0.00199975, pedigree (2,3,5,3,1)
- DOC, Dissolved Organic Carbon [water, surface water]: 0.0014813 kg; = COD/2.7; lognormal variance with pedigree 0.08, pedigree (1,1,5,1,1)
  Default rule of thumb according to ecoinvent guidelines
- AOX, Adsorbable Organic Halogen as Cl [water, surface water]: 9.99877e-6 kg; triangular min 9.99877e-6, mostLikely 9.99877e-6, max 9.99877e-6, pedigree (2,3,5,3,1)
- Phosphorus [water, surface water]: 1.49981e-5 kg; triangular min 1.49981e-5, mostLikely 1.49981e-5, max 1.49981e-5, pedigree (2,3,5,3,1)

## Sampling procedure
These data is sourced from Table 7.4 of the draft report of Best Available Techniques (BAT) Reference Document for in the Production of Pulp, Paper and Board (May 2012) referring to an original source "ETS 1998" which is not listed in the list of references.
