# treatment of blast furnace gas, in power plant

Dataset: EcoSpold 2, unit process
Geography: TW
Time period: 1980-01-01 to 2019-12-31
Technology level: current
Classification: ISIC rev.4 ecoinvent: 3510:Electric power generation, transmission and distribution
Classification: EcoSpold01Categories: natural gas/power plants
Synonyms: BFG; top gas
Tags: fossil fuels; industrial gas power
Scenario: Business-as-Usual
System model: Allocation at the point of substitution
Generated by: Karin Treyer
Published in: Faist Emmenegger, M. 2007
Database: ecoinvent
isCopyrightProtected: true
accessRestrictedTo: 1

## General comment
This dataset has been created as a copy of the dataset for Europe (RER). Production volumes have been adjusted.
This dataset represents the treatment of blast furnace gas in an unspecified gas power plant with high voltage electricity and heat as by-product in Taiwan in 2012.
According to IEA (2008), blast furnace gas is obtained as a by-product in operating blast furnaces; recovered on leaving the furnace and used partly within the plant and partly in other steel industry processes or used in power stations equipped to burn it.
The efficiency calculations are based on IEA/OECD statistics (fuel inputs, electricity produced). No exergy correction could be made due to incomplete data (see ecoinvent report 'Erdgas' p. 128 for details).
Water is used for wet cooling and as feed water in the steam circuit. In this dataset, 100% wet cooling and no once-through cooling is assumed.
EMISSIONS:
Emission data have partly been overtaken from a dataset representing the production of electricity in a natural gas power plant. Data have partly been adapted to the different composition of natural gas and blast furnace gas (see tab. 11.16 in ecoinvent report 'Erdgas').
Different sources served as basis for assumption of average emissions. Where possible, the most recent sources were taken into account, whereas older sources were taken in order to determine the remaining data gaps. The emissions have been fixed for the former UCTE region* and have been overtaken as such for all countries without value adaptation (adaptation of the uncertainty). See ecoinvent report 'Erdgas' given as main source for details (Tab. 11.15 and tab. 11.18). In the following a short overview:
- Emissions of NOx, CO, CO2, SO2, particles, N2O and CH4 are mainly taken from CORINAIR 2001, Rentz et al. 2002, and Swedish EPA 2000 (see tab. 11.1) and are basically valid for European countries.
- NOx emissions are a major challenge in natural gas power plants. With rising temperature, emissions also rise; band widths of NOx emissions in literature are correspondingly large. There are several methods to diminish these emissions.
- CO is a result of incomplete burning. For economic and technical reasons, plant combustion is optimized and CO emissions are low.
- CO2 and SO2 emissions are depending on the composition of the used fuel.. Due to high shares of CO and CO2 in blast furnace gas, CO2 emissions are relatively high for this type of gas. In contrast, some literature sources assume no sulfur in blast furnace gas, so that SO2 emissions are very low in this dataset.
- Organic compound emissions are estimated on the basis of EPA 1998.
- Particles are assumed to be smaller than 2.5 micro-m
Sources:
EMEP/CORINAIR 2001: Joint EMEP/CORINAIR Atmospheric Emission Inventory Guidebook, Third Edition. Copenhagen: European Environment Agency, 2001. http://reports.eea.eu.int/technical_report_2001_3/en.
Rentz O., Karl U., Peter H. (2002). Ermittlung und Evaluierung von Emissionsfaktoren für Feuerungsanlagen in Deutschland für die Jahre 1995, 2000 und 2010. Deutsch- Französisches Institut für Umweltforschung, Uni Karsruhe. Endbericht. Im Auftrag des Umweltbundesamtes. Forschungsbericht 299 43 142. Umweltbundesamt. Berlin.
Swedish EPA (2000) Emission Factors. Swedish Environmental Protection Agency.
IEA/OECD. 2008. Coal information 2008. International Energy Agency (IEA), Paris Cedex (FR)
*former UCTE: Union for the Coordination of the Transmission of Electricity, since 2009 replaced by ENTSO-E European Network of Transmission System Operators for Electricity.

## Included activities start
From the blast furnace gas ready to be treated in a gas power plant and from the gas power plant ready to produce electricity.

## Included activities end
This treatment activity ends with 1MJ of blast furnace gas treated in a gas power plant.

This dataset includes:
- the emissions from burning
- all operation and maintenance activities and materials of the power plants.
- Cooling: It is a assumed that all plants use wet cooling with a cooling tower. No cooling tower is included in this dataset (will be implemented in future versions)

This dataset doesn't include
- raw materials extraction, decommissioning and waste treatment as these activities are already included in the infrastructure datasets.
- transformation of the by-product electricity.

## Technology
A natural gas power plant with a capacity of 100 MW is taken as power plant infrastructure. No combined heat and power or combined cycle power plants are taken into account.

## Time period
The annual production volume is valid for the year 2012.

## Parameters
- relation between the global and the country's efficiency: 0.886305 dimensionless; name relation_global_country; = efficiency_electrical_global/ efficiency_electrical_country; undefined min 1, max 1, standardDeviation95 0, pedigree (1,1,1,1,1)
  This factor brings the amounts of the exchanges in the global dataset into relation with the amounts in the country datasets.
- electrical efficiency, country: 0.387 dimensionless; name efficiency_electrical_country; lognormal variance with pedigree 0.0167, pedigree (4,2,1,1,3)
  Literature value/calculated value. Net electrical efficiency based on the lower heating value (LHV).
  For all OECD countries, the IEA Energy statistics of OECD countries 2014 provides data for the year 2012 on fuel input (TJ, Net calorific value NCV) in CHP plants and electricity plants and gross electricity production (GWh) for each country. Together with the information on own use, the net electrical efficiency based on the NCV is calculated. From the statistics, electricity from coke oven gas is modelled in the dataset 'treatment of coal gas', while electricity from 'recovered gas (including blast furnace gas and other recovered gas) and gas works gas is modelled with the dataset 'treatment of blast furnace gas'.
  For all non-OECD countries, data from the IEA Energy statistics of non-OECD countries 2014 and the IEA electricity information have been used. The energy statistics source provides data on fuel input from coke oven gas (coal gas) as well as recovered gases and gas works gas (modelled as blast furnace gas). The electricity information provides information on total electricity production with 'gases' (=gas works gas, coke oven gas, blast furnace gas and other recovered gases). This electricity production is allocated to the coal gas and blast furnace gas dataset in ecoinvent based on the fuel input. It cannot be differentiated between electricity only and CHP plants as total values only are given.
  IEA. 2014. Electricity Information 2014. ISBN 978-92-64-21692-1. International Energy Agency (IEA), Paris Cedex (FR).
  IEA/OECD. 2014. Energy statistics of non-OECD countries 2014. International Energy Agency (IEA), Paris Cedex (FR).
  IEA/OECD. 2014. Energy statistics of OECD countries 2014. International Energy Agency (IEA), Paris Cedex (FR).
- thermal efficiency: 0.145 dimensionless; name efficiency_thermal; lognormal variance with pedigree 0.0122, pedigree (2,3,1,5,3)
  Estimation. Value taken over from the global dataset.
  Global value: Literature value/calculation for the thermal efficiency. IEA/OECD statistics provided data for OECD countries in total: Fuel input in CHP plants and the electricity and heat output. Not enough detailed data were available for non-OECD countries and/or the whole world, so that for this global dataset, the OECD value was overtaken. Data are for the category 'coal manufactured gases' including coke oven gas, blast furnace gas and oxygen steel furnace gas. Fuel input data in the statistics are expressed in gross calorific values. Net calorific values are calculated according to IEA/OECD p. I.7 by multiplying the gross heat content with a factor 0.9, taking therefore the lower factor for coke oven gas, corresponding to a worst case scenario (blast furnace gas and oxygen steel furnace gas have a gross to net ratio of 1).
  IEA/OECD. 2010. Electricity Information 2010. International Energy Agency (IEA), Paris Cedex (FR). Part IV. Detailed OECD Electricity And Heat Data.
  nan
- electrical efficiency, global: 0.343 dimensionless; name efficiency_electrical_global; lognormal variance with pedigree 0.0167, pedigree (4,2,1,1,3)
  (same comment as for electrical efficiency, country)

## Reference product
- blast furnace gas: 0 MJ; name blast_furnace_gas; source Faist Emmenegger, M. 2007; CPC 17200: Coal gas, water gas, producer gas and similar gases, other than petroleum gases and other gaseous hydrocarbons; By-product classification Recyclable
  production volume 0 MJ; name apv_blast_furnace_gas; = apv_electricity*3.6*(1/efficiency_electrical_country)
    Calculated value.
  property price 0.004 EUR2005; name blast_furnace_gas_price_EUR2005
    Temporary price data. Calculated as 90% of purchasers price based on: Same price as natural gas per MJ
  property carbon content 0.156611
    carbon content on a dry matter basis (reserved; not for manual entry)
  properties: water in wet mass 0 kg, dry mass 0.367647 kg, wet mass 0.367647 kg, carbon content, fossil 0.156611, water content 0, carbon content, non-fossil 0, carbon allocation 0.0575774 kg
- electricity, high voltage: 1 kWh; source IEA/OECD 2010, p. II.8ff; CPC 17100: Electrical energy; By-product classification allocatable product; pedigree (1,1,1,1,1)
  Calculated value. 1kWh = 3.6 MJ
  production volume 2.245e9 kWh

## By-products
- heat, district or industrial, other than natural gas: 0 MJ; = blast_furnace_gas*efficiency_thermal*(-1); source IEA/OECD 2010, p. IV.13; CPC 17300: Steam and hot water; By-product classification allocatable product; pedigree (1,1,3,1,1)
  Calculated value
  production volume 0 MJ; = apv_blast_furnace_gas*efficiency_thermal
    Calculated from production volume of reference product using the relative outputs.
  property exergy 0.1842 MJ
    This exergy property is based on the exergy content of the product.
  property price 0.0106 EUR2005
    Average European district heat price from Ecoheatcool and Euroheat 2005-2006, Ecoheat Work package 1: The European heat market. Final report. 10.6 EUR/GJ i s the price of district heat. http://www.solarthermalworld.org/files/Ecoheatcool%20WP1%20Web.pdf?download
  properties: true value relation 0.1842
- electricity, high voltage: 0 kWh; = blast_furnace_gas*efficiency_electrical_country*(-1)/3.6; source IEA/OECD 2010, p. II.8ff; CPC 17100: Electrical energy; By-product classification allocatable product; undefined min 0.0925, max 0.0925, standardDeviation95 0, pedigree (1,1,3,1,1)
  Calculated value. 1kWh = 3.6 MJ
  production volume 0 kWh; name apv_electricity
    Literature value/calculated value. Net electricity production in 2012.
    For all OECD countries, the IEA Energy statistics of OECD countries 2014 provides data for the year 2012 on gross electricity production (GWh) for each country. Together with the information on own use, the net electrical efficiency based on the NCV is calculated. From the statistics, electricity from coke oven gas is modelled in the dataset 'treatment of coal gas', while electricity from 'recovered gas (including blast furnace gas and other recovered gas) and gas works gas is modelled with the dataset 'treatment of blast furnace gas'.
    For all non-OECD countries, data from the IEA Energy statistics of non-OECD countries 2014 and the IEA electricity information have been used. The energy statistics source provides data on fuel input from coke oven gas (coal gas) as well as recovered gases and gas works gas (modelled as blast furnace gas). The electricity information provides information on total electricity production with 'gases' (=gas works gas, coke oven gas, blast furnace gas and other recovered gases). This electricity production is allocated to the coal gas and blast furnace gas dataset in ecoinvent based on the fuel input. It cannot be differentiated between electricity only and CHP plants as total values only are given.
    IEA. 2014. Electricity Information 2014. ISBN 978-92-64-21692-1. International Energy Agency (IEA), Paris Cedex (FR).
    IEA/OECD. 2014. Energy statistics of non-OECD countries 2014. International Energy Agency (IEA), Paris Cedex (FR).
    IEA/OECD. 2014. Energy statistics of OECD countries 2014. International Energy Agency (IEA), Paris Cedex (FR).
  property exergy 3.6 MJ
    This exergy property is based on the exergy content of the product.
  property price 0.0977 EUR2005
    Temporary price data. Calculated as 90% of purchasers price based on: 94% of the average price (to account for a 6% loss in transformation and transmission) for electricity for industrial consumersin 2005 (excluded taxes). From IEA.
  properties: true value relation 3.6

## Inputs from technosphere
- gas power plant, 100MW electrical: 0 unit; source Faist Emmenegger, M. 2007; pedigree (3,3,4,3,3)
  Literature value/calculated value. Amount of power plant needed for burning 1MJ of blast furnace gas.
- water, decarbonised: 0 kg; source Röder, A. 2007; pedigree (1,1,3,1,1)
  Literature value/assumption. Cooling water, decarbonised, for the water lost in the cooling water circuit when burning 1MJ of blas furnace gas. Röder et al. 2007, Tab. 9.65 and Tab. 9.66, p. 160f. Faist Emmenegger et al. 2007 state that there have been nearly no information on water use in blast furnace gas power plants and therefore neglected the water use. For consistency reasons, here it is assumed a certain water use also for the treatment of blast furnace gas.
  properties: wet mass 1 kg
- water, completely softened: 0 kg; source Röder, A. 2007; pedigree (1,1,3,1,1)
  Literature value/assumption. Feed water for the steam circuit lost when burning 1MJ of blas furnace gas. Röder et al. 2007, Tab. 9.65 and Tab. 9.66, p. 160f. Faist Emmenegger et al. 2007 state that there have been nearly no information on water use in blast furnace gas power plants and therefore neglected the water use. For consistency reasons, here it is assumed a certain water use also for the treatment of blast furnace gas.
  properties: wet mass 1 kg
- blast furnace gas: -0.598453 MJ; lognormal variance with pedigree 0.0284, pedigree (3,3,2,1,2)
  Based on data received from integrated steel plants in India. This value corresponds to the net output. 0.45 MJ of BF gas is used as input and 4.79 MJ of BF gas is generated as output. So the net BF gas of 4.34 MJ is entered as byproduct.
  production volume 2.54771e11 MJ
- diesel: 4.80601e-6 kg; lognormal variance with pedigree 0.004, pedigree (3,3,2,1,2)
  Based on data received from integrated steel plants in Inida
- hard coal: 1.30869e-10 kg; lognormal variance with pedigree 0.004, pedigree (3,3,2,1,2)
  Based on data received from integrated steel plants in India
- iron pellet: 0.0323901 kg; lognormal variance with pedigree 0.004, pedigree (3,3,2,1,2)
  EcoSpold01Location=GLO
  Based on data received from integrated steel plants in India
- oxygen, liquid: 0.0137645 kg; lognormal variance with pedigree 0.004, pedigree (3,3,2,1,2)
  Based on data received from integrated steel plants in India
- coke: 1.96903 MJ; lognormal variance with pedigree 0.004025, pedigree (3,3,2,2,2)
  EcoSpold01Location=RER
  Based on data received from integrated steel plants in India
- dolomite: 0.00265468 kg; lognormal variance with pedigree 0.004, pedigree (3,3,2,1,2)
  Based on data received from integrated steel plants in India
- blast furnace: 2.32953e-12 unit; lognormal variance with pedigree 0.2934, pedigree (3,3,2,1,2)
  Based on ecoinvent dataset " pig iron production, GLO" accessed through ecoeditor on 20170815
  EcoSpold01Location=RER
- wastewater from pig iron production: -5.48996e-5 m3; lognormal variance with pedigree 0.0434, pedigree (3,3,2,1,2)
  It is assumed that 80% of water consumed as input to the process is sent out as wastewater for treatment. The wastewater after treatment is recycled and reused again in the process.
  production volume 3.94015e7 m3
- sinter, iron: 0.0752498 kg; lognormal variance with pedigree 0.004, pedigree (3,3,2,1,2)
  Based on data received from integrated steel plants in India
  EcoSpold01Location=GLO
- iron ore, beneficiated, 65% Fe: 0.024857 kg; lognormal variance with pedigree 0.004, pedigree (3,3,2,1,2)
  Based on data received from integrated steel plants in India
  EcoSpold01Location=GLO
- steam, in chemical industry: 0.0124049 kg; lognormal variance with pedigree 0.004, pedigree (3,3,2,1,2)
  Based on data received from integrated steel plants in India
- nitrogen, liquid: 0.00497645 kg; lognormal variance with pedigree 0.004, pedigree (3,3,2,1,2)
  Based on data received from integrated steel plants in India
- limestone, unprocessed: 0.000218388 kg; lognormal variance with pedigree 0.043825, pedigree (3,3,5,2,2)
  EcoSpold01Location=CH
  Based on data received from integrated steel plants in India
- sponge iron: 0.00116017 kg; lognormal variance with pedigree 0.004, pedigree (3,3,2,1,2)
  Based on data received from integrated steel plants in Inida
- sludge, pig iron production: -0.0253559 kg; lognormal variance with pedigree 0.3034, pedigree (3,3,2,1,2)
  Based on data received from integrated steel plants in India
  EcoSpold01Location=CH
  production volume 1.81979e10 kg
- blast furnace slag: -0.0705918 kg; lognormal variance with pedigree 0.0284, pedigree (3,3,2,1,2)
  Based on data received from integrated steel plants in India
  production volume 2.36573e10 kg
- heat, district or industrial, other than natural gas: 0.0129176 MJ; lognormal variance with pedigree 0.004, pedigree (3,3,2,1,2)
  Based on data received from integrated steel plants in India
- electricity, medium voltage: 0.00378804 kWh; lognormal variance with pedigree 0.004, pedigree (3,3,2,1,2)
  Based on data received from integrated steel plants in India
- lime: 0.0034203 kg; lognormal variance with pedigree 0.004, pedigree (3,3,2,1,2)
  Based on data received from integrated steel plants in India
- calcium carbide, technical grade: 0.000283388 kg; lognormal variance with pedigree 0.0094, pedigree (3,3,2,1,2)
  Based on data received from integrated steel plants in India
- copper: 1.18685e-6 kg; lognormal variance with pedigree 0.004, pedigree (3,3,2,1,2)
  Based on data received from integrated steel plants in India
- basic oxygen furnace waste: -0.00678158 kg; lognormal variance with pedigree 0.043225, pedigree (3,3,5,2,2)
  Based on data received from integrated steel plants in India
  EcoSpold01Location=CH
  production volume 3.57267e9 kg
- ferromanganese, high-coal, 74.5% Mn: 0.00115961 kg; lognormal variance with pedigree 0.004, pedigree (3,3,2,1,2)
  Based on data received from integrated steel plants in India
- dust, unalloyed electric arc furnace steel: -0.000117014 kg; lognormal variance with pedigree 0.004, pedigree (3,3,2,1,2)
  Based on ecoinvent dataset for steel production, converter, lowalloyed, GLO
  EcoSpold01Location=CH
  production volume 4.11264e7 kg
- manganese: 3.02108e-5 kg; lognormal variance with pedigree 0.004, pedigree (3,3,2,1,2)
  Based on data received from integrated steel plants in India
- blast oxygen furnace converter: 1.46838e-12 unit; lognormal variance with pedigree 0.2934, pedigree (3,3,2,1,2)
  EcoSpold01Location=RER
  Based on ecoinvent dataset for steel production, converter, unalloyed, GLO
- liquefied petroleum gas: 1.57582e-5 kg; lognormal variance with pedigree 0.004, pedigree (3,3,2,1,2)
  Based on data received from integrated steel plants in India
- pig iron: 0.0545413 kg; lognormal variance with pedigree 0.0034, pedigree (3,3,2,1,2)
  EcoSpold01Location=GLO
  Based on data received from integrated steel plants in India
- ferrosilicon: 1.13183e-5 kg; lognormal variance with pedigree 0.004, pedigree (3,3,2,1,2)
  Based on data received from integrated steel plants in India
- propane: 1.8612e-5 kg; lognormal variance with pedigree 0.004, pedigree (3,3,2,1,2)
  Based on data received from integrated steel plants in India
- iron scrap, sorted, pressed: 0.0154383 kg; lognormal variance with pedigree 0.004, pedigree (3,3,2,1,2)
  Based on data received from integrated steel plants in India
- wastewater, average: -3.18516e-5 m3; lognormal variance with pedigree 0.0434, pedigree (3,3,2,1,2)
  (same comment as for wastewater from pig iron production)
  production volume 2.13664e7 m3
- nickel, 99.5%: 8.67482e-7 kg; lognormal variance with pedigree 0.004, pedigree (3,3,2,1,2)
  Based on data received from integrated steel plants in India
- aluminium, wrought alloy: 0.000130554 kg; lognormal variance with pedigree 0.004, pedigree (3,3,2,1,2)
  Based on data received from integrated steel plants in India
- argon, liquid: 0.00017382 kg; lognormal variance with pedigree 0.004, pedigree (3,3,2,1,2)
  Based on data received from integrated steel plants in India
- electrode, negative, Ni: 7.71455e-6 kg; lognormal variance with pedigree 0.004, pedigree (3,3,2,1,2)
  Based on data received from integrated steel plants in India
- iron pellet: 0.0371704 kg; lognormal variance with pedigree 0.0401, pedigree (1,2,5,1,1)
  EcoSpold01Location=GLO
- iron ore, beneficiated, 65% Fe: 0.0151749 kg; lognormal variance with pedigree 0.0401, pedigree (1,2,5,1,1)
  EcoSpold01Location=GLO
- sinter, iron: 0.0975724 kg; lognormal variance with pedigree 0.0401, pedigree (1,2,5,1,1)
  EcoSpold01Location=GLO
- refractory, fireclay, packed: 0.000185852 kg; lognormal variance with pedigree 0.0402, pedigree (1,2,5,3,1)
  EcoSpold01Location=DE
- limestone, unprocessed: 3.79819e-7, 0.000928881 kg (2 suppliers, which the file names only by identifier); sum of these 0.000929261 kg; lognormal variance with pedigree 0.0402, pedigree (1,2,5,3,1)
  EcoSpold01Location=CH
- sludge, pig iron production: -6.20673e-5, -0.00139917 kg (2 suppliers, which the file names only by identifier); sum of these -0.00146124 kg; lognormal variance with pedigree 0.3413, pedigree (2,3,5,3,1)
  The original value for this exchange was 0.0042553 kg. However, it was recalculated in order to take into account data collected for the geography covering India (IN). The amount from the geography IN has been scaled down based on the annual production volumes of the reference product in the IN and GLO datasets.
  EcoSpold01Location=CH
- hard coal: 0.000579312, 0.000957127, 0.00663789, 0.000937922, 0.000222562, 0.00139833, 0.000730254, 0.000407028, 0.00206848 kg (9 suppliers, which the file names only by identifier); sum of these 0.0139389 kg; lognormal variance with pedigree 0.0402, pedigree (1,2,5,3,1)
  EcoSpold01Location=UCTE
- natural gas, high pressure: 2.71407e-7, 5.14477e-6, 8.56459e-6, 3.82237e-5, 6.99286e-5, 1.18045e-5, 4.20357e-5, 0.000163976 m3 (8 suppliers, which the file names only by identifier); sum of these 0.000339949 m3; lognormal variance with pedigree 0.0402, pedigree (1,2,5,3,1)
  EcoSpold01Location=RER
- inert waste, for final disposal: -1.2469e-5, -0.00207821 kg (2 suppliers, which the file names only by identifier); sum of these -0.00209068 kg; lognormal variance with pedigree 0.0413, pedigree (2,3,5,3,1)
  EcoSpold01Location=CH
  production volume 2.40078e10 kg
- wastewater from pig iron production: -2.60312e-6, -8.70068e-6 m3 (2 suppliers, which the file names only by identifier); sum of these -1.13038e-5 m3; lognormal variance with pedigree 0.0413, pedigree (2,3,5,3,1)
  EcoSpold01Location=CH
  production volume 1.01374e8 m3
- pig iron: 0.0505649 kg; lognormal variance with pedigree 0.0432, pedigree (2,3,5,5,1)
  EcoSpold01Location=GLO
- molybdenite: 3.35127e-5 kg; lognormal variance with pedigree 0.0512, pedigree (2,5,5,5,1)
  EcoSpold01Location=GLO
- quicklime, in pieces, loose: 0.00238779 kg; lognormal variance with pedigree 0.0432, pedigree (2,3,5,5,1)
  EcoSpold01Location=CH
- ferrochromium, high-carbon, 68% Cr: 0.00184579 kg; lognormal variance with pedigree 0.042, pedigree (1,1,5,5,1)
  EcoSpold01Location=GLO
  composite
- ferronickel, 25% Ni: 0.00252824 kg; lognormal variance with pedigree 0.042, pedigree (1,1,5,5,1)
  EcoSpold01Location=GLO
  composite
- electricity, medium voltage: 3.89537e-5, 7.08792e-6, 0.0001202, 0.000249425, 0.000817217 kWh (5 suppliers, which the file names only by identifier); sum of these 0.00123288 kWh; lognormal variance with pedigree 0.0432, pedigree (2,3,5,5,1)
  EcoSpold01Location=UCTE

## Inputs from nature
- Water, cooling, unspecified natural origin [natural resource, in water]: 0.000688984 m3; pedigree (1,1,3,1,1)
  Exchange present due to parent child relationship
- Water, unspecified natural origin [natural resource, in ground]: 6.86245e-5 m3; lognormal variance with pedigree 0.0134, pedigree (3,3,2,1,2)
  Based on data received from integrated steel plants in India
- Water, unspecified natural origin [natural resource, in water]: 0.00021077 m3; lognormal variance with pedigree 0.0134, pedigree (3,3,2,1,2)
  Based on data received from integrated steel plants in India

## Emissions to nature
- Formaldehyde [air, non-urban air or from high stacks]: 0 kg; source Faist Emmenegger, M. 2007, p. Tab. 11.19 p.138; pedigree (4,4,5,3,5)
  Literature value/calculated value. Value from the dataset of natural gas burned in a normal power plant (electricity production, natural gas, GLO 2008).
  Emissions when burning 1MJ of natural gas. Weighted average with electricity production data (Itten&Frischknecht 2012) and emission values of 11 countries
  (AT, BE, DE, ES, FR, GB, IT, JP, LU, NL, US) (Faist Emmenegger et al. 2007, JP and US in the appendix)
  Country emissions values estimate from range of values from different references. See Tab. 11.19, p. 138 in Faist Emmenegger et al. 2007.
  Source:
  Itten R. and Frischknecht R. (2012) Life Cycle Inventories of Electricity Mixes and Grid. ESU-services Ltd., Uster, Switzerland.
- Dioxins, measured as 2,3,7,8-tetrachlorodibenzo-p-dioxin [air, non-urban air or from high stacks]: 0 kg; source Faist Emmenegger, M. 2007, p. Tab. 11.19 p.138; pedigree (4,4,5,3,5)
  Literature value/calculated value. Value overtaken from the dataset of natural gas burned in a normal power plant (electricity production, natural gas, GLO 2008).
  Emissions when burning 1MJ of natural gas. Weighted average with electricity production data (Itten&Frischknecht 2012) and emission values of 11 countries
  (AT, BE, DE, ES, FR, GB, IT, JP, LU, NL, US) (Faist Emmenegger et al. 2007, JP and US in the appendix)
  Country emissions values estimate from range of values from different references. See Tab. 11.19, p. 138 in Faist Emmenegger et al. 2007.
  Source:
  Itten R. and Frischknecht R. (2012) Life Cycle Inventories of Electricity Mixes and Grid. ESU-services Ltd., Uster, Switzerland.
- Pentane [air, non-urban air or from high stacks]: 0 kg; source Faist Emmenegger, M. 2007, p. Tab. 11.19 p.138; pedigree (4,4,5,3,5)
  (same comment as for Dioxins, measured as 2,3,7,8-tetrachlorodibenzo-p-dioxin)
- Acenaphthene [air, non-urban air or from high stacks]: 0 kg; source Faist Emmenegger, M. 2007, p. Tab. 11.19 p.138; pedigree (4,4,5,3,5)
  (same comment as for Dioxins, measured as 2,3,7,8-tetrachlorodibenzo-p-dioxin)
- Acetic acid [air, non-urban air or from high stacks]: 0 kg; source Faist Emmenegger, M. 2007, p. Tab. 11.19 p.138; pedigree (3,4,5,3,5)
  (same comment as for Dioxins, measured as 2,3,7,8-tetrachlorodibenzo-p-dioxin)
- Toluene [air, non-urban air or from high stacks]: 0 kg; source Faist Emmenegger, M. 2007, p. Tab. 11.19 p.138; pedigree (4,4,5,3,5)
  (same comment as for Dioxins, measured as 2,3,7,8-tetrachlorodibenzo-p-dioxin)
- Nitrogen oxides [air, non-urban air or from high stacks]: 0 kg; source Faist Emmenegger, M. 2007, p. Tab. 11.18 p. 135; pedigree (4,3,5,4,4)
  Literature value. Range of values from different references.
- Carbon monoxide, fossil [air, non-urban air or from high stacks]: 0 kg; source Faist Emmenegger, M. 2007, p. Tab. 11.18 p. 135; pedigree (4,3,5,4,4)
  Literature value. Range of values from different references.
- Sulfur dioxide [air, non-urban air or from high stacks]: 0 kg; source Faist Emmenegger, M. 2007, p. Tab. 11.18 p. 135; pedigree (4,3,5,4,4)
  Literature value. Range of values from different references.
- Particulates, < 2.5 um [air, non-urban air or from high stacks]: 0 kg; source Faist Emmenegger, M. 2007, p. Tab. 11.18 p. 135; pedigree (4,3,5,4,4)
  Literature value. Range of values from different references.
- Hexane [air, non-urban air or from high stacks]: 0 kg; source Faist Emmenegger, M. 2007, p. Tab. 11.19 p.138; pedigree (4,4,5,3,5)
  (same comment as for Dioxins, measured as 2,3,7,8-tetrachlorodibenzo-p-dioxin)
- PAH, polycyclic aromatic hydrocarbons [air, non-urban air or from high stacks]: 0 kg; source Faist Emmenegger, M. 2007, p. Tab. 11.19 p.138; pedigree (4,4,5,3,5)
  (same comment as for Dioxins, measured as 2,3,7,8-tetrachlorodibenzo-p-dioxin)
- Benzo(a)pyrene [air, non-urban air or from high stacks]: 0 kg; source Faist Emmenegger, M. 2007, p. Tab. 11.19 p.138; pedigree (4,4,5,3,5)
  (same comment as for Dioxins, measured as 2,3,7,8-tetrachlorodibenzo-p-dioxin)
- Carbon dioxide, fossil [air, non-urban air or from high stacks]: 0 kg; source Faist Emmenegger, M. 2007, p. Tab. 11.18 p. 135; pedigree (4,3,5,4,4)
  Literature value. Range of values from different references.
- Acetaldehyde [air, non-urban air or from high stacks]: 0 kg; source Faist Emmenegger, M. 2007, p. Tab. 11.19 p.138; pedigree (4,4,5,3,5)
  (same comment as for Dioxins, measured as 2,3,7,8-tetrachlorodibenzo-p-dioxin)
- Methane, fossil [air, non-urban air or from high stacks]: 0 kg; source Faist Emmenegger, M. 2007, p. Tab. 11.18 p. 135; pedigree (4,3,5,4,4)
  Literature value. Range of values from different references.
- Ethane [air, non-urban air or from high stacks]: 0 kg; source Faist Emmenegger, M. 2007, p. Tab. 11.19 p.138; pedigree (4,4,5,3,5)
  (same comment as for Dioxins, measured as 2,3,7,8-tetrachlorodibenzo-p-dioxin)
- Propionic acid [air, non-urban air or from high stacks]: 0 kg; source Faist Emmenegger, M. 2007, p. Tab. 11.19 p.138; pedigree (4,4,5,3,5)
  (same comment as for Dioxins, measured as 2,3,7,8-tetrachlorodibenzo-p-dioxin)
- Dinitrogen monoxide [air, non-urban air or from high stacks]: 0 kg; source Faist Emmenegger, M. 2007, p. Tab. 11.18 p. 135; pedigree (4,3,5,4,4)
  Literature value. Range of values from different references.
- Water [air, unspecified]: 0.000403038 m3; pedigree (1,1,3,1,1)
  Exchange present due to parent child relationship
- Benzene [air, non-urban air or from high stacks]: 0 kg; source Faist Emmenegger, M. 2007, p. Tab. 11.19 p.138; pedigree (4,4,5,3,5)
  (same comment as for Dioxins, measured as 2,3,7,8-tetrachlorodibenzo-p-dioxin)
- Butane [air, non-urban air or from high stacks]: 0 kg; source Faist Emmenegger, M. 2007, p. Tab. 11.19 p.138; pedigree (4,4,5,3,5)
  (same comment as for Formaldehyde)
- Propane [air, non-urban air or from high stacks]: 0 kg; source Faist Emmenegger, M. 2007, p. Tab. 11.19 p.138; pedigree (4,4,5,3,5)
  (same comment as for Dioxins, measured as 2,3,7,8-tetrachlorodibenzo-p-dioxin)
- Nickel [air, unspecified]: 2.788e-9 kg; lognormal variance with pedigree 0.6534, pedigree (3,3,2,1,2)
  Based on ecoinvent dataset " pig iron production, GLO" accessed through ecoeditor on 20170815
- Lead [air, unspecified]: 6.87992e-8 kg; lognormal variance with pedigree 0.0134, pedigree (3,3,2,1,2)
  (same comment as for Nickel)
- Manganese [air, unspecified]: 7.96403e-8 kg; lognormal variance with pedigree 0.6534, pedigree (3,3,2,1,2)
  (same comment as for Nickel)
- Particulates, < 2.5 um [air, unspecified]: 1.02497e-5 kg; lognormal variance with pedigree 0.3034, pedigree (3,3,2,1,2)
  (same comment as for Nickel)
- Carbon dioxide, fossil [air, unspecified]: 0.103791 kg; lognormal variance with pedigree 0.0434, pedigree (3,3,2,1,2)
  Based on amount and types of fuel inputs and outputs
- Carbon monoxide, fossil [air, unspecified]: 0.000755114 kg; lognormal variance with pedigree 0.6534, pedigree (3,3,2,1,2)
  (same comment as for Nickel)
- Particulates, > 2.5 um, and < 10um [air, unspecified]: 2.788e-7 kg; lognormal variance with pedigree 0.1234, pedigree (3,3,2,1,2)
  (same comment as for Nickel)
- Hydrogen sulfide [air, unspecified]: 1.87736e-6 kg; lognormal variance with pedigree 0.0434, pedigree (3,3,2,1,2)
  (same comment as for Nickel)
- Particulates, > 10 um [air, unspecified]: 2.788e-7 kg; lognormal variance with pedigree 0.0434, pedigree (3,3,2,1,2)
  (same comment as for Nickel)
- Sulfur dioxide [air, unspecified]: 2.32342e-5 kg; lognormal variance with pedigree 0.0434, pedigree (3,3,2,1,2)
  (same comment as for Nickel)
- Nitrogen oxides [air, unspecified]: 1.5317e-5 kg; lognormal variance with pedigree 0.0434, pedigree (3,3,2,1,2)
  (same comment as for Nickel)
- Dioxins, measured as 2,3,7,8-tetrachlorodibenzo-p-dioxin [air, unspecified]: 3.82368e-15 kg; lognormal variance with pedigree 0.3034, pedigree (3,3,2,1,2)
  (same comment as for Nickel)
- PAH, polycyclic aromatic hydrocarbons [air, unspecified]: 1.32157e-11 kg; lognormal variance with pedigree 0.3034, pedigree (3,3,2,1,2)
  Based on ecoinvent dataset for "steel production, converter, lowalloyed, GLO" accessed through ecoeditor on 20170815
- Chromium [air, unspecified]: 2.03743e-8 kg; lognormal variance with pedigree 0.6534, pedigree (3,3,2,1,2)
  (same comment as for PAH, polycyclic aromatic hydrocarbons)
- Copper [air, unspecified]: 2.75328e-9 kg; lognormal variance with pedigree 0.6534, pedigree (3,3,2,1,2)
  (same comment as for PAH, polycyclic aromatic hydrocarbons)
- Water [air, non-urban air or from high stacks]: 7.44481e-6 m3; lognormal variance with pedigree 0.0094, pedigree (3,3,2,1,2)
  Based on the formula given in ecoinvent dataset " pig iron production, GLO" accessed through ecoeditor on 20170815
- Water [water, unspecified]: 0.000473218 m3; lognormal variance with pedigree 0.130025, pedigree (4,4,5,2,4)
  Calculated value based on literature values and expert opinion. See comments in the parametres' comment field.

## Sampling procedure
Literature and statistics

## Extrapolations
Emission data partly taken over from natural gas power plants.
Emission data partly from old references.
A natural gas power plant is taken as input.

## Review by Carl Vadenbo 2015-05-21
The update of the whole electricity sector for the ecoinvent v3.2 database consist of hundreds of datasets. All these datasets have passed through a streamlined review processes where the underlying modelling of production volumes, technology shares and efficiencies was reviewed in detail prior to the datasets being submitted to the database.
