# marine electric motor construction

Dataset: EcoSpold 2, unit process
Geography: GLO
Time period: 2010-01-01 to 2020-12-31
Technology level: current
Classification: ISIC rev.4 ecoinvent: 0311:Marine fishing
Scenario: Business-as-Usual
System model: Allocation at the point of substitution
Generated by: Angel Avadí
Published in: Avadí, A. 2018
Database: ecoinvent
isCopyrightProtected: true
accessRestrictedTo: 1

## General comment
This dataset represents the construction of electric motors and pumps used in marine applications, per 1000 kg of motor, based on an average electric motor composition.

## Included activities start
Provision of materials, construction of marine electric motors and pumps.

## Included activities end
Metal works as proxy for the construction and assembly of all motor parts. End of life treatment. The Use phase of motors is modelled in the vessel's Use phase.

## Geography
Data based on literature on marine electric motor and pump composition, as well as data from marine engine providers, contractors for vessel maintenance and refurbishing work, shipyard operators. Primary data on motors weight from 143 vessels

## Technology
Peru features various shipyards and relevant ship-building and ship-retrofitting expertise.

## Reference product
- marine electric motor: 1 unit; name product; = (chromium+Al+copper+plastic)/1000; source Pierre Fréon 2014; By-product classification allocatable product; CPC 4611: Electric motors, generators and the like
  Electric motors and pumps, per 1000 kg of product
  production volume 1 unit; name prod_vol
    Unquantifiable
  property price 3730.63 EUR2005; name product_price_EUR2005
    Calculated based on inputs: The price of the product has been calculated as a sum of the values of the material and energy inputs for this product. This value is therefore a rough estimation. It may underestimate the real price since there are additional expenses when producing any product. These expences can include for example labour costs, treatment of waste materials and profit for the producer. Please consider carefully whether this level of data quality is acceptable for your application.
  property lifetime capacity [h] 20000 hour; name product_lifetime_capacity_PMH
  property lifetime 10 year; name product_lifetime
  property true value 3730.63; name product_true_value
    allocation property applied in "true value" allocation // value calculated from revenue

## By-products
- copper: 0 kg; source Rentz O. 1999; By-product classification allocatable product; CPC 41413: Refined copper and copper alloys, unwrought; master alloys of copper
  Literature value. Copper uses: Before end-use copper is manufactured into semi fabricated products, such as shapes and ingots (known as 'semis'). These manufacturing processes are subdivided into hot working, cold working and, if necessary, process annealing. Few of the semis are ready for use as such. They more typically travel to first-stage manufacturers, who make metal rods, wire, and casting, and then to component manufacturers who produce such things as motors, valves, and insulated cables The components in turn are incorporated by final-stage manufacturers into a variety of finished products - automobiles, commercial buildings, residential housing, and so forth. These uses account for about 79% of the world-wide consumption of copper.
  production volume 0.238158 kg
  properties: dry mass 1 kg, water in wet mass 0 kg, wet mass 1 kg, carbon content, non-fossil 0, water content 0, price 5.52 EUR2005, carbon content, fossil 0, carbon content 0, carbon allocation 0 kg, true value 1314.63
- electricity, for reuse in municipal waste incineration only: 0 kWh; CPC 17100: Electrical energy; By-product classification allocatable product; pedigree (1,1,1,1,1)
  Net electricity generated from this waste and used in internal MSWI plant energy redistribution.
  Uncertainty: uncertainty is calculated from uncertainties in waste composition and uncertainties in energy efficiency and the uncertainty in internal energy demand
  production volume 0.0194953 kWh
  property exergy 3.6 MJ; name E_el_prod_MSWI_exergy
    This exergy property is based on the exergy content of the product.
  property true value relation 3.6; name E_el_prod_MSWI_true_value_relation
    property to calculate "true value" from
  property price 0.1 EUR2005; name E_el_prod_MSWI_price_EUR2005
    Estimated to be the same price as in case of electricity, medium voltage.
  property true value 2.29918
    allocation property applied in "true value" allocation // value calculated from true value relation
- heat, for reuse in municipal waste incineration only: 0 MJ; CPC 17300: Steam and hot water; By-product classification allocatable product; pedigree (1,1,1,1,1)
  Net useful heat generated from this waste and used in internal MSWI plant energy redistribution.
  Uncertainty: uncertainty is calculated from uncertainties in waste composition and uncertainties in energy efficiency and the uncertainty in internal energy demand
  production volume 0.1368 MJ
  property true value relation 0.1842; name E_th_prod_MSWI_true_value_relation
    property to calculate "true value" from
  property exergy 0.1842 MJ; name E_th_prod_MSWI_exergy
    This exergy property is based on the exergy content of the product.
  property price 0.0106 EUR2005; name E_th_prod_MSWI_price_EUR2005
    Average European district heat price from Ecoheatcool and Euroheat 2005-2006, Ecoheat Work package 1: The European heat market. Final report. 10.6 EUR/GJ i s the price of district heat. http://www.solarthermalworld.org/files/Ecoheatcool%20WP1%20Web.pdf?download
  property true value 0.825367
    (same comment as for electricity, for reuse in municipal waste incineration only)
- zinc concentrate: 0 kg; CPC 14290: Other non-ferrous metal ores and concentrates (other than uranium or thorium ores and concentrates); By-product classification allocatable product
  Calculated value from the knowledge of the properties of both products.
  production volume 1.17579e-7 kg
  property price 0.38 EUR2005; name ByP_price_EUR2005
    Temporary price data. Calculated as 90% of purchasers price based on: Zinc content in concentrate 53%. Concentrate price per kg Zn 86.5% of refined Zn price (13.5% treatment charges according to CHR Metals Limited 2005: Dynamic cost curves. http://www.minecost.com/dynamic.pdf). 2004 zinc price from USGS (2007) Mineral commodity summaries 2007. <http://minerals.usgs.gov/minerals/pubs/mcs/2007/mcs2007.pdf> [Accessed 25 May 2010]
  property zinc content 0.53; name zinc_C_zinc_concentrate
    Zinc content on a dry matter basis. Value taken from teh "zinc mine operation" /GLO dataset.
  property dry mass 1 kg; name DM_zinc_concentrate
  property carbon content 0
    carbon content on a dry matter basis (reserved; not for manual entry)
  property true value 4.46801e-5
    allocation property applied in "true value" allocation // value calculated from revenue
  properties: wet mass 1 kg, water content 0, carbon content, non-fossil 0, carbon content, fossil 0, water in wet mass 0 kg, carbon allocation 0 kg
- iron scrap, unsorted: 0 kg; source European Aluminium Association 2008; CPC 39310: Slag, dross, scalings and other waste from the manufacture of iron or steel; By-product classification Recyclable; pedigree (1,1,1,1,1)
  Reported as "Iron scrap"
  production volume 0.00688678 kg
  property price 0.149 EUR2005; name ironScrapAmount_price_EUR2005
    Temporary price data. Calculated as 90% of purchasers price based on: estimated at 85% of sorted scrap
  property carbon content 0
    carbon content on a dry matter basis (reserved; not for manual entry)
  property true value 1.02613
    allocation property applied in "true value" allocation // value calculated from revenue
  properties: water content 0, water in wet mass 0 kg, dry mass 1 kg, carbon content, non-fossil 0, wet mass 1 kg, carbon content, fossil 0, carbon allocation 0 kg
- aluminium oxide, non-metallurgical: 0 kg; source European Aluminium Association 2008; CPC 41432: Alumina (aluminium oxide), except artificial corundum; By-product classification allocatable product; CAS 1344-28-1; pedigree (1,1,1,1,1)
  production volume 0.0140188 kg
  property carbon content, non-fossil 0; name C_content_non_fossil
  property price 0.28 EUR2005; name Al2O3Amount_price_EUR2005
    From UN trade database. http://data.un.org/ Import data from the largest economies of the world are used (Brazil, India, USA, China, Japan and EU-27).
  property dry mass 1 kg; name DM
  property water content 0; name water_content
  property wet mass 1 kg; name WM
  property water in wet mass 0 kg; name WWM
  property carbon content, fossil 0; name C_content_fossil
  property carbon content 0
    carbon content on a dry matter basis (reserved; not for manual entry)
  property true value 3.92526
    allocation property applied in "true value" allocation // value calculated from revenue
  properties: carbon allocation 0 kg
- aluminium, cast alloy: 0 kg; source European Aluminium Association 2008; By-product classification allocatable product; CPC 41431: Unwrought aluminium; pedigree (1,1,1,1,1)
  EcoSpold01Location=RER
  production volume 0.131045 kg
  property price 1.3 EUR2005; name castAlloyAmount_price_EUR2005
    Temporary price data. Calculated as 90% of purchasers price based on: Source: London Metal Exchange, Aluminium alloy price for 2005
  property carbon content 0
    carbon content on a dry matter basis (reserved; not for manual entry)
  property true value 170.358
    allocation property applied in "true value" allocation // value calculated from revenue
  properties: water in wet mass 0 kg, carbon content, non-fossil 0, water content 0, dry mass 1 kg, carbon content, fossil 0, wet mass 1 kg, carbon allocation 0 kg
- aluminium, wrought alloy: 0 kg; source European Aluminium Association 2008; By-product classification allocatable product; CPC 4153: Semi-finished products of aluminium or aluminium alloys; pedigree (1,1,1,1,1)
  production volume 0.0573688 kg
  property price 1.44 EUR2005; name secondaryAluminiumOutput_price_EUR2005
    Estimated based on literature values and expert judgement. Aluminium ccast alloys are about 90% of the price of aluminium wrought alloys.
  property carbon content 0
    carbon content on a dry matter basis (reserved; not for manual entry)
  property true value 82.611
    allocation property applied in "true value" allocation // value calculated from revenue
  properties: wet mass 1 kg, water content 0, carbon content, fossil 0, water in wet mass 0 kg, carbon content, non-fossil 0, dry mass 1 kg, carbon allocation 0 kg
- iron scrap, sorted, pressed: 0 kg; By-product classification Recyclable; CPC 39310: Slag, dross, scalings and other waste from the manufacture of iron or steel; pedigree (1,1,1,1,1)
  metallic iron scrap removed from ash reamains and recycled.
  Uncertainty: uncertainty is calculated from uncertainties in waste composition and transfer coefficients to soild residues
  production volume 0.0444096 kg
  property price 0.175 EUR2005
    Temporary price data. Calculated as 90% of purchasers price based on: 2005 import and export prices (total trades (USD) divided by total weight (kg) in biggest economies of the world: EU27, USA, Brasil, China, India, Japan and Russia) from UN Commodity Trade Statistics Database (http://data.un.org/Explorer.aspxDatabase [Accessed 2011.06.20]). Commodity: Waste or scrap, of cast iron
  property carbon content 0
    carbon content on a dry matter basis (reserved; not for manual entry)
  property true value 0.0525622
    allocation property applied in "true value" allocation // value calculated from revenue
  properties: carbon content, non-fossil 0, wet mass 1 kg, dry mass 1 kg, water content 0, carbon content, fossil 0, water in wet mass 0 kg, carbon allocation 0 kg

## Inputs from technosphere
All rows: source Pierre Fréon 2014
- copper scrap, sorted, pressed: -214.43 kg; name Cu_s; = (copper)*-1
  Waste copper wire
  production volume 0.305 kg; = prod_vol * Cu_s / (product*1000)
    Calculated from production volume of reference product using the relative outputs.
  property price 2.84 EUR2005; name Cu_s_price_EUR2005
  properties: wet mass 1 kg, dry mass 1 kg
- extrusion, plastic pipes: 35.1524 kg; = plastic
  Proxy for manufacture of plastic parts
- aluminium scrap, post-consumer: -172.247 kg; name Al_s; = (Al)*-1
  Weste aluminium
  production volume 0.245 kg; = prod_vol * Al_s / (product*1000)
    Calculated from production volume of reference product using the relative outputs.
  property price 0.685 EUR2005; name Al_s_price_EUR2005
  properties: wet mass 1 kg, carbon content, fossil 0.0475, dry mass 1 kg
- aluminium alloy, metal matrix composite: 172.247 kg; name Al; triangular min 172.247, mostLikely 172.247, max 172.247, pedigree (4,2,1,1,1)
  Al alloy for marine electric motor construction
  Uncertainty: Data from 24 motors
  property carbon content, fossil 0.0475; name Al_MMC_C_content_fossil
  property water in wet mass 0 kg; name Al_MMC_WWM
  property dry mass 1 kg; name Al_MMC_DM
  property water content 0; name Al_MMC_water_content
  property carbon content, non-fossil 0; name Al_MMC_C_content_non_fossil
  property wet mass 1 kg; name Al_MMC_WM
- waste plastic, mixture: 0 kg; name plastic_s
  Waste plastic
  production volume 0 kg
    Calculated from production volume of reference product using the relative outputs.
  property price 0 EUR2005; name plastic_s_price_EUR2005
  properties: wet mass 1 kg, dry mass 1 kg, carbon content, fossil 0.857143
- metal working, average for steel product manufacturing: 453.466 kg; = chromium+Al
  Marine electric motor construction
- steel, chromium steel 18/8: 281.219 kg; name chromium; triangular min 281.219, mostLikely 281.219, max 281.219, pedigree (4,2,1,1,1)
  Chromium steel for marine electric motor construction
  Uncertainty: Data from 24 motors
  properties: carbon content, fossil 0.0008, dry mass 1 kg, wet mass 1 kg
  note on carbon content, fossil: Stainless steel model is the grade 304 steel (18/8 stainless, 18% chromium 8% nickel; max. 0.08% C)
- polyethylene, high density, granulate: 35.1524 kg; name plastic; triangular min 35.1524, mostLikely 35.1524, max 35.1524, pedigree (4,2,1,1,1)
  Plastic for marine electric motor construction
  Uncertainty: Data from 24 motors
  property carbon content, fossil 0.857143; name plastic_CCF
  property water content 0; name plastic_WC
  property dry mass 1 kg; name plastic_DM
  property water in wet mass 0 kg; name plastic_WWM
  properties: wet mass 1 kg
  note on carbon content, fossil: Polyethylene is formed out of a huge amount of ethylene monomers (C2H4) (ecoinvent v2.2 report 11_II). MW=28 g/mol
- scrap steel: 0 kg; name Chr_s
  Representing waste chromium steel
  production volume 0 kg
    Calculated from production volume of reference product using the relative outputs.
  property price 0 EUR2005; name Chr_s_price_EUR2005
  properties: wet mass 1 kg, dry mass 1 kg
- wire drawing, copper: 214.43 kg; name copper; triangular min 214.43, mostLikely 214.43, max 214.43, pedigree (4,2,1,1,1)
  Manufacture of copper wire
  Uncertainty: Data from 24 motors
- copper: 214.43 kg; = copper
  Copper for marine electric motor construction, 50% recycled
  properties: dry mass 1 kg, wet mass 1 kg
- waste plastic, mixture: -3.38359, -0.260855, -0.107742, -0.102311, -3.90406, -0.0435266, -0.019728, -27.3306 kg (8 entries)
  Waste plastic
  production volume 0.05 kg
- scrap steel: -68.4756, -0.0865702, -212.657 kg (3 entries)
  Representing waste chromium steel
  production volume 0.4 kg
