# treatment of waste polyethylene, open dump, hyperarid infiltration class (-250mm)

Dataset: EcoSpold 2, unit process
Geography: GLO
Time period: 2006-01-01 to 2019-12-31
Technology level: current
Classification: ISIC rev.4 ecoinvent: 3821:Treatment and disposal of non-hazardous waste
Synonyms: municipal waste landfill
Scenario: Business-as-Usual
System model: Allocation at the point of substitution
Share of production covered: 1 %
Generated by: Avraam Symeonidis
Database: ecoinvent
isCopyrightProtected: true
accessRestrictedTo: 1

## General comment
This dataset represents the activity of waste disposal of waste polyethylene in a open dump. Recommended use of this dataset: For PE, which goes to disposal as part of unmanaged communal waste mixture. // Waste composition (wet, in ppm): upper heating value 42.82 MJ/kg; lower heating value 42.47 MJ/kg; H2O 4000; O 38435; H 122490; C 822050; S 426.9; N 1297.2; P n.a.; B n.a.; Cl 1461.5; Br 9.5896; F 14.384; I n.a.; Ag n.a.; As 1.822; Ba 239.74; Cd 33.946; Co 1.6782; Cr 12.466; Cu 41.367; Hg 0.047948; Mn 30.047; Mo n.a.; Ni 0.95896; Pb 22.596; Sb 10.069; Se 2.0138; Sn 3.814; V 2205.6; Zn 342.01; Be 0.47948; Sc n.a.; Sr 84.868; Ti 958.96; Tl 0.38358; W n.a.; Si n.a.; Fe 1534.3; Ca 2589.2; Al 191.79; K n.a.; Mg 95.896; Na 1405.4; . // Share of carbon in waste that is biogenic 0%. Share of metals in waste not oxidised and bulk-recyclable (exclude very small or thin parts) Iron: 0%; Alu: 0%; Copper: 0%. Overall degradability of waste during 100 years: 1%.

## Included activities start
from final waste deposition (without transports to the site)

## Included activities end
Waste-specific short-term emissions to air via landfill gas and landfill leachate. Waste-specific long-term emissions from landfill.

## Geography
Given name of landfill location is 'infiltration class 1 hyperarid (2018)'. Landfill site with mean annual temperature (MAT) of 8 degC, mean annual precipitation (MAP) of 350 mm/year, and net infiltration of -250 mm/year. Negative infiltration means that leachate flow is reversed and flows upward to the surface, where water is evaporated and dissolved solids become solid evaporites.
Climate adjustments result in an alpha t (temperature) for permafrost areas of 0.999. Total climate adjustments with alpha pt of 0.999.

## Technology
This is an inventory for an open, uncontrolled waste dump for municipal solid waste. Ultimate average landfill height is 7 meters. Operation phase duration is 15 years.Percentage of landfill gas directly emitted is 100w%. A Methane Correction Factor (MCF) for landfill air emissions of 0.7057 is employed.
Leachate of the landfill is not treated. Leachate flow is upward to the surface due to net negative infiltration. No leachate treatment can be performed. Based on average waste composition and climate data the end of carbonate phase is estimated to be reached 3171 years after waste deposition. Arid conditions at this location prompt formation of evaporites from landfill contents which are partially eroded by wind. It is assumed that 10% of these evaporites are eroded by wind and airborne. Initial decay in the first 100 years of this waste results in a wind erosion rate corresponding to 3.712 g/m2.year and long-term decay corresponds to wind erosion of 11.56 g/m2.year.

## Reference product
- waste polyethylene: -1 kg; CPC 39270: Waste, parings and scrap of plastics; By-product classification Waste; CAS 9002-88-4; pedigree (1,1,1,1,1)
  main reference product of this activity (supply of disposal service).
  Uncertainty: Uncertainty is not adjusted, as this is the refence product
  production volume 1 kg
    The amount of the annual production volume is a placeholder value. The contribution of this technology to the different local markets can be found in the markets themselves.
  property price 0 EUR2005
    Waste products are assigned a price of zero as they are assumed to require further treatment.
  property carbon content 0.82535
    carbon content on a dry matter basis (reserved; not for manual entry)
  properties: antimony content 1.011e-5, zinc content 0.00034338, lead content 2.2687e-5, strontium content 8.5209e-5, cadmium content 3.4082e-5, bromine content 9.6281e-6, sulfur content 0.00042861, oxygen content 0.03859, heating value, net 42.474 MJ, titanium content 0.00096281, vanadium content 0.0022145, barium content 0.0002407, fluorine content 1.4442e-5, arsenic content 1.8293e-6, hydrogen content 0.12298, tin content 3.8294e-6, mercury content 4.8141e-8, heating value, gross 42.823 MJ, manganese content 3.0168e-5, chlorine content 0.0014674, thallium content 3.8512e-7, selenium content 2.0219e-6, cobalt content 1.6849e-6, chromium content 1.2517e-5, water in wet mass 0.004 kg, iron content 0.0015405, dry mass 0.996 kg, magnesium content 9.6281e-5, wet mass 1 kg, aluminium content 0.00019256, calcium content 0.0025996, water content 0.0040161, carbon content, fossil 0.82535, sodium content 0.001411, nitrogen content 0.0013024, nickel content 9.6281e-7, beryllium content 4.8141e-7, copper content 4.1533e-5, carbon allocation 0.822049 kg

## Emissions to nature
- Hydrogen fluoride [air, non-urban air or from high stacks]: 5.8323e-8 kg; lognormal variance with pedigree 0.4196, pedigree (1,1,3,1,1)
  burden from direct release or incineration of landfill biogas; or windblown leachate evaporite in arid climates.
  Uncertainty: Uncertainty calculated from unertainty of the waste composition of this waste, uncertainty in waste decomposition and short-term leaching in landfill
- Chromium [soil, industrial]: 3.7677e-8 kg; lognormal variance with pedigree 2.3639, pedigree (1,1,3,1,1)
  burden from leachate evaporite in arid climates deposited on landflill surface.
  Uncertainty: Uncertainty calculated from unertainty of the waste composition of this waste, uncertainty in waste decomposition and short-term leaching in landfill
- Strontium [air, low population density, long-term]: 8.4819e-6 kg; lognormal variance with pedigree 0.24797, pedigree (1,1,3,1,1)
  burden from windblown long-term leachate evaporite in arid climates.
  Uncertainty: Uncertainty calculated from unertainty of the waste composition of this waste, uncertainty in waste decomposition and short-term leaching in landfill
- Barium [air, non-urban air or from high stacks]: 2.7492e-7 kg; lognormal variance with pedigree 0.29912, pedigree (1,1,3,1,1)
  (same comment as for Hydrogen fluoride)
- Copper [soil, industrial]: 3.7231e-5 kg; lognormal variance with pedigree 0.27185, pedigree (1,1,3,1,1)
  (same comment as for Chromium)
- Antimony [air, low population density, long-term]: 7.3292e-8 kg; lognormal variance with pedigree 0.74777, pedigree (1,1,3,1,1)
  (same comment as for Strontium)
- Bromine [air, non-urban air or from high stacks]: 2.75e-8 kg; lognormal variance with pedigree 0.33292, pedigree (1,1,3,1,1)
  (same comment as for Hydrogen fluoride)
- Manganese [soil, industrial]: 2.7043e-5 kg; lognormal variance with pedigree 0.27797, pedigree (1,1,3,1,1)
  (same comment as for Chromium)
- Lead [air, low population density, long-term]: 2.2595e-6 kg; lognormal variance with pedigree 0.29198, pedigree (1,1,3,1,1)
  (same comment as for Strontium)
- Nitrate [air, non-urban air or from high stacks]: 1.3408e-5 kg; lognormal variance with pedigree 0.22467, pedigree (1,1,3,1,1)
  burden from windblown leachate evaporite in arid climates.
  Uncertainty: Uncertainty calculated from unertainty of the waste composition of this waste, uncertainty in waste decomposition and short-term leaching in landfill
- Mercury [soil, industrial]: 4.3141e-8 kg; lognormal variance with pedigree 0.48204, pedigree (1,1,3,1,1)
  (same comment as for Chromium)
- Selenium [air, low population density, long-term]: 4.2464e-8 kg; lognormal variance with pedigree 0.52299, pedigree (1,1,3,1,1)
  (same comment as for Strontium)
- Hydrogen chloride [air, non-urban air or from high stacks]: 4.2058e-6 kg; lognormal variance with pedigree 0.18193, pedigree (1,1,3,1,1)
  (same comment as for Hydrogen fluoride)
- Barium [soil, industrial]: 0.00021577 kg; lognormal variance with pedigree 0.20961, pedigree (1,1,3,1,1)
  (same comment as for Chromium)
- Tin [air, low population density, long-term]: 3.8138e-7 kg; lognormal variance with pedigree 0.35071, pedigree (1,1,3,1,1)
  (same comment as for Strontium)
- Sulfate [air, non-urban air or from high stacks]: 4.7634e-7 kg; lognormal variance with pedigree 0.31567, pedigree (1,1,3,1,1)
  (same comment as for Nitrate)
- Cadmium [soil, industrial]: 3.0551e-5 kg; lognormal variance with pedigree 0.27767, pedigree (1,1,3,1,1)
  (same comment as for Chromium)
- Vanadium [air, low population density, long-term]: 4.8122e-5 kg; lognormal variance with pedigree 0.28565, pedigree (1,1,3,1,1)
  (same comment as for Strontium)
- Nitrogen oxides [air, non-urban air or from high stacks]: 1.7769e-8 kg; lognormal variance with pedigree 0.31689, pedigree (1,1,3,1,1)
  burden from direct release or incineration of landfill biogas.
  Uncertainty: Uncertainty calculated from unertainty of the waste composition of this waste, uncertainty in waste decomposition and short-term leaching in landfill
- Cobalt [soil, industrial]: 1.5104e-6 kg; lognormal variance with pedigree 0.37594, pedigree (1,1,3,1,1)
  (same comment as for Chromium)
- Nickel [air, low population density, long-term]: 9.584e-8 kg; lognormal variance with pedigree 0.39571, pedigree (1,1,3,1,1)
  (same comment as for Strontium)
- Particulates, > 2.5 um, and < 10um [air, non-urban air or from high stacks]: 1.591e-5 kg; lognormal variance with pedigree 0.15471, pedigree (1,1,3,1,1)
  (same comment as for Hydrogen fluoride)
- Arsenic [soil, industrial]: 1.6398e-6 kg; lognormal variance with pedigree 0.37394, pedigree (1,1,3,1,1)
  (same comment as for Chromium)
- Mercury [air, low population density, long-term]: 4.7902e-9 kg; lognormal variance with pedigree 0.48245, pedigree (1,1,3,1,1)
  (same comment as for Strontium)
- Sulfur dioxide [air, non-urban air or from high stacks]: 5.5642e-7 kg; lognormal variance with pedigree 0.37149, pedigree (1,1,3,1,1)
  (same comment as for Nitrogen oxides)
- Chloride [soil, industrial]: 0.0013149 kg; lognormal variance with pedigree 0.14776, pedigree (1,1,3,1,1)
  (same comment as for Chromium)
- Manganese [air, low population density, long-term]: 2.9704e-6 kg; lognormal variance with pedigree 0.28251, pedigree (1,1,3,1,1)
  (same comment as for Strontium)
- Particulates, < 2.5 um [air, non-urban air or from high stacks]: 1.0607e-5 kg; lognormal variance with pedigree 0.20012, pedigree (1,1,3,1,1)
  (same comment as for Hydrogen fluoride)
- Bromine [soil, industrial]: 8.6276e-6 kg; lognormal variance with pedigree 0.31025, pedigree (1,1,3,1,1)
  (same comment as for Chromium)
- Cobalt [air, low population density, long-term]: 1.6728e-7 kg; lognormal variance with pedigree 0.37754, pedigree (1,1,3,1,1)
  (same comment as for Strontium)
- Occupation, dump site [natural resource, land]: 0.0035714 m2*year; lognormal variance with pedigree 0.082256, pedigree (1,1,3,1,1)
  for landfill operation phase and spontaneous renaturation.
  Uncertainty: Uncertainty calculated from uncertainty in base parameters.
- Fluoride [soil, industrial]: 1.2897e-5 kg; lognormal variance with pedigree 0.30658, pedigree (1,1,3,1,1)
  (same comment as for Chromium)
- Cadmium [air, low population density, long-term]: 3.3886e-6 kg; lognormal variance with pedigree 0.27846, pedigree (1,1,3,1,1)
  (same comment as for Strontium)
- Carbon dioxide, fossil [air, non-urban air or from high stacks]: 0.017688 kg; lognormal variance with pedigree 0.095232, pedigree (1,1,3,1,1)
  (same comment as for Nitrogen oxides)
- Nitrogen [soil, industrial]: 0.0011656 kg; lognormal variance with pedigree 0.15192, pedigree (1,1,3,1,1)
  (same comment as for Chromium)
- Copper [air, low population density, long-term]: 4.1365e-6 kg; lognormal variance with pedigree 0.27188, pedigree (1,1,3,1,1)
  (same comment as for Strontium)
- Particulates, > 10 um [air, non-urban air or from high stacks]: 2.6517e-5 kg; lognormal variance with pedigree 0.13496, pedigree (1,1,3,1,1)
  (same comment as for Hydrogen fluoride)
- Heat, waste [soil, industrial]: 0.36143 MJ; lognormal variance with pedigree 0.055228, pedigree (1,1,3,1,1)
  burden from short-term decomposition of waste (0-100a).
  Uncertainty: Uncertainty calculated from unertainty of the waste composition of this waste, uncertainty in waste decomposition and short-term leaching in landfill
- Chromium [air, low population density, long-term]: 4.0444e-9 kg; lognormal variance with pedigree 2.3644, pedigree (1,1,3,1,1)
  (same comment as for Strontium)
- Methane, fossil [air, non-urban air or from high stacks]: 0.0041963 kg; lognormal variance with pedigree 0.10536, pedigree (1,1,3,1,1)
  (same comment as for Nitrogen oxides)
- Heat, waste [water, ground-, long-term]: 42.395 MJ; lognormal variance with pedigree 0.014651, pedigree (1,1,3,1,1)
  burden from long-term decomposition of waste (>100a).
  Uncertainty: Uncertainty calculated from unertainty of the waste composition of this waste, uncertainty in waste decomposition and short-term leaching in landfill
- Arsenic [air, low population density, long-term]: 1.8187e-7 kg; lognormal variance with pedigree 0.37487, pedigree (1,1,3,1,1)
  (same comment as for Strontium)
- Sulfur [soil, industrial]: 0.00038396 kg; lognormal variance with pedigree 0.19308, pedigree (1,1,3,1,1)
  (same comment as for Chromium)
- Bromine [air, low population density, long-term]: 9.345e-7 kg; lognormal variance with pedigree 0.32038, pedigree (1,1,3,1,1)
  (same comment as for Strontium)
- Carbon [soil, industrial]: 0.73267 kg; lognormal variance with pedigree 0.00230648, pedigree (1,1,3,1,1)
  (same comment as for Chromium)
- Hydrogen fluoride [air, low population density, long-term]: 1.4319e-6 kg; lognormal variance with pedigree 0.30695, pedigree (1,1,3,1,1)
  (same comment as for Strontium)
- Aluminium [air, non-urban air or from high stacks]: 9.5994e-9 kg; lognormal variance with pedigree 0.40501, pedigree (1,1,3,1,1)
  (same comment as for Hydrogen fluoride)
- Barium [air, low population density, long-term]: 2.37e-5 kg; lognormal variance with pedigree 0.21345, pedigree (1,1,3,1,1)
  (same comment as for Strontium)
- Magnesium [air, non-urban air or from high stacks]: 5.9251e-8 kg; lognormal variance with pedigree 0.34802, pedigree (1,1,3,1,1)
  (same comment as for Hydrogen fluoride)
- Nitrate [air, low population density, long-term]: 0.00056014 kg; lognormal variance with pedigree 0.15796, pedigree (1,1,3,1,1)
  (same comment as for Strontium)
- Sodium [air, non-urban air or from high stacks]: 5.8232e-6 kg; lognormal variance with pedigree 0.20555, pedigree (1,1,3,1,1)
  (same comment as for Hydrogen fluoride)
- Hydrogen chloride [air, low population density, long-term]: 0.00014243 kg; lognormal variance with pedigree 0.15409, pedigree (1,1,3,1,1)
  (same comment as for Strontium)
- Strontium [air, non-urban air or from high stacks]: 4.9403e-9 kg; lognormal variance with pedigree 0.42714, pedigree (1,1,3,1,1)
  (same comment as for Hydrogen fluoride)
- Sulfate [air, low population density, long-term]: 0.00012751 kg; lognormal variance with pedigree 0.19435, pedigree (1,1,3,1,1)
  (same comment as for Strontium)
- Calcium [air, non-urban air or from high stacks]: 3.3756e-7 kg; lognormal variance with pedigree 0.28898, pedigree (1,1,3,1,1)
  (same comment as for Hydrogen fluoride)
- Sodium [soil, industrial]: 0.0012648 kg; lognormal variance with pedigree 0.14532, pedigree (1,1,3,1,1)
  (same comment as for Chromium)
- Thallium [air, non-urban air or from high stacks]: 2.2329e-11 kg; lognormal variance with pedigree 0.6042, pedigree (1,1,3,1,1)
  (same comment as for Hydrogen fluoride)
- Particulates, > 10 um [air, low population density, long-term]: 0.049474 kg; lognormal variance with pedigree 0.057332, pedigree (1,1,3,1,1)
  (same comment as for Strontium)
- Iron [air, non-urban air or from high stacks]: 2.1101e-8 kg; lognormal variance with pedigree 0.37928, pedigree (1,1,3,1,1)
  (same comment as for Hydrogen fluoride)
- Particulates, < 2.5 um [air, low population density, long-term]: 0.01979 kg; lognormal variance with pedigree 0.12249, pedigree (1,1,3,1,1)
  (same comment as for Strontium)
- Titanium [air, non-urban air or from high stacks]: 4.7997e-8 kg; lognormal variance with pedigree 0.35202, pedigree (1,1,3,1,1)
  (same comment as for Hydrogen fluoride)
- Particulates, > 2.5 um, and < 10um [air, low population density, long-term]: 0.029684 kg; lognormal variance with pedigree 0.077085, pedigree (1,1,3,1,1)
  (same comment as for Strontium)
- Vanadium [air, non-urban air or from high stacks]: 2.3289e-7 kg; lognormal variance with pedigree 0.30088, pedigree (1,1,3,1,1)
  (same comment as for Hydrogen fluoride)
- Calcium [soil, industrial]: 0.0023303 kg; lognormal variance with pedigree 0.13535, pedigree (1,1,3,1,1)
  (same comment as for Chromium)
- Zinc [air, non-urban air or from high stacks]: 1.6218e-8 kg; lognormal variance with pedigree 0.38779, pedigree (1,1,3,1,1)
  (same comment as for Hydrogen fluoride)
- Magnesium [soil, industrial]: 8.6306e-5 kg; lognormal variance with pedigree 0.24156, pedigree (1,1,3,1,1)
  (same comment as for Chromium)
- Beryllium [air, non-urban air or from high stacks]: 2.7911e-11 kg; lognormal variance with pedigree 0.59705, pedigree (1,1,3,1,1)
  (same comment as for Hydrogen fluoride)
- Iron [soil, industrial]: 0.0013809 kg; lognormal variance with pedigree 0.15245, pedigree (1,1,3,1,1)
  (same comment as for Chromium)
- Selenium [air, non-urban air or from high stacks]: 2.1263e-10 kg; lognormal variance with pedigree 0.53126, pedigree (1,1,3,1,1)
  (same comment as for Hydrogen fluoride)
- Aluminium [soil, industrial]: 0.00017261 kg; lognormal variance with pedigree 0.22064, pedigree (1,1,3,1,1)
  (same comment as for Chromium)
- Antimony [air, non-urban air or from high stacks]: 1.0632e-9 kg; lognormal variance with pedigree 0.47846, pedigree (1,1,3,1,1)
  (same comment as for Hydrogen fluoride)
- Strontium [soil, industrial]: 7.6381e-5 kg; lognormal variance with pedigree 0.24771, pedigree (1,1,3,1,1)
  (same comment as for Chromium)
- Lead [air, non-urban air or from high stacks]: 1.3342e-10 kg; lognormal variance with pedigree 0.54597, pedigree (1,1,3,1,1)
  (same comment as for Hydrogen fluoride)
- Titanium [soil, industrial]: 0.00086306 kg; lognormal variance with pedigree 0.16759, pedigree (1,1,3,1,1)
  (same comment as for Chromium)
- Tin [air, non-urban air or from high stacks]: 2.2503e-11 kg; lognormal variance with pedigree 0.60523, pedigree (1,1,3,1,1)
  (same comment as for Hydrogen fluoride)
- Thallium [soil, industrial]: 3.4523e-7 kg; lognormal variance with pedigree 0.42489, pedigree (1,1,3,1,1)
  (same comment as for Chromium)
- Sodium [air, low population density, long-term]: 0.00013473 kg; lognormal variance with pedigree 0.15538, pedigree (1,1,3,1,1)
  (same comment as for Strontium)
- Mercury [air, non-urban air or from high stacks]: 1.6402e-11 kg; lognormal variance with pedigree 0.60147, pedigree (1,1,3,1,1)
  (same comment as for Hydrogen fluoride)
- Vanadium [soil, industrial]: 0.00043519 kg; lognormal variance with pedigree 0.28397, pedigree (1,1,3,1,1)
  (same comment as for Chromium)
- Magnesium [air, low population density, long-term]: 9.5305e-6 kg; lognormal variance with pedigree 0.2439, pedigree (1,1,3,1,1)
  (same comment as for Strontium)
- Nickel [air, non-urban air or from high stacks]: 5.5822e-11 kg; lognormal variance with pedigree 0.57471, pedigree (1,1,3,1,1)
  (same comment as for Hydrogen fluoride)
- Tin [soil, industrial]: 3.4326e-6 kg; lognormal variance with pedigree 0.35068, pedigree (1,1,3,1,1)
  (same comment as for Chromium)
- Aluminium [air, low population density, long-term]: 1.917e-5 kg; lognormal variance with pedigree 0.22085, pedigree (1,1,3,1,1)
  (same comment as for Strontium)
- Copper [air, non-urban air or from high stacks]: 2.029e-10 kg; lognormal variance with pedigree 0.53234, pedigree (1,1,3,1,1)
  (same comment as for Hydrogen fluoride)
- Zinc [soil, industrial]: 0.00030781 kg; lognormal variance with pedigree 0.20149, pedigree (1,1,3,1,1)
  (same comment as for Chromium)
- Calcium [air, low population density, long-term]: 0.00025858 kg; lognormal variance with pedigree 0.13571, pedigree (1,1,3,1,1)
  (same comment as for Strontium)
- Manganese [air, non-urban air or from high stacks]: 3.4457e-8 kg; lognormal variance with pedigree 0.36803, pedigree (1,1,3,1,1)
  (same comment as for Hydrogen fluoride)
- Beryllium [soil, industrial]: 4.3153e-7 kg; lognormal variance with pedigree 0.41773, pedigree (1,1,3,1,1)
  (same comment as for Chromium)
- Iron [air, low population density, long-term]: 0.00015341 kg; lognormal variance with pedigree 0.1525, pedigree (1,1,3,1,1)
  (same comment as for Strontium)
- Chromium [air, non-urban air or from high stacks]: 1.4228e-10 kg; lognormal variance with pedigree 0.54441, pedigree (1,1,3,1,1)
  (same comment as for Hydrogen fluoride)
- Lead [soil, industrial]: 2.0336e-5 kg; lognormal variance with pedigree 0.29194, pedigree (1,1,3,1,1)
  (same comment as for Chromium)
- Thallium [air, low population density, long-term]: 3.8336e-8 kg; lognormal variance with pedigree 0.42523, pedigree (1,1,3,1,1)
  (same comment as for Strontium)
- Cobalt [air, non-urban air or from high stacks]: 5.4009e-10 kg; lognormal variance with pedigree 0.50163, pedigree (1,1,3,1,1)
  (same comment as for Hydrogen fluoride)
- Nickel [soil, industrial]: 8.6306e-7 kg; lognormal variance with pedigree 0.39538, pedigree (1,1,3,1,1)
  (same comment as for Chromium)
- Titanium [air, low population density, long-term]: 9.5848e-5 kg; lognormal variance with pedigree 0.16777, pedigree (1,1,3,1,1)
  (same comment as for Strontium)
- Cadmium [air, non-urban air or from high stacks]: 6.3634e-9 kg; lognormal variance with pedigree 0.39161, pedigree (1,1,3,1,1)
  (same comment as for Hydrogen fluoride)
- Selenium [soil, industrial]: 3.8408e-7 kg; lognormal variance with pedigree 0.52077, pedigree (1,1,3,1,1)
  (same comment as for Chromium)
- Beryllium [air, low population density, long-term]: 4.792e-8 kg; lognormal variance with pedigree 0.41807, pedigree (1,1,3,1,1)
  (same comment as for Strontium)
- Arsenic [air, non-urban air or from high stacks]: 3.7268e-10 kg; lognormal variance with pedigree 0.4596, pedigree (1,1,3,1,1)
  (same comment as for Hydrogen fluoride)
- Antimony [soil, industrial]: 6.6917e-7 kg; lognormal variance with pedigree 0.74377, pedigree (1,1,3,1,1)
  (same comment as for Chromium)
- Zinc [air, low population density, long-term]: 3.4184e-5 kg; lognormal variance with pedigree 0.20167, pedigree (1,1,3,1,1)
  (same comment as for Strontium)

## Extrapolations
This dataset has been extrapolated from year 2012 to the year of the calculation (2019). The uncertainty has been adjusted accordingly.
