# treatment of hard coal ash, residual material landfill

Dataset: EcoSpold 2, unit process
Geography: SK
Time period: 1994-01-01 to 2019-12-31
Technology level: current
Classification: EcoSpold01Categories: waste management/residual material landfill
Classification: ISIC rev.4 ecoinvent: 3822:Treatment and disposal of hazardous waste
Tags: Treatment; ConvertedDataset
Scenario: Business-as-Usual
System model: Allocation at the point of substitution
Generated by: Gabor Doka (obsolete)
Published in: Doka G. 2009
Database: ecoinvent
isCopyrightProtected: true
accessRestrictedTo: 1

## General comment
Inventoried waste contains 100% SK hard coal ash; .
waste composition (wet, in ppm): H2O n.a.; O 704100; H n.a.; C n.a.; S 2598.8; N n.a.; P 461.39; B 251.99; Cl 36.068; Br 28.502; F 31.61; I 2.5825; Ag n.a.; As 20.205; Ba 1125.8; Cd 1.404; Co 25.356; Cr 118.11; Cu 60.362; Hg 0.053913; Mn 656.88; Mo 9.8214; Ni 90.617; Pb 90.925; Sb 5.1656; Se 4.145; Sn 176.44; V 164.35; Zn 109.95; Be 6.269; Sc 23.632; Sr 929.16; Ti 6773; Tl 3.2285; W 3.291; Si 116940; Fe 28772; Ca 9842.9; Al 81959; K 8916.9; Mg 29425; Na 6231.3;
Share of carbon in waste that is biogenic 60.4%.
[This dataset was already contained in the ecoinvent database version 2. It was not individually updated during the transfer to ecoinvent version 3. Life Cycle Impact Assessment results may still have changed, as they are affected by changes in the supply chain, i.e. in other datasets. This dataset was generated following the ecoinvent quality guidelines for version 2. It may have been subject to central changes described in the ecoinvent version 3 change report (http://www.ecoinvent.org/database/ecoinvent-version-3/reports-of-changes/), and the results of the central updates were reviewed extensively. The changes added e.g. consistent water flows and other information throughout the database. The documentation of this dataset can be found in the ecoinvent reports of version 2, which are still available via the ecoinvent website. The change report linked above covers all central changes that were made during the conversion process.]

## Included activities end
Waste-specific short-term emissions to water from leachate. Long-term emissions from landfill to ground water.

## Geography
Technology encountered in Switzerland in 2000. Landfill includes base seal and leachate collection system.

## Technology
Swiss residual material landfill for polluted, inorganic waste. With base seal and leachate collection system. Recultivation after closure.

## Time period
Waste composition as given in literature reference, theoretical data or other source. Transfer coefficients from prospective model.

## Reference product
- hard coal ash: -1 kg; CPC 39: Wastes or scraps; By-product classification Waste
  EcoSpold01Location=SK
  production volume 7.32708e7 kg
    Estimated. Energy prodcution in mainly responsible for hard coal ashes. The production volume is calculated as the sum of hard coal ashes resulting from electricity and heat and power co-generation production from hard coal in the respective country.
  property price 0 EUR2005
    Waste products are assigned a price of zero as they are assumed to require further treatment.
  property carbon content 0
    carbon content on a dry matter basis (reserved; not for manual entry)
  properties: water in wet mass 0 kg, dry mass 1 kg, carbon content, non-fossil 0, wet mass 1 kg, water content 0, carbon content, fossil 0, carbon allocation 0 kg

## Inputs from technosphere
- process-specific burdens, residual material landfill: 1 kg; lognormal variance with pedigree 0.04, pedigree (1,1,5,1,1)
  demands per kilogram waste. uncertainty is heeded in the module;activityLink introduced to establish a direct link to the corresponding regional supply of this product
  EcoSpold01Location=CH
- residual material landfill: 2.0833e-9 unit; lognormal variance with pedigree 0.04, pedigree (1,1,5,1,1)
  demands per kilogram waste. uncertainty is heeded in the module
  EcoSpold01Location=CH

## Emissions to nature
- Arsenic, ion [water, surface water]: 2.0205e-5 kg; lognormal variance with pedigree 1.21, pedigree (1,1,5,1,1)
  uncertainty is calculated from uncertainties in waste composition and transfer coefficients in residual landfill
- Tin, ion [water, ground-, long-term]: 3.3433e-6 kg; lognormal variance with pedigree 4.86, pedigree (1,1,5,1,1)
  uncertainty is calculated from uncertainties in waste composition and transfer coefficients in incinerator and landfills.
- Boron [water, surface water]: 1.9743e-6 kg; lognormal variance with pedigree 1.27, pedigree (1,1,5,1,1)
  (same comment as for Arsenic, ion)
- Chromium VI [water, surface water]: 7.0999e-6 kg; lognormal variance with pedigree 1.15, pedigree (1,1,5,1,1)
  (same comment as for Arsenic, ion)
- Beryllium [water, surface water]: 3.789e-9 kg; lognormal variance with pedigree 2.09, pedigree (1,1,5,1,1)
  (same comment as for Arsenic, ion)
- Thallium [water, surface water]: 1.9513e-9 kg; lognormal variance with pedigree 2.18, pedigree (1,1,5,1,1)
  (same comment as for Arsenic, ion)
- Tungsten [water, surface water]: 1.1606e-6 kg; lognormal variance with pedigree 1.48, pedigree (1,1,5,1,1)
  (same comment as for Arsenic, ion)
- Iodide [water, ground-, long-term]: 2.5825e-13 kg; lognormal variance with pedigree 1.51, pedigree (1,1,5,1,1)
  (same comment as for Tin, ion)
- Magnesium [water, ground-, long-term]: 0.0033434 kg; lognormal variance with pedigree 1.47, pedigree (1,1,5,1,1)
  (same comment as for Tin, ion)
- Tungsten [water, ground-, long-term]: 2.1304e-6 kg; lognormal variance with pedigree 1.46, pedigree (1,1,5,1,1)
  (same comment as for Tin, ion)
- Scandium [water, surface water]: 3.3352e-6 kg; lognormal variance with pedigree 1.29, pedigree (1,1,5,1,1)
  (same comment as for Arsenic, ion)
- Phosphate [water, ground-, long-term]: 0.00031606 kg; lognormal variance with pedigree 1.36, pedigree (1,1,5,1,1)
  (same comment as for Tin, ion)
- Scandium [water, ground-, long-term]: 2.0297e-5 kg; lognormal variance with pedigree 1.2, pedigree (1,1,5,1,1)
  (same comment as for Tin, ion)
- Antimony [water, surface water]: 1.8217e-6 kg; lognormal variance with pedigree 1.42, pedigree (1,1,5,1,1)
  (same comment as for Arsenic, ion)
- Iodide [water, surface water]: 2.5825e-6 kg; lognormal variance with pedigree 1.49, pedigree (1,1,5,1,1)
  (same comment as for Arsenic, ion)
- Chromium VI [water, ground-, long-term]: 2.2428e-5 kg; lognormal variance with pedigree 0.99, pedigree (1,1,5,1,1)
  (same comment as for Tin, ion)
- Vanadium, ion [water, ground-, long-term]: 0.00012632 kg; lognormal variance with pedigree 0.95, pedigree (1,1,5,1,1)
  (same comment as for Tin, ion)
- Manganese [water, ground-, long-term]: 5.426e-6 kg; lognormal variance with pedigree 6.5, pedigree (1,1,5,1,1)
  (same comment as for Tin, ion)
- Copper, ion [water, surface water]: 3.8792e-9 kg; lognormal variance with pedigree 2.08, pedigree (1,1,5,1,1)
  (same comment as for Arsenic, ion)
- Lead [water, ground-, long-term]: 4.7164e-7 kg; lognormal variance with pedigree 7.94, pedigree (1,1,5,1,1)
  (same comment as for Tin, ion)
- Sulfate [water, surface water]: 0.00083645 kg; lognormal variance with pedigree 0.69, pedigree (1,1,5,1,1)
  (same comment as for Arsenic, ion)
- Silicon [water, ground-, long-term]: 0.11668 kg; lognormal variance with pedigree 0.15, pedigree (1,1,5,1,1)
  (same comment as for Tin, ion)
- Aluminium [water, surface water]: 4.0617e-5 kg; lognormal variance with pedigree 0.92, pedigree (1,1,5,1,1)
  (same comment as for Arsenic, ion)
- Cobalt [water, ground-, long-term]: 4.335e-6 kg; lognormal variance with pedigree 1.96, pedigree (1,1,5,1,1)
  (same comment as for Tin, ion)
- Bromine [water, ground-, long-term]: 5.6063e-6 kg; lognormal variance with pedigree 1.19, pedigree (1,1,5,1,1)
  (same comment as for Tin, ion)
- Titanium, ion [water, ground-, long-term]: 0.0020106 kg; lognormal variance with pedigree 0.82, pedigree (1,1,5,1,1)
  (same comment as for Tin, ion)
- Cadmium, ion [water, ground-, long-term]: 9.5317e-9 kg; lognormal variance with pedigree 7.8, pedigree (1,1,5,1,1)
  (same comment as for Tin, ion)
- Bromine [water, surface water]: 2.2896e-5 kg; lognormal variance with pedigree 1.17, pedigree (1,1,5,1,1)
  (same comment as for Arsenic, ion)
- Titanium, ion [water, surface water]: 3.3565e-6 kg; lognormal variance with pedigree 1.2, pedigree (1,1,5,1,1)
  (same comment as for Arsenic, ion)
- Iron, ion [water, surface water]: 2.4074e-7 kg; lognormal variance with pedigree 1.57, pedigree (1,1,5,1,1)
  (same comment as for Arsenic, ion)
- Magnesium [water, surface water]: 5.5816e-6 kg; lognormal variance with pedigree 1.15, pedigree (1,1,5,1,1)
  (same comment as for Arsenic, ion)
- Molybdenum [water, ground-, long-term]: 4.509e-8 kg; lognormal variance with pedigree 1.33, pedigree (1,1,5,1,1)
  (same comment as for Tin, ion)
- Sodium, ion [water, surface water]: 0.0023385 kg; lognormal variance with pedigree 0.49, pedigree (1,1,5,1,1)
  (same comment as for Arsenic, ion)
- Boron [water, ground-, long-term]: 0.00024777 kg; lognormal variance with pedigree 0.88, pedigree (1,1,5,1,1)
  (same comment as for Tin, ion)
- Aluminium [water, ground-, long-term]: 0.02433 kg; lognormal variance with pedigree 0.55, pedigree (1,1,5,1,1)
  (same comment as for Tin, ion)
- Barium [water, ground-, long-term]: 9.2991e-6 kg; lognormal variance with pedigree 6.43, pedigree (1,1,5,1,1)
  (same comment as for Tin, ion)
- Cobalt [water, surface water]: 7.2371e-9 kg; lognormal variance with pedigree 2, pedigree (1,1,5,1,1)
  (same comment as for Arsenic, ion)
- Arsenic, ion [water, ground-, long-term]: 2.0205e-14 kg; lognormal variance with pedigree 1.24, pedigree (1,1,5,1,1)
  (same comment as for Tin, ion)
- Lead [water, surface water]: 7.8737e-10 kg; lognormal variance with pedigree 2.29, pedigree (1,1,5,1,1)
  (same comment as for Arsenic, ion)
- Vanadium, ion [water, surface water]: 4.0335e-7 kg; lognormal variance with pedigree 1.47, pedigree (1,1,5,1,1)
  (same comment as for Arsenic, ion)
- Mercury [water, surface water]: 4.2484e-12 kg; lognormal variance with pedigree 2.95, pedigree (1,1,5,1,1)
  (same comment as for Arsenic, ion)
- Fluoride [water, surface water]: 1.713e-6 kg; lognormal variance with pedigree 1.33, pedigree (1,1,5,1,1)
  (same comment as for Arsenic, ion)
- Molybdenum [water, surface water]: 9.7763e-6 kg; lognormal variance with pedigree 1.31, pedigree (1,1,5,1,1)
  (same comment as for Arsenic, ion)
- Sodium, ion [water, ground-, long-term]: 0.0038929 kg; lognormal variance with pedigree 0.47, pedigree (1,1,5,1,1)
  (same comment as for Tin, ion)
- Sulfate [water, ground-, long-term]: 0.0069598 kg; lognormal variance with pedigree 0.58, pedigree (1,1,5,1,1)
  (same comment as for Tin, ion)
- Silicon [water, surface water]: 0.000263 kg; lognormal variance with pedigree 0.7, pedigree (1,1,5,1,1)
  (same comment as for Arsenic, ion)
- Strontium [water, ground-, long-term]: 0.00033639 kg; lognormal variance with pedigree 0.97, pedigree (1,1,5,1,1)
  (same comment as for Tin, ion)
- Phosphate [water, surface water]: 5.2764e-7 kg; lognormal variance with pedigree 1.58, pedigree (1,1,5,1,1)
  (same comment as for Arsenic, ion)
- Cadmium, ion [water, surface water]: 1.5913e-11 kg; lognormal variance with pedigree 2.81, pedigree (1,1,5,1,1)
  (same comment as for Arsenic, ion)
- Potassium, ion [water, ground-, long-term]: 0.0064034 kg; lognormal variance with pedigree 0.43, pedigree (1,1,5,1,1)
  (same comment as for Tin, ion)
- Nickel, ion [water, surface water]: 5.4769e-8 kg; lognormal variance with pedigree 1.73, pedigree (1,1,5,1,1)
  (same comment as for Arsenic, ion)
- Potassium, ion [water, surface water]: 0.0025135 kg; lognormal variance with pedigree 0.46, pedigree (1,1,5,1,1)
  (same comment as for Arsenic, ion)
- Tin, ion [water, surface water]: 5.5816e-9 kg; lognormal variance with pedigree 2.03, pedigree (1,1,5,1,1)
  (same comment as for Arsenic, ion)
- Fluoride [water, ground-, long-term]: 2.9897e-5 kg; lognormal variance with pedigree 1.16, pedigree (1,1,5,1,1)
  (same comment as for Tin, ion)
- Strontium [water, surface water]: 5.6159e-7 kg; lognormal variance with pedigree 1.43, pedigree (1,1,5,1,1)
  (same comment as for Arsenic, ion)
- Barium [water, surface water]: 1.5524e-8 kg; lognormal variance with pedigree 1.9, pedigree (1,1,5,1,1)
  (same comment as for Arsenic, ion)
- Beryllium [water, ground-, long-term]: 2.2696e-6 kg; lognormal variance with pedigree 1.63, pedigree (1,1,5,1,1)
  (same comment as for Tin, ion)
- Copper, ion [water, ground-, long-term]: 2.3236e-6 kg; lognormal variance with pedigree 3.72, pedigree (1,1,5,1,1)
  (same comment as for Tin, ion)
- Selenium [water, ground-, long-term]: 2.6833e-6 kg; lognormal variance with pedigree 1.43, pedigree (1,1,5,1,1)
  (same comment as for Tin, ion)
- Chloride [water, ground-, long-term]: 2.5752e-5 kg; lognormal variance with pedigree 1.14, pedigree (1,1,5,1,1)
  (same comment as for Tin, ion)
- Iron, ion [water, ground-, long-term]: 0.0001442 kg; lognormal variance with pedigree 7.3, pedigree (1,1,5,1,1)
  (same comment as for Tin, ion)
- Chloride [water, surface water]: 1.0316e-5 kg; lognormal variance with pedigree 1.18, pedigree (1,1,5,1,1)
  (same comment as for Arsenic, ion)
- Antimony [water, ground-, long-term]: 3.3439e-6 kg; lognormal variance with pedigree 1.4, pedigree (1,1,5,1,1)
  (same comment as for Tin, ion)
- Calcium, ion [water, ground-, long-term]: 0.00088938 kg; lognormal variance with pedigree 1.85, pedigree (1,1,5,1,1)
  (same comment as for Tin, ion)
- Zinc, ion [water, ground-, long-term]: 1.3475e-6 kg; lognormal variance with pedigree 5.83, pedigree (1,1,5,1,1)
  (same comment as for Tin, ion)
- Zinc, ion [water, surface water]: 2.2497e-9 kg; lognormal variance with pedigree 2.15, pedigree (1,1,5,1,1)
  (same comment as for Arsenic, ion)
- Mercury [water, ground-, long-term]: 2.5448e-9 kg; lognormal variance with pedigree 4.29, pedigree (1,1,5,1,1)
  (same comment as for Tin, ion)
- Selenium [water, surface water]: 1.4618e-6 kg; lognormal variance with pedigree 1.45, pedigree (1,1,5,1,1)
  (same comment as for Arsenic, ion)
- Thallium [water, ground-, long-term]: 1.1688e-6 kg; lognormal variance with pedigree 1.72, pedigree (1,1,5,1,1)
  (same comment as for Tin, ion)
- Calcium, ion [water, surface water]: 1.4848e-6 kg; lognormal variance with pedigree 1.31, pedigree (1,1,5,1,1)
  (same comment as for Arsenic, ion)
- Nickel, ion [water, ground-, long-term]: 3.2807e-5 kg; lognormal variance with pedigree 1.27, pedigree (1,1,5,1,1)
  (same comment as for Tin, ion)
- Manganese [water, surface water]: 9.0585e-9 kg; lognormal variance with pedigree 1.97, pedigree (1,1,5,1,1)
  (same comment as for Arsenic, ion)

## Sampling procedure
Landfill model based on observed leachate concentrations in literature. Extrapolated to 60'000 years heeding chemical characteristics. Initial waste composition from various literature sources.

## Extrapolations
This dataset has been extrapolated from year 2000 to the year of the calculation (2019). The uncertainty has been adjusted accordingly.

## Review by Niels Jungbluth 2009-02-15
passed.
