# heat and power co-generation, oil

Dataset: EcoSpold 2, unit process
Geography: GB
Time period: 1980-01-01 to 2019-12-31
Technology level: current
Classification: ISIC rev.4 ecoinvent: 3510:Electric power generation, transmission and distribution
Classification: EcoSpold01Categories: hard coal/power plants
Synonyms: petroleum; heavy fuel oil
Tags: oil power; fossil fuels
Scenario: Business-as-Usual
System model: Allocation at the point of substitution
Generated by: Karin Treyer
Published in: Jungbluth N. 2003
Database: ecoinvent
isCopyrightProtected: true
accessRestrictedTo: 1

## General comment
This dataset represents the production of high voltage electricity and district heat at a grid-connected oil power plant with a capacity of 500 MW on the world in 2012.
Emissions are in general calculated/estimated based on the fuel oil type S, European quality. This dataset has been built on the basis of oil electricity production datasets in version 2 of the ecoinvent database which were elaborated by N. Jungbluth 2007 (see main publication in modelling and administrative). Nothing else than the efficiency has been adjusted in this dataset; besides that no new data collection has taken place
Comments:
- sulfur content of the oil is not adapted to local/average conditions.
- CO2 emissions are presented for the combustion and for the flue gas treatment
- Extensive comments on emissions can be found in Jungbluth 2007, on which this dataset is based on.
Emissions to the water are from flue gas treatment. Most of these data come from two power plants in Portugal (EDP 2001) and data from Slowakia
EDP (2001) Environmental Report 2000. Electricidade de Portugal, S.A., Lisboa, PT, retrieved from: www.edp.pt.
Slovenské elektrárne (2002) Environment Report 2001, Bratislave, SK, retrieved from: www.seas.sk.
IEA/OECD. 2010. Electricity Information 2010. International Energy Agency (IEA), Paris Cedex (FR). Part IV. Detailed OECD Electricity And Heat Data.
[This dataset is meant to replace the following datasets:]

## Included activities start
From the constructed power plant ready to produce electricity and from the fuel ready to be used.

## Included activities end
This activity ends with 1MJ of heavy fuel oil burned in power plant with heat and electricity as main products.

This dataset includes all energy use, use of chemicals, emissions to air and water including treatment of flue gasses and effluents. In an oil power plant, water is needed for cooling, feed water for the steam circuit, for the flue gas treatment, or other cleaning. This dataset only considers water use (evaporation) for cooling and steam circuit.

## Geography
Estimation for the country.

## Technology
Electricity and heat production in a conventional combined heat and power oil power plant with a capacity of 500 MWe

## Time period
The Annual Production Volume is valid for the year 2012.

## Parameters
- fraction, cooling water, to air: 0.0118019; name fraction_CW_to_air; = (WConsumption_EP_oil_recirculatingCS*recirculating_CS_fraction_from_allCS+WConsumption_EP_oil_onceT_andCP_CS*once_through_andCP_CS_fractio_from_allCS)/(WWithdrawal_EP_oil_recirculating_CS*recirculating_CS_fraction_from_allCS+WWithdrawal_EP_oil_onceT_andCP_CS*once_through_andCP_CS_fractio_from_allCS); lognormal variance with pedigree 0.041425, pedigree (2,3,2,2,1)
  Calculated value
  nan
- losses from gross electricity production: 0.04 dimensionless; name losses_gross_net; lognormal variance with pedigree 0.003525, pedigree (3,2,2,2,2)
  Calculated value. Own use of electricity plants in this country in 2012. For the OECD countries, the OECD iLibrary provides gross and net electricity values for the specific sector \'Total Fuel Combustion\', from which the loss value is being calculated. This value is then applied to all fossil fuel datasets, as no data on a more detailed level were available.
  OECD. 2014. IEA Electricity Information Statistics: OECD - Electricity and heat generation. OECD iLibrary. Online database. DOI : 10.1787/elect-data-en
  nan
  Uncertainty: generic IEA value used
- water withdrawal, electricity production from oil, once-T and coolingP CS: 0.098 m3/kWh; name WWithdrawal_EP_oil_onceT_andCP_CS; lognormal variance with pedigree 0.092025, pedigree (4,4,3,2,4)
  Estimated based on literature (Scown, 2011, Water Footprint of U.S. Transportation Fuels, SI).
  nan
- once-through and cooling pond cooling systems as a fraction of all cooling syste: 0.73 dimensionless; name once_through_andCP_CS_fractio_from_allCS; lognormal variance with pedigree 0.092025, pedigree (4,4,3,2,4)
  Calculated as an average of data available for Europe (Floerke, 2008, Future changes of freshwater needs in the electricity production sector) and USA (NERL, 2011, Estimating freshwater needs to meet future thermoelectric generation requirements).
  nan
- water withdrawal, electricity production from oil, recirculating CS: 0.0021 m3/kWh; name WWithdrawal_EP_oil_recirculating_CS; lognormal variance with pedigree 0.092025, pedigree (4,4,3,2,4)
  (same comment as for water withdrawal, electricity production from oil, once-T and coolingP)
- fraction, process water, to air: 0.15 dimensionless; name fraction_PW_to_air; lognormal variance with pedigree 0.092025, pedigree (4,4,3,2,4)
  Literature value. In case when no industry/process specific data are available, default evaporation fraction value is used. This value is 15% and is based on literature (Statistics Canada, 2007 & Shaffer, K.H., 2008, Consumptive water use in the Great Lakes Basin, USGS & Shiklomanov, 2003, World Water Resources at the Beginning of the 21st Century) and has been approved by an expert.
  nan
- average efficiency of oil power plants, global: 0 dimensionless; pedigree (3,2,1,2,2)
  Parameter not needed anymore.
- average efficiency of oil power plants, country: 0.446 dimensionless; name efficiency_oil_country; lognormal variance with pedigree 0.003325, pedigree (3,2,1,2,2)
  Literature value/calculated value. Net electrical efficiency based on the lower heating value (LHV).
  For all OECD countries, the IEA Electricity information 2014 provides data for the year 2012 on fuel input (TJ, Net calorific value NCV) and gross electricity production (GWh) as well as heat production (TJ) in tables 8 and 9 for each country for electricity only and Combined Heat and Power (CHP) plants each. Together with the information on own use (see parameter 'losses'), the net electrical efficiency based on the NCV is calculated.
  For all non-OECD countries, data from the IEA Energy balances of non-OECD countries 2014 have been used. These tables do not always provide information on how much of the electricity has been produced in electricity only and in CHP plants, but often give the total value only.
  IEA. 2014. Electricity Information 2014. ISBN 978-92-64-21692-1. International Energy Agency (IEA), Paris Cedex (FR).
  IEA/OECD. 2014. Energy balances of non-OECD countries 2014. International Energy Agency (IEA), Paris Cedex (FR).
  nan
- relation between the global and the country's efficiency of oil power plants: 0 dimensionless; undefined min 1, max 1, standardDeviation95 0, pedigree (1,1,1,1,1)
  Parameter not needed anymore.
- water consumption, electricity production from oil, once-T and coolingP CS: 0.0005 m3/kWh; name WConsumption_EP_oil_onceT_andCP_CS; lognormal variance with pedigree 0.092025, pedigree (4,4,3,2,4)
  (same comment as for water withdrawal, electricity production from oil, once-T and coolingP)
- water consumption, electricity production from oil, recirculating CS: 0.0018 m3/kWh; name WConsumption_EP_oil_recirculatingCS; lognormal variance with pedigree 0.092025, pedigree (4,4,3,2,4)
  (same comment as for water withdrawal, electricity production from oil, once-T and coolingP)
- gross electricity production: 1.901e9 kWh; name gross_electricity; lognormal variance with pedigree 0.0012, pedigree (2,1,1,1,1)
  Literature value/statistics.
  For OECD countries, gross electricity production 2012 with natural gas in electricity plants or CHP plants was taken from the IEA electricity informaiton 2014, country tables 8 and 9.
  For non-OECD countries, these values were found in the Energy balances of non-OECD countries.
  The split of electricity only and CHP plants into conventional and combined cycle plants (see general comment) was made based on information on installed electrical capacity with natural gas as fuel in the individual countries taken from the WEPP database.
  IEA. 2014. Electricity Information 2014. ISBN 978-92-64-21692-1. International Energy Agency (IEA), Paris Cedex (FR).
  IEA/OECD. 2014. Energy balances of non-OECD countries 2014. International Energy Agency (IEA), Paris Cedex (FR).
  WEPP 2014. World Electric Power Plants Database. PLATTS McGraw Hill Financial. http://www.platts.com/products/world-electric-power-plants-database
  nan
- fraction, water, completely softened, to air: 0.15; name fraction_WCS_to_air; = fraction_PW_to_air; lognormal variance with pedigree 0.092025, pedigree (4,4,3,2,4)
  Calculated value. See comment in the other parametres present in this dataset. Water, completely softened is considered to be always used as process water, thus process water fractions to air are applied to all water, completely softened input flows to calculate the amount of water consumed in the processes.
  nan
- factor: input of MJ for the production of 1 kWh: 8.07175 MJ/kWh; name factor_MJ_kWh; = 1*3.6/efficiency_oil_country; lognormal variance with pedigree 0.0006, pedigree (1,1,1,1,1)
  Calculated value. 3.6 MJ = 1kWh.
  nan
- fraction, water, decarbonised, to air: 0.0118019; name fraction_WDC_to_air; = fraction_CW_to_air; lognormal variance with pedigree 0.041425, pedigree (2,3,2,2,1)
  Calculated value. See comments in the other parametres present in this dataset. Decarbonised water is considered to be always used as cooling water, thus cooling water fractions to air are applied to all carbonised water input flows to calculate the amount of water consumed in the processes.
  nan
- recirculating cooling system as a fraction of all cooling systems: 0.27 dimensionless; name recirculating_CS_fraction_from_allCS; lognormal variance with pedigree 0.092025, pedigree (4,4,3,2,4)
  (same comment as for once-through and cooling pond cooling systems as a fraction of all coo)

## Reference product
- heat, district or industrial, other than natural gas: 1 MJ; name heat; CPC 17300: Steam and hot water; By-product classification allocatable product
  Literature value/calculated value. Net thermal efficiency based on the lower heating value (LHV). No value given for the United Kingdom, so that the value for the OECD countries is applied to this dataset.
  For all OECD countries, the IEA Electricity information 2014 provides data for the year 2012 on fuel input (TJ, Net calorific value NCV) and gross electricity production (GWh) as well as heat production (TJ) in tables 8 and 9 for each country for electricity only and Combined Heat and Power (CHP) plants each. Together with the information on own use (see parameter 'losses'), the net electrical efficiency based on the NCV is calculated.
  For all non-OECD countries, data from the IEA Energy balances of non-OECD countries 2014 have been used. These tables do not always provide information on how much of the electricity has been produced in electricity only and in CHP plants, but often give the total value only.
  IEA. 2014. Electricity Information 2014. ISBN 978-92-64-21692-1. International Energy Agency (IEA), Paris Cedex (FR).
  IEA/OECD. 2014. Energy balances of non-OECD countries 2014. International Energy Agency (IEA), Paris Cedex (FR).
  production volume 6.93485e9 MJ; name apv_heat; = apv_electricity*3.8
    Calculated value. Production volume not given in the IEA electricity information 2014. In OECD countries, the ratio \'output of heat (MJ) per kWh of electricity produced (kWh)\' amounts to 3.8.
    IEA. 2014. Electricity Information 2014. ISBN 978-92-64-21692-1. International Energy Agency (IEA), Paris Cedex (FR).
  property true value relation 0.1842; name heat_true_value_relation
    property to calculate "true value" from
  property price 0.0106 EUR2005; name heat_price_EUR2005
    Average European district heat price from Ecoheatcool and Euroheat 2005-2006, Ecoheat Work package 1: The European heat market. Final report. 10.6 EUR/GJ i s the price of district heat. http://www.solarthermalworld.org/files/Ecoheatcool%20WP1%20Web.pdf?download
  property exergy 0.1842 MJ; name heat_exergy
    This exergy property is based on the exergy content of the product.
  property true value 0.00190899; name heat_true_value
    allocation property applied in "true value" allocation // value calculated from true value relation
  properties: corresponding fuel use, propane, furnace >100kW 0 MJ

## By-products
- lignite ash: 0 kg; name lignite_ash; source Jungbluth, N. 2007; By-product classification Waste; CPC 39: Wastes or scraps; pedigree (1,1,3,1,1)
  Exchange present due to parent child relationship but not relevant for this dataset.
  production volume 0 kg; = apv_electricity * lignite_ash
    Calculated from the production volume of electricity produced in proportion to the respective output amounts. An extra amount has been added in the global dataset due to parent child relationship.
  property price 0 EUR2005; name lignite_ash_price_EUR2005
    Waste products are assigned a price of zero as they are assumed to require further treatment.
  property carbon content 0
    carbon content on a dry matter basis (reserved; not for manual entry)
  properties: wet mass 1 kg, water in wet mass 0 kg, dry mass 1 kg, carbon content, fossil 0, carbon content, non-fossil 0, water content 0, carbon allocation 0 kg
- electricity, high voltage: 0 kWh; name electricity; = efficiency_oil_country/3.6; CPC 17100: Electrical energy; By-product classification allocatable product; undefined min 1, max 1, standardDeviation95 0, pedigree (1,1,3,1,1)
  Electricity output per MJ of oil burned.
  production volume 1.82496e9 kWh; name apv_electricity; = gross_electricity* (1-losses_gross_net)
    Calculated value.
  property true value relation 3.6; name electricity_true_value_relation
    property to calculate "true value" from
  property price 0.0977 EUR2005; name electricity_price_EUR2005
    Temporary price data. Calculated as 90% of purchasers price based on: 94% of the average price (to account for a 6% loss in transformation and transmission) for electricity for industrial consumersin 2005 (excluded taxes). From IEA.
  property exergy 3.6 MJ; name electricity_exergy
    This exergy property is based on the exergy content of the product.
  property true value 0.0137566; name electricity_true_value
    (same comment as for heat, district or industrial, other than natural gas)
- fly ash and scrubber sludge: 0 kg; name fly_ash; source Jungbluth, N. 2007, p. Tab. 12.27, p. 238; CPC 39: Wastes or scraps; By-product classification Waste; pedigree (1,1,3,1,1)
  Exchange present due to parent child relationship but not relevant for this dataset.
  production volume 0 kg; = apv_electricity * fly_ash
    Calculated from the production volume of electricity produced in proportion to the respective output amounts.
  property carbon content, fossil 0.167
    Tab A.6, ecoinvent v2.2 report 13_I. C content has been calculated after data in the tables, and then referred to 1 kg DM
  property price 0 EUR2005; name fly_ash_price_EUR2005
    (same comment as for lignite ash)
  property carbon content 0.167
    carbon content on a dry matter basis (reserved; not for manual entry)
  properties: water content 9, water in wet mass 0.9 kg, wet mass 1 kg, carbon content, non-fossil 0, dry mass 0.1 kg, carbon allocation 0.0167 kg
- municipal solid waste: 0 kg; name municipal_waste; source Jungbluth, N. 2007; CPC 39910: Municipal waste; By-product classification Waste; pedigree (1,1,3,1,1)
  Exchange present due to parent child relationship but not relevant for this dataset.
  production volume 0 kg; = apv_electricity * municipal_waste
    (same comment as for fly ash and scrubber sludge)
  property price 0 EUR2005; name municipal_waste_price_EUR2005
    (same comment as for lignite ash)
  property carbon content, fossil 0.171549
    MSW composition in tab 4.1, ecoinvent v2.2 report 13_I. C content referred to 1 kg DM
  property carbon content, non-fossil 0.261655
    MSW composition in tab 4.1, ecoinvent v2.2 report 13_I. C content referred to 1 kg DM
  property carbon content 0.433204
    carbon content on a dry matter basis (reserved; not for manual entry)
  properties: dry mass 0.771 kg, water in wet mass 0.229 kg, wet mass 1 kg, water content 0.297017, carbon allocation 0.334 kg
- bilge oil: 0 kg; name bilge_oil; source Jungbluth, N. 2007; CPC 39: Wastes or scraps; By-product classification Waste; pedigree (1,1,3,1,1)
  Exchange present due to parent child relationship but not relevant for this dataset.
  production volume 0 kg; = apv_electricity * bilge_oil
    (same comment as for fly ash and scrubber sludge)
  property carbon content, fossil 0.84
    (same comment as for fly ash and scrubber sludge)
  property price 0 EUR2005; name bilge_oil_price_EUR2005
    (same comment as for lignite ash)
  property carbon content 0.84
    carbon content on a dry matter basis (reserved; not for manual entry)
  properties: dry mass 0.1 kg, carbon content, non-fossil 0, water content 9, wet mass 1 kg, water in wet mass 0.9 kg, carbon allocation 0.084 kg
- heat, for reuse in municipal waste incineration only: 0 MJ; CPC 17300: Steam and hot water; By-product classification allocatable product; pedigree (1,1,1,1,1)
  Net electricity generated from this waste and used in internal MSWI plant energy redistribution.
  Uncertainty: uncertainty is calculated from uncertainties in waste composition and uncertainties in energy efficiency and the uncertainty in internal energy demand
  production volume 5.0133 MJ
  property exergy 0.1842 MJ; name E_th_prod_MSWI_exergy
    This exergy property is based on the exergy content of the product.
  property price 0.0106 EUR2005; name E_th_prod_MSWI_price_EUR2005
    (same comment as for heat, district or industrial, other than natural gas)
  property true value relation 0.1842; name E_th_prod_MSWI_true_value_relation
    property to calculate "true value" from
  property true value 1.56076e-11
    (same comment as for heat, district or industrial, other than natural gas)
- electricity, for reuse in municipal waste incineration only: 0 kWh; CPC 17100: Electrical energy; By-product classification allocatable product; pedigree (1,1,1,1,1)
  (same comment as for heat, for reuse in municipal waste incineration only)
  production volume 0.706063 kWh
  property true value relation 3.6; name E_el_prod_MSWI_true_value_relation
    property to calculate "true value" from
  property price 0.1 EUR2005; name E_el_prod_MSWI_price_EUR2005
    Estimated to be the same price as in case of electricity, medium voltage.
  property exergy 3.6 MJ; name E_el_prod_MSWI_exergy
    This exergy property is based on the exergy content of the product.
  property true value 4.29603e-11
    (same comment as for heat, district or industrial, other than natural gas)

## Inputs from technosphere
- heavy fuel oil: 0.00880287 kg; source Jungbluth, N. 2007; lognormal variance with pedigree 0.0027, pedigree (2,2,3,1,1)
  Literature data for heating value
  Amount was scaled to the amount of reference product.
  properties: dry mass 1 kg, carbon content, fossil 0.849, wet mass 1 kg, lower heating value MJ per kg 41.2 MJ/kg
- ammonia, liquid: 2.29233e-5 kg; source Jungbluth, N. 2007, p. Tab. 12.11 p. 228; lognormal variance with pedigree 0.0147, pedigree (2,4,3,3,1)
  IPPC 2001 for flue gas treatment
  Amount was scaled to the amount of reference product.
  properties: wet mass 1 kg, dry mass 1 kg
- oil power plant, 500MW: 0 unit; source Jungbluth, N. 2007; uniform min 0, max 0, pedigree (1,1,3,1,1)
  Estimation based on case study
- oil power plant, 500MW: 4.49718e-13 unit; source Jungbluth, N. 2007; lognormal variance with pedigree 0.3506, pedigree (2,5,5,5,1)
  Estimation based on case study
- water, completely softened: 0.00726295 kg; name water_softened_input; source Jungbluth, N. 2007, p. Tab. 12.10 p. 228; lognormal variance with pedigree 0.0027, pedigree (2,2,3,1,1)
  Literature data for this country
  Amount was scaled to the amount of reference product.
  Literature data for this country
  Amount was scaled to the amount of reference product.
  properties: wet mass 1 kg
- waste mineral oil: -2.36044e-5 kg; name waste_oil; source Jungbluth, N. 2007; lognormal variance with pedigree 0.0033, pedigree (2,2,3,1,1)
  Literature data for this country
  Amount was scaled to the amount of reference product.
  production volume 118776 kg; = apv_electricity *waste_oil
    (same comment as for fly ash and scrubber sludge)
  property price 0 EUR2005; name waste_oil_price_EUR2005
  properties: carbon content, fossil 0.864444, wet mass 1 kg, dry mass 0.9 kg, water content 0.111111
  note on carbon content, fossil: Tab A.6, ecoinvent v2.2 report 13_I. C content has been calculated after data in the tables, and then referred to 1 kg DM
- limestone, crushed, washed: 0.000499115 kg; source Jungbluth, N. 2007, p. Tab. 12.11 p. 228; lognormal variance with pedigree 0.0147, pedigree (2,4,3,3,1)
  IPPC 2001 for flue gas treatment
  Amount was scaled to the amount of reference product.
  properties: wet mass 1 kg, carbon content, fossil 0.117257, water content 0.00200401, dry mass 0.998 kg
  note on carbon content, fossil: Table 3.1, ecoinvent v2.2 report 7, part VII, pg 3. MW CaCO3=100, MW MgCO3=84. C content of limestone is 0.117257 kg/kg DM
- water, decarbonised: 0.0381281 kg; name water_decarbonised_input; source Jungbluth, N. 2007, p. Tab. 12.10 p. 228; lognormal variance with pedigree 0.0027, pedigree (2,2,3,1,1)
  (same comment as for water, completely softened)
  properties: wet mass 1 kg
- residue from cooling tower: -2.56017e-5 kg; name cooling_tower; source Jungbluth, N. 2007, p. Tab. 12.27, p. 238; lognormal variance with pedigree 0.0027, pedigree (2,2,3,1,1)
  Literature data for this country
  Amount was scaled to the amount of reference product.
  production volume 128826 kg; = apv_electricity * cooling_tower
    (same comment as for fly ash and scrubber sludge)
  property price 0 EUR2005; name cooling_tower_price_EUR2005
  properties: wet mass 1 kg, water content 0.428571, carbon content, fossil 0.0544233, dry mass 0.7 kg

## Inputs from nature
- Water, cooling, unspecified natural origin [natural resource, in water]: 0.00268578 m3; name water_cooling_UNO_input; = ((recirculating_CS_fraction_from_allCS*WWithdrawal_EP_oil_recirculating_CS)+(once_through_andCP_CS_fractio_from_allCS*WWithdrawal_EP_oil_onceT_andCP_CS))/9.737; source Scown, C.D., et al. 2011, p. Tab. 12.10 p. 228; lognormal variance with pedigree 0.098025, pedigree (4,4,4,2,4)
  Literature data for this country
  Amount was scaled to the amount of reference product.
  Calculated based on literature (Scown, C.D., et al., 2011, Water Footprint of U.S. Trasportation Fuels;Scown, C.D., et al., 2011, Water Footprint of U.S. Trasportation Fuels (SI); Stiegel, 2008, Estimating Freshwater Needs to Meet Future Thermoelectric Generation Requirements; Floerke, M., 2009, Future changes of freshwater needs in the electricity production sector), (Vionnet, S., Quantis Water Database - Technical Report, 2012). Water use in this process is modelled based on literature (see references). The process boundaries are given by the boundaries of the power plant. The process ends when the energy (MJ) is produced and ready to be used for electricity production (kWh).
  Calculated based on literature data. 9.7 MJ is calculated efficiency of the electricity production, average of all available regions.

## Emissions to nature
- Hypochlorite [water, ocean]: 1.3419e-7 kg; source Jungbluth, N. 2007; lognormal variance with pedigree 0.0701, pedigree (3,4,4,3,3)
  Literature
  Amount was scaled to the amount of reference product.
- COD, Chemical Oxygen Demand [water, surface water]: 6.66417e-7 kg; source Jungbluth, N. 2007, p. Tab. 12.26, p. 238; lognormal variance with pedigree 0.482, pedigree (1,1,3,1,1)
  Mean of values for Europe, range of concentrations
  Amount was scaled to the amount of reference product.
- Acetic acid [air, urban air close to ground]: 3.85815e-7 kg; source Jungbluth, N. 2007; lognormal variance with pedigree 0.092, pedigree (1,1,3,1,1)
  Calculation based on VOC emission. Deviation calculated from ranges
  Amount was scaled to the amount of reference product.
- Chromium, ion [water, surface water]: 1.11044e-9 kg; source Jungbluth, N. 2007, p. Tab. 12.26, p. 238; lognormal variance with pedigree 0.632, pedigree (1,1,3,1,1)
  (same comment as for COD, Chemical Oxygen Demand)
- Hypochlorite [water, surface water]: 1.19683e-7 kg; source Jungbluth, N. 2007; lognormal variance with pedigree 0.0701, pedigree (3,4,4,3,3)
  Literature
  Amount was scaled to the amount of reference product.
- Carbon dioxide, fossil [air, urban air close to ground]: 0.0282525 kg; source Jungbluth, N. 2007, p. Tab. 12.12, p. 229; lognormal variance with pedigree 0.0027, pedigree (2,2,3,1,1)
  Literature data for this country
  Amount was scaled to the amount of reference product.
- Molybdenum [air, urban air close to ground]: 5.65775e-9 kg; source Jungbluth, N. 2007; lognormal variance with pedigree 1.212, pedigree (1,1,3,1,1)
  Calculation based on particle emission. Deviation calculated from ranges
  Amount was scaled to the amount of reference product.
- Methanol [air, urban air close to ground]: 1.92911e-7 kg; source Jungbluth, N. 2007; lognormal variance with pedigree 0.092, pedigree (1,1,3,1,1)
  (same comment as for Acetic acid)
- Particulates, > 10 um [air, urban air close to ground]: 1.10758e-5 kg; source Jungbluth, N. 2007, p. Tab. 12.17 / Tab. 12.18; lognormal variance with pedigree 0.0427, pedigree (2,2,3,1,1)
  Literature data for this country
  Amount was scaled to the amount of reference product.
- Carbon dioxide, fossil [air, unspecified]: 0.000224101 kg; source Jungbluth, N. 2007, p. Tab. 12.29, Tab. 12.30; lognormal variance with pedigree 0.0206, pedigree (2,5,3,1,1)
  Calculation for limestone use
  Amount was scaled to the amount of reference product.
- Copper [air, urban air close to ground]: 2.10624e-9 kg; source Jungbluth, N. 2007, p. Tab. 12.23, Tab. 12.24; lognormal variance with pedigree 1.312, pedigree (1,1,3,1,1)
  (same comment as for Molybdenum)
- Copper, ion [water, surface water]: 9.19819e-10 kg; source Jungbluth, N. 2007, p. Tab. 12.26, p. 238; lognormal variance with pedigree 0.722, pedigree (1,1,3,1,1)
  (same comment as for COD, Chemical Oxygen Demand)
- Nitrogen [water, surface water]: 2.96161e-6 kg; source Jungbluth, N. 2007, p. Tab. 12.26, p. 238; lognormal variance with pedigree 0.032, pedigree (1,1,3,1,1)
  (same comment as for COD, Chemical Oxygen Demand)
- Chloride [water, surface water]: 8.86308e-6 kg; source Jungbluth, N. 2007, p. Tab. 12.26, p. 238; lognormal variance with pedigree 0.892, pedigree (1,1,3,1,1)
  (same comment as for COD, Chemical Oxygen Demand)
- Suspended solids, unspecified [water, surface water]: 5.51594e-7 kg; source Jungbluth, N. 2007, p. Tab. 12.26, p. 238; lognormal variance with pedigree 0.052, pedigree (1,1,3,1,1)
  (same comment as for COD, Chemical Oxygen Demand)
- Beryllium [air, urban air close to ground]: 2.02272e-11 kg; source Jungbluth, N. 2007; lognormal variance with pedigree 0.6607, pedigree (3,3,4,3,1)
  Literature
  Amount was scaled to the amount of reference product.
- Benzo(a)pyrene [air, urban air close to ground]: 5.44014e-12 kg; source Jungbluth, N. 2007; lognormal variance with pedigree 0.3707, pedigree (3,3,5,3,3)
  Literature
  Amount was scaled to the amount of reference product.
- Carbon monoxide, fossil [air, urban air close to ground]: 1.59784e-5 kg; source Jungbluth, N. 2007, p. Tab. 12.13, p. 229; lognormal variance with pedigree 0.6527, pedigree (2,2,3,1,1)
  Literature data for this country
  Amount was scaled to the amount of reference product.
- Selenium [air, urban air close to ground]: 3.72214e-9 kg; source Jungbluth, N. 2007; lognormal variance with pedigree 1.212, pedigree (1,1,3,1,1)
  (same comment as for Molybdenum)
- Chromium VI [air, urban air close to ground]: 1.12868e-10 kg; source Jungbluth, N. 2007, p. Tab. 12.23, Tab. 12.24; lognormal variance with pedigree 2.2607, pedigree (3,3,4,3,1)
  Literature, basic uncertainity = 20
  Amount was scaled to the amount of reference product.
- Iron [air, urban air close to ground]: 2.53873e-8 kg; source Jungbluth, N. 2007; lognormal variance with pedigree 0.6787, pedigree (3,3,4,3,3)
  Literature
  Amount was scaled to the amount of reference product.
- Nickel, ion [water, surface water]: 6.40885e-9 kg; source Jungbluth, N. 2007, p. Tab. 12.26, p. 238; lognormal variance with pedigree 0.342, pedigree (1,1,3,1,1)
  (same comment as for COD, Chemical Oxygen Demand)
- Manganese [air, urban air close to ground]: 8.18886e-9 kg; source Jungbluth, N. 2007, p. Tab. 12.23, Tab. 12.24; lognormal variance with pedigree 1.212, pedigree (1,1,3,1,1)
  (same comment as for Molybdenum)
- Sulfite [water, surface water]: 6.54123e-7 kg; source Jungbluth, N. 2007, p. Tab. 12.26, p. 238; lognormal variance with pedigree 0.032, pedigree (1,1,3,1,1)
  (same comment as for COD, Chemical Oxygen Demand)
- Manganese [water, surface water]: 1.29958e-9 kg; source Jungbluth, N. 2007, p. Tab. 12.26, p. 238; lognormal variance with pedigree 0.002, pedigree (1,1,3,1,1)
  (same comment as for COD, Chemical Oxygen Demand)
- TOC, Total Organic Carbon [water, surface water]: 3.72541e-7 kg; source Jungbluth, N. 2007, p. Tab. 12.26, p. 238; lognormal variance with pedigree 0.002, pedigree (1,1,3,1,1)
  (same comment as for COD, Chemical Oxygen Demand)
- Hydrocarbons, aromatic [air, urban air close to ground]: 3.85815e-9 kg; source Jungbluth, N. 2007; lognormal variance with pedigree 0.092, pedigree (1,1,3,1,1)
  (same comment as for Acetic acid)
- Water [water, unspecified]: 0.000372664 m3; name water_to_water_unspecified; = (water_softened_input/1000)*(1-fraction_WCS_to_air)+(water_decarbonised_input/1000)*(1-fraction_WDC_to_air)+water_cooling_UNO_input*(1-fraction_CW_to_air)*(efficiency_oil_country/3.6); lognormal variance with pedigree 0.0427, pedigree (2,2,3,1,1)
  Calculated value based on literature values and expert opinion. See comments in the parametres' comment field.
  property fraction, origin: fresh water 0.0162538; name fraction_origin_fresh_water_Ww
  property carbon content, fossil 0; name C_content_fossil
  property wet mass 1000 kg; name WM
  property dry mass 0 kg; name DM
  property fraction, origin: salt water 0; name fraction_origin_salt_water_Ww
  property fraction, origin: unspecified 0.983746; name fraction_origin_unspecified_Ww
  property water in wet mass 1000 kg; name WWM
  property carbon content, non-fossil 0; name C_content_non_fossil
- Dinitrogen monoxide [air, urban air close to ground]: 1.4507e-6 kg; source Jungbluth, N. 2007, p. Tab. 12.16 p. 232; lognormal variance with pedigree 0.352, pedigree (1,1,3,1,1)
  Calculation from ranges
  Amount was scaled to the amount of reference product.
- Propane [air, urban air close to ground]: 1.92911e-8 kg; source Jungbluth, N. 2007, p. Tab. 12.19, Tab. 12.20; lognormal variance with pedigree 0.092, pedigree (1,1,3,1,1)
  (same comment as for Acetic acid)
- Oils, unspecified [water, surface water]: 2.05543e-8 kg; source Jungbluth, N. 2007, p. Tab. 12.26, p. 238; lognormal variance with pedigree 0.032, pedigree (1,1,3,1,1)
  (same comment as for COD, Chemical Oxygen Demand)
- Sulfide [water, surface water]: 1.94938e-8 kg; source Jungbluth, N. 2007, p. Tab. 12.26, p. 238; lognormal variance with pedigree 0.272, pedigree (1,1,3,1,1)
  (same comment as for COD, Chemical Oxygen Demand)
- Fluoride [water, surface water]: 7.3645e-8 kg; source Jungbluth, N. 2007, p. Tab. 12.26, p. 238; lognormal variance with pedigree 0.762, pedigree (1,1,3,1,1)
  (same comment as for COD, Chemical Oxygen Demand)
- Cadmium, ion [water, surface water]: 1.05412e-10 kg; source Jungbluth, N. 2007, p. Tab. 12.26, p. 238; lognormal variance with pedigree 0.422, pedigree (1,1,3,1,1)
  (same comment as for COD, Chemical Oxygen Demand)
- Nickel [air, urban air close to ground]: 9.67765e-8 kg; source Jungbluth, N. 2007; lognormal variance with pedigree 1.212, pedigree (1,1,3,1,1)
  (same comment as for Molybdenum)
- Vanadium [air, urban air close to ground]: 3.30097e-7 kg; source Jungbluth, N. 2007; lognormal variance with pedigree 1.392, pedigree (1,1,3,1,1)
  (same comment as for Molybdenum)
- Calcium [air, urban air close to ground]: 1.08803e-8 kg; source Jungbluth, N. 2007, p. Tab. 12.25; lognormal variance with pedigree 0.0687, pedigree (3,3,4,3,3)
  Literature
  Amount was scaled to the amount of reference product.
- Formaldehyde [air, urban air close to ground]: 2.89368e-7 kg; source Jungbluth, N. 2007, p. Tab. 12.19, Tab. 12.20; lognormal variance with pedigree 0.092, pedigree (1,1,3,1,1)
  (same comment as for Acetic acid)
- DOC, Dissolved Organic Carbon [water, surface water]: 3.72541e-7 kg; source Jungbluth, N. 2007; lognormal variance with pedigree 0.002, pedigree (1,1,3,1,1)
  Calculated as equal to TOC.
  Amount was scaled to the amount of reference product.
- Zinc [air, urban air close to ground]: 1.78665e-8 kg; source Jungbluth, N. 2007; lognormal variance with pedigree 1.212, pedigree (1,1,3,1,1)
  (same comment as for Molybdenum)
- Arsenic, ion [water, surface water]: 4.3318e-11 kg; source Jungbluth, N. 2007, p. Tab. 12.26, p. 238; lognormal variance with pedigree 0.002, pedigree (1,1,3,1,1)
  (same comment as for COD, Chemical Oxygen Demand)
- Water [air, unspecified]: 5.46638e-6 m3; name water_to_air_unspecified; = (water_softened_input/1000)*fraction_WCS_to_air+(water_decarbonised_input/1000)*fraction_WDC_to_air+water_cooling_UNO_input*fraction_CW_to_air*(efficiency_oil_country/3.6); lognormal variance with pedigree 0.0427, pedigree (2,2,3,1,1)
  (same comment as for Water)
  property fraction, origin: unspecified 0.953683; name fraction_origin_unspecified
  property fraction, origin: salt water 0; name fraction_origin_salt_water
  property fraction, origin: fresh water 0.046317; name fraction_origin_fresh_water
- Benzene [air, urban air close to ground]: 1.92911e-8 kg; source Jungbluth, N. 2007; lognormal variance with pedigree 0.092, pedigree (1,1,3,1,1)
  (same comment as for Acetic acid)
- Hydrogen fluoride [air, urban air close to ground]: 1.09166e-8 kg; source Jungbluth, N. 2007, p. Tab. 12.25; lognormal variance with pedigree 0.0612, pedigree (2,3,3,1,3)
  Literature
  Amount was scaled to the amount of reference product.
- Vanadium, ion [water, surface water]: 1.31031e-8 kg; source Jungbluth, N. 2007, p. Tab. 12.26, p. 238; lognormal variance with pedigree 0.672, pedigree (1,1,3,1,1)
  (same comment as for COD, Chemical Oxygen Demand)
- Cadmium [air, urban air close to ground]: 2.35243e-9 kg; source Jungbluth, N. 2007, p. Tab. 12.23, Tab. 12.24; lognormal variance with pedigree 1.212, pedigree (1,1,3,1,1)
  (same comment as for Molybdenum)
- Cobalt [water, surface water]: 8.66397e-11 kg; source Jungbluth, N. 2007, p. Tab. 12.26, p. 238; lognormal variance with pedigree 0.002, pedigree (1,1,3,1,1)
  (same comment as for COD, Chemical Oxygen Demand)
- Ethanol [air, urban air close to ground]: 1.92911e-7 kg; source Jungbluth, N. 2007; lognormal variance with pedigree 0.092, pedigree (1,1,3,1,1)
  (same comment as for Acetic acid)
- Dioxins, measured as 2,3,7,8-tetrachlorodibenzo-p-dioxin [air, urban air close to ground]: 7.26295e-15 kg; source Jungbluth, N. 2007, p. Tab. 12.22 p. 235; lognormal variance with pedigree 0.3146, pedigree (2,4,3,1,1)
  Literature data for this country
  Amount was scaled to the amount of reference product.
- Particulates, < 2.5 um [air, urban air close to ground]: 1.90648e-6 kg; source Jungbluth, N. 2007, p. Tab. 12.17 / Tab. 12.18; lognormal variance with pedigree 0.3027, pedigree (2,2,3,1,1)
  Literature data for this country
  Amount was scaled to the amount of reference product.
- Iron, ion [water, surface water]: 4.55739e-8 kg; source Jungbluth, N. 2007, p. Tab. 12.26, p. 238; lognormal variance with pedigree 0.242, pedigree (1,1,3,1,1)
  (same comment as for COD, Chemical Oxygen Demand)
- Sulfur dioxide [air, urban air close to ground]: 0.00030068 kg; source Jungbluth, N. 2007, p. Tab. 12.14 p. 230; lognormal variance with pedigree 0.0027, pedigree (2,2,3,1,1)
  Literature data for this country
  Amount was scaled to the amount of reference product.
- Methane, fossil [air, urban air close to ground]: 1.92911e-6 kg; source Jungbluth, N. 2007, p. Tab. 12.19, Tab. 12.20; lognormal variance with pedigree 0.092, pedigree (1,1,3,1,1)
  (same comment as for Acetic acid)
- Hydrocarbons, aliphatic, unsaturated [air, urban air close to ground]: 1.92911e-8 kg; source Jungbluth, N. 2007; lognormal variance with pedigree 0.092, pedigree (1,1,3,1,1)
  (same comment as for Acetic acid)
- Hydrocarbons, aliphatic, alkanes, unspecified [air, urban air close to ground]: 3.85815e-7 kg; source Jungbluth, N. 2007; lognormal variance with pedigree 0.092, pedigree (1,1,3,1,1)
  (same comment as for Acetic acid)
- Acetaldehyde [air, urban air close to ground]: 9.4488e-8 kg; source Jungbluth, N. 2007; lognormal variance with pedigree 0.092, pedigree (1,1,3,1,1)
  (same comment as for Acetic acid)
- Cobalt [air, urban air close to ground]: 2.60554e-8 kg; source Jungbluth, N. 2007, p. Tab. 12.23, Tab. 12.24; lognormal variance with pedigree 1.212, pedigree (1,1,3,1,1)
  (same comment as for Molybdenum)
- Nitrogen oxides [air, urban air close to ground]: 9.95002e-5 kg; source Jungbluth, N. 2007, p. Tab. 12.15 p. 231; lognormal variance with pedigree 0.0427, pedigree (2,2,3,1,1)
  Literature data for this country
  Amount was scaled to the amount of reference product.
- Phosphorus [water, surface water]: 6.71459e-9 kg; source Jungbluth, N. 2007, p. Tab. 12.26, p. 238; lognormal variance with pedigree 0.002, pedigree (1,1,3,1,1)
  (same comment as for COD, Chemical Oxygen Demand)
- AOX, Adsorbable Organic Halogen as Cl [water, surface water]: 1.53786e-9 kg; source Jungbluth, N. 2007, p. Tab. 12.26, p. 238; lognormal variance with pedigree 0.002, pedigree (1,1,3,1,1)
  (same comment as for COD, Chemical Oxygen Demand)
- Tin, ion [water, surface water]: 4.3318e-11 kg; source Jungbluth, N. 2007, p. Tab. 12.26, p. 238; lognormal variance with pedigree 0.002, pedigree (1,1,3,1,1)
  (same comment as for COD, Chemical Oxygen Demand)
- Chromium [air, urban air close to ground]: 8.59724e-9 kg; source Jungbluth, N. 2007, p. Tab. 12.23, Tab. 12.24; lognormal variance with pedigree 1.462, pedigree (1,1,3,1,1)
  (same comment as for Molybdenum)
- Arsenic [air, urban air close to ground]: 4.91317e-9 kg; source Jungbluth, N. 2007, p. Tab. 12.23, Tab. 12.24; lognormal variance with pedigree 1.212, pedigree (1,1,3,1,1)
  (same comment as for Molybdenum)
- PAH, polycyclic aromatic hydrocarbons [air, urban air close to ground]: 1.99729e-10 kg; source Jungbluth, N. 2007, p. Tab. 12.21, p. 235; lognormal variance with pedigree 0.3027, pedigree (2,2,3,1,1)
  Literature data for this country
  Amount was scaled to the amount of reference product.
- Mercury [water, surface water]: 4.54868e-11 kg; source Jungbluth, N. 2007, p. Tab. 12.26, p. 238; lognormal variance with pedigree 0.562, pedigree (1,1,3,1,1)
  (same comment as for COD, Chemical Oxygen Demand)
- Mercury [air, urban air close to ground]: 5.44014e-11 kg; source Jungbluth, N. 2007; lognormal variance with pedigree 1.632, pedigree (1,1,3,1,1)
  Calculation from ranges
  Amount was scaled to the amount of reference product.
- Hydrogen chloride [air, urban air close to ground]: 1.63567e-8 kg; source Jungbluth, N. 2007, p. Tab. 12.25; lognormal variance with pedigree 0.0612, pedigree (2,3,3,1,3)
  Literature
  Amount was scaled to the amount of reference product.
- Ammonia [air, urban air close to ground]: 3.62676e-8 kg; source Jungbluth, N. 2007, p. p.232; lognormal variance with pedigree 1.102, pedigree (1,1,3,1,1)
  Calculation from ranges
  Amount was scaled to the amount of reference product.
- Sodium [air, urban air close to ground]: 1.08803e-7 kg; source Jungbluth, N. 2007, p. Tab. 12.25; lognormal variance with pedigree 0.0687, pedigree (3,3,4,3,3)
  Literature
  Amount was scaled to the amount of reference product.
- Zinc, ion [water, surface water]: 2.28849e-9 kg; source Jungbluth, N. 2007, p. Tab. 12.26, p. 238; lognormal variance with pedigree 0.262, pedigree (1,1,3,1,1)
  (same comment as for COD, Chemical Oxygen Demand)
- Particulates, > 2.5 um, and < 10um [air, urban air close to ground]: 1.90648e-6 kg; source Jungbluth, N. 2007, p. Tab. 12.17 / Tab. 12.18; lognormal variance with pedigree 0.1227, pedigree (2,2,3,1,1)
  Literature data for this country
  Amount was scaled to the amount of reference product.
- Hydrocarbons, unspecified [water, surface water]: 1.34589e-8 kg; source Jungbluth, N. 2007, p. Tab. 12.26, p. 238; lognormal variance with pedigree 0.042, pedigree (1,1,3,1,1)
  (same comment as for COD, Chemical Oxygen Demand)
- BOD5, Biological Oxygen Demand [water, surface water]: 6.09296e-7 kg; source Jungbluth, N. 2007, p. Tab. 12.26, p. 238; lognormal variance with pedigree 0.292, pedigree (1,1,3,1,1)
  (same comment as for COD, Chemical Oxygen Demand)
- Lead [air, urban air close to ground]: 5.28383e-9 kg; source Jungbluth, N. 2007; lognormal variance with pedigree 1.212, pedigree (1,1,3,1,1)
  (same comment as for Molybdenum)
- Lead [water, surface water]: 1.80932e-9 kg; source Jungbluth, N. 2007, p. Tab. 12.26, p. 238; lognormal variance with pedigree 0.502, pedigree (1,1,3,1,1)
  (same comment as for COD, Chemical Oxygen Demand)
- Thallium [water, surface water]: 1.34292e-9 kg; source Jungbluth, N. 2007, p. Tab. 12.26, p. 238; lognormal variance with pedigree 0.002, pedigree (1,1,3,1,1)
  (same comment as for COD, Chemical Oxygen Demand)
- Acetone [air, urban air close to ground]: 9.4488e-8 kg; source Jungbluth, N. 2007; lognormal variance with pedigree 0.092, pedigree (1,1,3,1,1)
  (same comment as for Acetic acid)
- Sulfate [water, surface water]: 7.24518e-5 kg; source Jungbluth, N. 2007, p. Tab. 12.26, p. 238; lognormal variance with pedigree 0.022, pedigree (1,1,3,1,1)
  (same comment as for COD, Chemical Oxygen Demand)

## Sampling procedure
Literature, environmental reports and questionnaires

## Extrapolations
Data are originally from sources from the 90ies. Uncertainty has been adjusted accordingly.

## Review by Carl Vadenbo 2015-07-24
The update of the whole electricity sector for the ecoinvent v3.2 database consist of hundreds of datasets. All these datasets have passed through a streamlined review processes where the underlying modelling of production volumes, technology shares and efficiencies was reviewed in detail prior to the datasets being submitted to the database.
