# treatment of waste sealing sheet, polyethylene, municipal incineration

Dataset: EcoSpold 2, unit process
Geography: CH
Time period: 1994-01-01 to 2019-12-31
Technology level: outdated
Classification: EcoSpold01Categories: waste management/municipal incineration
Classification: ISIC rev.4 ecoinvent: 3821:Treatment and disposal of non-hazardous waste
Synonyms: PE
Tags: ConvertedDataset; Treatment
Scenario: Business-as-Usual
System model: Allocation at the point of substitution
Generated by: Gabor Doka (obsolete)
Published in: Doka G. 2007
Database: ecoinvent
isCopyrightProtected: true
accessRestrictedTo: 1

## General comment
Inventoried waste contains 1.2% Glass; 85.3% PE sealing sheet; 13.5% Filler (lime); .
waste composition (wet, in ppm): upper heating value 36.33 MJ/kg; lower heating value 36.03 MJ/kg; H2O 3633.1; O 103200; H 103910; C 713520; S 362.12; N 1100.4; P n.a.; B n.a.; Cl 1242.1; Br 8.1346; F 12.202; I n.a.; Ag n.a.; As 1.7547; Ba 203.36; Cd 28.803; Co 1.4236; Cr 14.81; Cu 35.185; Hg 0.044723; Mn 25.488; Mo n.a.; Ni 1.2663; Pb 19.94; Sb 8.5413; Se 1.7083; Sn 3.2353; V 1871; Zn 5020.8; Be 0.40673; Sc n.a.; Sr 71.991; Ti 813.46; Tl 0.32538; W n.a.; Si 4309.1; Fe 1301.5; Ca 57070; Al 162.69; K n.a.; Mg 81.346; Na 1965.8;
Share of carbon in waste that is biogenic 0%.
Share of iron in waste that is metallic/recyclable 0%.
Net energy produced in MSWI: 4.17MJ/kg waste electric energy and 8.37MJ/kg waste thermal energy
Allocation of energy production: no substitution or expansion. Total burden allocated to waste disposal function of MSWI.
One kg of this waste produces 0.1198 kg of slag and 0.01075 kg of residues, which are landfilled. Additional solidification with 0.004301 kg of cement.
[This dataset was already contained in the ecoinvent database version 2. It was not individually updated during the transfer to ecoinvent version 3. Life Cycle Impact Assessment results may still have changed, as they are affected by changes in the supply chain, i.e. in other datasets. This dataset was generated following the ecoinvent quality guidelines for version 2. It may have been subject to central changes described in the ecoinvent version 3 change report (http://www.ecoinvent.org/database/ecoinvent-version-3/reports-of-changes/), and the results of the central updates were reviewed extensively. The changes added e.g. consistent water flows and other information throughout the database. The documentation of this dataset can be found in the ecoinvent reports of version 2, which are still available via the ecoinvent website. The change report linked above covers all central changes that were made during the conversion process.]

## Included activities end
waste-specific air and water emisions from incineration, auxiliary material consumption for flue gas cleaning. Short-term emissions to river water and long-term emisisons to ground water from slag compartment (from bottom slag) and residual material landfill (from solidified fly ashes and scrubber slugde). Process energy demands for MSWI.

## Geography
Specific to the technology mix encountered in Switzerland in 2000. Well applicable to modern incineration practices in Europe, North America or Japan.

## Technology
replaced by newer incineration technology with fly ash extraction. Average Swiss MSWI plants in 2000 with electrostatic precipitator for fly ash (ESP), wet flue gas scrubber and 29.4% SNCR , 32.2% SCR-high dust , 24.6% SCR-low dust -DeNOx facilities and 13.8% without Denox (by burnt waste, according to Swiss average). Share of waste incinerated in plants with magnetic scrap separation from slag : 50%. Gross electric efficiency technology mix 12.997% and Gross thermal efficiency technology mix 25.57%

## Time period
Waste composition as given in literature reference, theoretical data or other source. Transfer coefficients for modern Swiss MSWI. Emission speciation based on early 90ies data.

## Reference product
- waste sealing sheet, polyethylene: -1 kg; By-product classification Waste; CPC 39270: Waste, parings and scrap of plastics; CAS 9002-88-4
  EcoSpold01Location=CH
  production volume 0 kg
    outdated. Replaced by newer incineration technology with fly ash extraction.
  property price 0 EUR2005
    Waste products are assigned a price of zero as they are assumed to require further treatment.
  property carbon content, fossil 0.851042
    C content in 1 kg DM was calculated using data in Tab A.5, ecoinvent v2.2 report 13_I
  property carbon content 0.851042
    carbon content on a dry matter basis (reserved; not for manual entry)
  properties: dry mass 0.96 kg, water content 0.0416667, wet mass 1 kg, water in wet mass 0.04 kg, carbon content, non-fossil 0, carbon allocation 0.817 kg

## Inputs from technosphere
- titanium dioxide: 1.59e-6 kg; lognormal variance with pedigree 2.31, pedigree (1,1,5,1,1)
  uncertainty calculated from uncertainty in average DeNOx input, uncertainty in the share of thermal NOx, uncertainty of nitrogen content in average municipal waste and the unertainty in nitrogen content in *this* waste.
  EcoSpold01Location=RER
  properties: wet mass 1 kg, dry mass 1 kg
- ammonia, liquid: 5.55e-5 kg; lognormal variance with pedigree 1.6, pedigree (1,1,5,1,1)
  EcoSpold01Location=CH
  uncertainty calculated from uncertainty in average DeNOx input, uncertainty in the share of thermal NOx, uncertainty of nitrogen content in average municipal waste and the unertainty in nitrogen content in *this* waste.
  properties: dry mass 1 kg, wet mass 1 kg
- chemical, organic: 0.000115 kg; lognormal variance with pedigree 1.18, pedigree (1,1,5,1,1)
  Proxy for TMT15. uncertainty calculated from uncertainty in average auxiliary material input, and the unertainty of the waste composition of this waste
  EcoSpold01Location=GLO
  properties: wet mass 1 kg, dry mass 1 kg, carbon content, fossil 0.628
  note on carbon content, fossil: This dataset is an unweighted average of 20 organic substances (listed in Tab 88.1, ecoinvent v2.2 report 8, part II), being part of the top100 chemicals included in this database. The C-content has also been calculated as an unweighted average of the C content of the substances composing this dataset.
- process-specific burdens, slag landfill: 0.12 kg; lognormal variance with pedigree 0.09, pedigree (1,1,5,1,1)
  EcoSpold01Location=CH
  uncertainty is calculated from uncertainties in waste composition and transfer coefficients in incinerator;activityLink introduced to establish a direct link to the corresponding regional supply of this product
- sodium hydroxide, without water, in 50% solution state: 0.00134 kg; lognormal variance with pedigree 0.59, pedigree (1,1,5,1,1)
  EcoSpold01Location=RER
  uncertainty calculated from uncertainty in average auxiliary material input, and the unertainty of the waste composition of this waste
  properties: dry mass 1 kg, wet mass 1 kg
- process-specific burdens, municipal waste incineration: 1 kg; lognormal variance with pedigree 0.04, pedigree (1,1,5,1,1)
  demands per kilogram waste. uncertainty is heeded in the module;activityLink introduced to establish a direct link to the corresponding regional supply of this product
  EcoSpold01Location=CH
- municipal waste incineration facility: 2.5e-10 unit; lognormal variance with pedigree 0.04, pedigree (1,1,5,1,1)
  EcoSpold01Location=CH
  demands per kilogram waste. uncertainty is heeded in the module
- residual material landfill: 2.24e-11 unit; lognormal variance with pedigree 0.14, pedigree (1,1,5,1,1)
  uncertainty is calculated from uncertainties in waste composition and transfer coefficients in incinerator
  EcoSpold01Location=CH
- waste cement, hydrated: -0.0108 kg; lognormal variance with pedigree 0.14, pedigree (1,1,5,1,1)
  Hydrated cement for solidification of landfilled residual material. Uncertainty calculated from unertainty of the waste composition of this waste and transfer coefficients in the incinerator and of the solidification recipe.
  EcoSpold01Location=CH
  production volume 0 kg; = ABS( (Ref('643ab009-2e50-4dbe-8785-151229d519e4')*-1)/ Ref('342619d5-9ebf-4af4-9ef6-14a6caa0f92b')* Ref('342619d5-9ebf-4af4-9ef6-14a6caa0f92b', 'ProductionVolume'))
    Calculated from the production volume of waste sealing sheet, polyethylene, 4% water in proportion to the respective output amounts.
  properties: dry mass 1 kg, wet mass 1 kg
- iron (III) chloride, without water, in 40% solution state: 0.000547 kg; lognormal variance with pedigree 0.47, pedigree (1,1,5,1,1)
  uncertainty calculated from uncertainty in average auxiliary material input, and the unertainty of the waste composition of this waste
  EcoSpold01Location=CH
  properties: wet mass 1 kg, dry mass 1 kg
- hydrochloric acid, without water, in 30% solution state: 4.17e-6 kg; lognormal variance with pedigree 0.34, pedigree (1,1,5,1,1)
  (same comment as for sodium hydroxide, without water, in 50% solution state)
  properties: wet mass 1 kg, dry mass 1 kg
- process-specific burdens, residual material landfill: 0.0108 kg; lognormal variance with pedigree 0.14, pedigree (1,1,5,1,1)
  (same comment as for process-specific burdens, slag landfill)
- chemical, inorganic: 6.95e-6 kg; lognormal variance with pedigree 0.34, pedigree (1,1,5,1,1)
  Proxy for Polyelectrolyte. uncertainty calculated from uncertainty in average auxiliary material input, and the unertainty of the waste composition of this waste
  EcoSpold01Location=GLO
  properties: wet mass 1 kg, dry mass 1 kg, carbon content, fossil 0.003
  note on carbon content, fossil: This dataset is an unweighted average of 20 inorganic substances (listed in Tab 88.1, ecoinvent v2.2 report 8, part II), being part of the top100 chemicals included in this database. The C-content has also been calculated as an unweighted average of the C content of the substances composing this dataset.
- heat, district or industrial, natural gas: 0.004869 MJ; lognormal variance with pedigree 1.6, pedigree (1,1,5,1,1)
  (same comment as for titanium dioxide)
- chromium oxide, flakes: 3.24e-8 kg; lognormal variance with pedigree 2.31, pedigree (1,1,5,1,1)
  EcoSpold01Location=RER
  Proxy for vanadium pentoxide V2O5 in SCR catalyst, uncertainty calculated from uncertainty in average DeNOx input, uncertainty in the share of thermal NOx, uncertainty of nitrogen content in average municipal waste and the unertainty in nitrogen content in *this* waste.
  properties: wet mass 1 kg, dry mass 1 kg
- slag landfill: 2.13e-10 unit; lognormal variance with pedigree 0.09, pedigree (1,1,5,1,1)
  EcoSpold01Location=CH
  uncertainty is calculated from uncertainties in waste composition and transfer coefficients in incinerator
- cement, unspecified: 0.0043 kg; lognormal variance with pedigree 0.14, pedigree (1,1,5,1,1)
  EcoSpold01Location=CH
  Cement for solidification of landfilled residual material. Uncertainty calculated from unertainty of the waste composition of this waste, of transfer coefficients in the incinerator and of the solidification recipe.
  properties: wet mass 1 kg, dry mass 1 kg
- quicklime, milled, packed: 0.000215 kg; lognormal variance with pedigree 0.67, pedigree (1,1,5,1,1)
  (same comment as for iron (III) chloride, without water, in 40% solution state)
  properties: water content 0.010101, dry mass 0.99 kg, wet mass 1 kg

## Emissions to nature
- Sodium, ion [water, surface water]: 0.000352 kg; lognormal variance with pedigree 0.37, pedigree (1,1,5,1,1)
  uncertainty is calculated from uncertainties in waste composition and transfer coefficients in incinerator and landfills
- Manganese [water, ground-, long-term]: 2.19e-5 kg; lognormal variance with pedigree 1.27, pedigree (1,1,5,1,1)
  Long-term emissions from landfilling of incineration residues. uncertainty is calculated from uncertainties in waste composition and transfer coefficients in incinerator and landfills.
- Beryllium [water, surface water]: 2.53e-10 kg; lognormal variance with pedigree 1.96, pedigree (1,1,5,1,1)
  (same comment as for Sodium, ion)
- Chromium VI [water, surface water]: 3.45e-7 kg; lognormal variance with pedigree 1.18, pedigree (1,1,5,1,1)
  (same comment as for Sodium, ion)
- Copper, ion [water, ground-, long-term]: 2.85e-5 kg; lognormal variance with pedigree 1.11, pedigree (1,1,5,1,1)
  (same comment as for Manganese)
- Iron [air, urban air close to ground]: 4.35e-8 kg; lognormal variance with pedigree 0.71, pedigree (1,1,5,1,1)
  uncertainty is calculated from uncertainties in waste composition and transfer coefficients in incinerator
- Manganese [air, urban air close to ground]: 1.39e-13 kg; lognormal variance with pedigree 1.31, pedigree (1,1,5,1,1)
  (same comment as for Iron)
- Selenium [water, surface water]: 5.56e-7 kg; lognormal variance with pedigree 1.23, pedigree (1,1,5,1,1)
  (same comment as for Sodium, ion)
- Silicon [water, surface water]: 1.59e-7 kg; lognormal variance with pedigree 1.59, pedigree (1,1,5,1,1)
  (same comment as for Sodium, ion)
- Chloride [water, surface water]: 0.00121 kg; lognormal variance with pedigree 0.61, pedigree (1,1,5,1,1)
  (same comment as for Sodium, ion)
- Dinitrogen monoxide [air, urban air close to ground]: 4.65e-6 kg; lognormal variance with pedigree 1.71, pedigree (1,1,5,1,1)
  uncertainty calculated from uncertainty in average N-emissions, uncertainty in the share of thermal NOx, uncertainty of nitrogen content in average municipal waste and the unertainty in nitrogen content in *this* waste.
- Silicon [water, ground-, long-term]: 3.69e-5 kg; lognormal variance with pedigree 6.18, pedigree (1,1,5,1,1)
  (same comment as for Manganese)
- Thallium [water, ground-, long-term]: 1.9e-7 kg; lognormal variance with pedigree 1.33, pedigree (1,1,5,1,1)
  (same comment as for Manganese)
- Calcium, ion [water, ground-, long-term]: 0.0565 kg; lognormal variance with pedigree 0.21, pedigree (1,1,5,1,1)
  (same comment as for Manganese)
- Chromium VI [water, ground-, long-term]: 1.15e-6 kg; lognormal variance with pedigree 2.04, pedigree (1,1,5,1,1)
  (same comment as for Manganese)
- Bromine [water, surface water]: 6.7e-6 kg; lognormal variance with pedigree 1.14, pedigree (1,1,5,1,1)
  (same comment as for Sodium, ion)
- Hydrogen chloride [air, urban air close to ground]: 1.38e-8 kg; lognormal variance with pedigree 0.72, pedigree (1,1,5,1,1)
  (same comment as for Iron)
- Chromium, ion [water, surface water]: 3.37e-8 kg; lognormal variance with pedigree 1.27, pedigree (1,1,5,1,1)
  (same comment as for Sodium, ion)
- Tin [air, urban air close to ground]: 4.29e-9 kg; lognormal variance with pedigree 1.48, pedigree (1,1,5,1,1)
  (same comment as for Iron)
- Vanadium [air, urban air close to ground]: 1.87e-7 kg; lognormal variance with pedigree 0.65, pedigree (1,1,5,1,1)
  (same comment as for Iron)
- Cadmium, ion [water, surface water]: 1.31e-8 kg; lognormal variance with pedigree 1.14, pedigree (1,1,5,1,1)
  (same comment as for Sodium, ion)
- Aluminium [water, surface water]: 1.35e-8 kg; lognormal variance with pedigree 1.22, pedigree (1,1,5,1,1)
  (same comment as for Sodium, ion)
- Cadmium [air, urban air close to ground]: 1.59e-9 kg; lognormal variance with pedigree 1.2, pedigree (1,1,5,1,1)
  (same comment as for Iron)
- Bromine [water, ground-, long-term]: 1.42e-6 kg; lognormal variance with pedigree 1.34, pedigree (1,1,5,1,1)
  (same comment as for Manganese)
- Beryllium [water, ground-, long-term]: 3.28e-7 kg; lognormal variance with pedigree 1.5, pedigree (1,1,5,1,1)
  (same comment as for Manganese)
- TOC, Total Organic Carbon [water, ground-, long-term]: 0.023 kg; lognormal variance with pedigree 0.05, pedigree (1,1,5,1,1)
  (same comment as for Manganese)
- DOC, Dissolved Organic Carbon [water, surface water]: 4.82e-5 kg; lognormal variance with pedigree 0.48, pedigree (1,1,5,1,1)
  (same comment as for Sodium, ion)
- Iron, ion [water, surface water]: 4.45e-7 kg; lognormal variance with pedigree 0.65, pedigree (1,1,5,1,1)
  (same comment as for Sodium, ion)
- Cadmium, ion [water, ground-, long-term]: 2.97e-7 kg; lognormal variance with pedigree 6.96, pedigree (1,1,5,1,1)
  (same comment as for Manganese)
- Selenium [water, ground-, long-term]: 1.15e-6 kg; lognormal variance with pedigree 1.05, pedigree (1,1,5,1,1)
  (same comment as for Manganese)
- Barium [water, surface water]: 2.8e-8 kg; lognormal variance with pedigree 1.79, pedigree (1,1,5,1,1)
  (same comment as for Sodium, ion)
- Lead [water, ground-, long-term]: 2.14e-6 kg; lognormal variance with pedigree 6.91, pedigree (1,1,5,1,1)
  (same comment as for Manganese)
- Lead [air, urban air close to ground]: 7.11e-10 kg; lognormal variance with pedigree 1.25, pedigree (1,1,5,1,1)
  (same comment as for Iron)
- Sulfur dioxide [air, urban air close to ground]: 1.54e-6 kg; lognormal variance with pedigree 0.85, pedigree (1,1,5,1,1)
  (same comment as for Iron)
- Zinc [air, urban air close to ground]: 8.2e-8 kg; lognormal variance with pedigree 0.54, pedigree (1,1,5,1,1)
  (same comment as for Iron)
- Titanium, ion [water, surface water]: 3.92e-9 kg; lognormal variance with pedigree 2.08, pedigree (1,1,5,1,1)
  (same comment as for Sodium, ion)
- COD, Chemical Oxygen Demand [water, surface water]: 0.00012 kg; lognormal variance with pedigree 0.49, pedigree (1,1,5,1,1)
  (same comment as for Sodium, ion)
- Mercury [air, urban air close to ground]: 1.4e-15 kg; lognormal variance with pedigree 2.06, pedigree (1,1,5,1,1)
  (same comment as for Iron)
- Vanadium, ion [water, surface water]: 1.26e-6 kg; lognormal variance with pedigree 0.88, pedigree (1,1,5,1,1)
  (same comment as for Sodium, ion)
- Barium [water, ground-, long-term]: 0.000181 kg; lognormal variance with pedigree 0.96, pedigree (1,1,5,1,1)
  (same comment as for Manganese)
- Calcium [air, urban air close to ground]: 3.66e-6 kg; lognormal variance with pedigree 0.25, pedigree (1,1,5,1,1)
  (same comment as for Iron)
- Nitrate [water, ground-, long-term]: 3.95e-5 kg; lognormal variance with pedigree 0.7, pedigree (1,1,5,1,1)
  (same comment as for Manganese)
- Antimony [water, ground-, long-term]: 5.46e-6 kg; lognormal variance with pedigree 1.1, pedigree (1,1,5,1,1)
  (same comment as for Manganese)
- Arsenic, ion [water, surface water]: 6.97e-7 kg; lognormal variance with pedigree 1.3, pedigree (1,1,5,1,1)
  (same comment as for Sodium, ion)
- Manganese [water, surface water]: 1.43e-9 kg; lognormal variance with pedigree 1.94, pedigree (1,1,5,1,1)
  (same comment as for Sodium, ion)
- Thallium [water, surface water]: 1.99e-10 kg; lognormal variance with pedigree 1.93, pedigree (1,1,5,1,1)
  (same comment as for Sodium, ion)
- Strontium [air, urban air close to ground]: 7.2e-9 kg; lognormal variance with pedigree 1.08, pedigree (1,1,5,1,1)
  (same comment as for Iron)
- Iron, ion [water, ground-, long-term]: 0.00061 kg; lognormal variance with pedigree 1.42, pedigree (1,1,5,1,1)
  (same comment as for Manganese)
- Nickel [air, urban air close to ground]: 3.51e-14 kg; lognormal variance with pedigree 1.68, pedigree (1,1,5,1,1)
  (same comment as for Iron)
- Aluminium [water, ground-, long-term]: 0.00012 kg; lognormal variance with pedigree 0.88, pedigree (1,1,5,1,1)
  (same comment as for Manganese)
- Titanium [air, urban air close to ground]: 8.13e-7 kg; lognormal variance with pedigree 0.74, pedigree (1,1,5,1,1)
  (same comment as for Iron)
- Tin, ion [water, surface water]: 1.2e-10 kg; lognormal variance with pedigree 1.51, pedigree (1,1,5,1,1)
  (same comment as for Sodium, ion)
- Nickel, ion [water, surface water]: 7.95e-10 kg; lognormal variance with pedigree 2.2, pedigree (1,1,5,1,1)
  (same comment as for Sodium, ion)
- Sulfate [water, surface water]: 0.000176 kg; lognormal variance with pedigree 0.41, pedigree (1,1,5,1,1)
  (same comment as for Sodium, ion)
- COD, Chemical Oxygen Demand [water, ground-, long-term]: 0.0581 kg; lognormal variance with pedigree 0.05, pedigree (1,1,5,1,1)
  (same comment as for Manganese)
- TOC, Total Organic Carbon [water, surface water]: 4.82e-5 kg; lognormal variance with pedigree 0.48, pedigree (1,1,5,1,1)
  (same comment as for Sodium, ion)
- Magnesium [water, ground-, long-term]: 7.51e-5 kg; lognormal variance with pedigree 1.01, pedigree (1,1,5,1,1)
  (same comment as for Manganese)
- Fluoride [water, ground-, long-term]: 1.09e-5 kg; lognormal variance with pedigree 0.88, pedigree (1,1,5,1,1)
  (same comment as for Manganese)
- BOD5, Biological Oxygen Demand [water, surface water]: 5.02e-5 kg; lognormal variance with pedigree 0.36, pedigree (1,1,5,1,1)
  (same comment as for Sodium, ion)
- Nickel, ion [water, ground-, long-term]: 1.21e-6 kg; lognormal variance with pedigree 1.54, pedigree (1,1,5,1,1)
  (same comment as for Manganese)
- Mercury [water, surface water]: 5.41e-10 kg; lognormal variance with pedigree 1.62, pedigree (1,1,5,1,1)
  (same comment as for Sodium, ion)
- Magnesium [water, surface water]: 2.85e-7 kg; lognormal variance with pedigree 1.51, pedigree (1,1,5,1,1)
  (same comment as for Sodium, ion)
- Tin, ion [water, ground-, long-term]: 1.63e-6 kg; lognormal variance with pedigree 1.79, pedigree (1,1,5,1,1)
  (same comment as for Manganese)
- Thallium [air, urban air close to ground]: 3.25e-10 kg; lognormal variance with pedigree 1.77, pedigree (1,1,5,1,1)
  (same comment as for Iron)
- Strontium [water, ground-, long-term]: 7.19e-5 kg; lognormal variance with pedigree 1.05, pedigree (1,1,5,1,1)
  (same comment as for Manganese)
- Antimony [water, surface water]: 2.96e-6 kg; lognormal variance with pedigree 1.13, pedigree (1,1,5,1,1)
  (same comment as for Sodium, ion)
- Magnesium [air, urban air close to ground]: 1.12e-7 kg; lognormal variance with pedigree 1.05, pedigree (1,1,5,1,1)
  (same comment as for Iron)
- Chromium [air, urban air close to ground]: 7.82e-13 kg; lognormal variance with pedigree 1.36, pedigree (1,1,5,1,1)
  (same comment as for Iron)
- Aluminium [air, urban air close to ground]: 2.54e-7 kg; lognormal variance with pedigree 0.95, pedigree (1,1,5,1,1)
  (same comment as for Iron)
- Arsenic [air, urban air close to ground]: 1.58e-14 kg; lognormal variance with pedigree 1.65, pedigree (1,1,5,1,1)
  (same comment as for Iron)
- Cobalt [water, ground-, long-term]: 1.25e-6 kg; lognormal variance with pedigree 1.51, pedigree (1,1,5,1,1)
  (same comment as for Manganese)
- Chloride [water, ground-, long-term]: 2.96e-5 kg; lognormal variance with pedigree 0.33, pedigree (1,1,5,1,1)
  (same comment as for Manganese)
- Selenium [air, urban air close to ground]: 8.59e-15 kg; lognormal variance with pedigree 1.66, pedigree (1,1,5,1,1)
  (same comment as for Iron)
- Sodium, ion [water, ground-, long-term]: 0.0016 kg; lognormal variance with pedigree 0.48, pedigree (1,1,5,1,1)
  (same comment as for Manganese)
- Zinc, ion [water, ground-, long-term]: 8.09e-5 kg; lognormal variance with pedigree 5.16, pedigree (1,1,5,1,1)
  (same comment as for Manganese)
- Ammonia [air, urban air close to ground]: 8.72e-7 kg; lognormal variance with pedigree 1.71, pedigree (1,1,5,1,1)
  (same comment as for Dinitrogen monoxide)
- BOD5, Biological Oxygen Demand [water, ground-, long-term]: 0.019 kg; lognormal variance with pedigree 0.05, pedigree (1,1,5,1,1)
  (same comment as for Manganese)
- Nitrate [water, surface water]: 1.41e-5 kg; lognormal variance with pedigree 0.49, pedigree (1,1,5,1,1)
  (same comment as for Sodium, ion)
- Fluoride [water, surface water]: 9.38e-7 kg; lognormal variance with pedigree 0.93, pedigree (1,1,5,1,1)
  (same comment as for Sodium, ion)
- Bromine [air, urban air close to ground]: 2.44e-8 kg; lognormal variance with pedigree 1.35, pedigree (1,1,5,1,1)
  (same comment as for Iron)
- Arsenic, ion [water, ground-, long-term]: 1.06e-6 kg; lognormal variance with pedigree 1.53, pedigree (1,1,5,1,1)
  (same comment as for Manganese)
- Carbon monoxide, fossil [air, urban air close to ground]: 0.000223 kg; lognormal variance with pedigree 0.690625, pedigree (1,3,5,2,1)
  Literature data from switzerland and germany adapted to plant age distribution in switzerland
  Uncertainty: & basic uncertainty of 5; literature data from switzerland and germany adapted to plant age distribution in switzerland
- Copper [air, urban air close to ground]: 2.59e-10 kg; lognormal variance with pedigree 1.2, pedigree (1,1,5,1,1)
  (same comment as for Iron)
- Vanadium, ion [water, ground-, long-term]: 0.000321 kg; lognormal variance with pedigree 1.38, pedigree (1,1,5,1,1)
  (same comment as for Manganese)
- Titanium, ion [water, ground-, long-term]: 0.000244 kg; lognormal variance with pedigree 1.09, pedigree (1,1,5,1,1)
  (same comment as for Manganese)
- Calcium, ion [water, surface water]: 0.000248 kg; lognormal variance with pedigree 0.68, pedigree (1,1,5,1,1)
  (same comment as for Sodium, ion)
- Copper, ion [water, surface water]: 1.43e-9 kg; lognormal variance with pedigree 1.75, pedigree (1,1,5,1,1)
  (same comment as for Sodium, ion)
- Cobalt [air, urban air close to ground]: 4.52e-14 kg; lognormal variance with pedigree 1.66, pedigree (1,1,5,1,1)
  (same comment as for Iron)
- Nitrogen oxides [air, urban air close to ground]: 3.5e-5 kg; lognormal variance with pedigree 1.71, pedigree (1,1,5,1,1)
  (same comment as for Dinitrogen monoxide)
- Cyanide [air, urban air close to ground]: 9.9e-7 kg; lognormal variance with pedigree 1.71, pedigree (1,1,5,1,1)
  (same comment as for Dinitrogen monoxide)
- Methane, fossil [air, urban air close to ground]: 6.38e-6 kg; lognormal variance with pedigree 0.091225, pedigree (2,3,5,2,1)
  Confidential data from 5 plants in Switzerland and Germany
  Uncertainty: & basic uncertainty of 1.5; confidential data from 5 plants in Switzerland and Germany
- Antimony [air, urban air close to ground]: 3.32e-14 kg; lognormal variance with pedigree 1.46, pedigree (1,1,5,1,1)
  (same comment as for Iron)
- Zinc, ion [water, surface water]: 9.23e-7 kg; lognormal variance with pedigree 0.46, pedigree (1,1,5,1,1)
  (same comment as for Sodium, ion)
- Carbon dioxide, fossil [air, urban air close to ground]: 2.53 kg; lognormal variance with pedigree 0.04, pedigree (1,1,5,1,1)
  (same comment as for Iron)
- Sulfate [water, ground-, long-term]: 0.000908 kg; lognormal variance with pedigree 0.5, pedigree (1,1,5,1,1)
  (same comment as for Manganese)
- Beryllium [air, urban air close to ground]: 4.07e-10 kg; lognormal variance with pedigree 1.74, pedigree (1,1,5,1,1)
  (same comment as for Iron)
- Strontium [water, surface water]: 4.53e-8 kg; lognormal variance with pedigree 1.75, pedigree (1,1,5,1,1)
  (same comment as for Sodium, ion)
- Sodium [air, urban air close to ground]: 1.12e-5 kg; lognormal variance with pedigree 0.62, pedigree (1,1,5,1,1)
  (same comment as for Iron)
- Lead [water, surface water]: 5.48e-10 kg; lognormal variance with pedigree 1.18, pedigree (1,1,5,1,1)
  (same comment as for Sodium, ion)
- Hydrogen fluoride [air, urban air close to ground]: 6.42e-9 kg; lognormal variance with pedigree 1.31, pedigree (1,1,5,1,1)
  (same comment as for Iron)
- DOC, Dissolved Organic Carbon [water, ground-, long-term]: 0.023 kg; lognormal variance with pedigree 0.05, pedigree (1,1,5,1,1)
  (same comment as for Manganese)
- Mercury [water, ground-, long-term]: 6.06e-9 kg; lognormal variance with pedigree 2.66, pedigree (1,1,5,1,1)
  (same comment as for Manganese)
- Cobalt [water, surface water]: 2.44e-10 kg; lognormal variance with pedigree 1.99, pedigree (1,1,5,1,1)
  (same comment as for Sodium, ion)
- Barium [air, urban air close to ground]: 2.03e-7 kg; lognormal variance with pedigree 0.93, pedigree (1,1,5,1,1)
  (same comment as for Iron)

## Sampling procedure
waste-specific calculation based on literature data

## Extrapolations
This dataset has been extrapolated from year 2000 to the year of the calculation (2019). The uncertainty has been adjusted accordingly.

## Review by Niels Jungbluth 2003-07-15
Passed. Calculation for standard deviation 95 of, i.e., infrastructure,
land occupation, transport services or other services can differ from
standard Pedigree approach used in this project and figures obtained by
this procedure.
