# nutrient supply from coconut husk

Dataset: EcoSpold 2, unit process
Geography: GLO
Time period: 2010-01-01 to 2019-12-31
Technology level: current
Classification: ISIC rev.4 ecoinvent: 0161:Support activities for crop production
Scenario: Business-as-Usual
System model: Allocation at the point of substitution
Generated by: Lucia Valsasina
Published in: Philippine Coconut Authority 2000
Database: ecoinvent
isCopyrightProtected: true
accessRestrictedTo: 1

## General comment
This inventory describes the application of coconut husk for fertiliser use. This application provides the nutrients N, P2O5 and K2O contained in the coconut husk, namely 0.3% nitrogen, 0.02% P2O5 and 1.8% K2O.

## Included activities start
Activity starting with the application of coconut husk.

## Included activities end
The activity ends with the provision of N-fertiliser, P-fertiliser and K-fertiliser

## Geography
inventory based on composition of coconut husk

## Time period
Time validity adapted from coconut production activity

## Reference product
- phosphate fertiliser, as P2O5: 0 kg; name phosphate_fertiliser_output; = 0.018*DM*nutrient_input; CPC 3462: Mineral or chemical fertilizers, phosphatic; By-product classification allocatable product
  Literature data. (%N 0.3, %P 0.02, %K 1.8) on a DM basis. The exchanges’ amounts are expressed on a wet mass basis therefore the values are multiplied by the DM of coconut husk.
  Source: “Goat manure and coconut farm by-products. Recommended Organic fertilizers for coconut” Techno Guide Sheet No.6 Series of 2000. Department of Agriculture Philippine Coconut Authority, Research, Development & Extension Branch Davao Research Center.
  production volume 3.86667e8 kg; = 23629657208* phosphate_fertiliser_output
    Calculated from the production volume of coconut husk in the database and using the relative outputs of the nutrient.
  property price 0.241 EUR2005; name phosphate_fertiliser_outpu_price_EUR2005
    Temporary price data. Calculated as 90% of purchasers price based on: 2004 prices are calculated on basis of Import/Export data (tonnes and US$) from UN Trade Statistics Database (http://data.un.org/Browse.aspx?d=ComTrade, accessed 7/7-2010). N, P2O5, or K2O content (http://www.fertilizer.org/ifa/Home-Page/STATISTICS/Conversions-factors)
  property carbon content 0
    carbon content on a dry matter basis (reserved; not for manual entry)
  property true value 0.00394364; name phosphate_fertiliser_output_true_value
    allocation property applied in "true value" allocation // value calculated from revenue
  properties: water content 0, dry mass 1 kg, wet mass 1 kg, carbon content, fossil 0, carbon content, non-fossil 0, water in wet mass 0 kg, carbon allocation 0 kg
- nitrogen fertiliser, as N: 1 kg; name nitrogen_fertiliser_output; = 0.003*DM*nutrient_input; source Philippine Coconut Authority 2000; CPC 3461: Mineral or chemical fertilizers, nitrogenous; By-product classification allocatable product; pedigree (1,1,1,1,1)
  (same comment as for phosphate fertiliser, as P2O5)
  production volume 6.44445e7 kg; = 23629657208* nitrogen_fertiliser_output
    Calculated from production volume of reference product using the relative outputs.
  property price 0.473 EUR2005; name nitrogen_fertiliser_output_price_EUR2005
    (same comment as for phosphate fertiliser, as P2O5)
  property carbon content 0
    carbon content on a dry matter basis (reserved; not for manual entry)
  property true value 0.00129; name nitrogen_fertiliser_output_true_value
    allocation property applied in "true value" allocation // value calculated from revenue
  properties: water in wet mass 0 kg, carbon content, fossil 0, carbon content, non-fossil 0, dry mass 1 kg, wet mass 1 kg, water content 0, carbon allocation 0 kg

## By-products
- potassium fertiliser, as K2O: 0 kg; name potassium_fertiliser_output; = 0.0002* DM*nutrient_input; source Philippine Coconut Authority 2000; CPC 3463: Mineral or chemical fertilizers, potassic; By-product classification allocatable product; pedigree (1,1,1,1,1)
  (same comment as for phosphate fertiliser, as P2O5)
  production volume 4.2963e6 kg; = 23629657208* potassium_fertiliser_output
    Calculated from production volume of reference product using the relative outputs.
  property price 0.188 EUR2005; name potassium_fertiliser_output_price_EUR200
    Temporary price data. Calculated as 90% of purchasers price based on: 2004 import price calulated from FAOSTAT (http://faostat.fao.org/site/575/DesktopDefault.aspx?PageID=575#ancor [accessed 2011.01.27] Potash Fertilizers (K20 total nutrients) in kUSD/Mg
  property carbon content 0
    carbon content on a dry matter basis (reserved; not for manual entry)
  property true value 3.41818e-5; name potassium_fertiliser_output_true_value
    allocation property applied in "true value" allocation // value calculated from revenue
  properties: carbon content, non-fossil 0, wet mass 1 kg, dry mass 1 kg, water in wet mass 0 kg, carbon content, fossil 0, water content 0, carbon allocation 0 kg

## Inputs from technosphere
- coconut husk: 89.7905 kg; name nutrient_input; lognormal variance with pedigree 0.0512, pedigree (2,4,5,5,2)
  Total production volume of "coconut husk" (23629657208 kg), produced in the database can be used as nutrient supplement in agriculture.
  property zinc content 0; name nutrient_input_Zn_content
  property mercury content 0; name nutrient_input_Hg_content
  property lead content 1.9525e-7; name nutrient_input_Pb_content; = 0.1775/1E+06/0.90909
  property copper content 2.596e-6; name nutrient_input_Cu_content; = 2.36/1E+06/0.90909
  property cadmium content 3.3e-8; name nutrient_input_Cd_content; = 0.03/1E+06/0.90909
  property nickel content 9.43251e-7; name nutrient_input_Ni_content; = 0.8575/1E+06/0.90909
  property chromium content 2.409e-7; name nutrient_input_Cr_content; = 0.219/1E+06/0.90909
  property dry mass 0.909091 kg; name DM
  properties: phosphorus content 0.018, potassium content 0.0002, price 0.198 EUR2005, nitrogen content 0.003, wet mass 1 kg, carbon content, non-fossil 1, water content 0.1
  note on mercury content: Literature data. The heavy metal content in coir dust is used as an approximation for heavy metal content in coconut husk. Heavy metals expressed in µg metal / g coir dust, assumed 10% of moisture content for air dried dust. Source:Israel, U. and Eduok, U.M. (2012) Biosorption of zinc from aqueous solution using coconut (Cocos nucifera L) coir dust. Archives of Applied Science Research, 2012, 4 (2):809-819. Available: http://scholarsresearchlibrary.com/aasr-vol4-iss2/AASR-2012-4-2-809-819.pdf, accessed 25 April 2016.
  note on phosphorus content: Literature data. (%N 0.3, %P 1.8, %K 0.02) on a DM basis. Source: “Goat manure and coconut farm by-products. Recommended Organic fertilizers for coconut” Techno Guide Sheet No.6 Series of 2000. Department of Agriculture Philippine Coconut Authority, Research, Development & Extension Branch Davao Research Center.
  note on carbon content, non-fossil: Literature value. From Organic farming:compost (TNAU AGRITECH PORTAL Organic farming) Retrieved from http://agritech.tnau.ac.in/org_farm/orgfarm_coircompost.html, accessed 26 April 2016. C:N ratio reported is 112.1, nitrogen content is 0.38 kgN/kgDM)

## Sampling procedure
Dataset based on nutrient content of coconut husk for fertiliser use
