# sewer grid construction, 1.1E10l/year, 242 km

Dataset: EcoSpold 2, unit process
Geography: RoW
Time period: 1996-01-01 to 2019-12-31
Technology level: current
Classification: ISIC rev.4 ecoinvent: 4220:Construction of utility projects
Classification: EcoSpold01Categories: waste management/wastewater treatment
Synonyms: municipal sewer infrastructure for capacity class 2
Tags: ConvertedDataset
Scenario: Business-as-Usual
System model: Allocation at the point of substitution
Generated by: Gabor Doka (obsolete)
Published in: Doka G. 2007
Database: ecoinvent
isCopyrightProtected: true
accessRestrictedTo: 1

## General comment
Sewer system for municipal wastewater treatment plant capacity class 2 with an average per-captia equivalent PCE (Einwohnergleichwert) of 71'133. Average length 242 km. The lifetime is 100 years including a renovation after 70 years.
[This dataset was already contained in the ecoinvent database version 2. It was not individually updated during the transfer to ecoinvent version 3. Life Cycle Impact Assessment results may still have changed, as they are affected by changes in the supply chain, i.e. in other datasets. This dataset was generated following the ecoinvent quality guidelines for version 2. It may have been subject to central changes described in the ecoinvent version 3 change report (http://www.ecoinvent.org/database/ecoinvent-version-3/reports-of-changes/), and the results of the central updates were reviewed extensively. The changes added e.g. consistent water flows and other information throughout the database. The documentation of this dataset can be found in the ecoinvent reports of version 2, which are still available via the ecoinvent website. The change report linked above covers all central changes that were made during the conversion process.]

## Included activities end
Infrastructure materials for municipal sewer system, transports, dismantling.

## Geography
Specific to the technology mix and human settlement structure encountered in Switzerland around 1996.

## Technology
Underground sewer system with pipes

## Parameters
- fraction, tap water, to air: 0.15; name fraction_TW_to_air; lognormal variance with pedigree 0.092025, pedigree (4,4,3,2,4)
- fraction, process water, to air: 0.15 dimensionless; name fraction_PW_to_air; lognormal variance with pedigree 0.092025, pedigree (4,4,3,2,4)

## Reference product
- sewer grid, 1.1E10l/year, 242 km: 1 km; CPC 53253: Sewage and water treatment plants; By-product classification allocatable product
  production volume 3.96633 km
    This is a placeholder value that does not reflect real-world production volumes. This dataset does not currently require a real-world production volume to work in the database framework, and no actual data were collected yet. This has no negative effect on the results of the ecoinvent database.
  property price 228200 EUR2005
    Calculated based on literature value (PE-80 Pipe Systems: 17 Years of Successful Application in teh Public Sewer Network System of Göttingen, Pipeline Technology 2006 Conferece, http://www.pipeline-conference.com/sites/default/files/papers/124%20Fiedler.pdf). In general the costs for construction and maintenance of sewer grid varies significantly from region to region. In Göttingen app. 700 km of sewers are being managed. The annual investments in maintenance, renewal and construction of new sewer grid are 16 mio. Euro. With a lifetime of 100 years the cost of 1km of sewer grid is estimated to be (16000000*100/700=) 2.29E+06 Euro/km.
  property true value 228200
    allocation property applied in "true value" allocation // value calculated from revenue

## By-products
- heat, for reuse in municipal waste incineration only: 0 MJ; CPC 17300: Steam and hot water; By-product classification allocatable product; pedigree (1,1,1,1,1)
  Net electricity generated from this waste and used in internal MSWI plant energy redistribution.
  Uncertainty: uncertainty is calculated from uncertainties in waste composition and uncertainties in energy efficiency and the uncertainty in internal energy demand
  production volume 167494 MJ
  property exergy 0.1842 MJ; name E_th_prod_MSWI_exergy
    This exergy property is based on the exergy content of the product.
  property price 0.0106 EUR2005; name E_th_prod_MSWI_price_EUR2005
    Average European district heat price from Ecoheatcool and Euroheat 2005-2006, Ecoheat Work package 1: The European heat market. Final report. 10.6 EUR/GJ i s the price of district heat. http://www.solarthermalworld.org/files/Ecoheatcool%20WP1%20Web.pdf?download
  property true value relation 0.1842; name E_th_prod_MSWI_true_value_relation
    property to calculate "true value" from
  property true value 263.435
    allocation property applied in "true value" allocation // value calculated from true value relation
- electricity, for reuse in municipal waste incineration only: 0 kWh; CPC 17100: Electrical energy; By-product classification allocatable product; pedigree (1,1,1,1,1)
  (same comment as for heat, for reuse in municipal waste incineration only)
  production volume 23995.7 kWh
  property true value relation 3.6; name E_el_prod_MSWI_true_value_relation
    property to calculate "true value" from
  property price 0.1 EUR2005; name E_el_prod_MSWI_price_EUR2005
    Estimated to be the same price as in case of electricity, medium voltage.
  property exergy 3.6 MJ; name E_el_prod_MSWI_exergy
    This exergy property is based on the exergy content of the product.
  property true value 737.889
    (same comment as for heat, for reuse in municipal waste incineration only)

## Inputs from technosphere
- synthetic rubber: 470.934 kg; lognormal variance with pedigree 0.3627, pedigree (2,2,5,5,1)
  Data from one inventory study (Labhardt 1996)
  properties: carbon content, fossil 0.871949, wet mass 1 kg, dry mass 1 kg
  note on carbon content, fossil: EPDM (Ethylene-propene-diene terpolymer) rubber is a terpolymer of ethylene, propene, and a diene with the residual unsaturated portion of the diene in the side chain (ecoinvent v2.2 report 7-part XX & Ullmann). Chemical formula (deduced from Evidences of Solvent-Induced Miscibility in Polychloroprene-co-Ethylene-Propene Diene Terpolymer Blends, Dubey et al., Journal of Applied Polymer Science, 2009, 111:1884–1891): C20H35
- waste concrete, not reinforced: 0 kg; pedigree (1,1,1,1,1)
  Data from one inventory study (Labhardt 1996)
  production volume 0 kg
    Calculated from the production volume of sewer grid, 1.1E10l/year, 242 km in proportion to the respective output amounts.
  properties: wet mass 1 kg, dry mass 1 kg
- polypropylene, granulate: 1881.74 kg; lognormal variance with pedigree 0.3627, pedigree (2,2,5,5,1)
  Data from one inventory study (Labhardt 1996)
  properties: wet mass 1 kg, dry mass 1 kg, carbon content, fossil 0.857143
  note on carbon content, fossil: Polypropylene is formed by the polymerisation of propylene, C3H6 (ecoinvent v2.2 report 11_II)
- diesel, burned in building machine: 30068.1 MJ; lognormal variance with pedigree 0.3627, pedigree (2,2,5,5,1)
  Data from one inventory study (Labhardt 1996)
- cast iron: 8721.73 kg; lognormal variance with pedigree 0.3627, pedigree (2,2,5,5,1)
  Data from one inventory study (Labhardt 1996)
  properties: wet mass 1 kg, dry mass 1 kg, carbon content, fossil 0.04
  note on carbon content, fossil: Cast iron is made by remelting pig iron in small furnaces (e.g. cupola furnaces or electric arc furnaces) and poured into moulds to make castings. It usually contains 2% to 6% carbon (ecoinvent v2.2 report 10_partII). An average content of 4% was considered
- sand: 0 kg; pedigree (1,1,1,1,1)
  Data from one inventory study (Labhardt 1996)
  properties: wet mass 1 kg, dry mass 1 kg
- polyvinylchloride, suspension polymerised: 1641.52 kg; lognormal variance with pedigree 0.3627, pedigree (2,2,5,5,1)
  Data from one inventory study (Labhardt 1996)
  properties: wet mass 1 kg, carbon content, fossil 0.387097, dry mass 1 kg
  note on carbon content, fossil: Monomer is vynyl chloride, C2H3Cl (ecoinvent v2.2 report 11_II). MW=62 g/mol
- gravel, crushed: 0 kg; pedigree (1,1,1,1,1)
  Data from one inventory study (Labhardt 1996)
  properties: wet mass 1 kg, dry mass 1 kg
- cement, unspecified: 0 kg; pedigree (1,1,1,1,1)
  Data from one inventory study (Labhardt 1996)
  properties: dry mass 1 kg, wet mass 1 kg
- steel, chromium steel 18/8, hot rolled: 17921.4 kg; lognormal variance with pedigree 0.3627, pedigree (2,2,5,5,1)
  Data from one inventory study (Labhardt 1996)
  properties: carbon content, fossil 0.0008, dry mass 1 kg, wet mass 1 kg
  note on carbon content, fossil: Stainless steel model is the grade 304 steel (18/8 stainless, 18% chromium 8% nickel; max. 0.08% C)
- polyvinylchloride, emulsion polymerised: 240.223 kg; lognormal variance with pedigree 0.3627, pedigree (2,2,5,5,1)
  Data from one inventory study (Labhardt 1996)
  properties: carbon content, fossil 0.387097, dry mass 1 kg, wet mass 1 kg
- reinforcing steel: 51573.7 kg; lognormal variance with pedigree 0.3627, pedigree (2,2,5,5,1)
  Data from one inventory study (Labhardt 1996)
  properties: carbon content, fossil 0.004, dry mass 1 kg, wet mass 1 kg
- concrete, normal: 0 m3; pedigree (1,1,1,1,1)
  Data from one inventory study (Labhardt 1996)
  properties: water content 0.086758, wet mass 2380 kg, dry mass 2190 kg
- waste polyvinylchloride: 0 kg; pedigree (1,1,1,1,1)
  Data from one inventory study (Labhardt 1996)
  production volume 0 kg
    (same comment as for waste concrete, not reinforced)
  properties: dry mass 0.998 kg, wet mass 1 kg, carbon content, fossil 0.440882, water content 0.00200401
  note on carbon content, fossil: C content in 1 kg DM was calculated using data in Tab A.1, ecoinvent v2.2 report 13_I
- excavation, hydraulic digger: 6909.68 m3; lognormal variance with pedigree 0.3627, pedigree (2,2,5,5,1)
  Data from one inventory study (Labhardt 1996)
- tap water: 0 kg; name tap_water_input; pedigree (1,1,1,1,1)
  Data from one inventory study (Labhardt 1996)
  properties: wet mass 1 kg, dry mass 0.000337476 kg, carbon content, fossil 0.00178991, water content 2962.17
  note on carbon content, fossil: Bicarbonate content is 2.93 mol/m3. CO2 content is 0.1 mol/m3 (ecoinvent v2.2 report 8, Tab 93.1).
- waste rubber, unspecified: 0 kg; pedigree (1,1,1,1,1)
  Data from one inventory study (Labhardt 1996)
  production volume 0 kg
    (same comment as for waste concrete, not reinforced)
  properties: carbon content, fossil 0.853, dry mass 1 kg, wet mass 1 kg
- polyethylene, high density, granulate: 38132.7 kg; lognormal variance with pedigree 0.3627, pedigree (2,2,5,5,1)
  Data from one inventory study (Labhardt 1996)
  properties: dry mass 1 kg, carbon content, fossil 0.857143, wet mass 1 kg
  note on carbon content, fossil: Polyethylene is formed out of a huge amount of ethylene monomers (C2H4) (ecoinvent v2.2 report 11_II). MW=28 g/mol
- gravel, round: 652049 kg; lognormal variance with pedigree 0.3627, pedigree (2,2,5,5,1)
  Data from one inventory study (Labhardt 1996)
  properties: dry mass 1 kg, wet mass 1 kg
- waste polyethylene: 0 kg; pedigree (1,1,1,1,1)
  Data from one inventory study (Labhardt 1996)
  production volume 0 kg
    (same comment as for waste concrete, not reinforced)
  properties: dry mass 0.996 kg, wet mass 1 kg, carbon content, fossil 0.825301, water content 0.00401606
- electricity, medium voltage: 0 kWh; pedigree (1,1,1,1,1)
  Data from one inventory study (Labhardt 1996)
- waste concrete, not reinforced: -129737, -1.85157e6 kg (2 entries); lognormal variance with pedigree 0.3627, pedigree (2,2,5,5,1)
  Data from one inventory study (Labhardt 1996)
  production volume 5.97e6 kg
- sand: 36.294, 6991.01, 454946 kg (3 entries); lognormal variance with pedigree 0.3627, pedigree (2,2,5,5,1)
  Data from one inventory study (Labhardt 1996)
- gravel, crushed: 34141.4, 7457.77, 682.758, 131047 kg (4 entries); lognormal variance with pedigree 0.3627, pedigree (2,2,5,5,1)
  Data from one inventory study (Labhardt 1996)
- cement, unspecified: 4367.33, 319.877, 911.754, 20989.7, 20619.6, 606.895, 6665.51, 806.452, 90075.1 kg (9 entries); lognormal variance with pedigree 0.3627, pedigree (2,2,5,5,1)
  Data from one inventory study (Labhardt 1996)
- concrete, normal: 10.584, 1.10284, 8.92829, 5.02216, 21.2675, 0.717338, 413.355 m3 (7 entries); lognormal variance with pedigree 0.3627, pedigree (2,2,5,5,1)
  Data from one inventory study (Labhardt 1996)
- waste polyvinylchloride: -209.329, -13.9865, -1.05778, -5.77694, -2.33382, -5.48574, -178.358, -1465.42 kg (8 entries); lognormal variance with pedigree 0.3627, pedigree (2,2,5,5,1)
  Data from one inventory study (Labhardt 1996)
  production volume 5670 kg
- tap water: 21165.6, 175833, 34979.6, 7.52149e6, 882046, 22946.2, 65270.1, 1.00937e7 kg (8 entries); lognormal variance with pedigree 0.3627, pedigree (2,2,5,5,1)
  Data from one inventory study (Labhardt 1996)
- waste rubber, unspecified: -235.467, -235.467 kg (2 entries); lognormal variance with pedigree 0.3627, pedigree (2,2,5,5,1)
  Data from one inventory study (Labhardt 1996)
  production volume 1419 kg
- waste polyethylene: -4452.39, -297.491, -22.4988, -122.875, -49.6399, -116.681, -3793.64, -31169.2 kg (8 entries); lognormal variance with pedigree 0.3627, pedigree (2,2,5,5,1)
  Data from one inventory study (Labhardt 1996)
  production volume 120600 kg
- electricity, medium voltage: 174.185, 31.6942, 731.595, 2489.95, 537.486, 7792.99, 1115.32, 3654.26 kWh (8 entries); lognormal variance with pedigree 0.3627, pedigree (2,2,5,5,1)
  Data from one inventory study (Labhardt 1996)

## Emissions to nature
- Water [water, unspecified]: 15994.8 m3; name water_to_water_unspecified; lognormal variance with pedigree 0.0827, pedigree (2,2,5,5,1)
  Calculated value based on literature values and expert opinion. See comments in the parametres' comment field.
  property fraction, origin: unspecified 0; name fraction_origin_unspecified_Ww
  property fraction, origin: fresh water 1; name fraction_origin_fresh_water_Ww
  property carbon content, non-fossil 0; name C_content_non_fossil
  property dry mass 0 kg; name DM
  property carbon content, fossil 0; name C_content_fossil
  property wet mass 1000 kg; name WM
  property water in wet mass 1000 kg; name WWM
  property fraction, origin: salt water 0; name fraction_origin_salt_water_Ww
- Water [air, unspecified]: 2822.61 m3; name water_to_air_unspecified; lognormal variance with pedigree 0.0827, pedigree (2,2,5,5,1)
  (same comment as for Water)
  property fraction, origin: unspecified 0; name fraction_origin_unspecified
  property fraction, origin: fresh water 1; name fraction_origin_fresh_water
  property fraction, origin: salt water 0; name fraction_origin_salt_water

## Sampling procedure
data from literature

## Extrapolations
This dataset has been copied from an original dataset covering the geography CH. The uncertainty has been adjusted accordingly.

## Review by Niels Jungbluth 2003-06-11
Passed.
