# treatment of tyre wear emissions, lorry

Dataset: EcoSpold 2, unit process
Geography: RoW
Time period: 2009-01-01 to 2019-12-31
Technology level: current
Classification: ISIC rev.4 ecoinvent: 3821:Treatment and disposal of non-hazardous waste
Scenario: Business-as-Usual
System model: Allocation at the point of substitution
Generated by: Andrew Simons
Published in: Ntziachristos L., Paul P. 2009
Database: ecoinvent
isCopyrightProtected: true
accessRestrictedTo: 1

## General comment
This dataset represents the treatment of non-exhaust emissions produced by tyre abrasion from road freight transport. The datasets are treatments because they represent a removal of substances from the technosphere (removal of tyre material).

This dataset and the emission factors within it relate to 1kg tyre wear. It is valid for Europe and represents the average data for road freight transport.

Calculation of non-exhaust emissions (tyre, brake and road wear emissions) are based on EMEP/EEA (2013) and values for net vehicle weights and average load factors. Net vehicle weights are taken from the EcoTransIT (2011) report whilst the average load factors are taken from the Tremove model v2.7b (2009) and EcoTransIT (2011) report.

The tyre wear emissions are to air, water and soil. All particulates are accounted for as emissions to air and have particle sizes below 100um. Anything above this does not remain airborne over longer periods. The fractions to water and soil are calculated by deducting the airborne emissions from the total tyre wear. This remaining amount is then simply split 50/50 between water and soil.

It must be noted that elementary and organic carbon, substances very dominant in the emissions profile from tyre wear are currently not available in the ecoinvent database and are therfore not accounted for in this datase other than their representation as unspecified particulate emissions. This means that although the datasets represent 1kg of tyre wear the emissions do not sum up to 1kg.

In order to use the treatment of non-exhaust emissions in a transport dataset the quantity of emissions per tkm must be calculated. This must then be devided by the specific load factor of the transport in question.Non-exhaust emissions are considered to be linearly scalable to gross vehicle weight (GVW). For tyre wear emissions from lorries the specific quantity is 8.055E-8 kg/kg GVW*km.

Main data sources:

De Ceuster, G., et al. (2009) TREMOVE: Final Report. Model code v2.7b, 2009. European Commission, Brussels, BE.

Knörr, W. et al. (2011) Ecological Transport Information Tool for Worldwide Transports (EcoTransIT): Methodology and data update. Berlin, Hannover, Heidelberg, DE.

Ntziachristos, L., Boulter, P. (2013) EMEP/EEA air pollutant emissions inventory guidebook 2009: Road vehicle tyre and brake wear; Road surface wear. European Environment Agency, Copenhagen, DK.

## Included activities start
The activity starts with the abrasion of lorry tyres on the road

## Included activities end
The activity ends with emissions of lorry tyre wear

## Reference product
- tyre wear emissions, lorry: -1 kg; source Ntziachristos, L. 2013; By-product classification Waste; CPC 39260: Used pneumatic tyres of rubber
  Road freight specific non-exhaust emissions.
  This dataset and the emission factors within it relate to 1kg of tyre wear. In order to use the treatment of non-exhaust emissions in a transport dataset the quantity of emissions per km must be calculated. This must then be devided by the specific load factor of the transport in question. Non-exhaust emissions are considered to be linearly scalable to gross vehicle weight (GVW). For tyre wear emissions from lorries the specific quantity is 8.055E-8 kg/kg GVW*km.
  production volume 1.17724e9 kg; = 4.785E8*(1/0.289)
    Extrapolation from annual production volume in RER.
    Value of truck tyre wear emissions for RER in 2010 taken as a basis and extrapolated to the GLO using the scaling factors of the UN according to GDP. Scaling factors provided centrally by ecoinvent.
  property price 0 EUR2005
    Waste products are assigned a price of zero as they are assumed to require further treatment.
  property carbon content, fossil 0.675
    fossil carbon content on a dry matter basis. Represents the total organic carbon emissions to air, water and soil.
  property carbon content 0.675
    carbon content on a dry matter basis (reserved; not for manual entry)
  properties: carbon content, non-fossil 0, dry mass 1 kg, wet mass 1 kg, carbon allocation 0.675 kg

## Emissions to nature
- Vanadium [air, unspecified]: 2.63e-7 kg; source Ntziachristos, L. 2013; lognormal variance with pedigree 0.0419, pedigree (2,2,5,4,1)
  Calculated value. Derived from EMEP/EEA (2013) and based on an average gross vehicle weight (GVW) of all truck categories and load factors.
- Cadmium, ion [water, ground-]: 3.79e-6 kg; source Ntziachristos, L. 2013; lognormal variance with pedigree 0.0419, pedigree (2,2,5,4,1)
  (same comment as for Vanadium)
- Particulates, < 2.5 um [air, unspecified]: 0.0589 kg; source Ntziachristos, L. 2013; lognormal variance with pedigree 0.0419, pedigree (2,2,5,4,1)
  (same comment as for Vanadium)
- Barium [soil, unspecified]: 0.000101 kg; source Ntziachristos, L. 2013; lognormal variance with pedigree 0.0419, pedigree (2,2,5,4,1)
  (same comment as for Vanadium)
- Manganese [air, unspecified]: 1.34e-5 kg; source Ntziachristos, L. 2013; lognormal variance with pedigree 0.0419, pedigree (2,2,5,4,1)
  (same comment as for Vanadium)
- Nitrate [soil, unspecified]: 0.00121 kg; source Ntziachristos, L. 2013; lognormal variance with pedigree 0.0419, pedigree (2,2,5,4,1)
  (same comment as for Vanadium)
- Potassium [air, unspecified]: 7.35e-5 kg; source Ntziachristos, L. 2013; lognormal variance with pedigree 0.0419, pedigree (2,2,5,4,1)
  (same comment as for Vanadium)
- Silicon [water, ground-]: 0.00145 kg; source Ntziachristos, L. 2013; lognormal variance with pedigree 0.0419, pedigree (2,2,5,4,1)
  (same comment as for Vanadium)
- Silicon [air, unspecified]: 0.000473 kg; source Ntziachristos, L. 2013; lognormal variance with pedigree 0.0419, pedigree (2,2,5,4,1)
  (same comment as for Vanadium)
- Lead [water, ground-]: 0.000142 kg; source Ntziachristos, L. 2013; lognormal variance with pedigree 0.0419, pedigree (2,2,5,4,1)
  (same comment as for Vanadium)
- PAH, polycyclic aromatic hydrocarbons [air, unspecified]: 1.02e-6 kg; source Ntziachristos, L. 2013; lognormal variance with pedigree 0.0419, pedigree (2,2,5,4,1)
  (same comment as for Vanadium)
- Chlorine [water, ground-]: 0.000419 kg; source Ntziachristos, L. 2013; lognormal variance with pedigree 0.0419, pedigree (2,2,5,4,1)
  (same comment as for Vanadium)
- Lead [air, unspecified]: 4.62e-5 kg; source Ntziachristos, L. 2013; lognormal variance with pedigree 0.0419, pedigree (2,2,5,4,1)
  (same comment as for Vanadium)
- Titanium, ion [water, ground-]: 0.000305 kg; source Ntziachristos, L. 2013; lognormal variance with pedigree 0.0419, pedigree (2,2,5,4,1)
  (same comment as for Vanadium)
- Calcium [air, unspecified]: 0.000234 kg; source Ntziachristos, L. 2013; lognormal variance with pedigree 0.0419, pedigree (2,2,5,4,1)
  (same comment as for Vanadium)
- Iron [water, ground-]: 0.00138 kg; source Ntziachristos, L. 2013; lognormal variance with pedigree 0.0419, pedigree (2,2,5,4,1)
  (same comment as for Vanadium)
- Zinc [air, unspecified]: 0.00195 kg; source Ntziachristos, L. 2013; lognormal variance with pedigree 0.0419, pedigree (2,2,5,4,1)
  (same comment as for Vanadium)
- Sodium [water, ground-]: 0.00052 kg; source Ntziachristos, L. 2013; lognormal variance with pedigree 0.0419, pedigree (2,2,5,4,1)
  (same comment as for Vanadium)
- Antimony [air, unspecified]: 5.25e-7 kg; source Ntziachristos, L. 2013; lognormal variance with pedigree 0.0419, pedigree (2,2,5,4,1)
  (same comment as for Vanadium)
- Sodium [soil, unspecified]: 0.00052 kg; source Ntziachristos, L. 2013; lognormal variance with pedigree 0.0419, pedigree (2,2,5,4,1)
  (same comment as for Vanadium)
- Nickel [air, unspecified]: 7.85e-6 kg; source Ntziachristos, L. 2013; lognormal variance with pedigree 0.0419, pedigree (2,2,5,4,1)
  (same comment as for Vanadium)
- Arsenic [soil, unspecified]: 3.06e-6 kg; source Ntziachristos, L. 2013; lognormal variance with pedigree 0.0419, pedigree (2,2,5,4,1)
  (same comment as for Vanadium)
- Aluminium [air, unspecified]: 8.51e-5 kg; source Ntziachristos, L. 2013; lognormal variance with pedigree 0.0419, pedigree (2,2,5,4,1)
  (same comment as for Vanadium)
- Bromine [water, ground-]: 1.61e-5 kg; source Ntziachristos, L. 2013; lognormal variance with pedigree 0.0419, pedigree (2,2,5,4,1)
  (same comment as for Vanadium)
- Particulates, > 10 um [air, unspecified]: 0.0561 kg; source Ntziachristos, L. 2013; lognormal variance with pedigree 0.0419, pedigree (2,2,5,4,1)
  (same comment as for Vanadium)
- Sulfur [water, ground-]: 0.00177 kg; source Ntziachristos, L. 2013; lognormal variance with pedigree 0.0419, pedigree (2,2,5,4,1)
  (same comment as for Vanadium)
- Nickel, ion [water, ground-]: 2.41e-5 kg; lognormal variance with pedigree 0.0419, pedigree (2,2,5,4,1)
  (same comment as for Vanadium)
- Cadmium [air, unspecified]: 1.23e-6 kg; source Ntziachristos, L. 2013; lognormal variance with pedigree 0.0419, pedigree (2,2,5,4,1)
  (same comment as for Vanadium)
- Vanadium [soil, unspecified]: 8.07e-7 kg; source Ntziachristos, L. 2013; lognormal variance with pedigree 0.0419, pedigree (2,2,5,4,1)
  (same comment as for Vanadium)
- Arsenic, ion [water, ground-]: 3.06e-6 kg; source Ntziachristos, L. 2013; lognormal variance with pedigree 0.0419, pedigree (2,2,5,4,1)
  (same comment as for Vanadium)
- Particulates, > 2.5 um, and < 10um [air, unspecified]: 0.0252 kg; source Ntziachristos, L. 2013; lognormal variance with pedigree 0.0419, pedigree (2,2,5,4,1)
  (same comment as for Vanadium)
- Molybdenum [soil, unspecified]: 2.26e-6 kg; source Ntziachristos, L. 2013; lognormal variance with pedigree 0.0419, pedigree (2,2,5,4,1)
  (same comment as for Vanadium)
- Potassium [soil, unspecified]: 0.000226 kg; source Ntziachristos, L. 2013; lognormal variance with pedigree 0.0419, pedigree (2,2,5,4,1)
  (same comment as for Vanadium)
- Sodium [air, unspecified]: 0.000169 kg; source Ntziachristos, L. 2013; lognormal variance with pedigree 0.0419, pedigree (2,2,5,4,1)
  (same comment as for Vanadium)
- Chromium, ion [water, ground-]: 1.92e-5 kg; source Ntziachristos, L. 2013; lognormal variance with pedigree 0.0419, pedigree (2,2,5,4,1)
  (same comment as for Vanadium)
- Barium [water, ground-]: 0.000101 kg; source Ntziachristos, L. 2013; lognormal variance with pedigree 0.0419, pedigree (2,2,5,4,1)
  (same comment as for Vanadium)
- Strontium [air, unspecified]: 3.78e-6 kg; source Ntziachristos, L. 2013; lognormal variance with pedigree 0.0419, pedigree (2,2,5,4,1)
  (same comment as for Vanadium)
- Sulfate, ion [water, ground-]: 0.00202 kg; source Ntziachristos, L. 2013; lognormal variance with pedigree 0.0419, pedigree (2,2,5,4,1)
  (same comment as for Vanadium)
- Molybdenum [water, ground-]: 2.26e-6 kg; source Ntziachristos, L. 2013; lognormal variance with pedigree 0.0419, pedigree (2,2,5,4,1)
  (same comment as for Vanadium)
- Chromium [air, unspecified]: 6.25e-6 kg; source Ntziachristos, L. 2013; lognormal variance with pedigree 0.0419, pedigree (2,2,5,4,1)
  (same comment as for Vanadium)
- Vanadium, ion [water, ground-]: 8.07e-7 kg; source Ntziachristos, L. 2013; lognormal variance with pedigree 0.0419, pedigree (2,2,5,4,1)
  (same comment as for Vanadium)
- Zinc [soil, unspecified]: 0.006 kg; source Ntziachristos, L. 2013; lognormal variance with pedigree 0.0419, pedigree (2,2,5,4,1)
  (same comment as for Vanadium)
- Iron [air, unspecified]: 0.000449 kg; source Ntziachristos, L. 2013; lognormal variance with pedigree 0.6526, pedigree (1,1,3,4,1)
  (same comment as for Vanadium)
- Cobalt [soil, unspecified]: 1.03e-5 kg; source Ntziachristos, L. 2013; lognormal variance with pedigree 0.0419, pedigree (2,2,5,4,1)
  (same comment as for Vanadium)
- PAH, polycyclic aromatic hydrocarbons [soil, unspecified]: 3.15e-6 kg; source Ntziachristos, L. 2013; lognormal variance with pedigree 0.0419, pedigree (2,2,5,4,1)
  (same comment as for Vanadium)
- Copper [air, unspecified]: 4.57e-5 kg; source Ntziachristos, L. 2013; lognormal variance with pedigree 0.0419, pedigree (2,2,5,4,1)
  (same comment as for Vanadium)
- Silver, ion [water, ground-]: 8.07e-8 kg; source Ntziachristos, L. 2013; lognormal variance with pedigree 0.0419, pedigree (2,2,5,4,1)
  (same comment as for Vanadium)
- Manganese [soil, unspecified]: 4.11e-5 kg; source Ntziachristos, L. 2013; lognormal variance with pedigree 0.0419, pedigree (2,2,5,4,1)
  (same comment as for Vanadium)
- Silver [air, unspecified]: 2.63e-8 kg; source Ntziachristos, L. 2013; lognormal variance with pedigree 0.0419, pedigree (2,2,5,4,1)
  (same comment as for Vanadium)
- Potassium [water, ground-]: 0.000226 kg; source Ntziachristos, L. 2013; lognormal variance with pedigree 0.0419, pedigree (2,2,5,4,1)
  (same comment as for Vanadium)
- Copper, ion [water, ground-]: 0.00014 kg; source Ntziachristos, L. 2013; lognormal variance with pedigree 0.0419, pedigree (2,2,5,4,1)
  (same comment as for Vanadium)
- Selenium [air, unspecified]: 5.25e-6 kg; source Ntziachristos, L. 2013; lognormal variance with pedigree 0.0419, pedigree (2,2,5,4,1)
  (same comment as for Vanadium)
- Aluminium [soil, unspecified]: 0.000261 kg; source Ntziachristos, L. 2013; lognormal variance with pedigree 0.0419, pedigree (2,2,5,4,1)
  (same comment as for Vanadium)
- Lead [soil, unspecified]: 0.000142 kg; source Ntziachristos, L. 2013; lognormal variance with pedigree 0.0419, pedigree (2,2,5,4,1)
  (same comment as for Vanadium)
- Molybdenum [air, unspecified]: 7.35e-7 kg; source Ntziachristos, L. 2013; lognormal variance with pedigree 0.0419, pedigree (2,2,5,4,1)
  (same comment as for Vanadium)
- Chlorine [soil, unspecified]: 0.000419 kg; source Ntziachristos, L. 2013; lognormal variance with pedigree 0.0419, pedigree (2,2,5,4,1)
  (same comment as for Vanadium)
- Copper [soil, unspecified]: 0.00014 kg; source Ntziachristos, L. 2013; lognormal variance with pedigree 0.0419, pedigree (2,2,5,4,1)
  (same comment as for Vanadium)
- Cobalt [air, unspecified]: 3.36e-6 kg; source Ntziachristos, L. 2013; lognormal variance with pedigree 0.0419, pedigree (2,2,5,4,1)
  (same comment as for Vanadium)
- Sulfur [soil, unspecified]: 0.000474 kg; source Ntziachristos, L. 2013; lognormal variance with pedigree 0.0419, pedigree (2,2,5,4,1)
  (same comment as for Vanadium)
- Strontium [water, ground-]: 1.16e-5 kg; source Ntziachristos, L. 2013; lognormal variance with pedigree 0.0419, pedigree (2,2,5,4,1)
  (same comment as for Vanadium)
- Nitrate [air, unspecified]: 0.000394 kg; source Ntziachristos, L. 2013; lognormal variance with pedigree 0.0419, pedigree (2,2,5,4,1)
  (same comment as for Vanadium)
- Cadmium [soil, unspecified]: 3.79e-6 kg; source Ntziachristos, L. 2013; lognormal variance with pedigree 0.0419, pedigree (2,2,5,4,1)
  (same comment as for Vanadium)
- Calcium, ion [water, ground-]: 0.000719 kg; source Ntziachristos, L. 2013; lognormal variance with pedigree 0.0419, pedigree (2,2,5,4,1)
  (same comment as for Vanadium)
- Sulfate [air, unspecified]: 0.000656 kg; source Ntziachristos, L. 2013; lognormal variance with pedigree 0.0419, pedigree (2,2,5,4,1)
  (same comment as for Vanadium)
- Strontium [soil, unspecified]: 1.16e-5 kg; source Ntziachristos, L. 2013; lognormal variance with pedigree 0.0419, pedigree (2,2,5,4,1)
  (same comment as for Vanadium)
- Nitrate [water, ground-]: 0.00121 kg; source Ntziachristos, L. 2013; lognormal variance with pedigree 0.0419, pedigree (2,2,5,4,1)
  (same comment as for Vanadium)
- Lithium [soil, unspecified]: 1.05e-6 kg; source Ntziachristos, L. 2013; lognormal variance with pedigree 0.0419, pedigree (2,2,5,4,1)
  (same comment as for Vanadium)
- Iron [soil, unspecified]: 0.00138 kg; source Ntziachristos, L. 2013; lognormal variance with pedigree 0.0419, pedigree (2,2,5,4,1)
  (same comment as for Vanadium)
- Selenium [soil, unspecified]: 1.61e-5 kg; source Ntziachristos, L. 2013; lognormal variance with pedigree 0.0419, pedigree (2,2,5,4,1)
  (same comment as for Vanadium)
- Bromine [soil, unspecified]: 1.61e-5 kg; source Ntziachristos, L. 2013; lognormal variance with pedigree 0.0419, pedigree (2,2,5,4,1)
  (same comment as for Vanadium)
- Antimony [water, ground-]: 1.61e-6 kg; source Ntziachristos, L. 2013; lognormal variance with pedigree 0.0419, pedigree (2,2,5,4,1)
  (same comment as for Vanadium)
- Sulfate [soil, unspecified]: 0.00202 kg; source Ntziachristos, L. 2013; lognormal variance with pedigree 0.0419, pedigree (2,2,5,4,1)
  (same comment as for Vanadium)
- Antimony [soil, unspecified]: 1.61e-6 kg; source Ntziachristos, L. 2013; lognormal variance with pedigree 0.0419, pedigree (2,2,5,4,1)
  (same comment as for Vanadium)
- Selenium [water, ground-]: 1.61e-5 kg; source Ntziachristos, L. 2013; lognormal variance with pedigree 0.0419, pedigree (2,2,5,4,1)
  (same comment as for Vanadium)
- Silver [soil, unspecified]: 8.07e-8 kg; source Ntziachristos, L. 2013; lognormal variance with pedigree 0.0419, pedigree (2,2,5,4,1)
  (same comment as for Vanadium)
- Titanium [soil, unspecified]: 0.000305 kg; source Ntziachristos, L. 2013; lognormal variance with pedigree 0.0419, pedigree (2,2,5,4,1)
  (same comment as for Vanadium)
- Silicon [soil, unspecified]: 0.00145 kg; source Ntziachristos, L. 2013; lognormal variance with pedigree 0.0419, pedigree (2,2,5,4,1)
  (same comment as for Vanadium)
- Nickel [soil, unspecified]: 2.41e-5 kg; source Ntziachristos, L. 2013; lognormal variance with pedigree 0.0419, pedigree (2,2,5,4,1)
  (same comment as for Vanadium)
- Cobalt [water, ground-]: 1.03e-5 kg; source Ntziachristos, L. 2013; lognormal variance with pedigree 0.0419, pedigree (2,2,5,4,1)
  (same comment as for Vanadium)
- Aluminium [water, ground-]: 0.000261 kg; source Ntziachristos, L. 2013; lognormal variance with pedigree 0.0419, pedigree (2,2,5,4,1)
  (same comment as for Vanadium)
- Bromine [air, unspecified]: 5.25e-6 kg; source Ntziachristos, L. 2013; lognormal variance with pedigree 0.0419, pedigree (2,2,5,4,1)
  (same comment as for Vanadium)
- Zinc, ion [water, ground-]: 0.006 kg; source Ntziachristos, L. 2013; lognormal variance with pedigree 0.0419, pedigree (2,2,5,4,1)
  (same comment as for Vanadium)
- Titanium [air, unspecified]: 9.92e-5 kg; source Ntziachristos, L. 2013; lognormal variance with pedigree 0.0419, pedigree (2,2,5,4,1)
  (same comment as for Vanadium)
- Lithium [water, ground-]: 1.05e-6 kg; source Ntziachristos, L. 2013; lognormal variance with pedigree 0.0419, pedigree (2,2,5,4,1)
  (same comment as for Vanadium)
- Sulfur dioxide [air, unspecified]: 0.000578 kg; source Ntziachristos, L. 2013; lognormal variance with pedigree 0.0419, pedigree (2,2,5,4,1)
  (same comment as for Vanadium)
- Calcium [soil, unspecified]: 0.000719 kg; source Ntziachristos, L. 2013; lognormal variance with pedigree 0.0419, pedigree (2,2,5,4,1)
  (same comment as for Vanadium)
- Chlorine [air, unspecified]: 0.000137 kg; source Ntziachristos, L. 2013; lognormal variance with pedigree 0.0419, pedigree (2,2,5,4,1)
  (same comment as for Vanadium)
- Chromium [soil, unspecified]: 1.92e-5 kg; source Ntziachristos, L. 2013; lognormal variance with pedigree 0.0419, pedigree (2,2,5,4,1)
  (same comment as for Vanadium)
- Barium [air, unspecified]: 3.28e-5 kg; source Ntziachristos, L. 2013; lognormal variance with pedigree 0.6526, pedigree (1,1,3,4,1)
  (same comment as for Vanadium)
- PAH, polycyclic aromatic hydrocarbons [water, ground-]: 3.15e-6 kg; source Ntziachristos, L. 2013; lognormal variance with pedigree 0.0419, pedigree (2,2,5,4,1)
  (same comment as for Vanadium)
- Arsenic [air, unspecified]: 9.98e-7 kg; source Ntziachristos, L. 2013; lognormal variance with pedigree 0.0419, pedigree (2,2,5,4,1)
  (same comment as for Vanadium)
- Manganese [water, ground-]: 4.11e-5 kg; source Ntziachristos, L. 2013; lognormal variance with pedigree 0.0419, pedigree (2,2,5,4,1)
  (same comment as for Vanadium)

## Sampling procedure
Literature

## Extrapolations
Currently copied 1-to-1 from the same datasets for RER, with changes to uncertainties (Geography) and annual production volumes only.
