# N,N-dimethylformamide production

Dataset: EcoSpold 2, unit process
Geography: RER
Time period: 1993-01-01 to 2019-12-31
Technology level: current
Classification: ISIC rev.4 ecoinvent: 2011:Manufacture of basic chemicals
Classification: EcoSpold01Categories: chemicals/organics
Synonyms: DMF
Tags: ConvertedDataset
Scenario: Business-as-Usual
System model: Allocation at the point of substitution
Share of production covered: 100 %
Generated by: Jürgen Sutter
Published in: Sutter, J. 2007
Database: ecoinvent
isCopyrightProtected: true
accessRestrictedTo: 1

## General comment
The process "N,N-dimethylformamide, at plant, RER" is modelled for the production of DMF from dimethylamine in Europe. Raw materials are modelled with a stoechiometric calculation. Energy consumptions are modelled with literature data. The emissions are estimated. Infrastructure and transports are calculated with standard values.
[This dataset was already contained in the ecoinvent database version 2. It was not individually updated during the transfer to ecoinvent version 3. Life Cycle Impact Assessment results may still have changed, as they are affected by changes in the supply chain, i.e. in other datasets. This dataset was generated following the ecoinvent quality guidelines for version 2. It may have been subject to central changes described in the ecoinvent version 3 change report (http://www.ecoinvent.org/database/ecoinvent-version-3/reports-of-changes/), and the results of the central updates were reviewed extensively. The changes added e.g. consistent water flows and other information throughout the database. The documentation of this dataset can be found in the ecoinvent reports of version 2, which are still available via the ecoinvent website. The change report linked above covers all central changes that were made during the conversion process.]

## Included activities end
Production of N,N-diemthylformamide including materials, energy uses, infrastructure and emissions.

## Geography
The inventory is modelled for Europe.

## Technology
Synthesis from N,N-Dimethylamine

## Time period
Time of publications

## Parameters
- fraction, cooling water, recirculating system, to air: 0.771; name fraction_CW_R_to_air; lognormal variance with pedigree 0.0413, pedigree (2,3,1,3,1)
  Calculated based on literature value (Scown, C.D., 2011, Water Footprint of U.S. Transportation Fuels and supplying information of the article) (Vionnet, S., Quantis Water Database - Technical Report, 2012).
- fraction, cooling water, to air: 0.3875; name fraction_CW_to_air; = (0.5*fraction_CW_OT_to_air)+(0.5*fraction_CW_R_to_air); lognormal variance with pedigree 0.092025, pedigree (4,4,3,2,4)
  Calculated value based on literature value (see comments of the other parametres present in this dataset) and expert opinion. In the case when no industry/literature data are available about the type of cooling or directly fraction, cooling water, to air specific for the process a default assumption is applied. It is assumed that the once-through cooling system is used in 50% of all cases and recirculating system is used in another 50% of all cases.
- fraction, cooling water, cooling pond system, to air: 0.032; name fraction_CW_CP_to_air; lognormal variance with pedigree 0.0413, pedigree (2,3,1,3,1)
  (same comment as for fraction, cooling water, recirculating system, to air)
- fraction, cooling water, once-through system, to air: 0.004; name fraction_CW_OT_to_air; lognormal variance with pedigree 0.0413, pedigree (2,3,1,3,1)
  (same comment as for fraction, cooling water, recirculating system, to air)

## Reference product
- N,N-dimethylformamide: 1 kg; CPC 341: Basic organic chemicals; By-product classification allocatable product; CAS 68-12-2
  EcoSpold01Location=RER
  production volume 1.32237 kg
    This is a placeholder value that does not reflect real-world production volumes. This dataset does not currently require a real-world production volume to work in the database framework, and no actual data were collected yet. This has no negative effect on the results of the ecoinvent database. The placeholder value of this activity was scaled according to the nominal GDP of 2005 (source: United Nations, http://data.un.org/Glossary.aspx?q=GDP+%28current+US%24%29, accessed 20130726) to reflect an appropriate share of the global production volume, which is also a placeholder value.
  property price 1.07658 EUR2005
    Calculated based on inputs: The price of the product has been calculated as a sum of the values of the material and energy inputs for this product. This value is therefore a rough estimation. It may underestimate the real price since there are additional expenses when producing any product. These expences can include for example labour costs, treatment of waste materials and profit for the producer. Please consider carefully whether this level of data quality is acceptable for your application. Cross-reference: The consumer price for N,N-dimethylformamide is 782 EURO for 8kg. (http://www.sigmaaldrich.com/catalog/product/sial/227056?lang=de&region=DE , accessed 20160421)
  property carbon content 0.493151
    carbon content on a dry matter basis (reserved; not for manual entry)
  properties: carbon content, fossil 0.493151, wet mass 1 kg, water in wet mass 0 kg, carbon content, non-fossil 0, dry mass 1 kg, water content 0, carbon allocation 0.493151 kg

## Inputs from technosphere
- carbon monoxide: 0.40375 kg; lognormal variance with pedigree 0.076, pedigree (4,5,5,1,1)
  EcoSpold01Location=RER
  Stoechiometric calculation
  Uncertainty: Stoechiometric calculation
  properties: carbon content, fossil 0.428571, wet mass 1 kg, dry mass 1 kg
  note on carbon content, fossil: CO. It is assumed that CO is produced from partial combustion of heavy heating oil.
- heat, district or industrial, natural gas: 1.7784 MJ; lognormal variance with pedigree 0.0426, pedigree (1,3,5,5,1)
  Uncertainty: DSIR 1993
- chemical factory, organics: 4e-10 unit; lognormal variance with pedigree 0.448, pedigree (4,5,5,5,5)
  EcoSpold01Location=RER
  Estimation
  Uncertainty: Estimation
- dimethylamine: 0.64888 kg; lognormal variance with pedigree 0.076, pedigree (4,5,5,1,1)
  EcoSpold01Location=RER
  Stoechiometric calculation
  Uncertainty: Stoechiometric calculation
  properties: wet mass 1 kg, dry mass 1 kg, carbon content, fossil 0.533333
- heat, district or industrial, other than natural gas: 0.992628 MJ; lognormal variance with pedigree 0.0426, pedigree (1,3,5,5,1)
  Uncertainty: DSIR 1993
- electricity, medium voltage: 0.0629072 kWh; lognormal variance with pedigree 0.0426, pedigree (1,3,5,5,1)
  EcoSpold01Location=UCTE
  DSIR 1993
  Uncertainty: DSIR 1993

## Inputs from nature
- Water, cooling, unspecified natural origin [natural resource, in water]: 0.024 m3; name water_cooling_UNO_input; lognormal variance with pedigree 0.198, pedigree (4,5,5,5,5)
  Estimation
  Uncertainty: Estimation

## Emissions to nature
- Carbon dioxide, fossil [air, urban air close to ground]: 0.085272 kg; lognormal variance with pedigree 0.1786, pedigree (4,5,5,5,5)
  Calculated from the water treatment
  Uncertainty: Calculated from the water treatment
- DOC, Dissolved Organic Carbon [water, surface water]: 0.00166 kg; lognormal variance with pedigree 0.188, pedigree (4,5,5,5,5)
  Calculated from the water emissions
  Uncertainty: Calculated from the water emissions
- Dimethylamine [air, urban air close to ground]: 0.0012978 kg; lognormal variance with pedigree 0.218, pedigree (4,5,5,5,5)
  Estimation
  Uncertainty: Estimation
- Water [water, unspecified]: 0.0147 m3; name water_to_water_unspecified; = water_cooling_UNO_input*(1-fraction_CW_to_air); lognormal variance with pedigree 0.0807, pedigree (2,2,5,1,1)
  Calculated value based on literature values and expert opinion. See comments in the parametres' comment field.
  property wet mass 1000 kg; name WM
  property dry mass 0 kg; name DM
  property water in wet mass 1000 kg; name WWM
  property carbon content, fossil 0; name C_content_fossil
  property fraction, origin: unspecified 1; name fraction_origin_unspecified_Ww
  property fraction, origin: salt water 0; name fraction_origin_salt_water_Ww
  property fraction, origin: fresh water 0; name fraction_origin_fresh_water_Ww
  property carbon content, non-fossil 0; name C_content_non_fossil
- BOD5, Biological Oxygen Demand [water, surface water]: 0.00796 kg; lognormal variance with pedigree 0.188, pedigree (4,5,5,5,5)
  Calculated from the water emissions
  Uncertainty: Calculated from the water emissions
- COD, Chemical Oxygen Demand [water, surface water]: 0.00796 kg; lognormal variance with pedigree 0.188, pedigree (4,5,5,5,5)
  Calculated from the water emissions
  Uncertainty: Calculated from the water emissions
- Water [air, unspecified]: 0.0093 m3; name water_to_air_unspecified; = (water_cooling_UNO_input*fraction_CW_to_air); lognormal variance with pedigree 0.0807, pedigree (2,2,5,1,1)
  (same comment as for Water)
  property fraction, origin: salt water 0; name fraction_origin_salt_water
  property fraction, origin: unspecified 1; name fraction_origin_unspecified
  property fraction, origin: fresh water 0; name fraction_origin_fresh_water
- Dimethylamine [water, surface water]: 0.0031146 kg; lognormal variance with pedigree 0.218, pedigree (4,5,5,5,5)
  Estimation
  Uncertainty: Estimation
- TOC, Total Organic Carbon [water, surface water]: 0.00166 kg; lognormal variance with pedigree 0.188, pedigree (4,5,5,5,5)
  Calculated from the water emissions
  Uncertainty: Calculated from the water emissions
- Carbon monoxide, fossil [air, urban air close to ground]: 0.0008075 kg; lognormal variance with pedigree 0.798, pedigree (4,5,5,5,5)
  Estimation
  Uncertainty: Estimation

## Sampling procedure
Literature data

## Extrapolations
This dataset has been extrapolated from year 2006 to the year of the calculation (2019). The uncertainty has been adjusted accordingly.

## Review by Roland Hischier 2007-09-01
passed.
