# treatment of wastewater from ceramic production, capacity 5E9l/year

Dataset: EcoSpold 2, unit process
Geography: CH
Time period: 1994-01-01 to 2019-12-31
Technology level: current
Classification: EcoSpold01Categories: waste management/wastewater treatment
Classification: ISIC rev.4 ecoinvent: 3700:Sewerage
Tags: ConvertedDataset; Treatment
Scenario: Business-as-Usual
System model: Allocation at the point of substitution
Generated by: Gabor Doka (obsolete)
Published in: Doka G. 2008
Database: ecoinvent
isCopyrightProtected: true
accessRestrictedTo: 1

## General comment
Wastewater purified in a medium size municipal wastewater treatment plant (capacity class 3), with an average capacity size of 24900 per-captia-equivalents PCE.
Wastewater contains (in kg/m3): Ba: 0.00048 (GSD=300%); Cd: 0.000008 (GSD=300%); Co: 0.000025 (GSD=300%); Cr: 0.000025 (GSD=300%); Cu: 0.000005 (GSD=300%); Ni: 0.000025 (GSD=300%); Pb: 0.000025 (GSD=300%); Zn: 0.000012 (GSD=300%);
[This dataset was already contained in the ecoinvent database version 2. It was not individually updated during the transfer to ecoinvent version 3. Life Cycle Impact Assessment results may still have changed, as they are affected by changes in the supply chain, i.e. in other datasets. This dataset was generated following the ecoinvent quality guidelines for version 2. It may have been subject to central changes described in the ecoinvent version 3 change report (http://www.ecoinvent.org/database/ecoinvent-version-3/reports-of-changes/), and the results of the central updates were reviewed extensively. The changes added e.g. consistent water flows and other information throughout the database. The documentation of this dataset can be found in the ecoinvent reports of version 2, which are still available via the ecoinvent website. The change report linked above covers all central changes that were made during the conversion process.]

## Included activities end
Infrastructure materials for municipal wastewater treatment plant, transports, dismantling. Land use burdens.

## Geography
Specific to the technology mix encountered in Switzerland in 2000. Well applicable to modern treatment practices in Europe, North America or Japan.

## Technology
Three stage wastewater treatment (mechanical, biological, chemical) including sludge digestion (fermentation) according to the average technology in Switzerland

## Parameters
- fraction, process water, to air: 0.1 dimensionless; name fraction_PW_to_air; lognormal variance with pedigree 0.092025, pedigree (4,4,3,2,4)
  Literature value (Statistics Canada, 2007 & Shaffer, K.H., 2008, Consumptive water use in the Great Lakes Basin, USGS) (Vionnet, S., Quantis Water Database - Technical Report, 2012).

## Reference product
- wastewater from ceramic production: -1 m3; CPC 39920: Sewage sludge; By-product classification Waste
  production volume 0.0336675 m3
    This is a placeholder value that does not reflect real-world production volumes. This dataset does not currently require a real-world production volume to work in the database framework, and no actual data were collected yet. This has no negative effect on the results of the ecoinvent database. The placeholder value of this activity was scaled according to the nominal GDP of 2005 (source: United Nations, http://data.un.org/Glossary.aspx?q=GDP+%28current+US%24%29, accessed 20130726) to reflect an appropriate share of the global production volume, which is also a placeholder value.
  property price 0 EUR2005
    Waste products are assigned a price of zero as they are assumed to require further treatment.
  property carbon content 0
    carbon content on a dry matter basis (reserved; not for manual entry)
  properties: carbon content, non-fossil 0, dry mass 0.337476 kg, carbon content, fossil 0, wet mass 1000 kg, water content 2962.17, water in wet mass 999.663 kg, carbon allocation 0 kg

## By-products
- electricity, for reuse in municipal waste incineration only: 0 kWh; CPC 17100: Electrical energy; By-product classification allocatable product; pedigree (1,1,1,1,1)
  Net electricity generated from this waste and used in internal MSWI plant energy redistribution.
  Uncertainty: uncertainty is calculated from uncertainties in waste composition and uncertainties in energy efficiency and the uncertainty in internal energy demand
  property exergy 3.6 MJ; name E_el_prod_MSWI_exergy
    This exergy property is based on the exergy content of the product.
  property true value relation 3.6; name E_el_prod_MSWI_true_value_relation
    property to calculate "true value" from
  property price 0.1 EUR2005; name E_el_prod_MSWI_price_EUR2005
    Estimated to be the same price as in case of electricity, medium voltage.
- heat, for reuse in municipal waste incineration only: 0 MJ; CPC 17300: Steam and hot water; By-product classification allocatable product; pedigree (1,1,1,1,1)
  Net useful heat generated from this waste and used in internal MSWI plant energy redistribution.
  Uncertainty: uncertainty is calculated from uncertainties in waste composition and uncertainties in energy efficiency and the uncertainty in internal energy demand
  property true value relation 0.1842; name E_th_prod_MSWI_true_value_relation
    property to calculate "true value" from
  property exergy 0.1842 MJ; name E_th_prod_MSWI_exergy
    This exergy property is based on the exergy content of the product.
  property price 0.0106 EUR2005; name E_th_prod_MSWI_price_EUR2005
    Average European district heat price from Ecoheatcool and Euroheat 2005-2006, Ecoheat Work package 1: The European heat market. Final report. 10.6 EUR/GJ i s the price of district heat. http://www.solarthermalworld.org/files/Ecoheatcool%20WP1%20Web.pdf?download
- zinc concentrate: 0 kg; CPC 14290: Other non-ferrous metal ores and concentrates (other than uranium or thorium ores and concentrates); By-product classification allocatable product
  Calculated value from the knowledge of the properties of both products.
  property price 0.38 EUR2005; name ByP_price_EUR2005
    Temporary price data. Calculated as 90% of purchasers price based on: Zinc content in concentrate 53%. Concentrate price per kg Zn 86.5% of refined Zn price (13.5% treatment charges according to CHR Metals Limited 2005: Dynamic cost curves. http://www.minecost.com/dynamic.pdf). 2004 zinc price from USGS (2007) Mineral commodity summaries 2007. <http://minerals.usgs.gov/minerals/pubs/mcs/2007/mcs2007.pdf> [Accessed 25 May 2010]
  property zinc content 0.53; name zinc_C_zinc_concentrate
    Zinc content on a dry matter basis. Value taken from teh "zinc mine operation" /GLO dataset.
  property dry mass 1 kg; name DM_zinc_concentrate
  property carbon content 0
    carbon content on a dry matter basis (reserved; not for manual entry)
  properties: wet mass 1 kg, water content 0, carbon content, non-fossil 0, carbon content, fossil 0, water in wet mass 0 kg, carbon allocation 0 kg

## Inputs from technosphere
- iron (III) chloride, without water, in 40% solution state: 2.1534e-6 kg; lognormal variance with pedigree 0.54, pedigree (1,1,5,1,1)
  direct wastewater treatment plant burden plus burden from sludge incineration. Uncertainty calculated from wastewater composition and treatment model
  properties: wet mass 1 kg, dry mass 1 kg
- residual material landfill: 1.1939e-13 unit; lognormal variance with pedigree 0.07, pedigree (1,1,5,1,1)
  burden from sludge incineration. Uncertainty calculated from wastewater composition and treatment model
- slag landfill: 4.5373e-13 unit; lognormal variance with pedigree 0.07, pedigree (1,1,5,1,1)
  (same comment as for residual material landfill)
- municipal waste incineration facility: 3.1509e-13 unit; lognormal variance with pedigree 0.44, pedigree (1,1,5,1,1)
  (same comment as for residual material landfill)
- sewer grid, 5E9l/year, 110 km: 2.1782e-7 km; lognormal variance with pedigree 0.04, pedigree (1,1,5,1,1)
  uncertainty heeded in exchanges of the module
- chemical, inorganic: 1.1798e-8 kg; lognormal variance with pedigree 0.54, pedigree (1,1,5,1,1)
  (same comment as for residual material landfill)
  properties: wet mass 1 kg, carbon content, fossil 0.003, dry mass 1 kg
  note on carbon content, fossil: This dataset is an unweighted average of 20 inorganic substances (listed in Tab 88.1, ecoinvent v2.2 report 8, part II), being part of the top100 chemicals included in this database. The C-content has also been calculated as an unweighted average of the C content of the substances composing this dataset.
- process-specific burdens, municipal waste incineration: 0.0012604 kg; lognormal variance with pedigree 0.44, pedigree (1,1,5,1,1)
  burden from sludge incineration. Uncertainty calculated from wastewater composition and treatment model;activityLink introduced to establish a direct link to the corresponding regional supply of this product
- chemical, organic: 6.5003e-6 kg; lognormal variance with pedigree 1.27, pedigree (1,1,5,1,1)
  (same comment as for residual material landfill)
  properties: dry mass 1 kg, wet mass 1 kg, carbon content, fossil 0.628
  note on carbon content, fossil: This dataset is an unweighted average of 20 organic substances (listed in Tab 88.1, ecoinvent v2.2 report 8, part II), being part of the top100 chemicals included in this database. The C-content has also been calculated as an unweighted average of the C content of the substances composing this dataset.
- cement, unspecified: 2.2923e-5 kg; lognormal variance with pedigree 0.08, pedigree (1,1,5,1,1)
  (same comment as for residual material landfill)
  properties: dry mass 1 kg, wet mass 1 kg
- process-specific burdens, residual material landfill: 5.7306e-5 kg; lognormal variance with pedigree 0.07, pedigree (1,1,5,1,1)
  (same comment as for process-specific burdens, municipal waste incineration)
- process-specific burdens, slag landfill: 0.00025522 kg; lognormal variance with pedigree 0.07, pedigree (1,1,5,1,1)
  (same comment as for process-specific burdens, municipal waste incineration)
- heat, district or industrial, natural gas: 0.0186288 MJ; lognormal variance with pedigree 0.05, pedigree (1,1,5,1,1)
  direct wastewater treatment plant burden. Uncertainty calculated from wastewater composition and treatment model
- heat, central or small-scale, other than natural gas: 0.0135172 MJ; lognormal variance with pedigree 0.05, pedigree (1,1,5,1,1)
  (same comment as for heat, district or industrial, natural gas)
- heat, district or industrial, other than natural gas: 0.001057 MJ; lognormal variance with pedigree 0.44, pedigree (1,1,5,1,1)
  (same comment as for residual material landfill)
- electricity, high voltage: 0.0001812 kWh; lognormal variance with pedigree 0.88, pedigree (1,1,5,1,1)
  (same comment as for residual material landfill)
- waste cement, hydrated: -5.7306e-5 kg; lognormal variance with pedigree 0.08, pedigree (1,1,5,1,1)
  (same comment as for residual material landfill)
  production volume 1.92935e-6 kg; = (Ref('6258abec-4446-43d6-86e0-e173c16579ed')*-1)* Ref('6d14b298-40e1-4bea-af35-558d7f8a1a15', 'ProductionVolume')/ABS( Ref('6d14b298-40e1-4bea-af35-558d7f8a1a15'))
    Calculated from the production volume of wastewater from ceramic production in proportion to the respective output amounts.
  properties: dry mass 1 kg, wet mass 1 kg
- electricity, low voltage: 0.028235 kWh; lognormal variance with pedigree 0.04, pedigree (1,1,5,1,1)
  (same comment as for heat, district or industrial, natural gas)
- wastewater treatment facility, capacity 5E9l/year: 5.6882e-9 unit; lognormal variance with pedigree 0.04, pedigree (1,1,5,1,1)
  uncertainty heeded in exchanges of the module
- waste graphical paper: -0.0155 kg; lognormal variance with pedigree 0.04, pedigree (1,1,5,1,1)
  (same comment as for heat, district or industrial, natural gas)
  production volume 0.000521847 kg; = (Ref('9d8c597e-68d6-4261-b714-d825aadfdaa3')*-1)* Ref('6d14b298-40e1-4bea-af35-558d7f8a1a15', 'ProductionVolume')/ABS( Ref('6d14b298-40e1-4bea-af35-558d7f8a1a15'))
    (same comment as for waste cement, hydrated)
  properties: dry mass 0.888 kg, carbon content, non-fossil 0.454955, water content 0.126126, wet mass 1 kg
- hydrochloric acid, without water, in 30% solution state: 7.0791e-9 kg; lognormal variance with pedigree 0.54, pedigree (1,1,5,1,1)
  (same comment as for residual material landfill)
  properties: wet mass 1 kg, dry mass 1 kg
- liquid manure spreading, by vacuum tanker: 3.5568e-6 m3; lognormal variance with pedigree 0.07, pedigree (1,1,5,1,1)
  burden from sludge spreading. Uncertainty calculated from wastewater composition and treatment model
  This exchange has an activity link directly to the producing activity because the product is primarily consumed in the same geographical area where it is produced.
- waste plastic, mixture: -0.0155 kg; lognormal variance with pedigree 0.04, pedigree (1,1,5,1,1)
  (same comment as for heat, district or industrial, natural gas)
  production volume 0.000521847 kg; = (Ref('ed7a49cd-cfd7-4de5-8408-1b952ab4376f')*-1)* Ref('6d14b298-40e1-4bea-af35-558d7f8a1a15', 'ProductionVolume')/ABS( Ref('6d14b298-40e1-4bea-af35-558d7f8a1a15'))
    (same comment as for waste cement, hydrated)
  properties: dry mass 0.847 kg, wet mass 1 kg, water content 0.180638, carbon content, fossil 0.747344
  note on carbon content, fossil: C content in 1 kg DM was calculated using data in Tab A.2, ecoinvent v2.2 report 13_I

## Emissions to nature
- Zinc [soil, agricultural]: 3.8847e-6 kg; lognormal variance with pedigree 1.27, pedigree (1,1,5,1,1)
  emission from sludge spreading. Uncertainty calculated from wastewater composition and treatment model
- Cobalt [water, surface water]: 1.2689e-5 kg; lognormal variance with pedigree 1.21, pedigree (1,1,5,1,1)
  sewer overload discharge plus direct wastewater treatment plant emission plus emission from sludge incineration. Uncertainty calculated from wastewater composition and treatment model
- Chromium VI [water, ground-, long-term]: 6.9269e-7 kg; lognormal variance with pedigree 1.65, pedigree (1,1,5,1,1)
  emission from sludge incineration. Uncertainty calculated from wastewater composition and treatment model
- Chromium [air, urban air close to ground]: 4.8383e-13 kg; lognormal variance with pedigree 1.36, pedigree (1,1,5,1,1)
  direct digester gas emission plus emission from sludge incineration. Uncertainty calculated from wastewater composition and treatment model
- Cadmium, ion [water, surface water]: 4.0609e-6 kg; lognormal variance with pedigree 1.21, pedigree (1,1,5,1,1)
  (same comment as for Cobalt)
- Cadmium, ion [water, ground-, long-term]: 2.101e-8 kg; lognormal variance with pedigree 7.46, pedigree (1,1,5,1,1)
  (same comment as for Chromium VI)
- Barium [air, urban air close to ground]: 2.398e-7 kg; lognormal variance with pedigree 1.29, pedigree (1,1,5,1,1)
  (same comment as for Chromium)
- Nickel, ion [water, surface water]: 1.5163e-5 kg; lognormal variance with pedigree 1.21, pedigree (1,1,5,1,1)
  (same comment as for Cobalt)
- Lead [water, ground-, long-term]: 8.4257e-7 kg; lognormal variance with pedigree 7.47, pedigree (1,1,5,1,1)
  (same comment as for Chromium VI)
- Cobalt [water, ground-, long-term]: 5.7289e-6 kg; lognormal variance with pedigree 1.27, pedigree (1,1,5,1,1)
  (same comment as for Chromium VI)
- Copper [soil, agricultural]: 1.7351e-6 kg; lognormal variance with pedigree 1.27, pedigree (1,1,5,1,1)
  (same comment as for Zinc)
- Chromium VI [water, surface water]: 1.2901e-5 kg; lognormal variance with pedigree 1.18, pedigree (1,1,5,1,1)
  (same comment as for Cobalt)
- Chromium, ion [water, surface water]: 2.0855e-8 kg; lognormal variance with pedigree 1.28, pedigree (1,1,5,1,1)
  (same comment as for Chromium VI)
- Zinc [air, urban air close to ground]: 7.1981e-11 kg; lognormal variance with pedigree 1.31, pedigree (1,1,5,1,1)
  (same comment as for Chromium)
- Barium [water, surface water]: 2.8821e-5 kg; lognormal variance with pedigree 1.05, pedigree (1,1,5,1,1)
  (same comment as for Cobalt)
- Nickel [air, urban air close to ground]: 2.257e-13 kg; lognormal variance with pedigree 1.37, pedigree (1,1,5,1,1)
  (same comment as for Chromium)
- Copper, ion [water, ground-, long-term]: 1.5908e-6 kg; lognormal variance with pedigree 1.28, pedigree (1,1,5,1,1)
  (same comment as for Chromium VI)
- Copper [air, urban air close to ground]: 1.4527e-11 kg; lognormal variance with pedigree 1.32, pedigree (1,1,5,1,1)
  (same comment as for Chromium)
- Lead [water, surface water]: 2.7478e-6 kg; lognormal variance with pedigree 1.12, pedigree (1,1,5,1,1)
  (same comment as for Cobalt)
- Cadmium [air, urban air close to ground]: 1.1707e-10 kg; lognormal variance with pedigree 1.28, pedigree (1,1,5,1,1)
  (same comment as for Chromium)
- Copper, ion [water, surface water]: 1.297e-6 kg; lognormal variance with pedigree 1.18, pedigree (1,1,5,1,1)
  (same comment as for Cobalt)
- Lead [air, urban air close to ground]: 4.3979e-10 kg; lognormal variance with pedigree 1.31, pedigree (1,1,5,1,1)
  (same comment as for Chromium)
- Water [water, unspecified]: 0.9 m3; name water_to_water_unspecified; lognormal variance with pedigree 0.0807, pedigree (2,2,5,1,1)
  Calculated value based on water balance.
  property dry mass 0 kg; name DM
  property wet mass 1000 kg; name WM
  property carbon content, fossil 0; name C_content_fossil
  property carbon content, non-fossil 0; name C_content_non_fossil
  property water in wet mass 1000 kg; name WWM
  property fraction, origin: salt water 0; name fraction_origin_salt_water_Ww
  property fraction, origin: fresh water 1; name fraction_origin_fresh_water_Ww
  property fraction, origin: unspecified 0; name fraction_origin_unspecified_Ww
- Cadmium [soil, agricultural]: 1.8461e-6 kg; lognormal variance with pedigree 1.27, pedigree (1,1,5,1,1)
  (same comment as for Zinc)
- Chromium [soil, agricultural]: 5.7691e-6 kg; lognormal variance with pedigree 1.27, pedigree (1,1,5,1,1)
  (same comment as for Zinc)
- Water [air, unspecified]: 0.1 m3; name water_to_air_unspecified; lognormal variance with pedigree 0.0807, pedigree (2,2,5,1,1)
  Calculated value based on water balance.
  property fraction, origin: unspecified 1; name fraction_origin_unspecified
  property fraction, origin: salt water 0; name fraction_origin_salt_water
  property fraction, origin: fresh water 0; name fraction_origin_fresh_water
- Barium [water, ground-, long-term]: 0.00021289 kg; lognormal variance with pedigree 1.37, pedigree (1,1,5,1,1)
  (same comment as for Chromium VI)
- Nickel, ion [water, ground-, long-term]: 4.8961e-6 kg; lognormal variance with pedigree 1.27, pedigree (1,1,5,1,1)
  (same comment as for Chromium VI)
- Cobalt [soil, agricultural]: 5.7691e-6 kg; lognormal variance with pedigree 1.27, pedigree (1,1,5,1,1)
  (same comment as for Zinc)
- Carbon monoxide, fossil [air, urban air close to ground]: 1.7607e-7 kg; lognormal variance with pedigree 1.09, pedigree (1,1,5,1,1)
  (same comment as for Chromium VI)
- Barium [soil, agricultural]: 0.00021142 kg; lognormal variance with pedigree 1.27, pedigree (1,1,5,1,1)
  (same comment as for Zinc)
- Methane, fossil [air, urban air close to ground]: 5.0413e-9 kg; lognormal variance with pedigree 0.49, pedigree (1,1,5,1,1)
  (same comment as for Chromium VI)
- Nickel [soil, agricultural]: 4.6106e-6 kg; lognormal variance with pedigree 1.27, pedigree (1,1,5,1,1)
  (same comment as for Zinc)
- Cobalt [air, urban air close to ground]: 2.0775e-13 kg; lognormal variance with pedigree 1.37, pedigree (1,1,5,1,1)
  (same comment as for Chromium)
- Lead [soil, agricultural]: 1.0426e-5 kg; lognormal variance with pedigree 1.27, pedigree (1,1,5,1,1)
  (same comment as for Zinc)
- Zinc, ion [water, surface water]: 3.71e-6 kg; lognormal variance with pedigree 1.19, pedigree (1,1,5,1,1)
  (same comment as for Cobalt)
- Zinc, ion [water, ground-, long-term]: 6.8312e-8 kg; lognormal variance with pedigree 6.06, pedigree (1,1,5,1,1)
  (same comment as for Chromium VI)

## Extrapolations
This dataset has been extrapolated from year 2000 to the year of the calculation (2019). The uncertainty has been adjusted accordingly.

## Review by Niels Jungbluth 2009-01-22
passed.
