# swath, by rotary windrower

Dataset: EcoSpold 2, unit process
Geography: CA-QC
Time period: 1991-01-01 to 2019-12-31
Technology level: current
Classification: EcoSpold01Categories: agricultural means of production/work processes
Classification: ISIC rev.4 ecoinvent: 0161:Support activities for crop production
Scenario: Business-as-Usual
System model: Allocation at the point of substitution
Generated by: Dominique Maxime
Published in: Nemecek, T. 2007
Database: ecoinvent
isCopyrightProtected: true
accessRestrictedTo: 1

## General comment
This dataset represents the use of rotary windrower for one hectare. The working width is 4.0 m (average).
Child dataset exchanges scaled from GLO parent dataset based on diesel consumption in Quebec. Created to proxy farm machinery/fieldwork representative of the Quebec context. Data quality indicators adjusted accordingly. Other difference with the parent dataset is the production volume, which now represents the production volume in Quebec.
Diesel consumption is calculated from primary data and models from the American Society of Agricultural and Biological Engineers (ASABE) published in 2006 and might be representative of more recent technology than the GLO parent dataset.
Warning: If the parent value for diesel consumption (in the GLO parent dataset) is changed in future edition, the user must change the parameter "ecoinvent diesel consumption" accordingly in order to get the right ratio of qc/ecoinvent diesel consumption.

## Included activities start
The rotary windrower process starts with preliminary work at the farm, like attaching the adequate machine to the tractor.

## Included activities end
This activity ends with transfer back to farm and concluding work, like uncoupling the machine.The inventory includes transfer to field; field work (for a parcel of land of 1 ha surface); the diesel fuel consumption and the amount of agricultural machinery and of the shed, which has to be attributed to the swathing. Also taken into consideration is the amount of emissions to the air from combustion and the emission to the soil from tyre abrasion during the work process. The overlapping during the field work is considered. The amount of swathed good is not taken into account. Not included are dust other than from combustion and noise.

## Geography
Child dataset air emissions related to diesel combustion are scaled from parent dataset (GLO) based on the ratio of diesel consumption in Quebec over diesel consumption of GLO. Created to proxy farm machinery/fieldwork representative of the Quebec context. Data quality indicators adjusted accordingly.

## Technology
Fuel consumption has been extrapolated to Quebec, but emissions per kg diesel were taken from the original values.

## Time period
The emissions per kg of combusted Diesel were taken from the original values but the Diesel consumption has been updated.

## Parameters
- qc child dataset diesel consumption: 6.97 kg/unit; name qc_diesel; lognormal variance with pedigree 0.00017, pedigree (1,2,1,2,1)
  Diesel consumption in the Québec agricultural fieldwork dataset in kg/ha diesel
- farm machinery diesel consumption ratio: 2.37075 dimensionless; name machine_diesel_ratio; = qc_diesel/ EI_diesel; lognormal variance with pedigree 0, pedigree (1,1,1,1,1)
  Ratio of diesel consumption for tractor and its machinery: kg diesel per ha of the Quebec machinery/kg diesel per ha of the ecoinvent's parent machinery
- parent dataset diesel consumption: 2.94 kg/unit; name EI_diesel; lognormal variance with pedigree 0.004, pedigree (1,4,1,5,1)
  Diesel consumption in the parent agricultural fieldwork dataset in kg/ha diesel
- world arable land area: 1.39628e9 ha; name world_arable_area; lognormal variance with pedigree 0.0006, pedigree (1,1,1,1,1)
  Arable land area, World, in 2011. Source: FAOSTAT, 2013
- quebec cropped area: 1.87476e6 ha; name qc_crop_area; lognormal variance with pedigree 0.0006, pedigree (1,1,1,1,1)
  Land in crops, Quebec, in 2011. Source: Statistics Canada, 2013. Table 004-0002 - Census of Agriculture, total area of farms and use of farm land, CANSIM (database). (accessed: 2013-11-15) ("Land in crops" includes field crops, vegetables, fruits and nursery crops, and sod.) Statistics Canada

## Reference product
- swath, by rotary windrower: 1 ha; CPC 86119: Other support services to crop production; By-product classification allocatable product
  EcoSpold01Location=CH
  production volume 4.50959e6 ha; = ParentValue* qc_crop_area/ world_arable_area
    Total area swathed in Québec down-scaled from total world area (production volume of the GLO parent dataset) through the ratio of cropped area in the two regions (see mathematical relation and parameters).
  property price 5.2189 EUR2005
    Calculated based on inputs: The price of the product has been calculated as a sum of the values of the material and energy inputs for this product. This value is therefore a rough estimation. It may underestimate the real price since there are additional expenses when producing any product. These expences can include for example labour costs, treatment of waste materials and profit for the producer. Please consider carefully whether this level of data quality is acceptable for your application.

## Inputs from technosphere
- agricultural machinery, unspecified: 0.404 kg; = ParentValue; lognormal variance with pedigree 0.044, pedigree (1,4,5,5,1)
  The same amount of machinery use as in the parent dataset is used as a proxy.
  EcoSpold01Location=CH
- shed: 0.00426 m2; = ParentValue; lognormal variance with pedigree 0.344, pedigree (1,4,5,5,1)
  The same amount of shed use for machinery as in the parent dataset is used as a proxy.
  EcoSpold01Location=CH
- diesel: 6.97 kg; = ParentValue* machine_diesel_ratio; lognormal variance with pedigree 0.044, pedigree (1,4,5,5,1)
  Scaling to Quebec diesel consumption
  EcoSpold01Location=CH
  properties: carbon content, fossil 0.865, wet mass 1 kg, dry mass 1 kg
  note on carbon content, fossil: C-content of diesel is 86.5% (ecoinvent v2.2 report 6_IV, Tab 3.14)
- tractor, 4-wheel, agricultural: 0.458 kg; = ParentValue; lognormal variance with pedigree 0.044, pedigree (1,4,5,5,1)
  The same amount of tractor use as in the parent dataset is used as a proxy.
  EcoSpold01Location=CH

## Emissions to nature
- Methane, fossil [air, non-urban air or from high stacks]: 0.000898514 kg; = ParentValue* machine_diesel_ratio; lognormal variance with pedigree 0.1001, pedigree (1,2,5,5,3)
  Emission from diesel combustion scaled from the parent emission factor based on the relative diesel consumption.
- NMVOC, non-methane volatile organic compounds, unspecified origin [air, non-urban air or from high stacks]: 0.0251299 kg; = ParentValue* machine_diesel_ratio; lognormal variance with pedigree 0.084, pedigree (1,4,5,5,1)
  (same comment as for Methane, fossil)
- Benzo(a)pyrene [air, non-urban air or from high stacks]: 2.091e-7 kg; = ParentValue* machine_diesel_ratio; lognormal variance with pedigree 0.7001, pedigree (1,2,5,5,3)
  (same comment as for Methane, fossil)
- Cadmium [air, non-urban air or from high stacks]: 6.97e-8 kg; = ParentValue* machine_diesel_ratio; lognormal variance with pedigree 0.7001, pedigree (1,2,5,5,3)
  (same comment as for Methane, fossil)
- Nickel [air, non-urban air or from high stacks]: 4.88374e-7 kg; = ParentValue* machine_diesel_ratio; lognormal variance with pedigree 0.7001, pedigree (1,2,5,5,3)
  (same comment as for Methane, fossil)
- Benzene [air, non-urban air or from high stacks]: 5.09711e-5 kg; = ParentValue* machine_diesel_ratio; lognormal variance with pedigree 0.1001, pedigree (1,2,5,5,3)
  (same comment as for Methane, fossil)
- Zinc [air, non-urban air or from high stacks]: 6.97e-6 kg; = ParentValue* machine_diesel_ratio; lognormal variance with pedigree 0.7001, pedigree (1,2,5,5,3)
  (same comment as for Methane, fossil)
- Nitrogen oxides [air, non-urban air or from high stacks]: 0.31531 kg; = ParentValue* machine_diesel_ratio; lognormal variance with pedigree 0.084, pedigree (1,4,5,5,1)
  (same comment as for Methane, fossil)
- Zinc [soil, agricultural]: 0.000622 kg; = ParentValue; lognormal variance with pedigree 0.084, pedigree (1,4,5,5,1)
  Emission to soil from tyre abrasion, not related to diesel combustion. The same emission factor as the parent dataset is used as a proxy.
- Selenium [air, non-urban air or from high stacks]: 6.97e-8 kg; = ParentValue* machine_diesel_ratio; lognormal variance with pedigree 0.1001, pedigree (1,2,5,5,3)
  (same comment as for Methane, fossil)
- Sulfur dioxide [air, non-urban air or from high stacks]: 0.00701741 kg; = ParentValue* machine_diesel_ratio; lognormal variance with pedigree 0.0601, pedigree (1,2,5,5,3)
  (same comment as for Methane, fossil)
- Cadmium [soil, agricultural]: 2.36e-7 kg; = ParentValue; lognormal variance with pedigree 0.084, pedigree (1,4,5,5,1)
  (same comment as for Zinc)
- Ammonia [air, non-urban air or from high stacks]: 0.0001394 kg; = ParentValue* machine_diesel_ratio; lognormal variance with pedigree 0.1001, pedigree (1,2,5,5,3)
  (same comment as for Methane, fossil)
- Particulates, < 2.5 um [air, non-urban air or from high stacks]: 0.0235652 kg; = ParentValue* machine_diesel_ratio; lognormal variance with pedigree 0.3601, pedigree (1,2,5,5,3)
  (same comment as for Methane, fossil)
- Copper [air, non-urban air or from high stacks]: 1.18537e-5 kg; = ParentValue* machine_diesel_ratio; lognormal variance with pedigree 0.7001, pedigree (1,2,5,5,3)
  (same comment as for Methane, fossil)
- Carbon dioxide, fossil [air, non-urban air or from high stacks]: 21.6923 kg; = ParentValue* machine_diesel_ratio; lognormal variance with pedigree 0.0601, pedigree (1,2,5,5,3)
  (same comment as for Methane, fossil)
- Carbon monoxide, fossil [air, non-urban air or from high stacks]: 0.037932 kg; = ParentValue* machine_diesel_ratio; lognormal variance with pedigree 0.694, pedigree (1,4,5,5,1)
  (same comment as for Methane, fossil)
- Chromium [air, non-urban air or from high stacks]: 3.485e-7 kg; = ParentValue* machine_diesel_ratio; lognormal variance with pedigree 0.7001, pedigree (1,2,5,5,3)
  (same comment as for Methane, fossil)
- Lead [soil, agricultural]: 1.04e-6 kg; = ParentValue; lognormal variance with pedigree 0.084, pedigree (1,4,5,5,1)
  (same comment as for Zinc)
- PAH, polycyclic aromatic hydrocarbons [air, non-urban air or from high stacks]: 2.29251e-5 kg; = ParentValue* machine_diesel_ratio; lognormal variance with pedigree 0.3601, pedigree (1,2,5,5,3)
  (same comment as for Methane, fossil)
- Dinitrogen monoxide [air, non-urban air or from high stacks]: 0.000836874 kg; = ParentValue* machine_diesel_ratio; lognormal variance with pedigree 0.1001, pedigree (1,2,5,5,3)
  (same comment as for Methane, fossil)

## Sampling procedure
The inventoried HC, NOx, CO and fuel consumption values are measurements made following two test cycles (ISO 8178 C1 test and a specific 6-level-test created by the FAT) and on measurements made during the field work. The other emissions were calculated basing on literature data and the measured fuel consumption. The fuel consumption is a weighted average calculated from the swathed surface per hour and fuel consumption per hour,

## Extrapolations
This dataset has been extrapolated from year 2002 to the year of the calculation (2019). The uncertainty has been adjusted accordingly.

## Review by Thomas Nemecek 2013-12-27
The production volume needs to be updated, since the GLO production volume has changed meanwhile.

## Review by Roland Hischier 2003-08-06
Passed.
