# bronze production

Dataset: EcoSpold 2, unit process
Geography: CH
Time period: 2000-01-01 to 2019-12-31
Technology level: current
Classification: EcoSpold01Categories: metals/extraction
Classification: ISIC rev.4 ecoinvent: 2420:Manufacture of basic precious and other non-ferrous metals
Tags: ConvertedDataset
Scenario: Business-as-Usual
System model: Allocation at the point of substitution
Generated by: Hans-Jörg Althaus
Published in: Althaus H.-J. 2000
Database: ecoinvent
isCopyrightProtected: true
accessRestrictedTo: 1

## General comment
This dataset describes the processing of copper and tinup to production of 1 kg of molten bronze. Bronze stands for 95% Cu and 5% Sn.
[This dataset was already contained in the ecoinvent database version 2. It was not individually updated during the transfer to ecoinvent version 3. Life Cycle Impact Assessment results may still have changed, as they are affected by changes in the supply chain, i.e. in other datasets. This dataset was generated following the ecoinvent quality guidelines for version 2. It may have been subject to central changes described in the ecoinvent version 3 change report (http://www.ecoinvent.org/database/ecoinvent-version-3/reports-of-changes/), and the results of the central updates were reviewed extensively. The changes added e.g. consistent water flows and other information throughout the database. The documentation of this dataset can be found in the ecoinvent reports of version 2, which are still available via the ecoinvent website. The change report linked above covers all central changes that were made during the conversion process.]
All data are calculated based on assumptions and theoretical models. The overall quality of the dataset is poor, making it of insufficient quality for LCA where these metals play an important role.

## Included activities start
From reception of copper at the factory gate.

## Included activities end
This activity ends with the melting of copper and tin.

The dataset includes the consumption of infrastructure for the process.

## Technology
Production is basically done by melting the different metals. Due to the high vapour pressure of zinc and tin, parts of these inputs arise as air emissions. Filters are commonly used to abate these emissions.

## Reference product
- bronze: 1 kg; By-product classification allocatable product; CPC 4: Metal products, machinery and equipment
  EcoSpold01Location=CH
  Estimation from dataset author
  production volume 1.32632e6 kg
    Estimated at 0.5% of global production
  property price 5.81533 EUR2005
    Calculated based on inputs: The price of the product has been calculated as a sum of the values of the material and energy inputs for this product. This value is therefore a rough estimation. It may underestimate the real price since there are additional expenses when producing any product. These expences can include for example labour costs, treatment of waste materials and profit for the producer. Please consider carefully whether this level of data quality is acceptable for your application. Cross-referenced; Calculated value based on data from United Nations Commodity Trade Statistics Database (comtrade.un.org) is 2.6 Euro/kg. UN comtrade category: 740322 Copper-tin base alloys, unwrought. Year 2005. Using exchange rate of 1EURO = 1.209 USD. Average of price of import into 5 main markets (EU, US, JP, IN and CN).
  property carbon content, non-fossil 0
    Bronze is a metal alloy consisting primarily of copper, usually with tin as the main additive, but sometimes with other elements such as phosphorus, manganese, aluminum, or silicon
  property carbon content, fossil 0
    (same comment as for bronze)
  property carbon content 0
    carbon content on a dry matter basis (reserved; not for manual entry)
  properties: water content 0, water in wet mass 0 kg, wet mass 1 kg, dry mass 1 kg, carbon allocation 0 kg

## Inputs from technosphere
- tin: 0.0505 kg; lognormal variance with pedigree 0.148, pedigree (4,5,5,5,4)
  Estimation from dataset author
  EcoSpold01Location=RER
  properties: wet mass 1 kg, dry mass 1 kg
- copper: 0.959 kg; lognormal variance with pedigree 0.148, pedigree (4,5,5,5,4)
  EcoSpold01Location=RER
  Estimation from dataset author
  properties: wet mass 1 kg, dry mass 1 kg
- electricity, medium voltage: 0.02 kWh; lognormal variance with pedigree 0.148, pedigree (4,5,5,5,4)
  Modelled, based on "ISIC 2420" - pdf-document on the dedicated talk page of ecoinvent (www.ecoinvent.org/documentation). See section: "Copper alloys in ecoinvent".
  EcoSpold01Location=UCTE
- heat, district or industrial, natural gas: 0.36 MJ; lognormal variance with pedigree 0.148, pedigree (4,5,5,5,4)
  EcoSpold01Location=RER
  Modelled, based on "ISIC 2420" - pdf-document on the dedicated talk page of ecoinvent (www.ecoinvent.org/documentation). See section: "Copper alloys in ecoinvent".
- heat, district or industrial, other than natural gas: 0.288 MJ; lognormal variance with pedigree 0.148, pedigree (4,5,5,5,4)
  Modelled, based on "ISIC 2420" - pdf-document on the dedicated talk page of ecoinvent (www.ecoinvent.org/documentation). See section: "Copper alloys in ecoinvent".
  EcoSpold01Location=RER
- filter dust from Al electrolysis: -0.01 kg
  Proxy: "filter dust from electrolysis, 0% water" is used as a proxy for dust from filters (to recycling).
  Estimation from dataset author: Dust filters are commonly used to abate metal emissions.
  production volume 13263.2 kg; = Ref('4e10f89a-1da8-4e52-bd27-8e7cea31cc67', 'ProductionVolume') * ((Ref('928ea83d-af2f-4909-9c36-11e3d95f7da5')*-1) / Ref('4e10f89a-1da8-4e52-bd27-8e7cea31cc67'))
    Calculated from production volume of reference product using the relative outputs.
  properties: carbon content, fossil 0.11586, wet mass 1 kg, dry mass 1 kg
- aluminium casting facility: 4.9e-11 unit; lognormal variance with pedigree 0.458, pedigree (4,5,5,5,4)
  Proxy: "aluminium casting facility" is used as a proxy for brazing solder production facility.
  Estimation from dataset author: The amount of infrastructure corresponds to the volume of material throughput and thus is recalculated according to the different densities of aluminium and copper alloys. Then, Correction by density: From 2700 kg/m3 for infrastructure for aluminum casting, to 8470 kg/m3 for infrastructure for brass casting.
  EcoSpold01Location=RER

## Emissions to nature
- Tin [air, unspecified]: 5.05e-5 kg; lognormal variance with pedigree 0.198, pedigree (4,5,5,5,4)
  Estimation from dataset author: Due to the high vapour pressure of zinc, parts of these inputs end up as air emissions (0.1% of Zn input to air).

## Sampling procedure
based on literature and internet

## Extrapolations
This dataset has been extrapolated from year 2000 to the year of the calculation (2019). The uncertainty has been adjusted accordingly.

## Review by Roland Hischier 2011-12-09
Transfer of documentation done.

## Review by Roland Hischier 2003-06-12
Passed.
