# urea formaldehyde foam slab production, hard

Dataset: EcoSpold 2, unit process
Geography: RoW
Time period: 1997-01-01 to 2019-12-31
Technology level: current
Classification: EcoSpold01Categories: insulation materials/production
Classification: ISIC rev.4 ecoinvent: 2220:Manufacture of plastics products
Tags: ConvertedDataset
Scenario: Business-as-Usual
System model: Allocation at the point of substitution
Generated by: Hans-Jörg Althaus
Published in: Kellenberger D. 2004
Database: ecoinvent
isCopyrightProtected: true
accessRestrictedTo: 1

## General comment
Foam has a density of 10 - 30 kg /m3 and a thermal conductivity of 0.035 W/mK. Data is based on crude assumptions.
[This dataset was already contained in the ecoinvent database version 2. It was not individually updated during the transfer to ecoinvent version 3. Life Cycle Impact Assessment results may still have changed, as they are affected by changes in the supply chain, i.e. in other datasets. This dataset was generated following the ecoinvent quality guidelines for version 2. It may have been subject to central changes described in the ecoinvent version 3 change report (http://www.ecoinvent.org/database/ecoinvent-version-3/reports-of-changes/), and the results of the central updates were reviewed extensively. The changes added e.g. consistent water flows and other information throughout the database. The documentation of this dataset can be found in the ecoinvent reports of version 2, which are still available via the ecoinvent website. The change report linked above covers all central changes that were made during the conversion process.]

## Included activities end
Includes raw materials and production of foam.

## Geography
data for Switzerland

## Technology
Production of slabs in large manufacturing plant using stationary machinery.

## Parameters
- fraction, process water, to air: 0.15 dimensionless; name fraction_PW_to_air; lognormal variance with pedigree 0.092025, pedigree (4,4,3,2,4)
- fraction, tap water, to air: 0.15; name fraction_TW_to_air; lognormal variance with pedigree 0.092025, pedigree (4,4,3,2,4)

## Reference product
- urea formaldehyde foam slab, hard: 1 kg; CPC 36920: Self-adhesive plates, sheets, film, foil, tape, strip and other flat shapes, of plastics; By-product classification allocatable product
  EcoSpold01Location=CH
  production volume 3.96633 kg
    This is a placeholder value that does not reflect real-world production volumes. This dataset does not currently require a real-world production volume to work in the database framework, and no actual data were collected yet. This has no negative effect on the results of the ecoinvent database.
  property carbon content, fossil 0.379513
    Based on urea formaldehyde (92.8%). Hardener is phosphoric acid (ecoinvent v2.2 report 16_part XIV), H3PO4.
  property carbon content 0.379513
    carbon content on a dry matter basis (reserved; not for manual entry)
  property true value 1.77
    allocation property applied in "true value" allocation // value calculated from revenue
  properties: water in wet mass 0 kg, wet mass 1 kg, dry mass 1 kg, price 1.77 EUR2005, carbon content, non-fossil 0, water content 0, carbon allocation 0.379513 kg

## By-products
- electricity, for reuse in municipal waste incineration only: 0 kWh; CPC 17100: Electrical energy; By-product classification allocatable product; pedigree (1,1,1,1,1)
  Net electricity generated from this waste and used in internal MSWI plant energy redistribution.
  Uncertainty: uncertainty is calculated from uncertainties in waste composition and uncertainties in energy efficiency and the uncertainty in internal energy demand
  production volume 0.00742542 kWh
  property exergy 3.6 MJ; name E_el_prod_MSWI_exergy
    This exergy property is based on the exergy content of the product.
  property true value relation 3.6; name E_el_prod_MSWI_true_value_relation
    property to calculate "true value" from
  property price 0.1 EUR2005; name E_el_prod_MSWI_price_EUR2005
    Estimated to be the same price as in case of electricity, medium voltage.
  property true value 0.000236917
    allocation property applied in "true value" allocation // value calculated from true value relation
- heat, for reuse in municipal waste incineration only: 0 MJ; CPC 17300: Steam and hot water; By-product classification allocatable product; pedigree (1,1,1,1,1)
  (same comment as for electricity, for reuse in municipal waste incineration only)
  production volume 0.0522171 MJ
  property exergy 0.1842 MJ; name E_th_prod_MSWI_exergy
    This exergy property is based on the exergy content of the product.
  property true value relation 0.1842; name E_th_prod_MSWI_true_value_relation
    property to calculate "true value" from
  property price 0.0106 EUR2005; name E_th_prod_MSWI_price_EUR2005
    Average European district heat price from Ecoheatcool and Euroheat 2005-2006, Ecoheat Work package 1: The European heat market. Final report. 10.6 EUR/GJ i s the price of district heat. http://www.solarthermalworld.org/files/Ecoheatcool%20WP1%20Web.pdf?download
  property true value 8.52462e-5
    (same comment as for electricity, for reuse in municipal waste incineration only)

## Inputs from technosphere
- phosphoric acid, industrial grade, without water, in 85% solution state: 0.0509907 kg; lognormal variance with pedigree 0.38, pedigree (5,5,5,5,5)
  EcoSpold01Location=RER
  properties: wet mass 1 kg, dry mass 1 kg
- tap water: 0 kg; name tap_water_input; pedigree (1,1,1,1,1)
  EcoSpold01Location=CH
  properties: carbon content, fossil 0.00178991, water content 2962.17, wet mass 1 kg, dry mass 0.000337476 kg
  note on carbon content, fossil: Bicarbonate content is 2.93 mol/m3. CO2 content is 0.1 mol/m3 (ecoinvent v2.2 report 8, Tab 93.1).
- electricity, low voltage: 0 kWh; pedigree (1,1,1,1,1)
  EcoSpold01Location=CH
- waste polyurethane: 0 kg; pedigree (1,1,1,1,1)
  EcoSpold01Location=CH
  production volume 0 kg
    Calculated from the production volume of urea formaldehyde foam slab, hard in proportion to the respective output amounts.
  properties: water content 0.00200401, carbon content, fossil 0.641283, wet mass 1 kg, dry mass 0.998 kg
  note on carbon content, fossil: C content was calculated for 1 kg DM, using data in Tab A.2, ecoinvent v2.2 report 13_I.
- chemical factory, organics: 1.99964e-10 unit; lognormal variance with pedigree 0.68, pedigree (5,5,5,5,5)
  EcoSpold01Location=RER
- alkylbenzene sulfonate, linear, petrochemical: 0.0509907 kg; lognormal variance with pedigree 0.38, pedigree (5,5,5,5,5)
  EcoSpold01Location=RER
  properties: carbon content, fossil 0.407018, dry mass 1 kg, wet mass 1 kg
  note on carbon content, fossil: European LAS is a mixture of differ-ent homologues (C10-C13 alkyl chains) including all positional isomers with the exception of 1-alkyl substituted ones. The typical homologue distribution is 15%, 30%, 30% and 25% for C10, C11, C12 and C13 with an average alkyl chain of C11.6 and an average molecular weight of 342 as the sodium salt (ecoinvent v2.2 report 12)
- urea formaldehyde resin: 0.927831 kg; lognormal variance with pedigree 0.38, pedigree (5,5,5,5,5)
  EcoSpold01Location=RER
  properties: carbon content, fossil 0.408958, wet mass 1 kg, dry mass 1 kg
  note on carbon content, fossil: Chemical formula of the urea formaldehide monomer was assumed to be C3H8N2O
- tap water: 0.000447583, 0.0037183, 0.000739704, 0.159055, 0.0186524, 0.000485238, 0.00138025, 0.213449 kg (8 entries); lognormal variance with pedigree 0.38, pedigree (5,5,5,5,5)
  EcoSpold01Location=CH
- electricity, low voltage: 4.45519e-5, 7.81383e-6, 0.000177218, 0.000635372, 0.000128491, 0.00194315, 0.000320294, 0.000912347 kWh (8 entries); lognormal variance with pedigree 0.38, pedigree (5,5,5,5,5)
  EcoSpold01Location=CH
- waste polyurethane: -0.00222443, -0.000148628, -1.12405e-5, -6.13887e-5, -2.48003e-5, -5.82943e-5, -0.00189532, -0.0155723 kg (8 entries); lognormal variance with pedigree 0.38, pedigree (5,5,5,5,5)
  EcoSpold01Location=CH
  production volume 0.06 kg

## Emissions to nature
- Water [water, unspecified]: 0.000338238 m3; name water_to_water_unspecified; lognormal variance with pedigree 0.0827, pedigree (2,2,5,5,1)
  Calculated value based on literature values and expert opinion. See comments in the parametres' comment field.
  property carbon content, fossil 0; name C_content_fossil
  property dry mass 0 kg; name DM
  property fraction, origin: salt water 0; name fraction_origin_salt_water_Ww
  property fraction, origin: fresh water 1; name fraction_origin_fresh_water_Ww
  property fraction, origin: unspecified 0; name fraction_origin_unspecified_Ww
  property carbon content, non-fossil 0; name C_content_non_fossil
  property wet mass 1000 kg; name WM
  property water in wet mass 1000 kg; name WWM
- Water [air, unspecified]: 5.96891e-5 m3; name water_to_air_unspecified; lognormal variance with pedigree 0.0827, pedigree (2,2,5,5,1)
  (same comment as for Water)
  property fraction, origin: salt water 0; name fraction_origin_salt_water
  property fraction, origin: fresh water 1; name fraction_origin_fresh_water
  property fraction, origin: unspecified 0; name fraction_origin_unspecified
- Formaldehyde [air, urban air close to ground]: 9.27831e-5 kg; lognormal variance with pedigree 0.5, pedigree (5,5,5,5,5)

## Sampling procedure
literature

## Extrapolations
none This dataset has been copied from an original dataset covering the geography CH. The uncertainty has been adjusted accordingly.

## Review by Roberto Dones 2004-04-01
passed
