# grass fibre to generic market for energy feed

Dataset: EcoSpold 2, unit process
Geography: GLO
Time period: 2012-01-01 to 2019-12-31
Technology level: current
Classification: ISIC rev.4 ecoinvent: 108:Manufacture of prepared animal feeds
Scenario: Business-as-Usual
System model: Allocation at the point of substitution
Generated by: Tereza Levova
Database: ecoinvent
isCopyrightProtected: true
accessRestrictedTo: 1

## General comment
This is a linking activity that converts grass fibres into gross energy for the feed market.
The naming of the dataset is based on the feed nomenclature system of the National Research Council (USA). Products with less than 20 percent of protein are classified as energy feeds. Products with more than 20 percent of protein are classified as protein feeds.

## Included activities start
The activity starts with the reception of grass fibres

## Included activities end
The activity ends with the conversion of grass fibres into gross energy.

## Reference product
- grass fibre: 0 kg; name grass_fibres; CPC 23319: Preparations used in animal feeding n.e.c.; By-product classification allocatable product
  production volume 0 kg; name grass_fibres_PV
    based on production volume of grass fibre as a byproduct in biogas production (refer to dataset biogas production from grass). The production of grass fibre from ethanol production is unknown.
  property price 0.645 EUR2005; name grass_fibres_price_EUR2005
    Temporary price data. Calculated as 90% of purchasers price based on: Source: Ecoinvent report nr. 17, table 12.46
  property carbon content, non-fossil 0.46
    considered pure fibre (Tab 12.43, ecoinvent v2.2 report 17). C-content in fibre is estimated to be 46% in dry mass (from "Evolutionary and Biochemical Aspects", A.D. Kay and T. Vrede (in Global Ecology, 2010, Elsevier B.V., S.E. Jørgensen Ed.)).
  property carbon content 0.46
    carbon content on a dry matter basis (reserved; not for manual entry)
  properties: water content 0.0214505, wet mass 1 kg, dry mass 0.979 kg, water in wet mass 0.021 kg, carbon content, fossil 0, carbon allocation 0.45034 kg
- energy feed, gross: 1 MJ; source Agroscope 2011; CPC 23319: Preparations used in animal feeding n.e.c.; By-product classification allocatable product; pedigree (1,1,1,1,1)
  Calculated based on formula for calculating the gross energy of straw and grass feedstuff (Agroscope, 2011).
  Gross Energy (MJ/kg dry mass) = 0.0188 * Organic Substances (g/kgDM) + 0.0078* Crude Protein (g/kg DM)
  The Organic Substances is obtained from rye straw (OS = 955 g/kgDM), since no specific data is given for grass fibres. The formula for calculating the OS content is based on the ash content (ash content of rye straw is 45 g/kg DM). The dry mass of the reference product is 0.979kg/kg.
  OS (g/kgDM)= 1000- Ash content (g/kgDM)
  production volume 1.89666e8 MJ

## By-products
- energy feed, gross: 0 MJ; name gross_energy_output_1_1; = (0.0188*955)+(0.0078*0)*0.979* grass_fibres*(-1); source Agroscope 2011; CPC 23319: Preparations used in animal feeding n.e.c.; By-product classification allocatable product; pedigree (1,1,1,1,1)
  (same comment as for energy feed, gross)
  production volume 0 MJ; = grass_fibres_PV * (Ref('3abf0261-ac59-4e5f-bb98-22ad3b83ca1f') / grass_fibres)*(-1)
    Calculated from production volume of reference product using the relative outputs.
  property price 0.0108 EUR2005; name gross_energy_output_1_1_price_EUR2005
    Based on energy feed, gross content in soybean meal and prices per kg of soybean meal. Assumed soybean meal is the most used feed. Soybean meal 2004 prices for World import/export data (tonnes and US$) from FaoStat statistics (http://faostat.fao.org/site/535/default.aspx#ancor, TRADE)- [Accessed 24 May 2010]. See calculations for protein /energy content
  property carbon content 0
    carbon content on a dry matter basis (reserved; not for manual entry)
  properties: carbon content, non-fossil 0, carbon content, fossil 0, water in wet mass 0 kg, wet mass 1 kg, dry mass 1 kg, water content 0, carbon allocation 0 kg

## Inputs from technosphere
- grass, Swiss integrated production: 0.0621583 kg; source Oettli B. 2004; lognormal variance with pedigree 0.0412, pedigree (2,3,5,1,1)
  Calculated value, based on literature.
  Three different types of grass representing the average grass mix of Switzerland are considered: 32,4% of grass from 'grass production, Swiss integrated production, intensive', 61,5% of grass from 'grass production, permanent grassland, Swiss integrated production, intensive', and 6,1% of grass from 'grass production, permanent grassland, organic, extensive'.
- wastewater from grass refinery: -0.000131652 m3; lognormal variance with pedigree 0.0827, pedigree (3,3,5,3,1)
  Calculated value, based on literature studies.
  production volume 1168 m3
- ethanol fermentation plant: 3.07684e-12 unit; source Jungbluth N. 2007; lognormal variance with pedigree 0.3527, pedigree (3,3,5,3,1)
  Estimated value, using the dataset 'ethanol fermentation plant' as a first approximation.
  This exchange has an activity link directly to the producing activity because the product is primarily consumed in the same geographical area where it is produced.
- heat, district or industrial, natural gas: 0.110838 MJ; source Carbotech 2000; lognormal variance with pedigree 0.0513, pedigree (2,3,5,3,1)
  Calculated value, based on literature.
  Heating is required for the pre-treatment of the grass, and post treatment (drying) of fibres and proteins.
  It's assumed that the pre-treatment stage should be the same as for the ethanol production from grass.
  For ethanol, literature gives that the steam consumption for the pre-treatment stage is 5.1 MJ/litre of ethanol, and the electricity consumption 0.5 kWh/l (while the consumption of grass is 32.7 kg of fresh grass per litre of ethanol). Based on these figures, a specific heating value of 0.96 MJ/kgGrass_DM was calculated.
  Digestion takes place at the end of the refinery process, and hence the input substance (grass juice) has already achieved the required digestion temperature.
  For post treatment of proteins and fibres, specific heat consumptions for fibres drying and protein drying of 2.50 MJ/kg evarporated water and 4.01 MJ/kg evarporated water, respectively are assumed.
  Similar as for biowaste digestion, various concepts of energy supply for the digestion of sewage sludge are possible. In principle, if biogas is used as a fuel for co-generation, the heat expenditures can usually covered completely, and electricity demand can be covered partly by the produced heat and electricity from on-site co-generation. However, this would result in a lower process efficiency of the digestion process; i.e. ideally an adjustment with respect to the final yield of biogas is performed. On the other hand, if biogas is assumed to be used as a feedstock for transportation fuels, the process most likely would be optimised in a way that a maximum yield of biogas is achieved. The reason for this is that a higher biogas throughput in the biogas upgrading plant significantly reduces the cost for the biogas upgrading. In case that all biogas is fed in the upgrading plant, the required heat and electricity is obtained from conventional energy carriers.
  For heat supply various options are possible. In this study we assume that the heat demand is covered by natural gas combustion. Alternatively also wood chips may be used.
  Further references:
  Fromentin et al. 2000. Fromentin A., Biollay F., Dauriat H., Luca.Porta H., Marchand J.-D. and Sarlos G. (2000) Caractérisation de filières de production de bioéthanol dans le contexte helvétique. Sur mandat de l'Office fédéral de l'énergie, rapport final.
- grass fibre: -0.0190233 kg
  Calculated value, based on literature studies.
  production volume 116800 kg
- electricity, low voltage: 0.00674719 kWh; source Carbotech 2000; lognormal variance with pedigree 0.0513, pedigree (2,3,5,3,1)
  Calculated value, based on literature.
  Electricity is required for operation of various devices, such as grass reception belts, hexler, comminutor, fibre press, decanter, fans, blowers, juice recycle pumps, pelletiser. In literature, a total electricity consumption of 205 kWh/tgrassDM is reported. It should be noted that in contrast to other digestion processes as described in this chapter, no agitation of the input substance while staying in the biogas reactor is required.
  Similar as for bio waste digestion, various concepts of energy supply for the digestion of sewage sludge are possible. In principle, if biogas is used as a fuel for co-generation, the heat expenditures can usually covered completely, and electricity demand can be covered partly by the produced heat and electricity from on-site co-generation. However, this would result in a lower process efficiency of the digestion process; i.e. ideally an adjustment with respect to the final yield of biogas is performed. On the other hand, if biogas is assumed to be used as a feedstock for transportation fuels, the process most likely would be optimised in a way that a maximum yield of biogas is achieved. The reason for this is that a higher biogas throughput in the biogas upgrading plant significantly reduces the cost for the biogas upgrading. In case that all biogas is fed in the upgrading plant, the required heat and electricity is obtained from conventional energy carriers.
  For electricity the current Swiss supply mix is employed.
- electricity, medium voltage: 0.00912244 kWh; lognormal variance with pedigree 0.04, pedigree (1,1,5,1,1)
  Frometin 2000
  Frometin 2000
- heat, central or small-scale, other than natural gas: 0.102627 MJ; lognormal variance with pedigree 0.04, pedigree (1,1,5,1,1)
  Frometin 2000
  Frometin 2000

## Inputs from nature
- Water, river [natural resource, in water]: 0.000159892 m3; source Carbotech 2000; lognormal variance with pedigree 0.3527, pedigree (3,3,5,3,1)
  Calculated value, based on literature.
  Calculations are based on the quantity of wastewater and the water losses due to drying fibres and proteins.
  Calculated value, based on literature.
  Calculations are based on the quantity of wastewater and the water losses due to drying fibres and proteins.

## Emissions to nature
- Water [air, unspecified]: 2.39838e-5 m3; lognormal variance with pedigree 0.0807, pedigree (2,2,5,1,1)
  Calculated value based on literature values and expert opinion. See comments in the parametres' comment field.
- Carbon dioxide, non-fossil [air, urban air close to ground]: 0.0215394 kg; lognormal variance with pedigree 0.058, pedigree (4,1,5,1,1)
  Calculated from the carbon balance

## Sampling procedure
inventory based on gross energy and protein composition of raw material. Data obtained from Agroscope database of feedstuff compositions.

## Review by Bo Weidema 2012-03-14
Production volumes are for 2005, even though the dataset is indicated to be valid for 2012.
