# building operation, hostel

Dataset: EcoSpold 2, unit process
Geography: BR
Time period: 2017-01-01 to 2019-12-31
Technology level: current
Classification: ISIC rev.4 ecoinvent: 5510:Short term accommodation activities
Synonyms: backpacker hotel; hostel; backpacker hostel
Tags: single enterprise data
Scenario: Business-as-Usual
System model: Allocation at the point of substitution
Generated by: Marina Santa Rosa Rocha
Published in: Filimonau, V 2018
Database: ecoinvent
isCopyrightProtected: true
accessRestrictedTo: 1

## General comment
This dataset represents the operation of a tourist accommodation facility classed as a hostel, located in Rio de Janeiro, RJ, Brazil. It was first opened in 2016 although the building where the hostel resides was constructed in 1959. Prior to becoming a hostel, the building was used as residence. The hostel has the capacity to host 30 guests and offers rooms of the following types (total number of rooms is given in brackets): double (2) and shared use (3). The hostel has 3 floors with a games room in the underground, a lobby and a pool on the ground floor, and the bedrooms and kitchen in the first floor. This hostel does not serve breakfast. The laundry is done in the hostel dependecies and there is no parking available on site. The hostel occupies a total area of 365,49 m2 where the building itself occupies the plot of 172,65 m2. The average annual occupancy of the hostel is 58% which is equal to 6300 guest nights per year.

## Included activities start
This dataset is modelled to represent the service of operating a hostel. It includes: energy and water consumption, furniture and in-room textiles (such as bed linen, bed mattrasses and curtains), electric and electronic equipment used in guest rooms and on hostel premises (including bulbs), cleaning and in-room consumables. Activities include hotel operations and infrastructure based on 1 guest night stay and the lifeframe of the hotel building of 75 years. The case study hostel includes an indoor laundry facility, so laundry related environmental aspects are included in water and electricity consumption as well as cleaning consumables.

## Included activities end
Activities end with guest departure from hotel premises. Due to data availability, the following processes have been excluded: room equipment (on-table lamp, door lock), bathroom equipment (showers, mirrors).

## Geography
The hostel is based in the city of Rio de Janeiro, RJ, Brazil.

## Technology
Technology in use is considered current.

## Time period
The survey was done in the year 2017 with the data provided covering the operational year 2016-2017.

## Parameters
- occupancy rate/year: 0.575342 dimensionless; name occupancy_y; = (525*12)/(30*365)
  The hostel reports a occupancy of 525 guests per month. Its full capacity is 30 guests per day. The occupancy rate was calculated accordingly,

## Reference product
- building operation, hostel: 1 guest night; name RP; By-product classification allocatable product
  production volume 1.9404e6 guest night; name RP_PV; = ((lifetime_guests*occupancy_y)/lifetime)*308
    Annual production volume is estimated based on the number of hotel guests in the case study hostel (data from hotel survey) multiplied by the number of hostels in Brazil. The case study hostel reported the annual production volume of 6300 guest nights. In 2017 it was estimate that there were 10314 hotels in Brazil (Source: JLL, FOHB and ABR. Lodging Industry in Numbers - Brazil 2017. Available from: http://www.jll.com.br/brazil/pt-br/relatorios/175/hotelaria-em-numeros-2017) Accessed 27 March 2018. A study from the Brazilian Institute of Geography and Statistics (IBGE, 2012) showed that 46,9% of tourism accomodations in main urban areas in Brazil are hotels and 1,4% are hostels. (Source: IBGE, 2012. Pesquisa de Serviços de Hospedagem 2011- Municípios das Capitais, Regiões Metropolitanas das Capitais e Regiões Integradas Available from: ftp://ftp.ibge.gov.br/Comercio_e_Servicos/Pesquisa_Servicos_de_Hospedagem/2011/psh2011.pdf. Accessed 27 March 2018). By equivalence, if 46,9% = 10314; 1,4% = 308 hostel in Brazil. Assuming the annual production is fairly equal across all luxury Brazilian hotels, the annual production volume for the whole destination can be estimated as 6300*308 = 1.940.400 guests night.
  property price 2.11996 EUR2005; name RP_price_EUR2005
    Calculated based on inputs: The price of the product has been calculated as a sum of the values of the material and energy inputs for this product. This value is therefore a rough estimation. It may underestimate the real price since there are additional expenses when producing any product. These expences can include for example labour costs, treatment of waste materials and profit for the producer. Please consider carefully whether this level of data quality is acceptable for your application.
  property true value 2.11996; name RP_true_value
    allocation property applied in "true value" allocation // value calculated from revenue

## By-products
- heat, for reuse in municipal waste incineration only: 0 MJ; CPC 17300: Steam and hot water; By-product classification allocatable product; pedigree (1,1,1,1,1)
  Net electricity generated from this waste and used in internal MSWI plant energy redistribution.
  Uncertainty: uncertainty is calculated from uncertainties in waste composition and uncertainties in energy efficiency and the uncertainty in internal energy demand
  production volume 1.02056e6 MJ
  property exergy 0.1842 MJ; name E_th_prod_MSWI_exergy
    This exergy property is based on the exergy content of the product.
  property price 0.0106 EUR2005; name E_th_prod_MSWI_price_EUR2005
    Average European district heat price from Ecoheatcool and Euroheat 2005-2006, Ecoheat Work package 1: The European heat market. Final report. 10.6 EUR/GJ i s the price of district heat. http://www.solarthermalworld.org/files/Ecoheatcool%20WP1%20Web.pdf?download
  property true value relation 0.1842; name E_th_prod_MSWI_true_value_relation
    property to calculate "true value" from
  property true value 0.00348195
    allocation property applied in "true value" allocation // value calculated from true value relation
- electricity, for reuse in municipal waste incineration only: 0 kWh; CPC 17100: Electrical energy; By-product classification allocatable product; pedigree (1,1,1,1,1)
  (same comment as for heat, for reuse in municipal waste incineration only)
  production volume 138212 kWh
  property price 0.1 EUR2005; name E_el_prod_MSWI_price_EUR2005
    Estimated to be the same price as in case of electricity, medium voltage.
  property exergy 3.6 MJ; name E_el_prod_MSWI_exergy
    This exergy property is based on the exergy content of the product.
  property true value relation 3.6; name E_el_prod_MSWI_true_value_relation
    property to calculate "true value" from
  property true value 0.00921602
    (same comment as for heat, for reuse in municipal waste incineration only)
- iron scrap, sorted, pressed: 0 kg; By-product classification Recyclable; CPC 39310: Slag, dross, scalings and other waste from the manufacture of iron or steel; pedigree (1,1,1,1,1)
  Iron scrap recovered from this waste.
  Uncertainty: uncertainty calculated from uncertainty in waste composition, uncertainty of share of recyclable metal, uncertainty of transfer coefficient to bottom ash, uncertainty of the efficiency of scrap removal in MSWI plant.
  production volume 17038.6 kg
  property price 0.175 EUR2005
    Temporary price data. Calculated as 90% of purchasers price based on: 2005 import and export prices (total trades (USD) divided by total weight (kg) in biggest economies of the world: EU27, USA, Brasil, China, India, Japan and Russia) from UN Commodity Trade Statistics Database (http://data.un.org/Explorer.aspxDatabase [Accessed 2011.06.20]). Commodity: Waste or scrap, of cast iron
  property carbon content 0
    carbon content on a dry matter basis (reserved; not for manual entry)
  property true value 0.00153667
    allocation property applied in "true value" allocation // value calculated from revenue
  properties: dry mass 1 kg, water content 0, carbon content, non-fossil 0, water in wet mass 0 kg, carbon content, fossil 0, wet mass 1 kg, carbon allocation 0 kg
- iron scrap, unsorted: 0 kg; source European Aluminium Association 2008; CPC 39310: Slag, dross, scalings and other waste from the manufacture of iron or steel; By-product classification Recyclable; pedigree (1,1,1,1,1)
  production volume 0.484767 kg
  property price 0.149 EUR2005; name ironScrapAmount_price_EUR2005
    Temporary price data. Calculated as 90% of purchasers price based on: estimated at 85% of sorted scrap
  property carbon content 0
    carbon content on a dry matter basis (reserved; not for manual entry)
  property true value 3.72244e-8
    allocation property applied in "true value" allocation // value calculated from revenue
  properties: water in wet mass 0 kg, water content 0, carbon content, fossil 0, carbon content, non-fossil 0, dry mass 1 kg, wet mass 1 kg, carbon allocation 0 kg
- aluminium oxide, non-metallurgical: 0 kg; source European Aluminium Association 2008; CPC 41432: Alumina (aluminium oxide), except artificial corundum; By-product classification allocatable product; CAS 1344-28-1; pedigree (1,1,1,1,1)
  production volume 30.5046 kg
  property carbon content, non-fossil 0; name C_content_non_fossil
  property price 0.28 EUR2005; name Al2O3Amount_price_EUR2005
    From UN trade database. http://data.un.org/ Import data from the largest economies of the world are used (Brazil, India, USA, China, Japan and EU-27).
  property dry mass 1 kg; name DM
  property water content 0; name water_content
  property wet mass 1 kg; name WM
  property water in wet mass 0 kg; name WWM
  property carbon content, fossil 0; name C_content_fossil
  property carbon content 0
    carbon content on a dry matter basis (reserved; not for manual entry)
  property true value 4.40181e-6
    allocation property applied in "true value" allocation // value calculated from revenue
  properties: carbon allocation 0 kg
- aluminium, cast alloy: 0 kg; source European Aluminium Association 2008; By-product classification allocatable product; CPC 41431: Unwrought aluminium; pedigree (1,1,1,1,1)
  EcoSpold01Location=RER
  production volume 285.15 kg
  property price 1.3 EUR2005; name castAlloyAmount_price_EUR2005
    Temporary price data. Calculated as 90% of purchasers price based on: Source: London Metal Exchange, Aluminium alloy price for 2005
  property carbon content 0
    carbon content on a dry matter basis (reserved; not for manual entry)
  property true value 0.000191041
    allocation property applied in "true value" allocation // value calculated from revenue
  properties: water in wet mass 0 kg, carbon content, non-fossil 0, water content 0, dry mass 1 kg, carbon content, fossil 0, wet mass 1 kg, carbon allocation 0 kg
- aluminium, wrought alloy: 0 kg; source European Aluminium Association 2008; By-product classification allocatable product; CPC 4153: Semi-finished products of aluminium or aluminium alloys; pedigree (1,1,1,1,1)
  production volume 124.833 kg
  property price 1.44 EUR2005; name secondaryAluminiumOutput_price_EUR2005
    Estimated based on literature values and expert judgement. Aluminium ccast alloys are about 90% of the price of aluminium wrought alloys.
  property carbon content 0
    carbon content on a dry matter basis (reserved; not for manual entry)
  property true value 9.26406e-5
    allocation property applied in "true value" allocation // value calculated from revenue
  properties: wet mass 1 kg, water content 0, carbon content, fossil 0, water in wet mass 0 kg, carbon content, non-fossil 0, dry mass 1 kg, carbon allocation 0 kg
- copper: 0 kg; source Rentz O. 1999; By-product classification allocatable product; CPC 41413: Refined copper and copper alloys, unwrought; master alloys of copper
  Literature value. Copper uses: Before end-use copper is manufactured into semi fabricated products, such as shapes and ingots (known as 'semis'). These manufacturing processes are subdivided into hot working, cold working and, if necessary, process annealing. Few of the semis are ready for use as such. They more typically travel to first-stage manufacturers, who make metal rods, wire, and casting, and then to component manufacturers who produce such things as motors, valves, and insulated cables The components in turn are incorporated by final-stage manufacturers into a variety of finished products - automobiles, commercial buildings, residential housing, and so forth. These uses account for about 79% of the world-wide consumption of copper.
  production volume 542.34 kg
  property price 5.52 EUR2005
    Literature value (http://www.economist.com/news/business/21576714-mining-industry-has-enriched-chile-its-future-precarious-copper-solution). Average price between 20015 and 2013.
  property carbon content 0
    carbon content on a dry matter basis (reserved; not for manual entry)
  property true value 0.00154283
    allocation property applied in "true value" allocation // value calculated from revenue
  properties: dry mass 1 kg, water in wet mass 0 kg, wet mass 1 kg, carbon content, non-fossil 0, water content 0, carbon content, fossil 0, carbon allocation 0 kg
- zinc concentrate: 0 kg; CPC 14290: Other non-ferrous metal ores and concentrates (other than uranium or thorium ores and concentrates); By-product classification allocatable product
  Calculated value from the knowledge of the properties of both products.
  production volume 4.3047e-7 kg
  property price 0.38 EUR2005; name ByP_price_EUR2005
    Temporary price data. Calculated as 90% of purchasers price based on: Zinc content in concentrate 53%. Concentrate price per kg Zn 86.5% of refined Zn price (13.5% treatment charges according to CHR Metals Limited 2005: Dynamic cost curves. http://www.minecost.com/dynamic.pdf). 2004 zinc price from USGS (2007) Mineral commodity summaries 2007. <http://minerals.usgs.gov/minerals/pubs/mcs/2007/mcs2007.pdf> [Accessed 25 May 2010]
  property zinc content 0.53; name zinc_C_zinc_concentrate
    Zinc content on a dry matter basis. Value taken from teh "zinc mine operation" /GLO dataset.
  property dry mass 1 kg; name DM_zinc_concentrate
  property carbon content 0
    carbon content on a dry matter basis (reserved; not for manual entry)
  property true value 8.43015e-14
    allocation property applied in "true value" allocation // value calculated from revenue
  properties: wet mass 1 kg, water content 0, carbon content, non-fossil 0, carbon content, fossil 0, water in wet mass 0 kg, carbon allocation 0 kg

## Inputs from technosphere
- wastewater, average: -0.0264661 m3; name wastewater; = (tap_water/1000)*-1; lognormal variance with pedigree 0.004025, pedigree (2,4,2,2,2)
  The amount of waste material is assumed to be equal to the amount of respective input material, tap water, with conversion from kg to m3. 1 m3 of water is assumed to be equal to 1000 kg of water.
  production volume 51744 m3; = wastewater*RP_PV/RP
    Calculated from production volume of reference product using the relative outputs.
  property price 0 EUR2005; name wastewater_price_EUR2005
  properties: wet mass 1000 kg, water content 2882.2, dry mass 0.346837 kg, carbon content, non-fossil 0.194039
  note on carbon content, non-fossil: 0.0673 kg TOC/m3 (Tab A.17, ecoinvent v2.2 report 13_I). TOC was considered as Total Carbon.
- building, hostel: 2.10048e-6 unit; = 1/(lifetime_guests*occupancy_y); lognormal variance with pedigree 0.303425, pedigree (2,4,2,2,2)
  Calculated value. The amount of infrastructure required is calculated based on the lifetime capacity (see properties).;activityLink introduced to establish a direct link to the corresponding regional supply of this product
  property lifetime 75 year; name lifetime
  property lifetime capacity 821250 guest night; name lifetime_guests; = 30*365*lifetime
  note on lifetime: Estimated value. The lifetime of a hotel building is assumed to be equal to 75 years which is an average of the 50-100 years' estimates available in the literature. Source: Filimonau et al. 2011. Reviewing the carbon footprint analysis of hotels: Life Cycle Energy Analysis (LCEA) as a holistic method for carbon impact appraisal of tourist accommodation. Journal of Cleaner Production, 19, 1917-1930.
  note on lifetime capacity: The total capacity of the hostel is 30 guests. The lifetime capacity is calculated accordingly.
- textile, knit cotton: 0.00259935 kg; name cotton; = (60*1,1/4)*(lifetime/1)/(lifetime_guests*occupancy_y); lognormal variance with pedigree 0.303425, pedigree (2,4,2,2,2)
  Calculated value from the total number of linen units used by the hotel. The amount of exchange is calculated as: amount of input product * (lifetime of the hostel/lifetime of the product) / (number of guests during the lifetime of the hostel * hostel occupancy rate). It is assumed that, on average, 4 linen units make 1 kg in weight. Source: Filimonau et al. 2011. Reviewing the carbon footprint analysis of hotels: Life Cycle Energy Analysis (LCEA) as a holistic method for carbon impact appraisal of tourist accommodation. Journal of Cleaner Production, 19, 1917-1930. Assumed average service life is 1 year (data from survey). The amount accounts for 10% fabric loss in the cotton textile manufacturing process. Source: Baydar, G., Ciliz, N., and Mammadov, A., 2015. Life cycle assessment of cotton textile products in Turkey. Journal of Cleaner Production, 104(A), 213-223.
  properties: wet mass 1 kg, carbon content, non-fossil 0.46, dry mass 1 kg
- scrap steel: -0.00189044 kg; name scrap_steel; = (steel)*-1; lognormal variance with pedigree 0.004025, pedigree (2,4,2,2,2)
  Calculated value. The amount is set equal to the amount of input product, steel.
  production volume 3696 kg; = scrap_steel*RP_PV/RP
    Calculated from production volume of reference product using the relative outputs.
  property price 0 EUR2005; name scrap_steel_price_EUR2005
  properties: wet mass 1 kg, dry mass 1 kg
- heat, district or industrial, other than natural gas: 0.802805 MJ; = 104*49*(lifetime)/(lifetime_guests*occupancy_y); lognormal variance with pedigree 0.303425, pedigree (2,4,2,2,2)
  Calculated value with conversion made from kg of LPG. Assuming 1 kg of LPG is equal to 49 MJ. The amount of exchange is calculated as: amount of input product * (lifetime of the hostel) / (number of guests during the lifetime of the hostel * hostel occupancy rate).
  properties: corresponding fuel use, propane, furnace >100kW 1.05263 MJ
  note on corresponding fuel use, propane, furnace >100kW: Lower heating value of the fuel input related to the heat/electricity output, taken directly from ecoinvent v3.0 dataset "heat production, natural gas, at industrial furnace >100kW, GLO 2000".
- water, completely softened: 0.0490001 kg; = 360*0.864*(lifetime)/(lifetime_guests*occupancy_y); lognormal variance with pedigree 0.0454, pedigree (2,4,2,5,4)
  Calculated value. From the dataset for "cleaning consumables production" GLO 2011-2013, on average cleaning products contain 86% of water. Based on the literature source Golsteijn (2015) the dataset used to represent the water flow is "water, completely softened, at plant", version 2 dataset which corresponds to ecoinvent version 3 dataset "water, completely softened, from decarbonised waterm at user". The amount of water needed is therefore calculated based on the vale of 86% calculated based on Golsteijn (2015) and the amount of cleaning consumable which are expressed as 100% active substance.
  Laura Golsteijn, 2015, A compilation of life cycle studies for six household detergent product categories in Europe: the basis for product-specific A.I.S.E. Charter Advanced Sustainability Profiles
  properties: wet mass 1 kg
- tap water: 26.4661 kg; name tap_water; = 168*1000*(lifetime)/(lifetime_guests*occupancy_y); lognormal variance with pedigree 0.303425, pedigree (2,4,2,2,2)
  Calculated value based on consumption data from the hostel survey provided in m3. Assuming 1 m3 of water is equal to1000 kg of water. The amount of exchange is calculated as: amount of input product * (lifetime of the hostel) / (number of guests during the lifetime of the hostel * hostel occupancy rate).
  properties: wet mass 1 kg, dry mass 0.000337476 kg, water content 2962.17, carbon content, fossil 0.00178991
  note on carbon content, fossil: Bicarbonate content is 2.93 mol/m3. CO2 content is 0.1 mol/m3 (ecoinvent v2.2 report 8, Tab 93.1).
- steel, low-alloyed, hot rolled: 0.00189044 kg; name steel; = (15*12)*(lifetime/15)/(lifetime_guests*occupancy_y); lognormal variance with pedigree 0.004025, pedigree (2,4,2,2,2)
  Calculated value. Represents here 14 chairs and 1 shelf made of steel. The amount of exchange is calculated as: amount of input product * (lifetime of the hostel/lifetime of the product) / (lifetime capacity). Steel chair (unit) is assumed to have a weight of 12 kg, Furniture re-use Network, 2009. Average weights. Available from: http://democracy.york.gov.uk/documents/s2116/Annex%20C%20REcycling%20Report%20frnweights2005.pdf Accessed 13 January 2018. The shelf was assumed to weight the same amount as one steel chair. Average service life of all pieces of furniture is assumed to be equal to 15 years. This represents service life of an average piece of furniture. Source: European Commission 2013. BACKGROUND REPORT. Revision of Ecolabel and Green Public Procurement criteria for the product group Wooden Furniture. September 2013. Available from: http://susproc.jrc.ec.europa.eu/furniture/docs/Background_report_Furniture_September_2013.pdf Accessed 19 March 2018. In terms of outputs assumed to have gone to scrap steel.
  properties: carbon content, fossil 0.005, wet mass 1 kg, dry mass 1 kg
  note on carbon content, fossil: Low alloyed steel composition given in Tab. 3.2 ecoinvent v2.2 report 10_partII. Steel assumed to have a C content of 0.5%
- electricity, low voltage: 1.70284 kWh; = 10800*(lifetime)/(lifetime_guests*occupancy_y)+(2/3.6*cotton); lognormal variance with pedigree 0.303425, pedigree (2,4,2,2,2)
  Data from the hostel survey. The amount of exchange is calculated as: amount of input product * (lifetime of the hostel) / (number of guests during the lifetime of the hostel * hostel occupancy rate). The amount also includes electricity requirements to produce cotton textile products from raw cotton. It is estimated that 2 MJ of electricity is required to produce 1 kg of cotton textile product. This accounts for 10% fabric loss in the cotton textile manufacturing process. Source: Baydar, G., Ciliz, N., and Mammadov, A., 2015. Life cycle assessment of cotton textile products in Turkey. Journal of Cleaner Production, 104(A), 213-223.
- non-ionic surfactant: 0.0189044 kg; = 120*lifetime/(lifetime_guests*occupancy_y); lognormal variance with pedigree 0.303425, pedigree (2,4,2,2,2)
  Calculated value. The amount of exchange is calculated as: amount of input product * (lifetime of the hostel) / (number of guests during the lifetime of the hostel * hostel occupancy rate). In terms of outputs assumed to have gone to wastewater.
- computer, laptop: 7.87682e-5 unit; = 2*(lifetime/4)/(lifetime_guests*occupancy_y); lognormal variance with pedigree 0.303425, pedigree (2,4,2,2,2)
  Calculated value. The amount of exchange is calculated as: amount of input product * (lifetime of the hostel/lifetime of the product) / (number of guests during the lifetime of the hostel * hostel occupancy rate). Assumed average service life of a computer is 4 years. Source: Choi et al. 2006. Life Cycle Assessment of a Personal Computer and its Effective Recycling Rate. Int J LCA, 11 (2), 122 – 128.
  properties: carbon content, fossil 0.257799, carbon content, non-fossil 1.2662e-5, dry mass 3.15 kg, wet mass 3.15 kg
- municipal solid waste: -2.83112 kg; name msw; = ((37,44*480)*(lifetime)/(lifetime_guests*occupancy_y))*-1; lognormal variance with pedigree 0.0454, pedigree (3,4,2,4,4)
  Calculated value. The amount of municipal solid waste was calculated based on the amount generated by year (37.44 m3) multiplied by its densisty assuming garbage, household rubbish, weigh(s) 0.48 gram per (cubic centimeter), https://www.aqua-calc.com/calculate/volume-to-weightmaterial
  production volume 5.53513e6 kg; = msw*RP_PV/RP
    Calculated from primary data collection with the hostel.
  property price 0 EUR2005; name msw_price_EUR2005
  properties: water content 0.297017, carbon content, fossil 0.171549, carbon content, non-fossil 0.261655, wet mass 1 kg, dry mass 0.771 kg
  note on carbon content, fossil: MSW composition in tab 4.1, ecoinvent v2.2 report 13_I. C content referred to 1 kg DM
- furniture, wooden: 0.0269912 kg; name furniture_w; = (2*25)*(lifetime/15)/(lifetime_guests*occupancy_y)+(37*6)*(lifetime/15)/(lifetime_guests*occupancy_y)+(23*19)*(lifetime/15)/(lifetime_guests*occupancy_y)+(55*6)*(lifetime/15)/(lifetime_guests*occupancy_y)+(7*28)*(lifetime/15)/(lifetime_guests*occupancy_y)+(5*5)*(lifetime/15)/(lifetime_guests*occupancy_y)+(35*6)*(lifetime/15)/(lifetime_guests*occupancy_y)+(22*50)*(lifetime/15)/(lifetime_guests*occupancy_y); lognormal variance with pedigree 0.303425, pedigree (2,4,2,2,2)
  Estimated value. The amount of exchange is calculated as: amount of input product * (lifetime of the hostel/lifetime of the product) / (number of guests during the lifetime of the hostel * hostel occupancy rate). Assumed average service life of all pieces of furniture is 15 years. This represents service life of an average piece of furniture. Source: European Commission 2013. BACKGROUND REPORT. Revision of Ecolabel and Green Public Procurement criteria for the product group Wooden Furniture. September 2013. Available from: http://susproc.jrc.ec.europa.eu/furniture/docs/Background_report_Furniture_September_2013.pdf Accessed 19 March 2018.
  This exchange represents the following: Double bed (unit) is assumed to have a weight of 25 kg, no headboard, Furniture re-use Network, 2009. Average weights. Available from: http://democracy.york.gov.uk/documents/s2116/Annex%20C%20REcycling%20Report%20frnweights2005.pdf Accessed 13 January 2018. Sofas (unit) Sofa is assumed to have a weight of 37 kg, two seater, Furniture re-use Network, 2009. Average weights. Available from: http://democracy.york.gov.uk/documents/s2116/Annex%20C%20REcycling%20Report%20frnweights2005.pdf Accessed 13 January 2018. Tables/Desks (unit) Table is assumed to have a weight of 23 kg, medium, Furniture re-use Network, 2009. Average weights. Available from: http://democracy.york.gov.uk/documents/s2116/Annex%20C%20REcycling%20Report%20frnweights2005.pdf Accessed 13 January 2018. Wardrobe (unit) is assumed to have a weight of 55 kg (double wardrobe), Furniture re-use Network, 2009. Average weights. Available from: http://democracy.york.gov.uk/documents/s2116/Annex%20C%20REcycling%20Report%20frnweights2005.pdf Accessed 13 January 2018. Chairs (unit) Chair is assumed to have a weight of 7 kg, Furniture re-use Network, 2009. Average weights. Available from: http://democracy.york.gov.uk/documents/s2116/Annex%20C%20REcycling%20Report%20frnweights2005.pdf Accessed 13 January 2018. Coat stand is assumed to have a weight of 5 kg, Furniture re-use Network, 2009. Average weights. Available from: http://democracy.york.gov.uk/documents/s2116/Annex%20C%20REcycling%20Report%20frnweights2005.pdf Accessed 13 January 2018. Shelves are assumed to have weight of 35 kg, http://democracy.york.gov.uk/documents/s2116/Annex%20C%20REcycling%20Report%20frnweights2005.pdfBunk bed (unit) Bunk bed is assumed to have a weight of 50 kg, no headboard, Furniture re-use Network, 2009. Average weights. Available from: http://democracy.york.gov.uk/documents/s2116/Annex%20C%20REcycling%20Report%20frnweights2005.pdf Accessed 13 January 2018.
  property lifetime 15 year; name furniture_w_lifetime
  note on lifetime: Source: JRC (2013) Wooden Furniture. BACKGROUND REPORT. Revision of Ecolabel and Green Public Procurement criteria for the product group. Retrieved from: http://susproc.jrc.ec.europa.eu/furniture/docs/Background_report_Furniture_September_2013.pdf, accessed 9Feb2018
- waste polyethylene: -0.000787682 kg; name waste_polyeth; = (nylon)*-1; lognormal variance with pedigree 0.004025, pedigree (2,4,2,2,2)
  Calculated value. Represents here waste nylon 6.
  production volume 1540 kg; = waste_polyeth*RP_PV/RP
    Calculated from production volume of reference product using the relative outputs.
  property price 0 EUR2005; name waste_polyeth_price_EUR2005
  properties: carbon content, fossil 0.825301, dry mass 0.996 kg, wet mass 1 kg, water content 0.00401606
  note on carbon content, fossil: C content in 1 kg DM was calculated using data in Tab A.1, ecoinvent v2.2 report 13_I
- mattress: 0.000945218 unit; = (30)*(lifetime/5)/(lifetime_guests*occupancy_y); lognormal variance with pedigree 0.303425, pedigree (2,4,2,2,2)
  Calculated value. The amount of exchange is calculated as: amount of input product * (lifetime of the hotel/lifetime of the product) / (number of guests during the lifetime of the hotel * hotel occupancy rate). Average service life of a mattress is assumed to be equal to 5 years. Source: Traveller 2017. How often do hotels change their mattresses? Available from: http://www.traveller.com.au/everyone-asks-how-often-do-hotels-change-their-mattresses-guv2kt Accessed 16 March 2018.
  property wet mass 20.128 kg; name mat_WM
  properties: carbon content, non-fossil 0.29026, carbon content, fossil 5.18548, dry mass 20.1278 kg
  note on carbon content, non-fossil: Calculated value. The value of the mattress non fossil carbon content is the sum of all non fossil carbon content of input materials to the mattress manufacture extracted from Lanoe et al (2013).
  note on carbon content, fossil: Calculated value. The value of the mattress fossil carbon content is the sum of all fossil carbon content of input materials to the mattress manufacture extracted from Lanoe et al (2013).
- cleaning consumables, without water, in 13.6% solution state: 0.00771298 kg; name clean; = 360*0.136*(lifetime)/(lifetime_guests*occupancy_y); lognormal variance with pedigree 0.303425, pedigree (2,4,2,2,2)
  Calculated value. The amount of exchange is calculated as: amount of input product * (lifetime of the hostel) / (number of guests during the lifetime of the hostel * hostel occupancy rate). Combined of all instances of use across the hostel operations. Represents the following cleaning luquids: window cleaner, bleach, washing up liquid, insect killer, pine disinfector, odour eliminator. In terms of outputs assumed to have gone to wastewater. As the product "cleaning consumables" is expressed as 100% active substance, the amount of cleaning consumables is multiplied by the average concentration of active substance. According to Golsteijn (2015) the average water content of cleaning consumables is 86.4%, the necessary water input is accounted for with the flow "water, compeltely softened, from decarbonised water, at user". For more information on how the cleaning consumables dataset was created please refer to the relevant dataset in ecoinvent.
  2015, Laura Golsteijn, A compilation of life cycle studies for six household detergent product categories in Europe: the basis for product-specific A.I.S.E. Charter Advanced Sustainability Profiles
  property carbon content, non-fossil 0; name clean_C_content_non_fossil
  property wet mass 1 kg; name clean_WM
  property carbon content, fossil 0; name clean_C_content_fossil
  properties: dry mass 1 kg
- tissue paper: 0.0103974 kg; = (6600*0.01)*(lifetime)/(lifetime_guests*occupancy_y); lognormal variance with pedigree 0.303425, pedigree (2,4,2,2,2)
  Calculated value. The amount of exchange is calculated as: amount of input product * (lifetime of the hostel) / (number of guests during the lifetime of the hostel * hostel occupancy rate). Conversion from meters to kg has been made assuming a roll of 25 meters weights 250 g, so 1 kg of tissue paper is equal to 100 meters. Source: Sainsburys 2018. Andrex Toilet Paper. Available from: https://www.sainsburys.co.uk/webapp/wcs/stores/servlet/gb/groceries/andrex-toilet-tissue--classic-white-16x241-sheets?langId=44&storeId=10151&krypto=6KE3AoChB8jlwzzYGlgparsN%2BBruZBOjUaSVm%2BCnwAT0LLJPLAalDm9DhCtUDzK5uFGmUkJJ%2FMIaDVx%2BGRGKIHdBUxaNbCTzmIQiBcpr497qZYrRt4Kvvy%2BLLO40d8j3%2BY4eQ%2Fk%2BK4BXsq0FOjWLrDLelOp5CVxrDysmNwGM26k%3D&ddkey=https%3Agb%2Fgroceries%2Fandrex-toilet-tissue--classic-white-16x241-sheets Accessed 16 January 2018. In terms of outputs, assumed to have gone to wastewater.
  properties: dry mass 0.945 kg, carbon content, fossil 2.22e-5, wet mass 1 kg, water content 0.0582011, carbon content, non-fossil 0.36169
- refrigerator: 6.30145e-5 unit; = 4*(lifetime/10)/(lifetime_guests*occupancy_y); lognormal variance with pedigree 0.303425, pedigree (2,4,2,2,2)
  Calculated value. The amount of exchange is calculated as: amount of input product * (lifetime of the hostel/lifetime of the product) / (number of guests during the lifetime of the hostel * hostel occupancy rate). Assumed average service life of a refrigerator is 10 years. Source: Xiao et al. 2015. A life-cycle assessment of household refrigerators in China. Journal of Cleaner Production, 95, 301-310
  properties: lifetime 10 year
  note on lifetime: Source: Xiao, R. et al. 2015, 2015, Xiao, R., Zhang, Y., Liu, X., and Yuan, Z., A life-cycle assessment of household refrigerators in China, Journal of Cleaner Production, 95, 301-310, 1 - Article
- microwave oven: 1.9692e-5 unit; = 1*(lifetime/8)/(lifetime_guests*occupancy_y); lognormal variance with pedigree 0.303425, pedigree (2,4,2,2,2)
  Calculated value. The amount of exchange is calculated as: amount of input product * (lifetime of the hostel/lifetime of the product) / (number of guests during the lifetime of the hostel * hostel occupancy rate). Assumed average service life of a microwave oven is 8 years. Source: Gallego-Schmid et al. 2018. Environmental assessment of microwaves and the effect of European energy efficiency and waste management legislation. Science of the Total Environment, 618, 487-499.
  properties: lifetime 8 year
  note on lifetime: Source: Gallego-Schmid et al. 2018, 2018, Gallego-Schmid, A., Mendoza, J.M.F., Azapagic, A., Environmental assessment of microwaves and the effect of European energy efficiency and waste management legislation. , Science of the Total Environment, 618, 487-499, 1 - Article
- vacuum cleaner: 1.9692e-5 unit; = 1*(lifetime/8)/(lifetime_guests*occupancy_y); lognormal variance with pedigree 0.303425, pedigree (2,4,2,2,2)
  Estimated value. No primary data on the number of vacuum cleaners in use by the hostel but assumed that at least one vacuum cleaner is present for housekeeping purposes. The amount of exchange is calculated as: amount of input product * (lifetime of the hotel/lifetime of the product) / (number of guests during the lifetime of the hotel * hotel occupancy rate). Assumed average service life of a vacuum cleaner is 8 years. Source: Gallego-Schmid et al. 2016. Life cycle environmental impacts of vacuum cleaners and the effects of European regulation. Science of the Total Environment, 559, 192-203.
  properties: lifetime 8 year, wet mass 4.45 kg, carbon content, fossil 2.59, dry mass 4.45 kg
- cookstove: 1.05024e-5 unit; = 1*(lifetime/15)/(lifetime_guests*occupancy_y); lognormal variance with pedigree 0.303425, pedigree (2,4,2,2,2)
  Calculated value. The amount of exchange is calculated as: amount of input product * (lifetime of the hostel/lifetime of the product) / (number of guests during the lifetime of the hostel * hostel occupancy rate). Assumed average service life of a cookstove is 15 years. Source: Jungbluth 1997. Life-Cycle-Assessment for Stoves and Ovens. UNS Working Paper No. 16, August 1997.
  properties: dry mass 57.9 kg, lifetime 15 year, carbon content, fossil 3.22, wet mass 57.9 kg
- coffee maker: 3.15073e-5 unit; = 1*(lifetime/5)/(lifetime_guests*occupancy_y); lognormal variance with pedigree 0.303425, pedigree (2,4,2,2,2)
  Calculated value. The amount of exchange is calculated as: amount of input product * (lifetime of the hostel/lifetime of the product) / (number of guests during the lifetime of the hostel * hostel occupancy rate). Assumed average service life of a coffee maker is 5 years. Source: Ashby 2009. Materials and the Environment: Eco-Informed Material Choice. Elsevier, Burlington, USA
  properties: wet mass 1.9 kg, carbon content, fossil 0.857611, lifetime 5 year, dry mass 1.9 kg
- television: 3.15073e-5 unit; = 2*(lifetime/10)/(lifetime_guests*occupancy_y); lognormal variance with pedigree 0.303425, pedigree (2,4,2,2,2)
  Calculated value. The amount of exchange is calculated as: amount of input product * (lifetime of the hostel/lifetime of the product) / (number of guests during the lifetime of the hostel * hostel occupancy rate). Average service life of a television is assumed to be equal to 10 years. Source: Feng and Ma 2009. The energy consumption and environmental impacts of a color TV set in China. Journal of Cleaner Production, 17,13-25.
  properties: lifetime 10 year
  note on lifetime: As proposed by Dodbiba et al. 2008. Source: 2008, Dodbiba, G., Takahashi, K., Sadaki, J., Fujita, T., The recycling of plastic wastes from discarded TV sets: comparing energy recovery with mechanical recycling in the context of life cycle assessment, Journal of Cleaner Production, 16, 458-470, 0 - Undefined
- compact fluorescent bulb: 0.00429644 unit; = 30*(lifetime/1.1)/(lifetime_guests*occupancy_y); lognormal variance with pedigree 0.303425, pedigree (2,4,2,2,2)
  Calculated value. The amount of exchange is calculated as: amount of input product * (lifetime of the hostel/lifetime of the product) / (number of guests during the lifetime of the hostel * hostel occupancy rate). Average service life of a bulb is assumed to be equal to 1.1 year. Source: Elijošiutė et al. 2012. Life Cycle Assessment of Compact Fluorescent and Incandescent Lamps: Comparative Analysis. Environmental Research, Engineering and Management, 3(61), 65-72.
  properties: dry mass 0.075 kg, carbon content, fossil 0.009542, lifetime 1 year, wet mass 0.075 kg
  note on lifetime: Calculated from Elijosiute et al. 2012 who estimate the life time of a bulb to be eqaul to 10000 hours which equates to circa 1 year.
- waste textile, soiled: -0.00259935 kg; name waste_text; = (cotton)*-1; lognormal variance with pedigree 0.004025, pedigree (2,4,2,2,2)
  The amount of waste material is assumed to be equal to the amount of respective input material, textile, knit cotton.
  production volume 5082 kg; = waste_text*RP_PV/RP
    Calculated from production volume of reference product using the relative outputs.
  property price 0 EUR2005; name waste_text_price_EUR2005
  properties: water content 0.333333, dry mass 0.75 kg, wet mass 1 kg, carbon content, non-fossil 0.570519
- nylon 6: 0.000787682 kg; name nylon; = (5*10)*(lifetime/10)/(lifetime_guests*occupancy_y); lognormal variance with pedigree 0.303425, pedigree (2,4,2,2,2)
  Calculated value. Represents here curtains made of nylon. The amount of exchange is calculated as: amount of input product * (lifetime of the hostel/lifetime of the product) / (number of guests during the lifetime of the hostel * hostel occupancy rate). An average curtain is assumed to have a weight of 5 kg. Source: Furniture re-use Network, 2009. Average weights. Available from: http://democracy.york.gov.uk/documents/s2116/Annex%20C%20REcycling%20Report%20frnweights2005.pdf Accessed 13 January 2018. Average service life of a curtain is assumed to be equal to average service life of a carpet which is 10 years. Source: Greenspec 2018. Whole life costing: carpets. Available from: http://www.greenspec.co.uk/building-design/carpets/ Accessed 16 March 2018. In terms of outputs assumed to have gone to waste polyethylene.
  properties: dry mass 1 kg, wet mass 1 kg, carbon content, fossil 0.637168
  note on carbon content, fossil: It is a chain of caprolactam molecules, originating from aminocarboxylic acids - here caproic acid or caprolactam. The structure of nylon 6 is -(NH-(CH2)5-CO)n-, C6H11NO (ecoinvent v2.2 report 11_II). MW=113 g/mol
- washing machine: 1.57536e-5 unit; = 1*(lifetime/10)/(lifetime_guests*occupancy_y); lognormal variance with pedigree 0.303425, pedigree (2,4,2,2,2)
  Calculated value. The amount of exchange is calculated as: amount of input product * (lifetime of the hotel/lifetime of the product) / (number of guests during the lifetime of the hotel * hotel occupancy rate). Assumed average service life of a washing machine is 10 years. Source: Yuan et al. 2016. Life cycle assessment of horizontal-axis washing machines in China. Int J Life Cycle Assess, 21, 15-28.
  properties: lifetime 10 year
  note on lifetime: Based on the estimate from Yuan et al. 2016. Source: Yuan et al. 2016, 2016, Yuan, Z., Zhang, Y., and Liu, X., Life cycle assessment of horizontal-axis washing machines in China, International Journal of Life Cycle Asse, 21, 15-28, 1 - Article

## Sampling procedure
Primary data from the hotel supplemented with literature-based calculations and estimates, where appropriate.

## Extrapolations
In terms of operations, energy and water consumption are aggregate and represent the case study hostel as a whole, rather than its specific operational areas (e.g. guest rooms, restaurant and bar). The comments to respective processes explain this in detail.
