# printed wiring board production, for power supply unit, desktop computer, Pb free

Dataset: EcoSpold 2, unit process
Geography: GLO
Time period: 2005-01-01 to 2019-12-31
Technology level: current
Classification: ISIC rev.4 ecoinvent: 2610:Manufacture of electronic components and boards
Classification: EcoSpold01Categories: electronics/module
Tags: ConvertedDataset
Scenario: Business-as-Usual
System model: Allocation at the point of substitution
Generated by: Roland Hischier
Published in: Hischier R. 2007
Database: ecoinvent
isCopyrightProtected: true
accessRestrictedTo: 1

## General comment
The data represent the PWB of a power supply unit, used in modern Desktop PCs. Material data are based on own dismantling activities. Infrastructure and production efforts are based on own assumptions.
This dataset represents the average composition and production efforts for 1 kg of a mounted PWB of a power supply unit (PSU), as used in a desktop PC. Main data are taken from own dismantling activities.

## Included activities start
From reception of printed wiring board at the factory gate.

## Included activities end
This dataset includess component input and production efforts (incl. PWB waste due to failure in mounting) for the production of a PWB used in the power supply unit of a desktop PC, using Pb-free solder material.

## Geography
Data represent a global valuable composition of PWB in a power supply unit.

## Technology
Average PWB mounting technology (wave soldering)

## Reference product
- printed wiring board, for power supply unit, desktop computer, Pb free: 1 kg; By-product classification allocatable product; CPC 47160: Electronic integrated circuits
  The PC’s power supply must accept a relatively high-voltage alternating current (AC) ranging in different countries from 100 to 240 V, and convert it into much lower voltage direct current (DC), which operates the electronic devices inside. Voltage variation outside the accepted standards can cause data errors or system crashes. The power supply runs all subsystems inside the system unit and is vital to the proper operation of any PC.
  EcoSpold01Location=GLO
  production volume 1 kg
    Dummy value to be replaced by measured, estimated or calculated value
  property price 26.4156 EUR2005
    Calculated based on inputs: The price of the product has been calculated as a sum of the values of the material and energy inputs for this product. This value is therefore a rough estimation. It may underestimate the real price since there are additional expenses when producing any product. These expences can include for example labour costs, treatment of waste materials and profit for the producer. Please consider carefully whether this level of data quality is acceptable for your application.
  property carbon content, fossil 0.240291
    C content was calculated as the addition of C content in the PWB components
  property carbon content, non-fossil 0.00383938
    C content was calculated as the addition of C content in the PWB components
  property carbon content 0.244131
    carbon content on a dry matter basis (reserved; not for manual entry)
  property true value 26.4156
    allocation property applied in "true value" allocation // value calculated from revenue
  properties: dry mass 1 kg, wet mass 1 kg, water in wet mass 0 kg, water content 0, carbon allocation 0.244131 kg

## By-products
All rows: By-product classification allocatable product
- lead: 0 kg; CPC 41441: Lead, unwrought
  EcoSpold01Location=SE
  production volume 0.000326577 kg
  property price 0.744 EUR2005
    Temporary price data. Calculated as 90% of purchasers price based on: Source: ecoinvent v2 report 10-part IX, Tab 5.10 & 2.5
  property carbon content 0
    carbon content on a dry matter basis (reserved; not for manual entry)
  property true value 0.000242974
    allocation property applied in "true value" allocation // value calculated from revenue
  properties: wet mass 1 kg, water content 0, carbon content, non-fossil 0, carbon content, fossil 0, dry mass 1 kg, water in wet mass 0 kg, carbon allocation 0 kg
- copper: 0 kg; CPC 41413: Refined copper and copper alloys, unwrought; master alloys of copper
  EcoSpold01Location=SE
  production volume 0.00483785 kg
  property price 5.52 EUR2005
    Literature value (http://www.economist.com/news/business/21576714-mining-industry-has-enriched-chile-its-future-precarious-copper-solution). Average price between 20015 and 2013.
  property carbon content 0
    carbon content on a dry matter basis (reserved; not for manual entry)
  property true value 0.0267049
    allocation property applied in "true value" allocation // value calculated from revenue
  properties: water content 0, water in wet mass 0 kg, carbon content, fossil 0, carbon content, non-fossil 0, dry mass 1 kg, wet mass 1 kg, carbon allocation 0 kg
- nickel, 99.5%: 0 kg; CPC 41422: Unwrought nickel
  EcoSpold01Location=SE
  production volume 0.000681722 kg
  property price 10.4 EUR2005
    Temporary price data. Calculated as 90% of purchasers price based on: 2004 nickel price from USGS (2007) Mineral commodity summaries 2007. <http://minerals.usgs.gov/minerals/pubs/mcs/2007/mcs2007.pdf> [Accessed 25 May 2010]
  property carbon content 0
    carbon content on a dry matter basis (reserved; not for manual entry)
  property true value 0.00708991
    allocation property applied in "true value" allocation // value calculated from revenue
  properties: water in wet mass 0 kg, wet mass 1 kg, carbon content, non-fossil 0, dry mass 1 kg, water content 0, carbon content, fossil 0, carbon allocation 0 kg
- silver: 0 kg; CPC 41310: Silver (including silver plated with gold or platinum), unwrought or in semi-manufactured forms, or in powder […]; CAS 7440-22-4
  EcoSpold01Location=SE
  production volume 0.00011258 kg
  property price 178 EUR2005
    (same comment as for lead)
  property carbon content 0
    carbon content on a dry matter basis (reserved; not for manual entry)
  property true value 0.0200392
    allocation property applied in "true value" allocation // value calculated from revenue
  properties: wet mass 1 kg, carbon content, non-fossil 0, dry mass 1 kg, water content 0, carbon content, fossil 0, water in wet mass 0 kg, carbon allocation 0 kg
- palladium: 0 kg; CPC 4160: Other non-ferrous metals and articles thereof (including waste and scrap of some metals); cermets and articles […]
  EcoSpold01Location=SE
  production volume 6.23201e-6 kg
  property price 5640 EUR2005
    Temporary price data. Calculated as 90% of purchasers price based on: 2004 price from USGS (2007) Mineral commodity summaries 2007. <http://minerals.usgs.gov/minerals/pubs/mcs/2007/mcs2007.pdf> [Accessed 25 May 2010]
  property carbon content 0
    carbon content on a dry matter basis (reserved; not for manual entry)
  property true value 0.0351486
    allocation property applied in "true value" allocation // value calculated from revenue
  properties: wet mass 1 kg, carbon content, fossil 0, water in wet mass 0 kg, water content 0, carbon content, non-fossil 0, dry mass 1 kg, carbon allocation 0 kg
- gold: 0 kg; CPC 41320: Gold (including gold plated with platinum), unwrought or in semi-manufactured forms, or in powder form; CAS 7440-57-5
  EcoSpold01Location=SE
  production volume 3.41761e-6 kg
  property price 10600 EUR2005
    Temporary price data. Calculated as 90% of purchasers price based on: Source: ecoinvent v2 report 10-part IX, Tab 2.5
  property carbon content 0
    carbon content on a dry matter basis (reserved; not for manual entry)
  property true value 0.0362267
    allocation property applied in "true value" allocation // value calculated from revenue
  properties: wet mass 1 kg, carbon content, fossil 0, dry mass 1 kg, carbon content, non-fossil 0, water content 0, water in wet mass 0 kg, carbon allocation 0 kg

## Inputs from technosphere
- integrated circuit, logic type: 0.00307719 kg; lognormal variance with pedigree 0.0687, pedigree (2,5,5,3,1)
  EcoSpold01Location=GLO
  Estimation, based on own dismantling activities.
  Uncertainty: own dismantling activities of a Intel PII Desktop PC PSU
  properties: dry mass 1 kg, carbon content, fossil 0.221701, wet mass 1 kg
  note on carbon content, fossil: Calculated as the addition of C contents in the product composition
- diode, glass-, for through-hole mounting: 0.00646928 kg; lognormal variance with pedigree 0.0687, pedigree (2,5,5,3,1)
  Own dismantling activities of a Intel PII Desktop PC PSU
  EcoSpold01Location=GLO
  Uncertainty: own dismantling activities of a Intel PII Desktop PC PSU
  properties: wet mass 1 kg, dry mass 1 kg, carbon content, fossil 0.0203273
- capacitor, film type, for through-hole mounting: 0.0224444 kg; lognormal variance with pedigree 0.0687, pedigree (2,5,5,3,1)
  EcoSpold01Location=GLO
  Own dismantling activities of a Intel PII Desktop PC PSU
  Uncertainty: own dismantling activities of a Intel PII Desktop PC PSU
  properties: carbon content, fossil 0.278876, wet mass 1 kg, dry mass 1 kg
  note on carbon content, fossil: Calculated as the addition of C contents in the product composition, and referred to 1 kg capacitors, and then to 1 kg DM
- inductor, ring core choke type: 0.254909 kg; lognormal variance with pedigree 0.0687, pedigree (2,5,5,3,1)
  Estimation, based on own dismantling activities.
  EcoSpold01Location=GLO
  Uncertainty: own dismantling activities of a Intel PII Desktop PC PSU
  properties: carbon content, fossil 0.445934, wet mass 1 kg, dry mass 1 kg
  note on carbon content, fossil: Calculated as the addition of C contents in the product composition, and referred to 1 kg DM inductor
- resistor, metal film type, through-hole mounting: 0.0120856 kg; lognormal variance with pedigree 0.0687, pedigree (2,5,5,3,1)
  (same comment as for integrated circuit, logic type)
  properties: dry mass 1 kg, wet mass 1 kg, carbon content, fossil 0.029003
  note on carbon content, fossil: Calculated as the addition of C contents in the product composition, and referred to 1 kg DM resistor.
- transistor, wired, small size, through-hole mounting: 0.00178741 kg; lognormal variance with pedigree 0.0687, pedigree (2,5,5,3,1)
  (same comment as for integrated circuit, logic type)
  properties: dry mass 1 kg, wet mass 1 kg, carbon content, fossil 0.080338
  note on carbon content, fossil: Calculated as the addition of C contents in the product composition, and referred to 1 kg DM transistor.
- aluminium, wrought alloy: 0.129386 kg; lognormal variance with pedigree 0.0687, pedigree (2,5,5,3,1)
  Own dismantling activities of a Intel PII Desktop PC PSU
  EcoSpold01Location=RER
  Uncertainty: own dismantling activities of a Intel PII Desktop PC PSU
  properties: dry mass 1 kg, wet mass 1 kg
- mounting, through-hole technology, Pb-free solder: 0.0489515 m2; lognormal variance with pedigree 0.0687, pedigree (2,5,5,3,1)
  (same comment as for integrated circuit, logic type)
- transistor, wired, big size, through-hole mounting: 0.0359513 kg; lognormal variance with pedigree 0.0687, pedigree (2,5,5,3,1)
  (same comment as for inductor, ring core choke type)
  properties: wet mass 1 kg, carbon content, fossil 0.0946006, dry mass 1 kg
- transformer, high voltage use: 0.192964 kg; lognormal variance with pedigree 0.0687, pedigree (2,5,5,3,1)
  (same comment as for inductor, ring core choke type)
  properties: wet mass 1 kg, carbon content, fossil 0.262798, dry mass 1 kg
- section bar extrusion, aluminium: 0.129386 kg; lognormal variance with pedigree 0.0687, pedigree (2,5,5,3,1)
  EcoSpold01Location=RER
  Estimation, based on own dismantling activities.
  Uncertainty: own dismantling activities of a Intel PII Desktop PC PSU
- printed wiring board, for through-hole mounting, Pb free surface: 0.0489515 m2; lognormal variance with pedigree 0.0687, pedigree (2,5,5,3,1)
  (same comment as for inductor, ring core choke type)
  properties: dry mass 3.08 kg, carbon content, fossil 0.210221, wet mass 3.08 kg
  note on carbon content, fossil: C content was calculated as the addition of C content in the PWB components, and then referred to 1 kg DM
- transformer, low voltage use: 0.0612402 kg; lognormal variance with pedigree 0.0687, pedigree (2,5,5,3,1)
  (same comment as for integrated circuit, logic type)
  properties: carbon content, fossil 0.11936, dry mass 1 kg, wet mass 1 kg
- capacitor, electrolyte type, < 2cm height: 0.0434666 kg; lognormal variance with pedigree 0.0687, pedigree (2,5,5,3,1)
  (same comment as for capacitor, film type, for through-hole mounting)
  properties: carbon content, non-fossil 0.0222053, dry mass 1 kg, carbon content, fossil 0.189636, wet mass 1 kg
- used printed wiring boards: -0.0203115 kg; lognormal variance with pedigree 0.0527, pedigree (3,3,5,3,1)
  EcoSpold01Location=GLO
  Estimation, based on a european PWB mounting company.
  Uncertainty: data from literature plus own assumptions
  production volume 0.020408 kg
    Calculated from the production volume of printed wiring board, for power supply unit, desktop computer, Pb free in proportion to the respective output amounts.
  properties: carbon content, fossil 0.193742, carbon content, non-fossil 0.000960142, wet mass 1 kg, dry mass 1 kg
  note on carbon content, fossil: Composition of printed wiring boards used to calculate C content
- capacitor, electrolyte type, > 2cm height: 0.0735288 kg; lognormal variance with pedigree 0.0687, pedigree (2,5,5,3,1)
  (same comment as for diode, glass-, for through-hole mounting)
  properties: carbon content, non-fossil 0.0349727, wet mass 1 kg, carbon content, fossil 0.16971, dry mass 1 kg
- capacitor, tantalum-, for through-hole mounting: 0.0248818 kg; lognormal variance with pedigree 0.0687, pedigree (2,5,5,3,1)
  Own dismantling activities of a Intel PII Desktop PC PSU
  This flow replaces the original capacitor, production mix
  Uncertainty: own dismantling activities of a Intel PII Desktop PC PSU
  property water content 0; name water_content
  property carbon content, fossil 0.181224; name C_content_fossil
  property water in wet mass 0 kg; name WWM
  property carbon content, non-fossil 0; name C_content_non_fossil
  properties: wet mass 1 kg, dry mass 1 kg

## Sampling procedure
own dismantling

## Extrapolations
see Geography & Technology

## Review by Bo Weidema 2012-09-10
changed inputs of production mixes to specified inputs

## Review by Rolf Frischknecht 2007-09-21
passed.
