# treatment of coal tar, in industrial furnace 1MW

Dataset: EcoSpold 2, unit process
Geography: GLO
Time period: 2000-01-01 to 2019-12-31
Technology level: current
Classification: EcoSpold01Categories: oil/heating systems
Classification: ISIC rev.4 ecoinvent: 3530a: Steam and air conditioning supply based on liquid fuels
Scenario: Business-as-Usual
System model: Allocation at the point of substitution
Generated by: Sofia Parada Tur
Database: ecoinvent
isCopyrightProtected: true
accessRestrictedTo: 1

## General comment
This inventory describes the treatment of coal tar in an industrial furnace with byproduct heat. Due to lack of process data, the inventory is adapted from the proxy "heat production, heavy fuel oil, at industrial furnace 1 MW". The uncertainty has been adjusted accordingly.

## Included activities start
The dataset starts with the reception of coal tar at the furnace

## Included activities end
Heat delivered by the furnace not including losses during distribution in the factory.

## Geography
Assumption for operation in Europe.

## Technology
Non-modulating furnace, efficiency 95%.

## Time period
Estimation for efficiency of furnaces used in 2000.

## Reference product
- coal tar: 0 kg; name coal_tar_RP; CPC 34530: Roasted iron pyrites; By-product classification allocatable product
  production volume 0 kg; name coal_tar_PV
    based on production volume of byproduct coal tar produced in the coking process
  property heating value, net 28 MJ; name coal_tar_RP_Net_Heat_Value
    net (lower) heating (calorific) value
  property price 0.196 EUR2005; name coal_tar_RP_price_EUR2005
    Temporary price data. Calculated as 90% of purchasers price based on: 2004 prices calculated from Import/Export data (total trades (USD) divided by total weight (kg) in EU27, USA, China, Japan and India) from UN Trade data statistics (http://data.un.org/Explorer.aspx, Accessed 6 July 2010).
  property carbon content, fossil 0.83
    Tar is considered a carbon-rich waste, and its C content approximated from ecoinvent v2.2 report 13_I.
  property carbon content 0.83
    carbon content on a dry matter basis (reserved; not for manual entry)
  properties: water in wet mass 0 kg, water content 0, carbon content, non-fossil 0, dry mass 1 kg, wet mass 1 kg, carbon allocation 0.83 kg
- heat, district or industrial, other than natural gas: 1 MJ; CPC 17300: Steam and hot water; By-product classification allocatable product; pedigree (1,1,1,1,1)
  based on calorific efficiency of furnace (0.95) and lower calorific value of coal tar
  production volume 5.72742e11 MJ

## By-products
- heat, district or industrial, other than natural gas: 0 MJ; name heat_BP; = 0.95* coal_tar_RP*(-1)* 28; CPC 17300: Steam and hot water; By-product classification allocatable product; pedigree (1,1,1,1,1)
  based on calorific efficiency of furnace (0.95) and lower calorific value of coal tar
  production volume 0 MJ; = coal_tar_PV* heat_BP
    calculated from reference product
  property price 0.0106 EUR2005; name heat_BP_price_EUR2005
    Average European district heat price from Ecoheatcool and Euroheat 2005-2006, Ecoheat Work package 1: The European heat market. Final report. 10.6 EUR/GJ i s the price of district heat. http://www.solarthermalworld.org/files/Ecoheatcool%20WP1%20Web.pdf?download

## Inputs from technosphere
- oil storage, 3000l: 0 unit; = 3.8986E-08* heat_BP; pedigree (1,1,1,1,1)
  value is adapted from inventory for heavy fuel oil burning. The infrastructure is given per unit of reference product, which was heat (MJ) in the original dataset.
  EcoSpold01Location=CH
  Uncertainty: Calculated
- chimney: 0 m; = 3.6549E-08* heat_BP; pedigree (1,1,1,1,1)
  EcoSpold01Location=CH
  value is adapted from inventory for heavy fuel oil burning. The infrastructure is given per unit of reference product, which was heat (MJ) in the original dataset.
  Uncertainty: Calculated
- electricity, low voltage: 0 kWh; = 0.00087517* heat_BP; pedigree (1,1,1,1,1)
  EcoSpold01Location=CH
  value is adapted from inventory for heavy fuel oil burning. The infrastructure is given per unit of reference product, which was heat (MJ) in the original dataset.
  Uncertainty: Literature
- industrial furnace, 1MW, oil: 0 unit; = 2.924E-09* heat_BP; pedigree (1,1,1,1,1)
  EcoSpold01Location=CH
  value is adapted from inventory for heavy fuel oil burning. The infrastructure is given per unit of reference product, which was heat (MJ) in the original dataset.
  Uncertainty: Estimation 5000h use per year
- sodium hydroxide, without water, in 50% solution state: 4.80954e-5 kg; lognormal variance with pedigree 0.34, pedigree (1,1,5,1,1)
  own assumption
  EcoSpold01Location=RER
- hard coal: 0.0180138 kg; lognormal variance with pedigree 0.04, pedigree (1,1,5,1,1)
  standard for ressources
  EcoSpold01Location=UCTE
- phosphoric acid, fertiliser grade, without water, in 70% solution state: 3.44212e-6 kg; lognormal variance with pedigree 0.34, pedigree (1,1,5,1,1)
  EcoSpold01Location=GLO
  own assumption
- iron sulfate: 9.52906e-7, 7.68155e-7 kg (2 suppliers, which the file names only by identifier); sum of these 1.72106e-6 kg; lognormal variance with pedigree 0.34, pedigree (1,1,5,1,1)
  EcoSpold01Location=RER
  own assumption
- water, decarbonised: 0.0208856, 0.000294925, 0.000767393, 4.7991e-7, 0.00309507, 0.000152366, 0.000501008, 2.76586e-5, 0.000394129, 0.000918089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 kg (13 suppliers, which the file names only by identifier); sum of these 0.0377219 kg; lognormal variance with pedigree 0.34, pedigree (1,1,5,1,1)
  own assumption
  EcoSpold01Location=RER
- hard coal coke factory: 2.2191e-13 unit; lognormal variance with pedigree 0.08, pedigree (1,1,5,1,1)
  EcoSpold01Location=RER
  own assumption
- electricity, medium voltage: 0.000633095 kWh; lognormal variance with pedigree 0.34, pedigree (1,1,5,1,1)
  EcoSpold01Location=UCTE
  own assumption
- coal tar: -0.000754438 kg
  EcoSpold01Location=DE
  production volume 1.65107e8 kg
- coal gas: -0.0571744 MJ
  EcoSpold01Location=DE
  The activityLink to "treatment of coal gas, in power plant, DE 2008" was added by ecoinvent during a database update.
  production volume 2.33737e10 MJ
- coal gas: -0.0460893 MJ
  EcoSpold01Location=GLO
  production volume 3.04816e12 MJ
- hard coal coke factory: 1.78885e-13 unit; lognormal variance with pedigree 0.08, pedigree (1,1,5,1,1)
  own assumption
  EcoSpold01Location=RER
- hard coal: 0.00151739, 0.000931643, 0.00646115, 0.000912949, 0.000216636, 0.0013611, 0.00071081, 0.000396191, 0.00201341 kg (9 suppliers, which the file names only by identifier); sum of these 0.0145213 kg; lognormal variance with pedigree 0.04, pedigree (1,1,5,1,1)
  EcoSpold01Location=UCTE
  standard for ressources
- electricity, medium voltage: 2.27965e-7, 1.70342e-6, 5.53498e-6, 3.13583e-7, 1.97031e-6, 8.5005e-7, 7.74127e-7, 1.37319e-6, 7.99161e-7, 1.92177e-7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 kWh (46 suppliers, which the file names only by identifier); sum of these 0.000514558 kWh; lognormal variance with pedigree 0.34, pedigree (1,1,5,1,1)
  own assumption
  EcoSpold01Location=UCTE

## Emissions to nature
- Iron [air, urban air close to ground]: 0 kg; = coal_tar_RP*(-1)* 28*8.20E-07; pedigree (1,1,1,1,1)
  value is adapted from emission factors of heavy fuel oil burning. The emission factor is measured in kg/MJ input
  Uncertainty: Literature
- Acetone [air, urban air close to ground]: 0 kg; = 1.50E-07*coal_tar_RP*(-1)* 28; pedigree (1,1,1,1,1)
  value is adapted from emission factors of heavy fuel oil burning. The emission factor is measured in kg/MJ input
  Uncertainty: Literature, basic uncertainty estimated = 6
- PAH, polycyclic aromatic hydrocarbons [air, urban air close to ground]: 0 kg; = coal_tar_RP*(-1)* 28*5.80E-10; pedigree (1,1,1,1,1)
  value is adapted from emission factor of heavy fuel oil burning. The emission factor is measured as kg/MJ input
  Uncertainty: Literature
- Hydrocarbons, aliphatic, alkanes, unspecified [air, urban air close to ground]: 0 kg; = coal_tar_RP*(-1)* 28*6.00E-07; pedigree (1,1,1,1,1)
  (same comment as for Acetone)
- Carbon dioxide, fossil [air, urban air close to ground]: 0 kg; = 79000/1E6* coal_tar_RP*(-1)* 28; pedigree (1,1,1,1,1)
  (same comment as for Iron)
- Hydrocarbons, aliphatic, unsaturated [air, urban air close to ground]: 0 kg; = coal_tar_RP*(-1)* 28*3.00E-08; pedigree (1,1,1,1,1)
  (same comment as for Acetone)
- Zinc [air, urban air close to ground]: 0 kg; = coal_tar_RP*(-1)* 28*5.50E-08; pedigree (1,1,1,1,1)
  (same comment as for Iron)
- Sulfur dioxide [air, urban air close to ground]: 0 kg; = 394* coal_tar_RP*(-1)* 28*1/1E6; pedigree (1,1,1,1,1)
  value is adapted from emission factors of heavy fuel oil burning. The emission factor is measured in kg/MJ input
- Ethanol [air, urban air close to ground]: 0 kg; = 3.00E-07*coal_tar_RP*(-1)* 28; pedigree (1,1,1,1,1)
  (same comment as for Acetone)
- Vanadium [air, urban air close to ground]: 0 kg; = coal_tar_RP*(-1)* 28*1.00E-06; pedigree (1,1,1,1,1)
  (same comment as for Iron)
- Particulates, > 2.5 um, and < 10um [air, urban air close to ground]: 0 kg; = coal_tar_RP*(-1)* 28*1.20E-06; pedigree (1,1,1,1,1)
  value is adapted from emission factors of heavy fuel oil burning. The emission factor is measured in kg/MJ input
  Uncertainty: Literature, basic uncertainty estimated = 3
- Selenium [air, urban air close to ground]: 0 kg; = coal_tar_RP*(-1)* 28*1.20E-08; pedigree (1,1,1,1,1)
  (same comment as for Iron)
- Ammonia [air, urban air close to ground]: 0 kg; = 1.00E-08*coal_tar_RP*(-1)* 28; pedigree (1,1,1,1,1)
  (same comment as for Sulfur dioxide)
- Dioxins, measured as 2,3,7,8-tetrachlorodibenzo-p-dioxin [air, urban air close to ground]: 0 kg; = 4.50E-16*coal_tar_RP*(-1)* 28; pedigree (1,1,1,1,1)
  (same comment as for Iron)
- Molybdenum [air, urban air close to ground]: 0 kg; = coal_tar_RP*(-1)* 28*8.00E-09; pedigree (1,1,1,1,1)
  (same comment as for Iron)
- Nickel [air, urban air close to ground]: 0 kg; = coal_tar_RP*(-1)* 28*4.90E-07; pedigree (1,1,1,1,1)
  (same comment as for Iron)
- Particulates, < 2.5 um [air, urban air close to ground]: 0 kg; = coal_tar_RP*(-1)* 28*8.40E-06; pedigree (1,1,1,1,1)
  (same comment as for Iron)
- Nitrogen oxides [air, urban air close to ground]: 0 kg; = 100* coal_tar_RP*(-1)* 28*1/1E6; pedigree (1,1,1,1,1)
  (same comment as for Sulfur dioxide)
- Methane, fossil [air, urban air close to ground]: 0 kg; = coal_tar_RP*(-1)* 28*3.00E-06; pedigree (1,1,1,1,1)
  (same comment as for Acetone)
- Particulates, > 10 um [air, urban air close to ground]: 0 kg; = coal_tar_RP*(-1)* 28*2.40E-06; pedigree (1,1,1,1,1)
  (same comment as for Particulates, > 2.5 um, and < 10um)
- Acetaldehyde [air, urban air close to ground]: 0 kg; = 1.50E-07* coal_tar_RP*(-1)* 28; pedigree (1,1,1,1,1)
  (same comment as for Acetone)
- Methanol [air, urban air close to ground]: 0 kg; = coal_tar_RP*(-1)* 28*5.10E-07; pedigree (1,1,1,1,1)
  (same comment as for Iron)
- Dinitrogen monoxide [air, urban air close to ground]: 0 kg; = 8.00E-07*coal_tar_RP*(-1)* 28; pedigree (1,1,1,1,1)
  (same comment as for Sulfur dioxide)
- Chromium VI [air, urban air close to ground]: 0 kg; = 5.00E-11*coal_tar_RP*(-1)* 28; pedigree (1,1,1,1,1)
  value is adapted from emission factors of heavy fuel oil burning. The emission factor is measured in kg/MJ input
  Uncertainty: Literature, estimation 1% Cr VI of Cr, basic uncertainity estimated = 10
- Chromium [air, urban air close to ground]: 0 kg; = 4.95E-09*coal_tar_RP*(-1)* 28; pedigree (1,1,1,1,1)
  (same comment as for Iron)
- Formaldehyde [air, urban air close to ground]: 0 kg; = 4.50E-07*coal_tar_RP*(-1)* 28; pedigree (1,1,1,1,1)
  (same comment as for Acetone)
- Cobalt [air, urban air close to ground]: 0 kg; = 3.30E-08*coal_tar_RP*(-1)* 28; pedigree (1,1,1,1,1)
  (same comment as for Iron)
- Sodium [air, urban air close to ground]: 0 kg; = coal_tar_RP*(-1)* 28*7.50E-07; pedigree (1,1,1,1,1)
  (same comment as for Iron)
- Acetic acid [air, urban air close to ground]: 0 kg; = 6.00E-07*coal_tar_RP*(-1)* 28; pedigree (1,1,1,1,1)
  (same comment as for Acetone)
- Hydrogen chloride [air, urban air close to ground]: 0 kg; = coal_tar_RP*(-1)* 28*1.44E-06; pedigree (1,1,1,1,1)
  (same comment as for Iron)
- Propane [air, urban air close to ground]: 0 kg; = coal_tar_RP*(-1)* 28*3.00E-08; pedigree (1,1,1,1,1)
  (same comment as for Acetone)
- Hydrogen fluoride [air, urban air close to ground]: 0 kg; = coal_tar_RP*(-1)* 28*4.80E-08; pedigree (1,1,1,1,1)
  (same comment as for Iron)
- Benzo(a)pyrene [air, urban air close to ground]: 0 kg; = 2.80E-11*coal_tar_RP*(-1)* 28; pedigree (1,1,1,1,1)
  (same comment as for Acetone)
- Copper [air, urban air close to ground]: 0 kg; = 1.60E-08*coal_tar_RP*(-1)* 28; pedigree (1,1,1,1,1)
  (same comment as for Iron)
- Toluene [air, urban air close to ground]: 0 kg; = 3.00E-08*coal_tar_RP*(-1)* 28; pedigree (1,1,1,1,1)
  (same comment as for Acetone)
- Calcium [air, urban air close to ground]: 0 kg; = 1.10E-07*coal_tar_RP*(-1)*28; pedigree (1,1,1,1,1)
  (same comment as for Iron)
- Mercury [air, urban air close to ground]: 0 kg; = coal_tar_RP*(-1)* 28*1.50E-10; pedigree (1,1,1,1,1)
  (same comment as for Iron)
- Arsenic [air, urban air close to ground]: 0 kg; = 1.30E-08*coal_tar_RP*(-1)* 28; pedigree (1,1,1,1,1)
  (same comment as for Iron)
- Hydrocarbons, aromatic [air, urban air close to ground]: 0 kg; = coal_tar_RP*(-1)* 28*1.50E-07; pedigree (1,1,1,1,1)
  (same comment as for Acetone)
- Carbon monoxide, fossil [air, urban air close to ground]: 0 kg; = 7* coal_tar_RP*(-1)* 28*1/1E6; pedigree (1,1,1,1,1)
  (same comment as for Sulfur dioxide)
- Lead [air, urban air close to ground]: 0 kg; = coal_tar_RP*(-1)* 28*1.45E-07; pedigree (1,1,1,1,1)
  (same comment as for Iron)
- Ethene [air, non-urban air or from high stacks]: 7.33607e-7 kg; lognormal variance with pedigree 0.69, pedigree (1,1,5,1,1)
  own assumption
- Scandium [air, non-urban air or from high stacks]: 6.18736e-11 kg; lognormal variance with pedigree 0.69, pedigree (1,1,5,1,1)
  own assumption
- Strontium [air, non-urban air or from high stacks]: 3.1459e-9 kg; lognormal variance with pedigree 0.69, pedigree (1,1,5,1,1)
  own assumption
- Phosphorus [air, non-urban air or from high stacks]: 2.05046e-9 kg; lognormal variance with pedigree 0.69, pedigree (1,1,5,1,1)
  own assumption
- Arsenic [air, non-urban air or from high stacks]: 4.03099e-10 kg; lognormal variance with pedigree 0.08, pedigree (1,1,5,1,1)
  own assumption
- Zinc [air, non-urban air or from high stacks]: 1.39579e-9 kg; lognormal variance with pedigree 0.69, pedigree (1,1,5,1,1)
  own assumption
- Particulates, > 10 um [air, non-urban air or from high stacks]: 5.4922e-5 kg; lognormal variance with pedigree 0.34, pedigree (1,1,5,1,1)
  own assumption
- Uranium [air, non-urban air or from high stacks]: 3.1459e-11 kg; lognormal variance with pedigree 0.69, pedigree (1,1,5,1,1)
  own assumption
- Propene [air, non-urban air or from high stacks]: 4.76453e-8 kg; lognormal variance with pedigree 0.69, pedigree (1,1,5,1,1)
  own assumption
- Toluene [air, non-urban air or from high stacks]: 5.94292e-8 kg; lognormal variance with pedigree 0.69, pedigree (1,1,5,1,1)
  own assumption
- Lead [air, non-urban air or from high stacks]: 1.60591e-9 kg; lognormal variance with pedigree 0.08, pedigree (1,1,5,1,1)
  own assumption
- Cadmium [air, non-urban air or from high stacks]: 7.93577e-11 kg; lognormal variance with pedigree 0.08, pedigree (1,1,5,1,1)
  own assumption
- Silicon [air, non-urban air or from high stacks]: 3.903e-7 kg; lognormal variance with pedigree 0.69, pedigree (1,1,5,1,1)
  own assumption
- NMVOC, non-methane volatile organic compounds, unspecified origin [air, non-urban air or from high stacks]: 0.000111819 kg; lognormal variance with pedigree 0.69, pedigree (1,1,5,1,1)
  own assumption
- Antimony [air, non-urban air or from high stacks]: 2.46659e-11 kg; lognormal variance with pedigree 0.69, pedigree (1,1,5,1,1)
  own assumption
- Water [water, unspecified]: 2.31047e-5 m3; lognormal variance with pedigree 0.0807, pedigree (2,2,5,1,1)
  Calculated value based on literature values and expert opinion. See comments in the parametres' comment field.
- Zirconium [air, non-urban air or from high stacks]: 7.62325e-10 kg; lognormal variance with pedigree 0.69, pedigree (1,1,5,1,1)
  own assumption
- Methane, fossil [air, non-urban air or from high stacks]: 2.81419e-5 kg; lognormal variance with pedigree 1.37, pedigree (1,1,5,1,1)
  own assumption
- Carbon monoxide, fossil [air, non-urban air or from high stacks]: 0.0001922 kg; lognormal variance with pedigree 0.34, pedigree (1,1,5,1,1)
  own assumption
- Water [air, unspecified]: 1.46172e-5 m3; lognormal variance with pedigree 0.0807, pedigree (2,2,5,1,1)
  (same comment as for Water)
- Aluminium [air, non-urban air or from high stacks]: 2.66292e-7 kg; lognormal variance with pedigree 0.69, pedigree (1,1,5,1,1)
  own assumption
- Iodine [air, non-urban air or from high stacks]: 3.1459e-11 kg; lognormal variance with pedigree 0.69, pedigree (1,1,5,1,1)
  own assumption
- Tin [air, non-urban air or from high stacks]: 3.1459e-11 kg; lognormal variance with pedigree 0.69, pedigree (1,1,5,1,1)
  own assumption
- Mercury [air, non-urban air or from high stacks]: 1.94524e-11 kg; lognormal variance with pedigree 0.34, pedigree (1,1,5,1,1)
  own assumption
- Sulfur dioxide [air, non-urban air or from high stacks]: 2.27772e-5 kg; lognormal variance with pedigree 0.34, pedigree (1,1,5,1,1)
  own assumption
- Manganese [air, non-urban air or from high stacks]: 1.27012e-9 kg; lognormal variance with pedigree 0.69, pedigree (1,1,5,1,1)
  own assumption
- Hydrocarbons, aliphatic, unsaturated [air, non-urban air or from high stacks]: 2.37574e-8 kg; lognormal variance with pedigree 0.69, pedigree (1,1,5,1,1)
  own assumption
- Boron [air, non-urban air or from high stacks]: 8.57615e-10 kg; lognormal variance with pedigree 0.69, pedigree (1,1,5,1,1)
  own assumption
- Selenium [air, non-urban air or from high stacks]: 8.47981e-11 kg; lognormal variance with pedigree 0.69, pedigree (1,1,5,1,1)
  own assumption
- Particulates, < 2.5 um [air, non-urban air or from high stacks]: 3.27135e-5 kg; lognormal variance with pedigree 0.34, pedigree (1,1,5,1,1)
  own assumption
- Copper [air, non-urban air or from high stacks]: 3.57825e-10 kg; lognormal variance with pedigree 0.69, pedigree (1,1,5,1,1)
  own assumption
- Ethyne [air, non-urban air or from high stacks]: 2.37574e-8 kg; lognormal variance with pedigree 0.69, pedigree (1,1,5,1,1)
  own assumption
- PAH, polycyclic aromatic hydrocarbons [water, surface water]: 5.16318e-10 kg; lognormal variance with pedigree 0.34, pedigree (1,1,5,1,1)
  own assumption
- Calcium [air, non-urban air or from high stacks]: 3.1459e-8 kg; lognormal variance with pedigree 0.69, pedigree (1,1,5,1,1)
  own assumption
- Nickel [air, non-urban air or from high stacks]: 5.39775e-10 kg; lognormal variance with pedigree 0.69, pedigree (1,1,5,1,1)
  own assumption
- Chromium [air, non-urban air or from high stacks]: 4.1445e-10 kg; lognormal variance with pedigree 0.69, pedigree (1,1,5,1,1)
  own assumption
- Vanadium [air, non-urban air or from high stacks]: 6.18736e-10 kg; lognormal variance with pedigree 0.69, pedigree (1,1,5,1,1)
  own assumption
- Thorium [air, non-urban air or from high stacks]: 6.18736e-11 kg; lognormal variance with pedigree 0.69, pedigree (1,1,5,1,1)
  own assumption
- Thallium [air, non-urban air or from high stacks]: 3.16587e-11 kg; lognormal variance with pedigree 0.69, pedigree (1,1,5,1,1)
  own assumption
- Sodium [air, non-urban air or from high stacks]: 1.56642e-8 kg; lognormal variance with pedigree 0.69, pedigree (1,1,5,1,1)
  own assumption
- Ammonia [air, non-urban air or from high stacks]: 1.59795e-7 kg; lognormal variance with pedigree 1.37, pedigree (1,1,5,1,1)
  own assumption
- Solids, inorganic [water, surface water]: 1.89317e-5 kg; lognormal variance with pedigree 0.34, pedigree (1,1,5,1,1)
  own assumption
- Cobalt [air, non-urban air or from high stacks]: 1.04854e-10 kg; lognormal variance with pedigree 0.69, pedigree (1,1,5,1,1)
  own assumption
- Hydrogen sulfide [water, surface water]: 6.88424e-8 kg; lognormal variance with pedigree 0.34, pedigree (1,1,5,1,1)
  own assumption
- Ammonium, ion [water, surface water]: 4.29086e-7 kg; lognormal variance with pedigree 0.34, pedigree (1,1,5,1,1)
  own assumption
- Benzene [air, non-urban air or from high stacks]: 1.14835e-5 kg; lognormal variance with pedigree 1.37, pedigree (1,1,5,1,1)
  own assumption
- Nitrogen oxides [air, non-urban air or from high stacks]: 2.03737e-5 kg; lognormal variance with pedigree 0.34, pedigree (1,1,5,1,1)
  own assumption
- Carbon dioxide, fossil [air, non-urban air or from high stacks]: 0.00281798 kg; lognormal variance with pedigree 0.05, pedigree (1,1,5,1,1)
  own assumption
- Molybdenum [air, non-urban air or from high stacks]: 4.67316e-11 kg; lognormal variance with pedigree 0.69, pedigree (1,1,5,1,1)
  own assumption
- Benzo(a)pyrene [air, non-urban air or from high stacks]: 8.29914e-8 kg; lognormal variance with pedigree 0.08, pedigree (1,1,5,1,1)
  own assumption
- Bromine [air, non-urban air or from high stacks]: 1.71001e-10 kg; lognormal variance with pedigree 0.69, pedigree (1,1,5,1,1)
  own assumption
- Sodium, ion [water, surface water]: 2.1512e-5 kg; lognormal variance with pedigree 0.34, pedigree (1,1,5,1,1)
  own assumption
- Iron [air, non-urban air or from high stacks]: 1.09649e-7 kg; lognormal variance with pedigree 0.69, pedigree (1,1,5,1,1)
  own assumption
- Propane [air, non-urban air or from high stacks]: 1.49143e-7 kg; lognormal variance with pedigree 0.69, pedigree (1,1,5,1,1)
  own assumption
- Ethane [air, non-urban air or from high stacks]: 3.24706e-6 kg; lognormal variance with pedigree 0.69, pedigree (1,1,5,1,1)
  own assumption
- Beryllium [air, non-urban air or from high stacks]: 3.85e-11 kg; lognormal variance with pedigree 0.69, pedigree (1,1,5,1,1)
  own assumption
- Potassium [air, non-urban air or from high stacks]: 3.1459e-8 kg; lognormal variance with pedigree 0.69, pedigree (1,1,5,1,1)
  own assumption
- Particulates, > 2.5 um, and < 10um [air, non-urban air or from high stacks]: 1.50496e-5 kg; lognormal variance with pedigree 0.34, pedigree (1,1,5,1,1)
  own assumption
- Chloride [water, surface water]: 3.34782e-5 kg; lognormal variance with pedigree 0.34, pedigree (1,1,5,1,1)
  own assumption
- Hydrogen sulfide [air, non-urban air or from high stacks]: 6.67034e-7 kg; lognormal variance with pedigree 0.69, pedigree (1,1,5,1,1)
  own assumption
- Magnesium [air, non-urban air or from high stacks]: 9.52906e-8 kg; lognormal variance with pedigree 0.69, pedigree (1,1,5,1,1)
  own assumption
- Barium [air, non-urban air or from high stacks]: 3.3816e-9 kg; lognormal variance with pedigree 0.69, pedigree (1,1,5,1,1)
  own assumption
- Titanium [air, non-urban air or from high stacks]: 9.52906e-9 kg; lognormal variance with pedigree 0.69, pedigree (1,1,5,1,1)
  own assumption
- Carbon disulfide [air, non-urban air or from high stacks]: 9.82817e-9 kg; lognormal variance with pedigree 0.05, pedigree (1,1,5,1,1)
  own assumption
- Silver [air, non-urban air or from high stacks]: 1.36795e-12 kg; lognormal variance with pedigree 0.69, pedigree (1,1,5,1,1)
  own assumption
- Cyanide [air, non-urban air or from high stacks]: 3.45144e-8 kg; lognormal variance with pedigree 0.69, pedigree (1,1,5,1,1)
  own assumption
- Methane, chlorodifluoro-, HCFC-22 [air, non-urban air or from high stacks]: 3.44091e-8 kg; lognormal variance with pedigree 0.34, pedigree (1,1,5,1,1)
  own assumption
- Ethanol [air, non-urban air or from high stacks]: 4.49318e-10 kg; lognormal variance with pedigree 0.69, pedigree (1,1,5,1,1)
  own assumption
- Acetone [air, non-urban air or from high stacks]: 4.45109e-7 kg; lognormal variance with pedigree 0.34, pedigree (1,1,5,1,1)
  own assumption
- Phenol, pentachloro- [air, non-urban air or from high stacks]: 3.6198e-8 kg; lognormal variance with pedigree 0.34, pedigree (1,1,5,1,1)
  own assumption
- Styrene [air, non-urban air or from high stacks]: 4.60893e-10 kg; lognormal variance with pedigree 0.69, pedigree (1,1,5,1,1)
  own assumption
- Acrolein [air, non-urban air or from high stacks]: 5.49283e-10 kg; lognormal variance with pedigree 0.34, pedigree (1,1,5,1,1)
  own assumption
- Methanol [air, non-urban air or from high stacks]: 4.49318e-8 kg; lognormal variance with pedigree 0.69, pedigree (1,1,5,1,1)
  own assumption
- PAH, polycyclic aromatic hydrocarbons [air, non-urban air or from high stacks]: 2.40969e-8 kg; lognormal variance with pedigree 0.69, pedigree (1,1,5,1,1)
  own assumption

## Sampling procedure
dataset based on a proxy

## Extrapolations
based on original dataset for geography Europe without Switzerland, for heavy fuel oil burning

## Review by Bo Weidema 2012-03-23
Passed.
Combustion of coal tar is modelled here as combustion of heavy fuel oil.

## Review by Bo Weidema 2012-03-23
The main ediitor, Niels Jungbluth, had no comments to this dataset.
