# heat distribution equipment production, hydronic radiant floor heating, 150m2

Dataset: EcoSpold 2, unit process
Geography: CH
Time period: 1990-01-01 to 2019-12-31
Technology level: current
Classification: ISIC rev.4 ecoinvent: 2819:Manufacture of other general-purpose machinery
Classification: EcoSpold01Categories: heat pumps/production of components
Synonyms: hydronic radiant floor heating; radiant floor heating; floor radiation heating
Tags: ConvertedDataset
Scenario: Business-as-Usual
System model: Allocation at the point of substitution
Share of production covered: 0 %
Generated by: Thomas Heck
Published in: Heck, T. 2007
Database: ecoinvent
isCopyrightProtected: true
accessRestrictedTo: 1

## General comment
This dataset represents a floor heating system at low temperature with 40°C of inlet temperature and 30-35°C of return temperature for a one family house in Switzerland. Energy reference area amounts to 165 m2, the heated gross net area is 150 m2. Life time is assumed to be 20 years. A heat pump heating system is chosen.

## Included activities start
From reception of the various construction materials (cement, sand, polyethylene, polystyrene, aluminium) at the one family house.

## Included activities end
This activity ends with a floor heating system at low temperature with a life time of 20 years. This dataset includes recycling of the heat distribution system after demolition and the burning of plastic in an incineration plant. This dataset doesn´t include the installation of a buffer storage.

## Technology
A floor heating system with plastic tubing and aluminum heat conduction fins is chosen to ensure good thermal transfer. For cost reasons in most of the cases no buffer storage is installed. Due to this fact, it is very important to adjust the three cycles (heat use cycle, heat pump cycle, heat source cycle) in the best possible way to ensure optimal heat transfer at all times.
References:
Persönliche Mitteilung Herr Keel, Zürcher Energieberatung, Zürich, August 1993.

## Parameters
- fraction, process water, to air: 0.15 dimensionless; name fraction_PW_to_air; lognormal variance with pedigree 0.092025, pedigree (4,4,3,2,4)
  Literature value. In case when no industry/process specific data are available, default evaporation fraction value is used. This value is 15% and is based on literature (Statistics Canada, 2007 & Shaffer, K.H., 2008, Consumptive water use in the Great Lakes Basin, USGS & Shiklomanov, 2003, World Water Resources at the Beginning of the 21st Century) and has been approved by an expert.

## Reference product
- heat distribution equipment, hydronic radiant floor heating, 150m2: 1 unit; CPC 43941: Parts of producer gas or water gas generators; parts of acetylene gas generators and similar water process gas[…]; By-product classification allocatable product
  EcoSpold01Location=CH
  Estimation. 75 m2 of the overall gross net area of 150 m2 are heated from below, the rest of the area is not heated from below (basement).
  production volume 0.0336675 unit
    This is a placeholder value that does not reflect real-world production volumes. This dataset does not currently require a real-world production volume to work in the database framework, and no actual data were collected yet. This has no negative effect on the results of the ecoinvent database. The placeholder value of this activity was scaled according to the nominal GDP of 2005 (source: United Nations, http://data.un.org/Glossary.aspx?q=GDP+%28current+US%24%29, accessed 20130726) to reflect an appropriate share of the global production volume, which is also a placeholder value.
  property price 4773 EUR2005
    EU27 I/O database(in the 'EU & DK Input Output Database' (available in SimaPro)); -79 Building, non-residential EU 27 (calculated to be 38.169 EUR2003/kg). Based on consumption of (_53 Iron basic, virgin, EU27;7.25517782294095E-3 kg/EUR building; 0.45 EUR2003 per kg DS), (_61 Iron, after first processing, EU27;5.8766830719783E-3kg/EUR building; 0.62 EUR2003 per kg DS), (_65 Fabricated metal products, except machinery, EU27; 8.9167022775554E-3 kg/EUR building; 3.63 EUR2003 per kg DS) and (_66 Machinery and equipment n.e.c., EU27;4.15071881936446E-3 kg/EUR building; 5.71 EUR2003 per kg DS) -126 kg
  property true value 4773
    allocation property applied in "true value" allocation // value calculated from revenue

## By-products
- electricity, for reuse in municipal waste incineration only: 0 kWh; CPC 17100: Electrical energy; By-product classification allocatable product; pedigree (1,1,1,1,1)
  Net electricity generated from this waste and used in internal MSWI plant energy redistribution.
  Uncertainty: uncertainty is calculated from uncertainties in waste composition and uncertainties in energy efficiency and the uncertainty in internal energy demand
  production volume 180.689 kWh
  property exergy 3.6 MJ; name E_el_prod_MSWI_exergy
    This exergy property is based on the exergy content of the product.
  property true value relation 3.6; name E_el_prod_MSWI_true_value_relation
    property to calculate "true value" from
  property price 0.1 EUR2005; name E_el_prod_MSWI_price_EUR2005
    Estimated to be the same price as in case of electricity, medium voltage.
  property true value 23.1802
    allocation property applied in "true value" allocation // value calculated from true value relation
- heat, for reuse in municipal waste incineration only: 0 MJ; CPC 17300: Steam and hot water; By-product classification allocatable product; pedigree (1,1,1,1,1)
  Net useful heat generated from this waste and used in internal MSWI plant energy redistribution.
  Uncertainty: uncertainty is calculated from uncertainties in waste composition and uncertainties in energy efficiency and the uncertainty in internal energy demand
  production volume 1266.44 MJ
  property true value relation 0.1842; name E_th_prod_MSWI_true_value_relation
    property to calculate "true value" from
  property exergy 0.1842 MJ; name E_th_prod_MSWI_exergy
    This exergy property is based on the exergy content of the product.
  property price 0.0106 EUR2005; name E_th_prod_MSWI_price_EUR2005
    Average European district heat price from Ecoheatcool and Euroheat 2005-2006, Ecoheat Work package 1: The European heat market. Final report. 10.6 EUR/GJ i s the price of district heat. http://www.solarthermalworld.org/files/Ecoheatcool%20WP1%20Web.pdf?download
  property true value 8.31301
    (same comment as for electricity, for reuse in municipal waste incineration only)
- zinc concentrate: 0 kg; CPC 14290: Other non-ferrous metal ores and concentrates (other than uranium or thorium ores and concentrates); By-product classification allocatable product
  Calculated value from the knowledge of the properties of both products.
  production volume 0.0463081 kg
  property price 0.38 EUR2005; name ByP_price_EUR2005
    Temporary price data. Calculated as 90% of purchasers price based on: Zinc content in concentrate 53%. Concentrate price per kg Zn 86.5% of refined Zn price (13.5% treatment charges according to CHR Metals Limited 2005: Dynamic cost curves. http://www.minecost.com/dynamic.pdf). 2004 zinc price from USGS (2007) Mineral commodity summaries 2007. <http://minerals.usgs.gov/minerals/pubs/mcs/2007/mcs2007.pdf> [Accessed 25 May 2010]
  property zinc content 0.53; name zinc_C_zinc_concentrate
    Zinc content on a dry matter basis. Value taken from teh "zinc mine operation" /GLO dataset.
  property dry mass 1 kg; name DM_zinc_concentrate
  property carbon content 0
    carbon content on a dry matter basis (reserved; not for manual entry)
  property true value 0.0175971
    allocation property applied in "true value" allocation // value calculated from revenue
  properties: wet mass 1 kg, water content 0, carbon content, non-fossil 0, carbon content, fossil 0, water in wet mass 0 kg, carbon allocation 0 kg

## Inputs from technosphere
All rows: lognormal variance with pedigree 0.186, pedigree (4,5,5,1,1)
- polystyrene, high impact: 65.5671 kg; source Toschi 1993
  EcoSpold01Location=RER
  Estimation. Isolation consists of 2 cm of polystyrene. (Toschi, 1993). Mass density of polystyrene amounts to 22 kg/m3. (Recknagel, 1988/89).
  Further references:
  Recknagel, Sprenger, Hönmann, "Taschenbuch für Heizung und Klimatechnik", Oldenbourg, 1988/89.
  properties: carbon content, fossil 0.923077, dry mass 1 kg, wet mass 1 kg
  note on carbon content, fossil: Chemical formula of polystyrene is (C8H8)n (ecoinvent v2.2 report 11_II)
- cement, unspecified: 894.097 kg; source Toschi 1993
  EcoSpold01Location=CH
  Estimation. The pipes and heat conduction fins embedded in the floor are covered with plastic (polyethylene (LD) 0,2 mm) before the cement screed is applied 6 cm above the pipes with a thickness of 8 cm. Cement screed is composed of 300 kg of cement, 1550 kg of sand and 150 kg of water per m3 green mortar (i.e. 2000 kg/m3).
  properties: wet mass 1 kg, dry mass 1 kg
- aluminium, cast alloy: 40.0556 kg; source Toschi 1993
  EcoSpold01Location=RER
  Estimation. Aluminium is used for heat conduction fines. A floor heating system with plastic tubing and aluminum heat conduction fins is chosen to ensure good thermal transfer. The pipes and aluminium heat conduction fins embedded in the floor are covered with plastic (polyethylene (LD) 0,2 mm) before the cement screed is applied 6 cm above the pipes with a thickness of 8 cm.
  properties: dry mass 1 kg, wet mass 1 kg
- waste plastic, mixture: -165.905 kg
  Estimation. Plastic is assumed to be burned in an incineration plant.
  EcoSpold01Location=CH
  production volume 167 kg
    Calculated from the production volume of heat distribution equipment, hydronic radiant floor heating, 150m2 in proportion to the respective output amounts.
  properties: carbon content, fossil 0.747344, water content 0.180638, dry mass 0.847 kg, wet mass 1 kg
  note on carbon content, fossil: C content in 1 kg DM was calculated using data in Tab A.2, ecoinvent v2.2 report 13_I
- sand: 4619.5 kg; source Toschi 1993
  Estimation. Cement screed is composed of 300 kg of cement, 1550 kg of sand and 150 kg of water per m3 green mortar (i.e. 2000 kg/m3).
  EcoSpold01Location=CH
  properties: dry mass 1 kg, wet mass 1 kg
- inert waste, for final disposal: -5692.42 kg
  Estimation. After demolition of the heat distribution system it is assumed that most of the material is brought to a landfill for inert matter.
  EcoSpold01Location=CH
  production volume 5730 kg
    (same comment as for waste plastic, mixture)
  properties: water content 0.00502513, dry mass 0.995 kg, wet mass 1 kg
- aluminium, wrought alloy: 85.1181 kg; source Toschi 1993
  Estimation. Aluminium is used for heat conduction fines. A floor heating system with plastic tubing and aluminum heat conduction fins is chosen to ensure good thermal transfer. The pipes and aluminium heat conduction fins embedded in the floor are covered with plastic (polyethylene (LD) 0,2 mm) before the cement screed is applied 6 cm above the pipes with a thickness of 8 cm.
  EcoSpold01Location=RER
  properties: wet mass 1 kg, dry mass 1 kg
- polyethylene, low density, granulate: 100.338 kg; source Toschi 1993
  EcoSpold01Location=RER
  Estimation. A floor heating system with plastic tubing and aluminum heat conduction fins is chosen to ensure good thermal transfer. In this dataset it is assumed that heat pipes are installed on the insulation (cross-linked polyethylene pipe, diameter: 20 mm; wall thickness: 2 mm). Pipe distance is 30 cm. The pipes and heat conduction fins embedded in the floor are covered with plastic (polyethylene (LD) 0,2 mm) before the cement screed is applied 6 cm above the pipes with a thickness of 8 cm.
  properties: wet mass 1 kg, carbon content, fossil 0.857143, dry mass 1 kg
  note on carbon content, fossil: Polyethylene is formed out of a huge amount of ethylene monomers (C2H4) (ecoinvent v2.2 report 11_II). MW=28 g/mol

## Inputs from nature
- Water, unspecified natural origin [natural resource, in water]: 0.447049 m3; name water_UNO_input; source Toschi 1993; lognormal variance with pedigree 0.186, pedigree (4,5,5,1,1)
  Estimation. Cement screed is composed of 300 kg of cement, 1550 kg of sand and 150 kg of water per m3 green mortar (i.e. 2000 kg/m3).

## Emissions to nature
- Water [air, unspecified]: 0.0670573 m3; name water_to_air_unspecified; = (water_UNO_input*fraction_PW_to_air); lognormal variance with pedigree 0.0807, pedigree (2,2,5,1,1)
  Calculated value based on literature values and expert opinion. See comments in the parametres' comment field.
  property fraction, origin: salt water 0; name fraction_origin_salt_water
  property fraction, origin: fresh water 0; name fraction_origin_fresh_water
  property fraction, origin: unspecified 1; name fraction_origin_unspecified
- Water [water, unspecified]: 0.379991 m3; name water_to_water_unspecified; = water_UNO_input*(1-fraction_PW_to_air); lognormal variance with pedigree 0.0807, pedigree (2,2,5,1,1)
  (same comment as for Water)
  property fraction, origin: salt water 0; name fraction_origin_salt_water_Ww
  property fraction, origin: fresh water 0; name fraction_origin_fresh_water_Ww
  property fraction, origin: unspecified 1; name fraction_origin_unspecified_Ww
  property water in wet mass 1000 kg; name WWM
  property dry mass 0 kg; name DM
  property wet mass 1000 kg; name WM
  property carbon content, non-fossil 0; name C_content_non_fossil
  property carbon content, fossil 0; name C_content_fossil

## Sampling procedure
Literature, manufacturer information

## Review by Roland Hischier 2011-09-22
Transfer of documentation done.

## Review by Gerald Rebitzer (obsolete) 2004-06-09
prepared
