# uranium conversion facility construction

Dataset: EcoSpold 2, unit process
Geography: US
Time period: 1980-01-01 to 2019-12-31
Technology level: current
Classification: EcoSpold01Categories: nuclear power/production
Classification: ISIC rev.4 ecoinvent: 4100:Construction of buildings
Tags: ConvertedDataset
Scenario: Business-as-Usual
System model: Allocation at the point of substitution
Generated by: Roberto Dones
Published in: Dones, R. 2007
Database: ecoinvent
isCopyrightProtected: true
accessRestrictedTo: 1

## General comment
Data for material and energy requirements for construction and decommissioning are from an old study, which does not differenciate between dry and wet process. The material inventory may not correspond to currently operating facilities, which is taken into account in the uncertainties. The land use is based on actual data for the Sequoyah facility. The lifetime is assumed to be 40 years with a throughput of 5000 t/a. Although Sequoyah was operating only for 22 years, 40 years can be assumed as an average for currently operating plants.
[This dataset was already contained in the ecoinvent database version 2. It was not individually updated during the transfer to ecoinvent version 3. Life Cycle Impact Assessment results may still have changed, as they are affected by changes in the supply chain, i.e. in other datasets. This dataset was generated following the ecoinvent quality guidelines for version 2. It may have been subject to central changes described in the ecoinvent version 3 change report (http://www.ecoinvent.org/database/ecoinvent-version-3/reports-of-changes/), and the results of the central updates were reviewed extensively. The changes added e.g. consistent water flows and other information throughout the database. The documentation of this dataset can be found in the ecoinvent reports of version 2, which are still available via the ecoinvent website. The change report linked above covers all central changes that were made during the conversion process.]

## Included activities end
The module includes: land use of the factory; energy (electricity and diesel) and material requirements for the construction of the facility; transport requirements during construction; energy and transport requirements (for non-contaminated inerts concrete with reinforcing bars) during decommissioning; disposal of the non-contaminated inerts. The non contaminated metals are assumed to be recycled

## Geography
US data.

## Technology
Available construction material and energy data refer to conditions in early 1980s.

## Reference product
- uranium conversion facility: 1 unit; CPC 53269: Other constructions for manufacturing; By-product classification allocatable product
  EcoSpold01Location=US
  production volume 0.0349148 unit
    1.48 kg UF6 per kg U in global mine production (http://www.world-nuclear.org/info/inf23.html), after an assumed 5% loss in yellowcake production. US capacity is 19% of global conversion capacity (http://www.wise-uranium.org/efac.html#CONV) at 87% capacity utilisation (capacity of ConverDyn was 14 million kg in 2005 ; http://www.converdyn.com/metropolis/mtwhistory.html) ; Lifetime capacity of conversion facility: 320 million kg.
  property price 5.57741e7 EUR2005
    Calculated based on inputs: The price of the product has been calculated as a sum of the values of the material and energy inputs for this product. This value is therefore a rough estimation. It may underestimate the real price since there are additional expenses when producing any product. These expences can include for example labour costs, treatment of waste materials and profit for the producer. Please consider carefully whether this level of data quality is acceptable for your application.
  property true value 5.57741e7
    allocation property applied in "true value" allocation // value calculated from revenue

## By-products
- heat, for reuse in municipal waste incineration only: 0 MJ; CPC 17300: Steam and hot water; By-product classification allocatable product; pedigree (1,1,1,1,1)
  Net electricity generated from this waste and used in internal MSWI plant energy redistribution.
  Uncertainty: uncertainty is calculated from uncertainties in waste composition and uncertainties in energy efficiency and the uncertainty in internal energy demand
  production volume 0.174554 MJ
  property exergy 0.1842 MJ; name E_th_prod_MSWI_exergy
    This exergy property is based on the exergy content of the product.
  property price 0.0106 EUR2005; name E_th_prod_MSWI_price_EUR2005
    Average European district heat price from Ecoheatcool and Euroheat 2005-2006, Ecoheat Work package 1: The European heat market. Final report. 10.6 EUR/GJ i s the price of district heat. http://www.solarthermalworld.org/files/Ecoheatcool%20WP1%20Web.pdf?download
  property true value relation 0.1842; name E_th_prod_MSWI_true_value_relation
    property to calculate "true value" from
  property true value 0.0328861
    allocation property applied in "true value" allocation // value calculated from true value relation
- electricity, for reuse in municipal waste incineration only: 0 kWh; CPC 17100: Electrical energy; By-product classification allocatable product; pedigree (1,1,1,1,1)
  (same comment as for heat, for reuse in municipal waste incineration only)
  production volume 0.0245819 kWh
  property true value relation 3.6; name E_el_prod_MSWI_true_value_relation
    property to calculate "true value" from
  property price 0.1 EUR2005; name E_el_prod_MSWI_price_EUR2005
    Estimated to be the same price as in case of electricity, medium voltage.
  property exergy 3.6 MJ; name E_el_prod_MSWI_exergy
    This exergy property is based on the exergy content of the product.
  property true value 0.090513
    (same comment as for heat, for reuse in municipal waste incineration only)

## Inputs from technosphere
- electricity, medium voltage: 1.28e6 kWh; lognormal variance with pedigree 0.16, pedigree (1,1,5,1,1)
  EcoSpold01Location=UCTE
  own estimation
- reinforcing steel: 64000 kg; lognormal variance with pedigree 0.16, pedigree (1,1,5,1,1)
  own estimation
  EcoSpold01Location=RER
  properties: carbon content, fossil 0.004, dry mass 1 kg, wet mass 1 kg
- waste reinforced concrete: -6e6 kg; lognormal variance with pedigree 0.08, pedigree (1,1,5,1,1)
  EcoSpold01Location=CH
  own estimation
  production volume 209489 kg
    Calculated from the production volume of uranium conversion facility in proportion to the respective output amounts.
  properties: water content 0.00585407, dry mass 0.99418 kg, wet mass 1 kg
- aluminium, cast alloy: 11520 kg; lognormal variance with pedigree 0.16, pedigree (1,1,5,1,1)
  EcoSpold01Location=RER
  own estimation
  properties: dry mass 1 kg, wet mass 1 kg
- concrete, normal: 3710 m3; lognormal variance with pedigree 0.16, pedigree (1,1,5,1,1)
  EcoSpold01Location=CH
  own estimation
  properties: water content 0.086758, wet mass 2380 kg, dry mass 2190 kg
- aluminium, wrought alloy: 24480 kg; lognormal variance with pedigree 0.16, pedigree (1,1,5,1,1)
  own estimation
  EcoSpold01Location=RER
  properties: dry mass 1 kg, wet mass 1 kg
- copper: 110000 kg; lognormal variance with pedigree 0.16, pedigree (1,1,5,1,1)
  own estimation
  EcoSpold01Location=RER
  properties: dry mass 1 kg, wet mass 1 kg
- steel, low-alloyed, hot rolled: 1.85e6 kg; lognormal variance with pedigree 0.16, pedigree (1,1,5,1,1)
  EcoSpold01Location=RER
  own estimation
  properties: carbon content, fossil 0.005, dry mass 1 kg, wet mass 1 kg
  note on carbon content, fossil: Low alloyed steel composition given in Tab. 3.2 ecoinvent v2.2 report 10_partII. Steel assumed to have a C content of 0.5%
- steel, chromium steel 18/8, hot rolled: 1.85e6 kg; lognormal variance with pedigree 0.16, pedigree (1,1,5,1,1)
  EcoSpold01Location=RER
  own estimation
  properties: carbon content, fossil 0.0008, dry mass 1 kg, wet mass 1 kg
  note on carbon content, fossil: Stainless steel model is the grade 304 steel (18/8 stainless, 18% chromium 8% nickel; max. 0.08% C)
- diesel, burned in diesel-electric generating set, 10MW: 2.8e9 MJ; lognormal variance with pedigree 0.16, pedigree (1,1,5,1,1)
  EcoSpold01Location=GLO
  own estimation

## Inputs from nature
All rows: lognormal variance with pedigree 0.16, pedigree (1,1,5,1,1)
- Transformation, from unspecified [natural resource, land]: 300000 m2
  own estimation
- Transformation, from industrial area [natural resource, land]: 300000 m2
  own estimation
- Transformation, to unspecified [natural resource, land]: 300000 m2
  own estimation
- Transformation, to industrial area [natural resource, land]: 300000 m2
  own estimation
- Occupation, industrial area [natural resource, land]: 1.38e7 m2*year
  own estimation

## Sampling procedure
Literature

## Review by Roberto Dones 2003-08-19
passed
for final calculation August 2003
