# treatment of waste cement-fibre slab, collection for final disposal

Dataset: EcoSpold 2, unit process
Geography: CH
Time period: 1994-01-01 to 2019-12-31
Technology level: current
Classification: ISIC rev.4 ecoinvent: 3821:Treatment and disposal of non-hazardous waste
Classification: EcoSpold01Categories: waste management/building demolition
Tags: Treatment; ConvertedDataset
Scenario: Business-as-Usual
System model: Allocation at the point of substitution
Generated by: Gabor Doka (obsolete)
Published in: Doka G. 2007
Database: ecoinvent
isCopyrightProtected: true
accessRestrictedTo: 1

## General comment
The waste contains 0.64kg inert material (GSD=101%) and 0.36kg untreated wood (GSD=102.3%) Waste density is 1200 kg/m3. Allocation of energy production in waste incineration: no substitution or expansion. Total burden allocated to waste disposal function of waste incinerator.
[This dataset was already contained in the ecoinvent database version 2. It was not individually updated during the transfer to ecoinvent version 3. Life Cycle Impact Assessment results may still have changed, as they are affected by changes in the supply chain, i.e. in other datasets. This dataset was generated following the ecoinvent quality guidelines for version 2. It may have been subject to central changes described in the ecoinvent version 3 change report (http://www.ecoinvent.org/database/ecoinvent-version-3/reports-of-changes/), and the results of the central updates were reviewed extensively. The changes added e.g. consistent water flows and other information throughout the database. The documentation of this dataset can be found in the ecoinvent reports of version 2, which are still available via the ecoinvent website. The change report linked above covers all central changes that were made during the conversion process.]

## Included activities end
energy for dismantling, particulate matter emissions from dismantling and handling, transport to dismantling facilities, final disposal of waste material,

## Geography
Specific to the technology mix encountered in Switzerland in late 1990ies

## Technology
Building demolition with skid-steer loaders.

## Reference product
- waste cement-fibre slab: -1 kg; By-product classification Waste; CPC 39: Wastes or scraps
  EcoSpold01Location=CH
  production volume 50 kg
    estimated proportion; source: ecoinvent v2; value to be replaced by value to be calculated from the demand for this treatment activity
  property price 0 EUR2005
    Waste products are assigned a price of zero as they are assumed to require further treatment.
  property carbon content, fossil 0
    The waste contains 0.64kg inert material (Tab A.3 ecoinvent v2.2 report 13_I for details) and 0.36kg untreated wood (Tab A.4 ecoinvent v2.2 report 13_I for details).
  property carbon content, non-fossil 0.153912
    The waste contains 0.64kg inert material (Tab A.3 ecoinvent v2.2 report 13_I for details) and 0.36kg untreated wood (Tab A.4 ecoinvent v2.2 report 13_I for details). C content is referred to 1 kg DM
  property carbon content 0.153912
    carbon content on a dry matter basis (reserved; not for manual entry)
  properties: water content 0.0688328, water in wet mass 0.0644 kg, dry mass 0.9356 kg, wet mass 1 kg, carbon allocation 0.144 kg

## By-products
- electricity, for reuse in municipal waste incineration only: 0 kWh; CPC 17100: Electrical energy; By-product classification allocatable product; pedigree (1,1,1,1,1)
  Net electricity generated from this waste and used in internal MSWI plant energy redistribution.
  Uncertainty: uncertainty is calculated from uncertainties in waste composition and uncertainties in energy efficiency and the uncertainty in internal energy demand
  property exergy 3.6 MJ; name E_el_prod_MSWI_exergy
    This exergy property is based on the exergy content of the product.
  property true value relation 3.6; name E_el_prod_MSWI_true_value_relation
    property to calculate "true value" from
  property price 0.1 EUR2005; name E_el_prod_MSWI_price_EUR2005
    Estimated to be the same price as in case of electricity, medium voltage.
- heat, for reuse in municipal waste incineration only: 0 MJ; CPC 17300: Steam and hot water; By-product classification allocatable product; pedigree (1,1,1,1,1)
  Net useful heat generated from this waste and used in internal MSWI plant energy redistribution.
  Uncertainty: uncertainty is calculated from uncertainties in waste composition and uncertainties in energy efficiency and the uncertainty in internal energy demand
  property exergy 0.1842 MJ; name E_th_prod_MSWI_exergy
    This exergy property is based on the exergy content of the product.
  property true value relation 0.1842; name E_th_prod_MSWI_true_value_relation
    property to calculate "true value" from
  property price 0.0106 EUR2005; name E_th_prod_MSWI_price_EUR2005
    Average European district heat price from Ecoheatcool and Euroheat 2005-2006, Ecoheat Work package 1: The European heat market. Final report. 10.6 EUR/GJ i s the price of district heat. http://www.solarthermalworld.org/files/Ecoheatcool%20WP1%20Web.pdf?download
- zinc concentrate: 0 kg; CPC 14290: Other non-ferrous metal ores and concentrates (other than uranium or thorium ores and concentrates); By-product classification allocatable product
  Calculated value from the knowledge of the properties of both products.
  property price 0.38 EUR2005; name ByP_price_EUR2005
    Temporary price data. Calculated as 90% of purchasers price based on: Zinc content in concentrate 53%. Concentrate price per kg Zn 86.5% of refined Zn price (13.5% treatment charges according to CHR Metals Limited 2005: Dynamic cost curves. http://www.minecost.com/dynamic.pdf). 2004 zinc price from USGS (2007) Mineral commodity summaries 2007. <http://minerals.usgs.gov/minerals/pubs/mcs/2007/mcs2007.pdf> [Accessed 25 May 2010]
  property zinc content 0.53; name zinc_C_zinc_concentrate
    Zinc content on a dry matter basis. Value taken from teh "zinc mine operation" /GLO dataset.
  property dry mass 1 kg; name DM_zinc_concentrate
  property carbon content 0
    carbon content on a dry matter basis (reserved; not for manual entry)
  properties: wet mass 1 kg, water content 0, carbon content, non-fossil 0, carbon content, fossil 0, water in wet mass 0 kg, carbon allocation 0 kg

## Inputs from technosphere
- waste cement-fibre slab, dismantled: -1 kg; lognormal variance with pedigree 0.04, pedigree (1,1,5,1,1)
  EcoSpold01Location=CH
  disposed masses. Uncertainty calculated from uncertainty of waste composition
  production volume 50 kg
    Calculated from the production volume of waste cement-fibre slab in proportion to the respective output amounts.
  properties: carbon content, non-fossil 0.144, dry mass 1 kg, wet mass 1 kg
  note on carbon content, non-fossil: The waste contains 0.64kg inert material (Tab A.3 ecoinvent v2.2 report 13_I for details) and 0.36kg untreated wood (Tab A.4 ecoinvent v2.2 report 13_I for details).
- diesel, burned in building machine: 0.0359 MJ; lognormal variance with pedigree 0.07, pedigree (1,1,5,1,1)
  EcoSpold01Location=GLO
  energy for demolition. Uncertainty from range in (DAFSTB 1996)

## Emissions to nature
- Particulates, > 2.5 um, and < 10um [air, urban air close to ground]: 6.34e-5 kg; lognormal variance with pedigree 0.1813, pedigree (2,3,5,3,1)
  Emission from dismantling and handling. from one extrapolated PM10 emission factor and generic PM fractions from measurements
  Uncertainty: & basic uncertainty of 2; from one extrapolated PM10 emission factor and generic PM fractions from measurements
- Particulates, > 10 um [air, urban air close to ground]: 8.35e-5 kg; lognormal variance with pedigree 0.0913, pedigree (2,3,5,3,1)
  Emission from dismantling and handling. from one extrapolated PM10 emission factor and generic PM fractions from measurements
  Uncertainty: & basic uncertainty of 1.5; from one extrapolated PM10 emission factor and generic PM fractions from measurements
- Particulates, < 2.5 um [air, urban air close to ground]: 1.66e-5 kg; lognormal variance with pedigree 0.3613, pedigree (2,3,5,3,1)
  Emission from dismantling and handling. from one extrapolated PM10 emission factor and generic PM fractions from measurements
  Uncertainty: & basic uncertainty of 3; from one extrapolated PM10 emission factor and generic PM fractions from measurements

## Sampling procedure
waste-specific calculation based on literature data

## Extrapolations
This dataset has been extrapolated from year 2002 to the year of the calculation (2019). The uncertainty has been adjusted accordingly.

## Review by Niels Jungbluth 2003-05-22
Passed. Calculation for standard deviation 95 of infrastructure, land occupation, transport services and other services can differ from standard Pedigree approach used in this project and figures obtained by this procedure.
