# treatment of used laptop computer, manual dismantling

Dataset: EcoSpold 2, unit process
Geography: CH
Time period: 2005-01-01 to 2019-12-31
Technology level: current
Classification: ISIC rev.4 ecoinvent: 3830:Materials recovery
Classification: EcoSpold01Categories: waste management/recycling
Tags: ConvertedDataset; Treatment
Scenario: Business-as-Usual
System model: Allocation at the point of substitution
Share of production covered: 100 %
Generated by: Roland Hischier
Published in: Hischier R. 2007
Database: ecoinvent
isCopyrightProtected: true
accessRestrictedTo: 1

## General comment
manual dismantling in various fractions based on common transfer coefficients for this type of treatment. Data from own experiences in Switzerland.
[This dataset was already contained in the ecoinvent database version 2. It was not individually updated during the transfer to ecoinvent version 3. Life Cycle Impact Assessment results may still have changed, as they are affected by changes in the supply chain, i.e. in other datasets. This dataset was generated following the ecoinvent quality guidelines for version 2. It may have been subject to central changes described in the ecoinvent version 3 change report (http://www.ecoinvent.org/database/ecoinvent-version-3/reports-of-changes/), and the results of the central updates were reviewed extensively. The changes added e.g. consistent water flows and other information throughout the database. The documentation of this dataset can be found in the ecoinvent reports of version 2, which are still available via the ecoinvent website. The change report linked above covers all central changes that were made during the conversion process.]

## Included activities end
This dataset represents the manual dismantling of a WEEE devices in Switzerland.

## Geography
data of situation in Switzerland

## Technology
current manual dismantling activities in Switzerland.

## Reference product
- used laptop computer: -1 kg; CPC 39990: Other wastes n.e.c.; By-product classification Waste
  EcoSpold01Location=CH
  production volume 0.23 kg
    Unknown
    proportion; source: Hischier 2005; value to be replaced by value to be calculated from the demand for this treatment activity
  property carbon content, non-fossil 1.27837e-5
    Composition data from laptop computer divided by ist weight, 3.12 kg (Tab 4.12, ecoinvent v2.2 report 18_V)
  property price 0 EUR2005
    Waste products are assigned a price of zero as they are assumed to require further treatment.
  property carbon content, fossil 0.260278
    (same comment as for used laptop computer)
  property carbon content 0.260291
    carbon content on a dry matter basis (reserved; not for manual entry)
  properties: water content 0, wet mass 1 kg, dry mass 1 kg, water in wet mass 0 kg, carbon allocation 0.260291 kg

## By-products
- iron scrap, sorted, pressed: 0 kg; By-product classification Recyclable; CPC 39310: Slag, dross, scalings and other waste from the manufacture of iron or steel; pedigree (1,1,1,1,1)
  this flow replaces the output "Ni-Co-Fe residues from Ni-metal hydride battery, pyrometallurgical processing"
  Uncertainty: data of 1 European plant - reported in Fisher (2006)
  property wet mass 1 kg; name WM
  property carbon content, fossil 0; name C_content_fossil
  property carbon content, non-fossil 0; name C_content_non_fossil
  property water content 0; name water_content
  property dry mass 1 kg; name DM
  property price 0.175 EUR2005
    Temporary price data. Calculated as 90% of purchasers price based on: 2005 import and export prices (total trades (USD) divided by total weight (kg) in biggest economies of the world: EU27, USA, Brasil, China, India, Japan and Russia) from UN Commodity Trade Statistics Database (http://data.un.org/Explorer.aspxDatabase [Accessed 2011.06.20]). Commodity: Waste or scrap, of cast iron
  property water in wet mass 0 kg; name WWM
  property carbon content 0
    carbon content on a dry matter basis (reserved; not for manual entry)
  properties: carbon allocation 0 kg
- heat, for reuse in municipal waste incineration only: 0 MJ; CPC 17300: Steam and hot water; By-product classification allocatable product; pedigree (1,1,1,1,1)
  Net electricity generated from this waste and used in internal MSWI plant energy redistribution.
  Uncertainty: uncertainty is calculated from uncertainties in waste composition and uncertainties in energy efficiency and the uncertainty in internal energy demand
  property exergy 0.1842 MJ; name E_th_prod_MSWI_exergy
    This exergy property is based on the exergy content of the product.
  property price 0.0106 EUR2005; name E_th_prod_MSWI_price_EUR2005
    Average European district heat price from Ecoheatcool and Euroheat 2005-2006, Ecoheat Work package 1: The European heat market. Final report. 10.6 EUR/GJ i s the price of district heat. http://www.solarthermalworld.org/files/Ecoheatcool%20WP1%20Web.pdf?download
  property true value relation 0.1842; name E_th_prod_MSWI_true_value_relation
    property to calculate "true value" from
- electricity, for reuse in municipal waste incineration only: 0 kWh; CPC 17100: Electrical energy; By-product classification allocatable product; pedigree (1,1,1,1,1)
  (same comment as for heat, for reuse in municipal waste incineration only)
  property price 0.1 EUR2005; name E_el_prod_MSWI_price_EUR2005
    Estimated to be the same price as in case of electricity, medium voltage.
  property exergy 3.6 MJ; name E_el_prod_MSWI_exergy
    This exergy property is based on the exergy content of the product.
  property true value relation 3.6; name E_el_prod_MSWI_true_value_relation
    property to calculate "true value" from
- iron scrap, unsorted: 0 kg; source European Aluminium Association 2008; CPC 39310: Slag, dross, scalings and other waste from the manufacture of iron or steel; By-product classification Recyclable; pedigree (1,1,1,1,1)
  property price 0.149 EUR2005; name ironScrapAmount_price_EUR2005
    Temporary price data. Calculated as 90% of purchasers price based on: estimated at 85% of sorted scrap
  property carbon content 0
    carbon content on a dry matter basis (reserved; not for manual entry)
  properties: water in wet mass 0 kg, water content 0, carbon content, fossil 0, carbon content, non-fossil 0, dry mass 1 kg, wet mass 1 kg, carbon allocation 0 kg
- aluminium oxide, non-metallurgical: 0 kg; source European Aluminium Association 2008; CPC 41432: Alumina (aluminium oxide), except artificial corundum; By-product classification allocatable product; CAS 1344-28-1; pedigree (1,1,1,1,1)
  property carbon content, non-fossil 0; name C_content_non_fossil
  property price 0.28 EUR2005; name Al2O3Amount_price_EUR2005
    From UN trade database. http://data.un.org/ Import data from the largest economies of the world are used (Brazil, India, USA, China, Japan and EU-27).
  property dry mass 1 kg; name DM
  property water content 0; name water_content
  property wet mass 1 kg; name WM
  property water in wet mass 0 kg; name WWM
  property carbon content, fossil 0; name C_content_fossil
  property carbon content 0
    carbon content on a dry matter basis (reserved; not for manual entry)
  properties: carbon allocation 0 kg
- aluminium, cast alloy: 0 kg; source European Aluminium Association 2008; By-product classification allocatable product; CPC 41431: Unwrought aluminium; pedigree (1,1,1,1,1)
  EcoSpold01Location=RER
  property price 1.3 EUR2005; name castAlloyAmount_price_EUR2005
    Temporary price data. Calculated as 90% of purchasers price based on: Source: London Metal Exchange, Aluminium alloy price for 2005
  property carbon content 0
    carbon content on a dry matter basis (reserved; not for manual entry)
  properties: water in wet mass 0 kg, carbon content, non-fossil 0, water content 0, dry mass 1 kg, carbon content, fossil 0, wet mass 1 kg, carbon allocation 0 kg
- aluminium, wrought alloy: 0 kg; source European Aluminium Association 2008; By-product classification allocatable product; CPC 4153: Semi-finished products of aluminium or aluminium alloys; pedigree (1,1,1,1,1)
  property price 1.44 EUR2005; name secondaryAluminiumOutput_price_EUR2005
    Estimated based on literature values and expert judgement. Aluminium ccast alloys are about 90% of the price of aluminium wrought alloys.
  property carbon content 0
    carbon content on a dry matter basis (reserved; not for manual entry)
  properties: wet mass 1 kg, water content 0, carbon content, fossil 0, water in wet mass 0 kg, carbon content, non-fossil 0, dry mass 1 kg, carbon allocation 0 kg
- copper: 0 kg; source Rentz O. 1999; By-product classification allocatable product; CPC 41413: Refined copper and copper alloys, unwrought; master alloys of copper
  Literature value. Copper uses: Before end-use copper is manufactured into semi fabricated products, such as shapes and ingots (known as 'semis'). These manufacturing processes are subdivided into hot working, cold working and, if necessary, process annealing. Few of the semis are ready for use as such. They more typically travel to first-stage manufacturers, who make metal rods, wire, and casting, and then to component manufacturers who produce such things as motors, valves, and insulated cables The components in turn are incorporated by final-stage manufacturers into a variety of finished products - automobiles, commercial buildings, residential housing, and so forth. These uses account for about 79% of the world-wide consumption of copper.
  property price 5.52 EUR2005
    Literature value (http://www.economist.com/news/business/21576714-mining-industry-has-enriched-chile-its-future-precarious-copper-solution). Average price between 20015 and 2013.
  property carbon content 0
    carbon content on a dry matter basis (reserved; not for manual entry)
  properties: dry mass 1 kg, water in wet mass 0 kg, wet mass 1 kg, carbon content, non-fossil 0, water content 0, carbon content, fossil 0, carbon allocation 0 kg
- zinc concentrate: 0 kg; CPC 14290: Other non-ferrous metal ores and concentrates (other than uranium or thorium ores and concentrates); By-product classification allocatable product
  Calculated value from the knowledge of the properties of both products.
  property price 0.38 EUR2005; name ByP_price_EUR2005
    Temporary price data. Calculated as 90% of purchasers price based on: Zinc content in concentrate 53%. Concentrate price per kg Zn 86.5% of refined Zn price (13.5% treatment charges according to CHR Metals Limited 2005: Dynamic cost curves. http://www.minecost.com/dynamic.pdf). 2004 zinc price from USGS (2007) Mineral commodity summaries 2007. <http://minerals.usgs.gov/minerals/pubs/mcs/2007/mcs2007.pdf> [Accessed 25 May 2010]
  property zinc content 0.53; name zinc_C_zinc_concentrate
    Zinc content on a dry matter basis. Value taken from teh "zinc mine operation" /GLO dataset.
  property dry mass 1 kg; name DM_zinc_concentrate
  property carbon content 0
    carbon content on a dry matter basis (reserved; not for manual entry)
  properties: wet mass 1 kg, water content 0, carbon content, non-fossil 0, carbon content, fossil 0, water in wet mass 0 kg, carbon allocation 0 kg
- lead: 0 kg; CPC 41441: Lead, unwrought; By-product classification allocatable product
  EcoSpold01Location=SE
  property price 0.744 EUR2005
    Temporary price data. Calculated as 90% of purchasers price based on: Source: ecoinvent v2 report 10-part IX, Tab 5.10 & 2.5
  property carbon content 0
    carbon content on a dry matter basis (reserved; not for manual entry)
  properties: wet mass 1 kg, water content 0, carbon content, non-fossil 0, carbon content, fossil 0, dry mass 1 kg, water in wet mass 0 kg, carbon allocation 0 kg
- nickel, 99.5%: 0 kg; CPC 41422: Unwrought nickel; By-product classification allocatable product
  EcoSpold01Location=SE
  property price 10.4 EUR2005
    Temporary price data. Calculated as 90% of purchasers price based on: 2004 nickel price from USGS (2007) Mineral commodity summaries 2007. <http://minerals.usgs.gov/minerals/pubs/mcs/2007/mcs2007.pdf> [Accessed 25 May 2010]
  property carbon content 0
    carbon content on a dry matter basis (reserved; not for manual entry)
  properties: water in wet mass 0 kg, wet mass 1 kg, carbon content, non-fossil 0, dry mass 1 kg, water content 0, carbon content, fossil 0, carbon allocation 0 kg
- silver: 0 kg; CPC 41310: Silver (including silver plated with gold or platinum), unwrought or in semi-manufactured forms, or in powder […]; By-product classification allocatable product; CAS 7440-22-4
  EcoSpold01Location=SE
  property price 178 EUR2005
    (same comment as for lead)
  property carbon content 0
    carbon content on a dry matter basis (reserved; not for manual entry)
  properties: wet mass 1 kg, carbon content, non-fossil 0, dry mass 1 kg, water content 0, carbon content, fossil 0, water in wet mass 0 kg, carbon allocation 0 kg
- palladium: 0 kg; CPC 4160: Other non-ferrous metals and articles thereof (including waste and scrap of some metals); cermets and articles […]; By-product classification allocatable product
  EcoSpold01Location=SE
  property price 5640 EUR2005
    Temporary price data. Calculated as 90% of purchasers price based on: 2004 price from USGS (2007) Mineral commodity summaries 2007. <http://minerals.usgs.gov/minerals/pubs/mcs/2007/mcs2007.pdf> [Accessed 25 May 2010]
  property carbon content 0
    carbon content on a dry matter basis (reserved; not for manual entry)
  properties: wet mass 1 kg, carbon content, fossil 0, water in wet mass 0 kg, water content 0, carbon content, non-fossil 0, dry mass 1 kg, carbon allocation 0 kg
- gold: 0 kg; CPC 41320: Gold (including gold plated with platinum), unwrought or in semi-manufactured forms, or in powder form; By-product classification allocatable product; CAS 7440-57-5
  EcoSpold01Location=SE
  property price 10600 EUR2005
    Temporary price data. Calculated as 90% of purchasers price based on: Source: ecoinvent v2 report 10-part IX, Tab 2.5
  property carbon content 0
    carbon content on a dry matter basis (reserved; not for manual entry)
  properties: wet mass 1 kg, carbon content, fossil 0, dry mass 1 kg, carbon content, non-fossil 0, water content 0, water in wet mass 0 kg, carbon allocation 0 kg
- mercury: 0 kg; CPC 4160: Other non-ferrous metals and articles thereof (including waste and scrap of some metals); cermets and articles […]; By-product classification allocatable product; CAS 7439-97-6
  property price 12.5 EUR2005
    Temporary price data. Calculated as 90% of purchasers price based on: 2005 import and export prices (total trades (USD) divided by total weight (kg) in biggest economies of the world: EU27, USA, Brasil, China, India, Japan and Russia) from UN Commodity Trade Statistics Database (http://data.un.org/Explorer.aspxDatabase [Accessed 2011.06.20]). Commodity: Mercury
  property carbon content 0
    carbon content on a dry matter basis (reserved; not for manual entry)
  properties: carbon content, fossil 0, water in wet mass 0 kg, water content 0, dry mass 1 kg, wet mass 1 kg, carbon content, non-fossil 0, carbon allocation 0 kg
- glass cullet, for Saint-Gobain ISOVER SA: 0 kg; CPC 37111: Glass in the mass, in balls (except microspheres), rods or tubes, unworked; waste and scrap of glass; By-product classification Recyclable; pedigree (1,1,1,1,1)
  property price 0.08 EUR2005
    Estimated to be the same price as for glass cullet, sorted (Temporary price data. The price of the glass cullet, sorted is estimated to be two times higher than the price of the waste packaging glass, unsorted.).
  properties: dry mass 1 kg, wet mass 1 kg

## Inputs from technosphere
- used Ni-metal hydride battery: -0.0026 kg; lognormal variance with pedigree 0.054, pedigree (3,4,5,1,1)
  EcoSpold01Location=GLO
  Calculated - based on composition data
  Uncertainty: calculated - based on composition data
  production volume 0.000598 kg
    Calculated from the production volume of used laptop computer in proportion to the respective output amounts.
  properties: dry mass 1 kg, carbon content, fossil 0.0949631, wet mass 1 kg
- used liquid crystal display module: -0.0866 kg; lognormal variance with pedigree 0.054, pedigree (3,4,5,1,1)
  Calculated - based on composition data
  EcoSpold01Location=CH
  Uncertainty: calculated - based on composition data
  production volume 0.019918 kg
    (same comment as for used Ni-metal hydride battery)
  properties: dry mass 1 kg, wet mass 1 kg, carbon content, non-fossil 4.20542e-5, carbon content, fossil 0.327872
- used cable: -0.0018 kg; lognormal variance with pedigree 0.054, pedigree (3,4,5,1,1)
  Calculated - based on composition data
  Uncertainty: calculated - based on composition data
  production volume 0.000414 kg; = ABS(Ref('f779093c-0a37-4be5-aa4a-598580c55ab9', 'ProductionVolume') * ((Ref('75690755-35f8-4b54-b082-810253502759')*-1) / Ref('f779093c-0a37-4be5-aa4a-598580c55ab9')))
    Calculated from production volume of reference product using the relative outputs.
  properties: carbon content, fossil 183.274, dry mass 1 kg, wet mass 1 kg
- used printed wiring boards: -0.1317 kg; lognormal variance with pedigree 0.054, pedigree (3,4,5,1,1)
  Calculated - based on composition data
  EcoSpold01Location=GLO
  Uncertainty: calculated - based on composition data
  production volume 0.030291 kg
    (same comment as for used Ni-metal hydride battery)
  properties: dry mass 1 kg, carbon content, non-fossil 0.000960142, carbon content, fossil 0.193742, wet mass 1 kg
  note on carbon content, non-fossil: Composition of printed wiring boards used to calculate C content
- waste plastic, consumer electronics: -0.136 kg; lognormal variance with pedigree 0.054, pedigree (3,4,5,1,1)
  EcoSpold01Location=CH
  Calculated - based on composition data
  Uncertainty: calculated - based on composition data
  production volume 0.03128 kg
    (same comment as for used Ni-metal hydride battery)
  properties: water content 0.180638, dry mass 0.847 kg, carbon content, fossil 0.830215, wet mass 1 kg
  note on carbon content, fossil: C content in 1 kg DM was calculated using data in Tab A.2, ecoinvent v2.2 report 13_I
- manual treatment facility, waste electric and electronic equipment: 1.6e-8 unit; lognormal variance with pedigree 0.5761, pedigree (4,5,5,3,5)
  Rough estimation of infrastructure
  EcoSpold01Location=GLO
  Uncertainty: rough estimation of infrastructure
- used fluorescent lamp: -0.0186 kg; lognormal variance with pedigree 0.054, pedigree (3,4,5,1,1)
  (same comment as for used printed wiring boards)
  production volume 0.004278 kg
    (same comment as for used Ni-metal hydride battery)
  properties: wet mass 1 kg, dry mass 1 kg, carbon content, fossil 0.554974
  note on carbon content, fossil: CCFL backlight lamps is used as a specific example of fluorescent lamps (ecoinvent v2.2 report 18_V)
- shredder fraction after manual dismantling of used electronic product: -0.1168 kg; lognormal variance with pedigree 0.054, pedigree (3,4,5,1,1)
  (same comment as for used Ni-metal hydride battery)
  production volume 0.026864 kg
    (same comment as for used Ni-metal hydride battery)
  properties: dry mass 1 kg, carbon content, fossil 0.287536, wet mass 1 kg
  note on carbon content, fossil: C content calculated out of (input) shredder fraction composition in Tab 4.47 (ecoinvent v2.2 report 18_V). Carbon content in plastic was calculated using data in Tab A.2, ecoinvent v2.2 report 13_I. Others was also considered plastic, and calculated the same way (from pg 70, ecoinvent v2.2 report 18_V). Ferro was assumed to have a C content of 0.012 kg C/ kg (C content of steel, calculated out of emission factors published in Commission Decision of 18 July 2007 establishing guidelines for the monitoring and reporting of greenhouse gas emissions pursuant to Directive 2003/87/EC of the European Parliament and of the Council (notified under document number C(2007) 3416)). The other component of the fraction were considered to content no C.

## Sampling procedure
own experiences

## Extrapolations
This dataset has been extrapolated from year 2005 to the year of the calculation (2019). The uncertainty has been adjusted accordingly.

## Review by Jürgen Sutter 2007-08-31
passed.
