# treatment of residue from shredder fraction from manual dismantling, municipal waste incineration

Dataset: EcoSpold 2, unit process
Geography: RoW
Time period: 2006-01-01 to 2019-12-31
Technology level: current
Classification: ISIC rev.4 ecoinvent: 3821:Treatment and disposal of non-hazardous waste
Synonyms: Kehrichtverbrennung; Siedlungsabfallverbrennung; municipal waste incineration
Scenario: Business-as-Usual
System model: Allocation at the point of substitution
Share of production covered: 1.8 %
Generated by: Gabor Doka
Published in: Doka G. 2013
Database: ecoinvent
isCopyrightProtected: true
accessRestrictedTo: 1

## General comment
This dataset represents the activity of waste disposal of residue from shredder fraction from manual dismantling in a municipal solid waste incinerator (MSWI) // Recommended use of this dataset: Only for incineration of shredder residues generated in the recycling (manual dismantling) of electronic waste // Inventoried waste contains 1.6% rubber; 39.3% Plastics from electronic consumer goods; 39.3% Plastics from electronic industrial goods; 2.96% MSWI iron scrap; 5.92% Alu in MSW; 7.02% Glass; 3.54% wiring copper; 0.34% Pb in ASR inert; 0.0393% silver; . // Waste composition (wet, in ppm): upper heating value 28.98 MJ/kg; lower heating value 27.77 MJ/kg; H2O 8610.5; O 77960; H 59861; C 653730; S 356.87; N 10451; P 416.59; B n.a.; Cl 5632.3; Br 4321.9; F 196.45; I n.a.; Ag 393.23; As 5.8936; Ba 139.09; Cd 118.66; Co 23.164; Cr 98.091; Cu 38276; Hg 0.66795; Mn 76.478; Mo 2.3574; Ni 424.78; Pb 3530.6; Sb 3774.3; Se 1.5398; Sn 179.36; V 7.991; Zn 610.71; Be 0.36663; Sc n.a.; Sr 64.894; Ti 3518.1; Tl 0.2933; W n.a.; Si 28447; Fe 25379; Ca 7555.7; Al 61109; K 91.94; Mg n.a.; Na 4634.1; // Share of carbon in waste that is biogenic 0%. // Share of metals in waste not oxidised and bulk-recyclable (exclude very small or thin parts) Iron: 95.11%; Alu: 96.42%; Copper: 92.39%. // One kg of this waste produces 0.2176 kg of slag and 0.01782 kg of residues, which are landfilled. Additional solidification with 0.00713 kg of cement. // Net energy production: 3.53MJ/kg electric energy and 6.92MJ/kg thermal energy. // Recovery of metal scrap to recycling: 13.98g iron scrap, 18.165g aluminium scrap, 10.883g copper scrap.

## Included activities start
waste incineration from waste reception gate and delivery into waste bunker at incinerator plant site (without transports to the incinerator)

## Included activities end
Waste-specific short-term emissions to water from leachate. Long-term emissions from landfill to ground water.

## Geography
Specific to the technology mix encountered in Switzerland in 2010. Well applicable to modern incineration practices in Europe, North America or Japan.

## Technology
average Swiss MSWI plants in 2010 (grate incinerators) with electrostatic precipitator for fly ash (ESP), wet flue gas scrubber and 25% SNCR , 42.77% SCR-high dust , 32.68% SCR-low dust -DeNOx facilities and 0% without Denox (weighted according to mass of burnt waste, representing Swiss average). Efficiency of iron scrap separation from slag : 58%. Efficiency of non-ferrous scrap separation from slag : 31%. Gross electric efficiency technology mix 15.84% and Gross thermal efficiency technology mix 28.51%

## Time period
Waste composition as given in literature reference, theoretical data or other source. Transfer coefficients for modern MSWI.

## Reference product
- residue from shredder fraction from manual dismantling: 0 kg; CPC 39: Wastes or scraps; By-product classification Waste
  Main reference product of this activity (supply of disposal service).
  production volume 0 kg
    based on estimate on MSW in WTE globally and estimate of share of WEEE residues in Swiss MSW based on unqualified estimate of manually dismanteld WEEE in CH and rate of this residue waste per kg WEEE (from Hischier et al. 2007-V)
  property price 0 EUR2005
    Waste products are assigned a price of zero as they are assumed to require further treatment.
  property carbon content 0.664925
    carbon content on a dry matter basis (reserved; not for manual entry)
  properties: wet mass 1 kg, carbon content, non-fossil 0, water in wet mass 0 kg, dry mass 1 kg, water content 0, carbon content, fossil 0.664925, carbon allocation 0.664925 kg
- electricity, for reuse in municipal waste incineration only: 1 kWh; CPC 17100: Electrical energy; By-product classification allocatable product; pedigree (1,1,1,1,1)
  Net electricity generated from this waste and used in internal MSWI plant energy redistribution.
  Uncertainty: uncertainty is calculated from uncertainties in waste composition and uncertainties in energy efficiency and the uncertainty in internal energy demand
  production volume 5.47941e8 kWh

## By-products
- electricity, for reuse in municipal waste incineration only: 0 kWh; name E_el_prod_MSWI; CPC 17100: Electrical energy; By-product classification allocatable product; pedigree (1,1,1,1,1)
  (same comment as for electricity, for reuse in municipal waste incineration only)
  production volume 0 kWh
    calculated in proportion to reference product waste input to incinerator
  property true value relation 3.6; name E_el_prod_MSWI_true_value_relation
    property to calculate "true value" from
  property exergy 3.6 MJ; name E_el_prod_MSWI_exergy
    This exergy property is based on the exergy content of the product.
  property price 0.1 EUR2005; name E_el_prod_MSWI_price_EUR2005
    Estimated to be the same price as in case of electricity, medium voltage.
- heat, for reuse in municipal waste incineration only: 0 MJ; name E_th_prod_MSWI; CPC 17300: Steam and hot water; By-product classification allocatable product; pedigree (1,1,1,1,1)
  (same comment as for electricity, for reuse in municipal waste incineration only)
  production volume 0 MJ
    calculated in proportion to reference product waste input to incinerator
  property true value relation 0.1842; name E_th_prod_MSWI_true_value_relation
    property to calculate "true value" from
  property exergy 0.1842 MJ; name E_th_prod_MSWI_exergy
    This exergy property is based on the exergy content of the product.
  property price 0.0106 EUR2005; name E_th_prod_MSWI_price_EUR2005
    Average European district heat price from Ecoheatcool and Euroheat 2005-2006, Ecoheat Work package 1: The European heat market. Final report. 10.6 EUR/GJ i s the price of district heat. http://www.solarthermalworld.org/files/Ecoheatcool%20WP1%20Web.pdf?download
- iron scrap, sorted, pressed: 0 kg; By-product classification Recyclable; CPC 39310: Slag, dross, scalings and other waste from the manufacture of iron or steel; pedigree (1,1,1,1,1)
  Iron scrap recovered from this waste.
  Uncertainty: uncertainty calculated from uncertainty in waste composition, uncertainty of share of recyclable metal, uncertainty of transfer coefficient to bottom ash, uncertainty of the efficiency of scrap removal in MSWI plant.
  production volume 0 kg
    calculated in proportion to reference product waste input to incinerator
  property price 0.175 EUR2005
    Temporary price data. Calculated as 90% of purchasers price based on: 2005 import and export prices (total trades (USD) divided by total weight (kg) in biggest economies of the world: EU27, USA, Brasil, China, India, Japan and Russia) from UN Commodity Trade Statistics Database (http://data.un.org/Explorer.aspxDatabase [Accessed 2011.06.20]). Commodity: Waste or scrap, of cast iron
  property carbon content 0
    carbon content on a dry matter basis (reserved; not for manual entry)
  properties: water in wet mass 0 kg, carbon content, fossil 0, water content 0, wet mass 1 kg, carbon content, non-fossil 0, dry mass 1 kg, carbon allocation 0 kg
- iron scrap, unsorted: 0 kg; source European Aluminium Association 2008; CPC 39310: Slag, dross, scalings and other waste from the manufacture of iron or steel; By-product classification Recyclable; pedigree (1,1,1,1,1)
  property price 0.149 EUR2005; name ironScrapAmount_price_EUR2005
    Temporary price data. Calculated as 90% of purchasers price based on: estimated at 85% of sorted scrap
  property carbon content 0
    carbon content on a dry matter basis (reserved; not for manual entry)
  properties: water in wet mass 0 kg, water content 0, carbon content, fossil 0, carbon content, non-fossil 0, dry mass 1 kg, wet mass 1 kg, carbon allocation 0 kg
- aluminium oxide, non-metallurgical: 0 kg; source European Aluminium Association 2008; CPC 41432: Alumina (aluminium oxide), except artificial corundum; By-product classification allocatable product; CAS 1344-28-1; pedigree (1,1,1,1,1)
  property carbon content, non-fossil 0; name C_content_non_fossil
  property price 0.28 EUR2005; name Al2O3Amount_price_EUR2005
    From UN trade database. http://data.un.org/ Import data from the largest economies of the world are used (Brazil, India, USA, China, Japan and EU-27).
  property dry mass 1 kg; name DM
  property water content 0; name water_content
  property wet mass 1 kg; name WM
  property water in wet mass 0 kg; name WWM
  property carbon content, fossil 0; name C_content_fossil
  property carbon content 0
    carbon content on a dry matter basis (reserved; not for manual entry)
  properties: carbon allocation 0 kg
- aluminium, cast alloy: 0 kg; source European Aluminium Association 2008; By-product classification allocatable product; CPC 41431: Unwrought aluminium; pedigree (1,1,1,1,1)
  EcoSpold01Location=RER
  property price 1.3 EUR2005; name castAlloyAmount_price_EUR2005
    Temporary price data. Calculated as 90% of purchasers price based on: Source: London Metal Exchange, Aluminium alloy price for 2005
  property carbon content 0
    carbon content on a dry matter basis (reserved; not for manual entry)
  properties: water in wet mass 0 kg, carbon content, non-fossil 0, water content 0, dry mass 1 kg, carbon content, fossil 0, wet mass 1 kg, carbon allocation 0 kg
- aluminium, wrought alloy: 0 kg; source European Aluminium Association 2008; By-product classification allocatable product; CPC 4153: Semi-finished products of aluminium or aluminium alloys; pedigree (1,1,1,1,1)
  property price 1.44 EUR2005; name secondaryAluminiumOutput_price_EUR2005
    Estimated based on literature values and expert judgement. Aluminium ccast alloys are about 90% of the price of aluminium wrought alloys.
  property carbon content 0
    carbon content on a dry matter basis (reserved; not for manual entry)
  properties: wet mass 1 kg, water content 0, carbon content, fossil 0, water in wet mass 0 kg, carbon content, non-fossil 0, dry mass 1 kg, carbon allocation 0 kg
- copper: 0 kg; source Rentz O. 1999; By-product classification allocatable product; CPC 41413: Refined copper and copper alloys, unwrought; master alloys of copper
  Literature value. Copper uses: Before end-use copper is manufactured into semi fabricated products, such as shapes and ingots (known as 'semis'). These manufacturing processes are subdivided into hot working, cold working and, if necessary, process annealing. Few of the semis are ready for use as such. They more typically travel to first-stage manufacturers, who make metal rods, wire, and casting, and then to component manufacturers who produce such things as motors, valves, and insulated cables The components in turn are incorporated by final-stage manufacturers into a variety of finished products - automobiles, commercial buildings, residential housing, and so forth. These uses account for about 79% of the world-wide consumption of copper.
  property price 5.52 EUR2005
    Literature value (http://www.economist.com/news/business/21576714-mining-industry-has-enriched-chile-its-future-precarious-copper-solution). Average price between 20015 and 2013.
  property carbon content 0
    carbon content on a dry matter basis (reserved; not for manual entry)
  properties: dry mass 1 kg, water in wet mass 0 kg, wet mass 1 kg, carbon content, non-fossil 0, water content 0, carbon content, fossil 0, carbon allocation 0 kg
- zinc concentrate: 0 kg; CPC 14290: Other non-ferrous metal ores and concentrates (other than uranium or thorium ores and concentrates); By-product classification allocatable product
  Calculated value from the knowledge of the properties of both products.
  property price 0.38 EUR2005; name ByP_price_EUR2005
    Temporary price data. Calculated as 90% of purchasers price based on: Zinc content in concentrate 53%. Concentrate price per kg Zn 86.5% of refined Zn price (13.5% treatment charges according to CHR Metals Limited 2005: Dynamic cost curves. http://www.minecost.com/dynamic.pdf). 2004 zinc price from USGS (2007) Mineral commodity summaries 2007. <http://minerals.usgs.gov/minerals/pubs/mcs/2007/mcs2007.pdf> [Accessed 25 May 2010]
  property zinc content 0.53; name zinc_C_zinc_concentrate
    Zinc content on a dry matter basis. Value taken from teh "zinc mine operation" /GLO dataset.
  property dry mass 1 kg; name DM_zinc_concentrate
  property carbon content 0
    carbon content on a dry matter basis (reserved; not for manual entry)
  properties: wet mass 1 kg, water content 0, carbon content, non-fossil 0, carbon content, fossil 0, water in wet mass 0 kg, carbon allocation 0 kg

## Inputs from technosphere
- hydrochloric acid, without water, in 30% solution state: 0 kg; pedigree (1,1,1,1,1)
  Auxilliary inputs for the wastewater treatment stage of the incinerator plant.
  Uncertainty: uncertainty calculated from uncertainty in average HCl input, of transfer coefficients in the incinerator, and the uncertainty of the waste composition of this waste
  properties: wet mass 1 kg, dry mass 1 kg
- cement, unspecified: 0, 0, 0, 0, 0, 0, 0, 0, 0, 0 kg (10 entries); pedigree (1,1,1,1,1)
  Cement required for solidification of landfilled residual material.
  Uncertainty: Uncertainty calculated from uncertainty of the waste composition of this waste, of transfer coefficients in the incinerator and of the solidification recipe.
  properties: wet mass 1 kg, dry mass 1 kg
- titanium dioxide: 0 kg; pedigree (1,1,1,1,1)
  Input to DeNOx stage (TiO2 catalyst carrier)
  Uncertainty: uncertainty calculated from uncertainty in average DeNOx input, uncertainty in the share of thermal NOx, uncertainty of nitrogen content in average municipal waste and the uncertainty in nitrogen content in *this* waste.
  properties: dry mass 1 kg, wet mass 1 kg
- heat, district or industrial, natural gas: 0, 0, 0 MJ (3 entries); pedigree (1,1,1,1,1)
  Input to DeNOx stage, to heat up flue gas in low-dust SCR.
  Uncertainty: uncertainty calculated from uncertainty in average DeNOx input, uncertainty in the share of thermal NOx, uncertainty of nitrogen content in average municipal waste and the uncertainty in nitrogen content in *this* waste.
- aluminium scrap, post-consumer, prepared for melting: 0 kg; pedigree (1,1,1,1,1)
  Aluminium scrap recovered from this waste.
  Uncertainty: uncertainty calculated from uncertainty in waste composition, uncertainty of share of recyclable metal, uncertainty of transfer coefficient to bottom ash, uncertainty of the efficiency of scrap removal in MSWI plant.
  production volume 0 kg
    calculated in proportion to reference product waste input to incinerator
  properties: price 0.806 EUR2005, dry mass 1 kg, wet mass 1 kg
- waste cement, hydrated: 0 kg; pedigree (1,1,1,1,1)
  Hydrated cement output for solidification of landfilled residual material.
  Uncertainty: Uncertainty calculated from uncertainty of the waste composition of this waste and transfer coefficients in the incinerator and of the solidification recipe.
  production volume 0 kg
    calculated in proportion to reference product waste input to incinerator
  properties: dry mass 1 kg, wet mass 1 kg
- iron (III) chloride, without water, in 40% solution state: 0 kg; pedigree (1,1,1,1,1)
  Auxilliary inputs for the wastewater treatment stage of the incinerator plant.
  Uncertainty: uncertainty calculated from uncertainty in average FeCl3 input, of transfer coefficients in the incinerator, and the uncertainty of the waste composition of this waste
  properties: dry mass 1 kg, wet mass 1 kg
- chemical, inorganic: 0 kg; pedigree (1,1,1,1,1)
  Auxilliary inputs for the wastewater treatment stage of the incinerator plant. Proxy for Polyelectrolyte.
  Uncertainty: uncertainty calculated from uncertainty in average Polyelectrolyte input, of transfer coefficients in the incinerator, and the uncertainty of the waste composition of this waste
  properties: wet mass 1 kg, carbon content, fossil 0.003, dry mass 1 kg
- quicklime, milled, packed: 0 kg; pedigree (1,1,1,1,1)
  Auxilliary inputs for the flue gas treatment stage of the incinerator plant.
  Uncertainty: uncertainty calculated from uncertainty in average CaO input, of transfer coefficients in the incinerator, and the uncertainty of the waste composition of this waste
  properties: dry mass 0.99 kg, water content 0.010101, wet mass 1 kg
- process-specific burdens, residual material landfill: 0, 0, 0 kg (3 entries); pedigree (1,1,1,1,1)
  Mass-specific expenditures required for landfilling of incineration residues.
  Uncertainty: uncertainty is calculated from uncertainties in waste composition and transfer coefficients in incinerator
- transport, freight, lorry, unspecified: 0, 0, 0 metric ton*km (3 entries); pedigree (1,1,1,1,1)
  Transport services to transport incineration residues to landfills.
  Uncertainty: uncertainty calculated from uncertainty of the waste composition of this waste, uncertainty of transfer coefficients and the uncertainty in generic transportation distances
- ammonia, liquid: 0 kg; pedigree (1,1,1,1,1)
  Input to DeNOx stage (100% NH3).
  Uncertainty: uncertainty calculated from uncertainty in average DeNOx input, uncertainty in the share of thermal NOx, uncertainty of nitrogen content in average municipal waste and the uncertainty in nitrogen content in *this* waste.
  properties: wet mass 1 kg, dry mass 1 kg
- copper scrap, sorted, pressed: 0 kg; pedigree (1,1,1,1,1)
  Copper scrap recovered from this waste.
  Uncertainty: uncertainty calculated from uncertainty in waste composition, uncertainty of share of recyclable metal, uncertainty of transfer coefficient to bottom ash, uncertainty of the efficiency of scrap removal in MSWI plant.
  production volume 0 kg
    calculated in proportion to reference product waste input to incinerator
  properties: price 2.84 EUR2005, dry mass 1 kg, wet mass 1 kg
- municipal waste incineration facility: 0 unit
  Demands per kilogram waste.
- water, decarbonised: 0, 0, 0, 0, 0, 0, 0, 0, 0, 0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 kg (13 entries); pedigree (1,1,1,1,1)
  Incinerator process water used in flue gas scrubber stage.
  Uncertainty: uncertainty calculated from uncertainty in average water input, and the uncertainty of the waste composition of this waste
  properties: wet mass 1 kg
- chemical, organic: 0 kg; pedigree (1,1,1,1,1)
  Auxilliary inputs for the wastewater treatment stage of the incinerator plant. Proxy for (pure) Trisodium-trimercapto-s-triazine (CAS 17766-26-6), used as 15% diluted solution, aka TMT15.
  Uncertainty: uncertainty calculated from uncertainty in average TMT15 input, of transfer coefficients in the incinerator, and the uncertainty of the waste composition of this waste
  properties: carbon content, fossil 0.628, wet mass 1 kg, dry mass 1 kg
- residual material landfill: 0 unit; pedigree (1,1,1,1,1)
  Landfill infrastructure required for landfilling of incineration residues.
  Uncertainty: uncertainty is calculated from uncertainties in waste composition and transfer coefficients in incinerator
- chromium oxide, flakes: 0 kg; pedigree (1,1,1,1,1)
  Input to DeNOx stage.
  Uncertainty: uncertainty calculated from uncertainty in average DeNOx input, uncertainty in the share of thermal NOx, uncertainty of nitrogen content in average municipal waste and the uncertainty in nitrogen content in *this* waste.
  properties: dry mass 1 kg, wet mass 1 kg
- sodium hydroxide, without water, in 50% solution state: 0.000470184 kg; lognormal variance with pedigree 0.26335, pedigree (1,1,3,1,1)
  Auxilliary inputs for the flue gas treatment stage of the incinerator plant.
  Uncertainty: uncertainty calculated from uncertainty in average NaOH input, of transfer coefficients in the incinerator, and the uncertainty of the waste composition of this waste
  properties: wet mass 1 kg, dry mass 1 kg
- slag landfill: 0 unit; pedigree (1,1,1,1,1)
  Landfill infrastructure required for landfilling of bottom ash.
  Uncertainty: uncertainty is calculated from uncertainties in waste composition and transfer coefficients in incinerator
- process-specific burdens, slag landfill: 0, 0, 0 kg (3 entries); pedigree (1,1,1,1,1)
  Mass-specific expenditures required for landfilling of bottom ash.
  Uncertainty: uncertainty is calculated from uncertainties in waste composition and transfer coefficients in incinerator
- heat, district or industrial, natural gas: 0.00575035 MJ; lognormal variance with pedigree 0.68815, pedigree (1,1,3,1,1)
  (same comment as for heat, district or industrial, natural gas)
- waste cement, hydrated: 0, 0 kg (2 entries); pedigree (1,1,1,1,1)
  (same comment as for waste cement, hydrated)
- acetone, liquid: 0.000254232 kg; lognormal variance with pedigree 0.0527, pedigree (2,4,5,3,1)
  EcoSpold01Location=RER
- hexafluoroethane: 0.000463425 kg; lognormal variance with pedigree 0.0707, pedigree (2,4,5,3,3)
  EcoSpold01Location=GLO
- chemical factory, organics: 8.51813e-12 unit; lognormal variance with pedigree 0.4461, pedigree (5,5,5,3,3)
  EcoSpold01Location=RER
- electricity, medium voltage: 4.25906e-5 kWh; lognormal variance with pedigree 0.096, pedigree (4,5,5,5,3)
  EcoSpold01Location=CN
- silica sand: 0.00386184 kg; lognormal variance with pedigree 0.0527, pedigree (2,4,5,3,1)
  EcoSpold01Location=DE
- fleece, polyethylene: 0.0062047 kg; lognormal variance with pedigree 0.1401, pedigree (5,4,5,3,3)
  EcoSpold01Location=RER
- residue from shredder fraction from manual dismantling: -0.00114398 kg; lognormal variance with pedigree 0.1401, pedigree (5,4,5,3,3)
  EcoSpold01Location=CH
  production volume 0.053942 kg
- polyvinylfluoride: 0.00339837 kg; lognormal variance with pedigree 0.0707, pedigree (2,4,5,3,3)
  EcoSpold01Location=US
- phthalic anhydride: 0.00514901 kg; lognormal variance with pedigree 0.0707, pedigree (2,4,5,3,3)
  EcoSpold01Location=RER
- wastewater, average: -3.80965e-7 m3; lognormal variance with pedigree 0.1301, pedigree (5,4,4,3,1)
  EcoSpold01Location=CH
  production volume 0.00010547 m3
- aluminium, wrought alloy: 0.00173432 kg; lognormal variance with pedigree 0.0101, pedigree (1,4,4,3,1)
  EcoSpold01Location=RER
- lithium manganese oxide: 0.0022513 kg; lognormal variance with pedigree 0.0387, pedigree (2,4,4,3,3)
  EcoSpold01Location=GLO
- latex: 3.5735e-5 kg; lognormal variance with pedigree 0.0387, pedigree (2,4,4,3,3)
  EcoSpold01Location=RER
- water, deionised: 0.000724004 kg; lognormal variance with pedigree 0.0387, pedigree (2,4,4,3,3)
  EcoSpold01Location=CH
- sheet rolling, aluminium: 0.00143185 kg; lognormal variance with pedigree 0.0101, pedigree (1,4,4,3,1)
  EcoSpold01Location=RER
- carbon black: 9.52937e-5 kg; lognormal variance with pedigree 0.0387, pedigree (2,4,4,3,3)
  EcoSpold01Location=GLO
- printed wiring board, mounted mainboard, desktop computer, Pb containing: 1.28626e-6 kg; lognormal variance with pedigree 0.0701, pedigree (1,4,5,3,3)
  EcoSpold01Location=GLO
  Measured Value.
- steel, chromium steel 18/8, hot rolled: 5.66748e-5 kg; lognormal variance with pedigree 0.0701, pedigree (1,4,5,3,3)
  Measured Value.
  EcoSpold01Location=RER
- printed wiring board, surface mounted, unspecified, Pb free: 1.33551e-6 kg; lognormal variance with pedigree 0.0701, pedigree (1,4,5,3,3)
  Measured Value. This original value from production mix has been replaced by 2 flows. Pb-containing has a share of 0.3, Pb-free has a share of 0.7.
- printed wiring board, for surface mounting, Pb containing surface: 3.32698e-8 m2; lognormal variance with pedigree 0.0701, pedigree (1,4,5,3,3)
  Measured Value.
  This original value from production mix has been replaced by 2 flows. Each has 50% share in the production mix.
- disk drive, CD/DVD, ROM, for desktop computer: 8.53073e-6 unit; lognormal variance with pedigree 0.0701, pedigree (1,4,5,3,3)
  EcoSpold01Location=GLO
  Measured Value.
- cable, network cable, category 5, without plugs: 2.5729e-5 m; lognormal variance with pedigree 0.0701, pedigree (1,4,5,3,3)
  EcoSpold01Location=GLO
  Measured Value.
- sheet rolling, steel: 0.00236171 kg; lognormal variance with pedigree 0.0701, pedigree (1,4,5,3,3)
  EcoSpold01Location=RER
  Measured Value.
- acrylonitrile-butadiene-styrene copolymer: 1.23658e-5 kg; lognormal variance with pedigree 0.0701, pedigree (1,4,5,3,3)
  Measured Value.
  EcoSpold01Location=RER
- powder coat, steel: 3.39267e-6 m2; lognormal variance with pedigree 0.0701, pedigree (1,4,5,3,3)
  Measured Value.
  EcoSpold01Location=RER
- steel, low-alloyed, hot rolled: 0.00140436 kg; lognormal variance with pedigree 0.0701, pedigree (1,4,5,3,3)
  EcoSpold01Location=RER
  Measured Value.
- plug, inlet and outlet, for network cable: 9.40759e-6 unit; lognormal variance with pedigree 0.0701, pedigree (1,4,5,3,3)
  EcoSpold01Location=GLO
  Measured Value.
- electricity, medium voltage: 0.00905093 kWh; source Stachura 2006; lognormal variance with pedigree 0.0701, pedigree (1,4,5,3,3)
  EcoSpold01Location=UCTE
  Estimation, based on literature, OGIP basic datasheet and own calculations.
- battery, Li-ion, rechargeable, prismatic: 2.64123e-7 kg; lognormal variance with pedigree 0.0701, pedigree (1,4,5,3,3)
  EcoSpold01Location=GLO
  Measured Value.
- polymer foaming: 1.36492e-6 kg; source Atlantic Consulting 1998; lognormal variance with pedigree 0.0701, pedigree (1,4,5,3,3)
  Literature Value.
  EcoSpold01Location=RER
- aluminium, cast alloy: 0.00140842 kg; lognormal variance with pedigree 0.0701, pedigree (1,4,5,3,3)
  Measured Value.
  EcoSpold01Location=RER
- printed wiring board, surface mounted, unspecified, Pb containing: 5.72362e-7 kg; lognormal variance with pedigree 0.0701, pedigree (1,4,5,3,3)
  (same comment as for printed wiring board, surface mounted, unspecified, Pb free)
- hot rolling, steel: 2.72983e-7 kg; lognormal variance with pedigree 0.0701, pedigree (1,4,5,3,3)
  Measured Value.
  EcoSpold01Location=RER
- power supply unit, for desktop computer: 8.53073e-6 unit; lognormal variance with pedigree 0.0701, pedigree (1,4,5,3,3)
  EcoSpold01Location=CN
  Measured Value.
- integrated circuit, memory type: 1.27961e-7 kg; lognormal variance with pedigree 0.0701, pedigree (1,4,5,3,3)
  EcoSpold01Location=GLO
  Measured Value.
- copper: 5.40276e-5 kg; lognormal variance with pedigree 0.0701, pedigree (1,4,5,3,3)
  EcoSpold01Location=RER
  Measured Value.
- section bar extrusion, aluminium: 3.51373e-6 kg; lognormal variance with pedigree 0.0701, pedigree (1,4,5,3,3)
  Measured Value.
  EcoSpold01Location=RER
- polypropylene, granulate: 0.000360842 kg; source Atlantic Consulting 1998; lognormal variance with pedigree 0.0701, pedigree (1,4,5,3,3)
  EcoSpold01Location=RER
  Measured and literature Value.
  Further references:
  Hewlett Packard (2002) Environmental Profile: Embedded & Personal Systems. Download of 070213 from <http://www.hp.com/hpinfo/globalcitizenship/environment/productdata/edsembedded--.html>.
- hard disk drive, for desktop computer: 8.53073e-6 unit; lognormal variance with pedigree 0.0701, pedigree (1,4,5,3,3)
  Measured Value.
  EcoSpold01Location=GLO
- plug, inlet and outlet, for computer cable: 8.53073e-6 unit; lognormal variance with pedigree 0.0701, pedigree (1,4,5,3,3)
  Measured Value.
  EcoSpold01Location=GLO
- cable, ribbon cable, 20-pin, with plugs: 4.31655e-7 kg; lognormal variance with pedigree 0.0701, pedigree (1,4,5,3,3)
  Measured Value.
  EcoSpold01Location=GLO
- printed wiring board, for surface mounting, Pb free surface: 3.32698e-8 m2; lognormal variance with pedigree 0.0701, pedigree (1,4,5,3,3)
  (same comment as for printed wiring board, for surface mounting, Pb containing surface)
- photovoltaic cell factory: 1.40379e-13 unit; lognormal variance with pedigree 0.3701, pedigree (1,4,5,3,3)
  EcoSpold01Location=DE
  Proxy, due to a lack of data of the infrastructure for the computer production the photovoltaic cell factory was used. It was assumed a life-time of 25 years, and a annual production volume of 3’000’000 pieces.
- cable, connector for computer, without plugs: 2.13268e-5 m; lognormal variance with pedigree 0.0701, pedigree (1,4,5,3,3)
  EcoSpold01Location=GLO
  Measured Value.
- stretch blow moulding: 8.65784e-7 kg; lognormal variance with pedigree 0.0701, pedigree (1,4,5,3,3)
  Measured Value.
  EcoSpold01Location=RER
- tap water: 0.0345115 kg; source Fujitsu L. 2003; lognormal variance with pedigree 0.0701, pedigree (1,4,5,3,3)
  Estimation, based on literature.
  EcoSpold01Location=RER
- polyethylene, high density, granulate: 0.000575867 kg; lognormal variance with pedigree 0.0701, pedigree (1,4,5,3,3)
  Measured Value.
  EcoSpold01Location=RER
- wire drawing, copper: 4.48034e-5 kg; lognormal variance with pedigree 0.0701, pedigree (1,4,5,3,3)
  EcoSpold01Location=RER
  Measured Value.
- used desktop computer: -9.63972e-5 kg; lognormal variance with pedigree 0.0701, pedigree (1,4,5,3,3)
  Measured Value.
  EcoSpold01Location=CH
  production volume 11.3 kg
- corrugated board box: 4.00909e-6, 1.7925e-7, 1.52279e-5 kg (3 entries); source Atlantic Consulting 1998; lognormal variance with pedigree 0.0701, pedigree (1,4,5,3,3)
  Literature Value.
  EcoSpold01Location=RER
- waste polypropylene: -1.3138e-7, -1.01286e-8, -4.18347e-9, -3.9726e-9, -1.51589e-7, -1.69008e-9, -7.66009e-10, -1.06121e-6 kg (8 entries); source Atlantic Consulting 1998; lognormal variance with pedigree 0.0701, pedigree (1,4,5,3,3)
  Literature Value. Disposed of via a municipal incineration plant.
  EcoSpold01Location=CH
  production volume 0.16 kg
- wastewater, unpolluted: -1.21922e-7, -1.51184e-5 m3 (2 entries); source Fujitsu L. 2003; lognormal variance with pedigree 0.0701, pedigree (1,4,5,3,3)
  EcoSpold01Location=CH
  Estimation, based on literature.
  production volume 1.62 m3
- power adapter, for laptop: 8.76864e-7 unit; source von Geibler J. 2003; lognormal variance with pedigree 0.0701, pedigree (1,4,5,3,3)
  Literature Value.
  EcoSpold01Location=GLO
- hard disk drive, for laptop computer: 8.76864e-7 unit; source von Geibler J. 2003; lognormal variance with pedigree 0.0701, pedigree (1,4,5,3,3)
  Literature Value.
  EcoSpold01Location=GLO
- magnesium-alloy, AZ91, diecast: 2.48328e-7 kg; source von Geibler J. 2003; lognormal variance with pedigree 0.0701, pedigree (1,4,5,3,3)
  EcoSpold01Location=RER
  Literature Value.
- magnesium-alloy, AZ91: 2.48328e-7 kg; source von Geibler J. 2003; lognormal variance with pedigree 0.0707, pedigree (2,4,5,3,3)
  EcoSpold01Location=RER
  Literature Value.
- printed wiring board, mounted mainboard, laptop computer, Pb containing: 3.75648e-8 kg; source von Geibler J. 2003; lognormal variance with pedigree 0.0701, pedigree (1,4,5,3,3)
  Literature Value.
  EcoSpold01Location=GLO
- polystyrene foam slab: 7.80409e-8 kg; source von Geibler J. 2003; lognormal variance with pedigree 0.0701, pedigree (1,4,5,3,3)
  EcoSpold01Location=RER
  Literature Value.
- liquid crystal display, unmounted: 2.87611e-7 kg; source von Geibler J. 2003; lognormal variance with pedigree 0.0701, pedigree (1,4,5,3,3)
  Literature Value.
  EcoSpold01Location=GLO
- packaging film, low density polyethylene: 4.472e-8 kg; source von Geibler J. 2003; lognormal variance with pedigree 0.0701, pedigree (1,4,5,3,3)
  Literature Value.
  EcoSpold01Location=RER
- extrusion, plastic pipes: 3.71746e-7 kg; source von Geibler J. 2003; lognormal variance with pedigree 0.0701, pedigree (1,4,5,3,3)
  Literature Value.
  EcoSpold01Location=RER
- disk drive, CD/DVD, ROM, for laptop computer: 8.76864e-7 unit; source von Geibler J. 2003; lognormal variance with pedigree 0.0701, pedigree (1,4,5,3,3)
  EcoSpold01Location=GLO
  Literature Value.
- used laptop computer: -2.73581e-6 kg; lognormal variance with pedigree 0.0701, pedigree (1,4,5,3,3)
  EcoSpold01Location=CH
  Measured Value.
  production volume 3.12 kg
- polystyrene, high impact: 3.71746e-7 kg; source von Geibler J. 2003; lognormal variance with pedigree 0.0701, pedigree (1,4,5,3,3)
  EcoSpold01Location=RER
  Literature Value.
- battery, NiMH, rechargeable, prismatic: 7.01491e-9 kg; source von Geibler J. 2003; lognormal variance with pedigree 0.0701, pedigree (1,4,5,3,3)
  Literature Value.
  EcoSpold01Location=GLO
- sheet rolling, copper: 1.18377e-8 kg; source von Geibler J. 2003; lognormal variance with pedigree 0.0701, pedigree (1,4,5,3,3)
  Literature Value.
  EcoSpold01Location=RER
- waste polystyrene: -7.5118e-9, -5.79116e-10, -2.39195e-10, -2.27138e-10, -8.6673e-9, -9.66322e-11, -4.37976e-11, -6.06759e-8 kg (8 entries); source von Geibler J. 2003; lognormal variance with pedigree 0.0701, pedigree (1,4,5,3,3)
  Literature Value.
  EcoSpold01Location=CH
  production volume 0.089 kg
- waste polyethylene: -4.30451e-9, -3.31853e-10, -1.37067e-10, -1.30158e-10, -4.96665e-9, -5.53735e-11, -2.50975e-11, -3.47693e-8 kg (8 entries); source von Geibler J. 2003; lognormal variance with pedigree 0.0701, pedigree (1,4,5,3,3)
  EcoSpold01Location=CH
  Literature Value.
  production volume 0.051 kg
- used glider, from electric scooter: -0.00241671 kg
  production volume 6.213e7 kg
- polyvinylchloride, suspension polymerised: 3.49487e-5 kg; source M. Leuenberger 2010; lognormal variance with pedigree 0.0466, pedigree (4,3,4,5,3)
  15% of passenger car
  EcoSpold01Location=RER
  Uncertainty: 15% of passenger car
- nickel, 99.5%: 2.82996e-6 kg; source M. Leuenberger 2010; lognormal variance with pedigree 0.1306, pedigree (4,3,5,5,4)
  EcoSpold01Location=GLO
  Weight ratio scooter:passenger car
  Uncertainty: weight ratio scooter:passenger car
- synthetic rubber: 0.000233572 kg; source M. Leuenberger 2010; lognormal variance with pedigree 0.1306, pedigree (4,3,5,5,4)
  EcoSpold01Location=RER
  Weight ratio scooter:passenger car
  Uncertainty: weight ratio scooter:passenger car
- reinforcing steel: 0.0033998 kg; source M. Leuenberger 2010; lognormal variance with pedigree 0.0466, pedigree (4,3,4,5,3)
  5% of passenger car
  EcoSpold01Location=RER
  Uncertainty: 5% of passenger car
- chromium: 4.85124e-6 kg; source M. Leuenberger 2010; lognormal variance with pedigree 0.1306, pedigree (4,3,5,5,4)
  Weight ratio scooter:passenger car
  EcoSpold01Location=RER
  Uncertainty: weight ratio scooter:passenger car
- heat, district or industrial, natural gas: 0.0119194 MJ; source M. Leuenberger 2010; lognormal variance with pedigree 0.0366, pedigree (4,3,4,5,3)
  EcoSpold01Location=RER
  50% of Environmental report Honda, 2008
  Uncertainty: 50% of Environmental report Honda, 2008
- road vehicle factory: 1.74173e-12 unit; source M. Leuenberger 2010; lognormal variance with pedigree 0.4306, pedigree (4,3,5,5,4)
  (same comment as for synthetic rubber)
- injection moulding: 0.000559445 kg; source M. Leuenberger 2010; lognormal variance with pedigree 0.1306, pedigree (4,3,5,5,4)
  All HDPE
  EcoSpold01Location=RER
  Uncertainty: All HDPE
- heat, district or industrial, other than natural gas: 0.00036507 MJ; source M. Leuenberger 2010; lognormal variance with pedigree 0.0366, pedigree (4,3,4,5,3)
  50% of Environmental report Honda, 2008
  EcoSpold01Location=RER
  Uncertainty: 50% of Environmental report Honda, 2008
- section bar rolling, steel: 0.000410357 kg; source M. Leuenberger 2010; lognormal variance with pedigree 0.1306, pedigree (4,3,5,5,4)
  (same comment as for chromium)
- zinc: 1.55912e-5 kg; source M. Leuenberger 2010; lognormal variance with pedigree 0.1306, pedigree (4,3,5,5,4)
  (same comment as for chromium)
- aluminium scrap, new: -3.46714e-5, -0.00025939 kg (2 entries); lognormal variance with pedigree 0.0518, pedigree (2,4,5,4,3)
  Production waste. Waste factors taken from F. Habermacher 2011.
  production volume 1.05621e6 kg
- alkyd paint, white, without solvent, in 60% solution state: 2.18664e-6, 1.03802e-5 kg (2 entries); source M. Leuenberger 2010; lognormal variance with pedigree 0.1306, pedigree (4,3,5,5,4)
  (same comment as for synthetic rubber)
- ethylene, average: 1.28127e-5, 3.88197e-7, 2.41947e-5 kg (3 entries); source M. Leuenberger 2010; lognormal variance with pedigree 0.1306, pedigree (4,3,5,5,4)
  (same comment as for chromium)
- printed wiring board, mounted mainboard, desktop computer, Pb free: 5.48844e-6 kg; source F. Habermacher 2011; lognormal variance with pedigree 0.0424, pedigree (1,3,5,4,2)
  Materialization based on average from literature values.
- light emitting diode: 2.8882e-7 kg; source F. Habermacher 2011; lognormal variance with pedigree 0.0424, pedigree (1,3,5,4,2)
  Materialization based on average from literature values.
- fibre, viscose: 4.76531e-5 kg; source F. Habermacher 2011; lognormal variance with pedigree 0.0424, pedigree (1,3,5,4,2)
  Materialization based on average from literature values.
- tempering, flat glass: 8.66459e-5 kg; source F. Habermacher 2011; lognormal variance with pedigree 0.0424, pedigree (1,3,5,4,2)
  Materialization based on average from literature values.
- lead: 0.000102224 kg; source F. Habermacher 2011; lognormal variance with pedigree 0.0424, pedigree (1,3,5,4,2)
  Materialization based on average from literature values.
- polyethylene terephthalate, granulate, amorphous: 4.03121e-6 kg; source F. Habermacher 2011; lognormal variance with pedigree 0.0424, pedigree (1,3,5,4,2)
  Materialization based on average from literature values.
- glass fibre reinforced plastic, polyester resin, hand lay-up: 1.15447e-6 kg; source F. Habermacher 2011; lognormal variance with pedigree 0.0424, pedigree (1,3,5,4,2)
  Materialization based on average from literature values.
- polyethylene, low density, granulate: 4.03121e-5 kg; source F. Habermacher 2011; lognormal variance with pedigree 0.0424, pedigree (1,3,5,4,2)
  Materialization based on average from literature values.
- used glider, passenger car: -0.00216507 kg; source F. Habermacher 2011
  Materialization based on average from literature values.
  production volume 4.8e10 kg
- magnesium: 1.84225e-6 kg; source F. Habermacher 2011; lognormal variance with pedigree 0.0424, pedigree (1,3,5,4,2)
  Materialization based on average from literature values.
- nylon 6: 2.66538e-6, 5.39705e-6 kg (2 entries); source F. Habermacher 2011; lognormal variance with pedigree 0.0424, pedigree (1,3,5,4,2)
  Materialization based on average from literature values.
- flat glass, uncoated: 1.47958e-5, 7.18501e-5 kg (2 entries); source F. Habermacher 2011; lognormal variance with pedigree 0.0424, pedigree (1,3,5,4,2)
  Materialization based on average from literature values.
- waste plastic, industrial electronics: -1.67553e-7, -1.10908e-5 kg (2 entries); source F. Habermacher 2011; lognormal variance with pedigree 0.0424, pedigree (1,3,5,4,2)
  Scrap fraction from production process.Details in F. Habermacher "Modeling material inventories and environmental impacts of electric passenger cars", Matser Thesis, Department of Environmental Sciences, ETH Zurich, 2011.
  production volume 2.496e8 kg
- coating powder: 1.05001e-5, 2.12614e-5 kg (2 entries); source F. Habermacher 2011; lognormal variance with pedigree 0.0424, pedigree (1,3,5,4,2)
  Materialization based on average from literature values.
- lubricating oil: 9.11919e-6, 4.32909e-5 kg (2 entries); source F. Habermacher 2011; lognormal variance with pedigree 0.0424, pedigree (1,3,5,4,2)
  Materialization based on average from literature values.
- epoxy resin, liquid: 5.5265e-6, 2.6235e-5 kg (2 entries); source F. Habermacher 2011; lognormal variance with pedigree 0.0424, pedigree (1,3,5,4,2)
  Materialization based on average from literature values.
- polyurethane, flexible foam: 1.31658e-5, 6.24999e-5 kg (2 entries); source F. Habermacher 2011; lognormal variance with pedigree 0.0424, pedigree (1,3,5,4,2)
  Materialization based on average from literature values.
- waste plastic, mixture: -2.76568e-6, -2.13218e-7, -8.80665e-8, -8.36274e-8, -3.19111e-6, -3.55779e-8, -1.61253e-8, -2.23395e-5 kg (8 entries); source H.-J. Althaus 2010; lognormal variance with pedigree 0.0504, pedigree (2,3,5,4,3)
  Sum of plastic materials in ICE dataset. The final output has been calculated based on ecoinvent transfer coefficients from weee shredding (ecoinvent report 18, p.21). Details on the materialization of the ICE are given in Althaus and Gauch 2010.
- ethylene glycol: 5.15719e-5 kg; source H.-J. Althaus 2010; lognormal variance with pedigree 0.0444, pedigree (2,4,5,4,2)
  Based on a Volkswagen Golf A4 materialization.
- used internal combustion engine, from passenger car: -0.00202604 kg; source H.-J. Althaus 2010
  production volume 1.65e10 kg
- polyphenylene sulfide: 0.000202604 kg; source H.-J. Althaus 2010; lognormal variance with pedigree 0.0444, pedigree (2,4,5,4,2)
  Based on a Volkswagen Golf A4 materialization.
- platinum: 1.17879e-8 kg; source H.-J. Althaus 2010; lognormal variance with pedigree 0.0444, pedigree (2,4,5,4,2)
  Based on a Volkswagen Golf A4 materialization.
- palladium: 2.21023e-9 kg; source H.-J. Althaus 2010; lognormal variance with pedigree 0.0444, pedigree (2,4,5,4,2)
  Based on a Volkswagen Golf A4 materialization.
- sulfuric acid: 1.09258e-6, 6.27484e-6 kg (2 entries); source H.-J. Althaus 2010; lognormal variance with pedigree 0.0444, pedigree (2,4,5,4,2)
  Based on a Volkswagen Golf A4 materialization.

## Inputs from nature
- Oxygen [natural resource, in air]: 0 kg; pedigree (1,1,1,1,1)
  Oxygen from ambient air needed to combust and oxidise this waste. Net demand, i.e. without O2 leaving the plant in flue gas uncombusted.
  Uncertainty: uncertainty is calculated from uncertainties in waste composition and transfer coefficients to flue gas and soild residues in incinerator

## Emissions to nature
- Dioxins, measured as 2,3,7,8-tetrachlorodibenzo-p-dioxin [air, urban air close to ground]: 0 kg; pedigree (1,1,1,1,1)
  Incomplete combustion product emitted to air.
  Uncertainty: uncertainty calculated from uncertainty in average operation emissions, and the uncertainty of the flue gas volume from this waste.
- COD, Chemical Oxygen Demand [water, ground-, long-term]: 0 kg; pedigree (1,1,1,1,1)
  Long-term emissions from landfilling of incineration residues.
  Uncertainty: uncertainty is calculated from uncertainties in waste composition and transfer coefficients in incinerator and landfills.
- Mercury [water, ground-, long-term]: 0 kg; pedigree (1,1,1,1,1)
  (same comment as for COD, Chemical Oxygen Demand)
- Zinc, ion [water, ground-, long-term]: 0 kg; pedigree (1,1,1,1,1)
  (same comment as for COD, Chemical Oxygen Demand)
- Silicon [water, surface water]: 0 kg; pedigree (1,1,1,1,1)
  Emissions to water from waste composition and transfer coefficients in incinerator and landfills.
  Uncertainty: uncertainty is calculated from uncertainties in waste composition and transfer coefficients in incinerator and landfills
- Particulates, > 2.5 um, and < 10um [air, urban air close to ground]: 0 kg; pedigree (1,1,1,1,1)
  (same comment as for Dioxins, measured as 2,3,7,8-tetrachlorodibenzo-p-dioxin)
- Iron [air, urban air close to ground]: 0 kg; pedigree (1,1,1,1,1)
  Emission to air from waste composition and transfer coefficients.
  Uncertainty: uncertainty is calculated from uncertainties in waste composition and transfer coefficients in incinerator
- Nickel, ion [water, ground-, long-term]: 0 kg; pedigree (1,1,1,1,1)
  (same comment as for COD, Chemical Oxygen Demand)
- Chloride [water, surface water]: 0 kg; pedigree (1,1,1,1,1)
  (same comment as for Silicon)
- Sodium, ion [water, surface water]: 0 kg; pedigree (1,1,1,1,1)
  (same comment as for Silicon)
- Hydrogen chloride [air, urban air close to ground]: 0 kg; pedigree (1,1,1,1,1)
  (same comment as for Iron)
- Nitrate [water, ground-, long-term]: 0 kg; pedigree (1,1,1,1,1)
  (same comment as for COD, Chemical Oxygen Demand)
- Fluoride [water, surface water]: 0 kg; pedigree (1,1,1,1,1)
  (same comment as for Silicon)
- Potassium, ion [water, surface water]: 0 kg; pedigree (1,1,1,1,1)
  (same comment as for Silicon)
- Cobalt [water, ground-, long-term]: 0 kg; pedigree (1,1,1,1,1)
  (same comment as for COD, Chemical Oxygen Demand)
- Carbon monoxide, fossil [air, urban air close to ground]: 0 kg; pedigree (1,1,1,1,1)
  (same comment as for Dioxins, measured as 2,3,7,8-tetrachlorodibenzo-p-dioxin)
- Benzene [air, urban air close to ground]: 0 kg; pedigree (1,1,1,1,1)
  (same comment as for Dioxins, measured as 2,3,7,8-tetrachlorodibenzo-p-dioxin)
- TOC, Total Organic Carbon [water, ground-, long-term]: 0 kg; pedigree (1,1,1,1,1)
  (same comment as for COD, Chemical Oxygen Demand)
- Phosphorus [air, urban air close to ground]: 0 kg; pedigree (1,1,1,1,1)
  (same comment as for Iron)
- Selenium [water, ground-, long-term]: 0 kg; pedigree (1,1,1,1,1)
  (same comment as for COD, Chemical Oxygen Demand)
- Vanadium [air, urban air close to ground]: 0 kg; pedigree (1,1,1,1,1)
  (same comment as for Iron)
- Chromium VI [water, surface water]: 0 kg; pedigree (1,1,1,1,1)
  (same comment as for Silicon)
- Selenium [air, urban air close to ground]: 0 kg; pedigree (1,1,1,1,1)
  (same comment as for Iron)
- Copper, ion [water, surface water]: 0 kg; pedigree (1,1,1,1,1)
  (same comment as for Silicon)
- Strontium [air, urban air close to ground]: 0 kg; pedigree (1,1,1,1,1)
  (same comment as for Iron)
- DOC, Dissolved Organic Carbon [water, ground-, long-term]: 0 kg; pedigree (1,1,1,1,1)
  (same comment as for COD, Chemical Oxygen Demand)
- Sulfur dioxide [air, urban air close to ground]: 0 kg; pedigree (1,1,1,1,1)
  (same comment as for Iron)
- Bromine [air, urban air close to ground]: 0 kg; pedigree (1,1,1,1,1)
  (same comment as for Iron)
- BOD5, Biological Oxygen Demand [water, ground-, long-term]: 0 kg; pedigree (1,1,1,1,1)
  (same comment as for COD, Chemical Oxygen Demand)
- Aluminium [air, urban air close to ground]: 0 kg; pedigree (1,1,1,1,1)
  (same comment as for Iron)
- Selenium [water, surface water]: 0 kg; pedigree (1,1,1,1,1)
  (same comment as for Silicon)
- Manganese [water, ground-, long-term]: 0 kg; pedigree (1,1,1,1,1)
  (same comment as for COD, Chemical Oxygen Demand)
- Tin, ion [water, surface water]: 0 kg; pedigree (1,1,1,1,1)
  (same comment as for Silicon)
- Dinitrogen monoxide [air, urban air close to ground]: 0 kg; pedigree (1,1,1,1,1)
  Nitrogen species emitted to air after DeNOx stage.
  Uncertainty: uncertainty calculated from uncertainty in average N-emissions and uncertainty in the share of thermal NOx and the uncertainty in nitrogen content in *this* waste.
- Molybdenum [air, urban air close to ground]: 0 kg; pedigree (1,1,1,1,1)
  (same comment as for Iron)
- Titanium, ion [water, surface water]: 0 kg; pedigree (1,1,1,1,1)
  (same comment as for Silicon)
- Vanadium, ion [water, surface water]: 0 kg; pedigree (1,1,1,1,1)
  (same comment as for Silicon)
- Molybdenum [water, ground-, long-term]: 0 kg; pedigree (1,1,1,1,1)
  (same comment as for COD, Chemical Oxygen Demand)
- Cadmium, ion [water, ground-, long-term]: 0 kg; pedigree (1,1,1,1,1)
  (same comment as for COD, Chemical Oxygen Demand)
- Water [air, urban air close to ground]: 0 m3; pedigree (1,1,1,1,1)
  Water vapour from waste humidity, hydrogen oxidation and part of the process water.
  Uncertainty: Uncertainty calculated from uncertainty in waste composition, process water input and the uncertainty of fraction to air.
- Methane, fossil [air, urban air close to ground]: 0 kg; pedigree (1,1,1,1,1)
  (same comment as for Dioxins, measured as 2,3,7,8-tetrachlorodibenzo-p-dioxin)
- Strontium [water, surface water]: 0 kg; pedigree (1,1,1,1,1)
  (same comment as for Silicon)
- Benzo(a)pyrene [air, urban air close to ground]: 0 kg; pedigree (1,1,1,1,1)
  (same comment as for Dioxins, measured as 2,3,7,8-tetrachlorodibenzo-p-dioxin)
- Barium [water, surface water]: 0 kg; pedigree (1,1,1,1,1)
  (same comment as for Silicon)
- Arsenic, ion [water, surface water]: 0 kg; pedigree (1,1,1,1,1)
  (same comment as for Silicon)
- Arsenic, ion [water, ground-, long-term]: 0 kg; pedigree (1,1,1,1,1)
  (same comment as for COD, Chemical Oxygen Demand)
- Hydrogen fluoride [air, urban air close to ground]: 0 kg; pedigree (1,1,1,1,1)
  (same comment as for Iron)
- Silver, ion [water, ground-, long-term]: 0 kg; pedigree (1,1,1,1,1)
  (same comment as for COD, Chemical Oxygen Demand)
- Sulfate [water, surface water]: 0 kg; pedigree (1,1,1,1,1)
  (same comment as for Silicon)
- Manganese [water, surface water]: 0 kg; pedigree (1,1,1,1,1)
  (same comment as for Silicon)
- Titanium [air, urban air close to ground]: 0 kg; pedigree (1,1,1,1,1)
  (same comment as for Iron)
- Sulfate [water, ground-, long-term]: 0 kg; pedigree (1,1,1,1,1)
  (same comment as for COD, Chemical Oxygen Demand)
- Silicon [air, urban air close to ground]: 0 kg; pedigree (1,1,1,1,1)
  (same comment as for Iron)
- Barium [air, urban air close to ground]: 0 kg; pedigree (1,1,1,1,1)
  (same comment as for Iron)
- Molybdenum [water, surface water]: 0 kg; pedigree (1,1,1,1,1)
  (same comment as for Silicon)
- Calcium, ion [water, ground-, long-term]: 0 kg; pedigree (1,1,1,1,1)
  (same comment as for COD, Chemical Oxygen Demand)
- Arsenic [air, urban air close to ground]: 0 kg; pedigree (1,1,1,1,1)
  (same comment as for Iron)
- Ammonia [air, urban air close to ground]: 0 kg; pedigree (1,1,1,1,1)
  (same comment as for Dinitrogen monoxide)
- Tin [air, urban air close to ground]: 0 kg; pedigree (1,1,1,1,1)
  (same comment as for Iron)
- Copper, ion [water, ground-, long-term]: 0 kg; pedigree (1,1,1,1,1)
  (same comment as for COD, Chemical Oxygen Demand)
- Bromine [water, ground-, long-term]: 0 kg; pedigree (1,1,1,1,1)
  (same comment as for COD, Chemical Oxygen Demand)
- Nickel, ion [water, surface water]: 0 kg; pedigree (1,1,1,1,1)
  (same comment as for Silicon)
- Antimony [water, surface water]: 0 kg; pedigree (1,1,1,1,1)
  (same comment as for Silicon)
- Carbon dioxide, fossil [air, urban air close to ground]: 0 kg; pedigree (1,1,1,1,1)
  (same comment as for Iron)
- Antimony [water, ground-, long-term]: 0 kg; pedigree (1,1,1,1,1)
  (same comment as for COD, Chemical Oxygen Demand)
- Aluminium [water, surface water]: 0 kg; pedigree (1,1,1,1,1)
  (same comment as for Silicon)
- Benzene, pentachloro- [air, urban air close to ground]: 0 kg; pedigree (1,1,1,1,1)
  (same comment as for Dioxins, measured as 2,3,7,8-tetrachlorodibenzo-p-dioxin)
- Cyanide [air, urban air close to ground]: 0 kg; pedigree (1,1,1,1,1)
  (same comment as for Dinitrogen monoxide)
- Barium [water, ground-, long-term]: 0 kg; pedigree (1,1,1,1,1)
  (same comment as for COD, Chemical Oxygen Demand)
- Chromium [air, urban air close to ground]: 0 kg; pedigree (1,1,1,1,1)
  (same comment as for Iron)
- COD, Chemical Oxygen Demand [water, surface water]: 3.90117e-7 kg; lognormal variance with pedigree 0.030247, pedigree (1,1,3,1,1)
  (same comment as for Silicon)
- Beryllium [water, ground-, long-term]: 0 kg; pedigree (1,1,1,1,1)
  (same comment as for COD, Chemical Oxygen Demand)
- Benzene, hexachloro- [air, urban air close to ground]: 0 kg; pedigree (1,1,1,1,1)
  (same comment as for Dioxins, measured as 2,3,7,8-tetrachlorodibenzo-p-dioxin)
- Strontium [water, ground-, long-term]: 0 kg; pedigree (1,1,1,1,1)
  (same comment as for COD, Chemical Oxygen Demand)
- BOD5, Biological Oxygen Demand [water, surface water]: 5.25573e-8 kg; lognormal variance with pedigree 0.030937, pedigree (1,1,3,1,1)
  (same comment as for Silicon)
- Lead [water, ground-, long-term]: 0 kg; pedigree (1,1,1,1,1)
  (same comment as for COD, Chemical Oxygen Demand)
- Sodium [air, urban air close to ground]: 0 kg; pedigree (1,1,1,1,1)
  (same comment as for Iron)
- Iron, ion [water, surface water]: 0 kg; pedigree (1,1,1,1,1)
  (same comment as for Silicon)
- Potassium [air, urban air close to ground]: 0 kg; pedigree (1,1,1,1,1)
  (same comment as for Iron)
- Chloride [water, ground-, long-term]: 0 kg; pedigree (1,1,1,1,1)
  (same comment as for COD, Chemical Oxygen Demand)
- Water [water, surface water]: 0 m3; pedigree (1,1,1,1,1)
  Process water released to surface water.
  Uncertainty: uncertainty calculated from uncertainty in process water input and the uncertainty of fraction to surface water.
- Lead [air, urban air close to ground]: 0 kg; pedigree (1,1,1,1,1)
  (same comment as for Iron)
- Phosphate [water, surface water]: 2.02139e-9 kg; lognormal variance with pedigree 0.575, pedigree (1,1,3,1,1)
  (same comment as for Silicon)
- Thallium [water, ground-, long-term]: 0 kg; pedigree (1,1,1,1,1)
  (same comment as for COD, Chemical Oxygen Demand)
- Beryllium [water, surface water]: 0 kg; pedigree (1,1,1,1,1)
  (same comment as for Silicon)
- Cobalt [water, surface water]: 0 kg; pedigree (1,1,1,1,1)
  (same comment as for Silicon)
- Vanadium, ion [water, ground-, long-term]: 0 kg; pedigree (1,1,1,1,1)
  (same comment as for COD, Chemical Oxygen Demand)
- Thallium [water, surface water]: 0 kg; pedigree (1,1,1,1,1)
  (same comment as for Silicon)
- Iron, ion [water, ground-, long-term]: 0 kg; pedigree (1,1,1,1,1)
  (same comment as for COD, Chemical Oxygen Demand)
- Phenol, pentachloro- [air, urban air close to ground]: 0 kg; pedigree (1,1,1,1,1)
  (same comment as for Dioxins, measured as 2,3,7,8-tetrachlorodibenzo-p-dioxin)
- Potassium, ion [water, ground-, long-term]: 0 kg; pedigree (1,1,1,1,1)
  (same comment as for COD, Chemical Oxygen Demand)
- Aluminium [water, ground-, long-term]: 0 kg; pedigree (1,1,1,1,1)
  (same comment as for COD, Chemical Oxygen Demand)
- TOC, Total Organic Carbon [water, surface water]: 1.44488e-7 kg; lognormal variance with pedigree 0.030328, pedigree (1,1,3,1,1)
  (same comment as for Silicon)
- Cadmium [air, urban air close to ground]: 0 kg; pedigree (1,1,1,1,1)
  (same comment as for Iron)
- Tin, ion [water, ground-, long-term]: 0 kg; pedigree (1,1,1,1,1)
  (same comment as for COD, Chemical Oxygen Demand)
- Lead [water, surface water]: 0 kg; pedigree (1,1,1,1,1)
  (same comment as for Silicon)
- Calcium, ion [water, surface water]: 0 kg; pedigree (1,1,1,1,1)
  (same comment as for Silicon)
- Toluene [air, urban air close to ground]: 0 kg; pedigree (1,1,1,1,1)
  (same comment as for Dioxins, measured as 2,3,7,8-tetrachlorodibenzo-p-dioxin)
- Particulates, < 2.5 um [air, urban air close to ground]: 0 kg; pedigree (1,1,1,1,1)
  (same comment as for Dioxins, measured as 2,3,7,8-tetrachlorodibenzo-p-dioxin)
- Phosphate [water, ground-, long-term]: 0 kg; pedigree (1,1,1,1,1)
  (same comment as for COD, Chemical Oxygen Demand)
- Heat, waste [water, surface water]: 0 MJ; pedigree (1,1,1,1,1)
  Waste heat generated from heating value of this waste plus any electricity required to process it.
  Uncertainty: uncertainty is calculated from uncertainties in waste composition and uncertainties in energy efficiency and the uncertainty in internal energy demand
- Nickel [air, urban air close to ground]: 0 kg; pedigree (1,1,1,1,1)
  (same comment as for Iron)
- Zinc, ion [water, surface water]: 0 kg; pedigree (1,1,1,1,1)
  (same comment as for Silicon)
- Silicon [water, ground-, long-term]: 0 kg; pedigree (1,1,1,1,1)
  (same comment as for COD, Chemical Oxygen Demand)
- Sodium, ion [water, ground-, long-term]: 0 kg; pedigree (1,1,1,1,1)
  (same comment as for COD, Chemical Oxygen Demand)
- Cadmium, ion [water, surface water]: 0 kg; pedigree (1,1,1,1,1)
  (same comment as for Silicon)
- Chromium, ion [water, surface water]: 0 kg; pedigree (1,1,1,1,1)
  (same comment as for Silicon)
- Zinc [air, urban air close to ground]: 0 kg; pedigree (1,1,1,1,1)
  (same comment as for Iron)
- Mercury [water, surface water]: 0 kg; pedigree (1,1,1,1,1)
  (same comment as for Silicon)
- NMVOC, non-methane volatile organic compounds, unspecified origin [air, urban air close to ground]: 0 kg; pedigree (1,1,1,1,1)
  (same comment as for Dioxins, measured as 2,3,7,8-tetrachlorodibenzo-p-dioxin)
- Titanium, ion [water, ground-, long-term]: 0 kg; pedigree (1,1,1,1,1)
  (same comment as for COD, Chemical Oxygen Demand)
- Antimony [air, urban air close to ground]: 0 kg; pedigree (1,1,1,1,1)
  (same comment as for Iron)
- DOC, Dissolved Organic Carbon [water, surface water]: 1.44488e-7 kg; lognormal variance with pedigree 0.030328, pedigree (1,1,3,1,1)
  (same comment as for Silicon)
- Nitrogen oxides [air, urban air close to ground]: 0 kg; pedigree (1,1,1,1,1)
  Sum of fuel-Nox and thermal-NOx emitted to air after DeNOx stage.
  Uncertainty: uncertainty calculated from uncertainty in average N-emissions and uncertainty in the share of thermal NOx and the uncertainty in nitrogen content in *this* waste.
- Manganese [air, urban air close to ground]: 0 kg; pedigree (1,1,1,1,1)
  (same comment as for Iron)
- Calcium [air, urban air close to ground]: 0 kg; pedigree (1,1,1,1,1)
  (same comment as for Iron)
- Nitrate [water, surface water]: 0 kg; pedigree (1,1,1,1,1)
  (same comment as for Silicon)
- Cobalt [air, urban air close to ground]: 0 kg; pedigree (1,1,1,1,1)
  (same comment as for Iron)
- Copper [air, urban air close to ground]: 0 kg; pedigree (1,1,1,1,1)
  (same comment as for Iron)
- Fluoride [water, ground-, long-term]: 0 kg; pedigree (1,1,1,1,1)
  (same comment as for COD, Chemical Oxygen Demand)
- Bromine [water, surface water]: 0 kg; pedigree (1,1,1,1,1)
  (same comment as for Silicon)
- Mercury [air, urban air close to ground]: 0 kg; pedigree (1,1,1,1,1)
  (same comment as for Iron)
- Silver, ion [water, surface water]: 0 kg; pedigree (1,1,1,1,1)
  (same comment as for Silicon)
- Chromium VI [water, ground-, long-term]: 0 kg; pedigree (1,1,1,1,1)
  (same comment as for COD, Chemical Oxygen Demand)
- Heat, waste [air, urban air close to ground]: 0 MJ; pedigree (1,1,1,1,1)
  (same comment as for Heat, waste)
- Thallium [air, urban air close to ground]: 0 kg; pedigree (1,1,1,1,1)
  (same comment as for Iron)
- Acetone [air, unspecified]: 0.000254232 kg; lognormal variance with pedigree 0.1101, pedigree (4,4,5,3,1)
- Water [water, unspecified]: 1.66794e-5 m3; lognormal variance with pedigree 0.0487, pedigree (2,2,4,1,1)
  Calculated value based on literature values and expert opinion. See comments in the parametres' comment field.
- Water [air, unspecified]: 3.86451e-6 m3; lognormal variance with pedigree 0.0487, pedigree (2,2,4,1,1)
  Value based on literature values and expert opinion. See comments in the parametres' comment field.
- NMVOC, non-methane volatile organic compounds, unspecified origin [air, unspecified]: 2.87293e-5 kg; source M. Leuenberger 2010; lognormal variance with pedigree 0.1306, pedigree (4,3,5,5,4)
  Weight ratio scooter:passenger car
  Uncertainty: weight ratio scooter:passenger car
- COD, Chemical Oxygen Demand [water, unspecified]: 7.65058e-7 kg; source F. Habermacher 2011; lognormal variance with pedigree 0.0452, pedigree (1,4,3,4,2)
  Extrapolated from ecoinvent v2.2 passenger car.
- BOD5, Biological Oxygen Demand [water, unspecified]: 1.03054e-7 kg; source F. Habermacher 2011; lognormal variance with pedigree 0.0832, pedigree (1,4,5,4,2)
  Extrapolated from ecoinvent v2.2 passenger car.
- TOC, Total Organic Carbon [water, unspecified]: 2.83354e-7 kg; lognormal variance with pedigree 0.0452, pedigree (1,4,3,4,2)
  Derived from COD as described in ecoinvent 3 Data Quality Guidelines (p. 49, paragraph 5.9.7). The same Pedigree matrix value as COD has been used.
- DOC, Dissolved Organic Carbon [water, unspecified]: 2.83354e-7 kg; lognormal variance with pedigree 0.0452, pedigree (1,4,3,4,2)
  (same comment as for TOC, Total Organic Carbon)
- Phosphate [water, unspecified]: 3.96372e-9 kg; source F. Habermacher 2011; lognormal variance with pedigree 0.0441, pedigree (1,4,3,3,1)
  Extrapolated from ecoinvent v2.2 passenger car.
