# treatment of inert waste, sanitary landfill

Dataset: EcoSpold 2, unit process
Geography: CH
Time period: 1994-01-01 to 2019-12-31
Technology level: outdated
Classification: ISIC rev.4 ecoinvent: 3821:Treatment and disposal of non-hazardous waste
Classification: EcoSpold01Categories: waste management/sanitary landfill
Tags: ConvertedDataset; Treatment
Scenario: Business-as-Usual
System model: Allocation at the point of substitution
Generated by: Gabor Doka (obsolete)
Published in: Doka G. 2007
Database: ecoinvent
isCopyrightProtected: true
accessRestrictedTo: 1

## General comment
Inventoried waste contains 100% inert material (as cement); .
waste composition (wet, in ppm): H2O 5969.2; O 672760; H 66667; C n.a.; S 4938.4; N n.a.; P 231.96; B n.a.; Cl n.a.; Br n.a.; F n.a.; I n.a.; Ag n.a.; As 3.3957; Ba n.a.; Cd 0.60687; Co 1.7555; Cr 21.386; Cu 3.8614; Hg 0.017115; Mn 189.76; Mo n.a.; Ni 16.464; Pb 29.371; Sb 0.0881; Se n.a.; Sn 1.3293; V 23.132; Zn 80.532; Be n.a.; Sc n.a.; Sr n.a.; Ti n.a.; Tl 0.19256; W n.a.; Si 38427; Fe 10046; Ca 183060; Al 13408; K n.a.; Mg n.a.; Na 4115.3;
Share of carbon in waste that is biogenic 60.4%.
Overall degradability of waste during 100 years: 0%.
[This dataset was already contained in the ecoinvent database version 2. It was not individually updated during the transfer to ecoinvent version 3. Life Cycle Impact Assessment results may still have changed, as they are affected by changes in the supply chain, i.e. in other datasets. This dataset was generated following the ecoinvent quality guidelines for version 2. It may have been subject to central changes described in the ecoinvent version 3 change report (http://www.ecoinvent.org/database/ecoinvent-version-3/reports-of-changes/), and the results of the central updates were reviewed extensively. The changes added e.g. consistent water flows and other information throughout the database. The documentation of this dataset can be found in the ecoinvent reports of version 2, which are still available via the ecoinvent website. The change report linked above covers all central changes that were made during the conversion process.]

## Included activities end
Waste-specific short-term emissions to air via landfill gas incineration and landfill leachate. Burdens from treatment of short-term leachate (0-100a) in wastewater treatment plant (including WWTP sludge disposal in municipal incinerator). Long-term emissions from landfill to groundwater (after base lining failure).

## Geography
Technology encountered in Switzerland in 2000. Landfill includes base seal, leachate collection system, treatment of leachate in municipal wastewater treatment plant.

## Technology
Swiss municipal sanitary landfill for biogenic or untreated municipal waste ('reactive organic landfill'). Landfill gas and leachate collection system. Recultivation and monitoring for 150 years after closure.

## Reference product
- inert waste: -1 kg; CPC 39: Wastes or scraps; By-product classification Waste
  production volume 0 kg
    outdated. Accoridng to EMPA (2015) the total amount of C&D waste that was sent to landfill in Switzerland in 2012 was of 1703 thousand tons. The report cites as a source: “Author’s extrapolations using the data available in (FOEN, 2008)”. The report mentions that all C&D waste is sent to an inert material landfill.
    EMPA, 2015. Nanomaterials in Landfills Module 3: Nanomaterials in Construction Waste. EMPA, Swiss Federal Laboratories for Materials Science and Technology.
    FOEN, 2008. Bauabfälle Hochbau in der Schweiz. Ergebnisse der Studie 2008, in: Wüest&Partner (Ed.). Bundesamt für Umwelt (BAFU), Schweiz.
  property price 0 EUR2005
    Waste products are assigned a price of zero as they are assumed to require further treatment.
  property carbon content 0
    carbon content on a dry matter basis (reserved; not for manual entry)
  properties: water in wet mass 0 kg, wet mass 1 kg, carbon content, fossil 0, carbon content, non-fossil 0, dry mass 1 kg, water content 0, carbon allocation 0 kg

## By-products
- electricity, for reuse in municipal waste incineration only: 0 kWh; CPC 17100: Electrical energy; By-product classification allocatable product; pedigree (1,1,1,1,1)
  Net electricity generated from this waste and used in internal MSWI plant energy redistribution.
  Uncertainty: uncertainty is calculated from uncertainties in waste composition and uncertainties in energy efficiency and the uncertainty in internal energy demand
  property exergy 3.6 MJ; name E_el_prod_MSWI_exergy
    This exergy property is based on the exergy content of the product.
  property true value relation 3.6; name E_el_prod_MSWI_true_value_relation
    property to calculate "true value" from
  property price 0.1 EUR2005; name E_el_prod_MSWI_price_EUR2005
    Estimated to be the same price as in case of electricity, medium voltage.
- heat, for reuse in municipal waste incineration only: 0 MJ; CPC 17300: Steam and hot water; By-product classification allocatable product; pedigree (1,1,1,1,1)
  Net useful heat generated from this waste and used in internal MSWI plant energy redistribution.
  Uncertainty: uncertainty is calculated from uncertainties in waste composition and uncertainties in energy efficiency and the uncertainty in internal energy demand
  property exergy 0.1842 MJ; name E_th_prod_MSWI_exergy
    This exergy property is based on the exergy content of the product.
  property true value relation 0.1842; name E_th_prod_MSWI_true_value_relation
    property to calculate "true value" from
  property price 0.0106 EUR2005; name E_th_prod_MSWI_price_EUR2005
    Average European district heat price from Ecoheatcool and Euroheat 2005-2006, Ecoheat Work package 1: The European heat market. Final report. 10.6 EUR/GJ i s the price of district heat. http://www.solarthermalworld.org/files/Ecoheatcool%20WP1%20Web.pdf?download
- zinc concentrate: 0 kg; CPC 14290: Other non-ferrous metal ores and concentrates (other than uranium or thorium ores and concentrates); By-product classification allocatable product
  Calculated value from the knowledge of the properties of both products.
  property price 0.38 EUR2005; name ByP_price_EUR2005
    Temporary price data. Calculated as 90% of purchasers price based on: Zinc content in concentrate 53%. Concentrate price per kg Zn 86.5% of refined Zn price (13.5% treatment charges according to CHR Metals Limited 2005: Dynamic cost curves. http://www.minecost.com/dynamic.pdf). 2004 zinc price from USGS (2007) Mineral commodity summaries 2007. <http://minerals.usgs.gov/minerals/pubs/mcs/2007/mcs2007.pdf> [Accessed 25 May 2010]
  property zinc content 0.53; name zinc_C_zinc_concentrate
    Zinc content on a dry matter basis. Value taken from teh "zinc mine operation" /GLO dataset.
  property dry mass 1 kg; name DM_zinc_concentrate
  property carbon content 0
    carbon content on a dry matter basis (reserved; not for manual entry)
  properties: wet mass 1 kg, water content 0, carbon content, non-fossil 0, carbon content, fossil 0, water in wet mass 0 kg, carbon allocation 0 kg

## Inputs from technosphere
- waste graphical paper: -3.88e-5 kg; lognormal variance with pedigree 0.2106, pedigree (5,5,5,5,5)
  burden from wastewater treatment of the short-term leachate (0-100a). Uncertainty calculated from unertainty of the waste composition of this waste, uncertainty in waste decomposition and short-term leaching in sanitary landfill
  production volume 0 kg; = Ref('81a13fce-0eeb-4727-87d0-9651ac5424c3', 'ProductionVolume')* (Ref('7e592b4e-0317-40a9-908f-532b1f1c7603')*-1)
    Calculated from the production volume of inert waste, 0% water in proportion to the respective output amounts.
  properties: dry mass 0.888 kg, wet mass 1 kg, water content 0.126126, carbon content, non-fossil 0.454955
- heat, central or small-scale, other than natural gas: 3.2524e-5 MJ; lognormal variance with pedigree 0.2106, pedigree (5,5,5,5,5)
  (same comment as for waste graphical paper)
- sewer grid, 5E9l/year, 110 km: 5.45e-10 km; lognormal variance with pedigree 0.2106, pedigree (5,5,5,5,5)
  (same comment as for waste graphical paper)
- sanitary landfill facility: 5.56e-10 unit; lognormal variance with pedigree 0.04, pedigree (1,1,5,1,1)
  demands per kilogram waste. uncertainty is heeded in the module
  This exchange has an activity link directly to the producing activity because the product is primarily consumed in the same geographical area where it is produced.
- wastewater treatment facility, capacity 5E9l/year: 1.42e-11 unit; lognormal variance with pedigree 0.2106, pedigree (5,5,5,5,5)
  (same comment as for waste graphical paper)
- electricity, low voltage: 7e-5 kWh; lognormal variance with pedigree 0.2106, pedigree (5,5,5,5,5)
  (same comment as for waste graphical paper)
- process-specific burdens, sanitary landfill: 1 kg; lognormal variance with pedigree 0.04, pedigree (1,1,5,1,1)
  demands per kilogram waste. uncertainty is heeded in the module;activityLink introduced to establish a direct link to the corresponding regional supply of this product
- heat, district or industrial, natural gas: 4.4928e-5 MJ; lognormal variance with pedigree 0.2106, pedigree (5,5,5,5,5)
  (same comment as for waste graphical paper)
- waste plastic, mixture: -3.88e-5 kg; lognormal variance with pedigree 0.2106, pedigree (5,5,5,5,5)
  (same comment as for waste graphical paper)
  production volume 0 kg; = Ref('81a13fce-0eeb-4727-87d0-9651ac5424c3', 'ProductionVolume')* (Ref('a276c147-1523-451b-a115-c690795379e5')*-1)
    (same comment as for waste graphical paper)
  properties: dry mass 0.847 kg, carbon content, fossil 0.747344, wet mass 1 kg, water content 0.180638
  note on carbon content, fossil: C content in 1 kg DM was calculated using data in Tab A.2, ecoinvent v2.2 report 13_I

## Emissions to nature
- Chromium VI [water, ground-, long-term]: 9.69e-8 kg; lognormal variance with pedigree 8.49, pedigree (1,1,5,1,1)
  Emissions from long-term leachate (>100a) directly from MSW landfill and indirectly via incineration of treatement sludge from leachate treatement. Uncertainty calculated depending on waste input and uncertainty of long-term transfer coefficents in landfill.
- Vanadium, ion [water, ground-, long-term]: 6.74e-6 kg; lognormal variance with pedigree 1.57, pedigree (1,1,5,1,1)
  (same comment as for Chromium VI)
- Zinc, ion [water, ground-, long-term]: 6.65e-5 kg; lognormal variance with pedigree 1.04, pedigree (1,1,5,1,1)
  (same comment as for Chromium VI)
- Sulfate [water, ground-, long-term]: 0.0138 kg; lognormal variance with pedigree 0.49, pedigree (1,1,5,1,1)
  (same comment as for Chromium VI)
- Phosphate [water, ground-, long-term]: 4.81e-6 kg; lognormal variance with pedigree 7.14, pedigree (1,1,5,1,1)
  (same comment as for Chromium VI)
- Cobalt [water, ground-, long-term]: 1.76e-6 kg; lognormal variance with pedigree 1.53, pedigree (1,1,5,1,1)
  (same comment as for Chromium VI)
- Mercury [water, ground-, long-term]: 1.71e-8 kg; lognormal variance with pedigree 1.96, pedigree (1,1,5,1,1)
  (same comment as for Chromium VI)
- Manganese [water, ground-, long-term]: 0.000186 kg; lognormal variance with pedigree 0.92, pedigree (1,1,5,1,1)
  (same comment as for Chromium VI)
- Sodium, ion [water, ground-, long-term]: 0.00412 kg; lognormal variance with pedigree 0.52, pedigree (1,1,5,1,1)
  (same comment as for Chromium VI)
- Nickel, ion [water, ground-, long-term]: 1.65e-5 kg; lognormal variance with pedigree 1.24, pedigree (1,1,5,1,1)
  (same comment as for Chromium VI)
- Aluminium [water, ground-, long-term]: 0.0134 kg; lognormal variance with pedigree 0.37, pedigree (1,1,5,1,1)
  (same comment as for Chromium VI)
- Silicon [water, ground-, long-term]: 0.000735 kg; lognormal variance with pedigree 4.17, pedigree (1,1,5,1,1)
  (same comment as for Chromium VI)
- Tin, ion [water, ground-, long-term]: 1.33e-6 kg; lognormal variance with pedigree 1.57, pedigree (1,1,5,1,1)
  (same comment as for Chromium VI)
- Antimony [water, ground-, long-term]: 8.84e-9 kg; lognormal variance with pedigree 3.29, pedigree (1,1,5,1,1)
  (same comment as for Chromium VI)
- Hydrogen sulfide [water, ground-, long-term]: 0.00036 kg; lognormal variance with pedigree 0.49, pedigree (1,1,5,1,1)
  (same comment as for Chromium VI)
- Thallium [water, ground-, long-term]: 1.93e-7 kg; lognormal variance with pedigree 1.82, pedigree (1,1,5,1,1)
  (same comment as for Chromium VI)
- Iron, ion [water, ground-, long-term]: 0.000704 kg; lognormal variance with pedigree 2.18, pedigree (1,1,5,1,1)
  (same comment as for Chromium VI)
- Lead [water, ground-, long-term]: 2.94e-5 kg; lognormal variance with pedigree 1.16, pedigree (1,1,5,1,1)
  (same comment as for Chromium VI)
- Calcium, ion [water, ground-, long-term]: 0.183 kg; lognormal variance with pedigree 0.11, pedigree (1,1,5,1,1)
  (same comment as for Chromium VI)
- Cadmium, ion [water, ground-, long-term]: 6.07e-7 kg; lognormal variance with pedigree 1.67, pedigree (1,1,5,1,1)
  (same comment as for Chromium VI)
- Copper, ion [water, ground-, long-term]: 3.86e-6 kg; lognormal variance with pedigree 1.43, pedigree (1,1,5,1,1)
  (same comment as for Chromium VI)
- Arsenic, ion [water, ground-, long-term]: 3.4e-6 kg; lognormal variance with pedigree 1.46, pedigree (1,1,5,1,1)
  (same comment as for Chromium VI)

## Sampling procedure
Landfill model based on observed leachate concentrations in literature. Extrapolated to 60'000 years heeding chemical characteristics. Initial waste composition from various literature sources.

## Extrapolations
This dataset has been extrapolated from year 2000 to the year of the calculation (2019). The uncertainty has been adjusted accordingly.

## Review by Emilia Moreno Ruiz 2015-10-16
PV adjusted

## Review by Niels Jungbluth 2003-07-21
Passed. Calculation for standard deviation 95 of, i.e., infrastructure,
land occupation, transport services or other services can differ from
standard Pedigree approach used in this project and figures obtained by
this procedure.
