# electricity, high voltage, label-certified, production mix

Dataset: EcoSpold 2, unit process, production mix
Geography: CH
Time period: 2011-01-01 to 2019-12-31
Scenario: Business-as-Usual
System model: Allocation at the point of substitution
Generated by: [System]
Database: ecoinvent
isCopyrightProtected: false
accessRestrictedTo: 1

## General comment
The shares of electricity technologies on this market are valid for the year 2017. They have been calculated by the data provider and don't necessarily correspond with the production volumes entered in the undefined datasets of the different electricity producers. The shares have been calculated based on statistics from 2017: Swiss Federal Office of Energy SFOE, Swiss Electricity Statistics 2018; updated on 2019-03-28 (https://www.bfe.admin.ch/bfe/en/home.html). Further information can be found in a report available on ecoQuery, section 'Files'.

## Technology
Electricity from certified sources.
Average technology used to transmit and distribute electricity. Includes underground and overhead lines. Electricity production according to related technology datasets.

Definition of the voltage levels:
- High voltage level above 24 kV (large scale industry)
- Medium voltage level between 1 kV and 24 kV (medium to small scale industry, service sector
and public buildings)
- Low voltage level below 1 kV (Households)

## Reference product
- electricity, high voltage, label-certified: 1 kWh; CPC 17100: Electrical energy; By-product classification allocatable product
  EcoSpold01Location=CH
  production volume 1.07314e10 kWh
  property price 0.101 EUR2005
    Temporary price data. Calculated as 90% of purchasers price based on: 94% of the average price (to account for a 6% loss in transformation and transmission) for electricity for industrial consumersin 2005 (excluded taxes). From IEA. In addition, regarding label-certified electricity, the Swiss government has a market instrument for renewable energy which is calculated as the difference between the market price and the production price. This was started in 2009 and is 0.45 Rp/kWh. Therefore, the production price of label certified energy is assumed to be the supplyer price plus the 0.45Rp/kWh (http://www.bfe.admin.ch/themen/00612/02073/index.html?lang=de).The unit conversion from CH to EUR is based on the ecoinvent unit conversion file (1 CHF2005 = 0.644 EUR2005). As an approximation, this is also used for global electricity production

## Inputs from technosphere
- electricity, high voltage, label-certified: 0 kWh; source IEA 2014; pedigree (1,1,1,1,1)
  Estimation. Compensation for the losses during transmission.
  EcoSpold01Location=CH
- electricity, high voltage, label-certified: 0, 0, 0, 0, 0, 0, 0, 0 kWh (8 entries)
  properties: price 0.101 EUR2005
- electricity, high voltage, label-certified: 0, 0 kWh (2 entries)
  properties: price 0.101 EUR2005, exergy 3.6 MJ
  note on exergy: allocation factor for electricity (=1) vs. heat, where heat is calculated as the termodynamic mean temperature Tm = (Tfeed-Treturn)/ln(Tfeed/Treturn), relative to the application temperature (Tu, typically = 293 K), i.e. (Tm-Tu)/Tm
- electricity, high voltage, label-certified: 0, 0 kWh (2 entries)
  properties: exergy 3.6 MJ, price 0.101 EUR2005
- electricity, high voltage, label-certified: 0.00124722 kWh
  production volume 1.30009e7 kWh
- electricity, high voltage, label-certified: 0.513534 kWh
  production volume 5.35301e9 kWh
- electricity, high voltage, label-certified: 0.452379 kWh
  production volume 4.71554e9 kWh
- electricity, high voltage, label-certified: 0.0104589 kWh
  production volume 1.09022e8 kWh
- electricity, high voltage, label-certified: 0.000607004 kWh
  production volume 6.32733e6 kWh
- electricity, high voltage, label-certified: 0.00393747 kWh
  production volume 4.10437e7 kWh
- electricity, high voltage, label-certified: 0.0178371 kWh
  production volume 1.85931e8 kWh

## Extrapolations
This dataset has been extrapolated from year 2015 to the year of the calculation (2019). The uncertainty has been adjusted accordingly.
