# anaerobic digestion plant construction, agricultural

Dataset: EcoSpold 2, unit process
Geography: CH
Time period: 2000-01-01 to 2019-12-31
Technology level: current
Classification: ISIC rev.4 ecoinvent: 4290:Construction of other civil engineering projects
Classification: EcoSpold01Categories: biomass/fuels
Tags: ConvertedDataset
Scenario: Business-as-Usual
System model: Allocation at the point of substitution
Share of production covered: 100 %
Generated by: Michael Spielmann (obsolete)
Published in: Jungbluth N. 2007
Database: ecoinvent
isCopyrightProtected: true
accessRestrictedTo: 1

## General comment
This dataset refers to a multioutput process and represents the production of the reference product "anaerobic digestion plant, agrcultural", and six co-products: waste reinforced concrete, waste rubber, waste polyvinylchloride, waste polyethylene/polypropylene product, waste wood, and waste polystyrene. Infrastructure is accounted for with a lifetime of 20 years. For stationary machines a lifetime of 10 years is assumed. The dump is 90 m3 and the fermenter (digestion facility) has a capacity of about 300 m3. The digested manure is stored in two storage tanks with a capacity of 410 or 450 m3.
[This dataset was already contained in the ecoinvent database version 2. It was not individually updated during the transfer to ecoinvent version 3. Life Cycle Impact Assessment results may still have changed, as they are affected by changes in the supply chain, i.e. in other datasets. This dataset was generated following the ecoinvent quality guidelines for version 2. It may have been subject to central changes described in the ecoinvent version 3 change report (http://www.ecoinvent.org/database/ecoinvent-version-3/reports-of-changes/), and the results of the central updates were reviewed extensively. The changes added e.g. consistent water flows and other information throughout the database. The documentation of this dataset can be found in the ecoinvent reports of version 2, which are still available via the ecoinvent website. The change report linked above covers all central changes that were made during the conversion process.]

## Included activities start
From the land transformation/occupation and the reception of the construction materials (concrete, polyvinylchloride, synthetic rubber, glued laminated timber, polystyrene, copper, polyethylene, and steel) at the construction place.

## Included activities end
This activity ends with an anaerobic digestion plant constructed. The dataset includes infrastructure for the pre-treatment process, digestion of liquid manure and the successive storage of the digested manure. Disposal of plastic and wood are accounted for.

## Geography
Data represents a Swiss plant.

## Technology
Typical Swiss plant with a concrete fermentation system. The datset is based on data from plants producing biogas in the year 2004. Typical for these plants is that the stock after the fermentation tank is not covered and the methane produced there will escape.
The plant is designed for the digestion of manure of 30 livestock units (LU) cows and 200 pigs (app. 30 LU). In addition, such a plant offers the possibility for the treatment of co-substrates.

## Time period
Data is obtained from a recent LCA study.

## Reference product
- anaerobic digestion plant, agricultural: 1 unit; CPC 53290: Other civil engineering works; By-product classification allocatable product
  Typical Swiss plant with a concrete fermentation system in the year 2004. The plant is designed for the digestion of manure of 30 livestock units (LU) cows and 200 pigs
  (app. 30 LU). In addition, such a plant offers the possibility for the treatment of co-substrates. The pit is 90 m3 and the fermenter (digestion facility) has a capacity of about 300 m3. The lifetime of the plant is assumed to be 20 years.
  EcoSpold01Location=CH
  production volume 0.0336675 unit
    This is a placeholder value that does not reflect real-world production volumes. This dataset does not currently require a real-world production volume to work in the database framework, and no actual data were collected yet. This has no negative effect on the results of the ecoinvent database. The placeholder value of this activity was scaled according to the nominal GDP of 2005 (source: United Nations, http://data.un.org/Glossary.aspx?q=GDP+%28current+US%24%29, accessed 20130726) to reflect an appropriate share of the global production volume, which is also a placeholder value.
  property price 643800 EUR2005
    Convert from EU 27 price to the world by currency exchange rate.
  property true value 643800
    allocation property applied in "true value" allocation // value calculated from revenue

## By-products
- electricity, for reuse in municipal waste incineration only: 0 kWh; CPC 17100: Electrical energy; By-product classification allocatable product; pedigree (1,1,1,1,1)
  Net electricity generated from this waste and used in internal MSWI plant energy redistribution.
  Uncertainty: uncertainty is calculated from uncertainties in waste composition and uncertainties in energy efficiency and the uncertainty in internal energy demand
  production volume 2022.07 kWh
  property price 0.1 EUR2005; name E_el_prod_MSWI_price_EUR2005
    Estimated to be the same price as in case of electricity, medium voltage.
  property exergy 3.6 MJ; name E_el_prod_MSWI_exergy
    This exergy property is based on the exergy content of the product.
  property true value relation 3.6; name E_el_prod_MSWI_true_value_relation
    property to calculate "true value" from
  property true value 260.251
    allocation property applied in "true value" allocation // value calculated from true value relation
- heat, for reuse in municipal waste incineration only: 0 MJ; CPC 17300: Steam and hot water; By-product classification allocatable product; pedigree (1,1,1,1,1)
  Net useful heat generated from this waste and used in internal MSWI plant energy redistribution.
  Uncertainty: uncertainty is calculated from uncertainties in waste composition and uncertainties in energy efficiency and the uncertainty in internal energy demand
  production volume 14458.1 MJ
  property exergy 0.1842 MJ; name E_th_prod_MSWI_exergy
    This exergy property is based on the exergy content of the product.
  property true value relation 0.1842; name E_th_prod_MSWI_true_value_relation
    property to calculate "true value" from
  property price 0.0106 EUR2005; name E_th_prod_MSWI_price_EUR2005
    Average European district heat price from Ecoheatcool and Euroheat 2005-2006, Ecoheat Work package 1: The European heat market. Final report. 10.6 EUR/GJ i s the price of district heat. http://www.solarthermalworld.org/files/Ecoheatcool%20WP1%20Web.pdf?download
  property true value 95.2121
    (same comment as for electricity, for reuse in municipal waste incineration only)
- zinc concentrate: 0 kg; CPC 14290: Other non-ferrous metal ores and concentrates (other than uranium or thorium ores and concentrates); By-product classification allocatable product
  Calculated value from the knowledge of the properties of both products.
  production volume 0.544979 kg
  property price 0.38 EUR2005; name ByP_price_EUR2005
    Temporary price data. Calculated as 90% of purchasers price based on: Zinc content in concentrate 53%. Concentrate price per kg Zn 86.5% of refined Zn price (13.5% treatment charges according to CHR Metals Limited 2005: Dynamic cost curves. http://www.minecost.com/dynamic.pdf). 2004 zinc price from USGS (2007) Mineral commodity summaries 2007. <http://minerals.usgs.gov/minerals/pubs/mcs/2007/mcs2007.pdf> [Accessed 25 May 2010]
  property zinc content 0.53; name zinc_C_zinc_concentrate
    Zinc content on a dry matter basis. Value taken from teh "zinc mine operation" /GLO dataset.
  property dry mass 1 kg; name DM_zinc_concentrate
  property carbon content 0
    carbon content on a dry matter basis (reserved; not for manual entry)
  property true value 0.207092
    allocation property applied in "true value" allocation // value calculated from revenue
  properties: wet mass 1 kg, water content 0, carbon content, non-fossil 0, carbon content, fossil 0, water in wet mass 0 kg, carbon allocation 0 kg
- iron scrap, sorted, pressed: 0 kg; By-product classification Recyclable; CPC 39310: Slag, dross, scalings and other waste from the manufacture of iron or steel; pedigree (1,1,1,1,1)
  Iron scrap recovered from this waste.
  Uncertainty: uncertainty calculated from uncertainty in waste composition, uncertainty of share of recyclable metal, uncertainty of transfer coefficient to bottom ash, uncertainty of the efficiency of scrap removal in MSWI plant.
  production volume 58.131 kg
  property price 0.175 EUR2005
    Temporary price data. Calculated as 90% of purchasers price based on: 2005 import and export prices (total trades (USD) divided by total weight (kg) in biggest economies of the world: EU27, USA, Brasil, China, India, Japan and Russia) from UN Commodity Trade Statistics Database (http://data.un.org/Explorer.aspxDatabase [Accessed 2011.06.20]). Commodity: Waste or scrap, of cast iron
  property carbon content 0
    carbon content on a dry matter basis (reserved; not for manual entry)
  property true value 10.1729
    allocation property applied in "true value" allocation // value calculated from revenue
  properties: wet mass 1 kg, water in wet mass 0 kg, carbon content, non-fossil 0, carbon content, fossil 0, dry mass 1 kg, water content 0, carbon allocation 0 kg

## Inputs from technosphere
All rows: lognormal variance with pedigree 0.054, pedigree (3,4,5,1,1)
- copper: 74.9574 kg
  EcoSpold01Location=RER
  Literature value.
  Uncertainty: literature studies
  properties: wet mass 1 kg, dry mass 1 kg
- waste polyvinylchloride: -49.4719 kg
  Literature value.
  EcoSpold01Location=CH
  Uncertainty: literature studies
  production volume 49.5 kg
    Calculated from the production volume of anaerobic digestion plant, agricultural in proportion to the respective output amounts.
  properties: water content 0.00200401, carbon content, fossil 0.440882, wet mass 1 kg, dry mass 0.998 kg
  note on carbon content, fossil: C content in 1 kg DM was calculated using data in Tab A.1, ecoinvent v2.2 report 13_I
- waste rubber, unspecified: -179.898 kg
  EcoSpold01Location=CH
  Literature value.
  Uncertainty: literature studies
  production volume 180 kg
    (same comment as for waste polyvinylchloride)
  properties: carbon content, fossil 0.853, wet mass 1 kg, dry mass 1 kg
- reinforcing steel: 6476.32 kg
  Literature value.
  EcoSpold01Location=RER
  Uncertainty: literature studies
  properties: carbon content, fossil 0.004, wet mass 1 kg, dry mass 1 kg
- synthetic rubber: 179.898 kg
  Literature value.
  EcoSpold01Location=RER
  Uncertainty: literature studies
  properties: wet mass 1 kg, dry mass 1 kg, carbon content, fossil 0.871949
  note on carbon content, fossil: EPDM (Ethylene-propene-diene terpolymer) rubber is a terpolymer of ethylene, propene, and a diene with the residual unsaturated portion of the diene in the side chain (ecoinvent v2.2 report 7-part XX & Ullmann). Chemical formula (deduced from Evidences of Solvent-Induced Miscibility in Polychloroprene-co-Ethylene-Propene Diene Terpolymer Blends, Dubey et al., Journal of Applied Polymer Science, 2009, 111:1884–1891): C20H35
- polystyrene, high impact: 341.806 kg
  EcoSpold01Location=RER
  Literature value.
  Uncertainty: literature studies
  properties: carbon content, fossil 0.923077, dry mass 1 kg, wet mass 1 kg
  note on carbon content, fossil: Chemical formula of polystyrene is (C8H8)n (ecoinvent v2.2 report 11_II)
- waste wood, untreated: -2740.04 kg
  Literature value.
  EcoSpold01Location=CH
  Uncertainty: literature studies
  production volume 2741.6 kg
    (same comment as for waste polyvinylchloride)
  properties: carbon content, non-fossil 0.48632, water content 0.25, dry mass 0.8 kg, wet mass 1 kg
  note on carbon content, non-fossil: Tab A.4, ecoinvent v2.2 report 13_I. C content has been referred to 1 kg DM,
- concrete, normal: 78.5004 m3
  EcoSpold01Location=CH
  Literature value.
  Uncertainty: literature studies
  properties: water content 0.086758, dry mass 2190 kg, wet mass 2380 kg
- waste polyethylene/polypropylene product: -25.4855 kg
  EcoSpold01Location=CH
  Literature value.
  Uncertainty: literature studies
  production volume 25.5 kg
    (same comment as for waste polyvinylchloride)
  properties: carbon content, fossil 0.748045, water content 0.180638, wet mass 1 kg, dry mass 0.847 kg
  note on carbon content, fossil: Mixed various plastics was used to estimate the C content of this waste (Tab A.2, ecoinvent v2.2 report 13_I)
- waste polystyrene: -341.806 kg
  Literature value.
  EcoSpold01Location=CH
  Uncertainty: literature studies
  production volume 342 kg
    (same comment as for waste polyvinylchloride)
  properties: carbon content, fossil 0.922579, dry mass 0.998 kg, water content 0.00200401, wet mass 1 kg
- polyvinylchloride, emulsion polymerised: 6.31558 kg
  EcoSpold01Location=RER
  Literature value.
  Uncertainty: literature studies
  properties: carbon content, fossil 0.387097, dry mass 1 kg, wet mass 1 kg
  note on carbon content, fossil: Monomer is vynyl chloride, C2H3Cl (ecoinvent v2.2 report 11_II). MW=62 g/mol
- glued laminated timber, for outdoor use: 5.53535 m3
  EcoSpold01Location=RER
  Literature value.
  Uncertainty: literature studies
  properties: water content 0.13, wet mass 430 kg, carbon content, non-fossil 0.478422, dry mass 380.531 kg, carbon content, fossil 0.00982967
  note on carbon content, non-fossil: The laminated timber is composed of wood and glue. The weight of the wood is assumed to be the DM minus 12 kg glue. C content of wood is 0.494 kgC/kg dry wood (ecoinvent v2.2 report 9)
  note on carbon content, fossil: C content of 12 kg Melamine formaldehyde resin (C4H6N6O) used for glueing
- polyvinylchloride, suspension polymerised: 43.1563 kg
  EcoSpold01Location=RER
  Literature value.
  Uncertainty: literature studies
  properties: wet mass 1 kg, dry mass 1 kg, carbon content, fossil 0.387097
- polyethylene, high density, granulate: 25.4855 kg
  Literature value.
  EcoSpold01Location=RER
  Uncertainty: literature studies
  properties: dry mass 1 kg, carbon content, fossil 0.857143, wet mass 1 kg
  note on carbon content, fossil: Polyethylene is formed out of a huge amount of ethylene monomers (C2H4) (ecoinvent v2.2 report 11_II). MW=28 g/mol
- waste reinforced concrete: -179178 kg
  Literature value.
  EcoSpold01Location=CH
  Uncertainty: literature studies
  production volume 179280 kg
    (same comment as for waste polyvinylchloride)
  properties: dry mass 0.99418 kg, wet mass 1 kg, water content 0.00585407
- steel, chromium steel 18/8, hot rolled: 779.557 kg
  Literature value.
  EcoSpold01Location=RER
  Uncertainty: literature studies
  properties: wet mass 1 kg, carbon content, fossil 0.0008, dry mass 1 kg
  note on carbon content, fossil: Stainless steel model is the grade 304 steel (18/8 stainless, 18% chromium 8% nickel; max. 0.08% C)

## Inputs from nature
- Transformation, to industrial area [natural resource, land]: 110.937 m2; lognormal variance with pedigree 0.1726, pedigree (2,4,5,1,1)
  Literature value.
  Uncertainty: literature studies
- Occupation, industrial area [natural resource, land]: 2218.74 m2*year; lognormal variance with pedigree 0.0926, pedigree (2,4,5,1,1)
  Literature value.
  Uncertainty: literature studies
- Transformation, from heterogeneous, agricultural [natural resource, land]: 110.937 m2; lognormal variance with pedigree 0.1726, pedigree (2,4,5,1,1)
  Literature value.
  Uncertainty: literature studies

## Sampling procedure
Literature data

## Review by Emilia Moreno Ruiz 2012-04-24
dataset documented by trainee Macela Valles Lange

## Review by Niels Jungbluth 2009-01-22
Passed.
