# treatment of waste paint, hazardous waste incineration

Dataset: EcoSpold 2, unit process
Geography: CH
Time period: 1997-01-01 to 2019-12-31
Technology level: current
Classification: EcoSpold01Categories: waste management/hazardous waste incineration
Classification: ISIC rev.4 ecoinvent: 3822:Treatment and disposal of hazardous waste
Tags: ConvertedDataset; Treatment
Scenario: Business-as-Usual
System model: Allocation at the point of substitution
Share of production covered: 39 %
Generated by: Gabor Doka (obsolete)
Published in: Doka G. 2008
Database: ecoinvent
isCopyrightProtected: true
accessRestrictedTo: 1

## General comment
Inventoried waste contains 100% paint (remains); .
waste composition (wet, in ppm): upper heating value 10.86 MJ/kg; lower heating value 10.14 MJ/kg; H2O n.a.; O 290300; H 36288; C 651510; S n.a.; N n.a.; P n.a.; B n.a.; Cl 1600; Br n.a.; F n.a.; I n.a.; Ag n.a.; As 2.5; Ba n.a.; Cd 5.0622; Co 388.23; Cr 1040.7; Cu 59; Hg 0.6; Mn n.a.; Mo 38.619; Ni 15; Pb 15246; Sb n.a.; Se n.a.; Sn 256.78; V n.a.; Zn 3251.5; Be n.a.; Sc n.a.; Sr n.a.; Ti n.a.; Tl n.a.; W n.a.; Si n.a.; Fe n.a.; Ca n.a.; Al n.a.; K n.a.; Mg n.a.; Na n.a.;
Share of carbon in waste that is biogenic 0%.
Net energy produced in HWI: 17.11MJ/kg electric energy and 1.27MJ/kg thermal energy
Allocation of energy production: no substitution or expansion. 100% of burden allocated to waste disposal function of HWI.
One kg of this waste produces 0.02958 kg of residues, which are landfilled. Additional solidification with 0.01183 kg of cement.
[This dataset was already contained in the ecoinvent database version 2. It was not individually updated during the transfer to ecoinvent version 3. Life Cycle Impact Assessment results may still have changed, as they are affected by changes in the supply chain, i.e. in other datasets. This dataset was generated following the ecoinvent quality guidelines for version 2. It may have been subject to central changes described in the ecoinvent version 3 change report (http://www.ecoinvent.org/database/ecoinvent-version-3/reports-of-changes/), and the results of the central updates were reviewed extensively. The changes added e.g. consistent water flows and other information throughout the database. The documentation of this dataset can be found in the ecoinvent reports of version 2, which are still available via the ecoinvent website. The change report linked above covers all central changes that were made during the conversion process.]

## Included activities end
waste-specific air and water emissions from incineration, auxiliary material consumption for flue gas cleaning. Short-term emissions to river water and long-term emissions to ground water from residual material landfill (from solidified fly ashes and scrubber slugde). Process energy demands for HWI.

## Geography
Specific to the technology encountered in Switzerland in 2000. Well applicable to modern incineration practices in Europe or North America or Japan.

## Technology
Swiss HWI plant in 2000 with wet flue gas scrubber and low-dust SCR DeNOx facility. Gross thermal efficiency 74.4% and gross electric efficiency 10%.

## Time period
Transfer coefficients for modern Swiss MSWI. Emission speciation based on early 90ies data.

## Reference product
- waste paint: -1 kg; By-product classification Waste; CPC 39: Wastes or scraps
  production volume 1.537e6 kg
    The value is taken from information from Statistique des déchets spéciaux 2013', swiss statistics (http://www.bfs.admin.ch/bfs/portal/fr/index/themen/02/22/lexi.html, accessed 20151009) according to which:
    hazardous incineration 1537000kg
    municipal incineration 4249000kg
  property price 0 EUR2005
    Waste products are assigned a price of zero as they are assumed to require further treatment.
  property carbon content, fossil 0.65
    Tab A.5, ecoinvent v2.2 report 13_I. C content has been calculated after data in the tables, and then referred to 1 kg DM
  property carbon content 0.65
    carbon content on a dry matter basis (reserved; not for manual entry)
  properties: wet mass 1 kg, water in wet mass 0 kg, dry mass 1 kg, water content 0, carbon content, non-fossil 0, carbon allocation 0.65 kg

## Inputs from technosphere
- sodium hydroxide, without water, in 50% solution state: 0.0016997 kg; lognormal variance with pedigree 0.69, pedigree (1,1,5,1,1)
  uncertainty calculated from uncertainty in average auxiliary material input, and the unertainty of the waste composition of this waste
  properties: wet mass 1 kg, dry mass 1 kg
- chemical, inorganic: 0.00016883 kg; lognormal variance with pedigree 0.14, pedigree (1,1,5,1,1)
  Proxy for Polyelectrolyte. uncertainty calculated from uncertainty in average auxiliary material input, and the unertainty of the waste composition of this waste
  properties: dry mass 1 kg, wet mass 1 kg, carbon content, fossil 0.003
  note on carbon content, fossil: This dataset is an unweighted average of 20 inorganic substances (listed in Tab 88.1, ecoinvent v2.2 report 8, part II), being part of the top100 chemicals included in this database. The C-content has also been calculated as an unweighted average of the C content of the substances composing this dataset.
- process-specific burdens, residual material landfill: 0.029577 kg; lognormal variance with pedigree 0.15, pedigree (1,1,5,1,1)
  uncertainty is calculated from uncertainties in waste composition and transfer coefficients in incinerator;activityLink introduced to establish a direct link to the corresponding regional supply of this product
- hazardous waste incineration facility: 1.25e-9 unit; lognormal variance with pedigree 0.04, pedigree (1,1,5,1,1)
  demands per kilogram waste. uncertainty is heeded in the module
  This exchange has an activity link directly to the producing activity because the product is primarily consumed in the same geographical area where it is produced.
- quicklime, milled, packed: 0.00013363 kg; lognormal variance with pedigree 0.69, pedigree (1,1,5,1,1)
  (same comment as for sodium hydroxide, without water, in 50% solution state)
  properties: wet mass 1 kg, water content 0.010101, dry mass 0.99 kg
- heat, central or small-scale, other than natural gas: 12.0884 MJ; lognormal variance with pedigree 0.15, pedigree (1,1,5,1,1)
  Uncertainty dependent on total energy required and heating value present, using experimental GSd for substraction from uc=A*GSDa^2-B
- process-specific burdens, hazardous waste incineration plant: 1 kg; lognormal variance with pedigree 0.04, pedigree (1,1,5,1,1)
  demands per kilogram waste. uncertainty is heeded in the module;activityLink introduced to establish a direct link to the corresponding regional supply of this product
- cement, unspecified: 0.011831 kg; lognormal variance with pedigree 0.16, pedigree (1,1,5,1,1)
  Cement for solidification of landfilled residual material. Uncertainty calculated from unertainty of the waste composition of this waste, of transfer coefficients in the incinerator and of the solidification recipe.
  properties: wet mass 1 kg, dry mass 1 kg
- hydrochloric acid, without water, in 30% solution state: 0.0001013 kg; lognormal variance with pedigree 0.14, pedigree (1,1,5,1,1)
  (same comment as for sodium hydroxide, without water, in 50% solution state)
  properties: wet mass 1 kg, dry mass 1 kg
- chemical, organic: 3.4203e-5 kg; lognormal variance with pedigree 1.35, pedigree (1,1,5,1,1)
  Proxy for TMT15. uncertainty calculated from uncertainty in average auxiliary material input, and the unertainty of the waste composition of this waste
  properties: wet mass 1 kg, dry mass 1 kg, carbon content, fossil 0.628
  note on carbon content, fossil: This dataset is an unweighted average of 20 organic substances (listed in Tab 88.1, ecoinvent v2.2 report 8, part II), being part of the top100 chemicals included in this database. The C-content has also been calculated as an unweighted average of the C content of the substances composing this dataset.
- residual material landfill: 6.1618e-11 unit; lognormal variance with pedigree 0.15, pedigree (1,1,5,1,1)
  uncertainty is calculated from uncertainties in waste composition and transfer coefficients in incinerator
- iron (III) chloride, without water, in 40% solution state: 0.011769 kg; lognormal variance with pedigree 0.29, pedigree (1,1,5,1,1)
  (same comment as for sodium hydroxide, without water, in 50% solution state)
  properties: wet mass 1 kg, dry mass 1 kg
- waste cement, hydrated: -0.029577 kg; lognormal variance with pedigree 0.16, pedigree (1,1,5,1,1)
  Hydrated cement for solidification of landfilled residual material. Uncertainty calculated from unertainty of the waste composition of this waste and transfer coefficients in the incinerator and of the solidification recipe.
  production volume 45459.8 kg; = Ref('57200778-ae19-4186-9e75-1bd3a7e5abed', 'ProductionVolume') *(Ref('37a551f4-2f9b-4b1c-a45c-cabb7bae343a')*-1)
    Calculated from the production volume of waste paint
  properties: dry mass 1 kg, wet mass 1 kg

## Emissions to nature
- Chromium [air, urban air close to ground]: 7.6953e-11 kg; lognormal variance with pedigree 0.79, pedigree (1,1,5,1,1)
  (same comment as for residual material landfill)
- Carbon dioxide, fossil [air, urban air close to ground]: 2.3625 kg; lognormal variance with pedigree 0.05, pedigree (1,1,5,1,1)
  calculated from uncertainty in carbon in waste and transfer coefficients
- Arsenic [air, urban air close to ground]: 2.55e-14 kg; lognormal variance with pedigree 1.61, pedigree (1,1,5,1,1)
  (same comment as for residual material landfill)
- Mercury [air, urban air close to ground]: 2.0722e-14 kg; lognormal variance with pedigree 1.78, pedigree (1,1,5,1,1)
  (same comment as for residual material landfill)
- Molybdenum [air, urban air close to ground]: 7.7239e-8 kg; lognormal variance with pedigree 1.15, pedigree (1,1,5,1,1)
  (same comment as for residual material landfill)
- Arsenic, ion [water, ground-, long-term]: 2.4997e-15 kg; lognormal variance with pedigree 1.51, pedigree (1,1,5,1,1)
  Long-term emissions from landfilling of incineration residues. uncertainty is calculated from uncertainties in waste composition and transfer coefficients in incinerator and landfills.
- Tin, ion [water, ground-, long-term]: 4.8593e-6 kg; lognormal variance with pedigree 4.81, pedigree (1,1,5,1,1)
  (same comment as for Arsenic, ion)
- Chloride [water, ground-, long-term]: 1.9421e-6 kg; lognormal variance with pedigree 0.66, pedigree (1,1,5,1,1)
  (same comment as for Arsenic, ion)
- Lead [water, surface water]: 4.1498e-7 kg; lognormal variance with pedigree 0.72, pedigree (1,1,5,1,1)
  uncertainty is calculated from uncertainties in waste composition and transfer coefficients in incinerator and landfills
- Chromium VI [water, ground-, long-term]: 0.00019699 kg; lognormal variance with pedigree 0.7, pedigree (1,1,5,1,1)
  (same comment as for Arsenic, ion)
- Copper, ion [water, ground-, long-term]: 2.1722e-6 kg; lognormal variance with pedigree 3.72, pedigree (1,1,5,1,1)
  (same comment as for Arsenic, ion)
- Molybdenum [water, surface water]: 3.8365e-5 kg; lognormal variance with pedigree 1.13, pedigree (1,1,5,1,1)
  (same comment as for Lead)
- DOC, Dissolved Organic Carbon [water, ground-, long-term]: 0.004631 kg; lognormal variance with pedigree 0.1, pedigree (1,1,5,1,1)
  (same comment as for Arsenic, ion)
- TOC, Total Organic Carbon [water, ground-, long-term]: 0.004631 kg; lognormal variance with pedigree 0.1, pedigree (1,1,5,1,1)
  (same comment as for Arsenic, ion)
- Chromium VI [water, surface water]: 6.5679e-5 kg; lognormal variance with pedigree 0.81, pedigree (1,1,5,1,1)
  (same comment as for Lead)
- Lead [water, ground-, long-term]: 7.908e-5 kg; lognormal variance with pedigree 7.28, pedigree (1,1,5,1,1)
  (same comment as for Arsenic, ion)
- Cadmium [air, urban air close to ground]: 2.7876e-10 kg; lognormal variance with pedigree 1.44, pedigree (1,1,5,1,1)
  (same comment as for residual material landfill)
- Molybdenum [water, ground-, long-term]: 1.7695e-7 kg; lognormal variance with pedigree 1.15, pedigree (1,1,5,1,1)
  (same comment as for Arsenic, ion)
- Cobalt [water, surface water]: 0.00038796 kg; lognormal variance with pedigree 0.82, pedigree (1,1,5,1,1)
  (same comment as for Lead)
- Cobalt [air, urban air close to ground]: 2.7176e-7 kg; lognormal variance with pedigree 0.84, pedigree (1,1,5,1,1)
  (same comment as for residual material landfill)
- Mercury [water, ground-, long-term]: 2.8025e-8 kg; lognormal variance with pedigree 4.01, pedigree (1,1,5,1,1)
  (same comment as for Arsenic, ion)
- TOC, Total Organic Carbon [water, surface water]: 1.4322e-5 kg; lognormal variance with pedigree 0.35, pedigree (1,1,5,1,1)
  (same comment as for Lead)
- Tin, ion [water, surface water]: 1.1519e-8 kg; lognormal variance with pedigree 1.63, pedigree (1,1,5,1,1)
  (same comment as for Lead)
- Nickel, ion [water, ground-, long-term]: 4.3162e-6 kg; lognormal variance with pedigree 1.51, pedigree (1,1,5,1,1)
  (same comment as for Arsenic, ion)
- Hydrogen chloride [air, urban air close to ground]: 4.9354e-7 kg; lognormal variance with pedigree 0.66, pedigree (1,1,5,1,1)
  (same comment as for residual material landfill)
- Tin [air, urban air close to ground]: 3.4063e-7 kg; lognormal variance with pedigree 0.9, pedigree (1,1,5,1,1)
  (same comment as for residual material landfill)
- COD, Chemical Oxygen Demand [water, ground-, long-term]: 0.010585 kg; lognormal variance with pedigree 0.1, pedigree (1,1,5,1,1)
  (same comment as for Arsenic, ion)
- Nickel, ion [water, surface water]: 3.0747e-6 kg; lognormal variance with pedigree 1.25, pedigree (1,1,5,1,1)
  (same comment as for Lead)
- Carbon monoxide, fossil [air, urban air close to ground]: 1.2076e-5 kg; lognormal variance with pedigree 0.71, pedigree (1,4,5,1,3)
  1 plant for waste solvent incineration in Switzerland
- Mercury [water, surface water]: 6.3263e-9 kg; lognormal variance with pedigree 1.67, pedigree (1,1,5,1,1)
  (same comment as for Lead)
- Lead [air, urban air close to ground]: 5.6593e-7 kg; lognormal variance with pedigree 0.4, pedigree (1,1,5,1,1)
  (same comment as for residual material landfill)
- Zinc, ion [water, ground-, long-term]: 3.9288e-5 kg; lognormal variance with pedigree 5.39, pedigree (1,1,5,1,1)
  (same comment as for Arsenic, ion)
- Chloride [water, surface water]: 0.0015976 kg; lognormal variance with pedigree 0.64, pedigree (1,1,5,1,1)
  (same comment as for Lead)
- Arsenic, ion [water, surface water]: 2.5e-6 kg; lognormal variance with pedigree 1.49, pedigree (1,1,5,1,1)
  (same comment as for Lead)
- Copper, ion [water, surface water]: 2.5347e-6 kg; lognormal variance with pedigree 1.07, pedigree (1,1,5,1,1)
  (same comment as for Lead)
- DOC, Dissolved Organic Carbon [water, surface water]: 1.4322e-5 kg; lognormal variance with pedigree 0.35, pedigree (1,1,5,1,1)
  (same comment as for Lead)
- BOD5, Biological Oxygen Demand [water, surface water]: 3.2737e-5 kg; lognormal variance with pedigree 0.35, pedigree (1,1,5,1,1)
  (same comment as for Lead)
- Zinc [air, urban air close to ground]: 2.276e-6 kg; lognormal variance with pedigree 0.57, pedigree (1,1,5,1,1)
  (same comment as for residual material landfill)
- Cadmium, ion [water, ground-, long-term]: 3.4349e-8 kg; lognormal variance with pedigree 7.63, pedigree (1,1,5,1,1)
  (same comment as for Arsenic, ion)
- Nickel [air, urban air close to ground]: 1.05e-8 kg; lognormal variance with pedigree 1.28, pedigree (1,1,5,1,1)
  (same comment as for residual material landfill)
- Cadmium, ion [water, surface water]: 2.2874e-9 kg; lognormal variance with pedigree 1.36, pedigree (1,1,5,1,1)
  (same comment as for Lead)
- Copper [air, urban air close to ground]: 4.13e-8 kg; lognormal variance with pedigree 1.09, pedigree (1,1,5,1,1)
  (same comment as for residual material landfill)
- BOD5, Biological Oxygen Demand [water, ground-, long-term]: 0.010585 kg; lognormal variance with pedigree 0.1, pedigree (1,1,5,1,1)
  (same comment as for Arsenic, ion)
- COD, Chemical Oxygen Demand [water, surface water]: 3.2737e-5 kg; lognormal variance with pedigree 0.35, pedigree (1,1,5,1,1)
  (same comment as for Lead)
- Zinc, ion [water, surface water]: 4.3635e-5 kg; lognormal variance with pedigree 0.55, pedigree (1,1,5,1,1)
  (same comment as for Lead)

## Sampling procedure
The 2 Swiss HWI plants, used as the inventory reference technology mix, have a total annual capacity of 53'000 tons of hazardous waste. This corresponds to 39% of the Swiss total installed capacity in 2000. Swiss average plants size is 20'000 t/a.

## Extrapolations
This dataset has been extrapolated from year 2000 to the year of the calculation (2019). The uncertainty has been adjusted accordingly.

## Review by Emilia Moreno Ruiz 2015-10-21
PV adjusted

## Review by Niels Jungbluth 2009-01-22
passed.
