# photovoltaic panel production, CIS

Dataset: EcoSpold 2, unit process
Geography: DE
Time period: 1998-01-01 to 2019-12-31
Technology level: current
Classification: ISIC rev.4 ecoinvent: 2610:Manufacture of electronic components and boards
Classification: EcoSpold01Categories: photovoltaic/production of components
Synonyms: Solarmodul; copper indium selenide; CIGS; PV-module; thin film
Tags: ConvertedDataset
Scenario: Business-as-Usual
System model: Allocation at the point of substitution
Share of production covered: 50 %
Generated by: Niels Jungbluth
Published in: Jungbluth, N. 2007
Database: ecoinvent
isCopyrightProtected: true
accessRestrictedTo: 1

## General comment
Production of photovoltaic thin film modules by thermal vaporization in vacuum. The modules produced at Würth Solar have a size of 1.2m by 0.6m. The weight is 12.6kg. The efficiency is 10%. The rated nominal power is about 75-80Wp per module.
[This dataset was already contained in the ecoinvent database version 2. It was not individually updated during the transfer to ecoinvent version 3. Life Cycle Impact Assessment results may still have changed, as they are affected by changes in the supply chain, i.e. in other datasets. This dataset was generated following the ecoinvent quality guidelines for version 2. It may have been subject to central changes described in the ecoinvent version 3 change report (http://www.ecoinvent.org/database/ecoinvent-version-3/reports-of-changes/), and the results of the central updates were reviewed extensively. The changes added e.g. consistent water flows and other information throughout the database. The documentation of this dataset can be found in the ecoinvent reports of version 2, which are still available via the ecoinvent website. The change report linked above covers all central changes that were made during the conversion process.]

## Included activities end
Electricity use, materials, transport of materials, treatment of production wastes. Disposal after end of life. Process emissions not known (except Cd).

## Geography
Data for Würth Solar in Germany.

## Technology
Production technology of thin film CIS cells with thermal vaporization in vacuum.

## Time period
Data refer to 2007. Production in 2006 was ramped up.

## Reference product
- photovoltaic panel, CIS: 1 m2; By-product classification allocatable product; CPC 47150: Diodes, transistors and similar semi-conductor devices; photosensitive semi-conductor devices; light emitting […]
  EcoSpold01Location=DE
  production volume 10033.5 m2
    14.8 MW planned for 2007
    Calculated from GLO production volumes, assuming that Europe produces 36% of panels (info obtained from Fig 8.1, ecoinvent v2 report 6_XII). From information in ecoinvent v2 report 6_XII, laminate were treated as panels.
  property price 244.767 EUR2005
    Calculated based on inputs: The price of the product has been calculated as a sum of the values of the material and energy inputs for this product. This value is therefore a rough estimation. It may underestimate the real price since there are additional expenses when producing any product. These expences can include for example labour costs, treatment of waste materials and profit for the producer. Please consider carefully whether this level of data quality is acceptable for your application.
  property true value 244.767
    allocation property applied in "true value" allocation // value calculated from revenue

## By-products
- heat, for reuse in municipal waste incineration only: 0 MJ; CPC 17300: Steam and hot water; By-product classification allocatable product; pedigree (1,1,1,1,1)
  Net electricity generated from this waste and used in internal MSWI plant energy redistribution.
  Uncertainty: uncertainty is calculated from uncertainties in waste composition and uncertainties in energy efficiency and the uncertainty in internal energy demand
  production volume 3054.63 MJ
  property exergy 0.1842 MJ; name E_th_prod_MSWI_exergy
    This exergy property is based on the exergy content of the product.
  property price 0.0106 EUR2005; name E_th_prod_MSWI_price_EUR2005
    Average European district heat price from Ecoheatcool and Euroheat 2005-2006, Ecoheat Work package 1: The European heat market. Final report. 10.6 EUR/GJ i s the price of district heat. http://www.solarthermalworld.org/files/Ecoheatcool%20WP1%20Web.pdf?download
  property true value relation 0.1842; name E_th_prod_MSWI_true_value_relation
    property to calculate "true value" from
  property true value 0.00199933
    allocation property applied in "true value" allocation // value calculated from true value relation
- electricity, for reuse in municipal waste incineration only: 0 kWh; CPC 17100: Electrical energy; By-product classification allocatable product; pedigree (1,1,1,1,1)
  (same comment as for heat, for reuse in municipal waste incineration only)
  production volume 434.535 kWh
  property price 0.1 EUR2005; name E_el_prod_MSWI_price_EUR2005
    Estimated to be the same price as in case of electricity, medium voltage.
  property exergy 3.6 MJ; name E_el_prod_MSWI_exergy
    This exergy property is based on the exergy content of the product.
  property true value relation 3.6; name E_el_prod_MSWI_true_value_relation
    property to calculate "true value" from
  property true value 0.00555858
    (same comment as for heat, for reuse in municipal waste incineration only)

## Inputs from technosphere
All rows: lognormal variance with pedigree 0.008, pedigree (1,1,4,1,1)
- glass fibre reinforced plastic, polyamide, injection moulded: 0.0399988 kg
  Raugei, literature
  EcoSpold01Location=RER
  Uncertainty: Raugei, literature
  properties: carbon content, fossil 0.446018, dry mass 1 kg, wet mass 1 kg
  note on carbon content, fossil: Polyamide resin assimilate to Nylon 66 (ecoinvent v2.2 report 7_XIII). Nylon 66 is derived from hexamethylene diamine and adipic acid and has the following structure: -(HN-(CH2)6-NH-CO-(CH2)4-CO)n- (ecoinvent v2.2 report 11_II), C12H22N2O2. MW=226 g/mol. Here Nylon 66 is – mainly for improved stiffness and stability – modified with glass fibres. The glass fibre content in the product is assumed of 30%. (ecoinvent v2.2 report 11_II)
- photovoltaic laminate, CIS: 0.999969 m2
  Assumption
  EcoSpold01Location=DE
  Uncertainty: Assumption
- waste plastic, mixture: -0.0399988 kg
  EcoSpold01Location=CH
  Calculation for plastic parts burned after recycling
  Uncertainty: Calculation for plastic parts burned after recycling
  production volume 401.342 kg
    Calculated from the production volume of photovoltaic panel, CIS in proportion to the respective output amounts.
  properties: carbon content, fossil 0.747344, water content 0.180638, wet mass 1 kg, dry mass 0.847 kg
  note on carbon content, fossil: C content in 1 kg DM was calculated using data in Tab A.2, ecoinvent v2.2 report 13_I
- aluminium alloy, AlMg3: 1.56995 kg
  Company information
  EcoSpold01Location=RER
  Uncertainty: company information
  properties: dry mass 1 kg, wet mass 1 kg
- heat, district or industrial, other than natural gas: 10.2597 MJ
  Raugei, literature
  EcoSpold01Location=RER
  Uncertainty: Raugei, literature

## Sampling procedure
Literature data based on producer information.

## Review by Roberto Dones 2007-08-23
Passed.
none
