# treatment of wastewater from ground granulated blast furnace slag production

Dataset: EcoSpold 2, unit process
Geography: RoW
Time period: 2001-01-01 to 2019-12-31
Technology level: current
Classification: ISIC rev.4 ecoinvent: 3700:Sewerage
Scenario: Business-as-Usual
System model: Allocation at the point of substitution
Generated by: Carl Vadenbo
Database: ecoinvent
isCopyrightProtected: true
accessRestrictedTo: 1

## General comment
This dataset represents the treatment of wastewater from gound granulated blast furnace slag production. The dataset currently only transforms the negative reference product 'wastewater from ground granulated blast furnace slag production' into the exchange for wastewater from pig iron production, for which a treatment activity already exists in the database. This simplified modelling approach serves as a rough approximation of the resource use and emissions arising from the wastewater treatment process. [This dataset for treatment of wastewater from gound granulated blast furnace slag production is foreseen to be revised once parameterized datasets for wastewater treatment becomes available in the database.]

## Included activities start
From the reception of wastewater from ground granulated slag production at wastewater treatment plant.

## Included activities end
This activity ends with the transformation of wastewater from ground granulated blast furnace slag into wastewater from pig iron production, for which a treatment activity exists in the database. This activity currently does not include any resource use or emissions arising from the treatment of the wastewater, which are instead approximated by the the treatment of wastewater from pig iron production.

## Reference product
- wastewater from ground granulated blast furnace slag production: -1 m3; name wastewater_input; CPC 39920: Sewage sludge; By-product classification Waste
  Typical pollutant loads of wastewater from blast furnace slag granulation (TO BE IMPLEMENTED AS PROPERTIES OF EXCHANGE). Values are given for each pollutant as average/StDev [g/l]: Pb 2.52/1.10 x10-6; Cr 2.41/1.08 x10-6; Cu 4.06/2.05 x10-6; Zn 20.92/3.62 x10-6; Cd 0.20/0.01 x10-6; Ni 3.74/1.98 x10-6; Fe 0.44/0.61 x10-3; Cl 262.96/57.60 x10-3; AOX 21.63/13.18 x10-6; suspended solid 27.11/42.68 x10-3; DOC 4.70/1.46 x10-3; TOC 5.51/2.06 x10-3; COD 22.17/4.22 x10-3; HC (mineral oil hydrocarbons) 0.15/0.05 x10-3. Data found in EC (European Commission). 2011. Best Available Techniques (BAT) Reference Document for Iron and Steel Production - Draft in Progress (24 June 2011). EC, Joint Research Centre, Seville, Spain. [online] http://eippcb.jrc.es/reference/i&s.html. Assessed in July 2011. Data was based on random sample measurements from single plant in Brehmen (Germany) over the period of March 2000 to November 2006.
  production volume 1.3385e10 m3; name apv_wastewater_GGBFS
    Estimated value. Production volume esitmated based on global production of granulated blast furnace slag (45 million metric tons in 2002) and a specific output of 0.35 m3 wastewater per ton.
  property mass concentration, cadmium 2e-7 kg/m3; name wastewater_input_c_Cd
    Mass concentration of Cadmium. (CAS 007440-43-9)
  property mass concentration, TOC 0.00551 kg/m3; name wastewater_input_c_TOC
    Mass concentration of Total Organic Carbon
  property mass concentration, DOC 0.0047 kg/m3; name wastewater_input_c_DOC
    Mass concentration of Dissolved Organic Carbon
  property price 0 EUR2005; name wastewater_input_price_EUR2005
    Waste products are assigned a price of zero as they are assumed to require further treatment.
  property suspended soilds, mass per volume 0.02711 kg/m3; name wastewater_inpu_wastewater_c_suspsolid_0
    Suspended soilds in wastewater [kg/m3]
  property carbon content, fossil 0.027074
    TOC =0.01216 kg/m3 (Tab A.20, ecoinvent v2.2 report 13_I). TOC was considered as Total Carbon.
  property mass concentration, lead 2.52e-6 kg/m3; name wastewater_input_c_Pb
    Mass concentration of Lead. (CAS 007439-92-1)
  property mass concentration, nickel 3.74e-6 kg/m3; name wastewater_input_c_Ni
    Mass concentration of Nickel. (CAS 007440-02-0)
  property mass concentration, zinc 2.092e-5 kg/m3; name wastewater_input_c_Zn
    Mass concentration of Zinc. (CAS 007440-66-6)
  property mass concentration, chlorine 0.26296 kg/m3; name wastewater_input_c_Cl
    Mass concentration of Chlorine. (CAS 007782-50-5)
  property mass concentration, chromium 2.41e-6 kg/m3; name wastewater_input_c_Cr
    Mass concentration of Chromium. (CAS 007440-47-3)
  property mass concentration, iron 0.00044 kg/m3; name wastewater_input_c_Fe
    Mass concentration of Iron. (CAS 007439-89-6)
  property mass concentration, copper 4.06e-6 kg/m3; name wastewater_input_c_Cu
    Mass concentration of Copper. (CAS 007440-50-8)
  property COD, mass per volume 0.02217 kg/m3; name wastewater_input_c_COD
    Chemical Oxygen Demand as O2
  property carbon content 0.027074
    carbon content on a dry matter basis (reserved; not for manual entry)
  properties: water in wet mass 999.551 kg, dry mass 0.449139 kg, water content 2225.48, wet mass 1000 kg, carbon content, non-fossil 0, carbon allocation 0.01216 kg

## By-products
- electricity, for reuse in municipal waste incineration only: 0 kWh; CPC 17100: Electrical energy; By-product classification allocatable product; pedigree (1,1,1,1,1)
  Net electricity generated from this waste and used in internal MSWI plant energy redistribution.
  Uncertainty: uncertainty is calculated from uncertainties in waste composition and uncertainties in energy efficiency and the uncertainty in internal energy demand
  property exergy 3.6 MJ; name E_el_prod_MSWI_exergy
    This exergy property is based on the exergy content of the product.
  property true value relation 3.6; name E_el_prod_MSWI_true_value_relation
    property to calculate "true value" from
  property price 0.1 EUR2005; name E_el_prod_MSWI_price_EUR2005
    Estimated to be the same price as in case of electricity, medium voltage.
- heat, for reuse in municipal waste incineration only: 0 MJ; CPC 17300: Steam and hot water; By-product classification allocatable product; pedigree (1,1,1,1,1)
  Net useful heat generated from this waste and used in internal MSWI plant energy redistribution.
  Uncertainty: uncertainty is calculated from uncertainties in waste composition and uncertainties in energy efficiency and the uncertainty in internal energy demand
  property true value relation 0.1842; name E_th_prod_MSWI_true_value_relation
    property to calculate "true value" from
  property exergy 0.1842 MJ; name E_th_prod_MSWI_exergy
    This exergy property is based on the exergy content of the product.
  property price 0.0106 EUR2005; name E_th_prod_MSWI_price_EUR2005
    Average European district heat price from Ecoheatcool and Euroheat 2005-2006, Ecoheat Work package 1: The European heat market. Final report. 10.6 EUR/GJ i s the price of district heat. http://www.solarthermalworld.org/files/Ecoheatcool%20WP1%20Web.pdf?download
- zinc concentrate: 0 kg; CPC 14290: Other non-ferrous metal ores and concentrates (other than uranium or thorium ores and concentrates); By-product classification allocatable product
  Calculated value from the knowledge of the properties of both products.
  property price 0.38 EUR2005; name ByP_price_EUR2005
    Temporary price data. Calculated as 90% of purchasers price based on: Zinc content in concentrate 53%. Concentrate price per kg Zn 86.5% of refined Zn price (13.5% treatment charges according to CHR Metals Limited 2005: Dynamic cost curves. http://www.minecost.com/dynamic.pdf). 2004 zinc price from USGS (2007) Mineral commodity summaries 2007. <http://minerals.usgs.gov/minerals/pubs/mcs/2007/mcs2007.pdf> [Accessed 25 May 2010]
  property zinc content 0.53; name zinc_C_zinc_concentrate
    Zinc content on a dry matter basis. Value taken from teh "zinc mine operation" /GLO dataset.
  property dry mass 1 kg; name DM_zinc_concentrate
  property carbon content 0
    carbon content on a dry matter basis (reserved; not for manual entry)
  properties: wet mass 1 kg, water content 0, carbon content, non-fossil 0, carbon content, fossil 0, water in wet mass 0 kg, carbon allocation 0 kg

## Inputs from technosphere
- wastewater from pig iron production: 0 m3
  Conversion of 'wastewater from ground granulated blast furnace slag' to 'wastewater from pig iron production'
  production volume 0 m3
    Calculated from production volume of reference product using the relative outputs.
  properties: carbon content, fossil 1.2149e-5, water content 2962.17, dry mass 0.337476 kg, wet mass 1000 kg
  note on carbon content, fossil: TOC = 0.0000041 kg/m3 (Tab A.19, ecoinvent v2.2 report 13_I). TOC was considered as Total Carbon.
- wastewater from pig iron production: -0.230287, -0.769713 m3 (2 entries)
  (same comment as for wastewater from pig iron production)
  production volume 1.3385e10 m3

## Extrapolations
The treatment of wastewater from the production of ground granulated blast furnace slag was accounted for by transforming this wastewater into wastewater from pig iron production.
