# methane production, 96% by volume, from synthetic gas, wood, fluidised technology

Dataset: EcoSpold 2, unit process
Geography: CH
Time period: 2008-01-01 to 2019-12-31
Technology level: current
Classification: ISIC rev.4 ecoinvent: 3520:Manufacture of gas; distribution of gaseous fuels through mains
Classification: EcoSpold01Categories: biomass/fuels
Scenario: Business-as-Usual
System model: Allocation at the point of substitution
Share of production covered: 0 %
Generated by: Andrea Del Duce
Published in: Andrea Del Duce 2015
Database: ecoinvent
isCopyrightProtected: true
accessRestrictedTo: 1

## General comment
This datasets describes the production of methane from wood. The feedstock is first gasified and then methanised. This dataset describes methane production through a fluidised technology. Gas composition (% mol.) of the gas is 96% CH4 (min.). Density is 0.752 kg/Nm3. Lower heating value of the gas is 34.4 MJ/Nm3. Process heat is supplied by methane combustion. Inventory refers to the net production of 1 Nm3 syngas. Net methane yield is 0.270 Nm3/kg of wood (dry matter) with a conversion efficiency (lower heating value of the methane/lower heating value of the required wood) of around 50%.
This dataset was already contained in the ecoinvent database version 2. It was then updated individually veryfing the original data and transofrmation into a v3 dataset. The fuel characteristics as well as production processes are the same as in the original ecoinvent v2 dataset. The values of the exchanges were updated based on some new scaling calculations where the specific values indicated for the differernt processing steps discussed in the ecoinvent report nr. 17 have been considered instead of the final value originally presented. The changes are minor and concern only a few exchanges.
[This dataset is meant to replace the following datasets:]

## Included activities start
The activity begins with the transport of the wood and other required auxiliaries to the production site.

## Included activities end
This process refers to the conversion of wood chips into synthetic methane (96% vol.) through gasification and subsequent methanation. It includes drying (down to 10-15% moisture) and further comminution of wood chips (down to a size of 30x30x30 mm), FICFB (Fast Internally Circulating Fluidised Bed of the BCL type) gasification of the wood chips, treatment and conditioning of the resulting syngas to remove impurities and contaminants, methanation of the the syngas to methane, and compression of methane to natural gas network pressure (30-70 bar).

## Geography
Data from Paul Scherrer Institut (PSI, Switzerland) and the pilot gasification plant in Güssing (Austria)

## Technology
Gasification technology is FICFB (fast internally circulating fluidized bed of the BCL type). Technology for methanation is developed by PSI.

## Time period
Data mainly from 2004, pilot scale, future technology

## Parameters
- fraction, process water, to air: 0.15 dimensionless; name fraction_PW_to_air; lognormal variance with pedigree 0.092025, pedigree (4,4,3,2,4)
- fraction, tap water, to air: 0.15; name fraction_TW_to_air; lognormal variance with pedigree 0.092025, pedigree (4,4,3,2,4)

## Reference product
- methane, 96% by volume: 1 m3; CPC 17200: Coal gas, water gas, producer gas and similar gases, other than petroleum gases and other gaseous hydrocarbons; By-product classification allocatable product
  EcoSpold01Location=CH
  production volume 586920 m3; name rp_pv
    In 2004, CH syngas production is limited to 2 pilot-scale Fixed bed gasifiers.
    134 m3 per GWh. 1 pilot plant; 0.5 MW. See dataset on synthetic gas factory construction.
  property carbon content, non-fossil 0.695496
    Carbon content calculated from composition of the gas, 96% (in vol) methane, 2% (in vol) CO2 (Tab 13.3, ecoinvent v2.2 report 17). The composition in %vol was converted in % weight using density data of the different gases from tab 19.1, ecoinvent v2.2 report 17, part 19.
  property price 0.144 EUR2005
    Temporary price data. Calculated as 90% of purchasers price based on: Same prices per energy output as natural gas, based on the proportional heating value (55.5 MJ/kg for methane; 54.8 MJ/kg for natural gas)
  property carbon content 0.695496
    carbon content on a dry matter basis (reserved; not for manual entry)
  property true value 0.144
    allocation property applied in "true value" allocation // value calculated from revenue
  properties: water in wet mass 0 kg, carbon content, fossil 0, water content 0, wet mass 0.752 kg, dry mass 0.752 kg, carbon allocation 0.523013 kg

## By-products
- electricity, for reuse in municipal waste incineration only: 0 kWh; CPC 17100: Electrical energy; By-product classification allocatable product; pedigree (1,1,1,1,1)
  Net electricity generated from this waste and used in internal MSWI plant energy redistribution.
  Uncertainty: uncertainty is calculated from uncertainties in waste composition and uncertainties in energy efficiency and the uncertainty in internal energy demand
  production volume 15.348 kWh
  property exergy 3.6 MJ; name E_el_prod_MSWI_exergy
    This exergy property is based on the exergy content of the product.
  property true value relation 3.6; name E_el_prod_MSWI_true_value_relation
    property to calculate "true value" from
  property price 0.1 EUR2005; name E_el_prod_MSWI_price_EUR2005
    Estimated to be the same price as in case of electricity, medium voltage.
  property true value 3.35985e-6
    allocation property applied in "true value" allocation // value calculated from true value relation
- heat, for reuse in municipal waste incineration only: 0 MJ; CPC 17300: Steam and hot water; By-product classification allocatable product; pedigree (1,1,1,1,1)
  Net useful heat generated from this waste and used in internal MSWI plant energy redistribution.
  Uncertainty: uncertainty is calculated from uncertainties in waste composition and uncertainties in energy efficiency and the uncertainty in internal energy demand
  production volume 108.585 MJ
  property true value relation 0.1842; name E_th_prod_MSWI_true_value_relation
    property to calculate "true value" from
  property exergy 0.1842 MJ; name E_th_prod_MSWI_exergy
    This exergy property is based on the exergy content of the product.
  property price 0.0106 EUR2005; name E_th_prod_MSWI_price_EUR2005
    Average European district heat price from Ecoheatcool and Euroheat 2005-2006, Ecoheat Work package 1: The European heat market. Final report. 10.6 EUR/GJ i s the price of district heat. http://www.solarthermalworld.org/files/Ecoheatcool%20WP1%20Web.pdf?download
  property true value 1.21625e-6
    (same comment as for electricity, for reuse in municipal waste incineration only)
- zinc concentrate: 0 kg; CPC 14290: Other non-ferrous metal ores and concentrates (other than uranium or thorium ores and concentrates); By-product classification allocatable product
  Calculated value from the knowledge of the properties of both products.
  production volume 0.00271661 kg
  property price 0.38 EUR2005; name ByP_price_EUR2005
    Temporary price data. Calculated as 90% of purchasers price based on: Zinc content in concentrate 53%. Concentrate price per kg Zn 86.5% of refined Zn price (13.5% treatment charges according to CHR Metals Limited 2005: Dynamic cost curves. http://www.minecost.com/dynamic.pdf). 2004 zinc price from USGS (2007) Mineral commodity summaries 2007. <http://minerals.usgs.gov/minerals/pubs/mcs/2007/mcs2007.pdf> [Accessed 25 May 2010]
  property zinc content 0.53; name zinc_C_zinc_concentrate
    Zinc content on a dry matter basis. Value taken from teh "zinc mine operation" /GLO dataset.
  property dry mass 1 kg; name DM_zinc_concentrate
  property carbon content 0
    carbon content on a dry matter basis (reserved; not for manual entry)
  property true value 1.75886e-9
    allocation property applied in "true value" allocation // value calculated from revenue
  properties: wet mass 1 kg, water content 0, carbon content, non-fossil 0, carbon content, fossil 0, water in wet mass 0 kg, carbon allocation 0 kg

## Inputs from technosphere
All rows: source Jungbluth N. 2007
- silica sand: 0.0494984 kg; lognormal variance with pedigree 0.0128, pedigree (2,4,2,1,1)
  Based on PSI data (Ecogas project) plus calculations. The specific value refers to the specific steps detailed in the ecoinvent v2.2 report nr. 17 and not just to the final value originally presented.
  EcoSpold01Location=DE
  Uncertainty: Based on PSI data (Ecogas project) plus calculations
  properties: dry mass 0.99 kg, wet mass 1 kg, water content 0.010101
- inert waste: -0.178994 kg; name inertwaste_out; lognormal variance with pedigree 0.0128, pedigree (2,4,2,1,1)
  Based on PSI data (Ecogas project) plus calculations, recalculated based on the data in the ecoinvent v2.2 report nr. 17.
  EcoSpold01Location=CH
  Uncertainty: Based on PSI data (Ecogas project) plus calculations
  production volume 105059 kg; = inertwaste_out*rp_pv
    Calculated from the production volume of methane, 96% by volume in proportion to the respective output amounts.The formula multiplies the exchange output with the production volume of the reference product.
  property price 0 EUR2005; name inertwaste_out_price_EUR2005
  properties: wet mass 1 kg, dry mass 1 kg
- waste zeolite: -0.00811974 kg; lognormal variance with pedigree 0.0262, pedigree (4,5,2,1,1)
  Based on PSI data (Ecogas project) plus calculations, recalculated based on the data in the ecoinvent v2.2 report nr. 17.
  production volume 4765.79 kg; = Ref('09d4a00a-fe8f-436d-b10e-9f9353ce8521', 'ProductionVolume') * ((Ref('17891774-43b1-42a6-9126-7c9a8af1fe4c')*-1) / Ref('09d4a00a-fe8f-436d-b10e-9f9353ce8521'))
    Calculated from production volume of reference product using the relative outputs.
  properties: wet mass 1 kg, water content 0.0526316, dry mass 0.95 kg
- tap water: 0.558982 kg; name tap_water_input; lognormal variance with pedigree 0.0128, pedigree (2,4,2,1,1)
  EcoSpold01Location=CH
  Based on PSI data (Ecogas project) plus calculations
  Uncertainty: Based on PSI data (Ecogas project) plus calculations
  properties: wet mass 1 kg, water content 2962.17, carbon content, fossil 0.00178991, dry mass 0.000337476 kg
  note on carbon content, fossil: Bicarbonate content is 2.93 mol/m3. CO2 content is 0.1 mol/m3 (ecoinvent v2.2 report 8, Tab 93.1).
- zeolite, powder: 0.00811974 kg; lognormal variance with pedigree 0.0034, pedigree (2,4,2,1,1)
  Based on PSI data (Ecogas project) plus calculations. The specific value refers to the specific steps detailed in the ecoinvent v2.2 report nr. 17 and not just to the final value originally presented.
  properties: wet mass 1 kg, dry mass 1 kg
- vegetable oil methyl ester: 0.0146215 kg; lognormal variance with pedigree 0.0128, pedigree (2,4,2,1,1)
  Based on PSI data (Ecogas project) plus calculations
  Uncertainty: Based on PSI data (Ecogas project) plus calculations
  properties: dry mass 1 kg, wet mass 1 kg, carbon content, non-fossil 0.732, carbon content, fossil 0.041
- dolomite: 0.0395987 kg; lognormal variance with pedigree 0.0034, pedigree (2,4,2,1,1)
  (same comment as for zeolite, powder)
  properties: dry mass 1 kg, wet mass 1 kg, carbon content, fossil 0.130435
- heat, central or small-scale, other than natural gas: 0.000612981 MJ; lognormal variance with pedigree 0.0128, pedigree (2,4,2,1,1)
  (same comment as for zeolite, powder)
- sodium hydroxide, without water, in 50% solution state: 0.0032299 kg; lognormal variance with pedigree 0.030825, pedigree (3,3,2,2,3)
  Calculation from a typical quality of untreated syngas from wood
  EcoSpold01Location=RER
  Uncertainty: Calculation from a typical quality of untreated syngas from wood
  properties: wet mass 1 kg, dry mass 1 kg
- waste mineral oil: -0.0146215 kg; name wasteoil_out; lognormal variance with pedigree 0.0128, pedigree (2,4,2,1,1)
  (same comment as for tap water)
  production volume 8581.94 kg; = wasteoil_out*rp_pv
    (same comment as for inert waste)
  property price 0 EUR2005; name wasteoil_out_price_EUR2005
  properties: water content 0.111111, carbon content, fossil 0.864444, wet mass 1 kg, dry mass 0.9 kg
  note on carbon content, fossil: Tab A.6, ecoinvent v2.2 report 13_I. C content has been calculated after data in the tables, and then referred to 1 kg DM
- electricity, low voltage: 0.00817464 kWh; lognormal variance with pedigree 0.030825, pedigree (3,3,2,2,3)
  EcoSpold01Location=UCTE
  Calculation, based on 'heat, natural gas, at boiler modulating' (according to heat supply from methane)
  Uncertainty: Calculation, based on 'heat, natural gas, at boiler modulating' (according to heat supply from methane)
- zinc: 0.00186934 kg; lognormal variance with pedigree 0.0128, pedigree (2,4,2,1,1)
  Based on PSI data (Ecogas project) plus calculations
  EcoSpold01Location=RER
  Uncertainty: Based on PSI data (Ecogas project) plus calculations
  properties: wet mass 1 kg, dry mass 1 kg
- wood ash mixture, pure: -0.0349809 kg; name woodash_out; lognormal variance with pedigree 0.0128, pedigree (2,4,2,1,1)
  Based on PSI data (Ecogas project) plus calculations
  EcoSpold01Location=CH
  Uncertainty: Based on PSI data (Ecogas project) plus calculations
  production volume 20531.6 kg; = woodash_out*rp_pv
    (same comment as for inert waste)
  property price 0 EUR2005; name woodash_out_price_EUR2005
  properties: carbon content, non-fossil 0.012, wet mass 1 kg, dry mass 1 kg
- wood chips, wet, measured as dry mass: 2.88716 kg; lognormal variance with pedigree 0.030825, pedigree (3,3,2,2,3)
  Yield based on PSI data (Ecogas project) plus calculations, distribution of wood qualities from IEA Task 33 CH report.
  EcoSpold01Location=RER
  Uncertainty: Yield based on PSI data (Ecogas project) plus calculations, distribution of wood qualities from IEA Task 33 CH report
  properties: water content 1.4, carbon content, non-fossil 0.494, wet mass 2.4 kg, dry mass 1 kg
  note on carbon content, non-fossil: C content of dry mass is 0.494 kgC/kg dry wood (ecoinvent v2.2 report 9).
- aluminium oxide, non-metallurgical: 4.29406e-10 kg; lognormal variance with pedigree 0.0128, pedigree (2,4,2,1,1)
  EcoSpold01Location=RER
  Based on PSI data (Ecogas project) plus calculations
  Uncertainty: Based on PSI data (Ecogas project) plus calculations
  properties: dry mass 1 kg, wet mass 1 kg
- nickel, 99.5%: 4.29406e-10 kg; lognormal variance with pedigree 0.0128, pedigree (2,4,2,1,1)
  Based on PSI data (Ecogas project) plus calculations
  EcoSpold01Location=GLO
  Uncertainty: Based on PSI data (Ecogas project) plus calculations
  properties: dry mass 1 kg, wet mass 1 kg
- charcoal: 0.0198044 kg; lognormal variance with pedigree 0.0128, pedigree (2,4,2,1,1)
  (same comment as for nickel, 99.5%)
  properties: dry mass 1 kg, carbon content, non-fossil 0.8, wet mass 1 kg
- sulfuric acid: 0.0127996 kg; lognormal variance with pedigree 0.030825, pedigree (3,3,2,2,3)
  EcoSpold01Location=RER
  Calculation from a typical quality of untreated syngas from wood
  Uncertainty: Calculation from a typical quality of untreated syngas from wood
  properties: wet mass 1 kg, dry mass 1 kg
- wood chips, dry, measured as dry mass: 0.813974 kg; lognormal variance with pedigree 0.030825, pedigree (3,3,2,2,3)
  EcoSpold01Location=RER
  Yield based on PSI data (Ecogas project) plus calculations, distribution of wood qualities from IEA Task 33 CH report
  Uncertainty: Yield based on PSI data (Ecogas project) plus calculations, distribution of wood qualities from IEA Task 33 CH report
  properties: water content 0.4, carbon content, non-fossil 0.494, wet mass 1.4 kg, dry mass 1 kg
- synthetic gas factory: 2.90211e-9 unit; lognormal variance with pedigree 0.3128, pedigree (2,4,2,1,1)
  Calculation
  EcoSpold01Location=CH
  Uncertainty: Calculation
- industrial furnace, natural gas: 2.06203e-8 unit; lognormal variance with pedigree 0.330825, pedigree (3,3,2,2,3)
  Calculation, based on 'heat, natural gas, at boiler modulating' (according to heat supply from methane)
  EcoSpold01Location=RER
  Uncertainty: Calculation, based on 'heat, natural gas, at boiler modulating' (according to heat supply from methane)
- electricity, medium voltage: 0.828774 kWh; = 0.133+0.0588+0.137+0.5; lognormal variance with pedigree 0.0128, pedigree (2,4,2,1,1)
  EcoSpold01Location=CH
  Based on PSI data (Ecogas project) plus calculations. The specific value refers to the specific steps detailed in the ecoinvent v2.2 report nr. 17 and not just to the final value originally presented.The mathematical relation descibes the sum of the electricity requirements from the various processing steps as derived from the values in the ecoinvent v2.2 report nr. 17.
  Uncertainty: Based on PSI data (Ecogas project) plus calculations
- wastewater, from residence: -0.00107687 m3; name wastewater_out; lognormal variance with pedigree 0.0128, pedigree (2,4,2,1,1)
  (same comment as for wood ash mixture, pure)
  production volume 632.054 m3; = wastewater_out*rp_pv
    Calculated from the production volume of methane, 96% by volume in proportion to the respective output amounts. The formula multiplies the exchange output with the production volume of the reference product.
  property price 0 EUR2005; name wastewater_out_price_EUR2005
  properties: wet mass 1000 kg, dry mass 0.337476 kg, carbon content, non-fossil 0.199421, water content 2962.17
  note on carbon content, non-fossil: 0.0673 kg TOC/m3 (Tab A.17, ecoinvent v2.2 report 13_I). TOC was considered as Total Carbon.

## Emissions to nature
All rows: source Jungbluth N. 2007
- Benzene [air, urban air close to ground]: 2.94581e-6 kg; lognormal variance with pedigree 0.070825, pedigree (3,3,2,2,3)
  Calculation, based on 'heat, natural gas, at boiler modulating' (according to heat supply from methane)
  Uncertainty: Calculation, based on 'heat, natural gas, at boiler modulating' (according to heat supply from methane)
- Carbon dioxide, non-fossil [air, urban air close to ground]: 4.89364 kg; lognormal variance with pedigree 0.011425, pedigree (3,3,2,2,3)
  Calculation, to close carbon balance
  Uncertainty: Calculation, to close carbon balance
- Propionic acid [air, urban air close to ground]: 1.47295e-7 kg; lognormal variance with pedigree 0.070825, pedigree (3,3,2,2,3)
  (same comment as for Benzene)
- Butane [air, urban air close to ground]: 5.15514e-6 kg; lognormal variance with pedigree 0.070825, pedigree (3,3,2,2,3)
  (same comment as for Benzene)
- Dioxins, measured as 2,3,7,8-tetrachlorodibenzo-p-dioxin [air, urban air close to ground]: 0 kg; pedigree (1,1,1,1,1)
  (same comment as for Benzene)
- PAH, polycyclic aromatic hydrocarbons [air, urban air close to ground]: 9.63599e-7 kg; lognormal variance with pedigree 0.330825, pedigree (3,3,2,2,3)
  Calculation, based on 'heat, natural gas, at boiler modulating' (according to heat supply from methane), and PSI data
  Uncertainty: Calculation, based on 'heat, natural gas, at boiler modulating' (according to heat supply from methane), and PSI data
- Acetaldehyde [air, urban air close to ground]: 7.36457e-9 kg; lognormal variance with pedigree 0.070825, pedigree (3,3,2,2,3)
  (same comment as for Benzene)
- Particulates, < 2.5 um [air, urban air close to ground]: 5.45813e-5 kg; lognormal variance with pedigree 0.330825, pedigree (3,3,2,2,3)
  (same comment as for PAH, polycyclic aromatic hydrocarbons)
- Hydrocarbons, aliphatic, alkanes, unspecified [air, urban air close to ground]: 7.36237e-5 kg; lognormal variance with pedigree 0.0528, pedigree (2,4,2,1,1)
  Based on PSI data from the Ecogas project
  Uncertainty: Based on PSI data from the Ecogas project
- Hydrocarbons, aliphatic, unsaturated [air, urban air close to ground]: 0.000250802 kg; lognormal variance with pedigree 0.0528, pedigree (2,4,2,1,1)
  (same comment as for Hydrocarbons, aliphatic, alkanes, unspecified)
- Water [air, unspecified]: 0.00491984 m3; name water_to_air_unspecified; lognormal variance with pedigree 0.0409, pedigree (2,2,2,1,1)
  Calculated value based on literature values and expert opinion. See comments in the parametres' comment field.The dataset is not wtaer balanced. Specific information on the water balance was not found.
  property fraction, origin: unspecified 0; name fraction_origin_unspecified
  property fraction, origin: salt water 0; name fraction_origin_salt_water
  property fraction, origin: fresh water 1; name fraction_origin_fresh_water
- Dinitrogen monoxide [air, urban air close to ground]: 3.68228e-6 kg; lognormal variance with pedigree 0.070825, pedigree (3,3,2,2,3)
  (same comment as for Benzene)
- Methane, non-fossil [air, urban air close to ground]: 1.47295e-5 kg; lognormal variance with pedigree 0.070825, pedigree (3,3,2,2,3)
  (same comment as for Benzene)
- Toluene [air, urban air close to ground]: 1.47295e-6 kg; lognormal variance with pedigree 0.070825, pedigree (3,3,2,2,3)
  (same comment as for Benzene)
- Mercury [air, urban air close to ground]: 2.20933e-10 kg; lognormal variance with pedigree 0.670825, pedigree (3,3,2,2,3)
  (same comment as for Benzene)
- Propane [air, urban air close to ground]: 1.47295e-6 kg; lognormal variance with pedigree 0.070825, pedigree (3,3,2,2,3)
  (same comment as for Benzene)
- Formaldehyde [air, urban air close to ground]: 7.36457e-7 kg; lognormal variance with pedigree 0.070825, pedigree (3,3,2,2,3)
  (same comment as for Benzene)
- Carbon monoxide, non-fossil [air, urban air close to ground]: 0.00342799 kg; lognormal variance with pedigree 0.670825, pedigree (3,3,2,2,3)
  (same comment as for PAH, polycyclic aromatic hydrocarbons)
- Sulfur dioxide [air, urban air close to ground]: 4.05047e-6 kg; lognormal variance with pedigree 0.030825, pedigree (3,3,2,2,3)
  (same comment as for Benzene)
- Benzo(a)pyrene [air, urban air close to ground]: 7.36457e-11 kg; lognormal variance with pedigree 0.330825, pedigree (3,3,2,2,3)
  (same comment as for Benzene)
- Nitrogen oxides [air, urban air close to ground]: 0.00208243 kg; lognormal variance with pedigree 0.070825, pedigree (3,3,2,2,3)
  (same comment as for PAH, polycyclic aromatic hydrocarbons)
- Acetic acid [air, urban air close to ground]: 1.10466e-6 kg; lognormal variance with pedigree 0.070825, pedigree (3,3,2,2,3)
  (same comment as for Benzene)
- Pentane [air, urban air close to ground]: 8.83742e-6 kg; lognormal variance with pedigree 0.070825, pedigree (3,3,2,2,3)
  (same comment as for Benzene)
- NMVOC, non-methane volatile organic compounds, unspecified origin [air, urban air close to ground]: 4.93524e-5 kg; lognormal variance with pedigree 0.0528, pedigree (2,4,2,1,1)
  (same comment as for Hydrocarbons, aliphatic, alkanes, unspecified)

## Sampling procedure
Data from one source, pilot-to-demonstration plant operation data

## Extrapolations
Combustion of methane (for internal process energy use) is extrapolated from the emission profile of natural gas combustion.
