# finishing, textile, knit cotton

Dataset: EcoSpold 2, unit process
Geography: GLO
Time period: 2016-01-01 to 2019-12-31
Technology level: current
Classification: EcoSpold01Categories: textiles/processing
Classification: ISIC rev.4 ecoinvent: 1313:Finishing of textiles
Scenario: Business-as-Usual
System model: Allocation at the point of substitution
Generated by: Mireille Faist Emmenegger
Published in: Cotton Inc 2017
Database: ecoinvent
isCopyrightProtected: true
accessRestrictedTo: 1

## General comment
Data collected from mostly vertically integrated mills on a global level. The activity begins with dyed, knit cotton and ends with cotton finished. The finishing considered is "wet finishing". It includes electricity use and chemicals (softeners, small amounts of water repellents and antimicrobials).
This activity is modelled as a service and does not include the cotton fibres.
It should be used with 1.01 kg of dyed fabric for 1 kg of finished knit fabric.

## Included activities start
The activity begins with dyed, knit cotton.

## Included activities end
This process ends with fabric finished and dryed.The dataset needs to be used with 1.01 kg of fabric

## Geography
Data collected from mostly vertically integrated mills on a global level (Eurasia, East Asia, South/Central Asia, and Latin America).

## Reference product
- finishing, textile, knit cotton: 1 kg; By-product classification allocatable product; CPC 88213: Textile finishing services; pedigree (1,1,1,1,1)
  production volume 3.7685e10 kg; name pv_finishing; = 75370000000/2
    assumption: 50% knit 50% woven Source: The Fibre Year, FAO, own calculations
  property price 0.443758 EUR2005
    Calculated based on inputs: The price of the product has been calculated as a sum of the values of the material and energy inputs for this product. This value is therefore a rough estimation. It may underestimate the real price since there are additional expenses when producing any product. These expences can include for example labour costs, treatment of waste materials and profit for the producer. Please consider carefully whether this level of data quality is acceptable for your application.
  property true value 0.443758
    allocation property applied in "true value" allocation // value calculated from revenue

## By-products
- electricity, for reuse in municipal waste incineration only: 0 kWh; CPC 17100: Electrical energy; By-product classification allocatable product; pedigree (1,1,1,1,1)
  Net electricity generated from this waste and used in internal MSWI plant energy redistribution.
  Uncertainty: uncertainty is calculated from uncertainties in waste composition and uncertainties in energy efficiency and the uncertainty in internal energy demand
  production volume 1.40236e7 kWh
  property exergy 3.6 MJ; name E_el_prod_MSWI_exergy
    This exergy property is based on the exergy content of the product.
  property true value relation 3.6; name E_el_prod_MSWI_true_value_relation
    property to calculate "true value" from
  property price 0.1 EUR2005; name E_el_prod_MSWI_price_EUR2005
    Estimated to be the same price as in case of electricity, medium voltage.
  property true value 1.30511e-5
    allocation property applied in "true value" allocation // value calculated from true value relation
- heat, for reuse in municipal waste incineration only: 0 MJ; CPC 17300: Steam and hot water; By-product classification allocatable product; pedigree (1,1,1,1,1)
  Net useful heat generated from this waste and used in internal MSWI plant energy redistribution.
  Uncertainty: uncertainty is calculated from uncertainties in waste composition and uncertainties in energy efficiency and the uncertainty in internal energy demand
  production volume 9.9686e7 MJ
  property true value relation 0.1842; name E_th_prod_MSWI_true_value_relation
    property to calculate "true value" from
  property exergy 0.1842 MJ; name E_th_prod_MSWI_exergy
    This exergy property is based on the exergy content of the product.
  property price 0.0106 EUR2005; name E_th_prod_MSWI_price_EUR2005
    Average European district heat price from Ecoheatcool and Euroheat 2005-2006, Ecoheat Work package 1: The European heat market. Final report. 10.6 EUR/GJ i s the price of district heat. http://www.solarthermalworld.org/files/Ecoheatcool%20WP1%20Web.pdf?download
  property true value 4.80624e-6
    (same comment as for electricity, for reuse in municipal waste incineration only)
- zinc concentrate: 0 kg; CPC 14290: Other non-ferrous metal ores and concentrates (other than uranium or thorium ores and concentrates); By-product classification allocatable product
  Calculated value from the knowledge of the properties of both products.
  production volume 1815.71 kg
  property price 0.38 EUR2005; name ByP_price_EUR2005
    Temporary price data. Calculated as 90% of purchasers price based on: Zinc content in concentrate 53%. Concentrate price per kg Zn 86.5% of refined Zn price (13.5% treatment charges according to CHR Metals Limited 2005: Dynamic cost curves. http://www.minecost.com/dynamic.pdf). 2004 zinc price from USGS (2007) Mineral commodity summaries 2007. <http://minerals.usgs.gov/minerals/pubs/mcs/2007/mcs2007.pdf> [Accessed 25 May 2010]
  property zinc content 0.53; name zinc_C_zinc_concentrate
    Zinc content on a dry matter basis. Value taken from teh "zinc mine operation" /GLO dataset.
  property dry mass 1 kg; name DM_zinc_concentrate
  property carbon content 0
    carbon content on a dry matter basis (reserved; not for manual entry)
  property true value 1.46471e-10
    allocation property applied in "true value" allocation // value calculated from revenue
  properties: wet mass 1 kg, water content 0, carbon content, non-fossil 0, carbon content, fossil 0, water in wet mass 0 kg, carbon allocation 0 kg

## Inputs from technosphere
- chemical, organic: 0.143624 kg; lognormal variance with pedigree 0.0021, pedigree (2,3,2,3,1)
  properties: carbon content, fossil 0.628, wet mass 1 kg, dry mass 1 kg
  note on carbon content, fossil: This dataset is an unweighted average of 20 organic substances (listed in Tab 88.1, ecoinvent v2.2 report 8, part II), being part of the top100 chemicals included in this database. The C-content has also been calculated as an unweighted average of the C content of the substances composing this dataset.
- acetic acid, without water, in 98% solution state: 0.000311987 kg; lognormal variance with pedigree 0.0021, pedigree (2,3,2,3,1)
  properties: carbon content, fossil 0.400016, wet mass 1 kg, dry mass 1 kg
- building, hall: 1.39994e-5 m2; lognormal variance with pedigree 0.0035, pedigree (3,3,2,3,1)
  Industry data from Bangladesh. Uncertainty has been adapted accordingly.
- electricity, low voltage: 0.418983 kWh; lognormal variance with pedigree 0.0021, pedigree (2,3,2,3,1)
- tap water: 16.4093 kg; name water; lognormal variance with pedigree 0.0021, pedigree (2,3,2,3,1)
  properties: water content 2962.17, carbon content, fossil 0.00178991, dry mass 0.000337476 kg, wet mass 1 kg
  note on carbon content, fossil: Bicarbonate content is 2.93 mol/m3. CO2 content is 0.1 mol/m3 (ecoinvent v2.2 report 8, Tab 93.1).
- wastewater, unpolluted: 0 m3; name ww; pedigree (1,1,1,1,1)
  water emissions in wastewater are taken separately into account.
  production volume 0 m3
    Calculated from production volume of reference product using the relative outputs.
  property price 0 EUR2005; name ww_price_EUR2005
  properties: carbon content, fossil 0.00178991, water content 2962.17, carbon content, non-fossil 0.00178991, dry mass 0.337476 kg, wet mass 1000 kg
  note on carbon content, fossil: Assumed to be like in tap water. Bicarbonate content is 2.93 mol/m3. CO2 content is 0.1 mol/m3 (ecoinvent v2.2 report 8, Tab 93.1).
- heat, district or industrial, natural gas: 11.0696 MJ; lognormal variance with pedigree 0.0021, pedigree (2,3,2,3,1)
  Knit processing usually takes place in batches which require multiple heat-cool cycles.
- heat, district or industrial, other than natural gas: 4.47982 MJ; lognormal variance with pedigree 0.0021, pedigree (2,3,2,3,1)
  Knit processing usually takes place in batches which require multiple heat-cool cycles.
  properties: corresponding fuel use, propane, furnace >100kW 1.05263 MJ
  note on corresponding fuel use, propane, furnace >100kW: Lower heating value of the fuel input related to the heat/electricity output, taken directly from ecoinvent v3.0 dataset "heat production, natural gas, at industrial furnace >100kW, GLO 2000".
- waste yarn and waste textile: -0.0099996 kg; name waste_Yarn; lognormal variance with pedigree 0.0021, pedigree (2,3,2,3,1)
  Waste produced during the process.
  production volume 3.7685e8 kg; = PV_finishing* waste_Yarn
    Calculated based on the production volume of woven yarn.
  property price 0 EUR2005; name waste_Yarn_price_EUR2005
  properties: dry mass 0.97917 kg, wet mass 1 kg, carbon content, non-fossil 0.44455, water content 0.0212731
- wastewater, unpolluted: -8.96764e-5, -0.0111199 m3 (2 entries); lognormal variance with pedigree 0.0021, pedigree (2,3,2,3,1)
  water emissions in wastewater are taken separately into account.
  production volume 4.22449e8 m3

## Emissions to nature
- Copper, ion [water, unspecified]: 2.4199e-5 kg; lognormal variance with pedigree 0.0035, pedigree (2,4,2,3,1)
- Iron, ion [water, unspecified]: 2.4099e-5 kg; lognormal variance with pedigree 0.0021, pedigree (2,3,2,3,1)
- Zinc, ion [water, unspecified]: 4.02984e-5 kg; lognormal variance with pedigree 0.0035, pedigree (2,4,2,3,1)
- Cyanide [water, unspecified]: 1.60994e-6 kg; lognormal variance with pedigree 0.0021, pedigree (2,3,2,3,1)
- Arsenic, ion [water, unspecified]: 1.60994e-6 kg; lognormal variance with pedigree 0.0021, pedigree (2,3,2,3,1)
- Sulfide [water, unspecified]: 1.60994e-5 kg; lognormal variance with pedigree 0.0035, pedigree (2,4,2,3,1)
- TOC, Total Organic Carbon [water, unspecified]: 1.59994e-5 kg; lognormal variance with pedigree 0.0035, pedigree (2,4,2,3,1)
- BOD5, Biological Oxygen Demand [water, unspecified]: 0.00023899 kg; lognormal variance with pedigree 0.0035, pedigree (2,4,2,3,1)
- Lead [water, unspecified]: 8.03968e-7 kg; lognormal variance with pedigree 0.0021, pedigree (2,3,2,3,1)
- COD, Chemical Oxygen Demand [water, unspecified]: 0.00155994 kg; lognormal variance with pedigree 0.0035, pedigree (2,4,2,3,1)
- AOX, Adsorbable Organic Halogen as Cl [water, unspecified]: 4.45982e-7 kg; lognormal variance with pedigree 0.0021, pedigree (2,3,2,3,1)
- Ammonium, ion [water, unspecified]: 1.15995e-6 kg; lognormal variance with pedigree 0.0021, pedigree (2,3,2,3,1)
- Mercury [water, unspecified]: 8.03968e-8 kg; lognormal variance with pedigree 0.0021, pedigree (2,3,2,3,1)
- Chromium VI [water, unspecified]: 8.03968e-7 kg; lognormal variance with pedigree 0.0035, pedigree (2,4,2,3,1)
- Dissolved solids [water, unspecified]: 0.00142994 kg; lognormal variance with pedigree 0.0021, pedigree (2,3,2,3,1)
- Chlorine [water, unspecified]: 8.03968e-6 kg; lognormal variance with pedigree 0.0035, pedigree (2,4,2,3,1)
- Manganese [water, unspecified]: 1.60994e-5 kg; lognormal variance with pedigree 0.0021, pedigree (2,3,2,3,1)
- Nitrogen [water, unspecified]: 0.000412983 kg; lognormal variance with pedigree 0.0035, pedigree (2,4,2,3,1)
- Nitrate [water, unspecified]: 8.03968e-5 kg; lognormal variance with pedigree 0.0021, pedigree (2,3,2,3,1)
- Nickel, ion [water, unspecified]: 2.4099e-5 kg; lognormal variance with pedigree 0.0035, pedigree (2,4,2,3,1)
- Selenium [water, unspecified]: 4.01984e-7 kg; lognormal variance with pedigree 0.0021, pedigree (2,3,2,3,1)
- Oils, unspecified [water, unspecified]: 0.000100996 kg; lognormal variance with pedigree 0.0035, pedigree (2,4,2,3,1)
- Water [air, unspecified]: 0.00519979 m3; = water/1000-(ww*-1); lognormal variance with pedigree 0.0021, pedigree (2,3,2,3,1)
  Calculated as input water minus wastewater. Based on industry data.
- Chromium, ion [water, unspecified]: 1.61993e-5 kg; lognormal variance with pedigree 0.0035, pedigree (2,4,2,3,1)
- Vanadium, ion [water, unspecified]: 1.60994e-6 kg; lognormal variance with pedigree 0.0021, pedigree (2,3,2,3,1)
- Suspended solids, unspecified [water, unspecified]: 0.000875965 kg; lognormal variance with pedigree 0.0035, pedigree (2,4,2,3,1)
- Phenol [water, unspecified]: 8.03968e-6 kg; lognormal variance with pedigree 0.0021, pedigree (2,3,2,3,1)
- Phosphorus [water, unspecified]: 4.14983e-5 kg; lognormal variance with pedigree 0.0035, pedigree (2,4,2,3,1)
- DOC, Dissolved Organic Carbon [water, unspecified]: 1.59994e-5 kg; lognormal variance with pedigree 0.0035, pedigree (2,4,2,3,1)

## Sampling procedure
Industry data.

## Extrapolations
Extrapolated from data from mostly vertically integrated mills.
