# cable production, connector for computer, without plugs

Dataset: EcoSpold 2, unit process
Geography: GLO
Time period: 2000-01-01 to 2019-12-31
Technology level: current
Classification: EcoSpold01Categories: electronics/component
Classification: ISIC rev.4 ecoinvent: 2610:Manufacture of electronic components and boards
Synonyms: Power cord; Mains cable; Wire; Flex; Mains lead; String; Strand; Line; Electric cable; Power cable
Tags: ConvertedDataset
Scenario: Business-as-Usual
System model: Allocation at the point of substitution
Generated by: Martin Lehmann
Published in: Hischier R. 2007
Database: ecoinvent
isCopyrightProtected: false
accessRestrictedTo: 1

## General comment
This dataset represents the production of 1 m of a typical power cord/connector for a desktop computer. It is based on a Swiss system cable, with 0.75 mm2 cross-section, Type H05VV-F, LS-60, and 3 conductor pins, of recent date and designed to handle 10A and ca. 250V with a weight of 0.065 kg (without plugs). Main data are based on weighting and calculations of a Swiss type computer cable at EMPA la-boratories, supported by EPD information.
[This dataset was already contained in the ecoinvent database version 2. It was not individually updated during the transfer to ecoinvent version 3. Life Cycle Impact Assessment results may still have changed, as they are affected by changes in the supply chain, i.e. in other datasets. This dataset was generated following the ecoinvent quality guidelines for version 2. It may have been subject to central changes described in the ecoinvent version 3 change report (http://www.ecoinvent.org/database/ecoinvent-version-3/reports-of-changes/), and the results of the central updates were reviewed extensively. The changes added e.g. consistent water flows and other information throughout the database. The documentation of this dataset can be found in the ecoinvent reports of version 2, which are still available via the ecoinvent website. The change report linked above covers all central changes that were made during the conversion process.]

## Included activities start
From reception of metal and plastic materials at the factory gate.

## Included activities end
This dataset includes materials copper, TPE (elastomere) and PVC with their respective manufacturing processes, infrastructure, electricity for the assembly, fuel oil, propane and water input, the disposal of plastic and rubber parts, the VOC and methanol emissions created during the processing, plus the road and rail transportation for input materials from the regional storage to the production site. The accumulated hazardous waste is also reported.

## Geography
The data describes a typical computer cable in 2006. The kind of cable is produced by international manufacturers and available all over the world. Therefore a global dataset is justifiable.

## Technology
The manufacturing process is inventoried through wire drawing and extrusion of insulation and jacket (TPE, PVC) around wire. Cable manufacturing is a process that typically is composed of: Insulation of copper conductors or optical fibres with selected polymer(s); If specified, shielding of insulated copper conductors (based on cable design); If specified, twisting of insulated conductors into pairs or triplets or quads (based on cable design); If specified, shielding of insulated pairs, triplets, or quads (based on cable design); Cabling of insulated conductors and/or pairs, triplets, quads into groups (based on cable de-sign); If specified, shielding of group(s) of conductors/pairs/triplets (based on cable design); Cabling of together unshielded and shielded groups of conductors into the cable bundle; If specified, overall shielding of cable bundle (based on cable design); If specified, application of separation barriers around cable bundle and/or overall shield; Jacketing over cable bundle or shielded cable bundle with selected polymer; Perform outgoing QA testing (tests based on cable design).

## Parameters
- fraction, tap water, to air: 0.061; name fraction_TW_to_air; = fraction_PW_to_air; lognormal variance with pedigree 0.092025, pedigree (4,4,3,2,4)
  Calculated value. See comment in the other parametres present in this dataset. Tap water is considered to be always used as process water, thus process water fractions to air are applied to all tap water input flows to calculate the amount of water consumed in the processes.
- fraction, process water, to air: 0.061 dimensionless; name fraction_PW_to_air; lognormal variance with pedigree 0.092025, pedigree (4,4,3,2,4)
  Literature value (Statistics Canada, 2007 & Shaffer, K.H., 2008, Consumptive water use in the Great Lakes Basin, USGS) (Vionnet, S., Quantis Water Database - Technical Report, 2012).

## Reference product
- cable, connector for computer, without plugs: 1 m; By-product classification allocatable product; CPC 471: Electronic valves and tubes; electronic components; parts thereof
  EcoSpold01Location=GLO
  A computer power cable is a cable that temporarily connects an electrical appliance to an electrical power source. The term is generally used for cables using a power plug to connect to a single-phase alternating current power source at "mains voltage" (100 to 240 volts, depending on the location). The term ‘cord set’ is also used to distinguish those cords that include connectors molded to the cord at each end. Power cords from those countries that use 110 V mains supply (mainly the United States, Canada, parts of South America and Japan) tend to be bulkier than the mains cables used in the rest of the world, because of the higher currents required to deliver the same power (watts) at 110 V compared to 230 V.
  Power cables may be either fixed or detachable from the appliance. In the case of detachable leads (plugs), the appliance end of the power cord has a socket (female connector) rather than a plug (male connector) to link it to the appliance, to avoid the dangers from having a live protruding pin. Cords may also have twist-locking features, or other attachments to prevent accidental disconnection at one or both ends
  production volume 1 m
    Unknown
    Dummy value to be replaced by measured, estimated or calculated value
  property price 0.68 EUR2005
    USA price used for both world and RER. According to Industrial Commodity Statistics Yearbook 2005, volume 1. Physical Quantity Data. UN. New York 2008 (hard copy ). The US price divided by US production volume.
  property carbon content, fossil 0.359823
    Calculated as the addition of C contents in the product composition. Then referred to 1 kg DM
  property carbon content 0.359823
    carbon content on a dry matter basis (reserved; not for manual entry)
  property true value 0.68
    allocation property applied in "true value" allocation // value calculated from revenue
  properties: water content 0, carbon content, non-fossil 0, dry mass 0.065 kg, wet mass 0.065 kg, water in wet mass 0 kg, carbon allocation 0.0233885 kg

## By-products
- heat, for reuse in municipal waste incineration only: 0 MJ; CPC 17300: Steam and hot water; By-product classification allocatable product; pedigree (1,1,1,1,1)
  Net electricity generated from this waste and used in internal MSWI plant energy redistribution.
  Uncertainty: uncertainty is calculated from uncertainties in waste composition and uncertainties in energy efficiency and the uncertainty in internal energy demand
  production volume 0.00142461 MJ
  property exergy 0.1842 MJ; name E_th_prod_MSWI_exergy
    This exergy property is based on the exergy content of the product.
  property price 0.0106 EUR2005; name E_th_prod_MSWI_price_EUR2005
    Average European district heat price from Ecoheatcool and Euroheat 2005-2006, Ecoheat Work package 1: The European heat market. Final report. 10.6 EUR/GJ i s the price of district heat. http://www.solarthermalworld.org/files/Ecoheatcool%20WP1%20Web.pdf?download
  property true value relation 0.1842; name E_th_prod_MSWI_true_value_relation
    property to calculate "true value" from
  property true value 6.96541e-6
    allocation property applied in "true value" allocation // value calculated from true value relation
- electricity, for reuse in municipal waste incineration only: 0 kWh; CPC 17100: Electrical energy; By-product classification allocatable product; pedigree (1,1,1,1,1)
  (same comment as for heat, for reuse in municipal waste incineration only)
  production volume 0.000202657 kWh
  property price 0.1 EUR2005; name E_el_prod_MSWI_price_EUR2005
    Estimated to be the same price as in case of electricity, medium voltage.
  property exergy 3.6 MJ; name E_el_prod_MSWI_exergy
    This exergy property is based on the exergy content of the product.
  property true value relation 3.6; name E_el_prod_MSWI_true_value_relation
    property to calculate "true value" from
  property true value 1.93654e-5
    (same comment as for heat, for reuse in municipal waste incineration only)

## Inputs from technosphere
- polyvinylchloride, suspension polymerised: 0.02835 kg; lognormal variance with pedigree 0.0521, pedigree (1,4,5,3,1)
  Measured Value, in the Empa laboratories.
  EcoSpold01Location=RER
  properties: carbon content, fossil 0.387097, wet mass 1 kg, dry mass 1 kg
  note on carbon content, fossil: Monomer is vynyl chloride, C2H3Cl (ecoinvent v2.2 report 11_II). MW=62 g/mol
- wire drawing, copper: 0.0194992 kg; lognormal variance with pedigree 0.0521, pedigree (1,4,5,3,1)
  EcoSpold01Location=RER
  Measured Value, in the Empa laboratories.
- hazardous waste, for incineration: 0 kg; source Draka 2004; pedigree (1,1,1,1,1)
  EcoSpold01Location=CH
  Literature Value.
  production volume 0 kg
    Calculated from the production volume of cable, connector for computer, without plugs in proportion to the respective output amounts.
  properties: wet mass 1 kg, dry mass 0.75 kg, water content 0.333333, carbon content, fossil 0.554667
  note on carbon content, fossil: Tab A.6, ecoinvent v2.2 report 13_I. C content has been calculated after data in the tables, and then referred to 1 kg DM
- heat, district or industrial, other than natural gas: 0.0406754 MJ; source Draka 2004; lognormal variance with pedigree 0.0527, pedigree (2,4,5,3,1)
  EcoSpold01Location=RER
  Literature Value.
- tap water: 1.31075 kg; name tap_water_input; source Draka 2004; lognormal variance with pedigree 0.0527, pedigree (2,4,5,3,1)
  EcoSpold01Location=RER
  Literature Value.
  properties: water content 2962.17, carbon content, fossil 0.00178991, dry mass 0.000337476 kg, wet mass 1 kg
  note on carbon content, fossil: Bicarbonate content is 2.93 mol/m3. CO2 content is 0.1 mol/m3 (ecoinvent v2.2 report 8, Tab 93.1).
- liquefied petroleum gas: 1.20555e-5 kg; source Draka 2004; lognormal variance with pedigree 0.0527, pedigree (2,4,5,3,1)
  EcoSpold01Location=RER
  Literature Value.
  properties: carbon content, fossil 0.821863, wet mass 1 kg, dry mass 1 kg
- polyvinylchloride, emulsion polymerised: 0.00414879 kg; lognormal variance with pedigree 0.0521, pedigree (1,4,5,3,1)
  Measured Value, in the Empa laboratories.
  EcoSpold01Location=RER
  properties: carbon content, fossil 0.387097, wet mass 1 kg, dry mass 1 kg
- tube insulation, elastomere: 0.0128995 kg; lognormal variance with pedigree 0.0521, pedigree (1,4,5,3,1)
  Measured Value, in the Empa laboratories.
  EcoSpold01Location=DE
  properties: carbon content, fossil 0.837817, dry mass 1 kg, wet mass 1 kg
  note on carbon content, fossil: The main raw material (93%) is synthetic rubber (Ethylene propylene diene monomer (EPDM)), that is used together with PVC (ecoinvent v2.2 report 7_XV), C2H3Cl
- copper: 0.0194992 kg; lognormal variance with pedigree 0.0521, pedigree (1,4,5,3,1)
  Measured Value, in the Empa laboratories.
  EcoSpold01Location=RER
  properties: dry mass 1 kg, wet mass 1 kg
- extrusion, plastic pipes: 0.0453982 kg; lognormal variance with pedigree 0.0527, pedigree (2,4,5,3,1)
  EcoSpold01Location=RER
  Measured Value, in the Empa laboratories.
- printed wiring board mounting facility: 1.35195e-8 unit; lognormal variance with pedigree 0.3527, pedigree (2,4,5,3,1)
  EcoSpold01Location=GLO
  Proxy, infrastructure for printed wiring board is used.
- waste plastic, mixture: 0 kg; source Draka 2004; pedigree (1,1,1,1,1)
  Literature Value.
  EcoSpold01Location=CH
  production volume 0 kg
    (same comment as for hazardous waste, for incineration)
  properties: dry mass 0.847 kg, carbon content, fossil 0.747344, water content 0.180638, wet mass 1 kg
  note on carbon content, fossil: C content in 1 kg DM was calculated using data in Tab A.2, ecoinvent v2.2 report 13_I
- electricity, medium voltage: 0.0935364 kWh; source Draka 2004; lognormal variance with pedigree 0.0527, pedigree (2,4,5,3,1)
  EcoSpold01Location=UCTE
  Estimation, based on literature.
  Further references:
  Nichigoh (2006) Environmental Product Declaration for Wire and Cable World Wide Standard Cable ECO-FLEX Series from <http://www.jia-page.or.jp/jia/epd/directory/nichigoh/nichigoh_e.pdf>.
- hazardous waste, for incineration: -6.41367e-5, -1.67649e-6, -0.000133369 kg (3 entries); source Draka 2004; lognormal variance with pedigree 0.0521, pedigree (1,4,5,3,1)
  EcoSpold01Location=CH
  Literature Value.
  production volume 0.00019919 kg
- waste plastic, mixture: -0.000158092, -1.2188e-5, -5.03407e-6, -4.78032e-6, -0.000182411, -2.03371e-6, -9.21757e-7, -0.00127698 kg (8 entries); source Draka 2004; lognormal variance with pedigree 0.0527, pedigree (2,4,5,3,1)
  Literature Value.
  EcoSpold01Location=CH
  production volume 0.0016425 kg

## Emissions to nature
- Water [water, unspecified]: 0.00123079 m3; name water_to_water_unspecified; = (tap_water_input/1000)*(1-fraction_TW_to_air); lognormal variance with pedigree 0.0807, pedigree (2,2,5,1,1)
  Calculated value based on literature values and expert opinion. See comments in the parametres' comment field.
  property fraction, origin: unspecified 0; name fraction_origin_unspecified_Ww
  property fraction, origin: fresh water 1; name fraction_origin_fresh_water_Ww
  property fraction, origin: salt water 0; name fraction_origin_salt_water_Ww
  property wet mass 1000 kg; name WM
  property carbon content, fossil 0; name C_content_fossil
  property dry mass 0 kg; name DM
  property carbon content, non-fossil 0; name C_content_non_fossil
  property water in wet mass 1000 kg; name WWM
- NMVOC, non-methane volatile organic compounds, unspecified origin [air, non-urban air or from high stacks]: 6.29006e-6 kg; source Draka 2004; lognormal variance with pedigree 0.1721, pedigree (1,4,5,3,1)
  Literature Value.
- Methanol [air, non-urban air or from high stacks]: 8.38678e-6 kg; source Draka 2004; lognormal variance with pedigree 0.1721, pedigree (1,4,5,3,1)
  Literature Value.
- Water [air, unspecified]: 7.99557e-5 m3; name water_to_air_unspecified; = (tap_water_input/1000*fraction_TW_to_air); lognormal variance with pedigree 0.0807, pedigree (2,2,5,1,1)
  (same comment as for Water)
  property fraction, origin: salt water 0; name fraction_origin_salt_water
  property fraction, origin: fresh water 1; name fraction_origin_fresh_water
  property fraction, origin: unspecified 0; name fraction_origin_unspecified

## Sampling procedure
Weighing and measuring of materials. Literature for electricity consumption (assembly), emissions and waste.

## Review by Roland Hischier 2011-09-22
Transfer of documentation done.

## Review by Rolf Frischknecht 2007-11-07
passed
