# treatment of wastewater from ceramic production, capacity 5E9l/year

Dataset: EcoSpold 2, unit process
Geography: RoW
Time period: 1994-01-01 to 2019-12-31
Technology level: current
Classification: ISIC rev.4 ecoinvent: 3700:Sewerage
Classification: EcoSpold01Categories: waste management/wastewater treatment
Tags: ConvertedDataset; Treatment
Scenario: Business-as-Usual
System model: Allocation at the point of substitution
Generated by: Gabor Doka (obsolete)
Published in: Doka G. 2008
Database: ecoinvent
isCopyrightProtected: true
accessRestrictedTo: 1

## General comment
Wastewater purified in a medium size municipal wastewater treatment plant (capacity class 3), with an average capacity size of 24900 per-captia-equivalents PCE.
Wastewater contains (in kg/m3): Ba: 0.00048 (GSD=300%); Cd: 0.000008 (GSD=300%); Co: 0.000025 (GSD=300%); Cr: 0.000025 (GSD=300%); Cu: 0.000005 (GSD=300%); Ni: 0.000025 (GSD=300%); Pb: 0.000025 (GSD=300%); Zn: 0.000012 (GSD=300%);
[This dataset was already contained in the ecoinvent database version 2. It was not individually updated during the transfer to ecoinvent version 3. Life Cycle Impact Assessment results may still have changed, as they are affected by changes in the supply chain, i.e. in other datasets. This dataset was generated following the ecoinvent quality guidelines for version 2. It may have been subject to central changes described in the ecoinvent version 3 change report (http://www.ecoinvent.org/database/ecoinvent-version-3/reports-of-changes/), and the results of the central updates were reviewed extensively. The changes added e.g. consistent water flows and other information throughout the database. The documentation of this dataset can be found in the ecoinvent reports of version 2, which are still available via the ecoinvent website. The change report linked above covers all central changes that were made during the conversion process.]

## Included activities end
Infrastructure materials for municipal wastewater treatment plant, transports, dismantling. Land use burdens.

## Geography
Specific to the technology mix encountered in Switzerland in 2000. Well applicable to modern treatment practices in Europe, North America or Japan.

## Technology
Three stage wastewater treatment (mechanical, biological, chemical) including sludge digestion (fermentation) according to the average technology in Switzerland

## Parameters
- fraction, process water, to air: 0.1 dimensionless; name fraction_PW_to_air; lognormal variance with pedigree 0.092025, pedigree (4,4,3,2,4)

## Reference product
- wastewater from ceramic production: -1 m3; CPC 39920: Sewage sludge; By-product classification Waste
  EcoSpold01Location=CH
  production volume 3.96633 m3
    This is a placeholder value that does not reflect real-world production volumes. This dataset does not currently require a real-world production volume to work in the database framework, and no actual data were collected yet. This has no negative effect on the results of the ecoinvent database.
  property price 0 EUR2005
    Waste products are assigned a price of zero as they are assumed to require further treatment.
  property carbon content 0
    carbon content on a dry matter basis (reserved; not for manual entry)
  properties: water content 2962.17, carbon content, fossil 0, water in wet mass 999.663 kg, wet mass 1000 kg, carbon content, non-fossil 0, dry mass 0.337476 kg, carbon allocation 0 kg

## By-products
- heat, for reuse in municipal waste incineration only: 0 MJ; CPC 17300: Steam and hot water; By-product classification allocatable product; pedigree (1,1,1,1,1)
  Net electricity generated from this waste and used in internal MSWI plant energy redistribution.
  Uncertainty: uncertainty is calculated from uncertainties in waste composition and uncertainties in energy efficiency and the uncertainty in internal energy demand
  property exergy 0.1842 MJ; name E_th_prod_MSWI_exergy
    This exergy property is based on the exergy content of the product.
  property price 0.0106 EUR2005; name E_th_prod_MSWI_price_EUR2005
    Average European district heat price from Ecoheatcool and Euroheat 2005-2006, Ecoheat Work package 1: The European heat market. Final report. 10.6 EUR/GJ i s the price of district heat. http://www.solarthermalworld.org/files/Ecoheatcool%20WP1%20Web.pdf?download
  property true value relation 0.1842; name E_th_prod_MSWI_true_value_relation
    property to calculate "true value" from
- electricity, for reuse in municipal waste incineration only: 0 kWh; CPC 17100: Electrical energy; By-product classification allocatable product; pedigree (1,1,1,1,1)
  (same comment as for heat, for reuse in municipal waste incineration only)
  property price 0.1 EUR2005; name E_el_prod_MSWI_price_EUR2005
    Estimated to be the same price as in case of electricity, medium voltage.
  property exergy 3.6 MJ; name E_el_prod_MSWI_exergy
    This exergy property is based on the exergy content of the product.
  property true value relation 3.6; name E_el_prod_MSWI_true_value_relation
    property to calculate "true value" from

## Inputs from technosphere
- slag landfill: 4.5373e-13 unit; lognormal variance with pedigree 0.072, pedigree (1,1,5,5,1)
  burden from sludge incineration. Uncertainty calculated from wastewater composition and treatment model
  EcoSpold01Location=CH
- cement, unspecified: 0 kg; pedigree (1,1,1,1,1)
  (same comment as for slag landfill)
  properties: dry mass 1 kg, wet mass 1 kg
- waste graphical paper: -0.0155 kg; lognormal variance with pedigree 0.042, pedigree (1,1,5,5,1)
  EcoSpold01Location=CH
  direct wastewater treatment plant burden. Uncertainty calculated from wastewater composition and treatment model
  production volume 0.062 kg
    Calculated from the production volume of wastewater from ceramic production in proportion to the respective output amounts.
  properties: carbon content, non-fossil 0.454955, water content 0.126126, wet mass 1 kg, dry mass 0.888 kg
- electricity, high voltage: 0 kWh; pedigree (1,1,1,1,1)
  (same comment as for slag landfill)
- heat, district or industrial, natural gas: 0 MJ; pedigree (1,1,1,1,1)
  direct wastewater treatment plant burden. Uncertainty calculated from wastewater composition and treatment model
  EcoSpold01Location=RER
- process-specific burdens, residual material landfill: 0 kg; pedigree (1,1,1,1,1)
  EcoSpold01Location=CH
  burden from sludge incineration. Uncertainty calculated from wastewater composition and treatment model
- heat, district or industrial, other than natural gas: 0 MJ; pedigree (1,1,1,1,1)
  (same comment as for slag landfill)
- process-specific burdens, slag landfill: 0 kg; pedigree (1,1,1,1,1)
  (same comment as for process-specific burdens, residual material landfill)
- electricity, low voltage: 0 kWh; pedigree (1,1,1,1,1)
  (same comment as for waste graphical paper)
- liquid manure spreading, by vacuum tanker: 3.5568e-6 m3; lognormal variance with pedigree 0.072, pedigree (1,1,5,5,1)
  burden from sludge spreading. Uncertainty calculated from wastewater composition and treatment model
  EcoSpold01Location=CH
- municipal waste incineration facility: 3.1509e-13 unit; lognormal variance with pedigree 0.442, pedigree (1,1,5,5,1)
  (same comment as for process-specific burdens, residual material landfill)
- residual material landfill: 1.1939e-13 unit; lognormal variance with pedigree 0.072, pedigree (1,1,5,5,1)
  (same comment as for process-specific burdens, residual material landfill)
- chemical, inorganic: 1.1798e-8 kg; lognormal variance with pedigree 0.542, pedigree (1,1,5,5,1)
  burden from sludge incineration. Uncertainty calculated from wastewater composition and treatment model
  EcoSpold01Location=GLO
  properties: carbon content, fossil 0.003, wet mass 1 kg, dry mass 1 kg
  note on carbon content, fossil: This dataset is an unweighted average of 20 inorganic substances (listed in Tab 88.1, ecoinvent v2.2 report 8, part II), being part of the top100 chemicals included in this database. The C-content has also been calculated as an unweighted average of the C content of the substances composing this dataset.
- chemical, organic: 6.5003e-6 kg; lognormal variance with pedigree 1.272, pedigree (1,1,5,5,1)
  EcoSpold01Location=GLO
  burden from sludge incineration. Uncertainty calculated from wastewater composition and treatment model
  properties: wet mass 1 kg, dry mass 1 kg, carbon content, fossil 0.628
  note on carbon content, fossil: This dataset is an unweighted average of 20 organic substances (listed in Tab 88.1, ecoinvent v2.2 report 8, part II), being part of the top100 chemicals included in this database. The C-content has also been calculated as an unweighted average of the C content of the substances composing this dataset.
- wastewater treatment facility, capacity 5E9l/year: 5.6882e-9 unit; lognormal variance with pedigree 0.042, pedigree (1,1,5,5,1)
  uncertainty heeded in exchanges of the module
  EcoSpold01Location=CH
- hydrochloric acid, without water, in 30% solution state: 7.0791e-9 kg; lognormal variance with pedigree 0.542, pedigree (1,1,5,5,1)
  EcoSpold01Location=RER
  burden from sludge incineration. Uncertainty calculated from wastewater composition and treatment model
  properties: wet mass 1 kg, dry mass 1 kg
- iron (III) chloride, without water, in 40% solution state: 2.1534e-6 kg; lognormal variance with pedigree 0.542, pedigree (1,1,5,5,1)
  direct wastewater treatment plant burden plus burden from sludge incineration. Uncertainty calculated from wastewater composition and treatment model
  EcoSpold01Location=CH
  properties: wet mass 1 kg, dry mass 1 kg
- process-specific burdens, municipal waste incineration: 0 kg; pedigree (1,1,1,1,1)
  (same comment as for slag landfill)
- waste plastic, mixture: 0 kg; pedigree (1,1,1,1,1)
  direct wastewater treatment plant burden. Uncertainty calculated from wastewater composition and treatment model
  EcoSpold01Location=CH
  production volume 0 kg
    (same comment as for waste graphical paper)
  properties: water content 0.180638, carbon content, fossil 0.747344, dry mass 0.847 kg, wet mass 1 kg
  note on carbon content, fossil: C content in 1 kg DM was calculated using data in Tab A.2, ecoinvent v2.2 report 13_I
- heat, central or small-scale, other than natural gas: 0 MJ; pedigree (1,1,1,1,1)
  (same comment as for waste plastic, mixture)
- waste cement, hydrated: 0 kg; pedigree (1,1,1,1,1)
  (same comment as for slag landfill)
  production volume 0 kg
    (same comment as for waste graphical paper)
  properties: dry mass 1 kg, wet mass 1 kg
- sewer grid, 5E9l/year, 110 km: 2.1782e-7 km; lognormal variance with pedigree 0.042, pedigree (1,1,5,5,1)
  EcoSpold01Location=CH
  uncertainty heeded in exchanges of the module
- cement, unspecified: 6.88709e-7, 5.04432e-8, 1.4378e-7, 3.30998e-6, 3.25163e-6, 9.57048e-8, 1.05112e-6, 1.27174e-7, 1.42045e-5 kg (9 entries); lognormal variance with pedigree 0.082, pedigree (1,1,5,5,1)
  (same comment as for slag landfill)
- electricity, high voltage: 1.8952e-6, 3.45125e-7, 7.99408e-6, 2.69097e-5, 5.89506e-6, 8.48686e-5, 1.3669e-5, 3.96232e-5 kWh (8 entries); lognormal variance with pedigree 0.882, pedigree (1,1,5,5,1)
  (same comment as for slag landfill)
- heat, district or industrial, natural gas: 0.00023193, 0.00528468, 0.0131122 MJ (3 entries); lognormal variance with pedigree 0.052, pedigree (1,1,5,5,1)
  (same comment as for heat, district or industrial, natural gas)
- process-specific burdens, residual material landfill: 1.62104e-5, 4.10956e-5 kg (2 entries); lognormal variance with pedigree 0.072, pedigree (1,1,5,5,1)
  (same comment as for process-specific burdens, residual material landfill)
- heat, district or industrial, other than natural gas: 4.61308e-7, 2.75319e-5, 0.00102901 MJ (3 entries); lognormal variance with pedigree 0.442, pedigree (1,1,5,5,1)
  (same comment as for slag landfill)
- process-specific burdens, slag landfill: 7.21952e-5, 0.000183025 kg (2 entries); lognormal variance with pedigree 0.072, pedigree (1,1,5,5,1)
  (same comment as for process-specific burdens, residual material landfill)
- electricity, low voltage: 0.000301715, 5.29169e-5, 0.00120016, 0.00430287, 0.000870167, 0.0131595, 0.0021691, 0.00617861 kWh (8 entries); lognormal variance with pedigree 0.042, pedigree (1,1,5,5,1)
  (same comment as for waste graphical paper)
- process-specific burdens, municipal waste incineration: 0.000356535, 0.000903865 kg (2 entries); lognormal variance with pedigree 0.442, pedigree (1,1,5,5,1)
  (same comment as for slag landfill)
- waste plastic, mixture: -0.00172425, -0.000115208, -8.71297e-6, -4.75849e-5, -1.92238e-5, -4.51863e-5, -0.00146914, -0.0120707 kg (8 entries); lognormal variance with pedigree 0.042, pedigree (1,1,5,5,1)
  (same comment as for waste plastic, mixture)
  production volume 0.0614782 kg
- heat, central or small-scale, other than natural gas: 0.000190493, 0.0133267 MJ (2 entries); lognormal variance with pedigree 0.052, pedigree (1,1,5,5,1)
  (same comment as for waste plastic, mixture)
- waste cement, hydrated: -1.62104e-5, -4.10956e-5 kg (2 entries); lognormal variance with pedigree 0.082, pedigree (1,1,5,5,1)
  (same comment as for slag landfill)
  production volume 0.000227295 kg

## Emissions to nature
- Carbon monoxide, fossil [air, urban air close to ground]: 1.7607e-7 kg; lognormal variance with pedigree 1.092, pedigree (1,1,5,5,1)
  emission from sludge incineration. Uncertainty calculated from wastewater composition and treatment model
- Barium [air, urban air close to ground]: 2.398e-7 kg; lognormal variance with pedigree 1.292, pedigree (1,1,5,5,1)
  direct digester gas emission plus emission from sludge incineration. Uncertainty calculated from wastewater composition and treatment model
- Zinc [air, urban air close to ground]: 7.1981e-11 kg; lognormal variance with pedigree 1.312, pedigree (1,1,5,5,1)
  (same comment as for Barium)
- Cadmium [air, urban air close to ground]: 1.1707e-10 kg; lognormal variance with pedigree 1.282, pedigree (1,1,5,5,1)
  (same comment as for Barium)
- Cobalt [air, urban air close to ground]: 2.0775e-13 kg; lognormal variance with pedigree 1.372, pedigree (1,1,5,5,1)
  (same comment as for Barium)
- Copper, ion [water, ground-, long-term]: 1.5908e-6 kg; lognormal variance with pedigree 1.282, pedigree (1,1,5,5,1)
  (same comment as for Carbon monoxide, fossil)
- Water [air, unspecified]: 0.1 m3; name water_to_air_unspecified; lognormal variance with pedigree 0.0827, pedigree (2,2,5,5,1)
  Calculated value based on water balance.
  property fraction, origin: unspecified 1; name fraction_origin_unspecified
  property fraction, origin: salt water 0; name fraction_origin_salt_water
  property fraction, origin: fresh water 0; name fraction_origin_fresh_water
- Cobalt [water, ground-, long-term]: 5.7289e-6 kg; lognormal variance with pedigree 1.272, pedigree (1,1,5,5,1)
  (same comment as for Carbon monoxide, fossil)
- Lead [water, ground-, long-term]: 8.4257e-7 kg; lognormal variance with pedigree 7.472, pedigree (1,1,5,5,1)
  (same comment as for Carbon monoxide, fossil)
- Water [water, unspecified]: 0.9 m3; name water_to_water_unspecified; lognormal variance with pedigree 0.0827, pedigree (2,2,5,5,1)
  Calculated value based on water balance.
  property fraction, origin: fresh water 1; name fraction_origin_fresh_water_Ww
  property fraction, origin: salt water 0; name fraction_origin_salt_water_Ww
  property fraction, origin: unspecified 0; name fraction_origin_unspecified_Ww
  property water in wet mass 1000 kg; name WWM
  property carbon content, fossil 0; name C_content_fossil
  property carbon content, non-fossil 0; name C_content_non_fossil
  property wet mass 1000 kg; name WM
  property dry mass 0 kg; name DM
- Barium [water, ground-, long-term]: 0.00021289 kg; lognormal variance with pedigree 1.372, pedigree (1,1,5,5,1)
  (same comment as for Carbon monoxide, fossil)
- Chromium VI [water, surface water]: 1.2901e-5 kg; lognormal variance with pedigree 1.182, pedigree (1,1,5,5,1)
  sewer overload discharge plus direct wastewater treatment plant emission plus emission from sludge incineration. Uncertainty calculated from wastewater composition and treatment model
- Copper, ion [water, surface water]: 1.297e-6 kg; lognormal variance with pedigree 1.182, pedigree (1,1,5,5,1)
  (same comment as for Chromium VI)
- Lead [water, surface water]: 2.7478e-6 kg; lognormal variance with pedigree 1.122, pedigree (1,1,5,5,1)
  (same comment as for Chromium VI)
- Chromium VI [water, ground-, long-term]: 6.9269e-7 kg; lognormal variance with pedigree 1.652, pedigree (1,1,5,5,1)
  (same comment as for Carbon monoxide, fossil)
- Methane, fossil [air, urban air close to ground]: 5.0413e-9 kg; lognormal variance with pedigree 0.492, pedigree (1,1,5,5,1)
  (same comment as for Carbon monoxide, fossil)
- Barium [soil, agricultural]: 0.00021142 kg; lognormal variance with pedigree 1.272, pedigree (1,1,5,5,1)
  emission from sludge spreading. Uncertainty calculated from wastewater composition and treatment model
- Cadmium, ion [water, surface water]: 4.0609e-6 kg; lognormal variance with pedigree 1.212, pedigree (1,1,5,5,1)
  (same comment as for Chromium VI)
- Zinc, ion [water, surface water]: 3.71e-6 kg; lognormal variance with pedigree 1.192, pedigree (1,1,5,5,1)
  (same comment as for Chromium VI)
- Zinc [soil, agricultural]: 3.8847e-6 kg; lognormal variance with pedigree 1.272, pedigree (1,1,5,5,1)
  (same comment as for Barium)
- Copper [soil, agricultural]: 1.7351e-6 kg; lognormal variance with pedigree 1.272, pedigree (1,1,5,5,1)
  (same comment as for Barium)
- Barium [water, surface water]: 2.8821e-5 kg; lognormal variance with pedigree 1.052, pedigree (1,1,5,5,1)
  (same comment as for Chromium VI)
- Nickel, ion [water, surface water]: 1.5163e-5 kg; lognormal variance with pedigree 1.212, pedigree (1,1,5,5,1)
  (same comment as for Chromium VI)
- Cobalt [water, surface water]: 1.2689e-5 kg; lognormal variance with pedigree 1.212, pedigree (1,1,5,5,1)
  (same comment as for Chromium VI)
- Chromium [air, urban air close to ground]: 4.8383e-13 kg; lognormal variance with pedigree 1.362, pedigree (1,1,5,5,1)
  (same comment as for Barium)
- Lead [soil, agricultural]: 1.0426e-5 kg; lognormal variance with pedigree 1.272, pedigree (1,1,5,5,1)
  (same comment as for Barium)
- Cobalt [soil, agricultural]: 5.7691e-6 kg; lognormal variance with pedigree 1.272, pedigree (1,1,5,5,1)
  (same comment as for Barium)
- Lead [air, urban air close to ground]: 4.3979e-10 kg; lognormal variance with pedigree 1.312, pedigree (1,1,5,5,1)
  (same comment as for Barium)
- Nickel [air, urban air close to ground]: 2.257e-13 kg; lognormal variance with pedigree 1.372, pedigree (1,1,5,5,1)
  (same comment as for Barium)
- Zinc, ion [water, ground-, long-term]: 6.8312e-8 kg; lognormal variance with pedigree 6.062, pedigree (1,1,5,5,1)
  (same comment as for Carbon monoxide, fossil)
- Cadmium, ion [water, ground-, long-term]: 2.101e-8 kg; lognormal variance with pedigree 7.462, pedigree (1,1,5,5,1)
  (same comment as for Carbon monoxide, fossil)
- Chromium [soil, agricultural]: 5.7691e-6 kg; lognormal variance with pedigree 1.272, pedigree (1,1,5,5,1)
  (same comment as for Barium)
- Nickel, ion [water, ground-, long-term]: 4.8961e-6 kg; lognormal variance with pedigree 1.272, pedigree (1,1,5,5,1)
  (same comment as for Carbon monoxide, fossil)
- Cadmium [soil, agricultural]: 1.8461e-6 kg; lognormal variance with pedigree 1.272, pedigree (1,1,5,5,1)
  (same comment as for Barium)
- Copper [air, urban air close to ground]: 1.4527e-11 kg; lognormal variance with pedigree 1.322, pedigree (1,1,5,5,1)
  (same comment as for Barium)
- Chromium, ion [water, surface water]: 2.0855e-8 kg; lognormal variance with pedigree 1.282, pedigree (1,1,5,5,1)
  (same comment as for Carbon monoxide, fossil)
- Nickel [soil, agricultural]: 4.6106e-6 kg; lognormal variance with pedigree 1.272, pedigree (1,1,5,5,1)
  (same comment as for Barium)

## Extrapolations
wastewater compositions from literature and/or estimates This dataset has been copied from an original dataset covering the geography CH. The uncertainty has been adjusted accordingly.

## Review by Niels Jungbluth 2009-01-22
passed.
