# conveyor belt production

Dataset: EcoSpold 2, unit process
Geography: RoW
Time period: 2000-01-01 to 2019-12-31
Technology level: current
Classification: ISIC rev.4 ecoinvent: 2816:Manufacture of lifting and handling equipment
Classification: EcoSpold01Categories: construction processes/machinery
Synonyms: band; conveying; Förderanlage
Tags: ConvertedDataset
Scenario: Business-as-Usual
System model: Allocation at the point of substitution
Generated by: Daniel Kellenberger (obsolete)
Published in: Kellenberger D. 2007
Database: ecoinvent
isCopyrightProtected: true
accessRestrictedTo: 1

## General comment
Most data are taken from a description of one type of conveyor belt and completed by assuming transportation distances for components. This module should not be used if its relative importance would be high in a certain environmental inventory.
[This dataset was already contained in the ecoinvent database version 2. It was not individually updated during the transfer to ecoinvent version 3. Life Cycle Impact Assessment results may still have changed, as they are affected by changes in the supply chain, i.e. in other datasets. This dataset was generated following the ecoinvent quality guidelines for version 2. It may have been subject to central changes described in the ecoinvent version 3 change report (http://www.ecoinvent.org/database/ecoinvent-version-3/reports-of-changes/), and the results of the central updates were reviewed extensively. The changes added e.g. consistent water flows and other information throughout the database. The documentation of this dataset can be found in the ecoinvent reports of version 2, which are still available via the ecoinvent website. The change report linked above covers all central changes that were made during the conversion process.]

## Included activities end
Includes the most important materials, the transportation of the new parts to the assembly plant and of all dismantled parts at the end of life either to the secondary metal producer or to the disposal site. No disposal of metal is included as it is recycled. Disposal of concrete from foundation and conveyor rubber band is included. No energy for assembling is included.

## Geography
Certain elementary flows or intermediate product flows are extrapolated from Swiss conditions.

## Technology
The module represents an example for an average technology used in Europe in the late 1990s

## Reference product
- conveyor belt: 1 m; CPC 43550: Pneumatic and other continuous action elevators and conveyors, for goods or materials; By-product classification allocatable product
  production volume 2.67763 m
    This is a placeholder value that does not reflect real-world production volumes. This dataset does not currently require a real-world production volume to work in the database framework, and no actual data were collected yet. This has no negative effect on the results of the ecoinvent database.
  property price 257.045 EUR2005
    Calculated based on inputs: The price of the product has been calculated as a sum of the values of the material and energy inputs for this product. This value is therefore a rough estimation. It may underestimate the real price since there are additional expenses when producing any product. These expences can include for example labour costs, treatment of waste materials and profit for the producer. Please consider carefully whether this level of data quality is acceptable for your application.
  property true value 257.045
    allocation property applied in "true value" allocation // value calculated from revenue

## By-products
- heat, for reuse in municipal waste incineration only: 0 MJ; CPC 17300: Steam and hot water; By-product classification allocatable product; pedigree (1,1,1,1,1)
  Net electricity generated from this waste and used in internal MSWI plant energy redistribution.
  Uncertainty: uncertainty is calculated from uncertainties in waste composition and uncertainties in energy efficiency and the uncertainty in internal energy demand
  production volume 258.501 MJ
  property exergy 0.1842 MJ; name E_th_prod_MSWI_exergy
    This exergy property is based on the exergy content of the product.
  property price 0.0106 EUR2005; name E_th_prod_MSWI_price_EUR2005
    Average European district heat price from Ecoheatcool and Euroheat 2005-2006, Ecoheat Work package 1: The European heat market. Final report. 10.6 EUR/GJ i s the price of district heat. http://www.solarthermalworld.org/files/Ecoheatcool%20WP1%20Web.pdf?download
  property true value relation 0.1842; name E_th_prod_MSWI_true_value_relation
    property to calculate "true value" from
  property true value 0.566224
    allocation property applied in "true value" allocation // value calculated from true value relation
- electricity, for reuse in municipal waste incineration only: 0 kWh; CPC 17100: Electrical energy; By-product classification allocatable product; pedigree (1,1,1,1,1)
  (same comment as for heat, for reuse in municipal waste incineration only)
  production volume 36.6339 kWh
  property true value relation 3.6; name E_el_prod_MSWI_true_value_relation
    property to calculate "true value" from
  property price 0.1 EUR2005; name E_el_prod_MSWI_price_EUR2005
    Estimated to be the same price as in case of electricity, medium voltage.
  property exergy 3.6 MJ; name E_el_prod_MSWI_exergy
    This exergy property is based on the exergy content of the product.
  property true value 1.56828
    (same comment as for heat, for reuse in municipal waste incineration only)

## Inputs from technosphere
- steel, low-alloyed, hot rolled: 525.635 kg; lognormal variance with pedigree 0.062, pedigree (3,5,5,5,1)
  properties: dry mass 1 kg, wet mass 1 kg, carbon content, fossil 0.005
  note on carbon content, fossil: Low alloyed steel composition given in Tab. 3.2 ecoinvent v2.2 report 10_partII. Steel assumed to have a C content of 0.5%
- scrap steel: -29.3562 kg; lognormal variance with pedigree 0.062, pedigree (3,5,5,5,1)
  production volume 88.8 kg
    Calculated from the production volume of conveyor belt in proportion to the respective output amounts.
  properties: dry mass 1 kg, wet mass 1 kg
- concrete, normal: 0 m3; pedigree (1,1,1,1,1)
  properties: dry mass 2190 kg, water content 0.086758, wet mass 2380 kg
- synthetic rubber: 13.488 kg; lognormal variance with pedigree 0.062, pedigree (3,5,5,5,1)
  properties: wet mass 1 kg, dry mass 1 kg, carbon content, fossil 0.871949
  note on carbon content, fossil: EPDM (Ethylene-propene-diene terpolymer) rubber is a terpolymer of ethylene, propene, and a diene with the residual unsaturated portion of the diene in the side chain (ecoinvent v2.2 report 7-part XX & Ullmann). Chemical formula (deduced from Evidences of Solvent-Induced Miscibility in Polychloroprene-co-Ethylene-Propene Diene Terpolymer Blends, Dubey et al., Journal of Applied Polymer Science, 2009, 111:1884–1891): C20H35
- waste reinforced concrete: -22.8106 kg; lognormal variance with pedigree 0.062, pedigree (3,5,5,5,1)
  production volume 69 kg
    (same comment as for scrap steel)
  properties: dry mass 0.99418 kg, water content 0.00585407, wet mass 1 kg
- section bar rolling, steel: 495.882 kg; lognormal variance with pedigree 0.06, pedigree (1,5,5,5,1)
- wire drawing, steel: 29.3562 kg; lognormal variance with pedigree 0.062, pedigree (3,5,5,5,1)
- waste rubber, unspecified: -13.488 kg; lognormal variance with pedigree 0.062, pedigree (3,5,5,5,1)
  production volume 40.8 kg
    (same comment as for scrap steel)
  properties: carbon content, fossil 0.853, wet mass 1 kg, dry mass 1 kg
- concrete, normal: 0.000227709, 2.3727e-5, 0.000192087, 0.000108049, 0.000457556, 1.54331e-5, 0.00889308 m3 (7 entries); lognormal variance with pedigree 0.062, pedigree (3,5,5,5,1)

## Sampling procedure
most data from literature

## Extrapolations
See geography This dataset has been copied from an original dataset covering the geography RER. The uncertainty has been adjusted accordingly.

## Review by Roberto Dones 2003-07-04
Passed
