# treatment of wastewater from tube collector production, capacity 1.1E10l/year

Dataset: EcoSpold 2, unit process
Geography: CH
Time period: 1994-01-01 to 2019-12-31
Technology level: current
Classification: EcoSpold01Categories: waste management/wastewater treatment
Classification: ISIC rev.4 ecoinvent: 3700:Sewerage
Tags: Treatment; ConvertedDataset
Scenario: Business-as-Usual
System model: Allocation at the point of substitution
Generated by: Gabor Doka (obsolete)
Published in: Doka G. 2008
Database: ecoinvent
isCopyrightProtected: true
accessRestrictedTo: 1

## General comment
Wastewater purified in a moderatly large municipal wastewater treatment plant (capacity class 2), with an average capacity size of 71100 per-captia-equivalents PCE.
Wastewater contains (in kg/m3): F: 0.000444 (GSD=224.9%); Ag: 0.0001 (GSD=224.9%); Sn: 0.000667 (GSD=224.9%);
[This dataset was already contained in the ecoinvent database version 2. It was not individually updated during the transfer to ecoinvent version 3. Life Cycle Impact Assessment results may still have changed, as they are affected by changes in the supply chain, i.e. in other datasets. This dataset was generated following the ecoinvent quality guidelines for version 2. It may have been subject to central changes described in the ecoinvent version 3 change report (http://www.ecoinvent.org/database/ecoinvent-version-3/reports-of-changes/), and the results of the central updates were reviewed extensively. The changes added e.g. consistent water flows and other information throughout the database. The documentation of this dataset can be found in the ecoinvent reports of version 2, which are still available via the ecoinvent website. The change report linked above covers all central changes that were made during the conversion process.]

## Included activities end
Infrastructure materials for municipal wastewater treatment plant, transports, dismantling. Land use burdens.

## Geography
Specific to the technology mix encountered in Switzerland in 2000. Well applicable to modern treatment practices in Europe, North America or Japan.

## Technology
Three stage wastewater treatment (mechanical, biological, chemical) including sludge digestion (fermentation) according to the average technology in Switzerland

## Parameters
- fraction, process water, to air: 0.1 dimensionless; name fraction_PW_to_air; lognormal variance with pedigree 0.092025, pedigree (4,4,3,2,4)
  Literature value (Statistics Canada, 2007 & Shaffer, K.H., 2008, Consumptive water use in the Great Lakes Basin, USGS) (Vionnet, S., Quantis Water Database - Technical Report, 2012).

## Reference product
- wastewater from tube collector production: -1 m3; CPC 39920: Sewage sludge; By-product classification Waste
  production volume 0.0336675 m3
    This is a placeholder value that does not reflect real-world production volumes. This dataset does not currently require a real-world production volume to work in the database framework, and no actual data were collected yet. This has no negative effect on the results of the ecoinvent database. The placeholder value of this activity was scaled according to the nominal GDP of 2005 (source: United Nations, http://data.un.org/Glossary.aspx?q=GDP+%28current+US%24%29, accessed 20130726) to reflect an appropriate share of the global production volume, which is also a placeholder value.
  property price 0 EUR2005
    Waste products are assigned a price of zero as they are assumed to require further treatment.
  property carbon content 0
    carbon content on a dry matter basis (reserved; not for manual entry)
  properties: dry mass 0.337476 kg, carbon content, fossil 0, water content 2962.17, wet mass 1000 kg, water in wet mass 999.663 kg, carbon content, non-fossil 0, carbon allocation 0 kg

## By-products
- electricity, for reuse in municipal waste incineration only: 0 kWh; CPC 17100: Electrical energy; By-product classification allocatable product; pedigree (1,1,1,1,1)
  Net electricity generated from this waste and used in internal MSWI plant energy redistribution.
  Uncertainty: uncertainty is calculated from uncertainties in waste composition and uncertainties in energy efficiency and the uncertainty in internal energy demand
  property exergy 3.6 MJ; name E_el_prod_MSWI_exergy
    This exergy property is based on the exergy content of the product.
  property true value relation 3.6; name E_el_prod_MSWI_true_value_relation
    property to calculate "true value" from
  property price 0.1 EUR2005; name E_el_prod_MSWI_price_EUR2005
    Estimated to be the same price as in case of electricity, medium voltage.
- heat, for reuse in municipal waste incineration only: 0 MJ; CPC 17300: Steam and hot water; By-product classification allocatable product; pedigree (1,1,1,1,1)
  Net useful heat generated from this waste and used in internal MSWI plant energy redistribution.
  Uncertainty: uncertainty is calculated from uncertainties in waste composition and uncertainties in energy efficiency and the uncertainty in internal energy demand
  property true value relation 0.1842; name E_th_prod_MSWI_true_value_relation
    property to calculate "true value" from
  property exergy 0.1842 MJ; name E_th_prod_MSWI_exergy
    This exergy property is based on the exergy content of the product.
  property price 0.0106 EUR2005; name E_th_prod_MSWI_price_EUR2005
    Average European district heat price from Ecoheatcool and Euroheat 2005-2006, Ecoheat Work package 1: The European heat market. Final report. 10.6 EUR/GJ i s the price of district heat. http://www.solarthermalworld.org/files/Ecoheatcool%20WP1%20Web.pdf?download
- zinc concentrate: 0 kg; CPC 14290: Other non-ferrous metal ores and concentrates (other than uranium or thorium ores and concentrates); By-product classification allocatable product
  Calculated value from the knowledge of the properties of both products.
  property price 0.38 EUR2005; name ByP_price_EUR2005
    Temporary price data. Calculated as 90% of purchasers price based on: Zinc content in concentrate 53%. Concentrate price per kg Zn 86.5% of refined Zn price (13.5% treatment charges according to CHR Metals Limited 2005: Dynamic cost curves. http://www.minecost.com/dynamic.pdf). 2004 zinc price from USGS (2007) Mineral commodity summaries 2007. <http://minerals.usgs.gov/minerals/pubs/mcs/2007/mcs2007.pdf> [Accessed 25 May 2010]
  property zinc content 0.53; name zinc_C_zinc_concentrate
    Zinc content on a dry matter basis. Value taken from teh "zinc mine operation" /GLO dataset.
  property dry mass 1 kg; name DM_zinc_concentrate
  property carbon content 0
    carbon content on a dry matter basis (reserved; not for manual entry)
  properties: wet mass 1 kg, water content 0, carbon content, non-fossil 0, carbon content, fossil 0, water in wet mass 0 kg, carbon allocation 0 kg

## Inputs from technosphere
- heat, district or industrial, other than natural gas: 0.0010758 MJ; lognormal variance with pedigree 0.18, pedigree (1,1,5,1,1)
  burden from sludge incineration. Uncertainty calculated from wastewater composition and treatment model
- process-specific burdens, slag landfill: 0.00017808 kg; lognormal variance with pedigree 0.07, pedigree (1,1,5,1,1)
  burden from sludge incineration. Uncertainty calculated from wastewater composition and treatment model;activityLink introduced to establish a direct link to the corresponding regional supply of this product
- heat, district or industrial, natural gas: 0.0185491 MJ; lognormal variance with pedigree 0.04, pedigree (1,1,5,1,1)
  direct wastewater treatment plant burden. Uncertainty calculated from wastewater composition and treatment model
- sewer grid, 1.1E10l/year, 242 km: 1.6832e-7 km; lognormal variance with pedigree 0.04, pedigree (1,1,5,1,1)
  uncertainty heeded in exchanges of the module
  This exchange has an activity link directly to the producing activity because the product is primarily consumed in the same geographical area where it is produced.
- heat, central or small-scale, other than natural gas: 0.0134599 MJ; lognormal variance with pedigree 0.04, pedigree (1,1,5,1,1)
  (same comment as for heat, district or industrial, natural gas)
- wastewater treatment facility, capacity 1.1E10l/year: 1.9883e-9 unit; lognormal variance with pedigree 0.04, pedigree (1,1,5,1,1)
  (same comment as for sewer grid, 1.1E10l/year, 242 km)
- chemical, inorganic: 3.93e-8 kg; lognormal variance with pedigree 0.47, pedigree (1,1,5,1,1)
  (same comment as for heat, district or industrial, other than natural gas)
  properties: carbon content, fossil 0.003, dry mass 1 kg, wet mass 1 kg
  note on carbon content, fossil: This dataset is an unweighted average of 20 inorganic substances (listed in Tab 88.1, ecoinvent v2.2 report 8, part II), being part of the top100 chemicals included in this database. The C-content has also been calculated as an unweighted average of the C content of the substances composing this dataset.
- municipal waste incineration facility: 3.2069e-13 unit; lognormal variance with pedigree 0.17, pedigree (1,1,5,1,1)
  (same comment as for heat, district or industrial, other than natural gas)
- process-specific burdens, municipal waste incineration: 0.0012827 kg; lognormal variance with pedigree 0.17, pedigree (1,1,5,1,1)
  (same comment as for process-specific burdens, slag landfill)
- electricity, high voltage: 0.00018442 kWh; lognormal variance with pedigree 0.62, pedigree (1,1,5,1,1)
  (same comment as for heat, district or industrial, other than natural gas)
- waste plastic, mixture: -0.0155 kg; lognormal variance with pedigree 0.04, pedigree (1,1,5,1,1)
  (same comment as for heat, district or industrial, natural gas)
  production volume 0.000521847 kg; = (Ref('a379bc36-b80e-413a-a5e8-2c6838bd5ccf')*-1)* Ref('38d11b46-12b2-4f77-ad8b-5764f23e4e43', 'ProductionVolume')/ABS( Ref('38d11b46-12b2-4f77-ad8b-5764f23e4e43'))
    Calculated from the production volume of wastewater from tube collector production in proportion to the respective output amounts.
  properties: water content 0.180638, carbon content, fossil 0.747344, dry mass 0.847 kg, wet mass 1 kg
  note on carbon content, fossil: C content in 1 kg DM was calculated using data in Tab A.2, ecoinvent v2.2 report 13_I
- electricity, low voltage: 0.028207 kWh; lognormal variance with pedigree 0.04, pedigree (1,1,5,1,1)
  (same comment as for heat, district or industrial, natural gas)
- cement, unspecified: 6.8251e-5 kg; lognormal variance with pedigree 0.08, pedigree (1,1,5,1,1)
  (same comment as for heat, district or industrial, other than natural gas)
  properties: wet mass 1 kg, dry mass 1 kg
- waste cement, hydrated: -0.00017063 kg; lognormal variance with pedigree 0.08, pedigree (1,1,5,1,1)
  (same comment as for heat, district or industrial, other than natural gas)
  production volume 5.74469e-6 kg; = (Ref('52c6965e-60f5-409d-8709-03edac518df3')*-1)* Ref('38d11b46-12b2-4f77-ad8b-5764f23e4e43', 'ProductionVolume')/ABS( Ref('38d11b46-12b2-4f77-ad8b-5764f23e4e43'))
    (same comment as for waste plastic, mixture)
  properties: dry mass 1 kg, wet mass 1 kg
- iron (III) chloride, without water, in 40% solution state: 7.1729e-6 kg; lognormal variance with pedigree 0.47, pedigree (1,1,5,1,1)
  direct wastewater treatment plant burden plus burden from sludge incineration. Uncertainty calculated from wastewater composition and treatment model
  properties: wet mass 1 kg, dry mass 1 kg
- slag landfill: 3.1659e-13 unit; lognormal variance with pedigree 0.07, pedigree (1,1,5,1,1)
  (same comment as for heat, district or industrial, other than natural gas)
- waste graphical paper: -0.0155 kg; lognormal variance with pedigree 0.04, pedigree (1,1,5,1,1)
  (same comment as for heat, district or industrial, natural gas)
  production volume 0.000521847 kg; = (Ref('23583d39-8c8f-4bf9-a244-ae94600f5faa')*-1)* Ref('38d11b46-12b2-4f77-ad8b-5764f23e4e43', 'ProductionVolume')/ABS( Ref('38d11b46-12b2-4f77-ad8b-5764f23e4e43'))
    (same comment as for waste plastic, mixture)
  properties: carbon content, non-fossil 0.454955, wet mass 1 kg, water content 0.126126, dry mass 0.888 kg
- liquid manure spreading, by vacuum tanker: 2.5894e-6 m3; lognormal variance with pedigree 0.05, pedigree (1,1,5,1,1)
  burden from sludge spreading. Uncertainty calculated from wastewater composition and treatment model
  This exchange has an activity link directly to the producing activity because the product is primarily consumed in the same geographical area where it is produced.
- process-specific burdens, residual material landfill: 0.00017063 kg; lognormal variance with pedigree 0.07, pedigree (1,1,5,1,1)
  (same comment as for process-specific burdens, slag landfill)
- hydrochloric acid, without water, in 30% solution state: 2.358e-8 kg; lognormal variance with pedigree 0.47, pedigree (1,1,5,1,1)
  (same comment as for heat, district or industrial, other than natural gas)
  properties: wet mass 1 kg, dry mass 1 kg
- residual material landfill: 3.5547e-13 unit; lognormal variance with pedigree 0.07, pedigree (1,1,5,1,1)
  (same comment as for heat, district or industrial, other than natural gas)

## Emissions to nature
- Tin, ion [water, ground-, long-term]: 0.0001196 kg; lognormal variance with pedigree 1.27, pedigree (1,1,5,1,1)
  emission from sludge incineration. Uncertainty calculated from wastewater composition and treatment model
- Methane, fossil [air, urban air close to ground]: 5.1309e-9 kg; lognormal variance with pedigree 0.23, pedigree (1,1,5,1,1)
  (same comment as for Tin, ion)
- Carbon monoxide, fossil [air, urban air close to ground]: 1.792e-7 kg; lognormal variance with pedigree 0.82, pedigree (1,1,5,1,1)
  (same comment as for Tin, ion)
- Silver, ion [water, ground-, long-term]: 2.8626e-5 kg; lognormal variance with pedigree 0.8, pedigree (1,1,5,1,1)
  (same comment as for Tin, ion)
- Water [water, unspecified]: 0.9 m3; name water_to_water_unspecified; lognormal variance with pedigree 0.0807, pedigree (2,2,5,1,1)
  Calculated value based on water balance.
  property carbon content, non-fossil 0; name C_content_non_fossil
  property fraction, origin: fresh water 1; name fraction_origin_fresh_water_Ww
  property dry mass 0 kg; name DM
  property wet mass 1000 kg; name WM
  property fraction, origin: salt water 0; name fraction_origin_salt_water_Ww
  property fraction, origin: unspecified 0; name fraction_origin_unspecified_Ww
  property carbon content, fossil 0; name C_content_fossil
  property water in wet mass 1000 kg; name WWM
- Tin [air, urban air close to ground]: 3.1569e-7 kg; lognormal variance with pedigree 0.74, pedigree (1,1,5,1,1)
  direct digester gas emission plus emission from sludge incineration. Uncertainty calculated from wastewater composition and treatment model
- Tin [soil, agricultural]: 0.00015005 kg; lognormal variance with pedigree 0.72, pedigree (1,1,5,1,1)
  emission from sludge spreading. Uncertainty calculated from wastewater composition and treatment model
- Water [air, unspecified]: 0.1 m3; name water_to_air_unspecified; lognormal variance with pedigree 0.0807, pedigree (2,2,5,1,1)
  Calculated value based on water balance.
  property fraction, origin: unspecified 1; name fraction_origin_unspecified
  property fraction, origin: salt water 0; name fraction_origin_salt_water
  property fraction, origin: fresh water 0; name fraction_origin_fresh_water
- Silver [air, urban air close to ground]: 5.9004e-10 kg; lognormal variance with pedigree 0.77, pedigree (1,1,5,1,1)
  (same comment as for Tin)
- Silver [soil, agricultural]: 2.8643e-5 kg; lognormal variance with pedigree 0.72, pedigree (1,1,5,1,1)
  (same comment as for Tin)
- Fluoride [water, surface water]: 0.000444 kg; lognormal variance with pedigree 0.68, pedigree (1,1,5,1,1)
  sewer overload discharge plus direct wastewater treatment plant emission plus emission from sludge incineration. Uncertainty calculated from wastewater composition and treatment model
- Tin, ion [water, surface water]: 0.00027903 kg; lognormal variance with pedigree 0.66, pedigree (1,1,5,1,1)
  (same comment as for Fluoride)
- Silver, ion [water, surface water]: 2.5943e-5 kg; lognormal variance with pedigree 0.66, pedigree (1,1,5,1,1)
  (same comment as for Fluoride)

## Extrapolations
This dataset has been extrapolated from year 2000 to the year of the calculation (2019). The uncertainty has been adjusted accordingly.

## Review by Niels Jungbluth 2009-01-22
passed.
