# copper production, primary

Dataset: EcoSpold 2, unit process
Geography: RER
Time period: 1994-01-01 to 2019-12-31
Technology level: current
Classification: ISIC rev.4 ecoinvent: 2420:Manufacture of basic precious and other non-ferrous metals
Tags: ConvertedDataset
Scenario: Business-as-Usual
System model: Allocation at the point of substitution
Share of production covered: 94.9 %
Generated by: [System]
Published in: Althaus H.-J. 2000
Database: ecoinvent
isCopyrightProtected: true
accessRestrictedTo: 1

## General comment
This dataset represents the production of primary copper in RER, in 1994. It is designed for the use of the metal as raw material for the semis manufacturing or as alloying element. For the building of this datset, multiple process alternatives have been considered according to their production share, which sums up to 84 % of the world production. Thus, the inventory is partly aggregated and reflects the mix of the different process alternatives within process steps.

## Included activities start
From the reception of copper concentrate at the factory gate.

## Included activities end
This dataset ends with the remelting of copper cathodes and casting of shapes, at the factory. The dataset includes the drying and roasting of copper concentrates, the smelting of the roaster product, the converting of the sulphide melt, the fire refining of copper from the converter, the electrolytic refining of copper, and the disposal of dross and slag in a landfill.

## Geography
This module is valid for the whole corresponding region. Some agents used like lime or sodium cyanide originate from data sets valid for Switzerland or Europe.

## Technology
The ore is pre-treated, reduced and refined according to the country specific mix of process alternatives: reverberatory furnace 6.2%; flash smelting furnaces 76.0%; other 17.8%.; SX-EW 0.0%. An overall abatement for sulphur dioxide of 95.0% was estimated.
Pyrometallurgy:
The pyrometallurgical treatment of copper concentrates includes three types of unit operation: drying & roasting (pre-treatment), smelting & converting (reduction), and finally refining. In the roasting step sulphur is driven off as sulphur dioxide and part of the iron is oxidised. Drying is done by gas. In smelt-ing, the roaster product is melted with a siliceous flux which combines with the oxidised iron to produce two immiscible phases, a liquid silicate slag which can be discarded, and a solution of molten sulphides which contains the metal values. In the converting operation on the sulphide melt, more sulphur is driven off as sulphur dioxide, and the remaining iron is oxidised and fluxed for removal as silicate slag, leaving a high-grade copper sulphide matte. In several modern operations the roasting step has been eliminated, and the copper sulphide concentrate is treated directly in the smelter. The converted copper is referred to as blister copper with a purity of 98%
Emissions: In every process steps sulphur dioxide is emitted to air. Recovery of sulphur dioxide is only economic for high concentrated off-gas. SO2 emissions are by far the most important in the metallurgy. In the beneficiation step, considerable amounts of lime is added to the ore for pH-stabilisation. Lime forms later flux in the metallurgical step. Lime decomposes into CO2 to form calcite. Dust carries over from the roasting, smelting and converting processes. Particulate emissions to air consist of metals and thus are often returned to the leaching process after treatment. Metals and their compounds and substances in suspension are the main pollutants emitted to water. The metals concerned are Cu, Ni, Co, As, and Cr. Other significant substances are chlorides and sulphates. Wastewater from wet gas cleaning (if used) of the different metallurgical stages is the most important source. The leaching stages are usually operated on a closed circuit and drainage systems, and are therefore regarded as minor sources.
Waste: The production of metals is related to the generation of several co-products, residues and wastes, which are listed in the European Waste Catalogue. Some of the process specific residues can be reused or recovered in preliminary process steps (e. g. dross, filter dust) or construction (e. g. cleaned slag). Residues also arise from the treatment of liquid effluents, the main residue being gypsum waste and metal hydroxides from the wastewater neutralisation plant. These residuals have to be disposed, usually in lined ponds.
Refining:
Conventional refining comprises three stages: (1) pyrometallurgical or fire refining, (2) electrolytic refining, and (3) remelting of cathodes and casting of shapes. Fire refining is applied to crude copper from converters and furnaces, cement copper from hydrometallurgy, anode scrap from electrolytic refining, and high-grade copper scrap, chiefly unalloyed wire scrap. About 80 % of the world copper production is refined by electrolysis. This treatment yields copper with high electrical conductivity and provides for separation of valuable impurities, especially precious metals. Copper cathodes must be remelted and cast to shapes because the structure of copper formed by electro-crystallization is not suitable for working to semi finished products. Cathodes are remelted in several types of special furnaces that perform the tasks of melting, post refining (if necessary), holding, and casting.
Emissions: The combustion of sulphur leads to emissions of SO2. Nitrogen oxides are produced in significant amounts during acid digestion using nitric acid. Chlorine and HCl can be formed during a number of digestion, electrolytic, and purification processes. Dust and metals are generally emitted from incinerators and furnaces. Organic compounds, namely dioxins, can be emitted from smelting stages resulting from the poor combustion of oil and plastic in the feed material. All these emissions are subject to abatement technologies and controlling. Large quantities of effluents contain substantial amounts of metals and organic substances.
Waste: Like in the pyrometallurgical step, considerable quantities of solid residuals are generated, which are mostly recycled within the process or sent to other specialists to recover any precious metals. Final residues generally comprise hydroxide filter cakes (iron hydroxide, 60% water, cat I industrial waste).

## Parameters
- fraction, process water, to air: 0.15 dimensionless; name fraction_PW_to_air; lognormal variance with pedigree 0.092025, pedigree (4,4,3,2,4)
  Literature value. In case when no industry/process specific data are available, default evaporation fraction value is used. This value is 15% and is based on literature (Statistics Canada, 2007 & Shaffer, K.H., 2008, Consumptive water use in the Great Lakes Basin, USGS & Shiklomanov, 2003, World Water Resources at the Beginning of the 21st Century) and has been approved by an expert.

## Reference product
- copper: 1 kg; name RP_amount; source Krauss U. 1999; By-product classification allocatable product; CPC 41413: Refined copper and copper alloys, unwrought; master alloys of copper
  Copper, the red metal, apart from gold the only metallic element with a colour different from a grey tone, has been known since the early days of the human kind. It has always been one of the significant materials, and today it is the most frequently used heavy non-ferrous metal. The utility of pure copper is based on its physical and chemical properties, above all its electrical and thermal conductivity (exceeded only by silver), its outstanding ductility and thus excellent workability, and its corrosion resistance (a chemical behaviour making it a half-noble metal). Copper compounds and ores are distinguished by bright coloration, especially reds, greens, and blues. Copper in soil is an essential trace element for most creatures, including humans. Its common alloys, particularly brass and bronze, are of great practical importance. Commercial grades of cathode copper today range from 99.95% to 99.97% pure. Before end-use copper is manufactured into semi fabricated products, such as shapes and ingots (known as 'semis'). These manufacturing processes are subdivided into hot working, cold working and, if necessary, process annealing. Few of the semis are ready for use as such. They more typically travel to first-stage manufacturers, who make metal rods, wire, and casting, and then to component manufacturers who produce such things as motors, valves, and insulated cables The components in turn are incorporated by final-stage manufacturers into a variety of finished products - automobiles, commercial buildings, residential housing, and so forth. These uses account for about 79% of the world-wide consumption of copper.
  production volume 1.7312e9 kg; name RP_PV
    Source: USGS Minerals Yearbook 2015. Available from: https://www.usgs.gov/centers/nmic/copper-statistics-and-information (downloaded 21 June 2019), Table 22. Data for Belgium, Bulgaria, Finland, Germany, Norway, Poland, Serbia and Spain (primary, other)
  property price 5.52 EUR2005
    Literature value (http://www.economist.com/news/business/21576714-mining-industry-has-enriched-chile-its-future-precarious-copper-solution). Average price between 20015 and 2013.
  property carbon content 0
    carbon content on a dry matter basis (reserved; not for manual entry)
  property true value 5.52; name RP_amount_true_value
    allocation property applied in "true value" allocation // value calculated from revenue
  properties: carbon content, non-fossil 0, wet mass 1 kg, water in wet mass 0 kg, carbon content, fossil 0, dry mass 1 kg, water content 0, carbon allocation 0 kg

## By-products
- electricity, for reuse in municipal waste incineration only: 0 kWh; CPC 17100: Electrical energy; By-product classification allocatable product; pedigree (1,1,1,1,1)
  Net electricity generated from this waste and used in internal MSWI plant energy redistribution.
  Uncertainty: uncertainty is calculated from uncertainties in waste composition and uncertainties in energy efficiency and the uncertainty in internal energy demand
  production volume 243822 kWh
  property exergy 3.6 MJ; name E_el_prod_MSWI_exergy
    This exergy property is based on the exergy content of the product.
  property true value relation 3.6; name E_el_prod_MSWI_true_value_relation
    property to calculate "true value" from
  property price 0.1 EUR2005; name E_el_prod_MSWI_price_EUR2005
    Estimated to be the same price as in case of electricity, medium voltage.
  property true value 1.80956e-5
    allocation property applied in "true value" allocation // value calculated from true value relation
- heat, for reuse in municipal waste incineration only: 0 MJ; CPC 17300: Steam and hot water; By-product classification allocatable product; pedigree (1,1,1,1,1)
  Net useful heat generated from this waste and used in internal MSWI plant energy redistribution.
  Uncertainty: uncertainty is calculated from uncertainties in waste composition and uncertainties in energy efficiency and the uncertainty in internal energy demand
  production volume 1.72501e6 MJ
  property true value relation 0.1842; name E_th_prod_MSWI_true_value_relation
    property to calculate "true value" from
  property exergy 0.1842 MJ; name E_th_prod_MSWI_exergy
    This exergy property is based on the exergy content of the product.
  property price 0.0106 EUR2005; name E_th_prod_MSWI_price_EUR2005
    Average European district heat price from Ecoheatcool and Euroheat 2005-2006, Ecoheat Work package 1: The European heat market. Final report. 10.6 EUR/GJ i s the price of district heat. http://www.solarthermalworld.org/files/Ecoheatcool%20WP1%20Web.pdf?download
  property true value 6.55054e-6
    (same comment as for electricity, for reuse in municipal waste incineration only)
- zinc concentrate: 0 kg; CPC 14290: Other non-ferrous metal ores and concentrates (other than uranium or thorium ores and concentrates); By-product classification allocatable product
  Calculated value from the knowledge of the properties of both products.
  production volume 43.1566 kg
  property price 0.38 EUR2005; name ByP_price_EUR2005
    Temporary price data. Calculated as 90% of purchasers price based on: Zinc content in concentrate 53%. Concentrate price per kg Zn 86.5% of refined Zn price (13.5% treatment charges according to CHR Metals Limited 2005: Dynamic cost curves. http://www.minecost.com/dynamic.pdf). 2004 zinc price from USGS (2007) Mineral commodity summaries 2007. <http://minerals.usgs.gov/minerals/pubs/mcs/2007/mcs2007.pdf> [Accessed 25 May 2010]
  property zinc content 0.53; name zinc_C_zinc_concentrate
    Zinc content on a dry matter basis. Value taken from teh "zinc mine operation" /GLO dataset.
  property dry mass 1 kg; name DM_zinc_concentrate
  property carbon content 0
    carbon content on a dry matter basis (reserved; not for manual entry)
  property true value 9.47292e-9
    allocation property applied in "true value" allocation // value calculated from revenue
  properties: wet mass 1 kg, water content 0, carbon content, non-fossil 0, carbon content, fossil 0, water in wet mass 0 kg, carbon allocation 0 kg

## Inputs from technosphere
- copper concentrate, sulfide ore: 4.13998 kg; source Krauss U. 1999; lognormal variance with pedigree 0.0408, pedigree (2,2,5,3,1)
  Modelled, based on ISIC 2420 - pdf, on the dedicated talk page of ecoinvent (www.ecoinvent.org/documentation). See part 'Regarding pyro-metallurgical copper production'.
  properties: wet mass 1 kg, dry mass 1 kg
- copper slag: -0.924996 kg; name copper_slag_amount; source Krauss U. 1999; lognormal variance with pedigree 0.0408, pedigree (2,2,5,3,1)
  Proxy: 'Nickel smelter slag, 0% water' is used as a proxy. Estimation: 50% of the slag is recycled, and 50% is disposed in a landfill.
  production volume 1.60136e9 kg; = abs(copper_slag_amount/RP_amount)*RP_PV
    Calculated from the production volume of copper in proportion to the respective output amounts.
  property price 0 EUR2005; name copper_slag_amount_price_EUR2005
  properties: silicon content 0.155, wet mass 1 kg, potassium content 0.0317, calcium content 0.00713, zinc content 0.00606, dry mass 1 kg, tungsten content 0.23999, magnesium content 0.00485, aluminium content 0.0267, iron content 0.379, sodium content 0.008, copper content 0.00807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
- oxygen, liquid: 0.299999 kg; source Krauss U. 1999; lognormal variance with pedigree 0.0408, pedigree (2,2,5,3,1)
  (same comment as for copper concentrate, sulfide ore)
  properties: wet mass 1 kg, dry mass 1 kg
- lime, packed: 0 kg; pedigree (1,1,1,1,1)
  Estimation from dataset author: Additional 250 kg of limestone per tonne of copper has been assumed in this study according to Ayres et al. (2002). Further references: Ayres R. U., Ayres L. W. and Råde I. (2002) The Life Cycle of Copper, its Co-Products and Byproducts. MMSD - Mining, Minerals and Sustainable Development, Online-Version under: <http://www.iied.org/mmsd/mmsd_pdfs/ayres_lca_main.pdf>.
  properties: carbon content, fossil 0.117492, dry mass 0.998 kg, wet mass 1 kg, water content 0.00200401
  note on carbon content, fossil: Table 3.1, ecoinvent v2.2 report 7, part VII, pg 3. MW CaCO3=100, MW MgCO3=84
- heat, district or industrial, other than natural gas: 4.30348 MJ; source Krauss U. 1999; lognormal variance with pedigree 0.0408, pedigree (2,2,5,3,1)
  Proxy: 'heat, district or industrial, other than natural gas' is used as a proxy for fossile energy from heavy fuel oil & coke.
- heat, district or industrial, natural gas: 3.55298 MJ; source Krauss U. 1999; lognormal variance with pedigree 0.0408, pedigree (2,2,5,3,1)
  (same comment as for copper concentrate, sulfide ore)
- wastewater, unpolluted: -0.00579997 m3; name wastewater_amount; lognormal variance with pedigree 0.0407, pedigree (2,2,5,1,1)
  Modelled, based on ISIC 2420 - pdf, on the dedicated talk page of ecoinvent (www.ecoinvent.org/documentation). See part "Regarding pyro-metallurgical copper production".
  production volume 1.0041e7 m3; = abs(wastewater_amount/RP_amount)*RP_PV
    Calculated from production volume of reference product using the relative outputs.
  property price 0 EUR2005; name wastewater_amount_price_EUR2005
  properties: water content 2962.17, wet mass 1000 kg, dry mass 0.337476 kg, carbon content, non-fossil 0.00178991, carbon content, fossil 0.00178991
  note on carbon content, fossil: Assumed to be like in tap water. Bicarbonate content is 2.93 mol/m3. CO2 content is 0.1 mol/m3 (ecoinvent v2.2 report 8, Tab 93.1).
- silica sand: 0.749997 kg; source Krauss U. 1999; lognormal variance with pedigree 0.1102, pedigree (5,2,5,3,1)
  (same comment as for copper concentrate, sulfide ore)
  properties: dry mass 0.99 kg, water content 0.010101, wet mass 1 kg
- anode, for metal electrolysis: 0.000999996 kg; source Krauss U. 1999; lognormal variance with pedigree 0.23, pedigree (5,5,5,5,4)
  (same comment as for copper concentrate, sulfide ore)
  properties: carbon content, fossil 0.865971, wet mass 1 kg, dry mass 1 kg
  note on carbon content, fossil: The main component of the anode is carbon, coming from bitumen and petroleum coke (ecoinvent v2.2 report 10). The C content in those components of the anode has been taken into account to calculate the anode final C content.
- electricity, high voltage: 0.218999 kWh; source Krauss U. 1999; lognormal variance with pedigree 0.0408, pedigree (2,2,5,3,1)
  Modelled, based on ISIC 2420 - pdf, on the dedicated talk page of ecoinvent (www.ecoinvent.org/documentation). See part 'Regarding pyro-metallurgical copper production'. Estimation: 40% of the total electricity used is comes from the grid.
- electricity, high voltage: 0.327999 kWh; lognormal variance with pedigree 0.0408, pedigree (2,2,5,3,1)
  Modelled, based on ISIC 2420 - pdf, on the dedicated talk page of ecoinvent (www.ecoinvent.org/documentation). See part 'Regarding pyro-metallurgical copper production'. Estimation: 60% of the total electricity used is comes from hydropower.
- non-ferrous metal smelter: 1.13999e-11 unit; lognormal variance with pedigree 0.3601, pedigree (3,2,5,1,3)
  Estimation from dataset author.
- lime, packed: 0.243792, 0.00620695 kg (2 entries); lognormal variance with pedigree 0.1102, pedigree (5,2,5,3,1)
  (same comment as for lime, packed)

## Inputs from nature
- Water, river [natural resource, in water]: 0.00579997 m3; name water_river_input; source Krauss U. 1999; lognormal variance with pedigree 0.0407, pedigree (2,2,5,1,1)
  Modelled, based on ISIC 2420 - pdf, on the dedicated talk page of ecoinvent (www.ecoinvent.org/documentation). See part 'Regarding pyro-metallurgical copper production'. Modelled, based on ISIC 2420 - pdf, on the dedicated talk page of ecoinvent (www.ecoinvent.org/documentation). See part 'Regarding pyro-metallurgical copper production'.

## Emissions to nature
- Copper [air, non-urban air or from high stacks]: 0.000249999 kg; source EEA 1999; lognormal variance with pedigree 0.7101, pedigree (3,2,5,1,3)
  (same comment as for copper concentrate, sulfide ore)
- Tin [air, non-urban air or from high stacks]: 6.24997e-6 kg; source EEA 1999; lognormal variance with pedigree 0.7101, pedigree (3,2,5,1,3)
  (same comment as for copper concentrate, sulfide ore)
- Dioxins, measured as 2,3,7,8-tetrachlorodibenzo-p-dioxin [air, non-urban air or from high stacks]: 1.99999e-12 kg; source IPPC 2001; lognormal variance with pedigree 0.3601, pedigree (3,2,5,1,3)
  Literature value
- Arsenic, ion [water, surface water]: 1.08e-7 kg; source IPPC 2001; lognormal variance with pedigree 1.37, pedigree (1,1,5,1,1)
  (same comment as for copper concentrate, sulfide ore)
- Mercury [air, non-urban air or from high stacks]: 9.99996e-8 kg; source EEA 1999; lognormal variance with pedigree 0.7101, pedigree (3,2,5,1,3)
  (same comment as for copper concentrate, sulfide ore)
- Cadmium, ion [water, surface water]: 1.57999e-8 kg; source IPPC 2001; lognormal variance with pedigree 1.37, pedigree (1,1,5,1,1)
  (same comment as for copper concentrate, sulfide ore)
- Particulates, < 2.5 um [air, non-urban air or from high stacks]: 5.07998e-7 kg; source IPPC 2001; lognormal variance with pedigree 0.3601, pedigree (3,2,5,1,3)
  (same comment as for copper concentrate, sulfide ore)
- Sulfur dioxide [air, non-urban air or from high stacks]: 0.0356998 kg; source Krauss U. 1999; lognormal variance with pedigree 0.1401, pedigree (5,4,5,3,3)
  (same comment as for copper concentrate, sulfide ore)
- Water [air, unspecified]: 0.000869996 m3; name water_to_air_unspecified; = (water_river_input*fraction_PW_to_air); lognormal variance with pedigree 0.0807, pedigree (2,2,5,1,1)
  Calculated value based on literature values and expert opinion. See comments in the parametres' comment field.
  property fraction, origin: unspecified 0; name fraction_origin_unspecified
  property fraction, origin: fresh water 1; name fraction_origin_fresh_water
  property fraction, origin: salt water 0; name fraction_origin_salt_water
- NMVOC, non-methane volatile organic compounds, unspecified origin [air, non-urban air or from high stacks]: 1.49999e-5 kg; source EEA 1999; lognormal variance with pedigree 0.1001, pedigree (3,2,5,1,3)
  (same comment as for copper concentrate, sulfide ore)
- Zinc, ion [water, surface water]: 4.90998e-7 kg; source IPPC 2001; lognormal variance with pedigree 1.37, pedigree (1,1,5,1,1)
  (same comment as for copper concentrate, sulfide ore)
- Selenium [air, non-urban air or from high stacks]: 5.49998e-6 kg; source EEA 1999; lognormal variance with pedigree 0.7101, pedigree (3,2,5,1,3)
  (same comment as for copper concentrate, sulfide ore)
- Vanadium [air, non-urban air or from high stacks]: 3.74998e-7 kg; source EEA 1999; lognormal variance with pedigree 0.7101, pedigree (3,2,5,1,3)
  (same comment as for copper concentrate, sulfide ore)
- Arsenic [air, non-urban air or from high stacks]: 3.24999e-5 kg; source EEA 1999; lognormal variance with pedigree 0.7101, pedigree (3,2,5,1,3)
  (same comment as for copper concentrate, sulfide ore)
- Carbon monoxide, fossil [air, non-urban air or from high stacks]: 2.99999e-5 kg; source IPPC 2001; lognormal variance with pedigree 0.7101, pedigree (3,2,5,1,3)
  Literature value
- Nickel, ion [water, surface water]: 1.22999e-7 kg; source IPPC 2001; lognormal variance with pedigree 1.37, pedigree (1,1,5,1,1)
  (same comment as for copper concentrate, sulfide ore)
- Tin, ion [water, surface water]: 1.65999e-7 kg; source IPPC 2001; lognormal variance with pedigree 1.37, pedigree (1,1,5,1,1)
  (same comment as for copper concentrate, sulfide ore)
- Antimony [air, non-urban air or from high stacks]: 5.49998e-6 kg; source EEA 1999; lognormal variance with pedigree 0.7101, pedigree (3,2,5,1,3)
  (same comment as for copper concentrate, sulfide ore)
- Carbon dioxide, fossil [air, non-urban air or from high stacks]: 0.11 kg; source Krauss U. 1999; lognormal variance with pedigree 0.1801, pedigree (5,4,5,3,3)
  Calculated value: The calcination of previously added lime (in the copper mining process) releases 0.44 kg CO2 per tonne lime.
- Cadmium [air, non-urban air or from high stacks]: 6.49997e-6 kg; source EEA 1999; lognormal variance with pedigree 0.7101, pedigree (3,2,5,1,3)
  (same comment as for copper concentrate, sulfide ore)
- Copper, ion [water, surface water]: 3.04999e-7 kg; source IPPC 2001; lognormal variance with pedigree 1.37, pedigree (1,1,5,1,1)
  (same comment as for copper concentrate, sulfide ore)
- Chromium, ion [water, surface water]: 1.65999e-7 kg; source IPPC 2001; lognormal variance with pedigree 1.37, pedigree (1,1,5,1,1)
  (same comment as for copper concentrate, sulfide ore)
- Particulates, > 2.5 um, and < 10um [air, non-urban air or from high stacks]: 0.000303999 kg; source IPPC 2001; lognormal variance with pedigree 0.0701, pedigree (3,2,5,1,3)
  (same comment as for copper concentrate, sulfide ore)
- Mercury [water, surface water]: 1.65999e-9 kg; source IPPC 2001; lognormal variance with pedigree 1.37, pedigree (1,1,5,1,1)
  (same comment as for copper concentrate, sulfide ore)
- Chromium [air, non-urban air or from high stacks]: 4.99998e-8 kg; source EEA 1999; lognormal variance with pedigree 0.7101, pedigree (3,2,5,1,3)
  (same comment as for copper concentrate, sulfide ore)
- Zinc [air, non-urban air or from high stacks]: 0.000149999 kg; source EEA 1999; lognormal variance with pedigree 0.7101, pedigree (3,2,5,1,3)
  (same comment as for copper concentrate, sulfide ore)
- Manganese [air, non-urban air or from high stacks]: 1.49999e-5 kg; source EEA 1999; lognormal variance with pedigree 0.7101, pedigree (3,2,5,1,3)
  (same comment as for copper concentrate, sulfide ore)
- Lead [water, surface water]: 9.25996e-8 kg; source IPPC 2001; lognormal variance with pedigree 1.37, pedigree (1,1,5,1,1)
  (same comment as for copper concentrate, sulfide ore)
- Particulates, > 10 um [air, non-urban air or from high stacks]: 0.000102 kg; source IPPC 2001; lognormal variance with pedigree 0.0901, pedigree (3,2,5,1,3)
  (same comment as for copper concentrate, sulfide ore)
- Lead [air, non-urban air or from high stacks]: 0.000149999 kg; source EEA 1999; lognormal variance with pedigree 0.7101, pedigree (3,2,5,1,3)
  (same comment as for copper concentrate, sulfide ore)
- Nickel [air, non-urban air or from high stacks]: 5.49998e-5 kg; source EEA 1999; lognormal variance with pedigree 0.7101, pedigree (3,2,5,1,3)
  (same comment as for copper concentrate, sulfide ore)

## Sampling procedure
literature

## Extrapolations
see Geography and Technology
