# treatment of used printer, laser, manual dismantling

Dataset: EcoSpold 2, unit process
Geography: RoW
Time period: 2005-01-01 to 2019-12-31
Technology level: current
Classification: EcoSpold01Categories: waste management/recycling
Classification: ISIC rev.4 ecoinvent: 3830:Materials recovery
Tags: ConvertedDataset; Treatment
Scenario: Business-as-Usual
System model: Allocation at the point of substitution
Share of production covered: 100 %
Generated by: Roland Hischier
Published in: Hischier R. 2007
Database: ecoinvent
isCopyrightProtected: true
accessRestrictedTo: 1

## General comment
manual dismantling in various fractions based on common transfer coefficients for this type of treatment. Data from own experiences in Switzerland.
[This dataset was already contained in the ecoinvent database version 2. It was not individually updated during the transfer to ecoinvent version 3. Life Cycle Impact Assessment results may still have changed, as they are affected by changes in the supply chain, i.e. in other datasets. This dataset was generated following the ecoinvent quality guidelines for version 2. It may have been subject to central changes described in the ecoinvent version 3 change report (http://www.ecoinvent.org/database/ecoinvent-version-3/reports-of-changes/), and the results of the central updates were reviewed extensively. The changes added e.g. consistent water flows and other information throughout the database. The documentation of this dataset can be found in the ecoinvent reports of version 2, which are still available via the ecoinvent website. The change report linked above covers all central changes that were made during the conversion process.]

## Included activities end
This dataset represents the manual dismantling of a WEEE devices in Switzerland.

## Geography
data of situation in Switzerland

## Technology
current manual dismantling activities in Switzerland.

## Reference product
- used printer, laser: -1 kg; By-product classification Waste; CPC 39990: Other wastes n.e.c.
  EcoSpold01Location=CH
  production volume 7.14087e6 kg; = 0.23 * 15680441.25*2
    Assumption: 23% globally are manually dismantled. See ecoinvent v.2.2 report. Total amount of dismantling assumed to be equal to total amount of production globally.
  property price 0 EUR2005
    Waste products are assigned a price of zero as they are assumed to require further treatment.
  property carbon content, fossil 0.583701
    Composition data from laser jet printer, divided by its weight 5.87 kg (Tab 4.12, ecoinvent v2.2 report 18_V)
  property carbon content, non-fossil 0
    (same comment as for used printer, laser)
  property carbon content 0.583701
    carbon content on a dry matter basis (reserved; not for manual entry)
  properties: dry mass 1 kg, water in wet mass 0 kg, wet mass 1 kg, water content 0, carbon allocation 0.583701 kg

## By-products
All rows: By-product classification allocatable product
- heat, district or industrial, other than natural gas: 0 MJ; CPC 17300: Steam and hot water; pedigree (1,1,1,1,1)
  net production of heat from landfill gas utilisation.
  Uncertainty: U
  property price 0.0106 EUR2005
    Average European district heat price from Ecoheatcool and Euroheat 2005-2006, Ecoheat Work package 1: The European heat market. Final report. 10.6 EUR/GJ i s the price of district heat. http://www.solarthermalworld.org/files/Ecoheatcool%20WP1%20Web.pdf?download
  property carbon content 0
    carbon content on a dry matter basis (reserved; not for manual entry)
  properties: wet mass 1 kg, water content 0, water in wet mass 0 kg, true value relation 0.1842, dry mass 1 kg, carbon content, non-fossil 0, carbon content, fossil 0, carbon allocation 0 kg
- electricity, medium voltage: 0 kWh; CPC 17100: Electrical energy; pedigree (1,1,1,1,1)
  net production of electricity from landfill gas utilisation (minus electricity demand for landfill gas pumping).
  Uncertainty: U
  property price 0.1 EUR2005
    Calculated to be between the price of electricity, high voltage and electricity, low voltage.
  properties: true value relation 3.6
- heat, for reuse in municipal waste incineration only: 0 MJ; CPC 17300: Steam and hot water; pedigree (1,1,1,1,1)
  Net electricity generated from this waste and used in internal MSWI plant energy redistribution.
  Uncertainty: uncertainty is calculated from uncertainties in waste composition and uncertainties in energy efficiency and the uncertainty in internal energy demand
  property exergy 0.1842 MJ; name E_th_prod_MSWI_exergy
    This exergy property is based on the exergy content of the product.
  property price 0.0106 EUR2005; name E_th_prod_MSWI_price_EUR2005
    (same comment as for heat, district or industrial, other than natural gas)
  property true value relation 0.1842; name E_th_prod_MSWI_true_value_relation
    property to calculate "true value" from
- electricity, for reuse in municipal waste incineration only: 0 kWh; CPC 17100: Electrical energy; pedigree (1,1,1,1,1)
  (same comment as for heat, for reuse in municipal waste incineration only)
  property true value relation 3.6; name E_el_prod_MSWI_true_value_relation
    property to calculate "true value" from
  property price 0.1 EUR2005; name E_el_prod_MSWI_price_EUR2005
    Estimated to be the same price as in case of electricity, medium voltage.
  property exergy 3.6 MJ; name E_el_prod_MSWI_exergy
    This exergy property is based on the exergy content of the product.
- copper: 0 kg; CPC 41413: Refined copper and copper alloys, unwrought; master alloys of copper
  property price 5.52 EUR2005
    Literature value (http://www.economist.com/news/business/21576714-mining-industry-has-enriched-chile-its-future-precarious-copper-solution). Average price between 20015 and 2013.
  property carbon content 0
    carbon content on a dry matter basis (reserved; not for manual entry)
  properties: water in wet mass 0 kg, water content 0, carbon content, non-fossil 0, dry mass 1 kg, carbon content, fossil 0, wet mass 1 kg, carbon allocation 0 kg
- zinc concentrate: 0 kg; CPC 14290: Other non-ferrous metal ores and concentrates (other than uranium or thorium ores and concentrates)
  Calculated value from the knowledge of the properties of both products.
  property price 0.38 EUR2005; name ByP_price_EUR2005
    Temporary price data. Calculated as 90% of purchasers price based on: Zinc content in concentrate 53%. Concentrate price per kg Zn 86.5% of refined Zn price (13.5% treatment charges according to CHR Metals Limited 2005: Dynamic cost curves. http://www.minecost.com/dynamic.pdf). 2004 zinc price from USGS (2007) Mineral commodity summaries 2007. <http://minerals.usgs.gov/minerals/pubs/mcs/2007/mcs2007.pdf> [Accessed 25 May 2010]
  property zinc content 0.53; name zinc_C_zinc_concentrate
    Zinc content on a dry matter basis. Value taken from teh "zinc mine operation" /GLO dataset.
  property dry mass 1 kg; name DM_zinc_concentrate
  property carbon content 0
    carbon content on a dry matter basis (reserved; not for manual entry)
  properties: wet mass 1 kg, water content 0, carbon content, non-fossil 0, carbon content, fossil 0, water in wet mass 0 kg, carbon allocation 0 kg
- lead: 0 kg; CPC 41441: Lead, unwrought
  EcoSpold01Location=SE
  property price 0.744 EUR2005
    Temporary price data. Calculated as 90% of purchasers price based on: Source: ecoinvent v2 report 10-part IX, Tab 5.10 & 2.5
  property carbon content 0
    carbon content on a dry matter basis (reserved; not for manual entry)
  properties: wet mass 1 kg, water content 0, carbon content, non-fossil 0, carbon content, fossil 0, dry mass 1 kg, water in wet mass 0 kg, carbon allocation 0 kg
- nickel, 99.5%: 0 kg; CPC 41422: Unwrought nickel
  EcoSpold01Location=SE
  property price 10.4 EUR2005
    Temporary price data. Calculated as 90% of purchasers price based on: 2004 nickel price from USGS (2007) Mineral commodity summaries 2007. <http://minerals.usgs.gov/minerals/pubs/mcs/2007/mcs2007.pdf> [Accessed 25 May 2010]
  property carbon content 0
    carbon content on a dry matter basis (reserved; not for manual entry)
  properties: water in wet mass 0 kg, wet mass 1 kg, carbon content, non-fossil 0, dry mass 1 kg, water content 0, carbon content, fossil 0, carbon allocation 0 kg
- silver: 0 kg; CPC 41310: Silver (including silver plated with gold or platinum), unwrought or in semi-manufactured forms, or in powder […]; CAS 7440-22-4
  EcoSpold01Location=SE
  property price 178 EUR2005
    (same comment as for lead)
  property carbon content 0
    carbon content on a dry matter basis (reserved; not for manual entry)
  properties: wet mass 1 kg, carbon content, non-fossil 0, dry mass 1 kg, water content 0, carbon content, fossil 0, water in wet mass 0 kg, carbon allocation 0 kg
- palladium: 0 kg; CPC 4160: Other non-ferrous metals and articles thereof (including waste and scrap of some metals); cermets and articles […]
  EcoSpold01Location=SE
  property price 5640 EUR2005
    Temporary price data. Calculated as 90% of purchasers price based on: 2004 price from USGS (2007) Mineral commodity summaries 2007. <http://minerals.usgs.gov/minerals/pubs/mcs/2007/mcs2007.pdf> [Accessed 25 May 2010]
  property carbon content 0
    carbon content on a dry matter basis (reserved; not for manual entry)
  properties: wet mass 1 kg, carbon content, fossil 0, water in wet mass 0 kg, water content 0, carbon content, non-fossil 0, dry mass 1 kg, carbon allocation 0 kg
- gold: 0 kg; CPC 41320: Gold (including gold plated with platinum), unwrought or in semi-manufactured forms, or in powder form; CAS 7440-57-5
  EcoSpold01Location=SE
  property price 10600 EUR2005
    Temporary price data. Calculated as 90% of purchasers price based on: Source: ecoinvent v2 report 10-part IX, Tab 2.5
  property carbon content 0
    carbon content on a dry matter basis (reserved; not for manual entry)
  properties: wet mass 1 kg, carbon content, fossil 0, dry mass 1 kg, carbon content, non-fossil 0, water content 0, water in wet mass 0 kg, carbon allocation 0 kg

## Inputs from technosphere
- waste plastic, consumer electronics: -0.4992 kg; lognormal variance with pedigree 0.056, pedigree (3,4,5,5,1)
  EcoSpold01Location=CH
  Calculated - based on composition data
  Uncertainty: calculated - based on composition data
  production volume 3.56472e6 kg; = ABS( (Ref('7251d544-6c1a-4b0a-a0db-8d43bb41cf0e')*-1)/ Ref('3d265673-ab67-44f1-a2e9-fb52bf5d6f04')* Ref('3d265673-ab67-44f1-a2e9-fb52bf5d6f04', 'ProductionVolume'))
    Calculated from the production volume of used printer, laser in proportion to the respective output amounts.
  properties: dry mass 0.847 kg, water content 0.180638, wet mass 1 kg, carbon content, fossil 0.830215
  note on carbon content, fossil: C content in 1 kg DM was calculated using data in Tab A.2, ecoinvent v2.2 report 13_I
- waste polystyrene: 0 kg; pedigree (1,1,1,1,1)
  Calculated - based on composition data
  EcoSpold01Location=CH
  Uncertainty: calculated - based on composition data
  production volume 0 kg
    (same comment as for waste plastic, consumer electronics)
  properties: carbon content, fossil 0.922579, wet mass 1 kg, water content 0.00200401, dry mass 0.998 kg
- used cable: -0.0199 kg; lognormal variance with pedigree 0.056, pedigree (3,4,5,5,1)
  Calculated - based on composition data
  Uncertainty: calculated - based on composition data
  production volume 142103 kg; = ABS(Ref('3d265673-ab67-44f1-a2e9-fb52bf5d6f04', 'ProductionVolume') * ((Ref('a6da1fbe-7a23-41fa-a8ac-3bf442aa5231')*-1) / Ref('3d265673-ab67-44f1-a2e9-fb52bf5d6f04')))
    Calculated from production volume of reference product using the relative outputs.
  properties: wet mass 1 kg, dry mass 1 kg, carbon content, fossil 183.274
- used printed wiring boards: -0.0252 kg; lognormal variance with pedigree 0.056, pedigree (3,4,5,5,1)
  Calculated - based on composition data
  EcoSpold01Location=GLO
  Uncertainty: calculated - based on composition data
  production volume 179950 kg; = ABS( (Ref('75fff6b5-98e6-4b40-97b4-f5db45312070')*-1)/ Ref('3d265673-ab67-44f1-a2e9-fb52bf5d6f04')* Ref('3d265673-ab67-44f1-a2e9-fb52bf5d6f04', 'ProductionVolume'))
    (same comment as for waste plastic, consumer electronics)
  properties: wet mass 1 kg, carbon content, fossil 0.193742, dry mass 1 kg, carbon content, non-fossil 0.000960142
  note on carbon content, fossil: Composition of printed wiring boards used to calculate C content
- manual treatment facility, waste electric and electronic equipment: 1.6e-8 unit; lognormal variance with pedigree 0.578, pedigree (4,5,5,5,5)
  EcoSpold01Location=GLO
  Rough estimation of infrastructure
  Uncertainty: rough estimation of infrastructure
- waste polystyrene: -0.0172536, -0.00115282, -8.71859e-5, -0.000476156, -0.000192362, -0.000452155, -0.0147009, -0.120785 kg (8 entries); lognormal variance with pedigree 0.056, pedigree (3,4,5,5,1)
  (same comment as for waste polystyrene)
  production volume 1.10755e6 kg

## Sampling procedure
own experiences

## Extrapolations
none This dataset has been copied from an original dataset covering the geography CH. The uncertainty has been adjusted accordingly.

## Review by Jürgen Sutter 2007-08-31
passed.

## Review by Emilia Moreno Ruiz 2012-12-19
correction of exchange "used cable"
