# uranium production, diffusion, enriched 3.9%

Dataset: EcoSpold 2, unit process
Geography: RoW
Time period: 1980-01-01 to 2019-12-31
Technology level: current
Classification: ISIC rev.4 ecoinvent: 2011a: Manufacture of nuclear fuels
Classification: EcoSpold01Categories: nuclear power/production
Tags: ConvertedDataset
Scenario: Business-as-Usual
System model: Allocation at the point of substitution
Generated by: [System]
Published in: Dones, R. 2007
Database: ecoinvent
isCopyrightProtected: true
accessRestrictedTo: 1

## General comment
This module does not use a full, consistent set of data specific for the only operational USEC plant in Paducah, for there is no available literature source on that. However the data on the US "model diffusion plants" available in the literature and used herewith were most likely developed on the basis of the existing US facilities. The electricity consumption per unit of SWU of 2600 kWh/SWU is an average value from the literature. Extrapolating direct information from the plant operators, the electricity is assumed to be supplied almost entirely by the Tennessee Valley Authority (base load). The used mix is made of nearly 69% hard coal, about 26% nuclear, and about 5% run-of-river hydropower. Hence, the indirect environmental burdens imported through the high electricity uses are fully represented. Only little information was available for emission species to air and water from the US model diffusion plants, but an average emission of CFC-114 estimated from 2002 data is accounted for. The factor for the infrastructure requirement is calculated using an average capacity of two USEC plants of 9600 t SWU for assumed 50 years operation.
[This dataset was already contained in the ecoinvent database version 2. It was not individually updated during the transfer to ecoinvent version 3. Life Cycle Impact Assessment results may still have changed, as they are affected by changes in the supply chain, i.e. in other datasets. This dataset was generated following the ecoinvent quality guidelines for version 2. It may have been subject to central changes described in the ecoinvent version 3 change report (http://www.ecoinvent.org/database/ecoinvent-version-3/reports-of-changes/), and the results of the central updates were reviewed extensively. The changes added e.g. consistent water flows and other information throughout the database. The documentation of this dataset can be found in the ecoinvent reports of version 2, which are still available via the ecoinvent website. The change report linked above covers all central changes that were made during the conversion process.]

## Included activities end
The module includes: input of UF6; electricity and light fuel oil used for operation; water use, lubricant oil, and wastewater treatment; transport requirements of operation materials, industrial wastes, and contaminated waste from decommissioning (25% of the reinforced concrete and the great part of metals according to the reference). Radioactive and non-radioactive emissions to air and to water from the operation are also included. The infrastructure requirements are accounted for, though construction and operation data partially refer to different plants rather than to one single unit.

## Geography
US data.

## Technology
US uranium enrichment facilities with diffusion process were installed in mid 1950s.

## Parameters
- fraction, water, decarbonised, to air: 0.3875; name fraction_WDC_to_air; lognormal variance with pedigree 0.092025, pedigree (4,4,3,2,4)
- fraction, cooling water, to air: 0.3875; name fraction_CW_to_air; = (0.5*fraction_CW_OT_to_air)+(0.5*fraction_CW_R_to_air); lognormal variance with pedigree 0.092025, pedigree (4,4,3,2,4)
  Calculated value based on literature value (see comments of the other parametres present in this dataset) and expert opinion. In the case when no industry/literature data are available about the type of cooling or directly fraction, cooling water, to air specific for the process a default assumption is applied. It is assumed that the once-through cooling system is used in 50% of all cases and recirculating system is used in another 50% of all cases.
- fraction, cooling water, recirculating system, to air: 0.771; name fraction_CW_R_to_air; lognormal variance with pedigree 0.0413, pedigree (2,3,1,3,1)
  Calculated based on literature value (Scown, C.D., 2011, Water Footprint of U.S. Transportation Fuels and supplying information of the article) (Vionnet, S., Quantis Water Database - Technical Report, 2012).
- fraction, cooling water, cooling pond system, to air: 0.032; name fraction_CW_CP_to_air; lognormal variance with pedigree 0.0413, pedigree (2,3,1,3,1)
  (same comment as for fraction, cooling water, recirculating system, to air)
- fraction, cooling water, once-through system, to air: 0.004; name fraction_CW_OT_to_air; lognormal variance with pedigree 0.0413, pedigree (2,3,1,3,1)
  (same comment as for fraction, cooling water, recirculating system, to air)

## Reference product
- uranium, enriched 3.9%, per separative work unit: 1 unit; CPC 33620: Uranium enriched in U235 and its compounds; plutonium and its compounds; alloys, dispersions, ceramic products[…]; By-product classification allocatable product
  EcoSpold01Location=US
  production volume 180000 unit
    Total capacity: 23 million SWU (http://www.wise-uranium.org/efac.html#ENR). The distribution between enrichment grades is assumed to be the same for all facilities. The total production is here assumed to be split evenly over the 5 grades 3.0%, 3.8%, 3.9%, 4.2% and 4.0%
  property price 168.943 EUR2005
    Calculated based on inputs: The price of the product has been calculated as a sum of the values of the material and energy inputs for this product. This value is therefore a rough estimation. It may underestimate the real price since there are additional expenses when producing any product. These expences can include for example labour costs, treatment of waste materials and profit for the producer. Please consider carefully whether this level of data quality is acceptable for your application.
  property carbon content 0
    carbon content on a dry matter basis (reserved; not for manual entry)
  property true value 168.943
    allocation property applied in "true value" allocation // value calculated from revenue
  properties: wet mass 1 kg, carbon content, non-fossil 0, water content 0, water in wet mass 0 kg, carbon content, fossil 0, dry mass 1 kg, carbon allocation 0 kg

## By-products
- electricity, for reuse in municipal waste incineration only: 0 kWh; CPC 17100: Electrical energy; By-product classification allocatable product; pedigree (1,1,1,1,1)
  Net electricity generated from this waste and used in internal MSWI plant energy redistribution.
  Uncertainty: uncertainty is calculated from uncertainties in waste composition and uncertainties in energy efficiency and the uncertainty in internal energy demand
  production volume 0.00200132 kWh
  property exergy 3.6 MJ; name E_el_prod_MSWI_exergy
    This exergy property is based on the exergy content of the product.
  property true value relation 3.6; name E_el_prod_MSWI_true_value_relation
    property to calculate "true value" from
  property price 0.1 EUR2005; name E_el_prod_MSWI_price_EUR2005
    Estimated to be the same price as in case of electricity, medium voltage.
  property true value 1.43253e-9
    allocation property applied in "true value" allocation // value calculated from true value relation
- heat, for reuse in municipal waste incineration only: 0 MJ; CPC 17300: Steam and hot water; By-product classification allocatable product; pedigree (1,1,1,1,1)
  Net useful heat generated from this waste and used in internal MSWI plant energy redistribution.
  Uncertainty: uncertainty is calculated from uncertainties in waste composition and uncertainties in energy efficiency and the uncertainty in internal energy demand
  production volume 0.0144039 MJ
  property true value relation 0.1842; name E_th_prod_MSWI_true_value_relation
    property to calculate "true value" from
  property exergy 0.1842 MJ; name E_th_prod_MSWI_exergy
    This exergy property is based on the exergy content of the product.
  property price 0.0106 EUR2005; name E_th_prod_MSWI_price_EUR2005
    Average European district heat price from Ecoheatcool and Euroheat 2005-2006, Ecoheat Work package 1: The European heat market. Final report. 10.6 EUR/GJ i s the price of district heat. http://www.solarthermalworld.org/files/Ecoheatcool%20WP1%20Web.pdf?download
  property true value 5.2754e-10
    (same comment as for electricity, for reuse in municipal waste incineration only)
- zinc concentrate: 0 kg; CPC 14290: Other non-ferrous metal ores and concentrates (other than uranium or thorium ores and concentrates); By-product classification allocatable product
  Calculated value from the knowledge of the properties of both products.
  production volume 8.00669e-9 kg
  property price 0.38 EUR2005; name ByP_price_EUR2005
    Temporary price data. Calculated as 90% of purchasers price based on: Zinc content in concentrate 53%. Concentrate price per kg Zn 86.5% of refined Zn price (13.5% treatment charges according to CHR Metals Limited 2005: Dynamic cost curves. http://www.minecost.com/dynamic.pdf). 2004 zinc price from USGS (2007) Mineral commodity summaries 2007. <http://minerals.usgs.gov/minerals/pubs/mcs/2007/mcs2007.pdf> [Accessed 25 May 2010]
  property zinc content 0.53; name zinc_C_zinc_concentrate
    Zinc content on a dry matter basis. Value taken from teh "zinc mine operation" /GLO dataset.
  property dry mass 1 kg; name DM_zinc_concentrate
  property carbon content 0
    carbon content on a dry matter basis (reserved; not for manual entry)
  property true value 1.6903e-14
    allocation property applied in "true value" allocation // value calculated from revenue
  properties: wet mass 1 kg, water content 0, carbon content, non-fossil 0, carbon content, fossil 0, water in wet mass 0 kg, carbon allocation 0 kg

## Inputs from technosphere
- electricity, high voltage: 0 kWh; pedigree (1,1,1,1,1)
  data Paducah 2006
  EcoSpold01Location=SERC
- uranium hexafluoride: 1.47 kg; lognormal variance with pedigree 0.042, pedigree (1,1,5,5,1)
  calculated
  EcoSpold01Location=US
  properties: dry mass 1 kg, wet mass 1 kg
- electricity, high voltage: 71.5837 kWh; lognormal variance with pedigree 0.042, pedigree (1,1,5,5,1)
  data Paducah 2008
- heat, district or industrial, other than natural gas: 173.897 MJ; lognormal variance with pedigree 0.062, pedigree (1,1,5,5,1)
  old reference
  EcoSpold01Location=CH
- uranium enrichment diffusion facility: 3.81e-9 unit; lognormal variance with pedigree 0.132, pedigree (1,1,5,5,1)
  own estimation
  EcoSpold01Location=US
- heat, district or industrial, natural gas: 0 MJ; pedigree (1,1,1,1,1)
  uncertainty on production
  EcoSpold01Location=RER
- water, decarbonised: 0 kg; name water_decarbonised_input; pedigree (1,1,1,1,1)
  own estimation
  EcoSpold01Location=RER
  properties: wet mass 1 kg
- low level radioactive waste: -0.00054 m3; lognormal variance with pedigree 0.162, pedigree (1,1,5,5,1)
  own estimation
  EcoSpold01Location=CH
  production volume 97.2 m3
    Calculated from the production volume of uranium, enriched 3.9%, per separative work unit in proportion to the respective output amounts.
  properties: wet mass 2500 kg, dry mass 2500 kg
- electricity, high voltage: 1.38812, 33.3624, 4.67348, 4.75879, 1.14333, 11.5488, 43.759, 0.0362236, 4.01434, 2.75956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 kWh (45 entries); lognormal variance with pedigree 0.042, pedigree (1,1,5,5,1)
  data Paducah 2006
  EcoSpold01Location=SERC
- heat, district or industrial, natural gas: 0.330725, 0.00610833, 18.6976 MJ (3 entries); lognormal variance with pedigree 0.052, pedigree (1,1,5,5,1)
  uncertainty on production
  EcoSpold01Location=RER
- water, decarbonised: 97.6839, 254.173, 0.158954, 1025.14, 250.334, 50.4661, 9.16099, 130.542, 304.086, 12.4783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 kg (11 entries); lognormal variance with pedigree 0.052, pedigree (1,1,5,5,1)
  own estimation
  EcoSpold01Location=RER

## Emissions to nature
- Nitrate [water, surface water]: 0.00327 kg; lognormal variance with pedigree 0.162, pedigree (1,1,5,5,1)
  old reference
- Hydrogen fluoride [air, non-urban air or from high stacks]: 0.0045 kg; lognormal variance with pedigree 0.162, pedigree (1,1,5,5,1)
  old reference
- Water [air, unspecified]: 1.45444 m3; name water_to_air_unspecified; lognormal variance with pedigree 0.0827, pedigree (2,2,5,5,1)
  Calculated value based on literature values and expert opinion. See comments in the parametres' comment field.
  property fraction, origin: unspecified 0; name fraction_origin_unspecified
  property fraction, origin: fresh water 1; name fraction_origin_fresh_water
  property fraction, origin: salt water 0; name fraction_origin_salt_water
- Phosphate [water, surface water]: 0.0004 kg; lognormal variance with pedigree 0.162, pedigree (1,1,5,5,1)
  old reference
- Water [water, unspecified]: 2.29895 m3; name water_to_water_unspecified; lognormal variance with pedigree 0.0827, pedigree (2,2,5,5,1)
  (same comment as for Water)
  property fraction, origin: fresh water 1; name fraction_origin_fresh_water_Ww
  property fraction, origin: salt water 0; name fraction_origin_salt_water_Ww
  property fraction, origin: unspecified 0; name fraction_origin_unspecified_Ww
  property dry mass 0 kg; name DM
  property carbon content, fossil 0; name C_content_fossil
  property carbon content, non-fossil 0; name C_content_non_fossil
  property water in wet mass 1000 kg; name WWM
  property wet mass 1000 kg; name WM
- Uranium alpha [air, non-urban air or from high stacks]: 0.4 kBq; lognormal variance with pedigree 0.162, pedigree (1,1,5,5,1)
  old reference and range of data
- Uranium alpha [water, surface water]: 0.5 kBq; lognormal variance with pedigree 1.372, pedigree (1,1,5,5,1)
  old reference and range of data
- Zinc, ion [water, surface water]: 0.00027 kg; lognormal variance with pedigree 0.162, pedigree (1,1,5,5,1)
  old reference
- Aluminium [water, surface water]: 2.5e-5 kg; lognormal variance with pedigree 0.162, pedigree (1,1,5,5,1)
  old reference
- Hydrocarbons, unspecified [water, surface water]: 2.28e-5 kg; lognormal variance with pedigree 0.162, pedigree (1,1,5,5,1)
  old reference
- Ethane, 1,2-dichloro-1,1,2,2-tetrafluoro-, CFC-114 [air, non-urban air or from high stacks]: 0.0184072 kg; lognormal variance with pedigree 0.052, pedigree (1,1,5,5,1)
  range of data
- Chromium, ion [water, surface water]: 2.7e-5 kg; lognormal variance with pedigree 0.162, pedigree (1,1,5,5,1)
  old reference
- Fluoride [water, surface water]: 4e-5 kg; lognormal variance with pedigree 0.162, pedigree (1,1,5,5,1)
  old reference
- Chlorine [water, surface water]: 0.00015 kg; lognormal variance with pedigree 0.162, pedigree (1,1,5,5,1)
  old reference

## Sampling procedure
Literature

## Extrapolations
none This dataset has been copied from an original dataset covering the geography US. The uncertainty has been adjusted accordingly.

## Review by Thomas Nemecek 2007-08-24
Passed.
