# agricultural trailer production

Dataset: EcoSpold 2, unit process
Geography: CH
Time period: 1995-01-01 to 2019-12-31
Technology level: current
Classification: ISIC rev.4 ecoinvent: 2821:Manufacture of agricultural and forestry machinery
Classification: EcoSpold01Categories: agricultural means of production/machinery
Tags: ConvertedDataset
Scenario: Business-as-Usual
System model: Allocation at the point of substitution
Generated by: Albert Zimmermann
Published in: Nemecek, T. 2007
Database: ecoinvent
isCopyrightProtected: true
accessRestrictedTo: 1

## General comment
This dataset represents the production of agricultural trailers. Representatives of this class are for example: tyre trailer. Calculations base on tyre trailers of 1500 kg weight, 1200 hours useful life and 0.22 repair factor. For exact results, module should only be used if lifetime and repair factor of the balanced machinery are within a narrow range of the values the module is based on. The functional unit is 1kg trailer during its lifetime.
[This dataset was already contained in the ecoinvent database version 2. It was not individually updated during the transfer to ecoinvent version 3. Life Cycle Impact Assessment results may still have changed, as they are affected by changes in the supply chain, i.e. in other datasets. This dataset was generated following the ecoinvent quality guidelines for version 2. It may have been subject to central changes described in the ecoinvent version 3 change report (http://www.ecoinvent.org/database/ecoinvent-version-3/reports-of-changes/), and the results of the central updates were reviewed extensively. The changes added e.g. consistent water flows and other information throughout the database. The documentation of this dataset can be found in the ecoinvent reports of version 2, which are still available via the ecoinvent website. The change report linked above covers all central changes that were made during the conversion process.]

## Included activities start
From reception of the materials and energy resources at the factory gate.

## Included activities end
This activity ends with the disposal of the agricultural machinery.The dataset includes the use of resources and the amount of emissions during the production, the maintenance and repair and the disposal of agricultural trailers. The dataset doesn't include the impacts caused by fuel consumption during operation-time of the machinery, and the amount of emission from the tyre abrasion during this time. No data was available about buildings needed for manufacture and maintenance of the machinery.

## Geography
The inventories apply to the production in Western Europe and transportation to Switzerland.

## Technology
Approximate figures for this representative type of agricultural machinery in operation in 1996 (for some representatives, in 1990) in Switzerland. Values are based and adapted on a different technology (lorries-manufacture).

## Time period
Considered references range from start- to end-date

## Reference product
- agricultural trailer: 1 kg; CPC 441: Agricultural or forestry machinery and parts thereof; By-product classification allocatable product
  EcoSpold01Location=CH
  production volume 2.43e6 kg
    Estimated at 5% of total agricultural machinery, which is estimated as 2.7 times the weight of tractors.
  property price 2.86 EUR2005
    Calculated value based on data from United Nations Commodity Trade Statistics Database (comtrade.un.org). UN comtrade category: 8716 Trailers and non-mechanically propelled vehicle nes. Using exchange rate of 1EURO = 1.209 USD.
  property true value 2.86
    allocation property applied in "true value" allocation // value calculated from revenue

## By-products
- electricity, for reuse in municipal waste incineration only: 0 kWh; CPC 17100: Electrical energy; By-product classification allocatable product; pedigree (1,1,1,1,1)
  Net electricity generated from this waste and used in internal MSWI plant energy redistribution.
  Uncertainty: uncertainty is calculated from uncertainties in waste composition and uncertainties in energy efficiency and the uncertainty in internal energy demand
  production volume 23058 kWh
  property exergy 3.6 MJ; name E_el_prod_MSWI_exergy
    This exergy property is based on the exergy content of the product.
  property true value relation 3.6; name E_el_prod_MSWI_true_value_relation
    property to calculate "true value" from
  property price 0.1 EUR2005; name E_el_prod_MSWI_price_EUR2005
    Estimated to be the same price as in case of electricity, medium voltage.
  property true value 0.00121731
    allocation property applied in "true value" allocation // value calculated from true value relation
- heat, for reuse in municipal waste incineration only: 0 MJ; CPC 17300: Steam and hot water; By-product classification allocatable product; pedigree (1,1,1,1,1)
  Net useful heat generated from this waste and used in internal MSWI plant energy redistribution.
  Uncertainty: uncertainty is calculated from uncertainties in waste composition and uncertainties in energy efficiency and the uncertainty in internal energy demand
  production volume 161613 MJ
  property true value relation 0.1842; name E_th_prod_MSWI_true_value_relation
    property to calculate "true value" from
  property exergy 0.1842 MJ; name E_th_prod_MSWI_exergy
    This exergy property is based on the exergy content of the product.
  property price 0.0106 EUR2005; name E_th_prod_MSWI_price_EUR2005
    Average European district heat price from Ecoheatcool and Euroheat 2005-2006, Ecoheat Work package 1: The European heat market. Final report. 10.6 EUR/GJ i s the price of district heat. http://www.solarthermalworld.org/files/Ecoheatcool%20WP1%20Web.pdf?download
  property true value 0.000436557
    (same comment as for electricity, for reuse in municipal waste incineration only)
- zinc concentrate: 0 kg; CPC 14290: Other non-ferrous metal ores and concentrates (other than uranium or thorium ores and concentrates); By-product classification allocatable product
  Calculated value from the knowledge of the properties of both products.
  production volume 5.90944 kg
  property price 0.38 EUR2005; name ByP_price_EUR2005
    Temporary price data. Calculated as 90% of purchasers price based on: Zinc content in concentrate 53%. Concentrate price per kg Zn 86.5% of refined Zn price (13.5% treatment charges according to CHR Metals Limited 2005: Dynamic cost curves. http://www.minecost.com/dynamic.pdf). 2004 zinc price from USGS (2007) Mineral commodity summaries 2007. <http://minerals.usgs.gov/minerals/pubs/mcs/2007/mcs2007.pdf> [Accessed 25 May 2010]
  property zinc content 0.53; name zinc_C_zinc_concentrate
    Zinc content on a dry matter basis. Value taken from teh "zinc mine operation" /GLO dataset.
  property dry mass 1 kg; name DM_zinc_concentrate
  property carbon content 0
    carbon content on a dry matter basis (reserved; not for manual entry)
  property true value 9.2411e-7
    allocation property applied in "true value" allocation // value calculated from revenue
  properties: wet mass 1 kg, water content 0, carbon content, non-fossil 0, carbon content, fossil 0, water in wet mass 0 kg, carbon allocation 0 kg

## Inputs from technosphere
- synthetic rubber: 0.0839514 kg; lognormal variance with pedigree 0.058125, pedigree (4,2,5,2,1)
  EcoSpold01Location=RER
  Proxy, based on "Agricultural Machinery" - pdf-document on the dedicated talk page of ecoinvent (www.ecoinvent.org/talk-pages)
  properties: wet mass 1 kg, dry mass 1 kg, carbon content, fossil 0.871949
  note on carbon content, fossil: EPDM (Ethylene-propene-diene terpolymer) rubber is a terpolymer of ethylene, propene, and a diene with the residual unsaturated portion of the diene in the side chain (ecoinvent v2.2 report 7-part XX & Ullmann). Chemical formula (deduced from Evidences of Solvent-Induced Miscibility in Polychloroprene-co-Ethylene-Propene Diene Terpolymer Blends, Dubey et al., Journal of Applied Polymer Science, 2009, 111:1884–1891): C20H35
- steel, unalloyed: 0.774552 kg; lognormal variance with pedigree 0.058125, pedigree (4,2,5,2,1)
  (same comment as for synthetic rubber)
  properties: carbon content, fossil 0.0025, wet mass 1 kg, dry mass 1 kg
  note on carbon content, fossil: Unalloyed steels or carbon steels are those in which the level of an individual element in no case reaches or exceeds the limiting concentration given in Tab. 3.1 ecoinvent v2.2 report 10_partII. Assumed to have a C content of 0.25%
- aluminium, wrought alloy: 0.209879 kg; lognormal variance with pedigree 0.058125, pedigree (4,2,5,2,1)
  (same comment as for synthetic rubber)
  properties: dry mass 1 kg, wet mass 1 kg
- alkyd paint, white, without solvent, in 60% solution state: 0.00599653 kg; lognormal variance with pedigree 0.058125, pedigree (4,2,5,2,1)
  Proxy, based on "Agricultural Machinery" - pdf-document on the dedicated talk page of ecoinvent (www.ecoinvent.org/talk-pages)
  EcoSpold01Location=RER
  properties: carbon content, non-fossil 0.199629, carbon content, fossil 0.140367, wet mass 1 kg, dry mass 1 kg
  note on carbon content, non-fossil: C content was calculated as an addition of C content in the raw materials.
- heat, district or industrial, natural gas: 3.89275 MJ; lognormal variance with pedigree 0.062025, pedigree (3,4,5,2,3)
  (same comment as for alkyd paint, white, without solvent, in 60% solution state)
- heat, district or industrial, other than natural gas: 0.559676 MJ; lognormal variance with pedigree 0.062025, pedigree (3,4,5,2,3)
  (same comment as for synthetic rubber)
- electricity, medium voltage: 1.60907 kWh; lognormal variance with pedigree 0.062025, pedigree (3,4,5,2,3)
  EcoSpold01Location=CH
  Proxy, based on "Agricultural Machinery" - pdf-document on the dedicated talk page of ecoinvent (www.ecoinvent.org/talk-pages)
- waste plastic, mixture: -0.00876493 kg; lognormal variance with pedigree 0.068025, pedigree (4,4,5,2,3)
  Proxy, based on "Agricultural Machinery" - pdf-document on the dedicated talk page of ecoinvent (www.ecoinvent.org/talk-pages)
  EcoSpold01Location=CH
  production volume 21311.1 kg
    Calculated from the production volume of agricultural trailer in proportion to the respective output amounts.
  properties: dry mass 0.847 kg, wet mass 1 kg, carbon content, fossil 0.747344, water content 0.180638
  note on carbon content, fossil: C content in 1 kg DM was calculated using data in Tab A.2, ecoinvent v2.2 report 13_I
- heat, central or small-scale, other than natural gas: 3.37265 MJ; lognormal variance with pedigree 0.062025, pedigree (3,4,5,2,3)
  (same comment as for waste plastic, mixture)
- steel, low-alloyed, hot rolled: 0.0329809 kg; lognormal variance with pedigree 0.058125, pedigree (4,2,5,2,1)
  (same comment as for synthetic rubber)
  properties: carbon content, fossil 0.005, wet mass 1 kg, dry mass 1 kg
  note on carbon content, fossil: Low alloyed steel composition given in Tab. 3.2 ecoinvent v2.2 report 10_partII. Steel assumed to have a C content of 0.5%
- steel, chromium steel 18/8, hot rolled: 0.0219873 kg; lognormal variance with pedigree 0.058125, pedigree (4,2,5,2,1)
  (same comment as for synthetic rubber)
  properties: wet mass 1 kg, carbon content, fossil 0.0008, dry mass 1 kg
  note on carbon content, fossil: Stainless steel model is the grade 304 steel (18/8 stainless, 18% chromium 8% nickel; max. 0.08% C)
- brass: 0.00599653 kg; lognormal variance with pedigree 0.058125, pedigree (4,2,5,2,1)
  (same comment as for electricity, medium voltage)
  properties: wet mass 1 kg, dry mass 1 kg

## Emissions to nature
- Carbon dioxide, fossil [air, non-urban air or from high stacks]: 5.99653e-6 kg; lognormal variance with pedigree 0.062025, pedigree (3,4,5,2,3)
  Proxy, based on "Agricultural Machinery" - pdf-document on the dedicated talk page of ecoinvent (www.ecoinvent.org/talk-pages)
- NMVOC, non-methane volatile organic compounds, unspecified origin [air, urban air close to ground]: 0.00547683 kg; lognormal variance with pedigree 0.102025, pedigree (3,4,5,2,3)
  (same comment as for Carbon dioxide, fossil)

## Sampling procedure
Values given in the reference originate mainly from studies about lorry production in Europe as examined and adapted by Zimmermann (2002) and experts estimations.

## Extrapolations
Data are extrapolated, examined and adapted from lorry production in Europe.

## Review by Roland Hischier 2011-09-28
Transfer of documentation done.

## Review by Roland Hischier 2003-08-06
Passed.
