# treatment of waste polyethylene, open dump, wet infiltration class (500mm)

Dataset: EcoSpold 2, unit process
Geography: GLO
Time period: 2006-01-01 to 2019-12-31
Technology level: current
Classification: ISIC rev.4 ecoinvent: 3821:Treatment and disposal of non-hazardous waste
Synonyms: municipal waste landfill
Scenario: Business-as-Usual
System model: Allocation at the point of substitution
Share of production covered: 1 %
Generated by: Avraam Symeonidis
Database: ecoinvent
isCopyrightProtected: true
accessRestrictedTo: 1

## General comment
This dataset represents the activity of waste disposal of waste polyethylene in a open dump. Recommended use of this dataset: For PE, which goes to disposal as part of unmanaged communal waste mixture. // Waste composition (wet, in ppm): upper heating value 42.82 MJ/kg; lower heating value 42.47 MJ/kg; H2O 4000; O 38435; H 122490; C 822050; S 426.9; N 1297.2; P n.a.; B n.a.; Cl 1461.5; Br 9.5896; F 14.384; I n.a.; Ag n.a.; As 1.822; Ba 239.74; Cd 33.946; Co 1.6782; Cr 12.466; Cu 41.367; Hg 0.047948; Mn 30.047; Mo n.a.; Ni 0.95896; Pb 22.596; Sb 10.069; Se 2.0138; Sn 3.814; V 2205.6; Zn 342.01; Be 0.47948; Sc n.a.; Sr 84.868; Ti 958.96; Tl 0.38358; W n.a.; Si n.a.; Fe 1534.3; Ca 2589.2; Al 191.79; K n.a.; Mg 95.896; Na 1405.4; . // Share of carbon in waste that is biogenic 0%. Share of metals in waste not oxidised and bulk-recyclable (exclude very small or thin parts) Iron: 0%; Alu: 0%; Copper: 0%. Overall degradability of waste during 100 years: 1%.

## Included activities start
from final waste deposition (without transports to the site)

## Included activities end
Waste-specific short-term emissions to air via landfill gas and landfill leachate. Waste-specific long-term emissions from landfill.

## Geography
Given name of landfill location is 'infiltration class 4 wet (2018)'. Landfill site with mean annual temperature (MAT) of 8 degC, mean annual precipitation (MAP) of 1100 mm/year, and net infiltration of 500 mm/year.
Climate adjustments result in an alpha t (temperature) for permafrost areas of 0.999. Total climate adjustments with alpha pt of 0.999.

## Technology
This is an inventory for an open, uncontrolled waste dump for municipal solid waste. Ultimate average landfill height is 7 meters. Operation phase duration is 15 years.Percentage of landfill gas directly emitted is 100w%. A Methane Correction Factor (MCF) for landfill air emissions of 0.7057 is employed.
Leachate of the landfill is not treated. Based on average waste composition and climate data the end of carbonate phase is estimated to be reached 1632 years after waste deposition.

## Reference product
- waste polyethylene: -1 kg; CPC 39270: Waste, parings and scrap of plastics; By-product classification Waste; CAS 9002-88-4; pedigree (1,1,1,1,1)
  main reference product of this activity (supply of disposal service).
  Uncertainty: Uncertainty is not adjusted, as this is the refence product
  production volume 1 kg
    The amount of the annual production volume is a placeholder value. The contribution of this technology to the different local markets can be found in the markets themselves.
  property price 0 EUR2005
    Waste products are assigned a price of zero as they are assumed to require further treatment.
  property carbon content 0.82535
    carbon content on a dry matter basis (reserved; not for manual entry)
  properties: iron content 0.0015405, vanadium content 0.0022145, tin content 3.8294e-6, aluminium content 0.00019256, calcium content 0.0025996, magnesium content 9.6281e-5, dry mass 0.996 kg, nickel content 9.6281e-7, water content 0.0040161, strontium content 8.5209e-5, selenium content 2.0219e-6, beryllium content 4.8141e-7, sodium content 0.001411, zinc content 0.00034338, thallium content 3.8512e-7, water in wet mass 0.004 kg, carbon content, fossil 0.82535, wet mass 1 kg, antimony content 1.011e-5, lead content 2.2687e-5, titanium content 0.00096281, hydrogen content 0.12298, mercury content 4.8141e-8, bromine content 9.6281e-6, chlorine content 0.0014674, copper content 4.1533e-5, cadmium content 3.4082e-5, sulfur content 0.00042861, oxygen content 0.03859, nitrogen content 0.0013024, chromium content 1.2517e-5, cobalt content 1.6849e-6, fluorine content 1.4442e-5, arsenic content 1.8293e-6, manganese content 3.0168e-5, heating value, net 42.474 MJ, heating value, gross 42.823 MJ, barium content 0.0002407, carbon allocation 0.822049 kg

## Emissions to nature
- Antimony [air, non-urban air or from high stacks]: 2.6514e-12 kg; lognormal variance with pedigree 0.75145, pedigree (1,1,3,1,1)
  burden from direct release or incineration of landfill biogas; or windblown leachate evaporite in arid climates.
  Uncertainty: Uncertainty calculated from unertainty of the waste composition of this waste, uncertainty in waste decomposition and short-term leaching in landfill
- Tin, ion [water, ground-]: 2.2448e-10 kg; lognormal variance with pedigree 0.60715, pedigree (1,1,3,1,1)
  burden from short-term leachate to groundwater in uncontrolled landfill in moist cimate.
  Uncertainty: Uncertainty calculated from unertainty of the waste composition of this waste, uncertainty in waste decomposition and short-term leaching in landfill
- Barium [water, ground-, long-term]: 0.000237 kg; lognormal variance with pedigree 0.21345, pedigree (1,1,3,1,1)
  Emissions from long-term leachate (>100a) directly from MSW landfill and indirectly via incineration of treatement sludge from leachate treatement.
  Uncertainty: Uncertainty calculated depending on waste input and uncertainty of long-term transfer coefficents in landfill.
- Selenium [air, non-urban air or from high stacks]: 5.3028e-13 kg; lognormal variance with pedigree 0.8043, pedigree (1,1,3,1,1)
  (same comment as for Antimony)
- Antimony [water, ground-]: 1.0606e-8 kg; lognormal variance with pedigree 0.48028, pedigree (1,1,3,1,1)
  (same comment as for Tin, ion)
- Chromium VI [water, ground-, long-term]: 2.3051e-8 kg; lognormal variance with pedigree 2.7869, pedigree (1,1,3,1,1)
  (same comment as for Barium)
- Manganese [air, non-urban air or from high stacks]: 8.5931e-11 kg; lognormal variance with pedigree 0.63845, pedigree (1,1,3,1,1)
  (same comment as for Antimony)
- Manganese [water, ground-]: 3.4372e-7 kg; lognormal variance with pedigree 0.36966, pedigree (1,1,3,1,1)
  (same comment as for Tin, ion)
- Cadmium, ion [water, ground-, long-term]: 3.3886e-5 kg; lognormal variance with pedigree 0.27846, pedigree (1,1,3,1,1)
  (same comment as for Barium)
- Lead [air, non-urban air or from high stacks]: 4.4327e-13 kg; lognormal variance with pedigree 0.80589, pedigree (1,1,3,1,1)
  (same comment as for Antimony)
- Lead [water, ground-]: 1.3298e-9 kg; lognormal variance with pedigree 0.54841, pedigree (1,1,3,1,1)
  (same comment as for Tin, ion)
- Fluoride [water, ground-, long-term]: 1.4319e-5 kg; lognormal variance with pedigree 0.30695, pedigree (1,1,3,1,1)
  (same comment as for Barium)
- Nickel [air, non-urban air or from high stacks]: 1.3921e-13 kg; lognormal variance with pedigree 0.84726, pedigree (1,1,3,1,1)
  (same comment as for Antimony)
- Mercury [water, ground-]: 3.2806e-11 kg; lognormal variance with pedigree 0.65801, pedigree (1,1,3,1,1)
  (same comment as for Tin, ion)
- Bromine [water, ground-, long-term]: 9.345e-6 kg; lognormal variance with pedigree 0.32038, pedigree (1,1,3,1,1)
  (same comment as for Barium)
- Mercury [air, non-urban air or from high stacks]: 1.3122e-11 kg; lognormal variance with pedigree 0.68807, pedigree (1,1,3,1,1)
  (same comment as for Antimony)
- Nickel, ion [water, ground-]: 5.5685e-10 kg; lognormal variance with pedigree 0.57662, pedigree (1,1,3,1,1)
  (same comment as for Tin, ion)
- Arsenic, ion [water, ground-, long-term]: 1.8187e-6 kg; lognormal variance with pedigree 0.37487, pedigree (1,1,3,1,1)
  (same comment as for Barium)
- Cadmium [air, non-urban air or from high stacks]: 3.9773e-10 kg; lognormal variance with pedigree 0.58821, pedigree (1,1,3,1,1)
  (same comment as for Antimony)
- Chromium VI [water, ground-]: 1.4193e-9 kg; lognormal variance with pedigree 0.54628, pedigree (1,1,3,1,1)
  (same comment as for Tin, ion)
- Chloride [water, ground-, long-term]: 0.0014243 kg; lognormal variance with pedigree 0.15409, pedigree (1,1,3,1,1)
  (same comment as for Barium)
- Chromium [air, non-urban air or from high stacks]: 3.5483e-13 kg; lognormal variance with pedigree 0.81412, pedigree (1,1,3,1,1)
  (same comment as for Antimony)
- Cobalt [water, ground-]: 5.3876e-9 kg; lognormal variance with pedigree 0.50347, pedigree (1,1,3,1,1)
  (same comment as for Tin, ion)
- Nitrite [water, ground-, long-term]: 2.807e-5 kg; lognormal variance with pedigree 0.15796, pedigree (1,1,3,1,1)
  (same comment as for Barium)
- Copper [air, non-urban air or from high stacks]: 5.7808e-13 kg; lognormal variance with pedigree 0.79621, pedigree (1,1,3,1,1)
  (same comment as for Antimony)
- Copper, ion [water, ground-]: 2.0233e-9 kg; lognormal variance with pedigree 0.53444, pedigree (1,1,3,1,1)
  (same comment as for Tin, ion)
- Nitrate [water, ground-, long-term]: 5.4237e-5 kg; lognormal variance with pedigree 0.15796, pedigree (1,1,3,1,1)
  (same comment as for Barium)
- Cobalt [air, non-urban air or from high stacks]: 1.3469e-12 kg; lognormal variance with pedigree 0.77461, pedigree (1,1,3,1,1)
  (same comment as for Antimony)
- Arsenic, ion [water, ground-]: 3.2687e-9 kg; lognormal variance with pedigree 0.51925, pedigree (1,1,3,1,1)
  (same comment as for Tin, ion)
- Nitrogen, organic bound [water, ground-, long-term]: 0.00084292 kg; lognormal variance with pedigree 0.15796, pedigree (1,1,3,1,1)
  (same comment as for Barium)
- Arsenic [air, non-urban air or from high stacks]: 4.5823e-11 kg; lognormal variance with pedigree 0.65943, pedigree (1,1,3,1,1)
  (same comment as for Antimony)
- Cadmium, ion [water, ground-]: 5.966e-8 kg; lognormal variance with pedigree 0.4235, pedigree (1,1,3,1,1)
  (same comment as for Tin, ion)
- Ammonium, ion [water, ground-, long-term]: 0.00051572 kg; lognormal variance with pedigree 0.15796, pedigree (1,1,3,1,1)
  (same comment as for Barium)
- Hydrogen fluoride [air, non-urban air or from high stacks]: 5.727e-8 kg; lognormal variance with pedigree 0.42774, pedigree (1,1,3,1,1)
  (same comment as for Antimony)
- Barium [water, ground-]: 2.7425e-6 kg; lognormal variance with pedigree 0.30059, pedigree (1,1,3,1,1)
  (same comment as for Tin, ion)
- Hydrogen sulfide [water, ground-, long-term]: 3.096e-5 kg; lognormal variance with pedigree 0.19435, pedigree (1,1,3,1,1)
  (same comment as for Barium)
- Bromine [air, non-urban air or from high stacks]: 3.3813e-9 kg; lognormal variance with pedigree 0.51764, pedigree (1,1,3,1,1)
  (same comment as for Antimony)
- Fluoride [water, ground-]: 1.0555e-8 kg; lognormal variance with pedigree 0.48022, pedigree (1,1,3,1,1)
  (same comment as for Tin, ion)
- DOC, Dissolved Organic Carbon [water, ground-, long-term]: 0.81384 kg; lognormal variance with pedigree 0.00230669, pedigree (1,1,3,1,1)
  (same comment as for Barium)
- Barium [air, non-urban air or from high stacks]: 6.8562e-10 kg; lognormal variance with pedigree 0.56938, pedigree (1,1,3,1,1)
  (same comment as for Antimony)
- Nitrite [water, ground-]: 6.7192e-7 kg; lognormal variance with pedigree 0.22466, pedigree (1,1,3,1,1)
  (same comment as for Tin, ion)
- Sulfate [water, ground-, long-term]: 0.0011877 kg; lognormal variance with pedigree 0.19435, pedigree (1,1,3,1,1)
  (same comment as for Barium)
- Hydrogen chloride [air, non-urban air or from high stacks]: 5.2988e-7 kg; lognormal variance with pedigree 0.35135, pedigree (1,1,3,1,1)
  (same comment as for Antimony)
- Nitrate [water, ground-]: 1.2983e-6 kg; lognormal variance with pedigree 0.22466, pedigree (1,1,3,1,1)
  (same comment as for Tin, ion)
- TOC, Total Organic Carbon [water, ground-, long-term]: 0.81384 kg; lognormal variance with pedigree 0.00230669, pedigree (1,1,3,1,1)
  (same comment as for Barium)
- Sulfur dioxide [air, non-urban air or from high stacks]: 5.5645e-7 kg; lognormal variance with pedigree 0.37149, pedigree (1,1,3,1,1)
  burden from direct release or incineration of landfill biogas.
  Uncertainty: Uncertainty calculated from unertainty of the waste composition of this waste, uncertainty in waste decomposition and short-term leaching in landfill
- Chloride [water, ground-]: 3.6761e-5 kg; lognormal variance with pedigree 0.21873, pedigree (1,1,3,1,1)
  (same comment as for Tin, ion)
- BOD5, Biological Oxygen Demand [water, ground-, long-term]: 0.21073 kg; lognormal variance with pedigree 0.00230669, pedigree (1,1,3,1,1)
  (same comment as for Barium)
- Nitrogen oxides [air, non-urban air or from high stacks]: 1.777e-8 kg; lognormal variance with pedigree 0.31689, pedigree (1,1,3,1,1)
  (same comment as for Sulfur dioxide)
- Bromine [water, ground-]: 2.412e-7 kg; lognormal variance with pedigree 0.38502, pedigree (1,1,3,1,1)
  (same comment as for Tin, ion)
- COD, Chemical Oxygen Demand [water, ground-, long-term]: 0.89014 kg; lognormal variance with pedigree 0.00230669, pedigree (1,1,3,1,1)
  (same comment as for Barium)
- Carbon dioxide, fossil [air, non-urban air or from high stacks]: 0.017689 kg; lognormal variance with pedigree 0.095231, pedigree (1,1,3,1,1)
  (same comment as for Sulfur dioxide)
- Nitrogen, organic bound [water, ground-]: 2.0178e-5 kg; lognormal variance with pedigree 0.22466, pedigree (1,1,3,1,1)
  (same comment as for Tin, ion)
- Magnesium [water, ground-, long-term]: 9.5305e-5 kg; lognormal variance with pedigree 0.2439, pedigree (1,1,3,1,1)
  (same comment as for Barium)
- Ammonium, ion [water, ground-]: 1.2345e-5 kg; lognormal variance with pedigree 0.22466, pedigree (1,1,3,1,1)
  (same comment as for Tin, ion)
- Occupation, dump site [natural resource, land]: 0.0035714 m2*year; lognormal variance with pedigree 0.082256, pedigree (1,1,3,1,1)
  for landfill operation phase and spontaneous renaturation.
  Uncertainty: Uncertainty calculated from uncertainty in base parameters.
- Hydrogen sulfide [water, ground-]: 1.1566e-7 kg; lognormal variance with pedigree 0.31566, pedigree (1,1,3,1,1)
  (same comment as for Tin, ion)
- Methane, fossil [air, non-urban air or from high stacks]: 0.0041965 kg; lognormal variance with pedigree 0.10536, pedigree (1,1,3,1,1)
  (same comment as for Sulfur dioxide)
- Heat, waste [soil, industrial]: 0.36145 MJ; lognormal variance with pedigree 0.055228, pedigree (1,1,3,1,1)
  burden from short-term decomposition of waste (0-100a).
  Uncertainty: Uncertainty calculated from unertainty of the waste composition of this waste, uncertainty in waste decomposition and short-term leaching in landfill
- Sodium, ion [water, ground-, long-term]: 0.0013473 kg; lognormal variance with pedigree 0.15538, pedigree (1,1,3,1,1)
  (same comment as for Barium)
- Sulfate [water, ground-]: 4.437e-6 kg; lognormal variance with pedigree 0.31566, pedigree (1,1,3,1,1)
  (same comment as for Tin, ion)
- Aluminium [water, ground-, long-term]: 0.0001917 kg; lognormal variance with pedigree 0.22085, pedigree (1,1,3,1,1)
  (same comment as for Barium)
- BOD5, Biological Oxygen Demand [water, ground-]: 6.1922e-5 kg; lognormal variance with pedigree 0.20591, pedigree (1,1,3,1,1)
  (same comment as for Tin, ion)
- Calcium, ion [water, ground-, long-term]: 0.0025858 kg; lognormal variance with pedigree 0.13571, pedigree (1,1,3,1,1)
  (same comment as for Barium)
- DOC, Dissolved Organic Carbon [water, ground-]: 0.00023915 kg; lognormal variance with pedigree 0.20591, pedigree (1,1,3,1,1)
  (same comment as for Tin, ion)
- Iron, ion [water, ground-, long-term]: 0.0015341 kg; lognormal variance with pedigree 0.1525, pedigree (1,1,3,1,1)
  (same comment as for Barium)
- COD, Chemical Oxygen Demand [water, ground-]: 0.00026157 kg; lognormal variance with pedigree 0.20591, pedigree (1,1,3,1,1)
  (same comment as for Tin, ion)
- Strontium [water, ground-, long-term]: 8.4819e-5 kg; lognormal variance with pedigree 0.24797, pedigree (1,1,3,1,1)
  (same comment as for Barium)
- Heat, waste [water, ground-, long-term]: 42.395 MJ; lognormal variance with pedigree 0.014651, pedigree (1,1,3,1,1)
  burden from long-term decomposition of waste (>100a).
  Uncertainty: Uncertainty calculated from unertainty of the waste composition of this waste, uncertainty in waste decomposition and short-term leaching in landfill
- Titanium, ion [water, ground-, long-term]: 0.00095848 kg; lognormal variance with pedigree 0.16777, pedigree (1,1,3,1,1)
  (same comment as for Barium)
- TOC, Total Organic Carbon [water, ground-]: 0.00023915 kg; lognormal variance with pedigree 0.20591, pedigree (1,1,3,1,1)
  (same comment as for Tin, ion)
- Thallium [water, ground-, long-term]: 3.8336e-7 kg; lognormal variance with pedigree 0.42523, pedigree (1,1,3,1,1)
  (same comment as for Barium)
- Sodium [air, non-urban air or from high stacks]: 1.4522e-8 kg; lognormal variance with pedigree 0.46923, pedigree (1,1,3,1,1)
  (same comment as for Antimony)
- Sodium, ion [water, ground-]: 5.8089e-5 kg; lognormal variance with pedigree 0.20671, pedigree (1,1,3,1,1)
  (same comment as for Tin, ion)
- Beryllium [water, ground-, long-term]: 4.792e-7 kg; lognormal variance with pedigree 0.41807, pedigree (1,1,3,1,1)
  (same comment as for Barium)
- Aluminium [air, non-urban air or from high stacks]: 2.394e-11 kg; lognormal variance with pedigree 0.67716, pedigree (1,1,3,1,1)
  (same comment as for Antimony)
- Aluminium [water, ground-]: 9.5758e-8 kg; lognormal variance with pedigree 0.40671, pedigree (1,1,3,1,1)
  (same comment as for Tin, ion)
- Selenium [water, ground-, long-term]: 2.5411e-7 kg; lognormal variance with pedigree 0.63936, pedigree (1,1,3,1,1)
  (same comment as for Barium)
- Magnesium [air, non-urban air or from high stacks]: 1.4776e-10 kg; lognormal variance with pedigree 0.61992, pedigree (1,1,3,1,1)
  (same comment as for Antimony)
- Magnesium [water, ground-]: 5.9105e-7 kg; lognormal variance with pedigree 0.34961, pedigree (1,1,3,1,1)
  (same comment as for Tin, ion)
- Zinc, ion [water, ground-, long-term]: 0.00034184 kg; lognormal variance with pedigree 0.20167, pedigree (1,1,3,1,1)
  (same comment as for Barium)
- Titanium [air, non-urban air or from high stacks]: 1.197e-10 kg; lognormal variance with pedigree 0.62408, pedigree (1,1,3,1,1)
  (same comment as for Antimony)
- Calcium, ion [water, ground-]: 3.3674e-6 kg; lognormal variance with pedigree 0.29043, pedigree (1,1,3,1,1)
  (same comment as for Tin, ion)
- Vanadium, ion [water, ground-, long-term]: 0.00028851 kg; lognormal variance with pedigree 0.39936, pedigree (1,1,3,1,1)
  (same comment as for Barium)
- Iron [air, non-urban air or from high stacks]: 5.2624e-11 kg; lognormal variance with pedigree 0.64917, pedigree (1,1,3,1,1)
  (same comment as for Antimony)
- Thallium [water, ground-]: 2.2274e-10 kg; lognormal variance with pedigree 0.60614, pedigree (1,1,3,1,1)
  (same comment as for Tin, ion)
- Tin, ion [water, ground-, long-term]: 3.8138e-6 kg; lognormal variance with pedigree 0.35071, pedigree (1,1,3,1,1)
  (same comment as for Barium)
- Thallium [air, non-urban air or from high stacks]: 5.5685e-14 kg; lognormal variance with pedigree 0.87678, pedigree (1,1,3,1,1)
  (same comment as for Antimony)
- Iron, ion [water, ground-]: 2.105e-7 kg; lognormal variance with pedigree 0.38093, pedigree (1,1,3,1,1)
  (same comment as for Tin, ion)
- Antimony [water, ground-, long-term]: 4.2421e-7 kg; lognormal variance with pedigree 0.94553, pedigree (1,1,3,1,1)
  (same comment as for Barium)
- Calcium [air, non-urban air or from high stacks]: 8.4184e-10 kg; lognormal variance with pedigree 0.5617, pedigree (1,1,3,1,1)
  (same comment as for Antimony)
- Strontium [water, ground-]: 4.9281e-8 kg; lognormal variance with pedigree 0.42888, pedigree (1,1,3,1,1)
  (same comment as for Tin, ion)
- Lead [water, ground-, long-term]: 2.2595e-5 kg; lognormal variance with pedigree 0.29198, pedigree (1,1,3,1,1)
  (same comment as for Barium)
- Beryllium [air, non-urban air or from high stacks]: 6.9607e-14 kg; lognormal variance with pedigree 0.86962, pedigree (1,1,3,1,1)
  (same comment as for Antimony)
- Beryllium [water, ground-]: 2.7843e-10 kg; lognormal variance with pedigree 0.59898, pedigree (1,1,3,1,1)
  (same comment as for Tin, ion)
- Nickel, ion [water, ground-, long-term]: 9.584e-7 kg; lognormal variance with pedigree 0.39571, pedigree (1,1,3,1,1)
  (same comment as for Barium)
- Vanadium [air, non-urban air or from high stacks]: 5.8079e-10 kg; lognormal variance with pedigree 0.57353, pedigree (1,1,3,1,1)
  (same comment as for Antimony)
- Titanium, ion [water, ground-]: 4.7879e-7 kg; lognormal variance with pedigree 0.35363, pedigree (1,1,3,1,1)
  (same comment as for Tin, ion)
- Copper, ion [water, ground-, long-term]: 4.1365e-5 kg; lognormal variance with pedigree 0.27188, pedigree (1,1,3,1,1)
  (same comment as for Barium)
- Strontium [air, non-urban air or from high stacks]: 1.232e-11 kg; lognormal variance with pedigree 0.69952, pedigree (1,1,3,1,1)
  (same comment as for Antimony)
- Zinc, ion [water, ground-]: 1.6183e-7 kg; lognormal variance with pedigree 0.38929, pedigree (1,1,3,1,1)
  (same comment as for Tin, ion)
- Mercury [water, ground-, long-term]: 4.7902e-8 kg; lognormal variance with pedigree 0.48245, pedigree (1,1,3,1,1)
  (same comment as for Barium)
- Zinc [air, non-urban air or from high stacks]: 3.5961e-11 kg; lognormal variance with pedigree 0.66338, pedigree (1,1,3,1,1)
  (same comment as for Antimony)
- Selenium [water, ground-]: 2.1211e-9 kg; lognormal variance with pedigree 0.53313, pedigree (1,1,3,1,1)
  (same comment as for Tin, ion)
- Manganese [water, ground-, long-term]: 2.9704e-5 kg; lognormal variance with pedigree 0.28251, pedigree (1,1,3,1,1)
  (same comment as for Barium)
- Tin [air, non-urban air or from high stacks]: 5.612e-14 kg; lognormal variance with pedigree 0.87346, pedigree (1,1,3,1,1)
  (same comment as for Antimony)
- Vanadium, ion [water, ground-]: 2.3231e-6 kg; lognormal variance with pedigree 0.30236, pedigree (1,1,3,1,1)
  (same comment as for Tin, ion)
- Cobalt [water, ground-, long-term]: 1.6728e-6 kg; lognormal variance with pedigree 0.37754, pedigree (1,1,3,1,1)
  (same comment as for Barium)

## Extrapolations
This dataset has been extrapolated from year 2012 to the year of the calculation (2019). The uncertainty has been adjusted accordingly.
