# treatment of residue from mechanical treatment, liquid crystal display, municipal waste incineration

Dataset: EcoSpold 2, unit process
Geography: CH
Time period: 1994-01-01 to 2019-12-31
Technology level: outdated
Classification: ISIC rev.4 ecoinvent: 3821:Treatment and disposal of non-hazardous waste
Classification: EcoSpold01Categories: waste management/municipal incineration
Tags: ConvertedDataset; Treatment
Scenario: Business-as-Usual
System model: Allocation at the point of substitution
Generated by: Roland Hischier
Published in: Hischier R. 2007
Database: ecoinvent
isCopyrightProtected: true
accessRestrictedTo: 1

## General comment
Inventoried waste contains 1.95% rubber; 47.7% Plastics from electronic consumer goods; 47.7% Plastics from electronic industrial goods; 0.01% MSWI iron scrap; 2.22% Alu in MSW; 0.03% Glass; 0.36% wiring copper; 0.01% Pb in ASR inert; .
waste composition (wet, in ppm): upper heating value 35.17 MJ/kg; lower heating value 33.71 MJ/kg; H2O 8757.5; O 49300; H 72690; C 793840; S 406.11; N 12691; P 477.19; B n.a.; Cl 6556.1; Br 5248.2; F 238.56; I n.a.; Ag n.a.; As 7.1567; Ba 168.9; Cd 143.83; Co 28.128; Cr 50.308; Cu 6649.5; Hg 0.81111; Mn 6.8242; Mo 2.8627; Ni 478.17; Pb 241.3; Sb 4575.8; Se 1.8699; Sn 193.77; V 0.74067; Zn 732.59; Be 0.44521; Sc n.a.; Sr 78.802; Ti 4272.1; Tl 0.35617; W n.a.; Si 2940.1; Fe 1587.3; Ca 2991.4; Al 24379; K 111.64; Mg n.a.; Na 152.46;
Share of carbon in waste that is biogenic 0%.
Share of iron in waste that is metallic/recyclable 5.1%.
Net energy produced in MSWI: 3.86MJ/kg waste electric energy and 7.78MJ/kg waste thermal energy
Allocation of energy production: no substitution or expansion. Total burden allocated to waste disposal function of MSWI.
One kg of this waste produces 0.07505 kg of slag and 0.01774 kg of residues, which are landfilled. Additional solidification with 0.007096 kg of cement.
[This dataset was already contained in the ecoinvent database version 2. It was not individually updated during the transfer to ecoinvent version 3. Life Cycle Impact Assessment results may still have changed, as they are affected by changes in the supply chain, i.e. in other datasets. This dataset was generated following the ecoinvent quality guidelines for version 2. It may have been subject to central changes described in the ecoinvent version 3 change report (http://www.ecoinvent.org/database/ecoinvent-version-3/reports-of-changes/), and the results of the central updates were reviewed extensively. The changes added e.g. consistent water flows and other information throughout the database. The documentation of this dataset can be found in the ecoinvent reports of version 2, which are still available via the ecoinvent website. The change report linked above covers all central changes that were made during the conversion process.]

## Included activities end
waste-specific air and water emisions from incineration, auxiliary material consumption for flue gas cleaning. Short-term emissions to river water and long-term emisisons to ground water from slag compartment (from bottom slag) and residual material landfill (from solidified fly ashes and scrubber slugde). Process energy demands for MSWI.

## Geography
Specific to the technology mix encountered in Switzerland in 2000. Well applicable to modern incineration practices in Europe, North America or Japan.

## Technology
replaced by newer incineration technology with fly ash extraction. Average Swiss MSWI plants in 2000 (grate incinerators) with electrostatic precipitator for fly ash (ESP), wet flue gas scrubber and 29.4% SNCR , 32.2% SCR-high dust , 24.6% SCR-low dust -DeNOx facilities and 13.8% without Denox (by burnt waste, according to Swiss average). Share of waste incinerated in plants with magnetic scrap separation from slag : 50%. Gross electric efficiency technology mix 12.997% and Gross thermal efficiency technology mix 25.57%

## Time period
Waste composition as given in literature reference, theoretical data or other source. Transfer coefficients for modern Swiss MSWI. Emission speciation based on early 90ies data.

## Reference product
- residue from mechanical treatment, liquid crystal display: -1 kg; CPC 39: Wastes or scraps; By-product classification Waste
  EcoSpold01Location=CH
  production volume 0 kg
    outdated. Replaced by newer incineration technology with fly ash extraction.
  property carbon content, fossil 0.809363
    Tab 4.29, ecoinvent v2.2 report 18_V, for details in fraction composition. Carbon content in plastic was calculated using data in Tab A.2, ecoinvent v2.2 report 13_I. Others was also considered plastic, and calculated the same way (from pg 70, ecoinvent v2.2 report 18_V). Ferro was assumed to have a C content of 0.012 kg C/ kg (C content of steel, calculated out of emission factors published in Commission Decision of 18 July 2007 establishing guidelines for the monitoring and reporting of greenhouse gas emissions pursuant to Directive 2003/87/EC of the European Parliament and of the Council (notified under document number C(2007) 3416)). The other component of the fraction were considered to content no C.
  property price 0 EUR2005
    Waste products are assigned a price of zero as they are assumed to require further treatment.
  property carbon content 0.809363
    carbon content on a dry matter basis (reserved; not for manual entry)
  properties: water in wet mass 0 kg, dry mass 1 kg, water content 0, carbon content, non-fossil 0, wet mass 1 kg, carbon allocation 0.809363 kg

## Inputs from technosphere
- chromium oxide, flakes: 3.7403e-7 kg; lognormal variance with pedigree 2, pedigree (1,1,5,1,1)
  EcoSpold01Location=RER
  Proxy for vanadium pentoxide V2O5 in SCR catalyst, uncertainty calculated from uncertainty in average DeNOx input, uncertainty in the share of thermal NOx, uncertainty of nitrogen content in average municipal waste and the unertainty in nitrogen content in *this* waste.
  properties: dry mass 1 kg, wet mass 1 kg
- heat, district or industrial, natural gas: 0.0561969 MJ; lognormal variance with pedigree 1.3, pedigree (1,1,5,1,1)
  EcoSpold01Location=RER
  uncertainty calculated from uncertainty in average DeNOx input, uncertainty in the share of thermal NOx, uncertainty of nitrogen content in average municipal waste and the unertainty in nitrogen content in *this* waste.
- quicklime, milled, packed: 0.001125 kg; lognormal variance with pedigree 0.46, pedigree (1,1,5,1,1)
  EcoSpold01Location=CH
  uncertainty calculated from uncertainty in average auxiliary material input, and the unertainty of the waste composition of this waste
  properties: wet mass 1 kg, dry mass 0.99 kg, water content 0.010101
- waste cement, hydrated: -0.01774 kg; lognormal variance with pedigree 0.12, pedigree (1,1,5,1,1)
  EcoSpold01Location=CH
  Hydrated cement for solidification of landfilled residual material. Uncertainty calculated from unertainty of the waste composition of this waste and transfer coefficients in the incinerator and of the solidification recipe.
  production volume 0 kg; = Ref('9a0a616e-7ecb-428e-97bc-572e70b58e18', 'ProductionVolume')* (Ref('48e83ae1-c259-4735-8c1c-84e3c3ff8dcd')*-1)
    Calculated from the production volume of residue from mechanical treatment, liquid crystal display in proportion to the respective output amounts.
  properties: dry mass 1 kg, wet mass 1 kg
- titanium dioxide: 1.8328e-5 kg; lognormal variance with pedigree 2, pedigree (1,1,5,1,1)
  uncertainty calculated from uncertainty in average DeNOx input, uncertainty in the share of thermal NOx, uncertainty of nitrogen content in average municipal waste and the unertainty in nitrogen content in *this* waste.
  EcoSpold01Location=RER
  properties: dry mass 1 kg, wet mass 1 kg
- municipal waste incineration facility: 2.5e-10 unit; lognormal variance with pedigree 0.04, pedigree (1,1,5,1,1)
  EcoSpold01Location=CH
  demands per kilogram waste. uncertainty is heeded in the module
- process-specific burdens, municipal waste incineration: 1 kg; lognormal variance with pedigree 0.04, pedigree (1,1,5,1,1)
  EcoSpold01Location=CH
  demands per kilogram waste. uncertainty is heeded in the module;activityLink introduced to establish a direct link to the corresponding regional supply of this product
- residual material landfill: 3.6959e-11 unit; lognormal variance with pedigree 0.11, pedigree (1,1,5,1,1)
  EcoSpold01Location=CH
  uncertainty is calculated from uncertainties in waste composition and transfer coefficients in incinerator
- process-specific burdens, residual material landfill: 0.01774 kg; lognormal variance with pedigree 0.11, pedigree (1,1,5,1,1)
  EcoSpold01Location=CH
  uncertainty is calculated from uncertainties in waste composition and transfer coefficients in incinerator;activityLink introduced to establish a direct link to the corresponding regional supply of this product
- process-specific burdens, slag landfill: 0.075047 kg; lognormal variance with pedigree 0.1, pedigree (1,1,5,1,1)
  uncertainty is calculated from uncertainties in waste composition and transfer coefficients in incinerator;activityLink introduced to establish a direct link to the corresponding regional supply of this product
  EcoSpold01Location=CH
- sodium hydroxide, without water, in 50% solution state: 0.0064976 kg; lognormal variance with pedigree 0.44, pedigree (1,1,5,1,1)
  uncertainty calculated from uncertainty in average auxiliary material input, and the unertainty of the waste composition of this waste
  EcoSpold01Location=RER
  properties: dry mass 1 kg, wet mass 1 kg
- cement, unspecified: 0.0070961 kg; lognormal variance with pedigree 0.12, pedigree (1,1,5,1,1)
  Cement for solidification of landfilled residual material. Uncertainty calculated from unertainty of the waste composition of this waste, of transfer coefficients in the incinerator and of the solidification recipe.
  EcoSpold01Location=CH
  properties: wet mass 1 kg, dry mass 1 kg
- iron (III) chloride, without water, in 40% solution state: 0.00055043 kg; lognormal variance with pedigree 0.32, pedigree (1,1,5,1,1)
  (same comment as for quicklime, milled, packed)
  properties: wet mass 1 kg, dry mass 1 kg
- hydrochloric acid, without water, in 30% solution state: 1.3386e-5 kg; lognormal variance with pedigree 0.36, pedigree (1,1,5,1,1)
  EcoSpold01Location=RER
  uncertainty calculated from uncertainty in average auxiliary material input, and the unertainty of the waste composition of this waste
  properties: dry mass 1 kg, wet mass 1 kg
- ammonia, liquid: 0.00064027 kg; lognormal variance with pedigree 1.3, pedigree (1,1,5,1,1)
  uncertainty calculated from uncertainty in average DeNOx input, uncertainty in the share of thermal NOx, uncertainty of nitrogen content in average municipal waste and the unertainty in nitrogen content in *this* waste.
  EcoSpold01Location=CH
  properties: dry mass 1 kg, wet mass 1 kg
- chemical, organic: 0.00057361 kg; lognormal variance with pedigree 0.96, pedigree (1,1,5,1,1)
  EcoSpold01Location=GLO
  Proxy for TMT15. uncertainty calculated from uncertainty in average auxiliary material input, and the unertainty of the waste composition of this waste
  properties: dry mass 1 kg, wet mass 1 kg, carbon content, fossil 0.628
  note on carbon content, fossil: This dataset is an unweighted average of 20 organic substances (listed in Tab 88.1, ecoinvent v2.2 report 8, part II), being part of the top100 chemicals included in this database. The C-content has also been calculated as an unweighted average of the C content of the substances composing this dataset.
- slag landfill: 1.3342e-10 unit; lognormal variance with pedigree 0.1, pedigree (1,1,5,1,1)
  (same comment as for residual material landfill)
- chemical, inorganic: 2.231e-5 kg; lognormal variance with pedigree 0.36, pedigree (1,1,5,1,1)
  EcoSpold01Location=GLO
  Proxy for Polyelectrolyte. uncertainty calculated from uncertainty in average auxiliary material input, and the unertainty of the waste composition of this waste
  properties: dry mass 1 kg, wet mass 1 kg, carbon content, fossil 0.003
  note on carbon content, fossil: This dataset is an unweighted average of 20 inorganic substances (listed in Tab 88.1, ecoinvent v2.2 report 8, part II), being part of the top100 chemicals included in this database. The C-content has also been calculated as an unweighted average of the C content of the substances composing this dataset.

## Emissions to nature
- Iron, ion [water, surface water]: 5.1566e-7 kg; lognormal variance with pedigree 0.63, pedigree (1,1,5,1,1)
  uncertainty is calculated from uncertainties in waste composition and transfer coefficients in incinerator and landfills
- Fluoride [water, ground-, long-term]: 0.0002128 kg; lognormal variance with pedigree 0.58, pedigree (1,1,5,1,1)
  Long-term emissions from landfilling of incineration residues. uncertainty is calculated from uncertainties in waste composition and transfer coefficients in incinerator and landfills.
- Copper, ion [water, ground-, long-term]: 0.0060652 kg; lognormal variance with pedigree 0.45, pedigree (1,1,5,1,1)
  (same comment as for Fluoride)
- Ammonia [air, urban air close to ground]: 1.0056e-5 kg; lognormal variance with pedigree 1.41, pedigree (1,1,5,1,1)
  uncertainty calculated from uncertainty in average N-emissions, uncertainty in the share of thermal NOx, uncertainty of nitrogen content in average municipal waste and the unertainty in nitrogen content in *this* waste.
- Thallium [water, surface water]: 2.1819e-10 kg; lognormal variance with pedigree 1.92, pedigree (1,1,5,1,1)
  (same comment as for Iron, ion)
- Nitrate [water, ground-, long-term]: 0.00045591 kg; lognormal variance with pedigree 0.39, pedigree (1,1,5,1,1)
  (same comment as for Fluoride)
- Calcium, ion [water, surface water]: 1.1321e-5 kg; lognormal variance with pedigree 1.01, pedigree (1,1,5,1,1)
  (same comment as for Iron, ion)
- Chromium [air, urban air close to ground]: 3.7042e-12 kg; lognormal variance with pedigree 1.19, pedigree (1,1,5,1,1)
  uncertainty is calculated from uncertainties in waste composition and transfer coefficients in incinerator
- Lead [water, surface water]: 5.7553e-9 kg; lognormal variance with pedigree 1.06, pedigree (1,1,5,1,1)
  (same comment as for Iron, ion)
- Barium [water, surface water]: 2.3224e-8 kg; lognormal variance with pedigree 1.81, pedigree (1,1,5,1,1)
  (same comment as for Iron, ion)
- Cobalt [water, ground-, long-term]: 2.4627e-5 kg; lognormal variance with pedigree 1.12, pedigree (1,1,5,1,1)
  (same comment as for Fluoride)
- Molybdenum [water, ground-, long-term]: 2.368e-6 kg; lognormal variance with pedigree 1.47, pedigree (1,1,5,1,1)
  (same comment as for Fluoride)
- Iron, ion [water, ground-, long-term]: 0.00072854 kg; lognormal variance with pedigree 1.37, pedigree (1,1,5,1,1)
  (same comment as for Fluoride)
- Potassium, ion [water, surface water]: 1.936e-5 kg; lognormal variance with pedigree 0.62, pedigree (1,1,5,1,1)
  (same comment as for Iron, ion)
- Cadmium, ion [water, surface water]: 6.5235e-8 kg; lognormal variance with pedigree 0.93, pedigree (1,1,5,1,1)
  (same comment as for Iron, ion)
- Cyanide [air, urban air close to ground]: 1.1422e-5 kg; lognormal variance with pedigree 1.41, pedigree (1,1,5,1,1)
  (same comment as for Ammonia)
- Fluoride [water, surface water]: 1.8338e-5 kg; lognormal variance with pedigree 0.62, pedigree (1,1,5,1,1)
  (same comment as for Iron, ion)
- Vanadium [air, urban air close to ground]: 7.1567e-11 kg; lognormal variance with pedigree 1.68, pedigree (1,1,5,1,1)
  (same comment as for Chromium)
- Nitrate [water, surface water]: 0.00016234 kg; lognormal variance with pedigree 0.28, pedigree (1,1,5,1,1)
  (same comment as for Iron, ion)
- Titanium, ion [water, surface water]: 2.0589e-8 kg; lognormal variance with pedigree 1.87, pedigree (1,1,5,1,1)
  (same comment as for Iron, ion)
- Tin, ion [water, surface water]: 7.188e-9 kg; lognormal variance with pedigree 1.09, pedigree (1,1,5,1,1)
  (same comment as for Iron, ion)
- Cobalt [air, urban air close to ground]: 8.9307e-13 kg; lognormal variance with pedigree 1.28, pedigree (1,1,5,1,1)
  (same comment as for Chromium)
- Chromium VI [water, ground-, long-term]: 5.3046e-6 kg; lognormal variance with pedigree 1.33, pedigree (1,1,5,1,1)
  (same comment as for Fluoride)
- Tin [air, urban air close to ground]: 2.5696e-7 kg; lognormal variance with pedigree 0.93, pedigree (1,1,5,1,1)
  (same comment as for Chromium)
- Cadmium, ion [water, ground-, long-term]: 1.5094e-6 kg; lognormal variance with pedigree 6.8, pedigree (1,1,5,1,1)
  (same comment as for Fluoride)
- Cadmium [air, urban air close to ground]: 7.9169e-9 kg; lognormal variance with pedigree 0.99, pedigree (1,1,5,1,1)
  (same comment as for Chromium)
- Sodium, ion [water, surface water]: 3.1139e-5 kg; lognormal variance with pedigree 0.54, pedigree (1,1,5,1,1)
  (same comment as for Iron, ion)
- TOC, Total Organic Carbon [water, surface water]: 2.1762e-5 kg; lognormal variance with pedigree 0.27, pedigree (1,1,5,1,1)
  (same comment as for Iron, ion)
- Selenium [air, urban air close to ground]: 9.4038e-15 kg; lognormal variance with pedigree 1.65, pedigree (1,1,5,1,1)
  (same comment as for Chromium)
- BOD5, Biological Oxygen Demand [water, surface water]: 2.9707e-5 kg; lognormal variance with pedigree 0.16, pedigree (1,1,5,1,1)
  (same comment as for Iron, ion)
- Beryllium [water, surface water]: 2.7666e-10 kg; lognormal variance with pedigree 1.95, pedigree (1,1,5,1,1)
  (same comment as for Iron, ion)
- Potassium, ion [water, ground-, long-term]: 9.1948e-5 kg; lognormal variance with pedigree 0.7, pedigree (1,1,5,1,1)
  (same comment as for Fluoride)
- Aluminium [water, ground-, long-term]: 0.019739 kg; lognormal variance with pedigree 0.31, pedigree (1,1,5,1,1)
  (same comment as for Fluoride)
- Cobalt [water, surface water]: 4.8118e-9 kg; lognormal variance with pedigree 1.62, pedigree (1,1,5,1,1)
  (same comment as for Iron, ion)
- Zinc, ion [water, surface water]: 1.3459e-7 kg; lognormal variance with pedigree 0.66, pedigree (1,1,5,1,1)
  (same comment as for Iron, ion)
- Hydrogen chloride [air, urban air close to ground]: 7.1601e-8 kg; lognormal variance with pedigree 0.51, pedigree (1,1,5,1,1)
  (same comment as for Chromium)
- Bromine [water, surface water]: 0.0043253 kg; lognormal variance with pedigree 0.39, pedigree (1,1,5,1,1)
  (same comment as for Iron, ion)
- DOC, Dissolved Organic Carbon [water, ground-, long-term]: 0.0077518 kg; lognormal variance with pedigree 0.05, pedigree (1,1,5,1,1)
  (same comment as for Fluoride)
- Lead [water, ground-, long-term]: 0.00011064 kg; lognormal variance with pedigree 4.05, pedigree (1,1,5,1,1)
  (same comment as for Fluoride)
- Phosphorus [air, urban air close to ground]: 4.7711e-7 kg; lognormal variance with pedigree 0.81, pedigree (1,1,5,1,1)
  (same comment as for Chromium)
- Strontium [water, ground-, long-term]: 7.8699e-5 kg; lognormal variance with pedigree 1.03, pedigree (1,1,5,1,1)
  (same comment as for Fluoride)
- Selenium [water, surface water]: 6.0903e-7 kg; lognormal variance with pedigree 1.22, pedigree (1,1,5,1,1)
  (same comment as for Iron, ion)
- Manganese [water, ground-, long-term]: 5.9097e-6 kg; lognormal variance with pedigree 1.43, pedigree (1,1,5,1,1)
  (same comment as for Fluoride)
- Calcium [air, urban air close to ground]: 4.9503e-6 kg; lognormal variance with pedigree 0.58, pedigree (1,1,5,1,1)
  (same comment as for Chromium)
- Chloride [water, surface water]: 0.0063892 kg; lognormal variance with pedigree 0.41, pedigree (1,1,5,1,1)
  (same comment as for Iron, ion)
- Vanadium, ion [water, surface water]: 4.9399e-10 kg; lognormal variance with pedigree 1.79, pedigree (1,1,5,1,1)
  (same comment as for Iron, ion)
- Arsenic, ion [water, ground-, long-term]: 3.9303e-6 kg; lognormal variance with pedigree 1.35, pedigree (1,1,5,1,1)
  (same comment as for Fluoride)
- Bromine [water, ground-, long-term]: 0.00091773 kg; lognormal variance with pedigree 0.49, pedigree (1,1,5,1,1)
  (same comment as for Fluoride)
- Lead [air, urban air close to ground]: 5.2219e-9 kg; lognormal variance with pedigree 0.93, pedigree (1,1,5,1,1)
  (same comment as for Chromium)
- Chromium, ion [water, surface water]: 1.5966e-7 kg; lognormal variance with pedigree 1.11, pedigree (1,1,5,1,1)
  (same comment as for Iron, ion)
- Dinitrogen monoxide [air, urban air close to ground]: 5.3592e-5 kg; lognormal variance with pedigree 1.41, pedigree (1,1,5,1,1)
  (same comment as for Ammonia)
- Aluminium [water, surface water]: 4.8056e-7 kg; lognormal variance with pedigree 1.1, pedigree (1,1,5,1,1)
  (same comment as for Iron, ion)
- Thallium [air, urban air close to ground]: 3.5617e-10 kg; lognormal variance with pedigree 1.77, pedigree (1,1,5,1,1)
  (same comment as for Chromium)
- Zinc, ion [water, ground-, long-term]: 1.2013e-5 kg; lognormal variance with pedigree 5.36, pedigree (1,1,5,1,1)
  (same comment as for Fluoride)
- Mercury [water, ground-, long-term]: 4.2201e-8 kg; lognormal variance with pedigree 3.41, pedigree (1,1,5,1,1)
  (same comment as for Fluoride)
- COD, Chemical Oxygen Demand [water, ground-, long-term]: 0.01959 kg; lognormal variance with pedigree 0.05, pedigree (1,1,5,1,1)
  (same comment as for Fluoride)
- Iron [air, urban air close to ground]: 5.027e-8 kg; lognormal variance with pedigree 0.68, pedigree (1,1,5,1,1)
  (same comment as for Chromium)
- Molybdenum [water, surface water]: 4.8893e-7 kg; lognormal variance with pedigree 0.97, pedigree (1,1,5,1,1)
  (same comment as for Iron, ion)
- Potassium [air, urban air close to ground]: 3.366e-7 kg; lognormal variance with pedigree 1, pedigree (1,1,5,1,1)
  (same comment as for Chromium)
- BOD5, Biological Oxygen Demand [water, ground-, long-term]: 0.0064078 kg; lognormal variance with pedigree 0.05, pedigree (1,1,5,1,1)
  (same comment as for Fluoride)
- Strontium [air, urban air close to ground]: 7.8802e-9 kg; lognormal variance with pedigree 1.07, pedigree (1,1,5,1,1)
  (same comment as for Chromium)
- Phosphate [water, surface water]: 9.329e-8 kg; lognormal variance with pedigree 1.1, pedigree (1,1,5,1,1)
  (same comment as for Iron, ion)
- Barium [air, urban air close to ground]: 1.689e-7 kg; lognormal variance with pedigree 0.95, pedigree (1,1,5,1,1)
  (same comment as for Chromium)
- Nickel, ion [water, ground-, long-term]: 0.0004477 kg; lognormal variance with pedigree 0.76, pedigree (1,1,5,1,1)
  (same comment as for Fluoride)
- Beryllium [water, ground-, long-term]: 3.5856e-7 kg; lognormal variance with pedigree 1.49, pedigree (1,1,5,1,1)
  (same comment as for Fluoride)
- Arsenic, ion [water, surface water]: 3.2264e-6 kg; lognormal variance with pedigree 1.13, pedigree (1,1,5,1,1)
  (same comment as for Iron, ion)
- Sulfate [water, surface water]: 0.00019717 kg; lognormal variance with pedigree 0.4, pedigree (1,1,5,1,1)
  (same comment as for Iron, ion)
- Carbon dioxide, fossil [air, urban air close to ground]: 2.8783 kg; lognormal variance with pedigree 0.04, pedigree (1,1,5,1,1)
  (same comment as for Chromium)
- Phosphate [water, ground-, long-term]: 5.5881e-5 kg; lognormal variance with pedigree 5.01, pedigree (1,1,5,1,1)
  (same comment as for Fluoride)
- Selenium [water, ground-, long-term]: 1.2573e-6 kg; lognormal variance with pedigree 1.04, pedigree (1,1,5,1,1)
  (same comment as for Fluoride)
- Silicon [air, urban air close to ground]: 6.5867e-6 kg; lognormal variance with pedigree 0.58, pedigree (1,1,5,1,1)
  (same comment as for Chromium)
- Sodium [air, urban air close to ground]: 1.2524e-6 kg; lognormal variance with pedigree 0.95, pedigree (1,1,5,1,1)
  (same comment as for Chromium)
- Antimony [water, ground-, long-term]: 0.0029244 kg; lognormal variance with pedigree 0.39, pedigree (1,1,5,1,1)
  (same comment as for Fluoride)
- Zinc [air, urban air close to ground]: 1.1957e-8 kg; lognormal variance with pedigree 0.79, pedigree (1,1,5,1,1)
  (same comment as for Chromium)
- TOC, Total Organic Carbon [water, ground-, long-term]: 0.0077518 kg; lognormal variance with pedigree 0.05, pedigree (1,1,5,1,1)
  (same comment as for Fluoride)
- Nickel [air, urban air close to ground]: 2.0633e-11 kg; lognormal variance with pedigree 0.89, pedigree (1,1,5,1,1)
  (same comment as for Chromium)
- Mercury [air, urban air close to ground]: 2.8014e-14 kg; lognormal variance with pedigree 1.74, pedigree (1,1,5,1,1)
  (same comment as for Chromium)
- Mercury [water, surface water]: 8.6739e-9 kg; lognormal variance with pedigree 1.61, pedigree (1,1,5,1,1)
  (same comment as for Iron, ion)
- Calcium, ion [water, ground-, long-term]: 0.0026059 kg; lognormal variance with pedigree 0.54, pedigree (1,1,5,1,1)
  (same comment as for Fluoride)
- Antimony [water, surface water]: 0.0015882 kg; lognormal variance with pedigree 0.42, pedigree (1,1,5,1,1)
  (same comment as for Iron, ion)
- COD, Chemical Oxygen Demand [water, surface water]: 5.3058e-5 kg; lognormal variance with pedigree 0.28, pedigree (1,1,5,1,1)
  (same comment as for Iron, ion)
- Strontium [water, surface water]: 4.9616e-8 kg; lognormal variance with pedigree 1.75, pedigree (1,1,5,1,1)
  (same comment as for Iron, ion)
- Arsenic [air, urban air close to ground]: 7.2998e-14 kg; lognormal variance with pedigree 1.47, pedigree (1,1,5,1,1)
  (same comment as for Chromium)
- Antimony [air, urban air close to ground]: 1.7799e-11 kg; lognormal variance with pedigree 0.63, pedigree (1,1,5,1,1)
  (same comment as for Chromium)
- Sulfur dioxide [air, urban air close to ground]: 1.7298e-6 kg; lognormal variance with pedigree 0.83, pedigree (1,1,5,1,1)
  (same comment as for Chromium)
- DOC, Dissolved Organic Carbon [water, surface water]: 2.1762e-5 kg; lognormal variance with pedigree 0.27, pedigree (1,1,5,1,1)
  (same comment as for Iron, ion)
- Silicon [water, surface water]: 6.0362e-7 kg; lognormal variance with pedigree 0.75, pedigree (1,1,5,1,1)
  (same comment as for Iron, ion)
- Silicon [water, ground-, long-term]: 0.00024663 kg; lognormal variance with pedigree 5.4, pedigree (1,1,5,1,1)
  (same comment as for Fluoride)
- Tin, ion [water, ground-, long-term]: 9.744e-5 kg; lognormal variance with pedigree 1.3, pedigree (1,1,5,1,1)
  (same comment as for Fluoride)
- Aluminium [air, urban air close to ground]: 3.5724e-6 kg; lognormal variance with pedigree 0.33, pedigree (1,1,5,1,1)
  (same comment as for Chromium)
- Chromium VI [water, surface water]: 1.6323e-6 kg; lognormal variance with pedigree 1.04, pedigree (1,1,5,1,1)
  (same comment as for Iron, ion)
- Barium [water, ground-, long-term]: 0.00014995 kg; lognormal variance with pedigree 0.98, pedigree (1,1,5,1,1)
  (same comment as for Fluoride)
- Methane, fossil [air, urban air close to ground]: 6.3821e-6 kg; lognormal variance with pedigree 0.091225, pedigree (2,3,5,2,1)
  Confidential data from 5 plants in Switzerland and Germany
  Uncertainty: & basic uncertainty of 1.5; confidential data from 5 plants in Switzerland and Germany
- Titanium [air, urban air close to ground]: 4.2721e-6 kg; lognormal variance with pedigree 0.53, pedigree (1,1,5,1,1)
  (same comment as for Chromium)
- Copper, ion [water, surface water]: 2.4881e-7 kg; lognormal variance with pedigree 1.33, pedigree (1,1,5,1,1)
  (same comment as for Iron, ion)
- Manganese [water, surface water]: 3.8065e-10 kg; lognormal variance with pedigree 2.12, pedigree (1,1,5,1,1)
  (same comment as for Iron, ion)
- Molybdenum [air, urban air close to ground]: 5.7254e-9 kg; lognormal variance with pedigree 1.49, pedigree (1,1,5,1,1)
  (same comment as for Chromium)
- Copper [air, urban air close to ground]: 2.2499e-8 kg; lognormal variance with pedigree 0.51, pedigree (1,1,5,1,1)
  (same comment as for Chromium)
- Nickel, ion [water, surface water]: 2.9992e-7 kg; lognormal variance with pedigree 1.38, pedigree (1,1,5,1,1)
  (same comment as for Iron, ion)
- Vanadium, ion [water, ground-, long-term]: 1.252e-7 kg; lognormal variance with pedigree 2.38, pedigree (1,1,5,1,1)
  (same comment as for Fluoride)
- Beryllium [air, urban air close to ground]: 4.4521e-10 kg; lognormal variance with pedigree 1.73, pedigree (1,1,5,1,1)
  (same comment as for Chromium)
- Hydrogen fluoride [air, urban air close to ground]: 1.2556e-7 kg; lognormal variance with pedigree 0.91, pedigree (1,1,5,1,1)
  (same comment as for Chromium)
- Manganese [air, urban air close to ground]: 3.5851e-14 kg; lognormal variance with pedigree 1.48, pedigree (1,1,5,1,1)
  (same comment as for Chromium)
- Chloride [water, ground-, long-term]: 0.00016677 kg; lognormal variance with pedigree 0.23, pedigree (1,1,5,1,1)
  (same comment as for Fluoride)
- Sodium, ion [water, ground-, long-term]: 0.00012006 kg; lognormal variance with pedigree 0.69, pedigree (1,1,5,1,1)
  (same comment as for Fluoride)
- Thallium [water, ground-, long-term]: 2.0783e-7 kg; lognormal variance with pedigree 1.32, pedigree (1,1,5,1,1)
  (same comment as for Fluoride)
- Sulfate [water, ground-, long-term]: 0.0010186 kg; lognormal variance with pedigree 0.49, pedigree (1,1,5,1,1)
  (same comment as for Fluoride)
- Bromine [air, urban air close to ground]: 1.5745e-5 kg; lognormal variance with pedigree 0.5, pedigree (1,1,5,1,1)
  (same comment as for Chromium)
- Carbon monoxide, fossil [air, urban air close to ground]: 0.0002229 kg; lognormal variance with pedigree 0.690625, pedigree (1,3,5,2,1)
  Literature data from switzerland and germany adapted to plant age distribution in switzerland
  Uncertainty: & basic uncertainty of 5; literature data from switzerland and germany adapted to plant age distribution in switzerland
- Titanium, ion [water, ground-, long-term]: 0.0012801 kg; lognormal variance with pedigree 0.87, pedigree (1,1,5,1,1)
  (same comment as for Fluoride)
- Nitrogen oxides [air, urban air close to ground]: 0.00040379 kg; lognormal variance with pedigree 1.41, pedigree (1,1,5,1,1)
  (same comment as for Ammonia)

## Sampling procedure
waste-specific calculation based on literature data

## Extrapolations
This dataset has been extrapolated from year 2000 to the year of the calculation (2019). The uncertainty has been adjusted accordingly.

## Review by Jürgen Sutter 2007-08-31
passed.
