# maize silage production

Dataset: EcoSpold 2, unit process
Geography: CA-QC
Time period: 2010-01-01 to 2019-12-31
Technology level: current
Classification: ISIC rev.4 ecoinvent: 0119:Growing of other non-perennial crops
Synonyms: corn silage
Scenario: Business-as-Usual
System model: Allocation at the point of substitution
Share of production covered: 100 %
Generated by: Dominique Maxime
Database: ecoinvent
isCopyrightProtected: true
accessRestrictedTo: 1

## General comment
This dataset represents the production of 1 kg fresh matter of maize silage in the region of Québec. The 2010-2012 average yield is 36330 kg/ha (wet mass) at a moisture content at storage of 65%.

## Included activities start
This activity starts with soil cultivation after the harvest of the previous crop.

## Included activities end
This activity ends after harvest and ensiling of maize plant, at the farm gate. The dataset includes the inputs of seeds, mineral and organic fertilisers applied, pesticides and all machine operations and corresponding machine infrastructure and sheds. Machine operations are: soil cultivation, transport of seeds, fertilisers and pesticides to the field (15 km), sowing, fertilisation, weed control, pest and pathogen control, plant cutting, loading, transport to farm and discharge into silo. Direct field emissions are also included. No irrigation is involved for maize production in Québec.

## Geography
The inventory is modelled for the region of Québec (Canada).

## Time period
Time of publications

## Parameters
- fraction, process water to water, to surface water: 0.2 dimensionless; name fraction_PWtoW_to_surface_water; lognormal variance with pedigree 0.0892, pedigree (4,3,1,4,4)
  For agricultural crop dataset, distinction is made between irrigation water and process water. Process water is the water that comes with manure or pesticide application. A fraction of the process water input evaporates to the air and the remaining is considered emitted to surface water and ground water.
  This value is a proxy, taken from ecoinvent v3.0 dataset 'potato production, US 2006'. 'Literature value (Döll, 2011) cross referenced with expert opinion.' as cited in original dataset.
- water content at harvest: 0.65 kg/kg; name harvest_wc; lognormal variance with pedigree 0.01, pedigree (1,1,1,1,1)
  Water content at harvest (wet mass basis). See supporting documentation '01 crop production - Québec.pdf' available on ecoinvent reports web page (https://ecoquery.ecoinvent.org/File/Reports).
- fraction, process water, to air: 0.6165 dimensionless; name fraction_PW_to_air; lognormal variance with pedigree 0.0413, pedigree (2,2,1,4,1)
  For agricultural crop dataset, distinction is made between irrigation water and process water. Process water is the water that comes with manure or pesticide application. A fraction of the process water input evaporates to the air and the remaining is considered emitted to surface water and ground water.
  By default, the same value as for irrigation is assumed: this is a Canada-wide value taken from database (Vionnet, S., Quantis Water Database - Technical report, 2012). Note that it might be lower in Quebec due to the more humid climate in Western Canada than in Eastern Canada.
- yield, agriculture: 36.33 metric ton/ha; name yield_agriculture; lognormal variance with pedigree 0.0081, pedigree (1,2,1,1,1)
  Amount (fresh basis) of harvested and ensiled material (65% water content) per hectare of cultivated land. See supporting documentation '01 crop production - Québec.pdf' available on ecoinvent reports web page (https://ecoquery.ecoinvent.org/File/Reports).

## Reference product
- maize silage: 1 kg; name REF_PRODUCT; CPC 01911: Maize for forage and silage; By-product classification allocatable product
  production volume 2.18357e6 kg
    Maize silage production, fresh basis (65% moisture), 2010-2012 yearly average.
  property price 0.0349023 EUR2005; name REF_PRODUCT_price_EUR2005
    Average prices in EUR were estimated from a series of prices in BRL from 2006 to 2015 that were considered by Embrapa Pecus project (https://www.embrapa.br/pecuaria-sudeste/busca-de-projetos/-/projeto/38213/projeto-da-rede-pecus), the same source of data used to build the beef cattle datasets for BR region.
  property energy content 6.6325 MJ; name REF_PRODUCT_energy_content
    as gross calorific value
  property carbon content, non-fossil 0.4773; name REF_PRODUCT_C_content_non_fossil
    biogene carbon content on a dry matter basis
    Composition data obtained for 2 maize silage (30-35% moisture and 35-40% moisture) from Feedipedia (http://www.feedipedia.org). First, composition data were refered to 1 kg dry mass. Then, C-contents were calculated considering a C-content/dry mass of 46% in carbohydrates (including fibres), 53% in proteins and 75% in fats. All data from 'Evolutionary and Biochemical Aspects', A.D. Kay and T. Vrede (in Global Ecology, 2010, Elsevier B.V., S.E. Jørgensen Ed.).
  property carbon content, fossil 0; name REF_PRODUCT_C_content_fossil
    fossil carbon content on a dry matter basis
  property water in wet mass 0.65 kg; name REF_PRODUCT_WWM
  property water content 1.85714; name REF_PRODUCT_water_content; = REF_PRODUCT_WWM / REF_PRODUCT_DM
  property dry mass 0.35 kg; name REF_PRODUCT_DM; = REF_PRODUCT_WM - REF_PRODUCT_WWM
  property wet mass 1 kg; name REF_PRODUCT_WM
  property carbon content 0.4773
    carbon content on a dry matter basis (reserved; not for manual entry)
  properties: carbon allocation 0.167055 kg

## Inputs from technosphere
- manure, liquid, cattle: 0.17184 kg; name MANURE_LIQUID_CATTLE; lognormal variance with pedigree 0.0039, pedigree (2,2,3,1,2)
  Amount of 0.17184 kg of manure, liquid, cattle is needed when producing 1kg of maize silage.
  Amount is determined from the organic nutrient actually used for the crop and from data about organic fertilizer production, by type, in Québec (MAPAQ, 2013). See details for disaggregation in supporting documentation '01 crop production - Québec.pdf' available on ecoinvent reports web page (https://ecoquery.ecoinvent.org/File/Reports).
  property water in wet mass 0.925 kg; name MANURE_LIQUID_CATTLE_WWM
  properties: wet mass 1 kg, nitrogen content 0.03681, water content 12.333, dry mass 0.075 kg, carbon content, non-fossil 0.68
  note on nitrogen content: Total N content on a dry matter basis. Weighted average of beef cattle liquid manure (0.0425 kg N/kg dm) and dairy cattle liquid manure (0.03611 kg N/kg dm) considering that N supply in central and peripherical agricultural regions is for 89% from dairy and 11% from beef cattle (MAPAQ, 2013). N content from Parent and Gagné (2013).
- tillage, ploughing: 2.7819e-5 ha; lognormal variance with pedigree 0.0039, pedigree (2,2,3,1,2)
  See supporting documentation '01 crop production - Québec.pdf' available on ecoinvent reports web page (https://ecoquery.ecoinvent.org/File/Reports).
- manure, liquid, swine: 0.2134 kg; name MANURE_LIQUID_SWINE; lognormal variance with pedigree 0.0039, pedigree (2,2,3,1,2)
  Amount of 0.2134 kg of manure, liquid, swine is needed when producing 1kg of maize silage.
  Amount is determined from the organic nutrient actually used for the crop (CECPA, 2011) and from data about organic fertilizer production, by type, in Québec (MAPAQ, 2013). See details for disaggregation in supporting documentation '01 crop production - Québec.pdf' available on ecoinvent reports web page (https://ecoquery.ecoinvent.org/File/Reports).
  property water in wet mass 0.95 kg; name MANURE_LIQUID_SWINE_WWM
  properties: wet mass 1 kg, nitrogen content 0.1, carbon content, non-fossil 0.64, dry mass 0.05 kg, water content 19
- tillage, rotary cultivator: 4.0012e-5 ha; lognormal variance with pedigree 0.0039, pedigree (2,2,3,1,2)
  2 passes. See supporting documentation '01 crop production - Quebec.pdf' available on ecoinvent reports web page (https://ecoquery.ecoinvent.org/File/Reports).
- manure, solid, cattle: 0.050985 kg; name MANURE_SOLID_CATTLE; lognormal variance with pedigree 0.0039, pedigree (2,2,3,1,2)
  Amount of 0.050985 kg of manure, solid, cattle is needed when producing 1kg of maize silage.
  Amount is determined from the organic nutrient actually used for the crop (CECPA, 2011) and from data about organic fertilizer production, by type, in Québec (MAPAQ, 2013). See details for disaggregation in supporting documentation '01 crop production - Québec.pdf' available on ecoinvent reports web page (https://ecoquery.ecoinvent.org/File/Reports).
  property water in wet mass 0.78 kg; name MANURE_SOLID_CATTLE_WWM
  properties: nitrogen content 0.02734, dry mass 0.22 kg, water content 3.5454, wet mass 1 kg, carbon content, non-fossil 0.441
  note on nitrogen content: Total N content on a dry matter basis. Weighted average of beef cattle solid manure (0.02639 kg N/kg dm) and dairy cattle solid manure (0.02789 kg N/kg dm) considering that N supply in central and peripherical agricultural regions is about 63% from dairy and 37% from beef cattle (MAPAQ, 2013). N content from Parent and Gagné (2013).
- lime: 0.0050656 kg; name LIME_CaCO3; lognormal variance with pedigree 0.0039, pedigree (2,2,3,1,2)
  as CaCO3. CECPA (2011). Étude sur les coûts de production des céréales, du maïs-grain et des oléagineux en 2009 au Québec. [Centre d’Études sur les Coûts de Production en Agriculture], Juillet 2011, 112 p. [in French]. Available at: http://www.cecpa.qc.ca/contenuFichiers/files/etudesAnalyses/etude-complete-cereales-mais-grain-oleagineux-en-2009-quebec_20130501133424.pdf
  properties: dry mass 1 kg, carbon content, fossil 0.120005, wet mass 1 kg
- poultry manure, fresh: 0.015576 kg; lognormal variance with pedigree 0.0039, pedigree (2,2,3,1,2)
  Amount of 0.015576 kg of poultry manure, fresh is needed when producing 1kg of maize silage.
  Amount is determined from the organic nutrient used for the crop (Beauregard, 2013) and from data about organic fertilizer production, by type, in Québec (MAPAQ, 2013). See details for disaggregation in supporting documentation '01 crop production - Québec.pdf' available on ecoinvent reports web page (https://ecoquery.ecoinvent.org/File/Reports).
  properties: nitrogen content 0.04044, wet mass 1 kg, carbon content, non-fossil 0.33389, water content 1.63158, dry mass 0.38 kg
- [thio]carbamate-compound: 3.8262e-8 kg; lognormal variance with pedigree 0.0414, pedigree (1,2,5,3,2)
  Carbaryl (6,3702E-08 kg) and pyraclostrobin (4,5614E-08 kg). Pyraclostrobin is derived from carbamate but it might not belong to this chemical class. See supporting documentation '01 crop production - Québec.pdf' available on ecoinvent reports web page (https://ecoquery.ecoinvent.org/File/Reports).
  properties: wet mass 1 kg, carbon content, fossil 0.626349, dry mass 1 kg
- chopping, maize: 2.75255e-5 ha; = (1 / (yield_agriculture * UnitConversion(1, 'metric ton', 'kg'))); lognormal variance with pedigree 0.002, pedigree (1,1,3,1,1)
  Complete harvest of cropland area. See parameters.
- atrazine: 1.4946e-5 kg; lognormal variance with pedigree 0.0414, pedigree (1,2,5,3,2)
  (same comment as for tillage, ploughing)
  properties: wet mass 1 kg, dry mass 1 kg, carbon content, fossil 0.446512
- solid manure loading and spreading, by hydraulic loader and spreader: 0.066562 kg; lognormal variance with pedigree 0.0039, pedigree (2,2,3,1,2)
  Calculated from solid manure input rate and crop yield.
- liquid manure spreading, by vacuum tanker: 0.00038524 m3; lognormal variance with pedigree 0.0039, pedigree (2,2,3,1,2)
  Calculated from liquid manure input rate and crop yield.
- packaging, for fertilisers: 0.0160035 kg; lognormal variance with pedigree 0.0532, pedigree (4,3,3,5,4)
  Total amount of active substance/s of fertilisers needed for the production of 'maize silage' is calculated to be circa 8.00E-03 kg. Fertiliser/s used in this dataset is/are: 'ammonia, liquid', 'ammonium nitrate, as N', 'ammonium sulfate, as N', 'lime', 'nitrogen fertiliser, as N', 'phosphate fertiliser, as P2O5', 'urea, as N'. The total amount of active substance/s is doubled in order to account for the packaging of the dilluted product of fertiliser/s that is/are applied. Therefore, 1.60E-02 kg of packaging for fertilisers is justified with this exchange.
  properties: dry mass 1 kg, price 0.0642 EUR2005, wet mass 1 kg, carbon content, fossil 0.825301
  note on carbon content, fossil: Considering a chemical formula (C2H4)n for polyethylene, carbon content-fossil is calculated to be 0.856286 kg of Carbon per kg of dry mass.
- benzoic-compound: 2.5048e-6 kg; lognormal variance with pedigree 0.0414, pedigree (1,2,5,3,2)
  Dicamba. See supporting documentation '01 crop production - Québec.pdf' available on ecoinvent reports web page (https://ecoquery.ecoinvent.org/File/Reports).
  properties: wet mass 1 kg, dry mass 1 kg, carbon content, fossil 0.405853
- dimethenamide: 1.7341e-6 kg; lognormal variance with pedigree 0.0414, pedigree (1,2,5,3,2)
  (same comment as for tillage, ploughing)
  properties: dry mass 1 kg, wet mass 1 kg, carbon content, fossil 0.521739
- fodder loading, by self-loading trailer: 0.002293 m3; lognormal variance with pedigree 0.0039, pedigree (2,2,3,1,2)
  As modelled in the machinery QC process, it includes cutting, loading, tranport to farm and discharge/compacting.
- packaging, for pesticides: 0.000104486 kg; lognormal variance with pedigree 0.0532, pedigree (4,3,3,5,4)
  Total amount of active substance/s of pesticides needed for the production of maize silage is calculated to be circa 5.22E-05 kg. Pesticide/s used in this dataset is/are: '[thio]carbamate-compound', 'atrazine', 'benzoic-compound', 'dimethenamide', 'glyphosate', 'metolachlor', 'pendimethalin', 'pesticide, unspecified', 'pyrethroid-compound'. The total amount of active substance/s is doubled in order to account for the packaging of the dilluted product of pesticide/s that is/are applied. Therefore, 1.04E-04 kg of packaging for pesticides is justified with this exchange.
  properties: wet mass 1 kg, carbon content, fossil 0.85714, dry mass 1 kg, price 0.0642 EUR2005
- maize seed, for sowing: 0.000878613 kg; name SEED; = (1 / (yield_agriculture * UnitConversion(1, 'metric ton', 'kg'))) * SEED_nber_per_ha * SEED_mass_per_seed; lognormal variance with pedigree 0.002, pedigree (1,1,3,1,1)
  Calculated value. See Exchange Properties.
  property carbon content, fossil 0; name maize_seed_sowing_C_content_fossil
  property water in wet mass 0.14 kg; name SEED_WWM
  property water content 0.162791; name SEED_water_content; = SEED_WWM / SEED_DM
  property dry mass 0.86 kg; name SEED_DM; = SEED_WM - SEED_WWM
  property mass per seed 0.00038 kg; name SEED_mass_per_seed
  property carbon content, non-fossil 0.46957; name SEED_C_content_non_fossil
  property wet mass 1 kg; name SEED_WM
  property seeds per hectare 84000 unit; name SEED_nber_per_ha
  note on mass per seed: 0,380 kg/1000 seeds. See supporting documentation '01 crop production - Québec.pdf' available on ecoinvent reports web page (https://ecoquery.ecoinvent.org/File/Reports).
  note on carbon content, non-fossil: biogene carbon content on a dry matter basis; Composition data obtained from Corn Grain Whole, in (http://beefmagazine.com/images/2009%20feed%20table.pdf). First, composition data were refered to 1 kg dry mass. Then, C-contents were calculated considering a C-content/dry mass of 44% in carbohydrates (including fibres), 53% in proteins and 75% in fats. All data from ecoinvent report, n 15a, pg 40, except C-content in protein, that comes from Determination of protein concentration by total organic carbon analysis, Rouwenhorst et al., 1991, J Biochem and Biophys Methods, 22:119-128.
  note on seeds per hectare: 82000 seeds/ha. See supporting documentation '01 crop production - Québec.pdf' available on ecoinvent reports web page (https://ecoquery.ecoinvent.org/File/Reports).
- glyphosate: 1.7616e-5 kg; lognormal variance with pedigree 0.0414, pedigree (1,2,5,3,2)
  (same comment as for tillage, ploughing)
  properties: dry mass 1 kg, wet mass 1 kg, carbon content, fossil 0.214286
- metolachlor: 1.1891e-5 kg; lognormal variance with pedigree 0.0414, pedigree (1,2,5,3,2)
  (same comment as for tillage, ploughing)
  properties: carbon content, fossil 0.633803, dry mass 1 kg, wet mass 1 kg
- sowing: 2.7562e-5 ha; lognormal variance with pedigree 0.0039, pedigree (2,2,3,1,2)
  (same comment as for tillage, ploughing)
- pendimethalin: 1.4038e-6 kg; lognormal variance with pedigree 0.0414, pedigree (1,2,5,3,2)
  (same comment as for tillage, ploughing)
  properties: carbon content, fossil 0.55516, dry mass 1 kg, wet mass 1 kg
- pesticide, unspecified: 2.0938e-6 kg; lognormal variance with pedigree 0.0414, pedigree (1,2,5,3,2)
  5,9770E-06 kg herbicide, unspecified; 2,2807E-09 kg insecticide, unspecified, and 3,1458E-09 kg fungicide, unspecified. They account for 4%, 2% and 6% of herbicides, insecticides and fungicides inputs, respectively. See supporting documentation '01 crop production - Québec.pdf' available on ecoinvent reports web page (https://ecoquery.ecoinvent.org/File/Reports).
  properties: dry mass 1 kg, wet mass 1 kg, carbon content, fossil 0.486978
  note on carbon content, fossil: Mean of C content in all pesticides whose formula has been documented in Sutter 2010
- pyrethroid-compound: 1.5414e-8 kg; lognormal variance with pedigree 0.0414, pedigree (1,2,5,3,2)
  Tefluthrin. See supporting documentation '01 crop production - Québec.pdf' available on ecoinvent reports web page (https://ecoquery.ecoinvent.org/File/Reports).
  properties: carbon content, fossil 0.623, wet mass 1 kg, dry mass 1 kg
- fertilising, by broadcaster: 2.7525e-5 ha; lognormal variance with pedigree 0.0039, pedigree (2,2,3,1,2)
  (same comment as for tillage, ploughing)
- nitrogen fertiliser, as N: 0.0006306 kg; lognormal variance with pedigree 0.0039, pedigree (2,2,3,1,2)
  Amount is determined from Beauregard (2013) and from the overall mineral fertilizers sales, by type of fertilizer, in Québec for agriculture (APNC, 2010). See details for disaggregation in supporting documentation '01 crop production - Québec.pdf' available on ecoinvent reports web page (https://ecoquery.ecoinvent.org/File/Reports).
  properties: dry mass 1 kg, wet mass 1 kg
- application of plant protection product, by field sprayer: 1.295e-5 ha; lognormal variance with pedigree 0.0039, pedigree (2,2,3,1,2)
  47% of cropand area receives plant protection products in average. See supporting documentation '01 crop production - Québec.pdf' available on ecoinvent reports web page (https://ecoquery.ecoinvent.org/File/Reports).
- urea, as N: 0.0011242 kg; name UREA_N; lognormal variance with pedigree 0.0039, pedigree (2,2,3,1,2)
  Amount is determined from the mineral nutrient used for the crop and from the overall mineral fertilizers sales, by type of fertilizer, in Québec for agriculture (APNC, 2010). See details for disaggregation in supporting documentation '01 crop production - Québec.pdf' available on ecoinvent reports web page (https://ecoquery.ecoinvent.org/File/Reports).
  properties: wet mass 1 kg, carbon content, fossil 0.2, dry mass 1 kg
- ammonium nitrate, as N: 0.00051181 kg; lognormal variance with pedigree 0.0039, pedigree (2,2,3,1,2)
  (same comment as for urea, as N)
  properties: wet mass 1 kg, dry mass 1 kg
- ammonia, liquid: 0.0001026 kg; lognormal variance with pedigree 0.0039, pedigree (2,2,3,1,2)
  (same comment as for urea, as N)
  properties: wet mass 1 kg, dry mass 1 kg
- transport, tractor and trailer, agricultural: 0.006978 metric ton*km; lognormal variance with pedigree 0.1233, pedigree (2,2,3,1,2)
  Transport of inputs from farm to field (assuming 15 km). See supporting documentation '01 crop production - Québec.pdf' available on ecoinvent reports web page (https://ecoquery.ecoinvent.org/File/Reports).
- ammonium sulfate, as N: 7.1467e-5 kg; lognormal variance with pedigree 0.0039, pedigree (2,2,3,1,2)
  (same comment as for urea, as N)
  properties: dry mass 1 kg, wet mass 1 kg
- phosphate fertiliser, as P2O5: 0.00049546 kg; lognormal variance with pedigree 0.0039, pedigree (2,2,3,1,2)
  Amount is determined from the mineral nutrient used for the crop (Beauregard, 2013) and from the overall mineral fertilizers sales, by type of fertilizer, in Québec for agriculture (APNC, 2010). See details for disaggregation in supporting documentation '01 crop production - Québec.pdf' available on ecoinvent reports web page (https://ecoquery.ecoinvent.org/File/Reports).
  Mono- and di-ammonium phosphate (MAP and DAP), as P2O5. The concommitant supply of nitrogen by DAP is accounted for in total N requirements. See supporting documentation '01 crop production - Québec.pdf' available on ecoinvent reports web page (https://ecoquery.ecoinvent.org/File/Reports).
  properties: dry mass 1 kg, wet mass 1 kg

## Inputs from nature
- Energy, gross calorific value, in biomass [natural resource, biotic]: 5.31 MJ; lognormal variance with pedigree 0.1253, pedigree (3,3,3,3,5)
  Estimated to be the same as in case of other maize silage production datasets.
- Carbon dioxide, in air [natural resource, in air]: 0.612006 kg; = 44/12 * (REF_PRODUCT_C_content_non_fossil * REF_PRODUCT * REF_PRODUCT_DM - SEED_C_content_non_fossil * SEED * REF_PRODUCT_DM); lognormal variance with pedigree 0.002, pedigree (1,1,3,1,1)
  Calculated value, see chapter 'CO2 binding' in '01 crop production-direct field emissions natural resources v1.2.pdf' available on ecoinvent reports web page (https://ecoquery.ecoinvent.org/File/Reports). The 44/12 ratio is the stoichiometric mass ratio of carbon dioxide to carbon.
- Occupation, annual crop, non-irrigated, intensive [natural resource, land]: 0.229378 m2*year; = OCCUP_period * (1 / (yield_agriculture * UnitConversion(1, 'metric ton', 'kg'))) * UnitConversion(1, 'ha', 'm2'); lognormal variance with pedigree 0.002, pedigree (1,1,3,1,1)
  Calculated value. See Exchange Properties and Parameters.
  property occupation period 0.83333 year; name OCCUP_period
- Transformation, to annual crop, non-irrigated, intensive [natural resource, land]: 0.275255 m2; = (1 / (yield_agriculture * UnitConversion(1, 'metric ton', 'kg')))*UnitConversion(1, 'ha', 'm2'); lognormal variance with pedigree 0.002, pedigree (1,1,3,1,1)
  Calculated value. See Parameters.
- Transformation, from annual crop, non-irrigated, intensive [natural resource, land]: 0.275255 m2; = (1 / (yield_agriculture * UnitConversion(1, 'metric ton', 'kg'))) * UnitConversion(1, 'ha', 'm2'); lognormal variance with pedigree 0.002, pedigree (1,1,3,1,1)
  Calculated value. See Parameters.

## Emissions to nature
- Metolachlor [water, ground-]: 7.0158e-8 kg; lognormal variance with pedigree 0.0813, pedigree (2,2,5,1,2)
  Modelled with PestLCI 2.0. See supporting documentation '01 crop production - Québec.pdf' available on ecoinvent reports web page (https://ecoquery.ecoinvent.org/File/Reports).
- Metolachlor [water, surface water]: 2.8538e-10 kg; lognormal variance with pedigree 0.0813, pedigree (2,2,5,1,2)
  (same comment as for Metolachlor)
- Metolachlor [air, non-urban air or from high stacks]: 2.0809e-8 kg; lognormal variance with pedigree 0.0813, pedigree (2,2,5,1,2)
  (same comment as for Metolachlor)
- Nitrate [water, ground-]: 0.0052906 kg; lognormal variance with pedigree 0.0433, pedigree (2,2,3,1,2)
  Modelled with the 'SQCB-NO3 model' described in '01 crop production-direct field emissions natural resources v1.2.pdf' available on ecoinvent reports web page (https://ecoquery.ecoinvent.org/File/Reports). Québec average conditions are considered for the SQCB-NO3 model input parameters (see supporting documentation '01 crop production - Québec.pdf' available on ecoinvent reports web page (https://ecoquery.ecoinvent.org/File/Reports)).
- Pendimethalin [soil, agricultural]: 1.3152e-6 kg; lognormal variance with pedigree 0.0743, pedigree (2,2,5,1,2)
  (same comment as for Metolachlor)
- Glyphosate [soil, agricultural]: 1.704e-5 kg; lognormal variance with pedigree 0.0743, pedigree (2,2,5,1,2)
  Modelled with PestLCI 2.0 (Dijkman et al. 2012). See supporting documentation '01 crop production - Québec.pdf' available on ecoinvent reports web page (https://ecoquery.ecoinvent.org/File/Reports).
- Pendimethalin [air, non-urban air or from high stacks]: 8.1421e-8 kg; source Dijkman, T.J. 2012; lognormal variance with pedigree 0.0813, pedigree (2,2,5,1,2)
  (same comment as for Metolachlor)
- Zinc [soil, agricultural]: 7.6734e-6 kg; lognormal variance with pedigree 0.0827, pedigree (5,2,3,1,2)
  Calculated value. See supporting documentation '01 crop production - Québec.pdf' available on ecoinvent reports web page (https://ecoquery.ecoinvent.org/File/Reports).
- Pendimethalin [water, surface water]: 1.2003e-11 kg; source Dijkman, T.J. 2012; lognormal variance with pedigree 0.0813, pedigree (2,2,5,1,2)
  (same comment as for Metolachlor)
- Cadmium [soil, agricultural]: -3.6313e-8 kg
  (same comment as for Zinc)
- Copper [soil, agricultural]: 5.5566e-6 kg; lognormal variance with pedigree 0.0827, pedigree (5,2,3,1,2)
  (same comment as for Zinc)
- Pendimethalin [water, ground-]: 7.1593e-9 kg; source Dijkman, T.J. 2012; lognormal variance with pedigree 0.0813, pedigree (2,2,5,1,2)
  (same comment as for Metolachlor)
- Chromium [soil, agricultural]: -1.1144e-6 kg
  (same comment as for Zinc)
- Pyraclostrobin (prop) [soil, agricultural]: 1.5905e-8 kg; lognormal variance with pedigree 0.0743, pedigree (2,2,5,1,2)
  (same comment as for Metolachlor)
- Phosphate [water, surface water]: 3.7391e-5 kg; source Michaud, A.R. 2008; lognormal variance with pedigree 0.0433, pedigree (2,2,3,1,2)
  Modelled with Québec conditions with the 'ODEP model' (Michaud et al., 2008). See supporting documentation '01 crop production - Quebec.pdf' available on ecoinvent reports web page (https://ecoquery.ecoinvent.org/File/Reports).
  property water content 0; name water_content
  property carbon content, fossil 0; name C_content_fossil
  property carbon content, non-fossil 0; name C_content_non_fossil
  property dry mass 1 kg; name DM
  property wet mass 1 kg; name WM
  property water in wet mass 0 kg; name WWM
- Pyraclostrobin [water, surface water]: 5.907e-11 kg; source Dijkman, T.J. 2012; lognormal variance with pedigree 0.0813, pedigree (2,2,5,1,2)
  (same comment as for Metolachlor)
- Phosphorus [water, surface water]: 4.5493e-5 kg; source Michaud, A.R. 2008; lognormal variance with pedigree 0.0433, pedigree (2,2,3,1,2)
  (same comment as for Phosphate)
- Pyraclostrobin [water, ground-]: 1.1734e-14 kg; source Dijkman, T.J. 2012; lognormal variance with pedigree 0.0813, pedigree (2,2,5,1,2)
  (same comment as for Metolachlor)
- Carbon dioxide, fossil [air, non-urban air or from high stacks]: 0.00399498 kg; = UREA_N*1.571 +LIME_CaCO3*0.44; lognormal variance with pedigree 0.002, pedigree (1,1,3,1,1)
  Carbon dioxide emissions from limestone and urea application calculated from C content (IPCC, 2006). Emission factors are EF=1.57 kg CO2/kg N for urea, and EF=0.44 kg CO2/kg CaCO3 for limestone. See supporting documentation '01 crop production - Quebec.pdf' available on ecoinvent reports web page (https://ecoquery.ecoinvent.org/File/Reports).
- Tefluthrin [soil, agricultural]: 1.1638e-8 kg; lognormal variance with pedigree 0.0743, pedigree (2,2,5,1,2)
  (same comment as for Metolachlor)
- Glyphosate [air, non-urban air or from high stacks]: 6.342e-8 kg; source Dijkman, T.J. 2012; lognormal variance with pedigree 0.0813, pedigree (2,2,5,1,2)
  (same comment as for Glyphosate)
- Tefluthrin [air, non-urban air or from high stacks]: 3.7765e-9 kg; lognormal variance with pedigree 0.0813, pedigree (2,2,5,1,2)
  (same comment as for Metolachlor)
- Glyphosate [water, surface water]: 2.2813e-9 kg; source Dijkman, T.J. 2012; lognormal variance with pedigree 0.0813, pedigree (2,2,5,1,2)
  (same comment as for Glyphosate)
- Tefluthrin [water, surface water]: 0 kg; pedigree (1,1,1,1,1)
  (same comment as for Metolachlor)
- Glyphosate [water, ground-]: 5.1086e-7 kg; source Dijkman, T.J. 2012; lognormal variance with pedigree 0.0813, pedigree (2,2,5,1,2)
  (same comment as for Glyphosate)
- Tefluthrin [water, ground-]: 1.8497e-14 kg; lognormal variance with pedigree 0.0813, pedigree (2,2,5,1,2)
  (same comment as for Metolachlor)
- Atrazine [soil, agricultural]: 1.4346e-5 kg; lognormal variance with pedigree 0.0743, pedigree (2,2,5,1,2)
  (same comment as for Metolachlor)
- Cadmium, ion [water, surface water]: 4.0005e-8 kg; lognormal variance with pedigree 0.0827, pedigree (5,2,3,1,2)
  (same comment as for Zinc)
- Atrazine [air, non-urban air or from high stacks]: 9.0426e-8 kg; lognormal variance with pedigree 0.0813, pedigree (2,2,5,1,2)
  (same comment as for Metolachlor)
- Chromium, ion [water, surface water]: 1.788e-6 kg; lognormal variance with pedigree 0.0827, pedigree (5,2,3,1,2)
  (same comment as for Zinc)
- Atrazine [water, surface water]: 1.9654e-9 kg; lognormal variance with pedigree 0.0813, pedigree (2,2,5,1,2)
  (same comment as for Metolachlor)
- Lead [water, surface water]: 6.5975e-7 kg; lognormal variance with pedigree 0.0827, pedigree (5,2,3,1,2)
  (same comment as for Zinc)
- Atrazine [water, ground-]: 5.0817e-7 kg; lognormal variance with pedigree 0.0813, pedigree (2,2,5,1,2)
  (same comment as for Metolachlor)
- Zinc, ion [water, surface water]: 7.4039e-6 kg; lognormal variance with pedigree 0.0827, pedigree (5,2,3,1,2)
  (same comment as for Zinc)
- Carbaryl [soil, agricultural]: 1.8e-8 kg; lognormal variance with pedigree 0.0743, pedigree (2,2,5,1,2)
  (same comment as for Metolachlor)
- Nickel, ion [water, surface water]: 2.2582e-6 kg; lognormal variance with pedigree 0.0827, pedigree (5,2,3,1,2)
  (same comment as for Zinc)
- Carbaryl [air, non-urban air or from high stacks]: 4.2361e-9 kg; lognormal variance with pedigree 0.0813, pedigree (2,2,5,1,2)
  (same comment as for Metolachlor)
- Copper, ion [water, surface water]: 1.3253e-6 kg; lognormal variance with pedigree 0.0827, pedigree (5,2,3,1,2)
  (same comment as for Zinc)
- Carbaryl [water, surface water]: 7.3577e-13 kg; lognormal variance with pedigree 0.0813, pedigree (2,2,5,1,2)
  (same comment as for Metolachlor)
- Pyraclostrobin [air, non-urban air or from high stacks]: 7.264e-13 kg; source Dijkman, T.J. 2012; lognormal variance with pedigree 0.0813, pedigree (2,2,5,1,2)
  (same comment as for Metolachlor)
- Carbaryl [water, ground-]: 5.9084e-11 kg; lognormal variance with pedigree 0.0813, pedigree (2,2,5,1,2)
  (same comment as for Metolachlor)
- Ammonia [air, non-urban air or from high stacks]: 0.00087266 kg; lognormal variance with pedigree 0.0113, pedigree (2,2,3,1,2)
  NH3 from mineral fertilisers are calculated with the emission factors published in the EMEP guidelines from the European Environment Agency (EEA, 2013). NH3 from manure are calculated according to the caracteristics of every manure, and to Quebec figures for period and method of maqnure application, and delay before incorporation of manure into the soil (Parent et Gagné, 2010; 2013). See supporting documentation '01 crop production - Québec.pdf' available on ecoinvent reports web page (https://ecoquery.ecoinvent.org/File/Reports).
- Dicamba [soil, agricultural]: 2.2153e-6 kg; lognormal variance with pedigree 0.0743, pedigree (2,2,5,1,2)
  (same comment as for Metolachlor)
- Nitrogen oxides [air, non-urban air or from high stacks]: 0.00014392 kg; lognormal variance with pedigree 0.0113, pedigree (2,2,3,1,2)
  Calculated with an emission factor (EF=0.012 kg NO-N/kg N ) from total N application less NH3-N lost through volatilization. Conversion from NO-N to NO2 with factor=46/14. See supporting documentation '01 crop production - Quebec.pdf' available on ecoinvent reports web page (https://ecoquery.ecoinvent.org/File/Reports).
  property emission ratio 0.21 kg/kg; name NOx_to_N2O
- Dicamba [air, non-urban air or from high stacks]: 2.3545e-7 kg; lognormal variance with pedigree 0.0813, pedigree (2,2,5,1,2)
  No possible elementary flow. Because of lack of information on the active ingredient, assumed entirely emitted to soil.
- Nickel [soil, agricultural]: -2.3079e-6 kg
  (same comment as for Zinc)
- Dicamba [water, surface water]: 2.1541e-10 kg; lognormal variance with pedigree 0.0813, pedigree (2,2,5,1,2)
  (same comment as for Dicamba)
- Lead [soil, agricultural]: -6.8299e-7 kg
  (same comment as for Zinc)
- Dinitrogen monoxide [air, non-urban air or from high stacks]: 0.00016798 kg; name N2O; source Rochette, P. 2008; lognormal variance with pedigree 0.0333, pedigree (2,2,3,1,2)
  Direct and indirect N2O emissions from all sources of N input (fertilizers, above- and below-ground crop residues). Modelled with Québec conditions using the Tier 2 approach (IPCC 2006; Rochette et al. 2008; Little et al. 2008, 2013). See supporting documentation '01 crop production - Quebec.pdf' available on ecoinvent reports web page (https://ecoquery.ecoinvent.org/File/Reports).
- Dicamba [water, ground-]: 5.3855e-8 kg; lognormal variance with pedigree 0.0813, pedigree (2,2,5,1,2)
  (same comment as for Dicamba)
- Dimethenamid [soil, agricultural]: 1.7141e-6 kg; lognormal variance with pedigree 0.0743, pedigree (2,2,5,1,2)
  (same comment as for Metolachlor)
- Dimethenamid [air, non-urban air or from high stacks]: 1.474e-8 kg; lognormal variance with pedigree 0.0813, pedigree (2,2,5,1,2)
  (same comment as for Metolachlor)
- Dimethenamid [water, surface water]: 6.503e-11 kg; lognormal variance with pedigree 0.0813, pedigree (2,2,5,1,2)
  (same comment as for Metolachlor)
- Dimethenamid [water, ground-]: 5.2024e-9 kg; lognormal variance with pedigree 0.0813, pedigree (2,2,5,1,2)
  (same comment as for Metolachlor)
- Fungicides, unspecified [soil, agricultural]: 1.101e-9 kg; lognormal variance with pedigree 0.0446, pedigree (2,2,5,1,2)
  (same comment as for Metolachlor)
- Herbicides, unspecified [soil, agricultural]: 2.092e-6 kg; lognormal variance with pedigree 0.0446, pedigree (2,2,5,1,2)
  (same comment as for Metolachlor)
- Water [air, non-urban air or from high stacks]: 0.000247494 m3; = ((MANURE_LIQUID_CATTLE* MANURE_LIQUID_CATTLE_WWM) + (MANURE_LIQUID_SWINE* MANURE_LIQUID_SWINE_WWM) + (MANURE_SOLID_CATTLE* MANURE_SOLID_CATTLE_WWM))* fraction_PW_to_air* UnitConversion(1, 'l', 'm3')
  Calculated value; See Parameters. Water emitted from: irrigated water (if any), process water.
- Water [water, ground-]: 0.000123165 m3; = ((MANURE_LIQUID_CATTLE* MANURE_LIQUID_CATTLE_WWM) + (MANURE_LIQUID_SWINE* MANURE_LIQUID_SWINE_WWM) + (MANURE_SOLID_CATTLE* MANURE_SOLID_CATTLE_WWM))* (1-fraction_PW_to_air)*(1- fraction_PWtoW_to_surface_water)* UnitConversion(1, 'l', 'm3')
  (same comment as for Water)
- Water [water, surface water]: 3.07912e-5 m3; = ((MANURE_LIQUID_CATTLE* MANURE_LIQUID_CATTLE_WWM) + (MANURE_LIQUID_SWINE* MANURE_LIQUID_SWINE_WWM) + (MANURE_SOLID_CATTLE* MANURE_SOLID_CATTLE_WWM))* (1-fraction_PW_to_air)*fraction_PWtoW_to_surface_water* UnitConversion(1, 'l', 'm3')
  (same comment as for Water)
- Insecticides, unspecified [soil, agricultural]: 7.9825e-10 kg; lognormal variance with pedigree 0.0446, pedigree (2,2,5,1,2)
  (same comment as for Metolachlor)
- Metolachlor [soil, agricultural]: 1.18e-5 kg; lognormal variance with pedigree 0.0743, pedigree (2,2,5,1,2)
  (same comment as for Metolachlor)

## Sampling procedure
Literature and statistics data, opinions of experts in the field of agricultural production and agroeconomists.

## Extrapolations
This dataset has been extrapolated from year 2012 to the year of the calculation (2019). The uncertainty has been adjusted accordingly.

## Review by Emilia Moreno Ruiz 2015-10-13
activity links to CA-QC machinery added
