# titanium production, primary, triple melt

Dataset: EcoSpold 2, unit process
Geography: GLO
Time period: 2004-01-01 to 2019-12-31
Technology level: current
Classification: ISIC rev.4 ecoinvent: 242:Manufacture of basic precious and other non-ferrous metals
Scenario: Business-as-Usual
System model: Allocation at the point of substitution
Generated by: Marylène Dussault
Published in: Norgate, T. E. 2004
Database: ecoinvent
isCopyrightProtected: true
accessRestrictedTo: 1

## General comment
This dataset represents the production of 1 kg of titanium triple-melt. Primary titanium metal is produced mainly by Kroll process. In this batch process, titanium tetrachloride (TiCl4) is reduced with magnesium under inert atmosphere creating a sponge like titanium metal solid which is refined by vaccum arc remelting. The Kroll process is characterized by multiple steps for which many are energy and labor intensive. Main steps include batch reduction, processing, vaccum distillation and remelting. Main batch reduction takes place in a steel reactor filled with argon where the magnesium is melt at temperature between 850°C-950°C. The titanium chloride (TiCl4) is fed, or blown in as vapor, into the reactor. The reduction is a highly exothermic reaction, thus little energy input is required for it to take place. Reaction is as follow:

TiCl4(l or g) + 2 Mg(l) = Ti(s) + 2 MgCl2(l).

During the processing the reaction by-product, molten magnesium chloride (MgCl2), is remove from the reator periodically during the reaction. The magnesium and clhoride from this by-product are recovered using electrolysis and re-used. Main product from the process is a sponge like titanium (Ti(0)).
Vaccum distillation is then use to purified the crude sponge removing residual metal chlorides and magnesium. This process takes place at temperature between 900°C and 1000°C. The residuals are recovered by condensation.
The purified titanium sponge is refined using vacuum arc remelting. This remelting can be done several times to achieve high purity of titanium metal. Triple-melt titanium is the purest primary titanium and is mainly used to produce parts for the aerospace sector.

## Included activities start
With magnesium in a vaccumed reactor filled with argon gas, maintained between 850-950 °C and in which distilled titanium tetrachloride gradually added over several days.

## Included activities end
With production of triple-melt primary titanium metal. This dataset includes electricity, fuel and main material inputs for production of titanium metal produced through the Kroll process and remelting of titanium sponge by vacuum arc remelting in an electric furnace. This datasets excludes emissions other that fuel combustion and wastes due to lack of data. Missing data include air emission, liquid wastes and solid wastes during reduction of TiCl4 and solid waste and air emissions during remelting and fabrication of ingot using vacuum electric arc furnace. This process is energy intensive and, considering the need for controlling the process, other emissions are assumed to be less significant.

## Time period
Time period chosen based on year of publication of LCI data

## Parameters
- electricity, vacuum arc remelting: 4 kWh; name kWh_VAR; lognormal variance with pedigree 0.0058, pedigree (3,3,3,1,2)
  Literature value. Based on reported electricity requirements for 3 stages vaccum arc remelting of titanium by Norgate (2004).
  2004, Norgate, T. E., Rajakumar, V. ; Trang, S., Titanium and Other Light Metals - Technology Pathways to Sustainable Development, AUSTRALASIAN INST. OF MINING AND METALLU, 2, 105-112
- electricity, Kroll process: 23.84 kWh; name kWh_Kroll; lognormal variance with pedigree 0.0058, pedigree (3,3,3,1,2)
  Literature value. Based on reported electricity requirements for titanium sponge production by Norgate (2004).
  2004, Norgate, T. E., Rajakumar, V. ; Trang, S., Titanium and Other Light Metals - Technology Pathways to Sustainable Development, AUSTRALASIAN INST. OF MINING AND METALLU, 2, 105-112

## Reference product
- titanium primary, triple-melt: 1 kg; name titanium_3mlt; CPC 41601: Tungsten, molybdenum, tantalum, magnesium, cobalt, cadmium, titanium, zirconium, beryllium, gallium, hafnium, […]; By-product classification allocatable product; CAS 7440-32-6
  production volume 3.15e7 kg; name PV_titanium_3mlt
    Literature value. Based on reported world titanium mill consumption in 2005 (Hogan, 2008). Titanium triple-melt production is assumed to be equal to world consumption from the aerospace, sum of mill consumption from other sectors is assumed equivalent to standard titanium production.
  property price 11.3 EUR2005; name titanium_3mlt_price_EUR2005
    Calculated value based on data from United Nations Commodity Trade Statistics Database (comtrade.un.org). UN comtrade category: 810820 Unwrought titanium; powders. Year 2005. Using exchange rate of 1EURO = 1.209 USD. Average of price of import into 5 main markets (EU, US, JP, IN and CN).

## Inputs from technosphere
- heat, district or industrial, natural gas: 9 MJ; lognormal variance with pedigree 0.0438, pedigree (3,3,5,1,2)
  Literature value. Based on reported amount for titanium sponge production by Norgate (2004).
- argon, liquid: 0 kg; pedigree (1,1,1,1,1)
  (same comment as for heat, district or industrial, natural gas)
  properties: wet mass 1 kg, dry mass 1 kg
- magnesium: 0.016 kg; lognormal variance with pedigree 0.0438, pedigree (3,3,5,1,2)
  (same comment as for heat, district or industrial, natural gas)
  properties: dry mass 1 kg, wet mass 1 kg
- electricity, high voltage: 27.84 kWh; = kWh_VAR+ kWh_Kroll; lognormal variance with pedigree 0.04, pedigree (1,1,5,1,1)
  Calculated value.
- titanium tetrachloride: 4 kg; source Norgate, T. E. 2004; lognormal variance with pedigree 0.0438, pedigree (3,3,5,1,2)
  Literature value. Based on reported amount for titanium sponge production by Norgate (2004).
  2004, Norgate, T. E., Rajakumar, V. ; Trang, S., Titanium and Other Light Metals - Technology Pathways to Sustainable Development, AUSTRALASIAN INST. OF MINING AND METALLU, 2, 105-112 ,
- argon, liquid: 0.030972, 0.147028 kg (2 entries); lognormal variance with pedigree 0.0438, pedigree (3,3,5,1,2)
  (same comment as for heat, district or industrial, natural gas)

## Sampling procedure
Literature data based on reseach compilation of studies and modeling.

## Extrapolations
This dataset has been extrapolated from year 2004 to the year of the calculation (2019). The uncertainty has been adjusted accordingly.
