# treatment of waste glass, municipal incineration

Dataset: EcoSpold 2, unit process
Geography: RoW
Time period: 2006-01-01 to 2019-12-31
Technology level: current
Classification: ISIC rev.4 ecoinvent: 3821:Treatment and disposal of non-hazardous waste
Synonyms: Siedlungsabfallverbrennung; Kehrichtverbrennung; municipal waste incineration
Scenario: Business-as-Usual
System model: Allocation at the point of substitution
Share of production covered: 1.8 %
Generated by: Gabor Doka
Published in: Doka G. 2013
Database: ecoinvent
isCopyrightProtected: true
accessRestrictedTo: 1

## General comment
This dataset represents the activity of waste disposal of waste glass in a municipal solid waste incinerator (MSWI) // Recommended use of this dataset: For disposal of glass which goes to incineration as part of a larger item or in small amounts only, as part of communal waste mixture eg. packaging glass. Larger separated amounts of glass fractions will not be disposed in incinerators, but rather go to recycling or landfill. // // Waste composition (wet, in ppm): upper heating value 0.1423 MJ/kg; lower heating value 0.04602 MJ/kg; H2O 20000; O 483070; H n.a.; C n.a.; S n.a.; N n.a.; P n.a.; B n.a.; Cl 195.89; Br n.a.; F n.a.; I n.a.; Ag n.a.; As n.a.; Ba n.a.; Cd n.a.; Co n.a.; Cr 303.63; Cu 7.8356; Hg n.a.; Mn n.a.; Mo n.a.; Ni n.a.; Pb 38.688; Sb n.a.; Se n.a.; Sn n.a.; V n.a.; Zn 3.9178; Be n.a.; Sc n.a.; Sr n.a.; Ti n.a.; Tl n.a.; W n.a.; Si 359090; Fe n.a.; Ca 72818; Al n.a.; K n.a.; Mg n.a.; Na 64472; // Share of carbon in waste that is biogenic 60.4%. // Share of metals in waste not oxidised and bulk-recyclable (exclude very small or thin parts) Iron: 0%; Alu: 0%; Copper: 0%. // One kg of this waste produces 1.152 kg of slag and 0 kg of residues, which are landfilled. // Net energy production: 0MJ/kg electric energy and 0.01MJ/kg thermal energy. // Recovery of metal scrap to recycling: 0g iron scrap, 0g aluminium scrap, 0g copper scrap.

## Included activities start
waste incineration from waste reception gate and delivery into waste bunker at incinerator plant site (without transports to the incinerator)

## Included activities end
Waste-specific short-term emissions to water from leachate. Long-term emissions from landfill to ground water.

## Geography
Specific to the technology mix encountered in Switzerland in 2010. Well applicable to modern incineration practices in Europe, North America or Japan.

## Technology
average Swiss MSWI plants in 2010 (grate incinerators) with electrostatic precipitator for fly ash (ESP), wet flue gas scrubber and 25% SNCR , 42.77% SCR-high dust , 32.68% SCR-low dust -DeNOx facilities and 0% without Denox (weighted according to mass of burnt waste, representing Swiss average). Efficiency of iron scrap separation from slag : 58%. Efficiency of non-ferrous scrap separation from slag : 31%. Gross electric efficiency technology mix 15.84% and Gross thermal efficiency technology mix 28.51%

## Time period
Waste composition as given in literature reference, theoretical data or other source. Transfer coefficients for modern MSWI.

## Reference product
- waste glass: 0 kg; CPC 37111: Glass in the mass, in balls (except microspheres), rods or tubes, unworked; waste and scrap of glass; By-product classification Waste
  Main reference product of this activity (supply of disposal service).
  production volume 0 kg
    based on qualified estimate on MSW in WTE globally and share of glass in MSW in top WTE countries (UNSD 2011)
  property price 0 EUR2005
    Waste products are assigned a price of zero as they are assumed to require further treatment.
  property carbon content 0
    carbon content on a dry matter basis (reserved; not for manual entry)
  properties: water in wet mass 0 kg, water content 0, dry mass 1 kg, carbon content, fossil 0, wet mass 1 kg, carbon content, non-fossil 0, carbon allocation 0 kg
- heat, for reuse in municipal waste incineration only: 1 MJ; CPC 17300: Steam and hot water; By-product classification allocatable product; pedigree (1,1,1,1,1)
  Net electricity generated from this waste and used in internal MSWI plant energy redistribution.
  Uncertainty: uncertainty is calculated from uncertainties in waste composition and uncertainties in energy efficiency and the uncertainty in internal energy demand
  production volume 1.9682e8 MJ

## By-products
- heat, for reuse in municipal waste incineration only: 0 MJ; name E_th_prod_MSWI; CPC 17300: Steam and hot water; By-product classification allocatable product; pedigree (1,1,1,1,1)
  (same comment as for heat, for reuse in municipal waste incineration only)
  production volume 0 MJ
    calculated in proportion to reference product waste input to incinerator
  property price 0.0106 EUR2005; name E_th_prod_MSWI_price_EUR2005
    Average European district heat price from Ecoheatcool and Euroheat 2005-2006, Ecoheat Work package 1: The European heat market. Final report. 10.6 EUR/GJ i s the price of district heat. http://www.solarthermalworld.org/files/Ecoheatcool%20WP1%20Web.pdf?download
## Inputs from technosphere
- waste polyethylene, for recycling, unsorted: -2.60769e-8 kg; source Avadí, A. 2018
  Waste PET from barrels and packaging
  production volume 696857 kg
- sheet rolling, aluminium: 1.41681e-5 kg; source Angel Avadí 2014
  Aluminium cans
- scrap aluminium: -1.2459e-7 kg; source Avadí, A. 2018
  Waste aluminium cans
  production volume 1.89469e6 kg
- sodium chloride, powder: 3.85288e-6 kg; source Angel Avadí 2014; triangular min 3.85288e-6, mostLikely 3.85288e-6, max 3.85288e-6, pedigree (2,3,3,1,1)
  Salt for brine and fish salting
  Uncertainty: Data from 1 plant, assumptions for larger plants
- waste packaging glass, unsorted: -4.21408e-7 kg; source Avadí, A. 2018
  Waste packaging glass
  production volume 4.98603e6 kg
- heat, district or industrial, natural gas: 4.24042e-5 MJ; source Angel Avadí 2014; triangular min 4.24042e-5, mostLikely 4.24042e-5, max 4.24042e-5, pedigree (2,3,3,1,1)
  Industrial heat, for sterilisation
  Uncertainty: Data from 1 plant, assumptions for larger plants
- fish curing plant: 4.8481e-14 unit; source Angel Avadí 2014
  One unit of plant represents the installed capacity required to process 1 t of raw material;activityLink introduced to establish a direct link to the corresponding regional supply of this product
- wastewater from vegetable oil refinery: -1.60023e-8 m3; source Avadí, A. 2018
  Proxy for wastewater from fish processing plant. Asumed 20% of the water is either incorporated into the product or lost
  production volume 189336 m3
- thermoforming of plastic sheets: 5.69704e-8 kg; source Angel Avadí 2014
  Plastic barrels
- aluminium, cast alloy: 4.32439e-7 kg; source Angel Avadí 2014; triangular min 4.32439e-7, mostLikely 4.32439e-7, max 4.32439e-7, pedigree (2,3,3,1,1)
  Aluminium cans
  Uncertainty: Data from 1 plant, assumptions for larger plants
- nitrogen, liquid: 1.03813e-8 kg; source Angel Avadí 2014; triangular min 1.03813e-8, mostLikely 1.03813e-8, max 1.03813e-8, pedigree (2,3,3,1,1)
  Nitrogen for process
  Uncertainty: Data from 1 plant, assumptions for larger plants
- vegetable oil, refined: 1.4649e-6 kg; source Angel Avadí 2014; triangular min 1.4649e-6, mostLikely 1.4649e-6, max 1.4649e-6, pedigree (2,3,3,1,1)
  Oil for canned fish
  Uncertainty: Data from 1 plant, assumptions for larger plants
- polyethylene terephthalate, granulate, amorphous: 5.69704e-8 kg; source Angel Avadí 2014; triangular min 5.69704e-8, mostLikely 5.69704e-8, max 5.69704e-8, pedigree (2,3,3,1,1)
  Plastic barrels
  Uncertainty: Data from 1 plant, assumptions for larger plants
- water, completely softened: 3.33811e-5 kg; source Angel Avadí 2014; triangular min 3.33811e-5, mostLikely 3.33811e-5, max 3.33811e-5, pedigree (2,3,3,1,1)
  Soft water for process
  Uncertainty: Data from 1 plant, assumptions for larger plants
- extrusion, plastic film: 1.84086e-7 kg; source Angel Avadí 2014
  Packaging plastic
- scrap tin sheet: -4.20478e-7 kg; source Avadí, A. 2018
  Waste tinplate cans, area of sheets times weight of a sheet
  production volume 1.08821e7 kg
- polyethylene, high density, granulate: 1.47155e-6 kg; source Angel Avadí 2014; triangular min 1.47155e-6, mostLikely 1.47155e-6, max 1.47155e-6, pedigree (2,3,3,1,1)
  Packaging plastic
  Uncertainty: Data from 1 plant, assumptions for larger plants
- electricity, medium voltage: 5.2065e-7 kWh; source Angel Avadí 2014; triangular min 5.2065e-7, mostLikely 5.2065e-7, max 5.2065e-7, pedigree (2,3,3,1,1)
  Electricity use along the whole process, including processing, maturing and cold storage
  Uncertainty: Data from 1 plant, assumptions for larger plants
- packaging film, low density polyethylene: 1.15231e-7 kg; source Angel Avadí 2014; triangular min 1.15231e-7, mostLikely 1.15231e-7, max 1.15231e-7, pedigree (2,3,3,1,1)
  Plastic bags
  Uncertainty: Data from 1 plant, assumptions for larger plants
- packaging glass, white: 4.21408e-7 kg; source Angel Avadí 2014; triangular min 4.21408e-7, mostLikely 4.21408e-7, max 4.21408e-7, pedigree (2,3,3,1,1)
  Glass containers
  Uncertainty: Data from 1 plant, assumptions for larger plants
- metal working, average for chromium steel product manufacturing: 7.18264e-8 kg; source Angel Avadí 2014
  Tinplate can
- tin plated chromium steel sheet, 2 mm: 5.92485e-8 m2; source Angel Avadí 2014; triangular min 5.92485e-8, mostLikely 5.92485e-8, max 5.92485e-8, pedigree (2,3,3,1,1)
  Tinplate can
  Uncertainty: Data from 1 plant, assumptions for larger plants
- nitrogen, liquid: 3.05298e-9 kg; source Angel Avadí 2014; triangular min 3.05298e-9, mostLikely 3.05298e-9, max 3.05298e-9, pedigree (2,3,3,5,1)
  Nitrogen for process
  Uncertainty: Data from 1 plant, assumptions for larger plants
- scrap tin sheet: -5.12714e-7 kg; source Avadí, A. 2018
  Waste tinplate cans, area of sheets times weight of a sheet
  production volume 9.79387e7 kg
- fish curing plant: 6.10171e-14 unit; source Angel Avadí 2014
  One unit of plant represents the installed capacity required to process 1 t of raw material
- scrap aluminium: -4.94199e-9, -1.10757e-7 kg (2 entries); source Avadí, A. 2018
  Waste aluminium cans
  production volume 1.70522e7 kg
- water, completely softened: 4.66859e-6 kg; source Angel Avadí 2014; triangular min 4.66859e-6, mostLikely 4.66859e-6, max 4.66859e-6, pedigree (2,3,3,5,1)
  Soft water for process
  Uncertainty: Data from 1 plant, assumptions for larger plants
- water, completely softened: 2.48432e-5 kg; source Angel Avadí 2014; triangular min 2.48432e-5, mostLikely 2.48432e-5, max 2.48432e-5, pedigree (2,3,3,5,1)
  Soft water for process
  Uncertainty: Data from 1 plant, assumptions for larger plants
- electricity, medium voltage: 4.11841e-9 kWh; source Angel Avadí 2014; triangular min 4.11841e-9, mostLikely 4.11841e-9, max 4.11841e-9, pedigree (2,3,3,5,1)
  (same comment as for electricity, medium voltage)
- electricity, medium voltage: 2.04113e-9 kWh; source Angel Avadí 2014; triangular min 2.04113e-9, mostLikely 2.04113e-9, max 2.04113e-9, pedigree (2,3,3,5,1)
  (same comment as for electricity, medium voltage)
- electricity, medium voltage: 1.93248e-8 kWh; source Angel Avadí 2014; triangular min 1.93248e-8, mostLikely 1.93248e-8, max 1.93248e-8, pedigree (2,3,3,5,1)
  (same comment as for electricity, medium voltage)
- electricity, medium voltage: 5.08181e-7 kWh; source Angel Avadí 2014; triangular min 5.08181e-7, mostLikely 5.08181e-7, max 5.08181e-7, pedigree (2,3,3,5,1)
  (same comment as for electricity, medium voltage)
- electricity, medium voltage: 2.13744e-9 kWh; source Angel Avadí 2014; triangular min 2.13744e-9, mostLikely 2.13744e-9, max 2.13744e-9, pedigree (2,3,3,5,1)
  (same comment as for electricity, medium voltage)
- electricity, medium voltage: 6.28729e-10 kWh; source Angel Avadí 2014; triangular min 6.28729e-10, mostLikely 6.28729e-10, max 6.28729e-10, pedigree (2,3,3,5,1)
  (same comment as for electricity, medium voltage)
- electricity, medium voltage: 7.78621e-9 kWh; source Angel Avadí 2014; triangular min 7.78621e-9, mostLikely 7.78621e-9, max 7.78621e-9, pedigree (2,3,3,5,1)
  (same comment as for electricity, medium voltage)
- electricity, medium voltage: 9.24675e-8 kWh; source Angel Avadí 2014; triangular min 9.24675e-8, mostLikely 9.24675e-8, max 9.24675e-8, pedigree (2,3,3,5,1)
  (same comment as for electricity, medium voltage)
- electricity, medium voltage: 1.84397e-6 kWh; source Angel Avadí 2014; triangular min 1.84397e-6, mostLikely 1.84397e-6, max 1.84397e-6, pedigree (2,3,3,5,1)
  (same comment as for electricity, medium voltage)
- electricity, medium voltage: 2.88665e-9 kWh; source Angel Avadí 2014; triangular min 2.88665e-9, mostLikely 2.88665e-9, max 2.88665e-9, pedigree (2,3,3,5,1)
  (same comment as for electricity, medium voltage)
- electricity, medium voltage: 1.56811e-6 kWh; source Angel Avadí 2014; triangular min 1.56811e-6, mostLikely 1.56811e-6, max 1.56811e-6, pedigree (2,3,3,5,1)
  (same comment as for electricity, medium voltage)
- electricity, medium voltage: 2.27359e-5 kWh; source Angel Avadí 2014; triangular min 2.27359e-5, mostLikely 2.27359e-5, max 2.27359e-5, pedigree (2,3,3,5,1)
  (same comment as for electricity, medium voltage)
- electricity, medium voltage: 1.83426e-6 kWh; source Angel Avadí 2014; triangular min 1.83426e-6, mostLikely 1.83426e-6, max 1.83426e-6, pedigree (2,3,3,5,1)
  (same comment as for electricity, medium voltage)
- electricity, medium voltage: 1.0657e-5 kWh; source Angel Avadí 2014; triangular min 1.0657e-5, mostLikely 1.0657e-5, max 1.0657e-5, pedigree (2,3,3,5,1)
  (same comment as for electricity, medium voltage)
- heat, district or industrial, natural gas: 7.95967e-7 MJ; source Angel Avadí 2014; triangular min 7.95967e-7, mostLikely 7.95967e-7, max 7.95967e-7, pedigree (2,3,3,5,1)
  (same comment as for heat, district or industrial, natural gas)
- heat, district or industrial, natural gas: 2.45244e-6 MJ; source Angel Avadí 2014; triangular min 2.45244e-6, mostLikely 2.45244e-6, max 2.45244e-6, pedigree (2,3,3,5,1)
  (same comment as for heat, district or industrial, natural gas)
- waste polyethylene, for recycling, unsorted: -7.56219e-11, -2.51274e-8, -7.61688e-9 kg (3 entries); source Avadí, A. 2018
  Waste PET from barrels and packaging
  production volume 6.27171e6 kg
- iron-nickel-chromium alloy: 8.43226e-8 kg; lognormal variance with pedigree 0.0118, pedigree (1,4,4,4,2)
  Used here in place of nickel chromium alloy. In terms of outputs, assumed to have gone to scrap steel. Data are from Ashby 2009.
- glass fibre: 5.46397e-7 kg; lognormal variance with pedigree 0.0118, pedigree (1,4,4,4,2)
  Data are from Ashby 2009.
- copper: 2.61214e-6 kg; lognormal variance with pedigree 0.0118, pedigree (1,4,4,4,2)
  Data are from Ashby 2009.
- steel, low-alloyed: 4.00967e-6 kg; lognormal variance with pedigree 0.0118, pedigree (1,4,4,4,2)
  Data are from Ashby 2009.
- polypropylene, granulate: 4.97783e-8 kg; lognormal variance with pedigree 0.0118, pedigree (1,4,4,4,2)
  Data are from Ashby 2009.
- polyvinylchloride, bulk polymerised: 4.97865e-6 kg; lognormal variance with pedigree 0.0118, pedigree (1,4,4,4,2)
  Data are from Ashby 2009.
- electronic component, passive, unspecified: 2.17242e-7 kg; lognormal variance with pedigree 0.0118, pedigree (1,4,4,4,2)
  Data are from Ashby 2009. In terms of outputs, assumed to have gone to scrap copper.
- electricity, medium voltage: 1.83802e-6 kWh; lognormal variance with pedigree 0.0118, pedigree (1,4,4,4,2)
  Used here in place of generic category name 'energy' in the original literature source. Convertion of MJ into kWh (1 kWh = 3.6 MJ). Data are from Ashby 2009.
- waste polypropylene: -3.90379e-9, -3.00959e-10, -1.24307e-10, -1.18041e-10, -4.50428e-9, -5.02185e-11, -2.2761e-11, -3.15325e-8 kg (8 entries); lognormal variance with pedigree 0.0118, pedigree (1,4,4,4,2)
  Data are from Ashby 2009. The amount is set equal to the input amount for the respective material. In addition, contains waste phenol.
  production volume 3.0304e6 kg
- brass: 8.15022e-10, 1.89538e-9 kg (2 entries); lognormal variance with pedigree 0.0118, pedigree (1,4,4,4,2)
  In terms of outputs, assumed to have gone to scrap copper. Data are from Ashby 2009.
- scrap copper: -1.16855e-6, -5.47878e-8, -1.26956e-7 kg (3 entries); lognormal variance with pedigree 0.0118, pedigree (1,4,4,4,2)
  Data are from Ashby 2009. The amount is set equal to the input amount for the respective material. In addition, contains scrap brass and scrap electronic components.
  production volume 208000 kg
- waste polyvinylchloride: -1.00672e-8, -9.77728e-9, -4.03837e-9, -3.83481e-9, -1.50608e-7, -2.24177e-9, -7.3944e-10, -3.49468e-7 kg (8 entries); lognormal variance with pedigree 0.0118, pedigree (1,4,4,4,2)
  Data are from Ashby 2009. The amount is set equal to the input amount for the respective material.
  production volume 384000 kg
- scrap steel: -8.53164e-5, -3.78519e-10, -0.000143132 kg (3 entries); lognormal variance with pedigree 0.0118, pedigree (1,4,4,4,2)
  Data are from Ashby 2009. The amount is set equal to the input amount for the respective material. In addition, contains scrap nickel chromium alloy. .
  production volume 467200 kg
- waste glass: -1.37985e-5, -1.34657e-6, -1.25633e-7, -2.85733e-7, -1.46352e-5, -1.91402e-7, -3.05492e-8, -0.0001377 kg (8 entries); lognormal variance with pedigree 0.0118, pedigree (1,4,4,4,2)
  (same comment as for waste polyvinylchloride)
  production volume 1.056e6 kg
- phenol: 1.37102e-10, 6.52586e-10 kg (2 entries); lognormal variance with pedigree 0.0118, pedigree (1,4,4,4,2)
  Used here in place of phenolic polymers. In terms of outputs, assumed to have gone to waste polypropylene. Data are from Ashby 2009.
- integrated circuit, logic type: 3.98257e-9 kg
  Value from literature: Ramroth, L. 2008. Comparison of Life-Cycle Analyses of Compact Fluorescent and Incandescent Lamps Based on Rated Life of Compact Fluorescent Lamp. Retrieved from: http://infohouse.p2ric.org/ref/47/46011.pdf, accessed 20180614
- waste electric and electronic equipment: -2.59984e-7 kg
  The amount is set equal to the input amount for the inputs of electronics, i.e. integrated circuit, printed wiring board and electrode.
  production volume 20358 kg
- tin: 1.3505e-8 kg; lognormal variance with pedigree 0.0118, pedigree (1,4,4,4,2)
  (same comment as for integrated circuit, logic type)
- acrylonitrile-butadiene-styrene copolymer: 1.2902e-8 kg
  (same comment as for integrated circuit, logic type)
- cast iron: 9.96966e-5 kg
  (same comment as for integrated circuit, logic type)
- electricity, high voltage: 1.45402e-6 kWh; lognormal variance with pedigree 0.0118, pedigree (1,4,4,4,2)
  (same comment as for integrated circuit, logic type)
- foam glass: 3.67257e-7 kg
  (same comment as for integrated circuit, logic type)
- flat glass factory: 1.95901e-14 unit; lognormal variance with pedigree 0.3112, pedigree (1,4,4,4,2)
  (same comment as for integrated circuit, logic type)
- electrode, negative, Ni: 4.48741e-9 kg
  (same comment as for integrated circuit, logic type)
- printed wiring board, surface mounted, unspecified, Pb containing: 1.12189e-8 kg
  (same comment as for integrated circuit, logic type)
- lead: 2.8751e-8 kg
  (same comment as for integrated circuit, logic type)
- flat glass, uncoated: 2.18468e-6, 0.000403391 kg (2 entries); lognormal variance with pedigree 0.0118, pedigree (1,4,4,4,2)
  (same comment as for integrated circuit, logic type)
- glass wool mat: 2.73734e-8 kg; lognormal variance with pedigree 0.0444, pedigree (2,4,5,4,2)
  Used here in place of mineral wool. In terms of outputs, assumed to have gone to waste mineral wool. Data from Jungbluth 1997.
- zinc: 1.73605e-9 kg; lognormal variance with pedigree 0.0444, pedigree (2,4,5,4,2)
  In terms of outputs, assumed to have gone to scrap copper. Data from Jungbluth 1997.
- waste paint: -6.23953e-8, -1.45063e-10, -3.55101e-8 kg (3 entries); lognormal variance with pedigree 0.0444, pedigree (2,4,5,4,2)
  The amount is set equal to the input amount for the respective material. Data from Jungbluth 1997.
  production volume 2.718e8 kg
- alkyd paint, white, without solvent, in 60% solution state: 9.72874e-8, 1.20196e-7 kg (2 entries); lognormal variance with pedigree 0.0444, pedigree (2,4,5,4,2)
  Data from Jungbluth 1997.
- waste mineral wool: -2.95803e-7, -3.26908e-9, -2.19535e-8 kg (3 entries); lognormal variance with pedigree 0.0444, pedigree (2,4,5,4,2)
  The amount is set equal to the input amount for the respective material. Data from Jungbluth 1997. Contains waste glass wool mat.
  production volume 4.1525e7 kg
- seal, natural rubber based: 6.54927e-9 kg; lognormal variance with pedigree 0.0064, pedigree (2,4,3,4,2)
  Data are from Miljogiraff 2015.
- waste rubber, unspecified: -2.02664e-9, -7.37947e-11, -1.89837e-9 kg (3 entries); lognormal variance with pedigree 0.0064, pedigree (2,4,3,4,2)
  The amount is set equal to the input amount for the respective material. Data are from Miljogiraff 2015. Excludes <1% of mass allocated to undefined electrical equipment.
  production volume 7.1467e6 kg
- waste wood, untreated: -5.49556e-10, -4.69908e-10, -1.31983e-9, -3.15226e-10, -8.83869e-9, -9.11904e-9, -3.43556e-11, -2.02163e-8 kg (8 entries); lognormal variance with pedigree 0.0064, pedigree (2,4,3,4,2)
  Used here in place of waste from medium density fibreboard. The amount is set equal to the input amount for the respective material. Data are from Miljogiraff 2015.
  production volume 100890 kg
- lubricating oil: 1.36558e-8, 2.34699e-7 kg (2 entries); lognormal variance with pedigree 0.0064, pedigree (2,4,3,4,2)
  Used here in place of hydraulic oil. Data are from Miljogiraff 2015.
- waste mineral oil: -5.41494e-8, -4.93246e-11, -1.6231e-7 kg (3 entries); lognormal variance with pedigree 0.0064, pedigree (2,4,3,4,2)
  Used here in place of wasted hydraulic oil. The amount is set equal to the input amount for the respective material. Data are from Miljogiraff 2015.
  production volume 1.05996e8 kg
- steel, low-alloyed, hot rolled: 0.00022719 kg; lognormal variance with pedigree 0.0035, pedigree (1,4,2,3,2)
  Data are from Gallego-Schmid et al. 2018.
- tap water: 5.60008e-7 kg; lognormal variance with pedigree 0.0035, pedigree (1,4,2,3,2)
  Data are from Gallego-Schmid et al. 2018.
- heat, central or small-scale, other than natural gas: 1.32314e-6 MJ; lognormal variance with pedigree 0.0035, pedigree (1,4,2,3,2)
  Data are from Gallego-Schmid et al. 2018.
- polyvinylchloride, suspension polymerised: 8.19525e-8 kg; lognormal variance with pedigree 0.0035, pedigree (1,4,2,3,2)
  Data are from Gallego-Schmid et al. 2018.
- polyethylene, low density, granulate: 1.69135e-8 kg; lognormal variance with pedigree 0.0035, pedigree (1,4,2,3,2)
  Used here in place of polyethylene terephthalate. Data are from Gallego-Schmid et al. 2018.
- nickel, 99.5%: 3.5893e-9 kg; lognormal variance with pedigree 0.0035, pedigree (1,4,2,3,2)
  Data are from Gallego-Schmid et al. 2018.
- ferrite: 5.86203e-9 kg; lognormal variance with pedigree 0.0035, pedigree (1,4,2,3,2)
  Data are from Gallego-Schmid et al. 2018.
- polystyrene, general purpose: 7.93705e-8 kg; lognormal variance with pedigree 0.0035, pedigree (1,4,2,3,2)
  Data are from Gallego-Schmid et al. 2018.
- ceramic tile: 3.10743e-7 kg; lognormal variance with pedigree 0.0035, pedigree (1,4,2,3,2)
  Data are from Gallego-Schmid et al. 2018.
- flat glass, coated: 8.90099e-5, 0.000491361 kg (2 entries); lognormal variance with pedigree 0.0035, pedigree (1,4,2,3,2)
  Data are from Gallego-Schmid et al. 2018.
- nylon 6: 2.1052e-8, 3.89583e-9 kg (2 entries); lognormal variance with pedigree 0.0035, pedigree (1,4,2,3,2)
  Data are from Gallego-Schmid et al. 2018. In terms of outputs assumed to have gone to waste PE.
- wastewater, average: -2.72012e-9, -8.34708e-11, -6.65518e-9 m3 (3 entries); lognormal variance with pedigree 0.0035, pedigree (1,4,2,3,2)
  Converted from liters. Data are from Gallego-Schmid et al. 2018.The amount is set equal to the input amount for the respective material.
  production volume 808000 m3
- inert waste: -3.17452e-10, -2.73411e-12, -3.83039e-8 kg (3 entries); lognormal variance with pedigree 0.0035, pedigree (1,4,2,3,2)
  Represents here waste ceramic tile. Data are from Gallego-Schmid et al. 2018.
  production volume 2.68e6 kg
- waste polyethylene: -2.78317e-9, -2.73712e-10, -1.13053e-10, -9.22796e-11, -4.09649e-9, -4.5672e-11, -2.07004e-11, -3.23307e-8 kg (8 entries); lognormal variance with pedigree 0.0035, pedigree (1,4,2,3,2)
  Used here in place of waste from polyethylene terephthalate and nylon. Data are from Gallego-Schmid et al. 2018.
  production volume 8.76e6 kg
- waste polystyrene: -8.12699e-9, -7.87163e-10, -3.25127e-10, -3.08691e-10, -1.1781e-8, -1.31347e-10, -5.95319e-11, -8.24737e-8 kg (8 entries); lognormal variance with pedigree 0.0035, pedigree (1,4,2,3,2)
  Includes scrap ABS and scrap polystyrene (general purpose) Data are from Gallego-Schmid et al. 2018.The amount is set equal to the input amount for the respective material.
  production volume 1.06e7 kg
- synthetic rubber: 2.80285e-7 kg; lognormal variance with pedigree 0.003425, pedigree (1,4,2,2,2)
  Data from Yuan et al. 2016.
- concrete block: 1.12105e-7, 2.47505e-7, 4.4095e-7 kg (3 entries); lognormal variance with pedigree 0.003425, pedigree (1,4,2,2,2)
  Data from Yuan et al. 2016. In terms of outputs assumed to have gone to inert waste.
- epoxy resin, liquid: 1.80533e-9, 2.65859e-8 kg (2 entries); lognormal variance with pedigree 0.003425, pedigree (1,4,2,2,2)
  Data from Yuan et al. 2016. In terms of outputs assumed to have gone to waste PVC.
- waste plastic, mixture: -1.00122e-8, -6.6661e-9, -2.75334e-9, -2.61455e-9, -9.97678e-8, -1.11232e-9, -5.04146e-10, -5.72414e-7 kg (8 entries); lognormal variance with pedigree 0.003425, pedigree (1,4,2,2,2)
  Data from Yuan et al. 2016. Represents here waste ABS.
  production volume 1.35724e9 kg
- compressed air, 1000 kPa gauge: 1.95086e-10, 4.7942e-10 m3 (2 entries); lognormal variance with pedigree 0.003425, pedigree (1,4,2,2,2)
  Data from Yuan et al. 2016.
- waste bitumen sheet: -2.14302e-9 kg; lognormal variance with pedigree 0.0726, pedigree (2,4,5,5,3)
  EcoSpold01Location=CH
  production volume 0.000127243 kg
- lime: 7.73158e-8 kg; lognormal variance with pedigree 0.052, pedigree (1,1,5,5,1)
  EcoSpold01Location=CH
  composite
- pitch: 2.25234e-7 kg; lognormal variance with pedigree 0.0546, pedigree (2,4,5,5,1)
  EcoSpold01Location=RER
- sand: 6.33531e-9, 1.54522e-9, 2.97641e-7 kg (3 entries); lognormal variance with pedigree 0.0546, pedigree (2,4,5,5,1)
  EcoSpold01Location=CH
- electricity, medium voltage: 3.74005e-7, 2.9455e-10, 3.73118e-9 kWh (3 entries); lognormal variance with pedigree 0.0532, pedigree (2,3,5,5,1)
  EcoSpold01Location=UCTE
- wire drawing, copper: 1.72574e-7 kg; source Volvo Truck Corporation 2004; lognormal variance with pedigree 0.16, pedigree (1,1,5,1,1)
  Estimated value. Based on the material composition of a Volvo FH as available from product declaration.
  EcoSpold01Location=RER
- wastewater from lorry production: -1.37202e-10 m3; source MAN Nutzfahrzeuge AG 2000; lognormal variance with pedigree 0.05, pedigree (1,1,5,1,1)
  Literature value. Data represent MAN production sites in Germany and comprises: final truck assembly, engine manufacturing, manufacturing of metal parts. Data available from environmental reports of the company.
  Additional references:
  MAN Nutzfahrzeuge AG (2002) Umwelterklärung 2002. MAN Nutzfahrzeuge AG, München
  EcoSpold01Location=CH
  production volume 2.18 m3
- tap water: 1.03612e-6 kg; source MAN Nutzfahrzeuge AG 2002; lognormal variance with pedigree 0.05, pedigree (1,1,5,1,1)
  EcoSpold01Location=RER
  Calculated value. About 95% of the consumed tap water and groundwater are used in the final assembly of vehicles (own calculations based on MAN Nutzfahrzeuge AG (2002)).
- sheet rolling, steel: 3.11155e-7 kg; source Volvo Truck Corporation 2004; lognormal variance with pedigree 0.05, pedigree (1,1,5,1,1)
  (same comment as for wire drawing, copper)
- pig iron: 1.3589e-7 kg; source Volvo Truck Corporation 2004; lognormal variance with pedigree 0.08, pedigree (1,1,5,1,1)
  EcoSpold01Location=GLO
  Estimated value. Based on the material composition of a Volvo FH as available from product declaration.
- steel, chromium steel 18/8, hot rolled: 3.69526e-6 kg; source Volvo Truck Corporation 2004; lognormal variance with pedigree 0.16, pedigree (1,1,5,1,1)
  (same comment as for wire drawing, copper)
- propylene glycol, liquid: 6.3394e-9 kg; source Volvo Truck Corporation 2004; lognormal variance with pedigree 0.05, pedigree (1,1,5,1,1)
  (same comment as for wire drawing, copper)
- tempering, flat glass: 1.484e-8 kg; source Volvo Truck Corporation 2004; lognormal variance with pedigree 0.08, pedigree (1,1,5,1,1)
  EcoSpold01Location=RER
  Estimated value. Based on the material composition of a Volvo FH as available from product declaration.
- hydrochloric acid, without water, in 30% solution state: 1.93078e-7 kg; source MAN Nutzfahrzeuge AG 2000; lognormal variance with pedigree 0.05, pedigree (1,1,5,1,1)
  Literature value. Data represent MAN production sites in Germany and comprises: final truck assembly, engine manufacturing, manufacturing of metal parts. Data available from environmental reports of the company.
  Additional references:
  MAN Nutzfahrzeuge AG (2002) Umwelterklärung 2002. MAN Nutzfahrzeuge AG, München]
  EcoSpold01Location=RER
- heat, district or industrial, other than natural gas: 7.45268e-6 MJ; source MAN Nutzfahrzeuge AG 2000; lognormal variance with pedigree 0.05, pedigree (1,1,5,1,1)
  Literature value. Energy expenditures for stationary combustion processes are available from environmental reports of a German lorry manufacturer MAN Nutzfahrzeuge AG (2000)andMAN Nutzfahrzeuge AG (2000). The data is available for various manufacturing sites performing different tasks in the manufacturing chain. The total value used in this study comprises stamping processes, metal part and wiring harness manufacturing, engine production and testing as well as the final assembly.
  Additional references:
  MAN Nutzfahrzeuge AG (2002) Umwelterklärung 2002. MAN Nutzfahrzeuge AG, München.
  EcoSpold01Location=RER
- sulfuric acid: 1.18449e-8 kg; source Volvo Truck Corporation 2004; lognormal variance with pedigree 0.05, pedigree (1,1,5,1,1)
  (same comment as for wire drawing, copper)
- lime, hydrated, packed: 7.20976e-10, 8.38265e-8 kg (2 entries); source MAN Nutzfahrzeuge AG 2000; lognormal variance with pedigree 0.2106, pedigree (5,5,5,5,5)
  EcoSpold01Location=CH
  Literature value. Data represent MAN production sites in Germany and comprises: final truck assembly, engine manufacturing, manufacturing of metal parts. Data available from environmental reports of the company. For Ca(OH)2, 50% H2O is assumed.
  Additional references:
  MAN Nutzfahrzeuge AG (2002) Umwelterklärung 2002. MAN Nutzfahrzeuge AG, München
  Uncertainty: 2, 50% H2O is assumed.
- diesel, burned in building machine: 4.44772e-6 MJ; source MAN Nutzfahrzeuge AG 2000; lognormal variance with pedigree 0.34, pedigree (1,1,5,1,1)
  Literature value. Diesel is used for engine testing and the operation of fork-lifters. The latter is modeled as building machine. Energy expenditures for stationary combustion processes are available from environmental reports of a German lorry manufacturer MAN Nutzfahrzeuge AG (2000) and MAN Nutzfahrzeuge AG (2002). The data is available for various manufacturing sites performing different tasks in the manufacturing chain. The total value used in this study comprises stamping processes, metal part and wiring harness manufacturing, engine production and testing as well as the final assembly.
  Additional references:
  MAN Nutzfahrzeuge AG (2002) Umwelterklärung 2002. MAN Nutzfahrzeuge AG, München.
  EcoSpold01Location=GLO
- reinforcing steel: 0.000354318 kg; source Volvo Truck Corporation 2004; lognormal variance with pedigree 0.05, pedigree (1,1,5,1,1)
  (same comment as for wire drawing, copper)
- used bus: -8.42958e-12 unit; lognormal variance with pedigree 0.342, pedigree (3,1,5,1,1)
  Uncertainty: own calculations
  production volume 1.32237 unit
- section bar rolling, steel: 1.5268e-6 kg; source Volvo Truck Corporation 2004; lognormal variance with pedigree 0.08, pedigree (1,1,5,1,1)
  (same comment as for wire drawing, copper)
- diesel: 5.12304e-9 kg; source MAN Nutzfahrzeuge AG 2000; lognormal variance with pedigree 0.34, pedigree (1,1,5,1,1)
  EcoSpold01Location=RER
  Literature value. Diesel is used for engine testing and the operation of fork-lifters. The latter is modeled as building machine. Energy expenditures for stationary combustion processes are available from environmental reports of a German lorry manufacturer MAN Nutzfahrzeuge AG (2000) and MAN Nutzfahrzeuge AG (2002). The data is available for various manufacturing sites performing different tasks in the manufacturing chain. The total value used in this study comprises stamping processes, metal part and wiring harness manufacturing, engine production and testing as well as the final assembly.
  Additional references:
  MAN Nutzfahrzeuge AG (2002) Umwelterklärung 2002. MAN Nutzfahrzeuge AG, München.
- sodium hydroxide, without water, in 50% solution state: 4.02461e-7 kg; source MAN Nutzfahrzeuge AG 2000; lognormal variance with pedigree 0.05, pedigree (1,1,5,1,1)
  EcoSpold01Location=RER
  Literature value. Data represent MAN production sites in Germany and comprises: final truck assembly, engine manufacturing, manufacturing of metal parts. Data available from environmental reports of the company.
  Additional references:
  MAN Nutzfahrzeuge AG (2002) Umwelterklärung 2002. MAN Nutzfahrzeuge AG, München
- stone wool, packed: 4.95439e-8 kg; source Volvo Truck Corporation 2004; lognormal variance with pedigree 0.05, pedigree (1,1,5,1,1)
  EcoSpold01Location=CH
  Estimated value. Based on the material composition of a Volvo FH as available from product declaration.
- pitch: 8.11956e-9, 4.1047e-12 kg (2 entries); source Volvo Truck Corporation 2004; lognormal variance with pedigree 0.05, pedigree (1,1,5,1,1)
  Estimated value. Based on the material composition of a Volovo FH as available from product declaration.
  EcoSpold01Location=RER
- section bar rolling, steel: 1.38111e-6 kg; source Volvo Truck Corporation 2004; lognormal variance with pedigree 0.082, pedigree (1,1,5,5,1)
  (same comment as for wire drawing, copper)
- tempering, flat glass: 2.42718e-7 kg; source Volvo Truck Corporation 2004; lognormal variance with pedigree 0.082, pedigree (1,1,5,5,1)
  (same comment as for tempering, flat glass)
- hydrochloric acid, without water, in 30% solution state: 2.41628e-7 kg; source MAN Nutzfahrzeuge AG 2000; lognormal variance with pedigree 0.052, pedigree (1,1,5,5,1)
  (same comment as for hydrochloric acid, without water, in 30% solution state)
- sheet rolling, steel: 7.18099e-5 kg; source Volvo Truck Corporation 2004; lognormal variance with pedigree 0.052, pedigree (1,1,5,5,1)
  (same comment as for tempering, flat glass)
- propylene glycol, liquid: 6.74629e-9 kg; source Volvo Truck Corporation 2004; lognormal variance with pedigree 0.052, pedigree (1,1,5,5,1)
  (same comment as for tempering, flat glass)
- sulfuric acid: 6.33181e-8 kg; source Volvo Truck Corporation 2004; lognormal variance with pedigree 0.052, pedigree (1,1,5,5,1)
  (same comment as for tempering, flat glass)
- wire drawing, copper: 1.36064e-6 kg; source Volvo Truck Corporation 2004; lognormal variance with pedigree 0.162, pedigree (1,1,5,5,1)
  (same comment as for tempering, flat glass)
- pitch: 7.95486e-9, 4.53362e-10, 2.05191e-8, 9.19749e-10, 1.31303e-9 kg (5 entries); source Volvo Truck Corporation 2004; lognormal variance with pedigree 0.052, pedigree (1,1,5,5,1)
  (same comment as for pitch)
- diesel: 2.19633e-10, 1.05587e-11, 4.4327e-10, 3.10493e-11, 4.48781e-11, 4.37707e-9 kg (6 entries); source MAN Nutzfahrzeuge AG 2000; lognormal variance with pedigree 0.342, pedigree (1,1,5,5,1)
  Literature value. Diesel is used for engine testing and the operation of fork-lifters. The latter is modeled as building machine. Energy expenditures for stationary combustion processes are available from environmental reports of a German lorry manufacturer MAN Nutzfahrzeuge AG (2000) and MAN Nutzfahrzeuge AG (2002). The data is available for various manufacturing sites performing different tasks in the manufacturing chain. The total value used in this study comprises stamping processes, metal part and wiring harness manufacturing, engine production and testing as well as the final assembly.
  Additional references:
  MAN Nutzfahrzeuge AG (2002) Umwelterklärung 2002. MAN Nutzfahrzeuge AG, München.
  EcoSpold01Location=RER
- tap water: 1.85827e-7, 3.16948e-6, 3.0711e-7, 7.74411e-6, 3.72005e-7, 5.72317e-7, 8.86198e-5 kg (7 entries); source MAN Nutzfahrzeuge AG 2002; lognormal variance with pedigree 0.052, pedigree (1,1,5,5,1)
  (same comment as for tap water)
- heat, district or industrial, other than natural gas: 2.24111e-8, 4.99907e-5 MJ (2 entries); source MAN Nutzfahrzeuge AG 2000; lognormal variance with pedigree 0.052, pedigree (1,1,5,5,1)
  EcoSpold01Location=RER
  Literature value. Energy expenditures for stationary combustion processes are available from environmental reports of a German lorry manufacturer MAN Nutzfahrzeuge AG (2000)andMAN Nutzfahrzeuge AG (2000). The data is available for various manufacturing sites performing different tasks in the manufacturing chain. The total value used in this study comprises stamping processes, metal part and wiring harness manufacturing, engine production and testing as well as the final assembly.
  Additional references:
  MAN Nutzfahrzeuge AG (2002) Umwelterklärung 2002. MAN Nutzfahrzeuge AG, München.
- electricity, medium voltage: 3.20973e-6 kWh; source MAN Nutzfahrzeuge AG 2000; lognormal variance with pedigree 0.052, pedigree (1,1,5,5,1)
  Literature value. Energy expenditures for stationary combustion processes are available from environmental reports of a German lorry manufacturer MAN Nutzfahrzeuge AG (2000)andMAN Nutzfahrzeuge AG (2000). The data is available for various manufacturing sites performing different tasks in the manufacturing chain. The total value used in this study comprises stamping processes, metal part and wiring harness manufacturing, engine production and testing as well as the final assembly.
  Additional references:
  MAN Nutzfahrzeuge AG (2002) Umwelterklärung 2002. MAN Nutzfahrzeuge AG, München.
  EcoSpold01Location=UCTE
- aluminium, wrought alloy: 1.51766e-5 kg; lognormal variance with pedigree 0.05, pedigree (1,1,5,1,1)
  composite
  EcoSpold01Location=RER
- polyvinylchloride, emulsion polymerised: 4.77013e-9 kg; lognormal variance with pedigree 0.0521, pedigree (1,4,5,3,1)
  EcoSpold01Location=RER
- polyurethane, rigid foam: 6.77805e-7 kg; lognormal variance with pedigree 0.05, pedigree (1,1,5,1,1)
  EcoSpold01Location=RER
  composite
- glass fibre reinforced plastic, polyamide, injection moulded: 2.62197e-7 kg; lognormal variance with pedigree 0.05, pedigree (1,1,5,1,1)
  composite
  EcoSpold01Location=RER
- extrusion, plastic film: 2.27141e-7 kg; lognormal variance with pedigree 0.0521, pedigree (1,4,5,3,1)
  activityLink introduced to establish a direct link to the corresponding regional supply of this product
  EcoSpold01Location=RER
- glazing, triple, U<0.5 W/m2K: 3.07169e-8 m2; lognormal variance with pedigree 0.0521, pedigree (1,4,5,3,1)
  EcoSpold01Location=RER
- powder coat, steel: 2.39706e-8 m2; lognormal variance with pedigree 0.0521, pedigree (1,4,5,3,1)
  (same comment as for extrusion, plastic film)
- stone wool: 4.45937e-5 kg; lognormal variance with pedigree 0.0521, pedigree (1,4,5,3,1)
  EcoSpold01Location=CH
- used triple glazing, U<0.5W/m2K: -6.02729e-10 m2; lognormal variance with pedigree 0.0521, pedigree (1,4,5,3,1)
  EcoSpold01Location=CH
  production volume 0.0135 m2
- section bar extrusion, aluminium: 1.04296e-6 kg; lognormal variance with pedigree 0.05, pedigree (1,1,5,1,1)
  EcoSpold01Location=RER
  composite
- plywood, for indoor use: 3.67946e-11 m3; lognormal variance with pedigree 0.0521, pedigree (1,4,5,3,1)
  EcoSpold01Location=RER
- polystyrene, extruded: 9.01861e-10 kg; lognormal variance with pedigree 0.0521, pedigree (1,4,5,3,1)
  EcoSpold01Location=RER
- adhesive, for metal: 5.35687e-10 kg; lognormal variance with pedigree 0.0521, pedigree (1,4,5,3,1)
  EcoSpold01Location=DE
- powder coat, aluminium sheet: 2.18603e-8 m2; lognormal variance with pedigree 0.05, pedigree (1,1,5,1,1)
  composite
  EcoSpold01Location=RER
- zinc coat, coils: 8.05405e-8 m2; lognormal variance with pedigree 0.0521, pedigree (1,4,5,3,1)
  EcoSpold01Location=RER
  activityLink introduced to establish a direct link to the corresponding regional supply of this product
- waste mineral wool, for final disposal: -8.85008e-6, -5.22863e-9 kg (2 entries); lognormal variance with pedigree 0.0521, pedigree (1,4,5,3,1)
  EcoSpold01Location=CH
  production volume 0.0234 kg
- powder coat, aluminium sheet: 1.42141e-8 m2; lognormal variance with pedigree 0.052, pedigree (1,1,5,5,1)
  EcoSpold01Location=RER
  composite
- polyurethane, rigid foam: 5.06453e-8 kg; lognormal variance with pedigree 0.052, pedigree (1,1,5,5,1)
  composite
  EcoSpold01Location=RER
- plywood, for indoor use: 2.73469e-11 m3; lognormal variance with pedigree 0.054, pedigree (1,4,5,5,1)
  EcoSpold01Location=RER
- section bar extrusion, aluminium: 8.33542e-7 kg; lognormal variance with pedigree 0.052, pedigree (1,1,5,5,1)
  EcoSpold01Location=RER
  composite
- powder coat, steel: 1.55863e-8 m2; lognormal variance with pedigree 0.054, pedigree (1,4,5,5,1)
  EcoSpold01Location=RER
- waste mineral wool, for final disposal: -1.0432e-5 kg; lognormal variance with pedigree 0.054, pedigree (1,4,5,5,1)
  EcoSpold01Location=CH
  production volume 0.0702 kg
- zinc coat, coils: 6.50058e-8 m2; lognormal variance with pedigree 0.054, pedigree (1,4,5,5,1)
  EcoSpold01Location=RER
- heat, district or industrial, natural gas: 3.11264e-5 MJ; lognormal variance with pedigree 0.1308, pedigree (2,2,5,3,4)
  EcoSpold01Location=RER
  Questionnaire, data for other type of collector
  Uncertainty: Questionnaire, data for other type of collector
- sheet rolling, copper: 2.28081e-8 kg; lognormal variance with pedigree 0.0586, pedigree (2,5,5,1,1)
  Questionnaire
  EcoSpold01Location=RER
  Uncertainty: Questionnaire
- electricity, medium voltage: 6.27819e-7 kWh; lognormal variance with pedigree 0.1308, pedigree (2,2,5,3,4)
  Questionnaire, data for other type of collector plus data for flat plate collector production
  EcoSpold01Location=GB
  Uncertainty: Questionnaire, data for other type of collector plus data for flat plate collector production
- selective coat, copper sheet, physical vapour deposition: 1.68725e-8 m2; lognormal variance with pedigree 0.0586, pedigree (2,5,5,1,1)
  EcoSpold01Location=DE
  Questionnaire
  Uncertainty: Questionnaire
- wastewater, from residence: -3.60042e-10 m3; lognormal variance with pedigree 0.1308, pedigree (2,2,5,3,4)
  Questionnaire, data for other type of collector
  EcoSpold01Location=CH
  Uncertainty: Questionnaire, data for other type of collector
  production volume 0.0442 m3
- corrugated board box: 2.71253e-8 kg; lognormal variance with pedigree 0.054, pedigree (3,4,5,1,1)
  EcoSpold01Location=RER
  Company information, packaging
  Uncertainty: Company information, packaging
- municipal solid waste: -8.06572e-10 kg; lognormal variance with pedigree 0.1308, pedigree (2,2,5,3,4)
  (same comment as for wastewater, from residence)
  production volume 0.0284 kg
- tap water: 7.79862e-5 kg; lognormal variance with pedigree 0.1308, pedigree (2,2,5,3,4)
  EcoSpold01Location=RER
  Questionnaire, data for other type of collector plus data for flat plate collector production
  Uncertainty: Questionnaire, data for other type of collector plus data for flat plate collector production
- anti-reflex-coating, etching, solar glass: 1.68725e-8 m2; lognormal variance with pedigree 0.0586, pedigree (2,5,5,1,1)
  Questionnaire
  EcoSpold01Location=DK
  Uncertainty: Questionnaire
- glass tube, borosilicate: 5.70518e-5 kg; lognormal variance with pedigree 0.0586, pedigree (2,5,5,1,1)
  EcoSpold01Location=DE
  Questionnaire plus 5% losses
  Uncertainty: Questionnaire plus 5% losses
- silicone product: 1.48362e-8 kg; lognormal variance with pedigree 0.0586, pedigree (2,5,5,1,1)
  Questionnaire
  EcoSpold01Location=RER
  Uncertainty: Questionnaire
- waste glass sheet: -1.15712e-7 kg; lognormal variance with pedigree 0.06, pedigree (3,5,5,1,1)
  Estimation
  EcoSpold01Location=CH
  Uncertainty: Estimation
  production volume 14.2 kg
- waste paperboard, unsorted: -5.61855e-8 kg; lognormal variance with pedigree 0.06, pedigree (3,5,5,1,1)
  Estimation
  EcoSpold01Location=CH
  Uncertainty: Estimation
  production volume 3.33 kg
- hazardous waste, for incineration: -1.42495e-5 kg; lognormal variance with pedigree 0.1308, pedigree (2,2,5,3,4)
  (same comment as for wastewater, from residence)
  production volume 0.227 kg
- waste plastic, mixture: -8.36491e-9 kg; lognormal variance with pedigree 0.06, pedigree (3,5,5,1,1)
  EcoSpold01Location=CH
  Estimation
  Uncertainty: Estimation
  production volume 0.72 kg
- brazing solder, cadmium free: 1.68725e-9 kg; lognormal variance with pedigree 0.0586, pedigree (2,5,5,1,1)
  EcoSpold01Location=RER
  Questionnaire
  Uncertainty: Questionnaire
- chemical, organic: 4.47599e-8 kg; lognormal variance with pedigree 0.1308, pedigree (2,2,5,3,4)
  EcoSpold01Location=GLO
  Questionnaire, data for other type of collector
  Uncertainty: Questionnaire, data for other type of collector
- waste glass: -1.95891e-7 kg; lognormal variance with pedigree 0.1308, pedigree (2,2,5,3,4)
  EcoSpold01Location=CH
  Questionnaire, data for other type of collector
  Uncertainty: Questionnaire, data for other type of collector
  production volume 0.68 kg
- electricity, medium voltage: 2.7546e-5 kWh; lognormal variance with pedigree 0.0508, pedigree (2,2,5,3,1)
  Questionnaire
  EcoSpold01Location=DE
  Uncertainty: Questionnaire
- aluminium oxide, non-metallurgical: 1.92327e-8 kg; lognormal variance with pedigree 0.0522, pedigree (3,2,5,3,1)
  EcoSpold01Location=RER
  Estimation for 5% feldspar
  Uncertainty: Estimation for 5% feldspar
- waste glass: -1.52719e-6 kg; lognormal variance with pedigree 0.0508, pedigree (2,2,5,3,1)
  Glass used as sealing material
  EcoSpold01Location=CH
  Uncertainty: Glass used as sealing material
  production volume 0.000957 kg
- silica sand: 1.77662e-5 kg; lognormal variance with pedigree 0.0508, pedigree (2,2,5,3,1)
  EcoSpold01Location=DE
  Questionnaire
  Uncertainty: Questionnaire
- soda ash, light, crystalline, heptahydrate: 1.53732e-7 kg; lognormal variance with pedigree 0.0508, pedigree (2,2,5,3,1)
  EcoSpold01Location=RER
  Reduction for feldspar + boron plus production wastes
  Uncertainty: Reduction for feldspar + boron plus production wastes
- heat, district or industrial, other than natural gas: 2.9131e-6 MJ; lognormal variance with pedigree 0.0508, pedigree (2,2,5,3,1)
  EcoSpold01Location=RER
  Questionnaire
  Uncertainty: Questionnaire
- boric acid, anhydrous, powder: 9.7299e-8 kg; lognormal variance with pedigree 0.0522, pedigree (3,2,5,3,1)
  EcoSpold01Location=RER
  Estimation for 10% boron trioxide
  Uncertainty: Estimation for 10% boron trioxide
- wastewater from glass production: -3.21611e-9 m3; lognormal variance with pedigree 0.0508, pedigree (2,2,5,3,1)
  Questionnaire
  EcoSpold01Location=CH
  Uncertainty: Questionnaire
  production volume 0.000543 m3
- municipal solid waste: -4.89704e-8 kg; lognormal variance with pedigree 0.0508, pedigree (2,2,5,3,1)
  Questionnaire, unspecific wastes
  EcoSpold01Location=CH
  Uncertainty: Questionnaire, unspecific wastes
  production volume 0.00243 kg
- chromium: 3.85504e-9 kg; lognormal variance with pedigree 0.0512, pedigree (2,3,5,1,1)
  EcoSpold01Location=RER
  Uncertainty: LCI of one passenger car
- ethylene, average: 2.57429e-9 kg; lognormal variance with pedigree 0.0532, pedigree (2,4,5,1,2)
  EcoSpold01Location=RER
  Uncertainty: LCI of one passenger car
- used light commercial vehicle: -2.78302e-10 unit; lognormal variance with pedigree 0.342025, pedigree (3,1,5,2,1)
  Uncertainty: own calculations
  production volume 1.32237 unit
- ethylene glycol: 1.3376e-9 kg; lognormal variance with pedigree 0.0532, pedigree (2,4,5,1,2)
  EcoSpold01Location=RER
  Uncertainty: LCI of one passenger car
- ethylene, average: 4.06517e-11, 2.53364e-9 kg (2 entries); lognormal variance with pedigree 0.0552, pedigree (2,4,5,5,2)
  EcoSpold01Location=RER
  Uncertainty: LCI of one passenger car
- heat, district or industrial, natural gas: 4.48683e-7 MJ; source Socolof M. L. 2001; lognormal variance with pedigree 0.0407, pedigree (1,3,5,3,1)
  Estimation, based on literature. A 50:50 split between module assembly and monitor assembly is used.
  EcoSpold01Location=RER
  Uncertainty: data from an US-EPA LCA study
- wastewater from liquid crystal display production: -3.09406e-9 m3; source Socolof M. L. 2001; lognormal variance with pedigree 0.0407, pedigree (1,3,5,3,1)
  EcoSpold01Location=CH
  Estimation, based on literature. A 50:50 split between module assembly and monitor assembly is used.
  Uncertainty: data from an US-EPA LCA study
  production volume 0.3737 m3
- krypton, gaseous: 1.10256e-6 kg; source Socolof M. L. 2001; lognormal variance with pedigree 0.0407, pedigree (1,3,5,3,1)
  EcoSpold01Location=CH
  Literature Value.
  Uncertainty: data from an US-EPA LCA study
- isopropanol: 1.30932e-10, 6.21552e-10 kg (2 entries); source Socolof M. L. 2001; lognormal variance with pedigree 0.0407, pedigree (1,3,5,3,1)
  Literature Value.
  EcoSpold01Location=RER
  Uncertainty: data from an US-EPA LCA study
- ammonia, liquid: 1.41176e-7, 1.43594e-7 kg (2 entries); source Socolof M. L. 2001; lognormal variance with pedigree 0.0407, pedigree (1,3,5,3,1)
  Literature Value.
  EcoSpold01Location=RER
  Uncertainty: data from an US-EPA LCA study
- chlorine, liquid: 3.90358e-10, 1.95143e-9 kg (2 entries); source Socolof M. L. 2001; lognormal variance with pedigree 0.0407, pedigree (1,3,5,3,1)
  EcoSpold01Location=RER
  Literature Value.
  Uncertainty: data from an US-EPA LCA study
- oxygen, liquid: 3.70829e-12, 7.53294e-8 kg (2 entries); source Socolof M. L. 2001; lognormal variance with pedigree 0.0407, pedigree (1,3,5,3,1)
  EcoSpold01Location=RER
  Literature Value.
  Uncertainty: data from an US-EPA LCA study
- hydrogen, liquid: 1.71705e-10, 8.24437e-10 kg (2 entries); source Socolof M. L. 2001; lognormal variance with pedigree 0.0407, pedigree (1,3,5,3,1)
  Literature Value.
  EcoSpold01Location=RER
  Uncertainty: data from an US-EPA LCA study
- carbon dioxide, liquid: 1.12799e-8, 5.35856e-8 kg (2 entries); source Socolof M. L. 2001; lognormal variance with pedigree 0.0407, pedigree (1,3,5,3,1)
  EcoSpold01Location=RER
  Literature Value.
  Uncertainty: data from an US-EPA LCA study
- waste plastic, consumer electronics: -2.5864e-11, -1.71201e-9 kg (2 entries); source Socolof M. L. 2001; lognormal variance with pedigree 0.1107, pedigree (1,3,5,3,4)
  EcoSpold01Location=CH
  Estimation, based on literature. A 50:50 split between module assembly and monitor assembly is used.
  Uncertainty: data from an US-EPA LCA study - approximated with existing waste process
  production volume 0.2099 kg
- spent solvent mixture: -1.85135e-9, -4.04875e-11, -5.33568e-9 kg (3 entries); source Socolof M. L. 2001; lognormal variance with pedigree 0.1107, pedigree (1,3,5,3,4)
  (same comment as for waste plastic, consumer electronics)
  production volume 0.87294 kg
- used locomotive: -4.90883e-13 unit; lognormal variance with pedigree 0.34, pedigree (1,1,5,1,1)
  production volume 1.32237 unit
- glued laminated timber, for outdoor use: 8.16159e-11 m3; source Elsener J. 1993; lognormal variance with pedigree 0.0586, pedigree (4,3,5,1,1)
  EcoSpold01Location=RER
  Calculated value. The data is based on Elsener & Strub (1993).
  Uncertainty: oral communication
- electronics, for control units: 2.67551e-8 kg; source Volvo Truck Corporation 2004; lognormal variance with pedigree 0.05, pedigree (1,1,5,1,1)
  (same comment as for wire drawing, copper)
- used lorry, 16 metric ton: -2.55873e-11 unit; lognormal variance with pedigree 0.342025, pedigree (3,1,5,2,1)
  Uncertainty: own calculations
  production volume 1.32237 unit
- used lorry, 28 metric ton: -1.71015e-11 unit; lognormal variance with pedigree 0.342025, pedigree (3,1,5,2,1)
  Uncertainty: own calculations
  production volume 1.32237 unit
- used lorry, 40 metric ton: -1.02558e-11 unit; lognormal variance with pedigree 0.342025, pedigree (3,1,5,2,1)
  Uncertainty: own calculations
  production volume 1.32237 unit
- refrigeration machine, carbon dioxide, liquid as refrigerant: 7.81294e-13 unit; lognormal variance with pedigree 0.0406, pedigree (1,1,5,1,1)
  Literature value.
  There are different types of refrigeration machines used in refrigerated transport by lorries. The Carrier Supra 560 type of refrigeration machine weight 385 kg (Carrier, http://www.trucktrailer.carrier.com/StaticFiles/Carrier.com/Carrier%20Brand%20Sites%20Content/Carrier%20Transicold%20North%20America%20TruckTrailer/Files/Products/Truck/Diesel/Supra%20560/Supra560.pdf, accessed 20141103).
- used lorry with refrigeration machine, 16 metric ton: -1.56259e-12 unit
  production volume 7200 unit
- refrigeration machine, R134a as refrigerant: 7.81294e-13 unit; lognormal variance with pedigree 0.0406, pedigree (1,1,5,1,1)
  (same comment as for refrigeration machine, carbon dioxide, liquid as refrigerant)
- manual dismantling of used passenger car with internal combustion engine: 2.3212e-8 unit; lognormal variance with pedigree 0.0184, pedigree (2,3,4,4,3)
  Manual dismantling of used vehicle.
- glider, passenger car: 2.10915e-8 kg; source H.-J. Althaus 2010; lognormal variance with pedigree 0.005, pedigree (2,3,3,4,2)
  Based on currently available compact size cars.
- internal combustion engine, for passenger car: 6.56093e-9 kg; source H.-J. Althaus 2010; lognormal variance with pedigree 0.0064, pedigree (2,4,3,4,2)
  Based on currently available compact size cars.
- manual dismantling of used electric passenger car: 4.8655e-9 unit; lognormal variance with pedigree 0.0184, pedigree (2,3,4,4,3)
  One dismantling unit per kg vehicle is needed.
- wastewater from tube collector production: -1.68751e-7 m3; lognormal variance with pedigree 0.0508, pedigree (2,2,5,3,1)
  EcoSpold01Location=CH
  Questionnaire
  Uncertainty: Questionnaire
  production volume 0.00312 m3
- EUR-flat pallet: 1.82273e-9 unit; lognormal variance with pedigree 0.0508, pedigree (2,2,5,3,1)
  Wood palette packaging
  EcoSpold01Location=RER
  Uncertainty: Wood palette packaging
- xenon, gaseous: 9.34254e-8 kg; lognormal variance with pedigree 0.1202, pedigree (5,2,5,3,1)
  Xenon filling of the tube, 1bar, own calculation
  EcoSpold01Location=CH
  Uncertainty: Xenon filling of the tube, 1bar, own calculation
- electricity, low voltage: 6.35804e-6 kWh; lognormal variance with pedigree 0.002, pedigree (1,1,3,1,1)
  Calculated value.
  Uncertainty: Calculated variable. Uncertainty will be determined from propagation of uncertainty factors of underlying variables. Uncertainty of actual relation between variables not accounted for at this time, although this could be included in a future update.
- seawater reverse osmosis module: 9.84323e-10, 1.69914e-9 m2 (2 entries); lognormal variance with pedigree 0.002, pedigree (1,1,3,1,1)
  This unit process refers to the unit of active membrane surface for reverse osmosis of seawater.
  Uncertainty: Calculated variable. Uncertainty will be determined from propagation of uncertainty factors of underlying variables. Uncertainty of actual relation between variables not accounted for at this time, although this could be included in a future update.
- waste glass pane in burnable frame: -5.62368e-12, -8.69583e-6 kg (2 entries); lognormal variance with pedigree 0.002, pedigree (1,1,3,1,1)
  Calculated value. Process used as proxy for disposal of fiber glass/epoxy pressure vessel.
  Uncertainty: Calculated variable. Uncertainty will be determined from propagation of uncertainty factors of underlying variables. Uncertainty of actual relation between variables not accounted for at this time, although this could be included in a future update.
  production volume 1.10192e6 kg
- polyvinylidenchloride, granulate: 5.70458e-7, 9.65689e-8 kg (2 entries); lognormal variance with pedigree 0.0058, pedigree (2,4,3,1,2)
  Literature value. Material for catridge, filtration step upstream of reverse osmosis filtration.
- sodium hypochlorite, without water, in 15% solution state: 1.29094e-9, 6.12827e-9 kg (2 entries); lognormal variance with pedigree 0.210001, pedigree (5,5,5,5,5)
  Literature value. Average and uncertainty based on published amounts by Al-sarkal, T. et al. 2013, Tarnacki et al. 2012, Darwish, M.et al. 2013, Sanz, M. A. 2007, G. Raluy et al. 2006 and Sadhwani, J. J.et al. 2005.
  Al-Sarkal, T., & Arafat, H. a. (2013). Ultrafiltration versus sedimentation-based pretreatment in Fujairah-1 RO plant: Environmental impact study. Desalination, 317, 55-66.
  Tarnacki, K., Meneses, M., Melin, T., van Medevoort, J., & Jansen, a. (2012). Environmental assessment of desalination processes: Reverse osmosis and Memstill®. Desalination, 296, 69-80.
  Darwish, M., Hassabou, A. H., & Shomar, B. (2013). Using Seawater Reverse Osmosis (SWRO) desalting system for less environmental impacts in Qatar. Desalination, 309, 113-124.
  Sanza, M. A., Bonnélyea, V., & Cremerb, G. (2007). Fujairah reverse osmosis plant: 2 years of operation. Desalination, 203(1-3), 91-99.
  Raluy, G., Serra, L., & Uche, J. (2006). Life cycle assessment of MSF, MED and RO desalination technologies. Energy, 31(13), 2361-2372.
  Sadhwani, J. J., Veza, J. M., & Santana, C. (2005). Case studies on environmental impact of seawater desalination. Desalination, 185(1-3), 1-8.
- polycarboxylates, 40% active substance: 1.96529e-9, 3.97946e-9 kg (2 entries); lognormal variance with pedigree 0.21, pedigree (5,5,5,5,5)
  (same comment as for sodium hypochlorite, without water, in 15% solution state)
- citric acid: 1.80137e-9 kg; source Biswas, W. 2009; lognormal variance with pedigree 0.0072, pedigree (3,4,3,1,2)
  Literature value. Sum of chemical use for pretreatment and reverse osmosis based on Biswas, W. K. (2009).
- municipal solid waste: -1.61852e-9, -3.27298e-10, -2.2903e-10, -5.28335e-7, -6.42839e-7 kg (5 entries); source Biswas, W. 2009
  Literature value. Value based on report solid waste generation per kg of SWRO water production in Biswas, W. K. (2009).
  production volume 2.607e6 kg
- concrete, normal: 4.53563e-8 m3; lognormal variance with pedigree 0.008, pedigree (1,1,4,1,1)
  Calculated Value.
  EcoSpold01Location=CH
  Uncertainty: Calculated variable. Uncertainty will be determined from propagation of uncertainty factors of underlying variables.
- waste reinforcement steel: -0.000388727 kg; lognormal variance with pedigree 0.008, pedigree (1,1,4,1,1)
  Estimation. Based on material input.
  EcoSpold01Location=CH
  Uncertainty: Calculated variable. Uncertainty will be determined from propagation of uncertainty factors of underlying variables.
  production volume 976317 kg
- polyethylene, linear low density, granulate: 5.43977e-7 kg; lognormal variance with pedigree 0.008, pedigree (1,1,4,1,1)
  Calculated Value.
  Uncertainty: Calculated variable. Uncertainty will be determined from propagation of uncertainty factors of underlying variables.
- waste reinforced concrete: -5.02619e-6 kg; lognormal variance with pedigree 0.008, pedigree (1,1,4,1,1)
  (same comment as for waste reinforcement steel)
  production volume 11540 kg
- charcoal: 1.27266e-7 kg; lognormal variance with pedigree 0.008, pedigree (1,1,4,1,1)
  (same comment as for polyethylene, linear low density, granulate)
- copper scrap, sorted, pressed: -1.27683e-6 kg; lognormal variance with pedigree 0.008, pedigree (1,1,4,1,1)
  Estimation. Based on material input.
  Uncertainty: Calculated variable. Uncertainty will be determined from propagation of uncertainty factors of underlying variables.
  production volume 8187.88 kg
- aluminium scrap, post-consumer: -2.30131e-6 kg; lognormal variance with pedigree 0.008, pedigree (1,1,4,1,1)
  (same comment as for copper scrap, sorted, pressed)
  production volume 2656.02 kg
- glass fibre reinforced plastic, polyester resin, hand lay-up: 8.34603e-6 kg; lognormal variance with pedigree 0.008, pedigree (1,1,4,1,1)
  (same comment as for polyethylene, linear low density, granulate)
- municipal solid waste: -1.59986e-5 kg; lognormal variance with pedigree 0.008, pedigree (1,1,4,1,1)
  (same comment as for copper scrap, sorted, pressed)
  production volume 1.9283e7 kg
- waste reinforced concrete: -1.43817e-6 kg; lognormal variance with pedigree 0.008, pedigree (1,1,4,1,1)
  EcoSpold01Location=CH
  Estimation. Based on material input.
  Uncertainty: Calculated variable. Uncertainty will be determined from propagation of uncertainty factors of underlying variables.
  production volume 1.36192e6 kg
- waste polyvinylchloride: -5.15833e-6 kg; lognormal variance with pedigree 0.008, pedigree (1,1,4,1,1)
  (same comment as for waste reinforced concrete)
  production volume 5.31796e6 kg
- waste plastic, mixture: -8.72046e-7 kg; lognormal variance with pedigree 0.008, pedigree (1,1,4,1,1)
  (same comment as for copper scrap, sorted, pressed)
  production volume 973230 kg
- waste wood, untreated: -1.20452e-7 kg; lognormal variance with pedigree 0.008, pedigree (1,1,4,1,1)
  (same comment as for copper scrap, sorted, pressed)
  production volume 143542 kg
- concrete, normal: 1.25198e-6 m3; lognormal variance with pedigree 0.008, pedigree (1,1,4,1,1)
  EcoSpold01Location=CH
  Calculated Value.
  Uncertainty: Calculated variable. Uncertainty will be determined from propagation of uncertainty factors of underlying variables.
- bronze: 2.88892e-7 kg; lognormal variance with pedigree 0.008, pedigree (1,1,4,1,1)
  (same comment as for polyethylene, linear low density, granulate)
- steel, chromium steel 18/8: 7.36648e-7 kg; lognormal variance with pedigree 0.008, pedigree (1,1,4,1,1)
  (same comment as for polyethylene, linear low density, granulate)
- lean concrete: 6.37217e-11 m3; lognormal variance with pedigree 0.0532, pedigree (2,3,5,5,1)
  Literature
  EcoSpold01Location=CH
  Uncertainty: Literature
- cement, unspecified: 1.28715e-9, 9.42749e-11, 2.68714e-10, 6.18613e-9, 6.07706e-9, 1.78866e-10, 1.96448e-9, 2.37679e-10, 2.65471e-8 kg (9 entries); lognormal variance with pedigree 0.0532, pedigree (2,3,5,5,1)
  Literature
  EcoSpold01Location=CH
  Uncertainty: Literature
- waste cement in concrete and mortar: -3.85243e-8, -9.76643e-8 kg (2 entries); lognormal variance with pedigree 0.0532, pedigree (2,3,5,5,1)
  EcoSpold01Location=CH
  Estimation for materials used
  Uncertainty: Estimation for materials used
  production volume 158436 kg
- concrete, normal: 2.14276e-8, 1.98712e-9, 1.60872e-8, 9.60414e-9, 1.09117e-9 m3 (5 entries); lognormal variance with pedigree 0.0532, pedigree (2,3,5,5,1)
  EcoSpold01Location=CH
  Literature
  Uncertainty: Literature
- used train, passenger, high-speed: -6.96008e-13 unit; lognormal variance with pedigree 0.34, pedigree (1,1,5,1,1)
  production volume 0.242058 unit
- heat, district or industrial, other than natural gas: 1.19486e-6 MJ; lognormal variance with pedigree 0.1806, pedigree (4,3,5,5,1)
  EcoSpold01Location=RER
  Uncertainty: literature studies; value represents a rough estimate (basic uncertainty =2)
- electricity, medium voltage: 1.53745e-8, 1.14396e-7, 2.10591e-8, 1.3232e-7, 5.70864e-8, 5.22089e-8, 9.22185e-8, 5.38972e-8, 1.29608e-8, 3.82969e-7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 kWh (38 entries); source von Rozycki C. 2003; lognormal variance with pedigree 0.1806, pedigree (4,3,5,5,1)
  Literature value. Train manufacturing data is available from Rozycki (2003) mainly based on (Maibach, 1999).
  Further references:
  Maibach M., Peter D. and Seiler B. (1999) Ökoinventar Transporte: Grundlagen für den ökologischen Vergleich von Transportsystemen und den Einbezug von Transportsystemen in Ökobilanzen. Technischer Schlussbericht. In: Schweizerischer Nationalfonds zur Förderung der wissenschaftlichen Forschung (ed. SPP Umwelt M.). 2nd Edition. INFRAS, Zürich
  EcoSpold01Location=DE
  Uncertainty: literature studies; value represents a rough estimate (basic uncertainty =2)
- used train, passenger, long-distance: -8.57019e-13 unit; lognormal variance with pedigree 0.34, pedigree (1,1,5,1,1)
  production volume 0.0336675 unit
- electricity, medium voltage: 8.38693e-7 kWh; source Frischknecht R. 1996; lognormal variance with pedigree 0.0606, pedigree (4,3,5,5,1)
  Calculated value. Estimates for energy consumption for manufacturing is taken from Frischknecht (1996) assuming an electricity consumption of 2.7 MJ/kg material.
  EcoSpold01Location=CH
  Uncertainty: literature studies
- used train, passenger, regional: -7.55965e-12 unit; lognormal variance with pedigree 0.34, pedigree (1,1,5,1,1)
  production volume 0.0336675 unit
- used tram: -8.56888e-11 unit; lognormal variance with pedigree 0.042, pedigree (3,1,5,1,1)
  production volume 1.32237 unit
- waste concrete: -1.07758e-5 kg; lognormal variance with pedigree 0.123425, pedigree (2,4,2,2,5)
  Calculated value. Amount of output material is set equal to the amount of respective input material, concrete, normal. It also contains waste concrete from hotel foundation. Conversion is made from m3 of concrete to kg of concrete based on the wet mass property of concrete (see properties section).
  production volume 3.23372e8 kg
- gypsum plasterboard: 4.27583e-8 kg; lognormal variance with pedigree 0.123425, pedigree (2,4,2,2,5)
  Calculated value. Combined of all instances of use across the building. Assumed thickness of plasterboard 12.5 mm. Source: Practical DYI 2018. Types of plasterboard. Available from: https://www.practicaldiy.com/general-building/plasterboard/plasterboard.php Accessed 23 March 2018. Assumed density of plasterboard 640 kg/m3. Source: British Gypsum 2018. What is the density of Gyproc plasterboards? Available from: http://www.british-gypsum.com/technical-advice/faqs/114-what-is-the-density-of-gyproc-plasterboards Accessed 23 March 2018. In terms of outputs assumed to have gone to waste gypsum plasterboard.
- waste gypsum plasterboard: -4.27583e-8 kg; lognormal variance with pedigree 0.123425, pedigree (2,4,2,2,5)
  Calculated value. Amount of output material is set equal to the amount of respective input material, gypsum plasterboard.
  production volume 1.0153e6 kg
- used door, inner, wood: -1.17108e-10 m2; lognormal variance with pedigree 0.123425, pedigree (2,4,2,2,5)
  Calculated value. Amount of output material is set equal to the amount of respective input material, door, inner, wood.
  production volume 4972.61 m2
- elevator, hydraulic: 2.15419e-12 unit; lognormal variance with pedigree 0.422225, pedigree (1,4,2,2,5)
  Calculated value. The amount of exchange is calculated as: amount of input product * (lifetime of the hotel / lifetime of the product). Assumed service life of elevatorunit is 20 years. Source: Miljögiraff 2015. LCA of elevator lifting service in property. Miljögiraff Report 56. Available from: https://www.researchgate.net/profile/Marcus_Wendin/publication/301295772_Elevators_towards_a_circular_economy/links/5717790f08ae2679a8c772db/Elevators-towards-a-circular-economy.pdf Accessed 23 March 2018.
- door, inner, wood: 1.17108e-10 m2; lognormal variance with pedigree 0.123425, pedigree (2,4,2,2,5)
  Calculated value. The amount of exchange is calculated as: amount of input product * (lifetime of the hotel / lifetime of the product). Assumed service life of 40 years. Source: Cobut et al. 2015. The environmental footprint of interior wood doors in non-residential buildings - part 1: life cycle assessment. Journal of Cleaner Production, 109, 232-246. In terms of outputs, assumed to have gone to used door, inner, wood.
- blower and heat exchange unit, decentralized, 180-250 m3/h: 6.94679e-11 unit; lognormal variance with pedigree 0.422225, pedigree (1,4,2,2,5)
  Calculated value. Represents here an air-conditioning unit. The amount of exchange is calculated as: amount of input product * (lifetime of the hotel / lifetime of the product). Assumed service life of the air-conditioning unit is 15 years. Source: ASHRAE 2018. ASHRAE Equipment Life Expectancy chart. Available from: http://www.culluminc.com/wp-content/uploads/2013/02/ASHRAE_Chart_HVAC_Life_Expectancy%201.pdf Accessed 23 March 2018.
- window frame, aluminium, U=1.6 W/m2K: 9.17238e-10 m2; lognormal variance with pedigree 0.123425, pedigree (2,4,2,2,5)
  Calculated value. The amount of exchange is calculated as: amount of input product * (lifetime of the hotel / lifetime of the product). Assumed service life of 35 years. Source: Asif et al. 2002. LIFE CYCLE OF WINDOW MATERIALS - A COMPARATIVE ASSESSMENT. Available from: http://ohp.parks.ca.gov/pages/1054/files/uk%20window%20frame%20lca.pdf Accessed 16 March 2018. In terms of outputs assumed to have gone to aluminium scrap.
- electricity, low voltage: 1.21878e-9 kWh; lognormal variance with pedigree 0.422225, pedigree (1,4,2,2,5)
  Calculated value. Assuming that 0.30 kWh/m3 of electricity is necessary to construct a building. Source: Zabalza et al. 2013. Use of LCA as a Tool for Building Ecodesign. A Case Study of a Low Energy Building in Spain. Energies, 6(8), 3901-3921.
- sanitary ceramics: 5.90101e-9 kg; lognormal variance with pedigree 0.422225, pedigree (1,4,2,2,5)
  Calculated value. The amount of exchange is calculated as: amount of input product * (lifetime of the hotel / lifetime of the product). This flow represents ceramic bathroom equipment (washing basin, toilet seat and bath tube). The hotel has 241 washing basins, 238 toilet seats and 103 bath tubes. Washing basins are assumed to weigh 15kg (information taken from IKEA (2018) for the product "TÖRNVIKEN Countertop wash-basin", source retrieved from: http://www.ikea.com/gb/en/products/washstands-taps/wash-basins/t%C3%B6rnviken-countertop-wash-basin-white-art-90291518/, accessed 12 Feb 2018). The assumed lifetime is 15 years. Toilet seats are assumed to weigh 35kg (information taken from B&Q (2018) for the product "COOKE & LEWIS FABIENNE CLOSE-COUPLED TOILET WITH SOFT CLOSE SEAT", source retrieved from: https://www.diy.com/departments/cooke-lewis-fabienne-close-coupled-toilet-with-soft-close-seat/1142804_BQ.prd?B/R_Toilets_C_CT, accessed 12 Feb 2018). The assumed lifetime is 15 years. Bath tubes are assumed to weigh 33kg (information taken from B&Q (2018) for the product COOKE & LEWIS CONWAY STEEL RECTANGULAR STRAIGHT BATH (L)1700MM (W)700MM, source retrieved from: https://www.diy.com/departments/cooke-lewis-conway-steel-rectangular-straight-bath-l-1700mm-w-700mm/194437_BQ.prd, accessed 23 March 2018). The assumed lifetime is 15 years. In terms of outputs, assumed to have gone to inert waste.
- base plaster: 2.83183e-9 kg; lognormal variance with pedigree 0.123425, pedigree (2,4,2,2,5)
  Calculated value. Combined of all instances of use across the building structure and walls. Assuming that 1213 bags of base paster (each bag has a weight of 25 kg) are required to plaster the area of circa 11000 m3 (accounting for any work losses). Source: British Gypsum 2018. Plaster Coverage Tool. Available from: http://www.british-gypsum.com/technical-advice/plaster-coverage-tool. Accessed 23 March 2018. Assumed service life of 75 years which is equal to the service life of the hotel building with minor refurbishments throughout. In terms of outputs assumed to have gone to waste concrete.
- clay brick: 3.06415e-7 kg; lognormal variance with pedigree 0.123425, pedigree (2,4,2,2,5)
  Calculated value. Combined of all instances of use across the building structure and walls. Assumed density of bricks is 1922 kg/m3. Source: The calculator site, 2018. Construction. Available from: https://www.thecalculatorsite.com/conversions/substances/construction.php. Accessed 13 January 2018. Assumed service life of 75 years which is equal to the service life of the hotel building with minor refurbishments throughout. In terms of outputs assumed to have gone to waste concrete.
- alkyd paint, white, without water, in 60% solution state: 8.68956e-10 kg; lognormal variance with pedigree 0.122825, pedigree (1,4,2,2,5)
  Calculated value. The amount of exchange is calculated as: amount of input product * (lifetime of the hotel / lifetime of the product). Used here in place of water soluble acrylic paint and alkyd enamel. Combined of all instances of use across the building structure and walls. Assuming 1 liter of paint is required to paint 10m2 and weighs 1.5 kg. Source: BQ 2018. Wall painting calculator. Available from: https://www.diy.com/help-advice/wall-painting-calculator/Dev_npcart_100008.art Accessed 16 March 2018. Assumed service life of 5 years which is equivalent to the period of major refurbishments in hotels. Source: Filimonau et al. 2011. Reviewing the carbon footprint analysis of hotels: Life Cycle Energy Analysis (LCEA) as a holistic method for carbon impact appraisal of tourist accommodation. Journal of Cleaner Production, 19(17-18), 1917-1930. In terms of outputs assumed to have gone to waste paint on wall.
- waste paint on wall: -5.4983e-10 kg; lognormal variance with pedigree 0.122825, pedigree (1,4,2,2,5)
  Calculated value. Amount of output material is set equal to the amount of respective input material, alkyd paint and acrylic varnish.
  production volume 158895 kg
- sheet rolling, chromium steel: 3.48186e-7 kg; source Stiesdal H. 2001; lognormal variance with pedigree 0.0406, pedigree (1,1,5,1,1)
  EcoSpold01Location=RER
  Estimation. Construction efforts for the whole amount of chromium steel used.
- aluminium scrap, new: -5.29385e-10, -3.97876e-9 kg (2 entries)
  Estimation. It is assumed that 100% of that material is recycled.
  production volume 147875 kg
- waste polyethylene/polypropylene product: -2.61799e-8 kg; lognormal variance with pedigree 0.008, pedigree (1,1,4,1,1)
  Calculated value. Proxy for the treatment of the epoxy resin (polyepoxide, formed from reaction of an epoxide resin with polyamine hardener). When using PrePreg in the manufacturing process, up to 10% of the PrePreg turns into waste due to cutoffs directly. The remaining amount will turn into waste/by-product after 20 years.
  Uncertainty: Calculated variable. Uncertainty will be determined from propagation of uncertainty factors of underlying variables. Uncertainty of actual relation between variables not accounted at this time, although this could be included in a future update.
  production volume 70196 kg
- electronics scrap from control units: -1.86909e-9 kg; lognormal variance with pedigree 0.008, pedigree (1,1,4,1,1)
  Calculated value
  Uncertainty: Calculated variable. Uncertainty will be determined from propagation of uncertainty factors of underlying variables. Uncertainty of actual relation between variables not accounted at this time, although this could be included in a future update.
  production volume 2425.74 kg
- road: 3.35827e-8 m*year; source Vestas 2011, p. p.81; lognormal variance with pedigree 0.0577, pedigree (2,5,5,3,3)
  Estimated value. Value taken from the 2MW wind turbine construction
  Literature value/estimation. Generally a combination of tarred roads and dirt roads need to be built to provide access to the power plant turbines, which are often located in remote locations. It has been estimated that 10 km of tarred road is needed for a power plant with 25 wind turbines.
  No maintenance is assumed.
  Uncertainty: estimated variance
- excavation, hydraulic digger: 1.48518e-8 m3; lognormal variance with pedigree 0.008, pedigree (1,1,4,1,1)
  Estimated value. Same amount than the concrete in foundation
  Uncertainty: Calculated variable. Uncertainty will be determined from propagation of uncertainty factors of underlying variables. Uncertainty of actual relation between variables not accounted at this time, although this could be included in a future update.
- concrete, normal: 3.72548e-10 m3; source Elsam Engineering A/S,Fredericia,Denmark 2004, p. p. 13, 21+25, Tab. 5.3; lognormal variance with pedigree 0.044225, pedigree (2,4,5,2,2)
  Literature value. Used for foundation.
  The traditional bottom plates are approx 15 × 15m wide and 2m deep. In total, approx 400m3 of reinforced concrete.
  Uncertainty: estimated variance
- zinc coat, pieces: 4.04151e-9 m2
  Calculated value. The surface for zinc coating is estimated with a diameter and a height of the tower of 4 m and 78 m, respectively.
- welding, arc, steel: 1.10755e-6 m; source Burger, B. 2007; lognormal variance with pedigree 0.211, pedigree (5,5,5,5,5)
  Literature/empiric value: The number for welding is an empiric factor. The steel is delivered to in steel plates, which have already been pre-cut. In addition, there is no waste of steel. The plates for the tower sections are rolled. Every section is welded lengthwise, then the individual sections are welded together.
  Uncertainty: empiric factor, high uncertainty
- waste reinforced concrete: -1.96261e-9 kg
  Calculated value. A density of 2400kg/m3 is assumed for the reinforced concrete.
  production volume 8.11948e9 kg
- waste polyethylene/polypropylene product: -2.27442e-9, -6.77019e-11 kg (2 entries)
  Calculated value. Proxy for the treatment of the epoxy resin (polyepoxide, formed from reaction of an epoxide resin with polyamine hardener). When using PrePreg in the manufacturing process, up to 10% of the PrePreg turns into waste due to cutoffs directly. The remaining amount will turn into waste/by-product after 20 years.
  production volume 8.8622e7 kg
- blow moulding: 1.30501e-8, 1.06436e-8 kg (2 entries); lognormal variance with pedigree 0.374402, pedigree (5,5,5,5,5)
  Literature data and primary data from French manufacturers (Boulard et al, 2011). Tanks for the fertigation system.
- tractor, 4-wheel, agricultural: 1.1373e-7 kg
  Literature data and primary data from French manufacturers (Boulard et al, 2011). Tractor.
- agricultural machinery, unspecified: 3.13116e-8 kg; lognormal variance with pedigree 0.374402, pedigree (5,5,5,5,5)
  Literature data and primary data from French manufacturers (Boulard et al, 2011). Ramp and cable drum for the soil preparation system.
- aluminium alloy, AlMg3: 1.70595e-6 kg; lognormal variance with pedigree 0.374402, pedigree (5,5,5,5,5)
  Literature data and primary data from French manufacturers (Boulard et al, 2011). Roof structure.
- extrusion, plastic pipes: 1.78031e-7, 1.45349e-7 kg (2 entries); lognormal variance with pedigree 0.374402, pedigree (5,5,5,5,5)
  Literature data and primary data from French manufacturers (Boulard et al, 2011). Pipes for the fertigation system, cooling system and CO2 injection system.
- electricity, low voltage: 6.41991e-6, 1.14355e-7, 9.22678e-7, 1.62399e-7, 1.09348e-6, 4.58985e-7, 4.0549e-7, 7.06701e-7, 7.54775e-7, 6.87055e-6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 kWh (38 entries); lognormal variance with pedigree 0.374402, pedigree (5,5,5,5,5)
  Literature data and primary data from French manufacturers (Boulard et al, 2011). Electricity for manufacturing of the greenhouse structure.
- polyvinylfluoride: 7.3266e-9 kg; lognormal variance with pedigree 0.374402, pedigree (5,5,5,5,5)
  Literature data and primary data from French manufacturers (Boulard et al, 2011). Cables and wires for the greenhouse structure and the CO2 injection system.
- injection moulding: 9.20374e-9 kg; lognormal variance with pedigree 0.374402, pedigree (5,5,5,5,5)
  Literature data and primary data from French manufacturers (Boulard et al, 2011). Taps, gutters and stoppers for the fertigation system.
- oil boiler, 100kW: 1.39259e-11 unit; lognormal variance with pedigree 0.374402, pedigree (5,5,5,5,5)
  Literature data and primary data from French manufacturers (Boulard et al, 2011). Boiler for the heating system.
- waste concrete: -0.00024634 kg
  Concrete components sent to treatment
  production volume 0.196838 kg
- waste glass: -2.26771e-6 kg
  Flat glass sent to treatment
  production volume 0.0897395 kg
- waste plastic, mixture: -4.27699e-7 kg
  Plastic components sent to treatment
  production volume 0.0199483 kg
- polystyrene, expandable: 1.12439e-7 kg; lognormal variance with pedigree 0.374402, pedigree (5,5,5,5,5)
  Literature data and primary data from French manufacturers (Boulard et al, 2011). Plastic bags part of for the support system.
- drawing of pipe, steel: 9.15868e-7, 1.19554e-6 kg (2 entries); lognormal variance with pedigree 0.374402, pedigree (5,5,5,5,5)
  Literature data and primary data from French manufacturers (Boulard et al, 2011). Tubes and siphons for the heating system.
- polymer foaming: 2.01933e-8 kg; lognormal variance with pedigree 0.374402, pedigree (5,5,5,5,5)
  (same comment as for polystyrene, expandable)
- urea, as N: 1.88769e-7 kg; lognormal variance with pedigree 0.002, pedigree (1,1,3,1,1)
  Measured value.
  Uncertainty: Calculated variable. Uncertainty will be determined from propagation of uncertainty factors of underlying variables. Uncertainty of actual relation between variables not accounted for at this time, although this could be included in a future update.
- zinc concentrate: 1.68882e-8 kg; lognormal variance with pedigree 0.008, pedigree (1,1,3,1,1)
  EcoSpold01Location=GLO
  Measured value.
- electricity, high voltage: 3.9558e-8 kWh; lognormal variance with pedigree 0.0026, pedigree (1,1,3,1,1)
  Measured value. Reported in kWh at 120 kV. According to following document, high voltage is between 44 kV and 315 kV in Quebec region: http://www.hydroquebec.com/transenergie/fr/commerce/pdf/characteristics-and-target-values-of-voltage.pdf
- cement, Portland: 1.06515e-9 kg; lognormal variance with pedigree 0.0026, pedigree (1,1,3,1,1)
  Measured value. Reported as Portland cement type10.
- heat, central or small-scale, natural gas: 0.0120167 MJ; source Stoessel F. 2012; lognormal variance with pedigree 0.118177, pedigree (2,1,3,1,1)
  Literature value or expert estimation (Stoessel et al. 2012).
- application of plant protection product, by field sprayer: 1.73929e-8 ha; lognormal variance with pedigree 0.118664, pedigree (2,2,3,1,1)
  Expert estimation.
- greenhouse, glass walls and roof: 5.5994e-5 m2*year; lognormal variance with pedigree 0.118177, pedigree (2,1,3,1,1)
  Calculated value: 1 ha divided by the yield in kg/ha. Note: greenhouse dataset stands for 1 m2 used over 1 year
- planting: 5.89675e-9 ha; lognormal variance with pedigree 0.158177, pedigree (2,1,3,1,4)
  Expert estimation: energy consumption has been estimated as similar to planting in open field
- nitrogen fertiliser, as N: 2.87797e-7, 9.21831e-8, 2.06508e-6, 5.17942e-8, 5.17942e-8, 1.33075e-7 kg (6 entries); lognormal variance with pedigree 0.118177, pedigree (2,1,3,1,1)
  Calculated based on literature values: The nutrient content of the crop multiplied by the country-share of the fertiliser type (IFA 2014). See supporting documentation 'WFLDB-Documentation.pdf' chapter 'Fertiliser application' for L1 data and appendix for the source of nutrient content (https://ecoquery.ecoinvent.org/File/Reports).
  Corresponds to 101.0 kg/ha
- irrigation: 1.95555e-5 m3; lognormal variance with pedigree 0.118177, pedigree (2,1,3,1,1)
  Literature value: total amount of water used for irrigation (Torellas et al. 2012). See supporting documentation 'WFLDB-Documentation.pdf' chapter 'Water use for irrigation' (https://ecoquery.ecoinvent.org/File/Reports).
- pesticide, unspecified: 2.65436e-7 kg; lognormal variance with pedigree 0.00784984, pedigree (2,2,3,1,1)
  Proxy: Extrapolated using a modified MEXALCA-approach (Roches et al. 2010; Nemecek et al. 2012). See supporting documentation 'WFLDB-Documentation.pdf' chapter 'Pesticide application' for L1 data (https://ecoquery.ecoinvent.org/File/Reports).
  Corresponds to 45.7 kg/ha
- transport, freight, inland waterways, barge: 1.7746e-7 metric ton*km
  This represent the transport of fertilizers that are directly linked to their supplying activities, to better represent the fertilizer mix of the activity. Transport distance based on US BTS Commodity Flow Surveys 1993, 1997, 2002, 2007, US Dep. Of Transportation, Bureau of Transportation Statistics.
- transport, tractor and trailer, agricultural: 8.82498e-7 metric ton*km; lognormal variance with pedigree 0.156439, pedigree (4,1,3,1,1)
  On-farm transport: Yield (in tonnes) multiplied by the average distance from field to farm. The distance was obtained by extrapolation (modified MEXALCA approach). See supporting documentation 'WFLDB-Documentation.pdf' chapter 'Machinery processes' (https://ecoquery.ecoinvent.org/File/Reports).
- tomato seedling, for planting: 0.000165109 unit; source Martínez-Blanco J. 2011; lognormal variance with pedigree 0.118177, pedigree (2,1,3,1,1)
  Literature value or expert estimation (Martínez-Blanco et al. 2011). 2.5 plants per m2 is considered.
- transport, freight train: 1.04953e-6 metric ton*km
  (same comment as for transport, freight, inland waterways, barge)
- ammonium nitrate, as N: 9.29462e-8 kg; lognormal variance with pedigree 0.118177, pedigree (2,1,3,1,1)
  Calculated based on literature values: The nutrient content of the crop multiplied by the country-share of the fertiliser type (IFA 2014). See supporting documentation 'WFLDB-Documentation.pdf' chapter 'Fertiliser application' for L1 data and appendix for the source of nutrient content (https://ecoquery.ecoinvent.org/File/Reports).
  Corresponds to 14.1 kg/ha
- transport, freight, lorry, unspecified: 5.6551e-7 metric ton*km
  This represent the transport of fertilizers that are directly linked to their supplying activities, to better represent the fertilizer mix of the activity. Transport distance based on US BTS Commodity Flow Surveys 1993, 1997, 2002, 2007, US Dep. Of Transportation, Bureau of Transportation Statistics. Of the total road transport, 6% is assumed to be by delivery van for goods with a large share of retail sale, and 3% for goods that are mainly sold via wholesale.
- ammonium sulfate, as N: 1.06823e-7 kg; lognormal variance with pedigree 0.118177, pedigree (2,1,3,1,1)
  Calculated based on literature values: The nutrient content of the crop multiplied by the country-share of the fertiliser type (IFA 2014). See supporting documentation 'WFLDB-Documentation.pdf' chapter 'Fertiliser application' for L1 data and appendix for the source of nutrient content (https://ecoquery.ecoinvent.org/File/Reports).
  Corresponds to 16.5 kg/ha
- potassium chloride, as K2O: 2.48251e-6 kg; lognormal variance with pedigree 0.118177, pedigree (2,1,3,1,1)
  Calculated based on literature values: The nutrient content of the crop multiplied by the country-share of the fertiliser type (IFA 2014). See supporting documentation 'WFLDB-Documentation.pdf' chapter 'Fertiliser application' for L1 data and appendix for the source of nutrient content (https://ecoquery.ecoinvent.org/File/Reports).
  Corresponds to 419.0 kg/ha
- waste glass: -1.25784e-5 kg
  End-of-life treatment of rock wool (glass used as proxy). Based on Torellas et al. (2012).
  production volume 7.62246e6 kg
- packaging, for fertilisers: 2.282e-5 kg; lognormal variance with pedigree 0.0532, pedigree (4,3,3,5,4)
  Total amount of active substance/s of fertilisers needed for the production of 'tomato, fresh grade' is calculated to be circa 3.90E-03 kg. Fertiliser/s used in this dataset is/are: 'ammonia, liquid', 'ammonium nitrate, as N', 'ammonium sulfate, as N', 'nitrogen fertiliser, as N', 'nitrogen fertiliser, as N', 'nitrogen fertiliser, as N', 'nitrogen fertiliser, as N', 'nitrogen fertiliser, as N', 'nitrogen fertiliser, as N', 'potassium chloride, as K2O', 'potassium fertiliser, as K2O', 'potassium sulfate, as K2O', 'urea, as N'. The total amount of active substance/s is doubled in order to account for the packaging of the dilluted product of fertiliser/s that is/are applied. Therefore, 7.80E-03 kg of packaging for fertilisers is justified with this exchange.
- potassium fertiliser, as K2O: 1.06221e-6 kg; lognormal variance with pedigree 0.118177, pedigree (2,1,3,1,1)
  Calculated based on literature values: The nutrient content of the crop multiplied by the country-share of the fertiliser type (IFA 2014). See supporting documentation 'WFLDB-Documentation.pdf' chapter 'Fertiliser application' for L1 data and appendix for the source of nutrient content (https://ecoquery.ecoinvent.org/File/Reports).
  Corresponds to 330.0 kg/ha
- packaging, for pesticides: 4.27291e-6 kg; lognormal variance with pedigree 0.0532, pedigree (4,3,3,5,4)
  Total amount of active substance/s of pesticides needed for the production of tomato, fresh grade is calculated to be circa 9.46E-05 kg. Pesticide/s used in this dataset is/are: 'pesticide, unspecified'. The total amount of active substance/s is doubled in order to account for the packaging of the dilluted product of pesticide/s that is/are applied. Therefore, 1.89E-04 kg of packaging for pesticides is justified with this exchange.
- potassium sulfate, as K2O: 5.94804e-7 kg; lognormal variance with pedigree 0.118177, pedigree (2,1,3,1,1)
  Calculated based on literature values: The nutrient content of the crop multiplied by the country-share of the fertiliser type (IFA 2014). See supporting documentation 'WFLDB-Documentation.pdf' chapter 'Fertiliser application' for L1 data and appendix for the source of nutrient content (https://ecoquery.ecoinvent.org/File/Reports).
  Corresponds to 102.0 kg/ha
- electricity, low voltage: 0.000284735 kWh; source Stoessel F. 2012; lognormal variance with pedigree 0.118177, pedigree (2,1,3,1,1)
  Literature value or expert estimation (Stoessel et al. 2012).
- phosphate fertiliser, as P2O5: 1.47485e-9, 3.61222e-9, 2.27966e-8, 2.27966e-8, 1.17082e-8, 1.83032e-9 kg (6 entries); source Torellas M. 2012; lognormal variance with pedigree 0.118177, pedigree (2,1,3,1,1)
  Calculated based on literature values or expert estimation: The total amount of nutrient (Torellas et al. 2012) multiplied by the country-share of fertiliser type (IFA 2014). See supporting documentation 'WFLDB-Documentation.pdf' chapter 'Fertiliser application' for L3 and L4 data (https://ecoquery.ecoinvent.org/File/Reports).
  Corresponds to 90.2 kg/ha
- phosphate rock, as P2O5, beneficiated, dry: 3.37797e-9 kg; source Torellas M. 2012; lognormal variance with pedigree 0.118177, pedigree (2,1,3,1,1)
  Calculated based on literature values or expert estimation: The total amount of nutrient (Torellas et al. 2012) multiplied by the country-share of fertiliser type (IFA 2014). See supporting documentation 'WFLDB-Documentation.pdf' chapter 'Fertiliser application' for L3 and L4 data (https://ecoquery.ecoinvent.org/File/Reports).
  Corresponds to 11.4 kg/ha
- waste glass: -7.81836e-7 kg
  End-of-life treatment of perlite (glass used as proxy). Based on Torellas et al. (2012), 50% is landfilled and 50% is recycled
  production volume 8.11369e7 kg
- waste polystyrene: -1.65618e-8 kg
  End-of-life treatment of substrate bed (PS). Based on Torellas et al. (2012), 50% is landfilled and 50% is recycled
  production volume 3.28992e6 kg
- waste polyethylene: -4.1965e-9 kg
  End-of-life treatment of bed plastic and substrate bags (PE used as proxy). Based on Torellas et al. (2012), 50% is landfilled and 50% is recycled
  production volume 833613 kg
- electricity, low voltage: 3.06747e-6 kWh; source Torellas M. 2012; lognormal variance with pedigree 0.118177, pedigree (2,1,3,1,1)
  Literature value or expert estimation (Torellas et al. 2012).
- irrigation: 8.45305e-7 m3; source Torellas M. 2012; lognormal variance with pedigree 0.118177, pedigree (2,1,3,1,1)
  (same comment as for irrigation)
- expanded perlite: 2.99223e-6 kg; source Torellas M. 2012
  Literature value or expert estimation (Torellas et al. 2012). Substrate: 18'876.5 kg/ha, Perlite lifespan: 3 years.
- electricity, low voltage: 2.92629e-9 kWh; lognormal variance with pedigree 0.422225, pedigree (1,4,2,2,5)
  Calculated value. Assuming that 0.30 kWh/m3 of electricity is necessary to construct a building. Source: Zabalza et al. 2013. Use of LCA as a Tool for Building Ecodesign. A Case Study of a Low Energy Building in Spain. Energies, 6 (8), 3901-3921.
- blower and heat exchange unit, central, 600-1200 m3/h: 4.46987e-14 unit; lognormal variance with pedigree 0.422225, pedigree (1,4,2,2,5)
  Calculated value. Represents here 4 central air-conditioning units. The amount of exchange is calculated as: amount of input product * (lifetime of the hotel / lifetime of the product). Assumed service life of the air-conditioning unit is 20 years. Source: ASHRAE 2018. ASHRAE Equipment Life Expectancy chart. Available from: http://www.culluminc.com/wp-content/uploads/2013/02/ASHRAE_Chart_HVAC_Life_Expectancy%201.pdf Accessed 23 March 2018.
- heat carrier liquid, 40% C3H8O2: -1.35265e-11 m3; lognormal variance with pedigree 0.062, pedigree (3,5,5,5,1)
  Estimation
  EcoSpold01Location=CH
  Uncertainty: Estimation
  production volume 0.00465 m3
- sheet rolling, copper: 2.59118e-8 kg; lognormal variance with pedigree 0.0606, pedigree (2,5,5,5,1)
  EcoSpold01Location=RER
  Questionnaire
  Uncertainty: Questionnaire
- wastewater, from residence: -3.85723e-10 m3; lognormal variance with pedigree 0.1327, pedigree (2,2,5,5,4)
  (same comment as for waste glass)
  production volume 0.1326 m3
- tap water: 1.31561e-7 kg; lognormal variance with pedigree 0.1327, pedigree (2,2,5,5,4)
  (same comment as for tap water)
- corrugated board box: 3.38091e-10, 2.87221e-8 kg (2 entries); lognormal variance with pedigree 0.056, pedigree (3,4,5,5,1)
  Company information, packaging
  EcoSpold01Location=RER
  Uncertainty: Company information, packaging
- waste glass sheet: -8.13392e-10, -1.2327e-7 kg (2 entries); lognormal variance with pedigree 0.062, pedigree (3,5,5,5,1)
  EcoSpold01Location=CH
  Estimation
  Uncertainty: Estimation
  production volume 42.6 kg
- municipal solid waste: -2.40791e-11, -7.06363e-11, -4.34751e-11, -7.63839e-11, -7.71236e-11, -7.38408e-11, -7.21944e-11, -9.21778e-12, -4.83141e-10, -5.18235e-11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 kg (34 entries); lognormal variance with pedigree 0.1327, pedigree (2,2,5,5,4)
  (same comment as for waste glass)
  production volume 0.0852 kg
- hazardous waste, for incineration: -3.6837e-7, -4.78998e-7 kg (2 entries); lognormal variance with pedigree 0.1327, pedigree (2,2,5,5,4)
  (same comment as for wastewater, from residence)
  production volume 0.681 kg
- waste plastic, mixture: -5.82187e-10, -1.82736e-10, -4.56278e-10, -2.49482e-10, -1.93547e-10, -5.09463e-10, -6.82797e-11, -5.76989e-9, -7.57505e-10, -7.8847e-11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 kg (34 entries); lognormal variance with pedigree 0.062, pedigree (3,5,5,5,1)
  EcoSpold01Location=CH
  Estimation
  Uncertainty: Estimation
  production volume 2.16 kg
- waste glass: -2.44818e-8, -1.23756e-8, -3.89574e-8, -9.93799e-9, -1.44759e-8, -2.29734e-8, -3.02852e-9, -5.68407e-8, -4.56368e-9, -2.78654e-8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 kg (31 entries); lognormal variance with pedigree 0.1327, pedigree (2,2,5,5,4)
  (same comment as for waste glass)
  production volume 2.04 kg
- electricity, medium voltage: 1.63671e-8 kWh; lognormal variance with pedigree 0.1327, pedigree (2,2,5,5,4)
  EcoSpold01Location=GB
  Questionnaire, data for other type of collector plus data for flat plate collector production
  Uncertainty: Questionnaire, data for other type of collector plus data for flat plate collector production
- polymethyl methacrylate, beads: 1.68315e-9 kg; lognormal variance with pedigree 0.06, pedigree (1,5,5,5,1)
  EcoSpold01Location=RER
- argon, liquid: 5.50141e-7 kg; lognormal variance with pedigree 0.06, pedigree (1,5,5,5,1)
  EcoSpold01Location=RER
- acetylene: 1.06249e-8 kg; lognormal variance with pedigree 0.06, pedigree (1,5,5,5,1)
  EcoSpold01Location=CH
- transport, passenger car: 1.15716e-7 km; lognormal variance with pedigree 0.18, pedigree (1,5,5,5,1)
- paper, woodfree, uncoated: 5.5981e-7 kg; lognormal variance with pedigree 0.06, pedigree (1,5,5,5,1)
  EcoSpold01Location=RER
- solvent, organic: 6.73701e-9 kg; lognormal variance with pedigree 0.06, pedigree (1,5,5,5,1)
  EcoSpold01Location=GLO
- liquefied petroleum gas: 5.33791e-10, 1.89594e-9, 1.6757e-10, 3.72972e-11, 7.99027e-9 kg (5 entries); lognormal variance with pedigree 0.06, pedigree (1,5,5,5,1)
  EcoSpold01Location=RER
- waste paperboard: -1.92409e-10, -2.93818e-11, -2.56917e-12, -1.06169e-10, -1.03523e-11, -1.91632e-11, -3.57431e-9 kg (7 entries); lognormal variance with pedigree 0.06, pedigree (1,5,5,5,1)
  EcoSpold01Location=CH
  production volume 0.0002244 kg
- waste graphical paper: -1.92409e-10, -2.93818e-11, -2.56917e-12, -1.06169e-10, -1.03523e-11, -1.91632e-11, -3.57431e-9 kg (7 entries); lognormal variance with pedigree 0.06, pedigree (1,5,5,5,1)
  EcoSpold01Location=CH
  production volume 0.0002244 kg
- aluminium oxide, non-metallurgical: 2.94203e-8 kg; lognormal variance with pedigree 0.0541, pedigree (3,2,5,5,1)
  Estimation for 5% feldspar
  EcoSpold01Location=RER
  Uncertainty: Estimation for 5% feldspar
- glass tube factory: 5.88406e-15 unit; lognormal variance with pedigree 0.3527, pedigree (2,2,5,5,1)
  EcoSpold01Location=DE
  Questionnaire
  Uncertainty: Questionnaire
- zeolite, powder: 3.11143e-5 kg; lognormal variance with pedigree 0.2706, pedigree (4,3,5,5,5)
  EcoSpold01Location=RER
- wastewater, unpolluted: -4.28749e-8 m3; lognormal variance with pedigree 0.0526, pedigree (1,3,5,5,1)
  EcoSpold01Location=CH
  production volume 0.0029892 m3
- polybutadiene: 4.70456e-7 kg; lognormal variance with pedigree 0.0526, pedigree (1,3,5,5,1)
  EcoSpold01Location=RER
- polysulfide, sealing compound: 1.88577e-5 kg; lognormal variance with pedigree 0.1726, pedigree (1,3,5,5,1)
  EcoSpold01Location=RER
- electricity, low voltage: 7.3157e-6, 1.28308e-6, 2.1099e-5, 0.000319078, 5.25943e-5, 0.000149813 kWh (6 entries); lognormal variance with pedigree 0.0532, pedigree (2,3,5,5,1)
  EcoSpold01Location=UCTE
- excavation, skid-steer loader: 2.76387e-11 m3; lognormal variance with pedigree 0.0421, pedigree (1,2,5,5,1)
  EcoSpold01Location=RER
- gravel, round: 3.87264e-7 kg; lognormal variance with pedigree 0.0421, pedigree (1,2,5,5,1)
  EcoSpold01Location=CH
- fibre cement facing tile: 5.83622e-10 kg; lognormal variance with pedigree 0.0421, pedigree (1,2,5,5,1)
  EcoSpold01Location=CH
- cement, Portland: 9.43621e-9, 3.04277e-10, 5.27345e-10, 4.32578e-10, 9.11711e-9, 1.05575e-8, 6.2092e-8 kg (7 entries); lognormal variance with pedigree 0.0421, pedigree (1,2,5,5,1)
  EcoSpold01Location=CH
- waste glass: -8.23884e-7 kg; lognormal variance with pedigree 0.0421, pedigree (1,2,5,5,1)
  EcoSpold01Location=CH
  production volume 26.37 kg
- waste bulk iron, excluding reinforcement: -7.49449e-9, -1.55844e-8 kg (2 entries); lognormal variance with pedigree 0.0421, pedigree (1,2,5,5,1)
  EcoSpold01Location=CH
  production volume 3210 kg
- cement mortar: 2.86466e-12, 5.69352e-10 kg (2 entries); lognormal variance with pedigree 0.0421, pedigree (1,2,5,5,1)
  EcoSpold01Location=CH
- electricity, low voltage: 2.18091e-5, 3.51153e-5 kWh (2 entries); lognormal variance with pedigree 0.0421, pedigree (1,2,5,5,1)
  EcoSpold01Location=CH
- waste brick: -3.96299e-11, -3.00967e-9 kg (2 entries); lognormal variance with pedigree 0.0421, pedigree (1,2,5,5,1)
  EcoSpold01Location=CH
  production volume 6600 kg
- waste concrete, not reinforced: -4.34495e-5, -1.04024e-7 kg (2 entries); lognormal variance with pedigree 0.0421, pedigree (1,2,5,5,1)
  EcoSpold01Location=CH
  production volume 13770 kg
- waste emulsion paint: -4.82646e-10, -5.39695e-9 kg (2 entries); lognormal variance with pedigree 0.0606, pedigree (4,3,5,5,1)
  EcoSpold01Location=CH
  Literature studies
  Uncertainty: literature studies
  production volume 1935 kg
- injection moulding: 8.42779e-9 kg; lognormal variance with pedigree 0.2, pedigree (5,5,5,5,4)
  Assumed type of processing
  EcoSpold01Location=RER
  Uncertainty: assumed type of processing
- metal working, average for steel product manufacturing: 2.2072e-8 kg; lognormal variance with pedigree 0.2, pedigree (5,5,5,5,4)
  Assumed type of processing
  EcoSpold01Location=RER
  Uncertainty: assumed type of processing
- polymer foaming: 1.66023e-8 kg; lognormal variance with pedigree 0.2, pedigree (5,5,5,5,4)
  Assumed type of processing
  EcoSpold01Location=RER
  Uncertainty: assumed type of processing
- xenon, gaseous: 1.16972e-7 kg; lognormal variance with pedigree 0.1221, pedigree (5,2,5,5,1)
  (same comment as for xenon, gaseous)
- concrete, normal: 9.91264e-11 m3; source ENERCON GmbH 2010, p. p. 13, 21+25, Tab. 5.3; lognormal variance with pedigree 0.008, pedigree (1,1,4,1,1)
  Calculated value. Concrete used for foundation and in tower structure.
  Estimated values based on % of total weight per component and material of the turbine published by the Princeton Energy Resources International, LLC
  Uncertainty: Calculated variable. Uncertainty will be determined from propagation of uncertainty factors of underlying variables. Uncertainty of actual relation between variables not accounted at this time, although this could be included in a future update.
- inert waste, for final disposal: -8.41455e-6 kg; lognormal variance with pedigree 0.0186, pedigree (1,5,4,5,1)
  disposal of refractory fireclay
  EcoSpold01Location=CH
  production volume 7.9776e6 kg
- refractory, fireclay, packed: 8.1366e-6 kg; source Attika Feuer AG 2011; lognormal variance with pedigree 0.0352, pedigree (1,5,4,5,1)
  EcoSpold01Location=DE
  estimation - refractory fireclay internal cover for the combustion chamber
- heat, central or small-scale, other than natural gas: 1.4452e-5, 0.00101105 MJ (2 entries); source Attika Feuer AG 2011; lognormal variance with pedigree 0.098, pedigree (1,5,4,5,1)
  estimation - data comes from a comparison between old dataset value and communication with producer (total annual heating value in factory/production)
  EcoSpold01Location=CH
- waste concrete: -8.56541e-7 kg
  Concrete components sent to treatment
  production volume 4.01456 kg
- transport, freight, sea, container ship: 2.43776e-14 metric ton*km; lognormal variance with pedigree 0.1226, pedigree (1,3,3,1,1)
  Amount based on primary data collected from participating companies.
- transport, freight, lorry 16-32 metric ton, EURO3: 2.36754e-14 metric ton*km; lognormal variance with pedigree 0.1226, pedigree (1,3,3,1,1)
  Inbound transport of zinc concentrate and other materials to sites. Amount and activity link based on primary data collected from participating companies.
- transport, freight, lorry 16-32 metric ton, EURO3: 3.0828e-14 metric ton*km; lognormal variance with pedigree 0.1226, pedigree (1,3,3,1,1)
  Amount based on primary data collected from participating companies.
- potassium fertiliser, as K2O: 1.0914e-6 kg; lognormal variance with pedigree 0.120177, pedigree (2,1,3,5,1)
  (same comment as for potassium fertiliser, as K2O)
- nitrogen fertiliser, as N: 2.67368e-6 kg; lognormal variance with pedigree 0.120177, pedigree (2,1,3,5,1)
  (same comment as for nitrogen fertiliser, as N)
- transport, tractor and trailer, agricultural: 8.80484e-7 metric ton*km; lognormal variance with pedigree 0.158439, pedigree (4,1,3,5,1)
  (same comment as for transport, tractor and trailer, agricultural)
- irrigation: 5.62257e-7, 2.38661e-8, 9.54643e-10, 5.0262e-6, 8.23661e-8, 4.11864e-9, 3.80661e-8, 9.65875e-6, 1.85664e-7, 6.34557e-8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 m3 (15 entries); lognormal variance with pedigree 0.120177, pedigree (2,1,3,5,1)
  (same comment as for irrigation)
- heat, central or small-scale, natural gas: 1.24139e-9, 0.0118959 MJ (2 entries); source Stoessel F. 2012; lognormal variance with pedigree 0.120177, pedigree (2,1,3,5,1)
  Literature value or expert estimation (Stoessel et al. 2012).
- phosphate fertiliser, as P2O5: 8.28665e-8 kg; source Torellas M. 2012; lognormal variance with pedigree 0.120177, pedigree (2,1,3,5,1)
  (same comment as for phosphate fertiliser, as P2O5)
- manganese: 5.88263e-10 kg; lognormal variance with pedigree 0.0137, pedigree (4,4,3,3,2)
  Material composition of adsorber tubes

- waste concrete, not reinforced: -4.60303e-7 kg; lognormal variance with pedigree 0.0137, pedigree (4,4,3,3,2)
  Calcium carbonate and gypsum are sent to landfill or incineration. The 2200 kg/m3 represents the density of the cement. This is done in order to convert the unit from m3 (vol) to kg (mass)
  production volume 3.53153e8 kg
- waste reinforcement steel: -1.98254e-7 kg; lognormal variance with pedigree 0.0137, pedigree (4,4,3,3,2)
  All steel masses combined. Treatment of reinforced steel is used as a proxy for all steel types.
  production volume 1.46119e8 kg
- transformer, high voltage use: 4.13383e-8 kg; lognormal variance with pedigree 0.0137, pedigree (4,4,3,3,2)
  Transformer bulk material high voltage used
- sand: 3.5615e-9 kg; lognormal variance with pedigree 0.0137, pedigree (4,4,3,3,2)
  Tank foundations. End of life neglected
- control cabinet, heat and power co-generation unit, 160kW electrical: 6.01858e-12 unit; lognormal variance with pedigree 0.0137, pedigree (4,4,3,3,2)
  480 V motor control center
- nitrate salts, for solar power application: 9.48301e-5 kg; lognormal variance with pedigree 0.0137, pedigree (4,4,3,3,2)
  Used as molten salt with 60% (by weight) contribution of technical grade sodium nitrate, and 40% (by weight) technical grade potassium nitrate.
- diesel, burned in diesel-electric generating set, 18.5kW: 3.6341e-5 MJ; lognormal variance with pedigree 0.0133, pedigree (3,4,4,3,2)
  Used to melt the salt before it is sent to thermal storage tank
- refractory, basic, packed: 1.22702e-6 kg; lognormal variance with pedigree 0.0137, pedigree (4,4,3,3,2)
  Refractory brick, with mortar (tank perimeter foundation)
- metal working, average for metal product manufacturing: 8.23233e-10 kg; source AEK Pellets AG 2011; lognormal variance with pedigree 0.0052, pedigree (1,3,3,5,1)
  calculated value
- tower silo, plastic: 9.37979e-10 m3; source AEK Pellets AG 2011; lognormal variance with pedigree 0.0106, pedigree (1,3,3,5,1)
  estimation - value given from pellets company in the filled questionnaire (dimensions of the pellet silos in their factory). This dataset include its own disposal in the end of its lifetime.
- building, hall, steel construction: 7.81649e-11 m2; source AEK Pellets AG 2011; lognormal variance with pedigree 0.0106, pedigree (1,3,3,5,1)
  measured value - building for drying process in the pellet factory modeled (datset includes the disposal of the building in the end of its lifetime)
- building, multi-storey: 5.47154e-10 m3; source AEK Pellets AG 2011; lognormal variance with pedigree 0.0106, pedigree (1,3,3,5,1)
  measured value - building for pelletting process in the pellet factory modeled (datset includes the disposal of the building in the end of its lifetime)
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
## Inputs from nature
- Oxygen [natural resource, in air]: 0 kg; pedigree (1,1,1,1,1)
  Oxygen from ambient air needed to combust and oxidise this waste. Net demand, i.e. without O2 leaving the plant in flue gas uncombusted.
  Uncertainty: uncertainty is calculated from uncertainties in waste composition and transfer coefficients to flue gas and soild residues in incinerator
- Water, well, in ground [natural resource, in water]: 4.3741e-9 m3; source MAN Nutzfahrzeuge AG 2000; lognormal variance with pedigree 0.05, pedigree (1,1,5,1,1)
  Calculated value. About 95% of the consumed tap water and groundwater are used in the final assembly of vehicles (own calculations based on MAN Nutzfahrzeuge AG (2002)).
- Water, unspecified natural origin [natural resource, in water]: 5.77679e-9 m3; source Socolof M. L. 2001; lognormal variance with pedigree 0.0407, pedigree (1,3,5,3,1)
  Estimation, based on literature. A 50:50 split between module assembly and monitor assembly is used.
  Calculated value. The amount of water in this flow (input) to the process as provided by the data provider for eiv2 was 0.28125m3. This amount is adjusted, so the water balance is achieved.
  Uncertainty: data from an US-EPA LCA study
- Water, salt, ocean [natural resource, in water]: 4.4256e-6 m3; source Al-Sarkal, T. 2013; lognormal variance with pedigree 0.002, pedigree (1,1,3,1,1)
  Calculated value. Based on ratio of raw water intake and permeate of Fujairah-1 seawater reverse osmosis plant.
  Uncertainty: Calculated variable. Uncertainty will be determined from propagation of uncertainty factors of underlying variables. Uncertainty of actual relation between variables not accounted for at this time, although this could be included in a future update.
- Occupation, industrial area [natural resource, land]: 0.000201683 m2*year; lognormal variance with pedigree 0.008, pedigree (1,1,4,1,1)
  (same comment as for polyethylene, linear low density, granulate)
- Transformation, from unspecified [natural resource, land]: 3.36052e-6 m2; lognormal variance with pedigree 0.008, pedigree (1,1,4,1,1)
  (same comment as for polyethylene, linear low density, granulate)
- Transformation, to industrial area [natural resource, land]: 3.36326e-6 m2; lognormal variance with pedigree 0.008, pedigree (1,1,4,1,1)
  (same comment as for polyethylene, linear low density, granulate)
- Transformation, to urban, continuously built [natural resource, land]: 7.05591e-10 m2; lognormal variance with pedigree 0.242225, pedigree (1,4,2,2,5)
  Calculated value. Based on survey data that have specified he gross floor area of the hotel which is 20260 m2 .
- Occupation, urban, continuously built [natural resource, land]: 5.29193e-8 m2*year; lognormal variance with pedigree 0.162225, pedigree (1,4,2,2,5)
  Calculated value. Based on survey data, the gross floor area is 20260 m2, multiplied by the lifetime of the building.
- Transformation, from urban, continuously built [natural resource, land]: 4.83739e-10 m2; lognormal variance with pedigree 0.242225, pedigree (1,4,2,2,5)
  (same comment as for Transformation, to urban, continuously built)
- Transformation, from pasture, man made [natural resource, land]: 8.3103e-9 m2; source ENERCON GmbH 2010; lognormal variance with pedigree 0.0481, pedigree (1,1,4,3,1)
  Literature value
  Uncertainty: Estimated variance.
- Water, river [natural resource, in water]: 1.80642e-9 m3; lognormal variance with pedigree 0.0026, pedigree (1,1,3,1,1)
  Measured value. Used as cooling water.
- Occupation, inland waterbody, unspecified [natural resource, land]: 3.37479e-11 m2*year; lognormal variance with pedigree 0.002, pedigree (1,1,3,1,1)
  Calculated Value. Land use of the different ponds : tailings pond, wastewater treatment sludge pond and Jarofix disposal site.
  Uncertainty: Calculated variable. Uncertainty will be determined from propagation of uncertainty factors of underlying variables. Uncertainty of actual relation between variables not accounted for at this time, although this could be included in a future update.
- Transformation, to inland waterbody, unspecified [natural resource, land]: 3.37479e-13 m2; lognormal variance with pedigree 0.002, pedigree (1,1,3,1,1)
  (same comment as for Occupation, inland waterbody, unspecified)
- Occupation, annual crop [natural resource, land]: 5.91268e-5 m2*year; lognormal variance with pedigree 0.0140616, pedigree (2,1,3,1,1)
  Related to the duration from harvest date of previous crop to harvest date of main crop.
- Carbon dioxide, in air [natural resource, in air]: 0.000276884 kg; lognormal variance with pedigree 0.00784984, pedigree (2,2,3,1,1)
  CO2 uptake by biomass
- Energy, gross calorific value, in biomass [natural resource, biotic]: 0.00248898 MJ; lognormal variance with pedigree 0.00784984, pedigree (2,2,3,1,1)
- Transformation, from arable land, unspecified use [natural resource, land]: 5.89676e-5 m2; lognormal variance with pedigree 0.0382144, pedigree (2,1,3,1,1)
  Land transformation: 1 ha divided by yield
- Transformation, to arable land, unspecified use [natural resource, land]: 5.89676e-5 m2; lognormal variance with pedigree 0.0382144, pedigree (2,1,3,1,1)
  Land transformation: 1 ha divided by yield
- Transformation, from urban, green area [natural resource, land]: 2.21852e-10 m2; lognormal variance with pedigree 0.242225, pedigree (1,4,2,2,5)
  Calculated value. Based on survey data.
- Occupation, urban, discontinuously built [natural resource, land]: 1.40459e-7 m2*year; lognormal variance with pedigree 0.0821, pedigree (1,2,5,5,1)
- Occupation, construction site [natural resource, land]: 2.85212e-9 m2*year; lognormal variance with pedigree 0.0821, pedigree (1,2,5,5,1)
- Transformation, to urban, discontinuously built [natural resource, land]: 5.5673e-9 m2; lognormal variance with pedigree 0.1621, pedigree (1,2,5,5,1)
- Water, cooling, unspecified natural origin [natural resource, in water]: 3.49081e-14 m3; lognormal variance with pedigree 0.0032, pedigree (1,3,3,1,1)
  Amount based on primary data collected from participating companies.

## Emissions to nature
- Chloride [water, ground-, long-term]: 0 kg; pedigree (1,1,1,1,1)
  Long-term emissions from landfilling of incineration residues.
  Uncertainty: uncertainty is calculated from uncertainties in waste composition and transfer coefficients in incinerator and landfills.
- Lead [water, ground-, long-term]: 0 kg; pedigree (1,1,1,1,1)
  (same comment as for Chloride)
- Copper, ion [water, ground-, long-term]: 0 kg; pedigree (1,1,1,1,1)
  (same comment as for Chloride)
- Water [air, urban air close to ground]: 0 m3; pedigree (1,1,1,1,1)
  Water vapour from waste humidity, hydrogen oxidation and part of the process water.
  Uncertainty: Uncertainty calculated from uncertainty in waste composition, process water input and the uncertainty of fraction to air.
- Carbon monoxide, non-fossil [air, urban air close to ground]: 0 kg; pedigree (1,1,1,1,1)
  Incomplete combustion product emitted to air.
  Uncertainty: uncertainty calculated from uncertainty in average operation emissions, and the uncertainty of the flue gas volume from this waste.
- Sodium, ion [water, surface water]: 0 kg; pedigree (1,1,1,1,1)
  Emissions to water from waste composition and transfer coefficients in incinerator and landfills.
  Uncertainty: uncertainty is calculated from uncertainties in waste composition and transfer coefficients in incinerator and landfills
- Benzene [air, urban air close to ground]: 0 kg; pedigree (1,1,1,1,1)
  (same comment as for Carbon monoxide, non-fossil)
- Particulates, < 2.5 um [air, urban air close to ground]: 1.45949e-10 kg; lognormal variance with pedigree 0.30374, pedigree (1,1,3,1,1)
  (same comment as for Carbon monoxide, non-fossil)
- Lead [water, surface water]: 1.81312e-14 kg; lognormal variance with pedigree 2.271, pedigree (1,1,3,1,1)
  (same comment as for Sodium, ion)
- Carbon monoxide, fossil [air, urban air close to ground]: 0 kg; pedigree (1,1,1,1,1)
  (same comment as for Carbon monoxide, non-fossil)
- Calcium, ion [water, surface water]: 0 kg; pedigree (1,1,1,1,1)
  (same comment as for Sodium, ion)
- Chromium VI [water, ground-, long-term]: 0 kg; pedigree (1,1,1,1,1)
  (same comment as for Chloride)
- Copper, ion [water, surface water]: 7.88403e-15 kg; lognormal variance with pedigree 2.3977, pedigree (1,1,3,1,1)
  (same comment as for Sodium, ion)
- Benzene, pentachloro- [air, urban air close to ground]: 0 kg; pedigree (1,1,1,1,1)
  (same comment as for Carbon monoxide, non-fossil)
- Zinc, ion [water, ground-, long-term]: 0 kg; pedigree (1,1,1,1,1)
  (same comment as for Chloride)
- Toluene [air, urban air close to ground]: 0 kg; pedigree (1,1,1,1,1)
  (same comment as for Carbon monoxide, non-fossil)
- Calcium, ion [water, ground-, long-term]: 0 kg; pedigree (1,1,1,1,1)
  (same comment as for Chloride)
- Dioxins, measured as 2,3,7,8-tetrachlorodibenzo-p-dioxin [air, urban air close to ground]: 0 kg; pedigree (1,1,1,1,1)
  (same comment as for Carbon monoxide, non-fossil)
- Sodium, ion [water, ground-, long-term]: 0 kg; pedigree (1,1,1,1,1)
  (same comment as for Chloride)
- Particulates, > 2.5 um, and < 10um [air, urban air close to ground]: 0 kg; pedigree (1,1,1,1,1)
  (same comment as for Carbon monoxide, non-fossil)
- Chromium VI [water, surface water]: 0 kg; pedigree (1,1,1,1,1)
  (same comment as for Sodium, ion)
- Water [water, surface water]: 5.68751e-7 m3; lognormal variance with pedigree 0.10397, pedigree (1,1,3,1,1)
  Process water released to surface water.
  Uncertainty: uncertainty calculated from uncertainty in process water input and the uncertainty of fraction to surface water.
- Zinc, ion [water, surface water]: 8.26426e-14 kg; lognormal variance with pedigree 2.5093, pedigree (1,1,3,1,1)
  (same comment as for Sodium, ion)
- Methane, fossil [air, urban air close to ground]: 0 kg; pedigree (1,1,1,1,1)
  (same comment as for Carbon monoxide, non-fossil)
- Heat, waste [water, surface water]: 0 MJ; pedigree (1,1,1,1,1)
  Waste heat generated from heating value of this waste plus any electricity required to process it.
  Uncertainty: uncertainty is calculated from uncertainties in waste composition and uncertainties in energy efficiency and the uncertainty in internal energy demand
- Chloride [water, surface water]: 0 kg; pedigree (1,1,1,1,1)
  (same comment as for Sodium, ion)
- Methane, non-fossil [air, urban air close to ground]: 0 kg; pedigree (1,1,1,1,1)
  (same comment as for Carbon monoxide, non-fossil)
- Benzo(a)pyrene [air, urban air close to ground]: 0 kg; pedigree (1,1,1,1,1)
  (same comment as for Carbon monoxide, non-fossil)
- Heat, waste [air, urban air close to ground]: 0 MJ; pedigree (1,1,1,1,1)
  (same comment as for Heat, waste)
- NMVOC, non-methane volatile organic compounds, unspecified origin [air, urban air close to ground]: 2.30278e-10 kg; lognormal variance with pedigree 0.0431, pedigree (1,1,3,1,1)
  (same comment as for Carbon monoxide, non-fossil)
- Benzene, hexachloro- [air, urban air close to ground]: 0 kg; pedigree (1,1,1,1,1)
  (same comment as for Carbon monoxide, non-fossil)
- Silicon [water, ground-, long-term]: 0 kg; pedigree (1,1,1,1,1)
  (same comment as for Chloride)
- Phenol, pentachloro- [air, urban air close to ground]: 0 kg; pedigree (1,1,1,1,1)
  (same comment as for Carbon monoxide, non-fossil)
- Silicon [water, surface water]: 0 kg; pedigree (1,1,1,1,1)
  (same comment as for Sodium, ion)
- Nitrogen [water, unspecified]: 3.18063e-8 kg; source Avadí, A. 2018; triangular min 3.18063e-8, mostLikely 3.18063e-8, max 3.18063e-8, pedigree (2,3,3,1,1)
  Emissions to water from process waters
  Uncertainty: Data from 1 plant, assumptions for larger plants
- Phosphorus [water, unspecified]: 6.60206e-9 kg; source Angel Avadí 2014; triangular min 6.60206e-9, mostLikely 6.60206e-9, max 6.60206e-9, pedigree (2,3,3,1,1)
  (same comment as for Nitrogen)
- Arsenic, ion [water, unspecified]: 2.01653e-11 kg
  (same comment as for integrated circuit, logic type)
- Arsenic [air, unspecified]: 1.42195e-12 kg
  (same comment as for integrated circuit, logic type)
- Lead [air, unspecified]: 4.01062e-12 kg
  (same comment as for integrated circuit, logic type)
- Lead [soil, unspecified]: 3.36555e-14 kg
  (same comment as for integrated circuit, logic type)
- Arsenic [soil, unspecified]: 5.60926e-15 kg
  (same comment as for integrated circuit, logic type)
- Lead [water, unspecified]: 9.70401e-11 kg
  (same comment as for integrated circuit, logic type)
- Mercury [air, urban air close to ground]: 1.40231e-11 kg; lognormal variance with pedigree 0.0512, pedigree (1,4,4,4,2)
  (same comment as for integrated circuit, logic type)
- NMVOC, non-methane volatile organic compounds, unspecified origin [air, unspecified]: 2.15151e-9 kg; lognormal variance with pedigree 0.1746, pedigree (2,4,5,5,1)
- Benzo(a)pyrene [air, unspecified]: 0 kg; pedigree (1,1,1,1,1)
  estimation
- Water [water, unspecified]: 4.25523e-9 m3; lognormal variance with pedigree 0.0807, pedigree (2,2,5,1,1)
  Calculated value based on literature values and expert opinion. See comments in the parametres' comment field.
- Cadmium [air, unspecified]: 0 kg; source MAN Nutzfahrzeuge AG 2000; pedigree (1,1,1,1,1)
  Calculated value. Based on the diesel consumption for engine testing, direct environmental emissions to air are calculated, employing the emission profile of a lorry 28t empty. Is assumed that diesel is used for engine testing and the operation of fork-lifters. The latter is modeled as building machine.Energy expenditures for stationary combustion processes are available from environmental reports of a German lorry manufacturer MAN Nutzfahrzeuge AG (2000) and MAN Nutzfahrzeuge AG (2002).
  Additional references:
  MAN Nutzfahrzeuge AG (2002) Umwelterklärung 2002. MAN Nutzfahrzeuge AG, München.
- BOD5, Biological Oxygen Demand [water, unspecified]: 7.93003e-12 kg; source Frischknecht R. 2003; lognormal variance with pedigree 0.16, pedigree (1,1,5,1,1)
  Calculated value according to ecoinvent quality guidelines Frischknecht et al. (2003).
- Particulates, > 2.5 um, and < 10um [air, unspecified]: 1.33426e-12 kg; source MAN Nutzfahrzeuge AG 2000; lognormal variance with pedigree 0.16, pedigree (1,1,5,1,1)
  (same comment as for Cadmium)
- Carbon dioxide, fossil [air, unspecified]: 3.98391e-8 kg; source MAN Nutzfahrzeuge AG 2000; lognormal variance with pedigree 0.16, pedigree (1,1,5,1,1)
  (same comment as for Cadmium)
- Carbon monoxide, fossil [air, unspecified]: 6.12375e-11 kg; source MAN Nutzfahrzeuge AG 2000; lognormal variance with pedigree 0.16, pedigree (1,1,5,1,1)
  (same comment as for Cadmium)
- Toluene [air, unspecified]: 3.46782e-13 kg; source MAN Nutzfahrzeuge AG 2000; lognormal variance with pedigree 0.16, pedigree (1,1,5,1,1)
  (same comment as for Cadmium)
- Chromium [air, unspecified]: 1.84405e-14 kg; source MAN Nutzfahrzeuge AG 2000; lognormal variance with pedigree 0.69, pedigree (1,1,5,1,1)
  (same comment as for Cadmium)
- Particulates, < 2.5 um [air, unspecified]: 1.59859e-11 kg; source MAN Nutzfahrzeuge AG 2000; lognormal variance with pedigree 0.16, pedigree (1,1,5,1,1)
  (same comment as for Cadmium)
- Sulfur dioxide [air, unspecified]: 7.5554e-12 kg; source MAN Nutzfahrzeuge AG 2000; lognormal variance with pedigree 0.16, pedigree (1,1,5,1,1)
  (same comment as for Cadmium)
- Xylene [air, unspecified]: 3.46782e-13 kg; source MAN Nutzfahrzeuge AG 2000; lognormal variance with pedigree 0.16, pedigree (1,1,5,1,1)
  (same comment as for Cadmium)
- COD, Chemical Oxygen Demand [water, unspecified]: 7.93003e-12 kg; source MAN Nutzfahrzeuge AG 2002; lognormal variance with pedigree 0.16, pedigree (1,1,5,1,1)
  Literature value. For automotive stamping, a Chemical Oxygen Demand (COD) is reported MAN Nutzfahrzeuge AG (2002) with 12800 kg/year resulting in a specific COD of 0.126 kg/vehicle.
- Nickel [air, unspecified]: 0 kg; source MAN Nutzfahrzeuge AG 2000; pedigree (1,1,1,1,1)
  (same comment as for Cadmium)
- Ammonia [air, unspecified]: 1.40352e-12 kg; source MAN Nutzfahrzeuge AG 2000; lognormal variance with pedigree 0.16, pedigree (1,1,5,1,1)
  (same comment as for Cadmium)
- Benzene [air, unspecified]: 8.24471e-13 kg; source MAN Nutzfahrzeuge AG 2000; lognormal variance with pedigree 0.16, pedigree (1,1,5,1,1)
  (same comment as for Cadmium)
- Selenium [air, unspecified]: 0 kg; source MAN Nutzfahrzeuge AG 2000; pedigree (1,1,1,1,1)
  (same comment as for Cadmium)
- Copper [air, unspecified]: 1.84408e-14 kg; source MAN Nutzfahrzeuge AG 2000; lognormal variance with pedigree 0.69, pedigree (1,1,5,1,1)
  (same comment as for Cadmium)
- Dinitrogen monoxide [air, unspecified]: 1.40349e-12 kg; source MAN Nutzfahrzeuge AG 2000; lognormal variance with pedigree 0.16, pedigree (1,1,5,1,1)
  (same comment as for Cadmium)
- Nitrogen oxides [air, unspecified]: 3.77627e-10 kg; source MAN Nutzfahrzeuge AG 2000; lognormal variance with pedigree 0.16, pedigree (1,1,5,1,1)
  (same comment as for Cadmium)
- Mercury [air, unspecified]: 0 kg; source MAN Nutzfahrzeuge AG 2000; pedigree (1,1,1,1,1)
  (same comment as for Cadmium)
- Particulates, > 10 um [air, unspecified]: 6.86179e-13 kg; source MAN Nutzfahrzeuge AG 2000; lognormal variance with pedigree 0.16, pedigree (1,1,5,1,1)
  (same comment as for Cadmium)
- TOC, Total Organic Carbon [water, unspecified]: 3.46782e-12 kg; source Frischknecht R. 2003; lognormal variance with pedigree 0.16, pedigree (1,1,5,1,1)
  Calculated value according to ecoinvent quality guidelines Frischknecht et al. (2003).
- Methane, fossil [air, unspecified]: 1.03846e-12 kg; source MAN Nutzfahrzeuge AG 2000; lognormal variance with pedigree 0.16, pedigree (1,1,5,1,1)
  (same comment as for Cadmium)
- DOC, Dissolved Organic Carbon [water, unspecified]: 3.46782e-12 kg; source Frischknecht R. 2003; lognormal variance with pedigree 0.16, pedigree (1,1,5,1,1)
  Calculated value according to ecoinvent quality guidelines Frischknecht et al. (2003).
- Water [air, unspecified]: 1.23024e-8 m3; lognormal variance with pedigree 0.0807, pedigree (2,2,5,1,1)
  (same comment as for Water)
- Zinc [air, unspecified]: 1.09268e-14 kg; source MAN Nutzfahrzeuge AG 2000; lognormal variance with pedigree 0.69, pedigree (1,1,5,1,1)
  (same comment as for Cadmium)
- Carbon dioxide, fossil [air, urban air close to ground]: 1.07029e-8 kg; lognormal variance with pedigree 0.0882, pedigree (4,2,5,3,1)
  Estimation for decomposition of carbonates
  Uncertainty: Estimation for decomposition of carbonates
- Nitrogen oxides [air, urban air close to ground]: 6.34448e-9 kg; lognormal variance with pedigree 0.0808, pedigree (2,2,5,3,1)
  Questionnaire
  Uncertainty: Questionnaire
- COD, Chemical Oxygen Demand [water, surface water]: 6.34406e-11 kg; lognormal variance with pedigree 0.0927, pedigree (2,4,5,3,1)
  Uncertainty: LCI of one passenger car
- BOD5, Biological Oxygen Demand [water, surface water]: 4.73852e-11 kg; lognormal variance with pedigree 0.0927, pedigree (2,4,5,3,1)
  Uncertainty: LCI of one passenger car
- TOC, Total Organic Carbon [water, surface water]: 2.35781e-11 kg; lognormal variance with pedigree 0.0927, pedigree (2,4,5,3,1)
  Calculated by default as TOC (gC) = COD/2.7 (COD measured in g O2). Should more correctly be calculated from the carbon content of the specified emissions to water.
  Uncertainty: LCI of one passenger car
- DOC, Dissolved Organic Carbon [water, surface water]: 2.35781e-11 kg; lognormal variance with pedigree 0.0927, pedigree (2,4,5,3,1)
  Calculated as equal to TOC.
  Uncertainty: LCI of one passenger car
- Phosphate [water, surface water]: 3.3736e-9 kg; lognormal variance with pedigree 0.0927, pedigree (2,4,5,3,1)
  Uncertainty: LCI of one passenger car
- Phenol [water, surface water]: 0 kg; source Socolof M. L. 2001; pedigree (1,1,1,1,1)
  Estimation, based on literature. A 50:50 split between module assembly and monitor assembly is used.
  Uncertainty: data from an US-EPA LCA study
- Iron, ion [water, surface water]: 5.67229e-15 kg; source Socolof M. L. 2001; lognormal variance with pedigree 0.6907, pedigree (1,3,5,3,1)
  (same comment as for Phenol)
- Cadmium, ion [water, surface water]: 1.41713e-15 kg; source Socolof M. L. 2001; lognormal variance with pedigree 0.6907, pedigree (1,3,5,3,1)
  (same comment as for Phenol)
- Sodium tetrahydridoborate [air, urban air close to ground]: 3.83789e-11 kg; source Socolof M. L. 2001; lognormal variance with pedigree 0.1607, pedigree (1,3,5,3,1)
  (same comment as for Phenol)
- Phosphorus [water, surface water]: 9.29293e-12 kg; source Socolof M. L. 2001; lognormal variance with pedigree 0.0807, pedigree (1,3,5,3,1)
  (same comment as for Phenol)
- Antimony [water, surface water]: 0 kg; source Socolof M. L. 2001; pedigree (1,1,1,1,1)
  (same comment as for Phenol)
- Boron [water, surface water]: 9.87498e-15 kg; source Socolof M. L. 2001; lognormal variance with pedigree 0.0807, pedigree (1,3,5,3,1)
  (same comment as for Phenol)
- Fluoride [water, surface water]: 2.78505e-11 kg; source Socolof M. L. 2001; lognormal variance with pedigree 0.0807, pedigree (1,3,5,3,1)
  (same comment as for Phenol)
- Boric acid [air, urban air close to ground]: 2.95388e-15 kg; source Socolof M. L. 2001; lognormal variance with pedigree 0.1607, pedigree (1,3,5,3,1)
  (same comment as for Phenol)
- Sulfur hexafluoride [air, urban air close to ground]: 2.31197e-13 kg; source Socolof M. L. 2001; lognormal variance with pedigree 0.2426, pedigree (3,3,5,1,4)
  Estimation, based on literature. A 50:50 split between module assembly and monitor assembly is used.
  Uncertainty: tier 2b default emission factor according to IPCC guidelines
- Phosphine [air, urban air close to ground]: 1.34973e-10 kg; source Socolof M. L. 2001; lognormal variance with pedigree 0.0807, pedigree (1,3,5,3,1)
  (same comment as for Phenol)
- Nitrogen fluoride [air, urban air close to ground]: 5.78084e-14 kg; source Socolof M. L. 2001; lognormal variance with pedigree 0.1626, pedigree (3,3,5,1,4)
  (same comment as for Sulfur hexafluoride)
- Manganese [water, surface water]: 0 kg; source Socolof M. L. 2001; pedigree (1,1,1,1,1)
  (same comment as for Phenol)
- Oils, unspecified [water, surface water]: 4.35536e-13 kg; source Socolof M. L. 2001; lognormal variance with pedigree 0.3407, pedigree (1,3,5,3,1)
  (same comment as for Phenol)
- Acetic acid [air, urban air close to ground]: 2.93236e-12 kg; source Socolof M. L. 2001; lognormal variance with pedigree 0.1607, pedigree (1,3,5,3,1)
  (same comment as for Phenol)
- Mercury [water, surface water]: 0 kg; source Socolof M. L. 2001; pedigree (1,1,1,1,1)
  (same comment as for Phenol)
- Chromium, ion [water, surface water]: 1.90603e-14 kg; source Socolof M. L. 2001; lognormal variance with pedigree 0.6907, pedigree (1,3,5,3,1)
  (same comment as for Phenol)
- Nitrogen [water, surface water]: 1.7098e-10 kg; source Socolof M. L. 2001; lognormal variance with pedigree 0.0807, pedigree (1,3,5,3,1)
  (same comment as for Phenol)
- Phosphoric acid [air, urban air close to ground]: 1.0457e-13 kg; source Socolof M. L. 2001; lognormal variance with pedigree 0.0807, pedigree (1,3,5,3,1)
  (same comment as for Phenol)
- Arsenic, ion [water, surface water]: 0 kg; source Socolof M. L. 2001; pedigree (1,1,1,1,1)
  (same comment as for Phenol)
- Acetone [air, urban air close to ground]: 4.01035e-13 kg; source Socolof M. L. 2001; lognormal variance with pedigree 0.1607, pedigree (1,3,5,3,1)
  (same comment as for Phenol)
- Hydrocarbons, aromatic [water, surface water]: 1.26776e-12 kg; source Socolof M. L. 2001; lognormal variance with pedigree 0.3407, pedigree (1,3,5,3,1)
  (same comment as for Phenol)
- Ethane, 1,1,1-trichloro-, HCFC-140 [water, surface water]: 0 kg; source Socolof M. L. 2001; pedigree (1,1,1,1,1)
  (same comment as for Phenol)
- Hydrogen fluoride [air, urban air close to ground]: 1.12336e-10 kg; source Socolof M. L. 2001; lognormal variance with pedigree 0.0807, pedigree (1,3,5,3,1)
  (same comment as for Phenol)
- Boron trifluoride [air, urban air close to ground]: 1.9793e-11 kg; source Socolof M. L. 2001; lognormal variance with pedigree 0.1607, pedigree (1,3,5,3,1)
  (same comment as for Phenol)
- Cyclohexane [air, urban air close to ground]: 1.0457e-13 kg; source Socolof M. L. 2001; lognormal variance with pedigree 0.1607, pedigree (1,3,5,3,1)
  (same comment as for Phenol)
- Solids, inorganic [water, surface water]: 1.62784e-11 kg; source Socolof M. L. 2001; lognormal variance with pedigree 0.0807, pedigree (1,3,5,3,1)
  (same comment as for Phenol)
- Hydrogen chloride [air, urban air close to ground]: 1.30659e-10 kg; source Socolof M. L. 2001; lognormal variance with pedigree 0.0807, pedigree (1,3,5,3,1)
  (same comment as for Phenol)
- Hydrogen [air, urban air close to ground]: 2.86761e-13 kg; source Socolof M. L. 2001; lognormal variance with pedigree 0.0807, pedigree (1,3,5,3,1)
  (same comment as for Phenol)
- Ammonia [air, urban air close to ground]: 1.34327e-10 kg; source Socolof M. L. 2001; lognormal variance with pedigree 0.1607, pedigree (1,3,5,3,1)
  (same comment as for Phenol)
- Nickel, ion [water, surface water]: 0 kg; source Socolof M. L. 2001; pedigree (1,1,1,1,1)
  (same comment as for Phenol)
- Cyanide [water, surface water]: 7.89146e-15 kg; source Socolof M. L. 2001; lognormal variance with pedigree 0.0807, pedigree (1,3,5,3,1)
  (same comment as for Phenol)
- Tetramethyl ammonium hydroxide [air, urban air close to ground]: 1.38641e-9 kg; source Socolof M. L. 2001; lognormal variance with pedigree 0.1607, pedigree (1,3,5,3,1)
  (same comment as for Phenol)
- Diethylene glycol [air, urban air close to ground]: 2.08925e-13 kg; source Socolof M. L. 2001; lognormal variance with pedigree 0.1607, pedigree (1,3,5,3,1)
  (same comment as for Phenol)
- Boron [water, ocean]: 1.80654e-8 kg; lognormal variance with pedigree 0.046, pedigree (3,4,3,1,1)
  Calculated value. Mass of ion returned to the ocean with the concentrate as calculated by modeling for seawater reverse osmosis with conventional pretreatment considering single stage baseline 8-inch spiral wound modules using ROSA system design software (Dow Chemical). Note that the impact from emission of concentrate reside mostly in the high ion loaded water and small area of release which individual substance emissions will not be well acounted by impact models.
- Carbon dioxide, non-fossil [air, non-urban air or from high stacks]: 5.42855e-8 kg; lognormal variance with pedigree 0.0446, pedigree (5,4,3,1,1)
  Calculated value. Mass of carbon dioxide emitted to air assuming carbon dioxide in concentrate under pressure will all be emited to air after release of concentrate at atmospheric conditions. Concentraiton in concentrate was calculated by modeling seawater reverse osmosis using ROSA system design software (Dow Chemical).
- Potassium, ion [water, ocean]: 1.70333e-6 kg; lognormal variance with pedigree 0.046, pedigree (3,4,3,1,1)
  (same comment as for Boron)
- Hydrogen carbonate [water, ocean]: 5.75124e-7 kg; lognormal variance with pedigree 0.046, pedigree (3,4,3,1,1)
  Calculated value. Mass of ion returned to the ocean with the concentrate as calculated by modeling for seawater reverse osmosis with conventional pretreatment considering single stage baseline 8-inch spiral wound modules using ROSA system design software (Dow Chemical) and RWT for recarbonisation. Note that the impact from emission of concentrate reside mostly in the high ion loaded water and small area of release which individual substance emissions will not be well acounted by impact models.
- Strontium [water, ocean]: 5.75119e-8 kg; lognormal variance with pedigree 0.046, pedigree (3,4,3,1,1)
  (same comment as for Boron)
- Chloride [water, ocean]: 8.51076e-5 kg; lognormal variance with pedigree 0.046, pedigree (3,4,3,1,1)
  (same comment as for Boron)
- Water [water, ocean]: 2.48645e-6 m3; lognormal variance with pedigree 0.0066, pedigree (3,4,3,1,1)
  Calculated value. Volume of concentrate (water returned to the environment) based production of 1 kg of tap water and on recovery rate.
- Fluoride [water, ocean]: 4.41455e-9 kg; lognormal variance with pedigree 0.046, pedigree (3,4,3,1,1)
  (same comment as for Boron)
- Sodium, ion [water, ocean]: 4.72999e-5 kg; lognormal variance with pedigree 0.046, pedigree (3,4,3,1,1)
  (same comment as for Boron)
- Carbonate [water, ocean]: 5.28882e-9 kg; lognormal variance with pedigree 0.046, pedigree (3,4,3,1,1)
  (same comment as for Hydrogen carbonate)
- Calcium, ion [water, ocean]: 1.79582e-6 kg; lognormal variance with pedigree 0.046, pedigree (3,4,3,1,1)
  (same comment as for Hydrogen carbonate)
- Sulfate [water, ocean]: 1.20578e-5 kg; lognormal variance with pedigree 0.046, pedigree (3,4,3,1,1)
  (same comment as for Boron)
- Magnesium [water, ocean]: 5.71032e-6 kg; lognormal variance with pedigree 0.046, pedigree (3,4,3,1,1)
  (same comment as for Boron)
- Cadmium [air, non-urban air or from high stacks]: 3.91769e-15 kg; lognormal variance with pedigree 0.652, pedigree (1,1,3,1,1)
  Measured value.
- Dioxins, measured as 2,3,7,8-tetrachlorodibenzo-p-dioxin [air, non-urban air or from high stacks]: 0 kg; pedigree (1,1,1,1,1)
  Measured value. Reported as Dioxins.
- Nitrogen oxides [air, non-urban air or from high stacks]: 2.35719e-7 kg; lognormal variance with pedigree 0.042, pedigree (1,1,3,1,1)
  Measured value. Reported as NO2.
- Copper [air, non-urban air or from high stacks]: 6.5244e-15 kg; lognormal variance with pedigree 0.652, pedigree (1,1,3,1,1)
  Measured value.
- Sulfur dioxide [air, non-urban air or from high stacks]: 1.71579e-10 kg; lognormal variance with pedigree 0.0026, pedigree (1,1,3,1,1)
  Measured value.
- Carbon dioxide, fossil [air, non-urban air or from high stacks]: 4.44672e-7 kg; lognormal variance with pedigree 0.0026, pedigree (1,1,3,1,1)
  Measured value. Emissions from carbonates and concentrate.
- Carbon monoxide, fossil [air, non-urban air or from high stacks]: 4.97799e-13 kg; lognormal variance with pedigree 0.652, pedigree (1,1,3,1,1)
  Measured value.
- Sulfuric acid [air, non-urban air or from high stacks]: 1.75475e-12 kg; lognormal variance with pedigree 0.042, pedigree (1,1,3,1,1)
  Measured value.
- Selenium [water, surface water]: 1.23476e-14 kg; lognormal variance with pedigree 0.652, pedigree (1,1,3,1,1)
  Measured value.
- Particulates, < 2.5 um [air, non-urban air or from high stacks]: 1.80132e-12 kg; lognormal variance with pedigree 0.302, pedigree (1,1,3,1,1)
  Measured value.
- Particulates, > 2.5 um, and < 10um [air, non-urban air or from high stacks]: 2.75492e-13 kg; lognormal variance with pedigree 0.122, pedigree (1,1,3,1,1)
  Measured value.
- Zinc [air, non-urban air or from high stacks]: 7.05879e-13 kg; lognormal variance with pedigree 0.652, pedigree (1,1,3,1,1)
  Measured value.
- Mercury [air, non-urban air or from high stacks]: 0 kg; pedigree (1,1,1,1,1)
  Measured value.
- Particulates, > 10 um [air, non-urban air or from high stacks]: 2.63381e-13 kg; lognormal variance with pedigree 0.042, pedigree (1,1,3,1,1)
  Measured value.
- Lead [air, non-urban air or from high stacks]: 5.91549e-15 kg; lognormal variance with pedigree 0.652, pedigree (1,1,3,1,1)
  Measured value.
- Arsenic [air, non-urban air or from high stacks]: 0 kg; pedigree (1,1,1,1,1)
  Measured value.
- Ammonia [air, non-urban air or from high stacks]: 2.3691e-7 kg; source EEA 2013; lognormal variance with pedigree 0.0387216, pedigree (2,2,3,1,1)
  Calculated value - EMEP/EEA (2013). See 'WFLDB-Guidelines.pdf', available at https://ecoquery.ecoinvent.org/File/Reports.
- Cadmium [soil, agricultural]: 3.38824e-11 kg; source Freiermuth R.  2006
  Comment on mathematicalRelation:
  1.4658166308e-08 from Calculated value - Freiermuth (2006). See 'WFLDB-Guidelines.pdf', available at https://ecoquery.ecoinvent.org/File/Reports.
  -5.56437686799e-09 from Crop, default, heavy metals uptake model
  Heavy metal uptake can be excluded by setting the parameter heavyMetalUptakeSwitch to zero.
- Chromium [soil, agricultural]: 4.24204e-10 kg; source Freiermuth R.  2006
  Comment on mathematicalRelation:
  1.34804305605e-07 from Calculated value - Freiermuth (2006). See 'WFLDB-Guidelines.pdf', available at https://ecoquery.ecoinvent.org/File/Reports.
  -2.98659187813e-08 from Crop, default, heavy metals uptake model
  Heavy metal uptake can be excluded by setting the parameter heavyMetalUptakeSwitch to zero.
- Copper [soil, agricultural]: -8.12783e-10 kg; source Freiermuth R.  2006
  Comment on mathematicalRelation:
  5.89906400698e-08 from Calculated value - Freiermuth (2006). See 'WFLDB-Guidelines.pdf', available at https://ecoquery.ecoinvent.org/File/Reports.
  Heavy metal uptake can be excluded by setting the parameter heavyMetalUptakeSwitch to zero.
- Lead [soil, agricultural]: 4.24918e-11 kg; source Freiermuth R.  2006
  Comment on mathematicalRelation:
  -2.96341154117e-08 from Crop, default, heavy metals uptake model
  Heavy metal uptake can be excluded by setting the parameter heavyMetalUptakeSwitch to zero.
- Mercury [soil, agricultural]: -3.24402e-12 kg; source Freiermuth R.  2006
  Comment on mathematicalRelation:
  9.86088857224e-10 from Calculated value - Freiermuth (2006). See 'WFLDB-Guidelines.pdf', available at https://ecoquery.ecoinvent.org/File/Reports.
  -2.22246275614e-09 from Crop, default, heavy metals uptake model
  Heavy metal uptake can be excluded by setting the parameter heavyMetalUptakeSwitch to zero.
- Nickel [soil, agricultural]: 2.07163e-11 kg; source Freiermuth R.  2006
  Comment on mathematicalRelation:
  5.76088090407e-08 from Calculated value - Freiermuth (2006). See 'WFLDB-Guidelines.pdf', available at https://ecoquery.ecoinvent.org/File/Reports.
  -5.72439243284e-08 from Crop, default, heavy metals uptake model
  Heavy metal uptake can be excluded by setting the parameter heavyMetalUptakeSwitch to zero.
- Zinc [soil, agricultural]: -3.34364e-9 kg; source Freiermuth R.  2006
  Comment on mathematicalRelation:
  4.81628211661e-07 from Calculated value - Freiermuth (2006). See 'WFLDB-Guidelines.pdf', available at https://ecoquery.ecoinvent.org/File/Reports.
  -1.75485562777e-06 from Crop, default, heavy metals uptake model
  Heavy metal uptake can be excluded by setting the parameter heavyMetalUptakeSwitch to zero.
- Pesticides, unspecified [soil, agricultural]: 2.55831e-7 kg; lognormal variance with pedigree 0.0387216, pedigree (2,2,3,1,1)
  Calculated value - 100% emission in soil. See 'WFLDB-Guidelines.pdf', available at https://ecoquery.ecoinvent.org/File/Reports.
- Dinitrogen monoxide [air, non-urban air or from high stacks]: 1.24809e-7 kg; source IPCC 2006; lognormal variance with pedigree 0.118664, pedigree (2,2,3,1,1)
  Calculated value - IPCC (2006). See 'WFLDB-Guidelines.pdf', available at https://ecoquery.ecoinvent.org/File/Reports.
- Water [air, non-urban air or from high stacks]: 6.37749e-6 m3; lognormal variance with pedigree 0.118177, pedigree (2,1,3,1,1)
  Calculated value - Emission calculated from water balance. See 'WFLDB-Guidelines.pdf', available at https://ecoquery.ecoinvent.org/File/Reports.
- Phosphate [water, ground-]: 1.26839e-9 kg; source Prasuhn V.  2006; lognormal variance with pedigree 0.169866, pedigree (2,2,3,1,1)
  Calculated value - Prasuhn (2006). See 'WFLDB-Guidelines.pdf', available at https://ecoquery.ecoinvent.org/File/Reports.
- Cadmium, ion [water, ground-]: 2.70221e-13 kg; source Freiermuth R.  2006; lognormal variance with pedigree 0.350938, pedigree (2,2,3,1,1)
  Calculated value - Freiermuth (2006). See 'WFLDB-Guidelines.pdf', available at https://ecoquery.ecoinvent.org/File/Reports.
- Chromium, ion [water, ground-]: 1.20436e-10 kg; source Freiermuth R.  2006; lognormal variance with pedigree 0.350938, pedigree (2,2,3,1,1)
  (same comment as for Cadmium, ion)
- Copper, ion [water, ground-]: 1.98448e-11 kg; source Freiermuth R.  2006; lognormal variance with pedigree 0.350938, pedigree (2,2,3,1,1)
  (same comment as for Cadmium, ion)
- Lead [water, ground-]: 1.84477e-12 kg; source Freiermuth R.  2006; lognormal variance with pedigree 0.350938, pedigree (2,2,3,1,1)
  (same comment as for Cadmium, ion)
- Mercury [water, ground-]: 6.9693e-15 kg; source Freiermuth R.  2006; lognormal variance with pedigree 0.350938, pedigree (2,2,3,1,1)
  (same comment as for Cadmium, ion)
- Zinc, ion [water, ground-]: 1.45747e-10 kg; source Freiermuth R.  2006; lognormal variance with pedigree 0.350938, pedigree (2,2,3,1,1)
  (same comment as for Cadmium, ion)
- Water [water, ground-]: 1.41743e-7 m3; lognormal variance with pedigree 0.118177, pedigree (2,1,3,1,1)
  (same comment as for Water)
- Nitrate [water, ground-]: 1.06751e-7 kg
  Calculated value - Torellas et al. (2012): Water emissions of NO3: 359 kg/ha (The irrigation system is an open- loop drip system, without recirculation of drainage water). See 'WFLDB-Guidelines.pdf', available at https://ecoquery.ecoinvent.org/File/Reports.
- Fungicides, unspecified [soil, agricultural]: 8.47466e-9 kg; lognormal variance with pedigree 0.0387216, pedigree (2,2,3,1,1)
  (same comment as for Pesticides, unspecified)
- Insecticides, unspecified [soil, agricultural]: 1.12996e-9 kg; lognormal variance with pedigree 0.0387216, pedigree (2,2,3,1,1)
  (same comment as for Pesticides, unspecified)
- NMVOC, non-methane volatile organic compounds, unspecified origin [air, non-urban air or from high stacks]: 2.84637e-8 kg; lognormal variance with pedigree 0.0607, pedigree (2,2,5,5,3)
  Derived from the used paint and solvent, assuming all solvent is emitted to air.
  Uncertainty: Derived from the used paint and solvent, assuming all solvent is emitted to air.
- Mercury [water, ocean]: 0 kg; pedigree (1,1,1,1,1)
  Amount based on primary data collected from participating companies.
- Molybdenum [air, unspecified]: 0 kg; pedigree (1,1,1,1,1)
  Amount based on primary data collected from participating companies.
- Manganese [air, unspecified]: 0 kg; pedigree (1,1,1,1,1)
  Amount based on primary data collected from participating companies.
- Hydrocarbons, unspecified [air, non-urban air or from high stacks]: 0 kg; pedigree (1,1,1,1,1)
  Amount based on primary data collected from participating companies.
- Zinc, ion [water, ocean]: 0 kg; pedigree (1,1,1,1,1)
  Amount based on primary data collected from participating companies.
- Iron, ion [water, ocean]: 0 kg; pedigree (1,1,1,1,1)
  Amount based on primary data collected from participating companies.
- Suspended solids, unspecified [water, surface water]: 0 kg; pedigree (1,1,1,1,1)
  Amount based on primary data collected from participating companies.
- Hydrogen chloride [air, unspecified]: 0 kg; pedigree (1,1,1,1,1)
  Amount based on primary data collected from participating companies.
- Thallium [water, ocean]: 0 kg; pedigree (1,1,1,1,1)
  Amount based on primary data collected from participating companies.
- Formaldehyde [air, unspecified]: 0 kg; pedigree (1,1,1,1,1)
  Amount based on primary data collected from participating companies.
- Lead [water, ocean]: 0 kg; pedigree (1,1,1,1,1)
  Amount based on primary data collected from participating companies.
- Sulfur [soil, industrial]: 1.27044e-14 kg; lognormal variance with pedigree 0.0426, pedigree (1,3,3,1,1)
  Amount based on primary data collected from participating companies.
- VOC, volatile organic compounds, unspecified origin [air, unspecified]: 0 kg; pedigree (1,1,1,1,1)
  Amount based on primary data collected from participating companies.
- Carbon dioxide, non-fossil [air, unspecified]: 0 kg; pedigree (1,1,1,1,1)
  Amount based on primary data collected from participating companies.
- Magnesium [water, surface water]: 0 kg; pedigree (1,1,1,1,1)
  Amount based on primary data collected from participating companies.
- Cobalt [air, unspecified]: 0 kg; pedigree (1,1,1,1,1)
  Amount based on primary data collected from participating companies.
- Sulfate [water, surface water]: 0 kg; pedigree (1,1,1,1,1)
  Amount based on primary data collected from participating companies.
- Dissolved solids [water, surface water]: 0 kg; pedigree (1,1,1,1,1)
  Amount based on primary data collected from participating companies.
- Sulfur oxides [air, unspecified]: 0 kg; pedigree (1,1,1,1,1)
  Amount based on primary data collected from participating companies.
- Cyanide [water, ocean]: 0 kg; pedigree (1,1,1,1,1)
  Amount based on primary data collected from participating companies.
- Dioxins, measured as 2,3,7,8-tetrachlorodibenzo-p-dioxin [air, unspecified]: 0 kg; pedigree (1,1,1,1,1)
  Amount based on primary data collected from participating companies.
- Sulfuric acid [air, unspecified]: 0 kg; pedigree (1,1,1,1,1)
  Amount based on primary data collected from participating companies.
- Cadmium, ion [water, ocean]: 0 kg; pedigree (1,1,1,1,1)
  Amount based on primary data collected from participating companies.
- COD, Chemical Oxygen Demand [water, ocean]: 0 kg; pedigree (1,1,1,1,1)
  Amount based on primary data collected from participating companies.
- Chlorine [air, unspecified]: 0 kg; pedigree (1,1,1,1,1)
  Amount based on primary data collected from participating companies.
- Copper, ion [water, ocean]: 0 kg; pedigree (1,1,1,1,1)
  Amount based on primary data collected from participating companies.
- Cobalt [water, surface water]: 0 kg; pedigree (1,1,1,1,1)
  Amount based on primary data collected from participating companies.
- PAH, polycyclic aromatic hydrocarbons [air, unspecified]: 0 kg; pedigree (1,1,1,1,1)
  Amount based on primary data collected from participating companies.
- Arsenic, ion [water, ocean]: 0 kg; pedigree (1,1,1,1,1)
  Amount based on primary data collected from participating companies.
- Nitrogen [water, ocean]: 0 kg; pedigree (1,1,1,1,1)
  Amount based on primary data collected from participating companies.
- Nickel, ion [water, ocean]: 0 kg; pedigree (1,1,1,1,1)
  Amount based on primary data collected from participating companies.
- Ammonium, ion [water, ocean]: 0 kg; pedigree (1,1,1,1,1)
  Amount based on primary data collected from participating companies.
- Ammonium, ion [water, surface water]: 0 kg; pedigree (1,1,1,1,1)
  Amount based on primary data collected from participating companies.
- Nitrate [water, surface water]: 0 kg; pedigree (1,1,1,1,1)
  Amount based on primary data collected from participating companies.
- Nitrate [water, ocean]: 0 kg; pedigree (1,1,1,1,1)
  Amount based on primary data collected from participating companies.
- Antimony [air, unspecified]: 0 kg; pedigree (1,1,1,1,1)
  Amount based on primary data collected from participating companies.
- Aluminium [water, surface water]: 0 kg; pedigree (1,1,1,1,1)
  Amount based on primary data collected from participating companies.
- Nitrogen dioxide [water, surface water]: 0 kg; pedigree (1,1,1,1,1)
  Amount based on primary data collected from participating companies.
- Acidity, unspecified [water, surface water]: 0 kg; pedigree (1,1,1,1,1)
  Amount based on primary data collected from participating companies.
- Sulfuric acid [water, surface water]: 0 kg; pedigree (1,1,1,1,1)
  Amount based on primary data collected from participating companies.
- Carbon dioxide, from soil or biomass stock [air, non-urban air or from high stacks]: 3.99818e-6 kg; normal variance with pedigree 0.5452, pedigree (3,3,5,5,2)
  Global average LUC emissions according 2nd edition of the Quantis-modified tool developed by Blonk Consultants 'WFLDB-adapted-Blonk 2014 direct-land-use-change-assessment-tool_2015-05-18a.xlsx', tab. 'Country & land use unknown'. The emission are based on the relative change in production areas in all countries for a given crop. The weighted average is used which takes into acount relative difference in crop expansion into primary forest, secondary forest, grassland, perennial and annual land.
