# petroleum production, onshore

Dataset: EcoSpold 2, unit process
Geography: RoW
Time period: 2000-01-01 to 2019-12-31
Technology level: current
Classification: ISIC rev.4 ecoinvent: 0610:Extraction of crude petroleum
Classification: EcoSpold01Categories: oil/production
Tags: ConvertedDataset
Scenario: Business-as-Usual
System model: Allocation at the point of substitution
Share of production covered: 100 %
Generated by: Niels Jungbluth
Published in: Jungbluth, N. 2007
Database: ecoinvent
isCopyrightProtected: true
accessRestrictedTo: 1

## General comment
Crude oil production in Libya and Algeria.
[This dataset was already contained in the ecoinvent database version 2. It was not individually updated during the transfer to ecoinvent version 3. Life Cycle Impact Assessment results may still have changed, as they are affected by changes in the supply chain, i.e. in other datasets. This dataset was generated following the ecoinvent quality guidelines for version 2. It may have been subject to central changes described in the ecoinvent version 3 change report (http://www.ecoinvent.org/database/ecoinvent-version-3/reports-of-changes/), and the results of the central updates were reviewed extensively. The changes added e.g. consistent water flows and other information throughout the database. The documentation of this dataset can be found in the ecoinvent reports of version 2, which are still available via the ecoinvent website. The change report linked above covers all central changes that were made during the conversion process.]

## Included activities end
Production of oil including energy use, infrastructure and emissions.

## Geography
Data for LY und DZ.

## Technology
Onshore crude oil production.

## Time period
Time of statistics.

## Parameters
- fraction, process water, to air: 0.15 dimensionless; name fraction_PW_to_air; lognormal variance with pedigree 0.092025, pedigree (4,4,3,2,4)

## Reference product
- petroleum: 1 kg; name petroleum_RP; CPC 12010: Petroleum oils and oils obtained from bituminous minerals, crude; By-product classification allocatable product
  EcoSpold01Location=RAF
  production volume 1.55e11 kg; name petroleum_RP_pv
    It is considered that 50% of petroleum extraction happens as stand-alone. The total production of petroleum in 2010 was 3.91E12 kg (2011, BP, BP Statistical Review of World Energy June 2011, 3 - SeparatePublication, http://www.bp.com/statisticalreview).
  property carbon content, fossil 0.85
    C-content of crude oil is 83-87% (ecoinven report 6_IV, Tab 3.2). An average C-content of 0.85 kg C/kg crude oil was considered
  property price 0.192 EUR2005
    Temporary price data. Calculated as 90% of purchasers price based on: Source: International Energy Agency (http://wds.iea.org/WDS/TableViewer/tableView.aspx downloaded 4 July 2009) for Germany and excl. taxes, applying diesel density of 0.844 kg/litre
  property carbon content 0.85
    carbon content on a dry matter basis (reserved; not for manual entry)
  property true value 0.192; name petroleum_RP_true_value
    allocation property applied in "true value" allocation // value calculated from revenue
  properties: dry mass 1 kg, water content 0, water in wet mass 0 kg, wet mass 1 kg, carbon content, non-fossil 0, carbon allocation 0.85 kg

## By-products
- electricity, for reuse in municipal waste incineration only: 0 kWh; CPC 17100: Electrical energy; By-product classification allocatable product; pedigree (1,1,1,1,1)
  Net electricity generated from this waste and used in internal MSWI plant energy redistribution.
  Uncertainty: uncertainty is calculated from uncertainties in waste composition and uncertainties in energy efficiency and the uncertainty in internal energy demand
  production volume 107.53 kWh
  property exergy 3.6 MJ; name E_el_prod_MSWI_exergy
    This exergy property is based on the exergy content of the product.
  property true value relation 3.6; name E_el_prod_MSWI_true_value_relation
    property to calculate "true value" from
  property price 0.1 EUR2005; name E_el_prod_MSWI_price_EUR2005
    Estimated to be the same price as in case of electricity, medium voltage.
  property true value 5.55237e-11
    allocation property applied in "true value" allocation // value calculated from true value relation
- heat, for reuse in municipal waste incineration only: 0 MJ; CPC 17300: Steam and hot water; By-product classification allocatable product; pedigree (1,1,1,1,1)
  Net useful heat generated from this waste and used in internal MSWI plant energy redistribution.
  Uncertainty: uncertainty is calculated from uncertainties in waste composition and uncertainties in energy efficiency and the uncertainty in internal energy demand
  production volume 763.379 MJ
  property true value relation 0.1842; name E_th_prod_MSWI_true_value_relation
    property to calculate "true value" from
  property exergy 0.1842 MJ; name E_th_prod_MSWI_exergy
    This exergy property is based on the exergy content of the product.
  property price 0.0106 EUR2005; name E_th_prod_MSWI_price_EUR2005
    Average European district heat price from Ecoheatcool and Euroheat 2005-2006, Ecoheat Work package 1: The European heat market. Final report. 10.6 EUR/GJ i s the price of district heat. http://www.solarthermalworld.org/files/Ecoheatcool%20WP1%20Web.pdf?download
  property true value 2.01696e-11
    (same comment as for electricity, for reuse in municipal waste incineration only)
- zinc concentrate: 0 kg; CPC 14290: Other non-ferrous metal ores and concentrates (other than uranium or thorium ores and concentrates); By-product classification allocatable product
  Calculated value from the knowledge of the properties of both products.
  production volume 2.6605e-6 kg
  property price 0.38 EUR2005; name ByP_price_EUR2005
    Temporary price data. Calculated as 90% of purchasers price based on: Zinc content in concentrate 53%. Concentrate price per kg Zn 86.5% of refined Zn price (13.5% treatment charges according to CHR Metals Limited 2005: Dynamic cost curves. http://www.minecost.com/dynamic.pdf). 2004 zinc price from USGS (2007) Mineral commodity summaries 2007. <http://minerals.usgs.gov/minerals/pubs/mcs/2007/mcs2007.pdf> [Accessed 25 May 2010]
  property zinc content 0.53; name zinc_C_zinc_concentrate
    Zinc content on a dry matter basis. Value taken from teh "zinc mine operation" /GLO dataset.
  property dry mass 1 kg; name DM_zinc_concentrate
  property carbon content 0
    carbon content on a dry matter basis (reserved; not for manual entry)
  property true value 6.30135e-18
    allocation property applied in "true value" allocation // value calculated from revenue
  properties: wet mass 1 kg, water content 0, carbon content, non-fossil 0, carbon content, fossil 0, water in wet mass 0 kg, carbon allocation 0 kg
- iron scrap, sorted, pressed: 0 kg; By-product classification Recyclable; CPC 39310: Slag, dross, scalings and other waste from the manufacture of iron or steel; pedigree (1,1,1,1,1)
  metallic iron scrap removed from ash reamains and recycled.
  Uncertainty: uncertainty is calculated from uncertainties in waste composition and transfer coefficients to soild residues
  production volume 3598.19 kg
  property price 0.175 EUR2005
    Temporary price data. Calculated as 90% of purchasers price based on: 2005 import and export prices (total trades (USD) divided by total weight (kg) in biggest economies of the world: EU27, USA, Brasil, China, India, Japan and Russia) from UN Commodity Trade Statistics Database (http://data.un.org/Explorer.aspxDatabase [Accessed 2011.06.20]). Commodity: Waste or scrap, of cast iron
  property carbon content 0
    carbon content on a dry matter basis (reserved; not for manual entry)
  property true value 6.34989e-10
    allocation property applied in "true value" allocation // value calculated from revenue
  properties: carbon content, non-fossil 0, wet mass 1 kg, dry mass 1 kg, water content 0, carbon content, fossil 0, water in wet mass 0 kg, carbon allocation 0 kg
- copper: 0 kg; source Rentz O. 1999; By-product classification allocatable product; CPC 41413: Refined copper and copper alloys, unwrought; master alloys of copper
  Literature value. Copper uses: Before end-use copper is manufactured into semi fabricated products, such as shapes and ingots (known as 'semis'). These manufacturing processes are subdivided into hot working, cold working and, if necessary, process annealing. Few of the semis are ready for use as such. They more typically travel to first-stage manufacturers, who make metal rods, wire, and casting, and then to component manufacturers who produce such things as motors, valves, and insulated cables The components in turn are incorporated by final-stage manufacturers into a variety of finished products - automobiles, commercial buildings, residential housing, and so forth. These uses account for about 79% of the world-wide consumption of copper.
  production volume 134.712 kg
  property price 5.52 EUR2005
    Literature value (http://www.economist.com/news/business/21576714-mining-industry-has-enriched-chile-its-future-precarious-copper-solution). Average price between 20015 and 2013.
  property carbon content 0
    carbon content on a dry matter basis (reserved; not for manual entry)
  property true value 7.49876e-10
    allocation property applied in "true value" allocation // value calculated from revenue
  properties: dry mass 1 kg, water in wet mass 0 kg, wet mass 1 kg, carbon content, non-fossil 0, water content 0, carbon content, fossil 0, carbon allocation 0 kg

## Inputs from technosphere
- onshore petroleum field infrastructure: 1.29372e-9 unit; lognormal variance with pedigree 0.356, pedigree (3,4,5,5,1)
  EcoSpold01Location=GLO
  Data for RU
  Uncertainty: Data for RU
- pipeline, petroleum: 1.64485e-8 km; lognormal variance with pedigree 0.356, pedigree (3,4,5,5,1)
  Data for RU
  EcoSpold01Location=RER
  Uncertainty: Data for RU
- low level radioactive waste: -2e-7 m3; name LLRW; lognormal variance with pedigree 0.374, pedigree (3,4,5,5,3)
  EcoSpold01Location=CH
  Generic value, basic uncertainty estimated = 3
  Uncertainty: Generic value, basic uncertainty estimated = 3
  production volume 31000 m3; = LLRW*petroleum_RP_PV/petroleum_RP
    Calculated from the production volume of petroleum in proportion to the respective output amounts.
  properties: dry mass 2500 kg, wet mass 2500 kg
- waste natural gas, sweet: -0.972006 MJ; name waste_NG_sweet; lognormal variance with pedigree 0.0427, pedigree (2,2,5,5,1)
  EcoSpold01Location=GLO
  Literature, average share flaring
  Uncertainty: Literature, average share flaring
  production volume 1.07358e12 MJ; = waste_NG_sweet*petroleum_RP_PV/petroleum_RP
    (same comment as for low level radioactive waste)
  properties: dry mass 0.0247059 kg, wet mass 0.0247059 kg, carbon content, fossil 0.589286
- heat, district or industrial, other than natural gas: 0.228 MJ; lognormal variance with pedigree 0.194, pedigree (3,4,5,5,3)
  Generic value, basic uncertainty estimated = 2
  EcoSpold01Location=RER
  Uncertainty: Generic value, basic uncertainty estimated = 2
- water discharge from petroleum/natural gas extraction, onshore: -0.643736 kg; name water_discharge_onshore; lognormal variance with pedigree 0.194, pedigree (3,4,5,5,3)
  EcoSpold01Location=GLO
  Generic value, basic uncertainty estimated = 2
  Uncertainty: Generic value, basic uncertainty estimated = 2
  production volume 1.74641e10 kg; = water_discharge_onshore*petroleum_RP_PV/petroleum_RP
    (same comment as for low level radioactive waste)
  properties: carbon content, non-fossil 0.00101223, wet mass 1 kg, carbon content, fossil 0.00168491, dry mass 0.0848608 kg, water content 10.784
- chemical, inorganic: 0.00012 kg; lognormal variance with pedigree 0.342, pedigree (1,1,5,5,1)
  Generic value
  EcoSpold01Location=GLO
  properties: dry mass 1 kg, carbon content, fossil 0.003, wet mass 1 kg
  note on carbon content, fossil: This dataset is an unweighted average of 20 inorganic substances (listed in Tab 88.1, ecoinvent v2.2 report 8, part II), being part of the top100 chemicals included in this database. The C-content has also been calculated as an unweighted average of the C content of the substances composing this dataset.
- sour gas, burned in gas turbine: 0.0209298 MJ; lognormal variance with pedigree 0.194, pedigree (3,4,5,5,3)
  EcoSpold01Location=NO
  Generic value, basic uncertainity = 2
  Uncertainty: Generic value, basic uncertainity = 2
  properties: wet mass 0.027027 kg, carbon content, fossil 0.571, dry mass 0.027027 kg
- natural gas, vented: 0.0029917 m3; lognormal variance with pedigree 0.162, pedigree (1,1,5,5,1)
  Literature, average share venting
  EcoSpold01Location=GLO
  properties: carbon content, fossil 0.602381, wet mass 0.84 kg, dry mass 0.84 kg
  note on carbon content, fossil: An average C content of 0.506 kg C/ m3 has been assumed (this average has been calculated using data in Tab 3.5, ecoinvent v2.2 report 6_V
- diesel, burned in diesel-electric generating set, 10MW: 0.368288 MJ; lognormal variance with pedigree 0.342, pedigree (1,1,5,5,1)
  Generic value
  EcoSpold01Location=GLO
- chemical, organic: 9e-5 kg; lognormal variance with pedigree 0.342, pedigree (1,1,5,5,1)
  EcoSpold01Location=GLO
  Generic value
  properties: wet mass 1 kg, dry mass 1 kg, carbon content, fossil 0.628
  note on carbon content, fossil: This dataset is an unweighted average of 20 organic substances (listed in Tab 88.1, ecoinvent v2.2 report 8, part II), being part of the top100 chemicals included in this database. The C-content has also been calculated as an unweighted average of the C content of the substances composing this dataset.
- municipal solid waste: 0 kg; name MSW; pedigree (1,1,1,1,1)
  (same comment as for low level radioactive waste)
  production volume 0 kg
    (same comment as for low level radioactive waste)
  properties: carbon content, non-fossil 0.261655, dry mass 0.771 kg, carbon content, fossil 0.171549, water content 0.297017, wet mass 1 kg
  note on carbon content, non-fossil: MSW composition in tab 4.1, ecoinvent v2.2 report 13_I. C content referred to 1 kg DM
- onshore well, oil/gas: 1.67893e-5 m; lognormal variance with pedigree 0.354, pedigree (3,1,5,5,1)
  Generic value
  EcoSpold01Location=GLO
  Uncertainty: Generic value
- sweet gas, burned in gas turbine: 0.0706579 MJ; lognormal variance with pedigree 0.194, pedigree (3,4,5,5,3)
  Generic value, basic uncertainty estimated = 2
  EcoSpold01Location=NO
  Uncertainty: Generic value, basic uncertainty estimated = 2
  properties: wet mass 0.0247059 kg, dry mass 0.0247059 kg, carbon content, fossil 0.589286
- electricity, low voltage: 0 kWh; pedigree (1,1,1,1,1)
  EcoSpold01Location=UCTE
  Literature, average share venting
  Uncertainty: Literature, average share venting
- waste natural gas, sour: -0.527874 MJ; name waste_NG_sour; lognormal variance with pedigree 0.1806, pedigree (4,3,5,5,1)
  EcoSpold01Location=GLO
  Literature, 92.5% of total, basic uncertainity = 2
  Uncertainty: Literature, 92.5% of total, basic uncertainity = 2
  production volume 4.00551e11 MJ; = waste_NG_sour*1.5*petroleum_RP_PV/petroleum_RP
    (same comment as for low level radioactive waste)
  properties: wet mass 0.027027 kg, dry mass 0.027027 kg, carbon content, fossil 0.571226
  note on carbon content, fossil: Calculated out of data in Tab 3.4, ecoinvent v2.2 report 6_V.
- municipal solid waste: -6.20323e-5, -1.56306e-5, -2.23371e-5 kg (3 entries); lognormal variance with pedigree 0.374, pedigree (3,4,5,5,3)
  (same comment as for low level radioactive waste)
  production volume 1.55e7 kg
    (same comment as for low level radioactive waste)
- electricity, low voltage: 0.00100954, 0.000177061, 0.00725786, 0.0206738 kWh (4 entries); lognormal variance with pedigree 0.0427, pedigree (2,2,5,5,1)
  (same comment as for electricity, low voltage)

## Inputs from nature
- Gas, natural, in ground [natural resource, in ground]: 4.9915e-5 m3; lognormal variance with pedigree 0.042, pedigree (1,1,5,5,1)
  Environmental report
  Uncertainty: Environmental report
- Oil, crude, in ground [natural resource, in ground]: 1.00463 kg; lognormal variance with pedigree 0.042, pedigree (1,1,5,5,1)
  Literature
  Uncertainty: Literature
- Water, unspecified natural origin [natural resource, in water]: 0.00345809 m3; name water_UNO_input; lognormal variance with pedigree 0.042, pedigree (1,1,5,5,1)
  Literature
  Uncertainty: Literature

## Emissions to nature
- Oils, unspecified [soil, forestry]: 0.0057881 kg; lognormal variance with pedigree 0.3706, pedigree (4,3,5,5,1)
  Literature, estimation for oil contaminated area, basic uncertainity estimated = 3
  Uncertainty: Literature, estimation for oil contaminated area, basic uncertainity estimated = 3
- TOC, Total Organic Carbon [water, surface water]: 0.00403588 kg; lognormal variance with pedigree 0.092, pedigree (3,5,5,5,1)
  Extrapolation for sum parameter
  Uncertainty: Extrapolation for sum parameter
- Nitrogen [water, surface water]: 3.59272e-6 kg; lognormal variance with pedigree 0.092, pedigree (3,5,5,5,1)
  Extrapolation for sum parameter
  Uncertainty: Extrapolation for sum parameter
- BOD5, Biological Oxygen Demand [water, surface water]: 0.0146972 kg; lognormal variance with pedigree 0.092, pedigree (3,5,5,5,1)
  Extrapolation for sum parameter
  Uncertainty: Extrapolation for sum parameter
- Sulfur [water, surface water]: 1.25041e-5 kg; lognormal variance with pedigree 0.092, pedigree (3,5,5,5,1)
  Extrapolation for sum parameter
  Uncertainty: Extrapolation for sum parameter
- Methane, fossil [air, non-urban air or from high stacks]: 2.5e-5 kg; lognormal variance with pedigree 0.5, pedigree (5,5,5,5,5)
  Generic value, basic uncertainty estimated = 3
  Uncertainty: Generic value, basic uncertainty estimated = 3
- Water [water, unspecified]: 0.00293938 m3; name water_to_water_unspecified; lognormal variance with pedigree 0.0827, pedigree (2,2,5,5,1)
  Calculated value based on literature values and expert opinion. See comments in the parametres' comment field.
  property fraction, origin: unspecified 1; name fraction_origin_unspecified_Ww
  property dry mass 0 kg; name DM
  property fraction, origin: fresh water 0; name fraction_origin_fresh_water_Ww
  property fraction, origin: salt water 0; name fraction_origin_salt_water_Ww
  property wet mass 1000 kg; name WM
  property carbon content, fossil 0; name C_content_fossil
  property water in wet mass 1000 kg; name WWM
  property carbon content, non-fossil 0; name C_content_non_fossil
- Oils, unspecified [water, surface water]: 0.00466575 kg; lognormal variance with pedigree 0.096, pedigree (3,4,5,5,1)
  Data for NG
  Uncertainty: Data for NG
- Methane, bromotrifluoro-, Halon 1301 [air, non-urban air or from high stacks]: 5.82e-8 kg; lognormal variance with pedigree 0.374, pedigree (3,4,5,5,3)
  (same comment as for Methane, fossil)
- Water [air, unspecified]: 0.000518714 m3; name water_to_air_unspecified; lognormal variance with pedigree 0.0827, pedigree (2,2,5,5,1)
  (same comment as for Water)
  property fraction, origin: fresh water 0; name fraction_origin_fresh_water
  property fraction, origin: unspecified 1; name fraction_origin_unspecified
  property fraction, origin: salt water 0; name fraction_origin_salt_water
- COD, Chemical Oxygen Demand [water, surface water]: 0.0146972 kg; lognormal variance with pedigree 0.092, pedigree (3,5,5,5,1)
  Extrapolation for sum parameter
  Uncertainty: Extrapolation for sum parameter
- AOX, Adsorbable Organic Halogen as Cl [water, surface water]: 4.80572e-8 kg; lognormal variance with pedigree 0.092, pedigree (3,5,5,5,1)
  Extrapolation for sum parameter
  Uncertainty: Extrapolation for sum parameter
- NMVOC, non-methane volatile organic compounds, unspecified origin [air, non-urban air or from high stacks]: 7.5e-5 kg; lognormal variance with pedigree 0.5, pedigree (5,5,5,5,5)
  (same comment as for Methane, fossil)
- DOC, Dissolved Organic Carbon [water, surface water]: 0.00403588 kg; lognormal variance with pedigree 0.092, pedigree (3,5,5,5,1)
  Extrapolation for sum parameter
  Uncertainty: Extrapolation for sum parameter

## Sampling procedure
Statistics and use of generic data for NG.

## Extrapolations
A part of the data has been estimated with data for NG and generic assumptions for onshore production. This dataset has been copied from an original dataset covering the geography RAF. The uncertainty has been adjusted accordingly.

## Review by Michael Spielmann (obsolete) 2005-07-19
passed

## Review by Emilia Moreno Ruiz 2017-09-06
PV adjsuted

## Review by Emilia Moreno Ruiz 2014-06-21
PV adjusted
