# treatment of decommissioned airport infrastructure, contaminated gravel

Dataset: EcoSpold 2, unit process
Geography: RER
Time period: 1990-01-01 to 2019-12-31
Technology level: current
Classification: EcoSpold01Categories: transport systems/airplane
Classification: ISIC rev.4 ecoinvent: 3830:Materials recovery
Tags: ConvertedDataset; Treatment
Scenario: Business-as-Usual
System model: Allocation at the point of substitution
Generated by: Michael Spielmann (obsolete)
Published in: Spielmann M. 2007
Database: ecoinvent
isCopyrightProtected: true
accessRestrictedTo: 1

## General comment
The dataset represnts the treatment of decommissioned airport infrastructure. It has been assumed that after 100 years the entire construction material will be disposed.The data represnts the airport in Zurich.
[This dataset was already contained in the ecoinvent database version 2. It was not individually updated during the transfer to ecoinvent version 3. Life Cycle Impact Assessment results may still have changed, as they are affected by changes in the supply chain, i.e. in other datasets. This dataset was generated following the ecoinvent quality guidelines for version 2. It may have been subject to central changes described in the ecoinvent version 3 change report (http://www.ecoinvent.org/database/ecoinvent-version-3/reports-of-changes/), and the results of the central updates were reviewed extensively. The changes added e.g. consistent water flows and other information throughout the database. The documentation of this dataset can be found in the ecoinvent reports of version 2, which are still available via the ecoinvent website. The change report linked above covers all central changes that were made during the conversion process.]

## Included activities start
The activity starts with the treatment of one decommissioned airport infrastructure.

## Included activities end
The activity ends with the disposal of the inert waste. The activity includes the excavation and until and including the disposal of the inert waste.

## Geography
Data refers the conditions at the major airport in Switzerland.

## Technology
The data presented in this module is derived from Maibach (1999) and adjusted with a corrections factor of 1.5. It has been assumed that after 100 years the entire construction material will be disposed. For the disposal a distance of 20 km has been applied. The disposal of buildings is included in the construction module of buildings.
References:
Maibach M., Peter D. and Seiler B. (1999) Ökoinventar Transporte: Grundlagen für den ökologischen Vergleich von Transportsystemen und den Einbezug von Transportsystemen in Ökobilanzen. Technischer Schlussbericht. In: Schweizerischer Nationalfonds zur Förderung der wissenschaftlichen Forschung (ed. SPP Umwelt M.). 2nd Edition. INFRAS, Zürich

## Time period
The data represents the condition in the early 1990’ties. However, the data presented is adjusted by a factor of 1.5 to represent current conditions.

## Reference product
- decommissioned airport infrastructure, contaminated gravel: -1 unit; By-product classification Waste; CPC 39990: Other wastes n.e.c.
  EcoSpold01Location=RER
  production volume 1.32237 unit
    This is a placeholder value that does not reflect real-world production volumes. This dataset does not currently require a real-world production volume to work in the database framework, and no actual data were collected yet. This has no negative effect on the results of the ecoinvent database. The placeholder value of this activity was scaled according to the nominal GDP of 2005 (source: United Nations, http://data.un.org/Glossary.aspx?q=GDP+%28current+US%24%29, accessed 20130726) to reflect an appropriate share of the global production volume, which is also a placeholder value.
  property price 0 EUR2005
    Waste products are assigned a price of zero as they are assumed to require further treatment.
  property carbon content, non-fossil 0.009271
    Calculated from C content in input materials in the infrastructure
  property carbon content, fossil 0.00149419
    Calculated from C content in input materials in the infrastructure
  property carbon content 0.0107652
    carbon content on a dry matter basis (reserved; not for manual entry)
  properties: dry mass 1.13322e9 kg, water content 0, water in wet mass 0 kg, wet mass 1.13322e9 kg, carbon allocation 1.21993e7 kg

## Inputs from technosphere
- excavation, skid-steer loader: 21000 m3; source Maibach M. 1999; lognormal variance with pedigree 0.1787, pedigree (4,3,5,3,1)
  EcoSpold01Location=RER
  Calculated value. The data presented in this module is derived from Maibach (1999) and adjusted with a corrections factor of 1.5.;activityLink introduced to establish a direct link to the corresponding regional supply of this product
  Uncertainty: literatre and own adjustments
- inert waste, for final disposal: -4.83e7 kg; source Maibach M. 1999; lognormal variance with pedigree 0.16, pedigree (1,1,5,1,1)
  EcoSpold01Location=CH
  Calculated value. The data presented in this module is derived from Maibach (1999) and adjusted with a corrections factor of 1.5.
  production volume 4.83e7 kg
    Calculated from the production volume of decommissioned airport infrastructure, contaminated gravel in proportion to the respective output amounts.
  properties: water content 0.00502513, wet mass 1 kg, dry mass 0.995 kg

## Sampling procedure
literature studies and oral communication.

## Extrapolations
This dataset has been extrapolated from year 2000 to the year of the calculation (2019). The uncertainty has been adjusted accordingly.

## Review by Emilia Moreno Ruiz 2012-04-24
trainee DS, ok, Liliane Klemann

## Review by Niels Jungbluth 2003-09-23
passed.
