# beef cattle production on pasture

Dataset: EcoSpold 2, unit process
Geography: RoW
Time period: 2006-01-01 to 2019-12-31
Technology level: current
Classification: ISIC rev.4 ecoinvent: 0141:Raising of cattle and buffaloes
Scenario: Business-as-Usual
System model: Allocation at the point of substitution
Share of production covered: 3 %
Generated by: Fernando Dias
Published in: Folegatti-Matsuura M. 2018
Database: ecoinvent
isCopyrightProtected: true
accessRestrictedTo: 1

## General comment
This dataset was built as a weighted average of regional datasets of the same activityName. Weights are based on production volumes.
BR: production volume = 6.06e+08 kg/year, weight = 0.88
ZA: production volume = 8.27e+07 kg/year, weight = 0.12

## Included activities start
This activity starts at the replanting of pasture.

## Included activities end
This activity ends with the provision of fat steers, culled cows and bulls at farm gate, ready to be sent to slaughterhouses as live weight.

## Geography
This dataset is a weighted average built from the following geographies: BR, ZA.

## Technology
Pasture is not regularly fertilized but is replanted every 20 years. Mineral salt is served as supplement feed for all cattle in troughs on the field. Besides pasture and mineral salt, no proteic supplement or other feed is served to cattle. Fat steers are sold for slaughter under 42 months. The dataset does not include pharmaceuticals, although typical production systems use them. Use of hormones for cattle raising is forbidden in Brazil.

## Time period
Time period of the most of the data collected for this dataset.

## Reference product
- cattle for slaughtering, live weight: 0 kg; By-product classification allocatable product; CPC 02111: Cattle
  production volume 4.2364e9 kg
    (GLO beef production in 2015) * (% of system in GLO in 2015) * (1 - % beef production from milk cattle in GLO) / (carcass as live weight, GLO average)
  property price 2.025 EUR2005
    Calculated as an average of the regional prices (ZA and BR) which were provided by the data providers for the specific countries.
  property energy content 14.9367 MJ
    Energy content calculated from animal fat and protein composition and energy content for animal fat and protein of 39.3 and 23.6 MJ/kg, respectively.
    Johnson, I.R. et al. (2012). J. Anim. Sci. 90(13):4741-475.
    Williams, C.B. (2005). J. Anim. Sci. 83(6):1262-1266.
  property carbon content, non-fossil 0.4928
    Calculated from live weight empty body composition in fat and protein (
    Johnson, I.R. et al. (2012). J. Anim. Sci. 90(13):4741-475 ; Williams, C.B. (2005). J. Anim. Sci. 83(6):1262-1266) and from C content of nutrients (protein, fat) according to A.D. Kay and T. Vrede ('Evolutionary and Biochemical Aspects', in Global Ecology, 2010, Elsevier B.V., S.E. Jørgensen Ed.).
  property carbon content 0.4928
    carbon content on a dry matter basis (reserved; not for manual entry)
  property true value 2.025
    allocation property applied in "true value" allocation // value calculated from revenue
  properties: wet mass 1 kg, water content 0.666667, carbon content, fossil 0, water in wet mass 0.4 kg, dry mass 0.6 kg, carbon allocation 0.29568 kg
- iron scrap, unsorted: 1 kg; CPC 39310: Slag, dross, scalings and other waste from the manufacture of iron or steel; By-product classification Recyclable
  production volume 4.86893e6 kg
    Calculated from production volume of reference product using the relative outputs.
  property price 0.149 EUR2005
    Temporary price data. Calculated as 90% of purchasers price based on: estimated at 85% of sorted scrap
  property carbon content 0
    carbon content on a dry matter basis (reserved; not for manual entry)
  property true value 0.000147807
    allocation property applied in "true value" allocation // value calculated from revenue
  properties: dry mass 1 kg, carbon content, non-fossil 0, wet mass 1 kg, carbon content, fossil 0, water in wet mass 0 kg, water content 0, carbon allocation 0 kg

## By-products
- weaned heifers, live weight: 0 kg; By-product classification allocatable product; CPC 02111: Cattle; EcoSpold01Categories agricultural production/animal production
  production volume 3.03784e8 kg
    Calculated from production volume of reference product using the relative outputs.
  property price 1.64 EUR2005
    (same comment as for cattle for slaughtering, live weight)
  property carbon content 0.4928
    carbon content on a dry matter basis (reserved; not for manual entry)
  property true value 0.101504
    allocation property applied in "true value" allocation // value calculated from revenue
  properties: water in wet mass 0.4 kg, dry mass 0.6 kg, water content 0.666667, wet mass 1 kg, carbon content, fossil 0, carbon content, non-fossil 0.4928, carbon allocation 0.29568 kg
- heat, for reuse in municipal waste incineration only: 0 MJ; CPC 17300: Steam and hot water; By-product classification allocatable product; pedigree (1,1,1,1,1)
  Net useful heat generated from this waste and used in internal MSWI plant energy redistribution.
  Uncertainty: uncertainty is calculated from uncertainties in waste composition and uncertainties in energy efficiency and the uncertainty in internal energy demand
  production volume 1.20366e6 MJ
  property exergy 0.1842 MJ; name E_th_prod_MSWI_exergy
    This exergy property is based on the exergy content of the product.
  property true value relation 0.1842; name E_th_prod_MSWI_true_value_relation
    property to calculate "true value" from
  property price 0.0106 EUR2005; name E_th_prod_MSWI_price_EUR2005
    Average European district heat price from Ecoheatcool and Euroheat 2005-2006, Ecoheat Work package 1: The European heat market. Final report. 10.6 EUR/GJ i s the price of district heat. http://www.solarthermalworld.org/files/Ecoheatcool%20WP1%20Web.pdf?download
  property true value 1.61785e-6
    allocation property applied in "true value" allocation // value calculated from true value relation
- electricity, for reuse in municipal waste incineration only: 0 kWh; CPC 17100: Electrical energy; By-product classification allocatable product; pedigree (1,1,1,1,1)
  Net electricity generated from this waste and used in internal MSWI plant energy redistribution.
  Uncertainty: uncertainty is calculated from uncertainties in waste composition and uncertainties in energy efficiency and the uncertainty in internal energy demand
  production volume 166511 kWh
  property true value relation 3.6; name E_el_prod_MSWI_true_value_relation
    property to calculate "true value" from
  property exergy 3.6 MJ; name E_el_prod_MSWI_exergy
    This exergy property is based on the exergy content of the product.
  property price 0.1 EUR2005; name E_el_prod_MSWI_price_EUR2005
    Estimated to be the same price as in case of electricity, medium voltage.
  property true value 4.37411e-6
    (same comment as for heat, for reuse in municipal waste incineration only)
- zinc concentrate: 0 kg; CPC 14290: Other non-ferrous metal ores and concentrates (other than uranium or thorium ores and concentrates); By-product classification allocatable product
  Calculated value from the knowledge of the properties of both products.
  production volume 13.2434 kg
  property price 0.38 EUR2005; name ByP_price_EUR2005
    Temporary price data. Calculated as 90% of purchasers price based on: Zinc content in concentrate 53%. Concentrate price per kg Zn 86.5% of refined Zn price (13.5% treatment charges according to CHR Metals Limited 2005: Dynamic cost curves. http://www.minecost.com/dynamic.pdf). 2004 zinc price from USGS (2007) Mineral commodity summaries 2007. <http://minerals.usgs.gov/minerals/pubs/mcs/2007/mcs2007.pdf> [Accessed 25 May 2010]
  property zinc content 0.53; name zinc_C_zinc_concentrate
    Zinc content on a dry matter basis. Value taken from teh "zinc mine operation" /GLO dataset.
  property dry mass 1 kg; name DM_zinc_concentrate
  property carbon content 0
    carbon content on a dry matter basis (reserved; not for manual entry)
  property true value 1.02532e-9
    allocation property applied in "true value" allocation // value calculated from revenue
  properties: wet mass 1 kg, water content 0, carbon content, non-fossil 0, carbon content, fossil 0, water in wet mass 0 kg, carbon allocation 0 kg

## Inputs from technosphere
- phosphate fertiliser, as P2O5: 0.00440258 kg; lognormal variance with pedigree 0.0458, pedigree (3,3,5,5,2)
  properties: wet mass 1 kg, dry mass 1 kg
- potassium fertiliser, as K2O: 0.00290542 kg; lognormal variance with pedigree 0.0458, pedigree (3,3,5,5,2)
  properties: dry mass 1 kg, wet mass 1 kg
- tillage, harrowing, by offset disk harrow: 4.84239e-5 ha; lognormal variance with pedigree 0.0458, pedigree (3,3,5,5,2)
- wood preservation, vaccum pressure method, inorganic salt, containing Cr, outdoor use, ground contact: 3.44008e-6 kg; lognormal variance with pedigree 0.0458, pedigree (3,3,5,5,2)
- maize grain: 0 kg; pedigree (1,1,1,1,1)
  properties: carbon content, non-fossil 0.46957, wet mass 1 kg, dry mass 0.86 kg, water content 0.162791
- sowing: 4.84239e-5 ha; lognormal variance with pedigree 0.0458, pedigree (3,3,5,5,2)
- urea, as N: 0.000567721 kg; lognormal variance with pedigree 0.0058, pedigree (2,3,3,5,1)
  properties: wet mass 1 kg, carbon content, fossil 0.2, dry mass 1 kg
- lime: 0.072634 kg; lognormal variance with pedigree 0.0458, pedigree (3,3,5,5,2)
  properties: dry mass 1 kg, wet mass 1 kg, carbon content, fossil 0.120005
- sodium chloride, powder: 0.00206031 kg; lognormal variance with pedigree 0.0058, pedigree (2,3,3,5,1)
  properties: dry mass 1 kg, wet mass 1 kg
- weed control, by brush cutter, pasture: 0.000145274 ha; lognormal variance with pedigree 0.0458, pedigree (3,3,5,5,2)
- limestone and gypsum application, by spreader: 4.84239e-5 ha; lognormal variance with pedigree 0.0458, pedigree (3,3,5,5,2)
- salt: 0.0065717 kg; lognormal variance with pedigree 0.0078, pedigree (3,3,3,5,2)
  properties: dry mass 1 kg, wet mass 1 kg
- tillage, harrowing, by offset leveling disc harrow: 9.68454e-5 ha; lognormal variance with pedigree 0.0458, pedigree (3,3,5,5,2)
- zinc coat, pieces: 1.65059e-5 m2; lognormal variance with pedigree 0.0458, pedigree (3,3,5,5,2)
- mineral supplement, for beef cattle: 0.0065717 kg; lognormal variance with pedigree 0.0078, pedigree (3,3,3,5,2)
  properties: wet mass 1 kg, dry mass 1 kg
- molasses, from sugar beet: 0.000900314 kg; lognormal variance with pedigree 0.0167, pedigree (2,2,4,5,1)
  properties: wet mass 1 kg, dry mass 0.82 kg, carbon content, non-fossil 0.39592, water content 0.219512
- transport, tractor and trailer, agricultural: 0.00243873 metric ton*km; lognormal variance with pedigree 0.1252, pedigree (2,3,3,5,1)
- waste wood pole, chrome preserved: -4.9102e-6 kg
  production volume 343981 kg
    Calculated from production volume of reference product using the relative outputs.
  properties: wet mass 1 kg, carbon content, non-fossil 0.483676, water content 0.25, dry mass 0.8 kg
- fertilising, by broadcaster: 4.84239e-5 ha; lognormal variance with pedigree 0.0458, pedigree (3,3,5,5,2)
- sulfur: 2.84239e-5 kg; lognormal variance with pedigree 0.0112, pedigree (2,3,3,5,1)
  properties: wet mass 1 kg, dry mass 1 kg
- wire drawing, steel: 6.9502e-5 kg; lognormal variance with pedigree 0.0458, pedigree (3,3,5,5,2)
- roundwood, eucalyptus ssp. from sustainable forest management, under bark: 3.96784e-9 m3; lognormal variance with pedigree 0.0458, pedigree (3,3,5,5,2)
  properties: carbon content, non-fossil 0.494, dry mass 825 kg, wet mass 1237.5 kg, water content 0.5
- maize grain: 2.86937e-5, 0.000652554 kg (2 entries); lognormal variance with pedigree 0.0058, pedigree (2,3,3,5,1)

## Inputs from nature
- Transformation, from pasture, man made [natural resource, land]: 0.484227 m2; lognormal variance with pedigree 0.0532, pedigree (3,3,5,5,2)
- Transformation, from grassland, natural, for livestock grazing [natural resource, land]: 1.07641 m2; lognormal variance with pedigree 0.0132, pedigree (2,3,3,5,1)
- Energy, gross calorific value, in biomass [natural resource, biotic]: 0.985673 MJ; lognormal variance with pedigree 0.0458, pedigree (3,3,5,5,2)
- Transformation, to pasture, man made [natural resource, land]: 0.484227 m2; lognormal variance with pedigree 0.0532, pedigree (3,3,5,5,2)
- Water, unspecified natural origin [natural resource, in ground]: 0.000431404 m3; lognormal variance with pedigree 0.0058, pedigree (2,3,3,5,1)
- Water, unspecified natural origin [natural resource, in water]: 0.0134919 m3; lognormal variance with pedigree 0.0078, pedigree (3,3,3,5,2)
- Occupation, pasture, man made [natural resource, land]: 9.68454 m2*year; lognormal variance with pedigree 0.0472, pedigree (3,3,5,5,2)
- Transformation, to grassland, natural, for livestock grazing [natural resource, land]: 1.07641 m2; lognormal variance with pedigree 0.0132, pedigree (2,3,3,5,1)
- Occupation, grassland, natural, for livestock grazing [natural resource, land]: 3.42264 m2*year; lognormal variance with pedigree 0.0072, pedigree (2,3,3,5,1)

## Emissions to nature
- Chromium, ion [water, surface water]: 3.29011e-7 kg; lognormal variance with pedigree 0.1465, pedigree (3,3,5,5,2)
- Lead [soil, agricultural]: 0.000280033 kg; lognormal variance with pedigree 0.0965, pedigree (3,3,5,5,2)
- Copper [soil, agricultural]: 0.00199816 kg; lognormal variance with pedigree 0.0965, pedigree (3,3,5,5,2)
- Copper, ion [water, surface water]: 4.29403e-7 kg; lognormal variance with pedigree 0.1465, pedigree (3,3,5,5,2)
- Zinc [soil, agricultural]: 0.00919788 kg; lognormal variance with pedigree 0.0965, pedigree (3,3,5,5,2)
- Dinitrogen monoxide [air, non-urban air or from high stacks]: 0.00164784 kg; lognormal variance with pedigree 0.0752, pedigree (3,3,5,5,2)
- Water [water, surface water]: 0.0118348 m3; lognormal variance with pedigree 0.0458, pedigree (3,3,5,5,2)
- Chromium [soil, agricultural]: 0.000254295 kg; normal variance with pedigree 0.0965, pedigree (3,3,5,5,2)
- Zinc, ion [water, surface water]: 1.48228e-6 kg; lognormal variance with pedigree 0.1465, pedigree (3,3,5,5,2)
- Cadmium [soil, agricultural]: 3.04201e-5 kg; lognormal variance with pedigree 0.0965, pedigree (3,3,5,5,2)
- Phosphate [water, surface water]: 5.2643e-5 kg; lognormal variance with pedigree 0.0452, pedigree (2,3,3,5,1)
- Carbon dioxide, fossil [air, non-urban air or from high stacks]: 0.0346222 kg; lognormal variance with pedigree 0.0458, pedigree (3,3,5,5,2)
- Nitrogen oxides [air, non-urban air or from high stacks]: 0.00031002 kg; lognormal variance with pedigree 0.0752, pedigree (3,3,5,5,2)
- Cadmium, ion [water, surface water]: 3.23378e-9 kg; lognormal variance with pedigree 0.1465, pedigree (3,3,5,5,2)
- Phosphorus [water, ground-]: 0 kg
- Water [air, unspecified]: 0.00208849 m3; lognormal variance with pedigree 0.0458, pedigree (3,3,5,5,2)
- Ammonia [air, non-urban air or from high stacks]: 0.00615421 kg; lognormal variance with pedigree 0.0532, pedigree (3,3,5,5,2)
- Phosphorus [water, surface water]: 0.000163477 kg; lognormal variance with pedigree 0.0852, pedigree (3,3,5,5,2)
- Nickel [soil, agricultural]: 0.000393118 kg; lognormal variance with pedigree 0.0965, pedigree (3,3,5,5,2)
- Nitrate [water, ground-]: 0.0296855 kg; lognormal variance with pedigree 0.0458, pedigree (3,3,5,5,2)
- Nickel, ion [water, surface water]: 3.93097e-8 kg; normal variance with pedigree 0.1465, pedigree (3,3,5,5,2)
- Methane, non-fossil [air, non-urban air or from high stacks]: 0.0473673 kg; lognormal variance with pedigree 0.0532, pedigree (3,3,5,5,2)
- Mercury [water, surface water]: 7.52644e-11 kg; lognormal variance with pedigree 0.0952, pedigree (2,3,3,5,1)
- Lead [water, surface water]: 2.98254e-8 kg; lognormal variance with pedigree 0.1465, pedigree (3,3,5,5,2)
- Mercury [soil, agricultural]: 4.86906e-9 kg; lognormal variance with pedigree 0.0452, pedigree (2,3,3,5,1)

## Sampling procedure
Weighted average of Brazilian and South african data.

## Extrapolations
Carbon content, water and gross calorific value are based on ecoinvent database.
