# treatment of used outside air intake, stainless steel, DN 370

Dataset: EcoSpold 2, unit process
Geography: RoW
Time period: 2000-01-01 to 2019-12-31
Technology level: current
Classification: ISIC rev.4 ecoinvent: 3830:Materials recovery
Classification: EcoSpold01Categories: waste management/building demolition
Tags: ConvertedDataset; Treatment
Scenario: Business-as-Usual
System model: Allocation at the point of substitution
Generated by: Alex Primas
Published in: Hässig, W. 2007
Database: ecoinvent
isCopyrightProtected: true
accessRestrictedTo: 1

## General comment
Disposal of an outside mounted stainless steel tube with air inlet of 400 mm diameter. Weight per element 32 kg
[This dataset was already contained in the ecoinvent database version 2. It was not individually updated during the transfer to ecoinvent version 3. Life Cycle Impact Assessment results may still have changed, as they are affected by changes in the supply chain, i.e. in other datasets. This dataset was generated following the ecoinvent quality guidelines for version 2. It may have been subject to central changes described in the ecoinvent version 3 change report (http://www.ecoinvent.org/database/ecoinvent-version-3/reports-of-changes/), and the results of the central updates were reviewed extensively. The changes added e.g. consistent water flows and other information throughout the database. The documentation of this dataset can be found in the ecoinvent reports of version 2, which are still available via the ecoinvent website. The change report linked above covers all central changes that were made during the conversion process.]

## Included activities end
Transport to dismantling facilities, machines for handling in sorting plant, electricity demand for sorting plant, final disposal of waste material. Cut-off to recycling for metals.

## Geography
Specific to the technology mix encountered in sorting plants in Switzerland

## Technology
Disposal to a sorting plant assumed. Metal pieces and copper in cables and electronic devices are recycled, plastic parts are incinerated, inert wastes (e.g. rock wool) are landfilled.

## Time period
Amount of material investigated in 2003. Disposal technology mix as used in late 1990ies

## Reference product
- used outside air intake stainless steel, DN 370: -1 unit; CPC 39310: Slag, dross, scalings and other waste from the manufacture of iron or steel; By-product classification Waste
  EcoSpold01Location=CH
  production volume 3.96633 unit
    This is a placeholder value that does not reflect real-world production volumes. This dataset does not currently require a real-world production volume to work in the database framework, and no actual data were collected yet. This has no negative effect on the results of the ecoinvent database.
  property price 0 EUR2005
    Waste products are assigned a price of zero as they are assumed to require further treatment.
  property carbon content 0.0520342
    carbon content on a dry matter basis (reserved; not for manual entry)
  properties: dry mass 32 kg, water in wet mass 0 kg, wet mass 32 kg, carbon content, non-fossil 0, water content 0, carbon content, fossil 0.0520342, carbon allocation 1.66509 kg

## By-products
- heat, for reuse in municipal waste incineration only: 0 MJ; CPC 17300: Steam and hot water; By-product classification allocatable product; pedigree (1,1,1,1,1)
  Net electricity generated from this waste and used in internal MSWI plant energy redistribution.
  Uncertainty: uncertainty is calculated from uncertainties in waste composition and uncertainties in energy efficiency and the uncertainty in internal energy demand
  property exergy 0.1842 MJ; name E_th_prod_MSWI_exergy
    This exergy property is based on the exergy content of the product.
  property true value relation 0.1842; name E_th_prod_MSWI_true_value_relation
    property to calculate "true value" from
  property price 0.0106 EUR2005; name E_th_prod_MSWI_price_EUR2005
    Average European district heat price from Ecoheatcool and Euroheat 2005-2006, Ecoheat Work package 1: The European heat market. Final report. 10.6 EUR/GJ i s the price of district heat. http://www.solarthermalworld.org/files/Ecoheatcool%20WP1%20Web.pdf?download
- electricity, for reuse in municipal waste incineration only: 0 kWh; CPC 17100: Electrical energy; By-product classification allocatable product; pedigree (1,1,1,1,1)
  (same comment as for heat, for reuse in municipal waste incineration only)
  property exergy 3.6 MJ; name E_el_prod_MSWI_exergy
    This exergy property is based on the exergy content of the product.
  property true value relation 3.6; name E_el_prod_MSWI_true_value_relation
    property to calculate "true value" from
  property price 0.1 EUR2005; name E_el_prod_MSWI_price_EUR2005
    Estimated to be the same price as in case of electricity, medium voltage.

## Inputs from technosphere
- waste polyethylene/polypropylene product: 0 kg; pedigree (1,1,1,1,1)
  EcoSpold01Location=CH
  Estimation based on data of Questionnaire
  Uncertainty: Estimation based on data of Questionnaire
  production volume 0 kg
    Calculated from the production volume of used outside air intake stainless steel, DN 370 in proportion to the respective output amounts.
  properties: water content 0.180638, wet mass 1 kg, dry mass 0.847 kg, carbon content, fossil 0.748045
  note on carbon content, fossil: Mixed various plastics was used to estimate the C content of this waste (Tab A.2, ecoinvent v2.2 report 13_I)
- waste bulk iron, excluding reinforcement: 0 kg; pedigree (1,1,1,1,1)
  (same comment as for waste polyethylene/polypropylene product)
  production volume 0 kg
    (same comment as for waste polyethylene/polypropylene product)
  properties: wet mass 1 kg, dry mass 1 kg
- waste polyethylene/polypropylene product: -0.565749, -1.43425 kg (2 entries); lognormal variance with pedigree 0.074, pedigree (3,4,5,5,3)
  (same comment as for waste polyethylene/polypropylene product)
  production volume 6 kg
- waste bulk iron, excluding reinforcement: -9.742, -20.258 kg (2 entries); lognormal variance with pedigree 0.074, pedigree (3,4,5,5,3)
  (same comment as for waste polyethylene/polypropylene product)
  production volume 90 kg

## Sampling procedure
Questionnaire and assumptions.

## Extrapolations
none This dataset has been copied from an original dataset covering the geography CH. The uncertainty has been adjusted accordingly.

## Review by Rolf Frischknecht 2007-08-16
passed
none
