# municipal waste incineration facility construction

Dataset: EcoSpold 2, unit process
Geography: CH
Time period: 1992-01-01 to 2019-12-31
Technology level: current
Classification: ISIC rev.4 ecoinvent: 4290:Construction of other civil engineering projects
Classification: EcoSpold01Categories: waste management/municipal incineration
Synonyms: MSWI; KVA
Tags: ConvertedDataset
Scenario: Business-as-Usual
System model: Allocation at the point of substitution
Generated by: Gabor Doka (obsolete)
Published in: Doka G. 2007
Database: ecoinvent
isCopyrightProtected: true
accessRestrictedTo: 1

## General comment
Swiss municipal waste incineration plant with 100'000 ton per year capacity. Operational time 40 years
[This dataset was already contained in the ecoinvent database version 2. It was not individually updated during the transfer to ecoinvent version 3. Life Cycle Impact Assessment results may still have changed, as they are affected by changes in the supply chain, i.e. in other datasets. This dataset was generated following the ecoinvent quality guidelines for version 2. It may have been subject to central changes described in the ecoinvent version 3 change report (http://www.ecoinvent.org/database/ecoinvent-version-3/reports-of-changes/), and the results of the central updates were reviewed extensively. The changes added e.g. consistent water flows and other information throughout the database. The documentation of this dataset can be found in the ecoinvent reports of version 2, which are still available via the ecoinvent website. The change report linked above covers all central changes that were made during the conversion process.]

## Included activities end
construction and disposal of municipal waste incineration plant, land use exchanges.

## Geography
Technology encountered in Switzerland. Well applicable to modern grate incinerators.

## Technology
Municipal soild waste incineration plant with waste bunker, grate incinerator, steam boiler, electrostatic precipitator, wet scrubber.

## Reference product
- municipal waste incineration facility: 1 unit; CPC 53290: Other civil engineering works; By-product classification allocatable product
  EcoSpold01Location=CH
  production volume 0.0336675 unit
    This is a placeholder value that does not reflect real-world production volumes. This dataset does not currently require a real-world production volume to work in the database framework, and no actual data were collected yet. This has no negative effect on the results of the ecoinvent database. The placeholder value of this activity was scaled according to the nominal GDP of 2005 (source: United Nations, http://data.un.org/Glossary.aspx?q=GDP+%28current+US%24%29, accessed 20130726) to reflect an appropriate share of the global production volume, which is also a placeholder value.
  property price 2.81537e6 EUR2005
    Calculated based on inputs: The price of the product has been calculated as a sum of the values of the material and energy inputs for this product. This value is therefore a rough estimation. It may underestimate the real price since there are additional expenses when producing any product. These expences can include for example labour costs, treatment of waste materials and profit for the producer. Please consider carefully whether this level of data quality is acceptable for your application.
  property true value 2.81537e6
    allocation property applied in "true value" allocation // value calculated from revenue

## By-products
- heat, for reuse in municipal waste incineration only: 0 MJ; CPC 17300: Steam and hot water; By-product classification allocatable product; pedigree (1,1,1,1,1)
  Net useful heat generated from this waste and used in internal MSWI plant energy redistribution.
  Uncertainty: uncertainty is calculated from uncertainties in waste composition and uncertainties in energy efficiency and the uncertainty in internal energy demand
  production volume 6.06464e6 MJ
  property true value relation 0.1842; name E_th_prod_MSWI_true_value_relation
    property to calculate "true value" from
  property exergy 0.1842 MJ; name E_th_prod_MSWI_exergy
    This exergy property is based on the exergy content of the product.
  property price 0.0106 EUR2005; name E_th_prod_MSWI_price_EUR2005
    Average European district heat price from Ecoheatcool and Euroheat 2005-2006, Ecoheat Work package 1: The European heat market. Final report. 10.6 EUR/GJ i s the price of district heat. http://www.solarthermalworld.org/files/Ecoheatcool%20WP1%20Web.pdf?download
  property true value 39785.3
    allocation property applied in "true value" allocation // value calculated from true value relation
- electricity, for reuse in municipal waste incineration only: 0 kWh; CPC 17100: Electrical energy; By-product classification allocatable product; pedigree (1,1,1,1,1)
  Net electricity generated from this waste and used in internal MSWI plant energy redistribution.
  Uncertainty: uncertainty is calculated from uncertainties in waste composition and uncertainties in energy efficiency and the uncertainty in internal energy demand
  production volume 868400 kWh
  property true value relation 3.6; name E_el_prod_MSWI_true_value_relation
    property to calculate "true value" from
  property exergy 3.6 MJ; name E_el_prod_MSWI_exergy
    This exergy property is based on the exergy content of the product.
  property price 0.1 EUR2005; name E_el_prod_MSWI_price_EUR2005
    Estimated to be the same price as in case of electricity, medium voltage.
  property true value 111340
    (same comment as for heat, for reuse in municipal waste incineration only)
- zinc concentrate: 0 kg; CPC 14290: Other non-ferrous metal ores and concentrates (other than uranium or thorium ores and concentrates); By-product classification allocatable product
  Calculated value from the knowledge of the properties of both products.
  production volume 800.717 kg
  property price 0.38 EUR2005; name ByP_price_EUR2005
    Temporary price data. Calculated as 90% of purchasers price based on: Zinc content in concentrate 53%. Concentrate price per kg Zn 86.5% of refined Zn price (13.5% treatment charges according to CHR Metals Limited 2005: Dynamic cost curves. http://www.minecost.com/dynamic.pdf). 2004 zinc price from USGS (2007) Mineral commodity summaries 2007. <http://minerals.usgs.gov/minerals/pubs/mcs/2007/mcs2007.pdf> [Accessed 25 May 2010]
  property zinc content 0.53; name zinc_C_zinc_concentrate
    Zinc content on a dry matter basis. Value taken from teh "zinc mine operation" /GLO dataset.
  property dry mass 1 kg; name DM_zinc_concentrate
  property carbon content 0
    carbon content on a dry matter basis (reserved; not for manual entry)
  property true value 304.272
    allocation property applied in "true value" allocation // value calculated from revenue
  properties: wet mass 1 kg, water content 0, carbon content, non-fossil 0, carbon content, fossil 0, water in wet mass 0 kg, carbon allocation 0 kg
- iron scrap, sorted, pressed: 0 kg; By-product classification Recyclable; CPC 39310: Slag, dross, scalings and other waste from the manufacture of iron or steel; pedigree (1,1,1,1,1)
  Iron scrap recovered from this waste.
  Uncertainty: uncertainty calculated from uncertainty in waste composition, uncertainty of share of recyclable metal, uncertainty of transfer coefficient to bottom ash, uncertainty of the efficiency of scrap removal in MSWI plant.
  production volume 13359 kg
  property price 0.175 EUR2005
    Temporary price data. Calculated as 90% of purchasers price based on: 2005 import and export prices (total trades (USD) divided by total weight (kg) in biggest economies of the world: EU27, USA, Brasil, China, India, Japan and Russia) from UN Commodity Trade Statistics Database (http://data.un.org/Explorer.aspxDatabase [Accessed 2011.06.20]). Commodity: Waste or scrap, of cast iron
  property carbon content 0
    carbon content on a dry matter basis (reserved; not for manual entry)
  property true value 2337.82
    allocation property applied in "true value" allocation // value calculated from revenue
  properties: wet mass 1 kg, water in wet mass 0 kg, carbon content, non-fossil 0, carbon content, fossil 0, dry mass 1 kg, water content 0, carbon allocation 0 kg

## Inputs from technosphere
All rows: lognormal variance with pedigree 0.3612, pedigree (2,3,5,1,1)
- waste bitumen sheet: -758569 kg
  EcoSpold01Location=CH
  Uncertainty: & basic uncertainty of 3;
  production volume 800000 kg
    Calculated from the production volume of municipal waste incineration facility in proportion to the respective output amounts.
  properties: carbon content, fossil 0.643207, water content 0.0152284, dry mass 0.985 kg, wet mass 1 kg
  note on carbon content, fossil: The bitumen sheet is made of 63% bitumen, 24% surface spread and filler (assumed to be pure SiO2), 6% carrier fleece (assumed to be PE) and 7% elastomer (assumed to be PS) (ecoinvent v2.2 report 13_I, pg 40). C content of bitumen, PE and PS from Tab A.6 and A.1 (ecoinvent v2.2 report 13_I, pg 40), respectively. C content of waste also given in the dataset
- waste concrete, not reinforced: -9.48212e6 kg
  EcoSpold01Location=CH
  Uncertainty: & basic uncertainty of 3;
  production volume 1e7 kg
    (same comment as for waste bitumen sheet)
  properties: dry mass 1 kg, wet mass 1 kg
- cement, unspecified: 4.73158e6 kg
  EcoSpold01Location=CH
  Uncertainty: & basic uncertainty of 3;
  properties: dry mass 1 kg, wet mass 1 kg
- gravel, round: 3.31874e7 kg
  EcoSpold01Location=CH
  Uncertainty: & basic uncertainty of 3;
  properties: dry mass 1 kg, wet mass 1 kg
- sand: 9.48212e6 kg
  EcoSpold01Location=CH
  Uncertainty: & basic uncertainty of 3;
  properties: wet mass 1 kg, dry mass 1 kg
- reinforcing steel: 3.71699e6 kg
  EcoSpold01Location=RER
  Uncertainty: & basic uncertainty of 3;
  properties: wet mass 1 kg, dry mass 1 kg, carbon content, fossil 0.004
- pitch: 758569 kg
  EcoSpold01Location=CH
  Uncertainty: & basic uncertainty of 3;
  properties: carbon content, fossil 0.83, dry mass 1 kg, wet mass 1 kg
- waste reinforced concrete: -3.90663e7 kg
  EcoSpold01Location=CH
  Uncertainty: & basic uncertainty of 3;
  production volume 4.12e7 kg
    (same comment as for waste bitumen sheet)
  properties: water content 0.00585407, wet mass 1 kg, dry mass 0.99418 kg
- steel, chromium steel 18/8, hot rolled: 75856.9 kg
  EcoSpold01Location=RER
  Uncertainty: & basic uncertainty of 3;
  properties: carbon content, fossil 0.0008, dry mass 1 kg, wet mass 1 kg
  note on carbon content, fossil: Stainless steel model is the grade 304 steel (18/8 stainless, 18% chromium 8% nickel; max. 0.08% C)

## Inputs from nature
- Transformation, from unspecified [natural resource, land]: 2844.63 m2; lognormal variance with pedigree 0.186, pedigree (4,5,5,1,1)
  Estimate on land area and production volume
  Uncertainty: & basic uncertainty of 2; estimate on land area and production volume
- Occupation, industrial area [natural resource, land]: 113785 m2*year; lognormal variance with pedigree 0.126, pedigree (4,5,5,1,1)
  Estimate on land area, production volume and building, operation and demolition time
  Uncertainty: & basic uncertainty of 1.5; estimate on land area, production volume and building, operation and demolition time
- Occupation, construction site [natural resource, land]: 14223.2 m2*year; lognormal variance with pedigree 0.126, pedigree (4,5,5,1,1)
  (same comment as for Occupation, industrial area)
- Transformation, to industrial area [natural resource, land]: 2844.63 m2; lognormal variance with pedigree 0.186, pedigree (4,5,5,1,1)
  (same comment as for Transformation, from unspecified)

## Sampling procedure
Data from literature and estimates.

## Review by Niels Jungbluth 2003-06-18
Passed.
