# packaging glass production, white

Dataset: EcoSpold 2, unit process
Geography: DE
Time period: 1996-01-01 to 2019-12-31
Technology level: old
Classification: ISIC rev.4 ecoinvent: 2310:Manufacture of glass and glass products
Classification: EcoSpold01Categories: glass/packaging
Tags: ConvertedDataset
Scenario: Business-as-Usual
System model: Allocation at the point of substitution
Share of production covered: 67 %
Generated by: Roland Hischier
Published in: Hischier R. 2007
Database: ecoinvent
isCopyrightProtected: true
accessRestrictedTo: 1

## General comment
This dataset represents the production of 1 kg of white packaging glass from a mix of primary and secondary raw materials.
Material and energy inputs as well as water consumption, emissions, and waste production are based on literature sources. Transport is an estimation based on a Swiss production site. Infrastructure is an estimation based on average European packaging glass factories.
[This dataset was already contained in the ecoinvent database version 2. It was not individually updated during the transfer to ecoinvent version 3. Life Cycle Impact Assessment results may still have changed, as they are affected by changes in the supply chain, i.e. in other datasets. This dataset was generated following the ecoinvent quality guidelines for version 2. It may have been subject to central changes described in the ecoinvent version 3 change report (http://www.ecoinvent.org/database/ecoinvent-version-3/reports-of-changes/), and the results of the central updates were reviewed extensively. The changes added e.g. consistent water flows and other information throughout the database. The documentation of this dataset can be found in the ecoinvent reports of version 2, which are still available via the ecoinvent website. The change report linked above covers all central changes that were made during the conversion process.]
CO2 emissions have been recalculated from the carbon content in raw materials and fuels.

## Included activities start
From the reception of precursors silica sand, soda, sorted glass cullets, limestone, dolomite, feldspar, and chemicals inorganics at the factory gate.

## Included activities end
This activity ends with the production of 1 kg of white packaging glass. The dataset includes material and energy inputs, water consumption, emissions to air and water, waste production, transport and infrastructure.

## Geography
average German situation, based on an industry survey

## Technology
Packaging glass is produced in a two stage moulding process with pressing and blowing techniques. The whole process is fully automatic and consists of five different stages:
1. Production of a molten glass piece (gob) with correct weight and temperature.
2. Forming of the primary shape in a first mould (blank mould) with compressed air pressure
3. Transfer to the final mould (finish mould)
4. Bringing the shaping process to an end by blowing the container with compressed air until the shape of the final mould
5. Post forming processes
The melting process is the central one. As the first glass forming material, sand, has a very high melting point. Soda as a fluxing agent is used to reduce the melting temperature. When heating soda, this is decomposed into sodium oxide Na2O, the actual fluxing agent, and into carbon dioxide that is released. Metal oxides in form of limestone (CaCO3 that decomposes to CaO), dolomite (-> Ca- and Mg-Oxides), feldspar are used as stabilizators and therefore to improve the hardness and chemical resistance of glass. For white glass decolouring agents are added.

## Parameters
- fraction, process water, to air: 0.111111 dimensionless; name fraction_PW_to_air; lognormal variance with pedigree 0.092025, pedigree (4,4,3,2,4)
  Literature value (Statistics Canada, 2007 & Shaffer, K.H., 2008, Consumptive water use in the Great Lakes Basin, USGS) (Vionnet, S., Quantis Water Database - Technical Report, 2012).

## Reference product
- packaging glass, white: 1 kg; CPC 37191: Bottles, jars, phials and other containers, of glass, of a kind used for the conveyance or packing of goods, e[…]; By-product classification allocatable product
  Glass has a long tradition as a packaging material. In addition to its use as a container for beverages, its applications include preserving glass through to container glass for food, cosmetics and pharmaceutical agents. In the field of beverage packaging, glass bottles are used in Switzerland and Europe primarily for beer, wine and spirits. The soft drinks sector is increasingly being covered by PET bottles. Nowadays packaging glass is produced by fully automated processes, based on soda-lime and modified soda-lime formulations.
  production volume 4.2e9 kg
    German production in 2000: 7 Mio t
    Proportion 60% of clear glass, estimated from data in http://www.caregroup.org.uk/glassrep.pdf. Total amount from year 2000 data in the dataset.
  property price 0.323102 EUR2005
    Calculated based on inputs: The price of the product has been calculated as a sum of the values of the material and energy inputs for this product. This value is therefore a rough estimation. It may underestimate the real price since there are additional expenses when producing any product. These expences can include for example labour costs, treatment of waste materials and profit for the producer. Please consider carefully whether this level of data quality is acceptable for your application.
  property carbon content 0
    carbon content on a dry matter basis (reserved; not for manual entry)
  property true value 0.323102
    allocation property applied in "true value" allocation // value calculated from revenue
  properties: carbon content, non-fossil 0, carbon content, fossil 0, water content 0, dry mass 1 kg, wet mass 1 kg, water in wet mass 0 kg, carbon allocation 0 kg

## By-products
- heat, for reuse in municipal waste incineration only: 0 MJ; CPC 17300: Steam and hot water; By-product classification allocatable product; pedigree (1,1,1,1,1)
  Net electricity generated from this waste and used in internal MSWI plant energy redistribution.
  Uncertainty: uncertainty is calculated from uncertainties in waste composition and uncertainties in energy efficiency and the uncertainty in internal energy demand
  production volume 5.94897e7 MJ
  property exergy 0.1842 MJ; name E_th_prod_MSWI_exergy
    This exergy property is based on the exergy content of the product.
  property true value relation 0.1842; name E_th_prod_MSWI_true_value_relation
    property to calculate "true value" from
  property price 0.0106 EUR2005; name E_th_prod_MSWI_price_EUR2005
    Average European district heat price from Ecoheatcool and Euroheat 2005-2006, Ecoheat Work package 1: The European heat market. Final report. 10.6 EUR/GJ i s the price of district heat. http://www.solarthermalworld.org/files/Ecoheatcool%20WP1%20Web.pdf?download
  property true value 9.37769e-5
    allocation property applied in "true value" allocation // value calculated from true value relation
- iron scrap, sorted, pressed: 0 kg; By-product classification Recyclable; CPC 39310: Slag, dross, scalings and other waste from the manufacture of iron or steel; pedigree (1,1,1,1,1)
  Iron scrap recovered from this waste.
  Uncertainty: uncertainty calculated from uncertainty in waste composition, uncertainty of share of recyclable metal, uncertainty of transfer coefficient to bottom ash, uncertainty of the efficiency of scrap removal in MSWI plant.
  production volume 204350 kg
  property price 0.175 EUR2005
    Temporary price data. Calculated as 90% of purchasers price based on: 2005 import and export prices (total trades (USD) divided by total weight (kg) in biggest economies of the world: EU27, USA, Brasil, China, India, Japan and Russia) from UN Commodity Trade Statistics Database (http://data.un.org/Explorer.aspxDatabase [Accessed 2011.06.20]). Commodity: Waste or scrap, of cast iron
  property carbon content 0
    carbon content on a dry matter basis (reserved; not for manual entry)
  property true value 8.51456e-6
    allocation property applied in "true value" allocation // value calculated from revenue
  properties: dry mass 1 kg, water content 0, carbon content, non-fossil 0, water in wet mass 0 kg, carbon content, fossil 0, wet mass 1 kg, carbon allocation 0 kg
- electricity, for reuse in municipal waste incineration only: 0 kWh; CPC 17100: Electrical energy; By-product classification allocatable product; pedigree (1,1,1,1,1)
  (same comment as for heat, for reuse in municipal waste incineration only)
  production volume 8.05339e6 kWh
  property exergy 3.6 MJ; name E_el_prod_MSWI_exergy
    This exergy property is based on the exergy content of the product.
  property true value relation 3.6; name E_el_prod_MSWI_true_value_relation
    property to calculate "true value" from
  property price 0.1 EUR2005; name E_el_prod_MSWI_price_EUR2005
    Estimated to be the same price as in case of electricity, medium voltage.
  property true value 0.000248111
    (same comment as for heat, for reuse in municipal waste incineration only)
- iron scrap, unsorted: 0 kg; source European Aluminium Association 2008; CPC 39310: Slag, dross, scalings and other waste from the manufacture of iron or steel; By-product classification Recyclable; pedigree (1,1,1,1,1)
  production volume 28.8489 kg
  property price 0.149 EUR2005; name ironScrapAmount_price_EUR2005
    Temporary price data. Calculated as 90% of purchasers price based on: estimated at 85% of sorted scrap
  property carbon content 0
    carbon content on a dry matter basis (reserved; not for manual entry)
  property true value 1.02345e-9
    allocation property applied in "true value" allocation // value calculated from revenue
  properties: water in wet mass 0 kg, water content 0, carbon content, fossil 0, carbon content, non-fossil 0, dry mass 1 kg, wet mass 1 kg, carbon allocation 0 kg
- aluminium oxide, non-metallurgical: 0 kg; source European Aluminium Association 2008; CPC 41432: Alumina (aluminium oxide), except artificial corundum; By-product classification allocatable product; CAS 1344-28-1; pedigree (1,1,1,1,1)
  production volume 1815.36 kg
  property carbon content, non-fossil 0; name C_content_non_fossil
  property price 0.28 EUR2005; name Al2O3Amount_price_EUR2005
    From UN trade database. http://data.un.org/ Import data from the largest economies of the world are used (Brazil, India, USA, China, Japan and EU-27).
  property dry mass 1 kg; name DM
  property water content 0; name water_content
  property wet mass 1 kg; name WM
  property water in wet mass 0 kg; name WWM
  property carbon content, fossil 0; name C_content_fossil
  property carbon content 0
    carbon content on a dry matter basis (reserved; not for manual entry)
  property true value 1.21024e-7
    allocation property applied in "true value" allocation // value calculated from revenue
  properties: carbon allocation 0 kg
- aluminium, cast alloy: 0 kg; source European Aluminium Association 2008; By-product classification allocatable product; CPC 41431: Unwrought aluminium; pedigree (1,1,1,1,1)
  EcoSpold01Location=RER
  production volume 16969.5 kg
  property price 1.3 EUR2005; name castAlloyAmount_price_EUR2005
    Temporary price data. Calculated as 90% of purchasers price based on: Source: London Metal Exchange, Aluminium alloy price for 2005
  property carbon content 0
    carbon content on a dry matter basis (reserved; not for manual entry)
  property true value 5.25248e-6
    allocation property applied in "true value" allocation // value calculated from revenue
  properties: water in wet mass 0 kg, carbon content, non-fossil 0, water content 0, dry mass 1 kg, carbon content, fossil 0, wet mass 1 kg, carbon allocation 0 kg
- aluminium, wrought alloy: 0 kg; source European Aluminium Association 2008; By-product classification allocatable product; CPC 4153: Semi-finished products of aluminium or aluminium alloys; pedigree (1,1,1,1,1)
  production volume 7428.94 kg
  property price 1.44 EUR2005; name secondaryAluminiumOutput_price_EUR2005
    Estimated based on literature values and expert judgement. Aluminium ccast alloys are about 90% of the price of aluminium wrought alloys.
  property carbon content 0
    carbon content on a dry matter basis (reserved; not for manual entry)
  property true value 2.54707e-6
    allocation property applied in "true value" allocation // value calculated from revenue
  properties: wet mass 1 kg, water content 0, carbon content, fossil 0, water in wet mass 0 kg, carbon content, non-fossil 0, dry mass 1 kg, carbon allocation 0 kg
- copper: 0 kg; source Rentz O. 1999; By-product classification allocatable product; CPC 41413: Refined copper and copper alloys, unwrought; master alloys of copper
  Literature value. Copper uses: Before end-use copper is manufactured into semi fabricated products, such as shapes and ingots (known as 'semis'). These manufacturing processes are subdivided into hot working, cold working and, if necessary, process annealing. Few of the semis are ready for use as such. They more typically travel to first-stage manufacturers, who make metal rods, wire, and casting, and then to component manufacturers who produce such things as motors, valves, and insulated cables The components in turn are incorporated by final-stage manufacturers into a variety of finished products - automobiles, commercial buildings, residential housing, and so forth. These uses account for about 79% of the world-wide consumption of copper.
  production volume 1963.34 kg
  property price 5.52 EUR2005
    Literature value (http://www.economist.com/news/business/21576714-mining-industry-has-enriched-chile-its-future-precarious-copper-solution). Average price between 20015 and 2013.
  property carbon content 0
    carbon content on a dry matter basis (reserved; not for manual entry)
  property true value 2.58039e-6
    allocation property applied in "true value" allocation // value calculated from revenue
  properties: dry mass 1 kg, water in wet mass 0 kg, wet mass 1 kg, carbon content, non-fossil 0, water content 0, carbon content, fossil 0, carbon allocation 0 kg
- zinc concentrate: 0 kg; CPC 14290: Other non-ferrous metal ores and concentrates (other than uranium or thorium ores and concentrates); By-product classification allocatable product
  Calculated value from the knowledge of the properties of both products.
  production volume 1.55836e-6 kg
  property price 0.38 EUR2005; name ByP_price_EUR2005
    Temporary price data. Calculated as 90% of purchasers price based on: Zinc content in concentrate 53%. Concentrate price per kg Zn 86.5% of refined Zn price (13.5% treatment charges according to CHR Metals Limited 2005: Dynamic cost curves. http://www.minecost.com/dynamic.pdf). 2004 zinc price from USGS (2007) Mineral commodity summaries 2007. <http://minerals.usgs.gov/minerals/pubs/mcs/2007/mcs2007.pdf> [Accessed 25 May 2010]
  property zinc content 0.53; name zinc_C_zinc_concentrate
    Zinc content on a dry matter basis. Value taken from teh "zinc mine operation" /GLO dataset.
  property dry mass 1 kg; name DM_zinc_concentrate
  property carbon content 0
    carbon content on a dry matter basis (reserved; not for manual entry)
  property true value 1.40994e-16
    allocation property applied in "true value" allocation // value calculated from revenue
  properties: wet mass 1 kg, water content 0, carbon content, non-fossil 0, carbon content, fossil 0, water in wet mass 0 kg, carbon allocation 0 kg

## Inputs from technosphere
- packaging glass factory: 1.24861e-10 unit; lognormal variance with pedigree 0.4921, pedigree (5,4,5,3,4)
  EcoSpold01Location=RER
  Estimation: infrastructure represents an average packaging glass factory in Europe.
  Uncertainty: own estimation
- EUR-flat pallet: 0.000715201 unit; source European Commission 2000; lognormal variance with pedigree 0.052625, pedigree (2,4,5,2,1)
  EcoSpold01Location=RER
  Estimation: estimation based on average european production from literature value
  Uncertainty: estimation from IPPC study
  properties: carbon content, non-fossil 0.58833, water content 0.2, wet mass 22 kg, dry mass 18.3333 kg, carbon content, fossil 0.0311351
  note on carbon content, non-fossil: C content in components of the pallet (ecoinvent v2.2 report 7_part XVIII)
- lime: 0.0470474 kg; source Plinke E. 2000; lognormal variance with pedigree 0.0401, pedigree (1,2,5,1,1)
  Literature value.
  EcoSpold01Location=CH
  Uncertainty: data from a German study (UBA)
  properties: dry mass 1 kg, wet mass 1 kg, carbon content, fossil 0.120005
- heavy fuel oil: 0.0235737 kg; name heavy_fuel; source Plinke E. 2000; lognormal variance with pedigree 0.0401, pedigree (1,2,5,1,1)
  Literature value. 75% natural gas and 25% heavy fuel oil according to literature source.
  EcoSpold01Location=RER
  Uncertainty: data from a German study (UBA)
  property carbon content, fossil 0.849; name C_in_heavy_fuel
  properties: wet mass 1 kg, dry mass 1 kg
- chemical, inorganic: 0.00058235 kg; source Plinke E. 2000; lognormal variance with pedigree 0.0401, pedigree (1,2,5,1,1)
  EcoSpold01Location=GLO
  Estimation: it is a first approximation of all auxiliaries. The material composition is based on a packaging glass production site in Switzerland own by a large European company. The total amount is from literature source.
  Uncertainty: data from a German study (UBA)
  properties: carbon content, fossil 0.003, dry mass 1 kg, wet mass 1 kg
  note on carbon content, fossil: This dataset is an unweighted average of 20 inorganic substances (listed in Tab 88.1, ecoinvent v2.2 report 8, part II), being part of the top100 chemicals included in this database. The C-content has also been calculated as an unweighted average of the C content of the substances composing this dataset.
- graphite: 1.24861e-6 kg; source Plinke E. 2000; lognormal variance with pedigree 0.0401, pedigree (1,2,5,1,1)
  EcoSpold01Location=RER
  Literature value.
  Uncertainty: data from a German study (UBA)
  properties: dry mass 1 kg, wet mass 1 kg, carbon content, fossil 1
- silica sand: 0.25072 kg; source Plinke E. 2000; lognormal variance with pedigree 0.0401, pedigree (1,2,5,1,1)
  EcoSpold01Location=DE
  Literature value.
  Uncertainty: data from a German study (UBA)
  properties: wet mass 1 kg, dry mass 0.99 kg, water content 0.010101
- glass cullet, sorted: 0.624303 kg
  Estimation based on european production from literature source.
  properties: dry mass 1 kg, wet mass 1 kg
- natural gas, high pressure: 0.0745321 m3; name gas; source Plinke E. 2000; lognormal variance with pedigree 0.0401, pedigree (1,2,5,1,1)
  EcoSpold01Location=RER
  Literature value. 75% natural gas and 25% heavy fuel oil according to literature source.
  Uncertainty: data from a German study (UBA)
  property carbon content, fossil 0.602381; name C_in_gas
  properties: wet mass 0.84 kg, dry mass 0.84 kg, heating value, gross 39 MJ
  note on carbon content, fossil: An average C content of 0.506 kg C/ m3 has been assumed (this average has been calculated using data in Tab 3.5, ecoinvent v2.2 report 6_V
- diesel: 0.00130854 kg; source Plinke E. 2000; lognormal variance with pedigree 0.0401, pedigree (1,2,5,1,1)
  Literature value.
  EcoSpold01Location=RER
  Uncertainty: data from a German study (UBA)
  properties: carbon content, fossil 0.865, wet mass 1 kg, dry mass 1 kg
  note on carbon content, fossil: C-content of diesel is 86.5% (ecoinvent v2.2 report 6_IV, Tab 3.14)
- dolomite: 0.0434515 kg; source Plinke E. 2000; lognormal variance with pedigree 0.0401, pedigree (1,2,5,1,1)
  EcoSpold01Location=RER
  Literature value.
  Uncertainty: data from a German study (UBA)
  properties: carbon content, fossil 0.130435, wet mass 1 kg, dry mass 1 kg
- solid unbleached board: 0.0175804 kg; source European Commission 2000; lognormal variance with pedigree 0.052625, pedigree (2,4,5,2,1)
  EcoSpold01Location=RER
  Estimation based on european production from literature source.
  Uncertainty: estimation from IPPC study
  properties: dry mass 0.945 kg, carbon content, non-fossil 0.353395, wet mass 1 kg, carbon content, fossil 0.0207076, water content 0.0582011
  note on carbon content, non-fossil: Biogenic C content was calculated after biogenic C contents of chemicals used in the production of board (Tab 11.25 ecoinvent v2.2 report 11_III, part 11). The cellulose content in 1 kg of paper (on a wet mas basis) was estimated as (1-chemical content), C content of cellulose was considered 0.44 kgC/kg dry mass (ecoinvent v2.2 report, n 15a, pg 40)
  note on carbon content, fossil: Fossil C content was calculated after fossil C contents of chemicals used in the production of board (Tab 11.25 ecoinvent v2.2 report 11_III, part 11)
- lubricating oil: 2.37734e-5 kg; source Plinke E. 2000; lognormal variance with pedigree 0.0401, pedigree (1,2,5,1,1)
  EcoSpold01Location=RER
  data from a German study (UBA)
  Uncertainty: data from a German study (UBA)
  properties: carbon content, fossil 0.75, dry mass 1 kg, wet mass 1 kg
  note on carbon content, fossil: Lubricating oil is produced from diesel. C-content/dry mass of fats and oils considered 75%, from: ecoinvent v2.2 report, n 15a, pg 40
- electricity, medium voltage: 0.158823 kWh; source Plinke E. 2000; lognormal variance with pedigree 0.0401, pedigree (1,2,5,1,1)
  Literature value.
  EcoSpold01Location=DE
  Uncertainty: data from a German study (UBA)
- municipal solid waste: -0.00499442 kg; source European Commission 2000; lognormal variance with pedigree 0.052625, pedigree (2,4,5,2,1)
  Estimation based on european production from literature source.
  EcoSpold01Location=CH
  Uncertainty: estimation from IPPC study
  production volume 2.1e7 kg; = Ref('a84e2d8f-d112-4b59-90a4-d405bfd9c043', 'ProductionVolume') * ((Ref('62520165-b772-4ef8-82e2-cbccb6d0c1e3')*-1) / Ref('a84e2d8f-d112-4b59-90a4-d405bfd9c043'))
    Calculated from production volume of reference product using the relative outputs.
  properties: carbon content, non-fossil 0.261655, carbon content, fossil 0.171549, water content 0.297017, wet mass 1 kg, dry mass 0.771 kg
  note on carbon content, non-fossil: MSW composition in tab 4.1, ecoinvent v2.2 report 13_I. C content referred to 1 kg DM
- feldspar: 0.0285681 kg; source Plinke E. 2000; lognormal variance with pedigree 0.0401, pedigree (1,2,5,1,1)
  Literature value.
  EcoSpold01Location=RER
  Uncertainty: data from a German study (UBA)
  properties: dry mass 1 kg, wet mass 1 kg
- polyethylene, high density, granulate: 0.0116869 kg; lognormal variance with pedigree 0.052625, pedigree (2,4,5,2,1)
  Estimation based on european production from literature source.
  EcoSpold01Location=RER
  Uncertainty: estimation from IPPC study
  properties: dry mass 1 kg, carbon content, fossil 0.857143, wet mass 1 kg
  note on carbon content, fossil: Polyethylene is formed out of a huge amount of ethylene monomers (C2H4) (ecoinvent v2.2 report 11_II). MW=28 g/mol
- soda ash, light, crystalline, heptahydrate: 0.0760151 kg; name soda; source Plinke E. 2000; lognormal variance with pedigree 0.0401, pedigree (1,2,5,1,1)
  Literature value.
  EcoSpold01Location=RER
  Uncertainty: data from a German study (UBA)
  properties: wet mass 1 kg, carbon content, fossil 0.0517241, dry mass 1 kg

## Inputs from nature
- Water, unspecified natural origin [natural resource, in water]: 0.000211763 m3; name water_UNO_input; source Plinke E. 2000; lognormal variance with pedigree 0.0401, pedigree (1,2,5,1,1)
  Literature value.
  Uncertainty: data from a German study (UBA)

## Emissions to nature
- Particulates, > 2.5 um, and < 10um [air, urban air close to ground]: 5.1942e-7 kg; source Berdowski J. 2002; lognormal variance with pedigree 0.1601, pedigree (1,2,5,1,1)
  Calculated value: total amount based on literature value (Plinke, 2000). Distribution of particulate mater was calculated according to the ratio for the paricle distribution of combustion processes present in the literature source assuming a mix of 32% secondary and 68% primary abatment technology.
  Uncertainty: data from a German study (UBA), split according US-EPA
- Benzene [air, urban air close to ground]: 7.06211e-8 kg; source Plinke E. 2000; lognormal variance with pedigree 0.1601, pedigree (1,2,5,1,1)
  data from a German study (UBA)
  Uncertainty: data from a German study (UBA)
- Copper [air, urban air close to ground]: 1.40843e-8 kg; lognormal variance with pedigree 0.7021, pedigree (1,4,5,3,1)
  Estimation based on one European factory.
  Uncertainty: estimation from data of 1 European producer
- Sulfur dioxide [air, urban air close to ground]: 0.000740173 kg; source Plinke E. 2000; lognormal variance with pedigree 0.0401, pedigree (1,2,5,1,1)
  Literature value.
  Uncertainty: data from a German study (UBA)
- Chromium [air, urban air close to ground]: 1.40843e-8 kg; lognormal variance with pedigree 0.7021, pedigree (1,4,5,3,1)
  (same comment as for Copper)
- Manganese [air, urban air close to ground]: 1.40843e-8 kg; lognormal variance with pedigree 0.7021, pedigree (1,4,5,3,1)
  (same comment as for Copper)
- Water [air, unspecified]: 2.35293e-5 m3; name water_to_air_unspecified; = (water_UNO_input*fraction_PW_to_air); lognormal variance with pedigree 0.0807, pedigree (2,2,5,1,1)
  Calculated value based on literature values and expert opinion. See comments in the parametres' comment field.
  property fraction, origin: unspecified 1; name fraction_origin_unspecified
  property fraction, origin: fresh water 0; name fraction_origin_fresh_water
  property fraction, origin: salt water 0; name fraction_origin_salt_water
- Nitrogen oxides [air, urban air close to ground]: 0.00086803 kg; source Plinke E. 2000; lognormal variance with pedigree 0.0801, pedigree (1,2,5,1,1)
  Literature value.
  Uncertainty: data from a German study (UBA)
- Arsenic [air, urban air close to ground]: 1.40843e-8 kg; lognormal variance with pedigree 0.7021, pedigree (1,4,5,3,1)
  (same comment as for Copper)
- Ammonia [air, urban air close to ground]: 2.61708e-8 kg; source Plinke E. 2000; lognormal variance with pedigree 0.0801, pedigree (1,2,5,1,1)
  data from a German study (UBA)
  Uncertainty: data from a German study (UBA)
- Cadmium [air, urban air close to ground]: 1.40843e-8 kg; lognormal variance with pedigree 0.7021, pedigree (1,4,5,3,1)
  (same comment as for Copper)
- Carbon dioxide, fossil [air, urban air close to ground]: 0.308045 kg; = (gas* C_in_gas+heavy_fuel* C_in_heavy_fuel)*44/12+soda*44/106+lime*44/100+dolomite*88/215; lognormal variance with pedigree 0.0401, pedigree (1,2,5,1,1)
  Calculated from carbon in fuels and raw materials
- Selenium [air, urban air close to ground]: 1.53828e-6 kg; lognormal variance with pedigree 0.7021, pedigree (1,4,5,3,1)
  (same comment as for Copper)
- Formaldehyde [air, urban air close to ground]: 3.01663e-7 kg; source Plinke E. 2000; lognormal variance with pedigree 0.1601, pedigree (1,2,5,1,1)
  data from a German study (UBA)
  Uncertainty: data from a German study (UBA)
- Particulates, < 2.5 um [air, urban air close to ground]: 1.28856e-6 kg; source Berdowski J. 2002; lognormal variance with pedigree 0.3401, pedigree (1,2,5,1,1)
  (same comment as for Particulates, > 2.5 um, and < 10um)
- Carbon monoxide, fossil [air, urban air close to ground]: 6.99219e-6 kg; source Plinke E. 2000; lognormal variance with pedigree 0.6901, pedigree (1,2,5,1,1)
  data from a German study (UBA)
  Uncertainty: data from a German study (UBA)
- Lead [air, urban air close to ground]: 1.61819e-7 kg; lognormal variance with pedigree 0.7021, pedigree (1,4,5,3,1)
  (same comment as for Copper)
- Hydrogen fluoride [air, urban air close to ground]: 5.20419e-6 kg; source Plinke E. 2000; lognormal variance with pedigree 0.0801, pedigree (1,2,5,1,1)
  Literature value.
  Uncertainty: data from a German study (UBA)
- Nickel [air, urban air close to ground]: 1.40843e-8 kg; lognormal variance with pedigree 0.7021, pedigree (1,4,5,3,1)
  (same comment as for Copper)
- Antimony [air, urban air close to ground]: 1.40843e-8 kg; lognormal variance with pedigree 0.7021, pedigree (1,4,5,3,1)
  (same comment as for Copper)
- Water [water, unspecified]: 0.000188234 m3; name water_to_water_unspecified; = water_UNO_input*(1-fraction_PW_to_air); lognormal variance with pedigree 0.0807, pedigree (2,2,5,1,1)
  (same comment as for Water)
  property fraction, origin: salt water 0; name fraction_origin_salt_water_Ww
  property fraction, origin: fresh water 0; name fraction_origin_fresh_water_Ww
  property fraction, origin: unspecified 1; name fraction_origin_unspecified_Ww
- Particulates, > 10 um [air, urban air close to ground]: 8.20084e-6 kg; source Berdowski J. 2002; lognormal variance with pedigree 0.0801, pedigree (1,2,5,1,1)
  Calculated value: total amount based on literature value (Plinke et al. 2000). Distribution of particulate mater was calculated according to the ratio for the paricle distribution of combustion processes present in the literature source assuming a mix of 32% secondary and 68% primary abatment technology.
  Uncertainty: data from a German study (UBA)
- Hydrogen chloride [air, urban air close to ground]: 1.68811e-5 kg; source Plinke E. 2000; lognormal variance with pedigree 0.0801, pedigree (1,2,5,1,1)
  Literature value.
  Uncertainty: data from a German study (UBA)
- Benzo(a)pyrene [air, urban air close to ground]: 1.00887e-11 kg; source Plinke E. 2000; lognormal variance with pedigree 0.1601, pedigree (1,2,5,1,1)
  data from a German study (UBA)
  Uncertainty: data from a German study (UBA)
- Hydrocarbons, aliphatic, alkanes, unspecified [air, urban air close to ground]: 1.18867e-5 kg; source Plinke E. 2000; lognormal variance with pedigree 0.0801, pedigree (1,2,5,1,1)
  data from a German study (UBA)
  Uncertainty: data from a German study (UBA)
- Methane, fossil [air, urban air close to ground]: 8.93003e-8 kg; source Plinke E. 2000; lognormal variance with pedigree 0.0801, pedigree (1,2,5,1,1)
  data from a German study (UBA)
  Uncertainty: data from a German study (UBA)
- Dioxins, measured as 2,3,7,8-tetrachlorodibenzo-p-dioxin [air, urban air close to ground]: 0 kg; source Plinke E. 2000; pedigree (1,1,1,1,1)
  data from a German study (UBA)
  Uncertainty: data from a German study (UBA)
- NMVOC, non-methane volatile organic compounds, unspecified origin [air, urban air close to ground]: 3.25636e-6 kg; source Plinke E. 2000; lognormal variance with pedigree 0.0801, pedigree (1,2,5,1,1)
  data from a German study (UBA)
  Uncertainty: data from a German study (UBA)
- Cobalt [air, urban air close to ground]: 1.40843e-8 kg; lognormal variance with pedigree 0.7021, pedigree (1,4,5,3,1)
  (same comment as for Copper)
- Dinitrogen monoxide [air, urban air close to ground]: 4.33516e-7 kg; source Plinke E. 2000; lognormal variance with pedigree 0.0801, pedigree (1,2,5,1,1)
  data from a German study (UBA)
  Uncertainty: data from a German study (UBA)

## Sampling procedure
German LCA study

## Review by Hans-Jörg Althaus 2003-08-20
passed

## Review by Roland Hischier 2011-11-29
Transfer of documentation done.

## Review by Emilia Moreno Ruiz 2013-07-22
restructuring of the "glass cullet, sorted" supply chain
