# treatment of wastewater from particle board production, capacity 5E9l/year

Dataset: EcoSpold 2, unit process
Geography: RoW
Time period: 2012-01-01 to 2019-12-31
Technology level: current
Classification: EcoSpold01Categories: waste management/wastewater treatment
Classification: ISIC rev.4 ecoinvent: 3700:Sewerage
Tags: Treatment
Scenario: Business-as-Usual
System model: Allocation at the point of substitution
Generated by: Frank Werner
Database: ecoinvent
isCopyrightProtected: true
accessRestrictedTo: 1

## General comment
Wastewater purified in a medium size municipal wastewater treatment plant (capacity class 3), with an average capacity size of 24900 per-captia-equivalents PCE.
The treated waste water has the following composition (see sampling procedure for source):
Wastewater contains (in kg/m3): COD: 0.00044 (GSD=122.5%); BOD: 0.0000616 (GSD=122.5%);
[This dataset is meant to replace the following datasets:
- treatment of wastewater from particle board production, capacity 5E9l/year, GLO, 1994 - 2000]

## Included activities end
Infrastructure materials for municipal wastewater treatment plant, transports, dismantling. Land use burdens.

## Geography
Specific to the technology mix encountered in Switzerland in 2000. Well applicable to modern treatment practices in Europe, North America or Japan.

## Technology
Three stage wastewater treatment (mechanical, biological, chemical) including sludge digestion (fermentation) according to the average technology in Switzerland

## Parameters
- fraction, process water, to air: 0.1 dimensionless; lognormal variance with pedigree 0.092025, pedigree (4,4,3,2,4)

## Reference product
- wastewater from particle board production: -1 m3; CPC 39920: Sewage sludge; By-product classification Waste
  EcoSpold01Location=CH
  production volume 4.33e6 m3; name p_board
    calculated from GLO production volume times waste water/m3
  property price 0 EUR2005
    Waste products are assigned a price of zero as they are assumed to require further treatment.
  property carbon content, non-fossil 0.377131
    BOD= 0.196 kg/m3 (Tab A.17, ecoinvent v2.2 report 13_I). BOD was converted to TOC, using conversion factors in Tab 4.10 (ecoinvent v2.2 report 13_IV). TOC was considered as Total Carbon.
  property carbon content 0.377131
    carbon content on a dry matter basis (reserved; not for manual entry)
  properties: dry mass 0.337476 kg, carbon content, fossil 0, wet mass 1000 kg, water in wet mass 999.663 kg, water content 2962.17, carbon allocation 0.127273 kg

## By-products
- heat, for reuse in municipal waste incineration only: 0 MJ; CPC 17300: Steam and hot water; By-product classification allocatable product; pedigree (1,1,1,1,1)
  Net electricity generated from this waste and used in internal MSWI plant energy redistribution.
  Uncertainty: uncertainty is calculated from uncertainties in waste composition and uncertainties in energy efficiency and the uncertainty in internal energy demand
  property exergy 0.1842 MJ; name E_th_prod_MSWI_exergy
  property price 0.0106 EUR2005; name E_th_prod_MSWI_price_EUR2005
  property true value relation 0.1842; name E_th_prod_MSWI_true_value_relation
- electricity, for reuse in municipal waste incineration only: 0 kWh; CPC 17100: Electrical energy; By-product classification allocatable product; pedigree (1,1,1,1,1)
  (same comment as for heat, for reuse in municipal waste incineration only)
  property true value relation 3.6; name E_el_prod_MSWI_true_value_relation
  property price 0.1 EUR2005; name E_el_prod_MSWI_price_EUR2005
  property exergy 3.6 MJ; name E_el_prod_MSWI_exergy

## Inputs from technosphere
- residual material landfill: 0 unit; pedigree (1,1,1,1,1)
  burden from sludge incineration. Uncertainty calculated from wastewater composition and treatment model
  EcoSpold01Location=CH
- sewer grid, 5E9l/year, 110 km: 2.17e-7 km; lognormal variance with pedigree 0.004, pedigree (1,1,3,5,1)
  EcoSpold01Location=CH
  uncertainty heeded in exchanges of the module
- process-specific burdens, slag landfill: 3.73e-7 kg; lognormal variance with pedigree 0.034, pedigree (1,1,3,5,1)
  (same comment as for residual material landfill)
- hydrochloric acid, without water, in 30% solution state: 1.93e-12 kg; lognormal variance with pedigree 0.114, pedigree (1,1,3,5,1)
  EcoSpold01Location=RER
  burden from sludge incineration. Uncertainty calculated from wastewater composition and treatment model
  properties: wet mass 1 kg, dry mass 1 kg
- process-specific burdens, residual material landfill: 1.72e-7 kg; lognormal variance with pedigree 0.034, pedigree (1,1,3,5,1)
  (same comment as for residual material landfill)
- municipal waste incineration facility: 5.654e-14 unit; lognormal variance with pedigree 0.014, pedigree (1,1,3,5,1)
  EcoSpold01Location=CH
  burden from sludge incineration. Uncertainty calculated from wastewater composition and treatment model
- heat, district or industrial, other than natural gas: 0 MJ; pedigree (1,1,1,1,1)
  (same comment as for residual material landfill)
- waste graphical paper: 0 kg; name w_paper; pedigree (1,1,1,1,1)
  direct wastewater treatment plant burden. Uncertainty calculated from wastewater composition and treatment model
  EcoSpold01Location=CH
  production volume 0 kg
    Calculated from the production volume of wastewater from particle board production in proportion to the respective output amounts.
  property price 0 EUR2005; name w_paper_price_EUR2005
  properties: wet mass 1 kg, water content 0.126126, dry mass 0.888 kg, carbon content, non-fossil 0.454955
- process-specific burdens, municipal waste incineration: 0.0002261 kg; lognormal variance with pedigree 0.014, pedigree (1,1,3,5,1)
  (same comment as for residual material landfill)
- cement, unspecified: 0 kg; pedigree (1,1,1,1,1)
  (same comment as for residual material landfill)
  properties: dry mass 1 kg, wet mass 1 kg
- waste cement, hydrated: -1.73e-7 kg; name w_cement; lognormal variance with pedigree 0.044, pedigree (1,1,3,5,1)
  (same comment as for residual material landfill)
  production volume 0.74909 kg; = p_board*w_cement
    (same comment as for waste graphical paper)
  property price 0 EUR2005; name w_cement_price_EUR2005
  properties: dry mass 1 kg, wet mass 1 kg
- waste plastic, mixture: 0 kg; name w_plastic; pedigree (1,1,1,1,1)
  (same comment as for waste graphical paper)
  production volume 0 kg
    (same comment as for waste graphical paper)
  property price 0 EUR2005; name w_plastic_price_EUR2005
  properties: wet mass 1 kg, dry mass 0.847 kg, carbon content, fossil 0.747344, water content 0.180638
  note on carbon content, fossil: C content in 1 kg DM was calculated using data in Tab A.2, ecoinvent v2.2 report 13_I
- electricity, low voltage: 0 kWh; pedigree (1,1,1,1,1)
  (same comment as for waste graphical paper)
- slag landfill: 0 unit; pedigree (1,1,1,1,1)
  (same comment as for residual material landfill)
- chemical, inorganic: 3.21e-12 kg; lognormal variance with pedigree 0.114, pedigree (1,1,3,5,1)
  EcoSpold01Location=GLO
  burden from sludge incineration. Uncertainty calculated from wastewater composition and treatment model
  properties: wet mass 1 kg, dry mass 1 kg, carbon content, fossil 0.003
  note on carbon content, fossil: This dataset is an unweighted average of 20 inorganic substances (listed in Tab 88.1, ecoinvent v2.2 report 8, part II), being part of the top100 chemicals included in this database. The C-content has also been calculated as an unweighted average of the C content of the substances composing this dataset.
- wastewater treatment facility, capacity 5E9l/year: 5.6882e-9 unit; lognormal variance with pedigree 0.004, pedigree (1,1,3,5,1)
  uncertainty heeded in exchanges of the module
  EcoSpold01Location=CH
- heat, district or industrial, other than natural gas: 5.63713e-6, 0.0125744 MJ (2 entries); lognormal variance with pedigree 0.014, pedigree (1,1,3,5,1)
  (same comment as for residual material landfill)
- electricity, for reuse in municipal waste incineration only: 3.07553e-5 kWh; lognormal variance with pedigree 0.029, pedigree (1,1,3,5,1)
- waste graphical paper: -0.000758025, -0.000115754, -1.01216e-5, -0.000418268, -4.07846e-5, -7.54965e-5, -0.0140816 kg (7 entries); lognormal variance with pedigree 0.002, pedigree (1,1,3,1,1)
  (same comment as for waste graphical paper)
  production volume 67115 kg
- cement, unspecified: 2.41942e-9, 1.77206e-10, 5.05094e-10, 1.14229e-8, 3.36208e-10, 3.69256e-9, 4.46759e-10, 4.98999e-8 kg (8 entries); lognormal variance with pedigree 0.044, pedigree (1,1,3,5,1)
  (same comment as for residual material landfill)
- waste plastic, mixture: -0.00190479, -0.000127271, -9.62528e-6, -5.25674e-5, -2.12366e-5, -4.99177e-5, -0.0133346 kg (7 entries); lognormal variance with pedigree 0.004, pedigree (1,1,3,5,1)
  (same comment as for waste graphical paper)
  production volume 67115 kg
- heat, for reuse in municipal waste incineration only: 0.000176735 MJ; lognormal variance with pedigree 0.029, pedigree (1,1,3,5,1)
- electricity, low voltage: 0.000370309, 6.49474e-5, 0.001068, 0.0161512, 0.00266224, 0.0075833 kWh (6 entries); lognormal variance with pedigree 0.124, pedigree (1,1,3,5,1)
  (same comment as for waste graphical paper)
- heat, district or industrial, natural gas: 0.000295124, 0.0166849 MJ (2 entries); lognormal variance with pedigree 0.0371, pedigree (4,2,3,5,1)
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
## Emissions to nature
- DOC, Dissolved Organic Carbon [water, surface water]: 2.13e-5 kg; lognormal variance with pedigree 0.004, pedigree (1,1,3,5,1)
  sewer overload discharge plus direct wastewater treatment plant emission plus emission from sludge incineration. Uncertainty calculated from wastewater composition and treatment model
- Methane, non-fossil [air, urban air close to ground]: 1.451e-6 kg; lognormal variance with pedigree 0.174, pedigree (1,1,3,5,1)
  direct digester gas emission plus emission from sludge incineration. Uncertainty calculated from wastewater composition and treatment model
- NMVOC, non-methane volatile organic compounds, unspecified origin [air, urban air close to ground]: 6.591e-9 kg; lognormal variance with pedigree 0.294, pedigree (1,1,3,5,1)
  direct digester gas emission. Uncertainty calculated from wastewater composition and treatment model
- TOC, Total Organic Carbon [water, ground-, long-term]: 4.88e-7 kg; lognormal variance with pedigree 0.154, pedigree (1,1,3,5,1)
  emission from sludge incineration. Uncertainty calculated from wastewater composition and treatment model
- Carbon monoxide, non-fossil [air, urban air close to ground]: 4.732e-7 kg; lognormal variance with pedigree 0.194, pedigree (1,1,3,5,1)
  (same comment as for Methane, non-fossil)
- Water [water, unspecified]: 0.9 m3; lognormal variance with pedigree 0.0447, pedigree (2,2,3,5,1)
  Calculated value based on water balance.
  property carbon content, fossil 0; name C_content_fossil
  property water in wet mass 1000 kg; name WWM
  property wet mass 1000 kg; name WM
  property dry mass 0 kg; name DM
  property carbon content, non-fossil 0; name C_content_non_fossil
- BOD5, Biological Oxygen Demand [water, surface water]: 5.843e-6 kg; lognormal variance with pedigree 0.094, pedigree (1,1,3,5,1)
  (same comment as for DOC, Dissolved Organic Carbon)
- Water [air, unspecified]: 0.1 m3; lognormal variance with pedigree 0.0447, pedigree (2,2,3,5,1)
  Calculated value based on water balance.
- COD, Chemical Oxygen Demand [water, ground-, long-term]: 1.233e-6 kg; lognormal variance with pedigree 0.154, pedigree (1,1,3,5,1)
  (same comment as for TOC, Total Organic Carbon)
- TOC, Total Organic Carbon [water, surface water]: 4.88e-7 kg; lognormal variance with pedigree 0.084, pedigree (1,1,3,5,1)
  (same comment as for DOC, Dissolved Organic Carbon)
- Carbon dioxide, non-fossil [air, urban air close to ground]: 0.00059 kg; lognormal variance with pedigree 0.064, pedigree (1,1,3,5,1)
  direct wastewater treatment plant emission plus direct digester gas emission plus emission from sludge incineration. Uncertainty calculated from wastewater composition and treatment model
- DOC, Dissolved Organic Carbon [water, ground-, long-term]: 4.87e-7 kg; lognormal variance with pedigree 0.154, pedigree (1,1,3,5,1)
  (same comment as for TOC, Total Organic Carbon)
- BOD5, Biological Oxygen Demand [water, ground-, long-term]: 4.033e-7 kg; lognormal variance with pedigree 0.154, pedigree (1,1,3,5,1)
  (same comment as for TOC, Total Organic Carbon)
- COD, Chemical Oxygen Demand [water, surface water]: 8.526e-5 kg; lognormal variance with pedigree 0.004, pedigree (1,1,3,5,1)
  (same comment as for DOC, Dissolved Organic Carbon)

## Sampling procedure
Survey among member companies of the European Panel Federation; generation of dataset with ecoinvent 2.0 tool for treatment of wastewater
