# vinyl chloride production

Dataset: EcoSpold 2, unit process
Geography: RER
Time period: 2013-01-01 to 2019-12-31
Technology level: current
Classification: ISIC rev.4 ecoinvent: 2013:Manufacture of plastics and synthetic rubber in primary forms
Synonyms: VCM, chloroethene
Scenario: Business-as-Usual
System model: Allocation at the point of substitution
Share of production covered: 85 %
Generated by: Thomas Fröhlich
Published in: PlasticsEurope 2016
Database: ecoinvent
isCopyrightProtected: true
accessRestrictedTo: 1

## General comment
The dataset represents the production mix of commercial integrated EDC/VCM production technologies (oxychlorination and direct chlorination) in both balanced and non-balanced units.
The chlorination of ethylene can either be carried out by using chlorine (direct chlorination) or by using hydrogen chloride and oxygen (oxychlorination). Thermal cracking of dry, pure EDC then produces VCM and HCl. When all the HCl generated in EDC cracking is re-used in an oxychlorination section, and when no EDC or HCI is imported or exported, then the VCM unit is called a ‘balanced unit’. By using both, direct chlorination and oxychlorination, for EDC production, balanced units achieve a high level of chlorine utilisation without producing HCl as a by-product. Assuming a complete incorporation of chlorine input into EDC within a balanced unit, half of the produced EDC originates from each of the applied processes, direct chlorination and oxychlorination.
Additionally, the heat gain from both highly exothermic chlorination processes may be used in the associated VCM production, optimising the overall energy demand of the EDC/VCM/PVC production.
The reactions are represented by the formulae:
Direct chlorination: C2H4+Cl2 → C2H4Cl2 (EDC) ; ΔHR,0=−220 kJ/mol
Cracking: C2H4Cl2 → C2H3Cl (VCM)+ HCl ; ΔHR,0=+ 97 kJ/mol
Oxychlorination: C2H4+½ O2+2 HCl → C2H4Cl2 (EDC)+ H2O ; ΔHR,0=−320 kJ/mol
For the production of EDC in a balanced unit the raw material requirements comprise ethylene and chlorine, which are generally supplied by pipeline from nearby production facilities. Chlorine and EDC production sites are often found in close proximity in order to reduce chlorine transportation distances to the EDC process, the single largest chlorine consumer.
The bromine content of the chlorine feed should be as low as possible in order to minimise the downstream formation of brominated by-products. The inert gases contained in tail gas chlorine may create downstream emission issues. An unbalanced unit has the same ethylene and chlorine requirements as a balanced unit, but may need to import or export gaseous hydrochloric acid or EDC.

## Included activities start
Acitivity starts with ethylene, chloride and EDC (ethylene dichloride) entering the plant. Based on European production the average EDC/VCM unit covered here is unbalanced and hence needs EDC import. Both direct chlorination and oxychlorination of ethylene to produce ethylene dichloride are included. Energy supply is included in terms of heat production inside the battery limits of the plant. Steam and electricity supply is outside the activity.

## Included activities end
Activity ends with vinyl chloride leaving the factory.

## Geography
EU27 including Norway and Switzerland

## Technology
Coverage of production capacity in Europe: 85%

## Time period
Data was collected for the year 2013, processed in 2014 and published in 2015

## Reference product
- vinyl chloride: 1 kg; CPC 34730: Polymers of vinyl chloride or other halogenated olefins, in primary forms; By-product classification allocatable product; CAS 75-01-4
  Reference Product
  production volume 5.3e9 kg; name RP_PV
    Production Capacity in 2014 in EU27+NOR+CH, Source: PlasticsEurope
  property price 0.584 EUR2005
    From UN data; http://data.un.org/Data.aspx?q=vinyl+chloride&d=ComTrade&f=_l1Code%3a30%3bcmdCode%3a290321
  property carbon content 0.387097
    carbon content on a dry matter basis (reserved; not for manual entry)
  property true value 0.584
    allocation property applied in "true value" allocation // value calculated from revenue
  properties: wet mass 1 kg, water content 0, water in wet mass 0 kg, dry mass 1 kg, carbon content, non-fossil 0, carbon content, fossil 0.387097, carbon allocation 0.387097 kg

## By-products
- electricity, for reuse in municipal waste incineration only: 0 kWh; CPC 17100: Electrical energy; By-product classification allocatable product; pedigree (1,1,1,1,1)
  Net electricity generated from this waste and used in internal MSWI plant energy redistribution.
  Uncertainty: uncertainty is calculated from uncertainties in waste composition and uncertainties in energy efficiency and the uncertainty in internal energy demand
  production volume 5.91592e6 kWh
  property exergy 3.6 MJ; name E_el_prod_MSWI_exergy
    This exergy property is based on the exergy content of the product.
  property true value relation 3.6; name E_el_prod_MSWI_true_value_relation
    property to calculate "true value" from
  property price 0.1 EUR2005; name E_el_prod_MSWI_price_EUR2005
    Estimated to be the same price as in case of electricity, medium voltage.
  property true value 0.000139424
    allocation property applied in "true value" allocation // value calculated from true value relation
- heat, for reuse in municipal waste incineration only: 0 MJ; CPC 17300: Steam and hot water; By-product classification allocatable product; pedigree (1,1,1,1,1)
  Net useful heat generated from this waste and used in internal MSWI plant energy redistribution.
  Uncertainty: uncertainty is calculated from uncertainties in waste composition and uncertainties in energy efficiency and the uncertainty in internal energy demand
  production volume 4.18629e7 MJ
  property true value relation 0.1842; name E_th_prod_MSWI_true_value_relation
    property to calculate "true value" from
  property exergy 0.1842 MJ; name E_th_prod_MSWI_exergy
    This exergy property is based on the exergy content of the product.
  property price 0.0106 EUR2005; name E_th_prod_MSWI_price_EUR2005
    Average European district heat price from Ecoheatcool and Euroheat 2005-2006, Ecoheat Work package 1: The European heat market. Final report. 10.6 EUR/GJ i s the price of district heat. http://www.solarthermalworld.org/files/Ecoheatcool%20WP1%20Web.pdf?download
  property true value 5.04805e-5
    (same comment as for electricity, for reuse in municipal waste incineration only)
- zinc concentrate: 0 kg; CPC 14290: Other non-ferrous metal ores and concentrates (other than uranium or thorium ores and concentrates); By-product classification allocatable product
  Calculated value from the knowledge of the properties of both products.
  production volume 1037.48 kg
  property price 0.38 EUR2005; name ByP_price_EUR2005
    Temporary price data. Calculated as 90% of purchasers price based on: Zinc content in concentrate 53%. Concentrate price per kg Zn 86.5% of refined Zn price (13.5% treatment charges according to CHR Metals Limited 2005: Dynamic cost curves. http://www.minecost.com/dynamic.pdf). 2004 zinc price from USGS (2007) Mineral commodity summaries 2007. <http://minerals.usgs.gov/minerals/pubs/mcs/2007/mcs2007.pdf> [Accessed 25 May 2010]
  property zinc content 0.53; name zinc_C_zinc_concentrate
    Zinc content on a dry matter basis. Value taken from teh "zinc mine operation" /GLO dataset.
  property dry mass 1 kg; name DM_zinc_concentrate
  property carbon content 0
    carbon content on a dry matter basis (reserved; not for manual entry)
  property true value 7.23612e-8
    allocation property applied in "true value" allocation // value calculated from revenue
  properties: wet mass 1 kg, water content 0, carbon content, non-fossil 0, carbon content, fossil 0, water in wet mass 0 kg, carbon allocation 0 kg

## Inputs from technosphere
- hazardous waste, for incineration: 0 kg; name BP_amount5; pedigree (1,1,1,1,1)
  Weighted average of reported waste
  production volume 0 kg
    calculated with production volume of reference product
  property price 0 EUR2005; name BP_amount5_price_EUR2005
  properties: water content 0.333333, carbon content, fossil 0.554667, wet mass 1 kg, dry mass 0.75 kg
  note on carbon content, fossil: Tab A.6, ecoinvent v2.2 report 13_I. C content has been calculated after data in the tables, and then referred to 1 kg DM
- chemical, organic: 2.11934e-6 kg; lognormal variance with pedigree 0.0033, pedigree (2,2,3,1,1)
  Sum input parameter covering partly confidential information on additives, solvents, catalysts. Weighted average of reported input materials.
  properties: dry mass 1 kg, carbon content, fossil 0.628, wet mass 1 kg
  note on carbon content, fossil: This dataset is an unweighted average of 20 organic substances (listed in Tab 88.1, ecoinvent v2.2 report 8, part II), being part of the top100 chemicals included in this database. The C-content has also been calculated as an unweighted average of the C content of the substances composing this dataset.
- ethylene dichloride: 0.139118 kg; lognormal variance with pedigree 0.0033, pedigree (2,2,3,1,1)
  Weighted average of reported input
  properties: dry mass 1 kg, wet mass 1 kg, carbon content, fossil 0.244898
- spent solvent mixture: 0 kg; name BP_amount3; pedigree (1,1,1,1,1)
  Weighted average of reported waste
  production volume 0 kg
    calculated with production volume of reference product
  property price 0 EUR2005; name BP_amount3_price_EUR2005
  properties: dry mass 0.835 kg, carbon content, fossil 0.571257, water content 0.197605, wet mass 1 kg
  note on carbon content, fossil: Tab A.7, ecoinvent v2.2 report 13_I. C content has been calculated after data in the tables, and then referred to 1 kg DM
- chemical, inorganic: 0.000970661 kg; lognormal variance with pedigree 0.0033, pedigree (2,2,3,1,1)
  (same comment as for chemical, organic)
  properties: carbon content, fossil 0.003, dry mass 1 kg, wet mass 1 kg
  note on carbon content, fossil: This dataset is an unweighted average of 20 inorganic substances (listed in Tab 88.1, ecoinvent v2.2 report 8, part II), being part of the top100 chemicals included in this database. The C-content has also been calculated as an unweighted average of the C content of the substances composing this dataset.
- ethylene, average: 0.432953 kg; lognormal variance with pedigree 0.0033, pedigree (2,2,3,1,1)
  Weighted average of reported input
  properties: carbon content, fossil 0.857143, wet mass 1 kg, dry mass 1 kg
- wastewater, unpolluted: -0.0441563 m3; name BP_amount6; lognormal variance with pedigree 0.0047, pedigree (3,2,3,1,1)
  Weighted average of reported waste
  production volume 2.34104e8 m3; = BP_amount6*RP_PV
    calculated with production volume of reference product
  property price 0 EUR2005; name BP_amount6_price_EUR2005
  properties: carbon content, non-fossil 0.00178991, dry mass 0.337476 kg, water content 2962.17, wet mass 1000 kg, carbon content, fossil 0.00178991
  note on carbon content, fossil: Assumed to be like in tap water. Bicarbonate content is 2.93 mol/m3. CO2 content is 0.1 mol/m3 (ecoinvent v2.2 report 8, Tab 93.1).
- nitrogen, liquid: 0.0367954 kg; lognormal variance with pedigree 0.0033, pedigree (2,2,3,1,1)
  Weighted average of reported input
  properties: wet mass 1 kg, dry mass 1 kg
- oxygen, liquid: 0.110755 kg; lognormal variance with pedigree 0.0033, pedigree (2,2,3,1,1)
  Weighted average of reported input
  properties: dry mass 1 kg, wet mass 1 kg
- compressed air, 600 kPa gauge: 0.0401328 m3; lognormal variance with pedigree 0.0033, pedigree (2,2,3,1,1)
  Weighted average of reported input
- hydrochloric acid, without water, in 30% solution state: 0.0530124 kg; lognormal variance with pedigree 0.0033, pedigree (2,2,3,1,1)
  Weighted average of reported input
  properties: wet mass 1 kg, dry mass 1 kg
- electricity, medium voltage: 0.156043 kWh; lognormal variance with pedigree 0.0033, pedigree (2,2,3,1,1)
  Weighted average of reported input
- waste paperboard: -0.00020872 kg; name BP_amount1; lognormal variance with pedigree 0.0047, pedigree (3,2,3,1,1)
  Weighted average of reported waste
  production volume 1.10657e6 kg; = BP_amount1*RP_PV
    calculated with production volume of reference product
  property price 0 EUR2005; name BP_amount1_price_EUR2005
  properties: carbon content, non-fossil 0.483259, wet mass 1 kg, dry mass 0.804 kg, water content 0.243781
  note on carbon content, non-fossil: C content was calculated for 1 kg DM, using data in Tab A.3, ecoinvent v2.2 report 13_I.
- ammonia, liquid: 1.84863e-5 kg; lognormal variance with pedigree 0.0033, pedigree (2,2,3,1,1)
  Weighted average of reported input
  properties: dry mass 1 kg, wet mass 1 kg
- chemical factory, organics: 3.9987e-10 unit; lognormal variance with pedigree 0.309425, pedigree (2,3,2,2,3)
  Calculated based on literature data published by the industry. For this activity, no information was readily available concerning infrastructure and land-use. Therefore, the infrastructure is estimated based on data from two chemical factories, the BASF site of Ludwigshafen and the chemical factory in Gendorf (which are both located in Germany), which produce a wide range of chemical substances. Based on this data, the following assumptions are made: the built area amounts to about 4.2 ha, the plant has an average output of 50'000 t/a and a lifespan of fifty years. The estimated infrastructure amount is therefore 4.00 E-10 units per kg of produced chemical.
  References:
  Althaus H.-J., Chudacoff M., Hischier R., Jungbluth N., Osses M. and Primas A. (2007) Life Cycle Inventories of Chemicals. ecoinvent report No. 8, v2.0. EMPA Dübendorf, Swiss Centre for Life Cycle Inventories, Dübendorf, CH.
  Gendorf (2000) Umwelterklärung 2000, Werk Gendorf. Werk Gendorf, Burgkirchen.
- wastewater, average: 0 m3; name BP_amount4; pedigree (1,1,1,1,1)
  Weighted average of reported waste
  production volume 0 m3
    calculated with production volume of reference product
  property price 0 EUR2005; name BP_amount4_price_EUR2005
  properties: dry mass 0.346837 kg, carbon content, non-fossil 0.194039, wet mass 1000 kg, water content 2882.2
  note on carbon content, non-fossil: 0.0673 kg TOC/m3 (Tab A.17, ecoinvent v2.2 report 13_I). TOC was considered as Total Carbon.
- sodium hydroxide, without water, in 50% solution state: 0.0217681 kg; lognormal variance with pedigree 0.0033, pedigree (2,2,3,1,1)
  Weighted average of reported input
  properties: dry mass 1 kg, wet mass 1 kg
- chlorine, gaseous: 0.425464 kg; lognormal variance with pedigree 0.0033, pedigree (2,2,3,1,1)
  Weighted average of reported input
  properties: dry mass 1 kg, wet mass 1 kg
- sewage sludge, dried: -0.000399321 kg; name BP_amount2; lognormal variance with pedigree 0.0047, pedigree (3,2,3,1,1)
  Weighted average of reported waste
  production volume 2.11709e6 kg; = BP_amount2*RP_PV
    calculated with production volume of reference product
  property price 0 EUR2005; name BP_amount2_price_EUR2005
  properties: wet mass 1 kg, water content 0.010101, dry mass 0.99 kg
- hydrogen, liquid: 0.000155653 kg; lognormal variance with pedigree 0.0033, pedigree (2,2,3,1,1)
  Weighted average of reported input
  properties: dry mass 1 kg, wet mass 1 kg
- natural gas, high pressure: 0 m3; pedigree (1,1,1,1,1)
  Weighted average of reported input
  properties: wet mass 1 kg, dry mass 1 kg, carbon content, fossil 0.695187
- hazardous waste, for incineration: -0.0075685, -0.000197836 kg (2 entries); lognormal variance with pedigree 0.0047, pedigree (3,2,3,1,1)
  Weighted average of reported waste
  production volume 4.1175e7 kg
- spent solvent mixture: -0.00041731, -9.1262e-6 kg (2 entries); lognormal variance with pedigree 0.0047, pedigree (3,2,3,1,1)
  Weighted average of reported waste
  production volume 2.26084e6 kg
- wastewater, average: -0.00123874, -0.000134008 m3 (2 entries); lognormal variance with pedigree 0.0047, pedigree (3,2,3,1,1)
  Weighted average of reported waste
  production volume 7.27791e6 m3
- natural gas, high pressure: 0.106226, 0.000685856 m3 (2 entries); lognormal variance with pedigree 0.0033, pedigree (2,2,3,1,1)
  Weighted average of reported input

## Inputs from nature
All rows: lognormal variance with pedigree 0.0047, pedigree (3,2,3,1,1)
- Water, lake [natural resource, in water]: 0.000209637 m3
  Weighted average of reported input
- Water, cooling, unspecified natural origin [natural resource, in water]: 0.0450583 m3
  Weighted average of reported input
- Water, unspecified natural origin [natural resource, in water]: 0.000325301 m3
  Weighted average of reported input
- Water, river [natural resource, in water]: 9.84278e-5 m3
  Weighted average of reported input
- Water, well, in ground [natural resource, in water]: 0.000382233 m3
  Weighted average of reported input

## Emissions to nature
- Propene [air, unspecified]: 1.84397e-7 kg; lognormal variance with pedigree 0.1232, pedigree (2,3,3,1,1)
  Weighted average of reported emissions
- Ethene, chloro- [water, unspecified]: 2.31411e-9 kg; lognormal variance with pedigree 0.3032, pedigree (2,3,3,1,1)
  Weighted average of reported emissions
- Suspended solids, unspecified [water, unspecified]: 4.39653e-7 kg; lognormal variance with pedigree 0.0427, pedigree (2,2,3,1,1)
  Weighted average of reported emissions
- Chlorine [air, unspecified]: 6.76136e-7 kg; lognormal variance with pedigree 0.0432, pedigree (2,3,3,1,1)
  Weighted average of reported emissions
- Chloride [water, unspecified]: 0.00727438 kg; lognormal variance with pedigree 0.0432, pedigree (2,3,3,1,1)
  Weighted average of reported emissions
- NMVOC, non-methane volatile organic compounds, unspecified origin [air, unspecified]: 4.32618e-5 kg; lognormal variance with pedigree 0.0427, pedigree (2,2,3,1,1)
  Weighted average of reported emissions
- Monochloroethane [air, unspecified]: 1.55912e-6 kg; lognormal variance with pedigree 0.1232, pedigree (2,3,3,1,1)
  Weighted average of reported emissions
- Chloroform [water, unspecified]: 1.03532e-8 kg; lognormal variance with pedigree 0.3032, pedigree (2,3,3,1,1)
  Weighted average of reported emissions
- Carbon dioxide, fossil [air, unspecified]: 0.187044 kg; lognormal variance with pedigree 0.0033, pedigree (2,2,3,1,1)
  Weighted average of reported emissions
- Nitrogen, organic bound [water, unspecified]: 4.6005e-7 kg; lognormal variance with pedigree 0.0432, pedigree (2,3,3,1,1)
  Weighted average of reported emissions
- AOX, Adsorbable Organic Halogen as Cl [water, unspecified]: 3.10637e-7 kg; lognormal variance with pedigree 0.0427, pedigree (2,2,3,1,1)
  Weighted average of reported emissions
- Sulfur hexafluoride [air, unspecified]: 2.70741e-10 kg; lognormal variance with pedigree 0.0432, pedigree (2,3,3,1,1)
  Weighted average of reported emissions
- Hydrogen chloride [air, unspecified]: 6.7753e-6 kg; lognormal variance with pedigree 0.0432, pedigree (2,3,3,1,1)
  Weighted average of reported emissions
- Carbon monoxide, fossil [air, unspecified]: 9.4427e-5 kg; lognormal variance with pedigree 0.6532, pedigree (2,3,3,1,1)
  Weighted average of reported emissions
- Phosphorus [water, unspecified]: 1.44082e-6 kg; lognormal variance with pedigree 0.0432, pedigree (2,3,3,1,1)
  Weighted average of reported emissions
- Dinitrogen monoxide [air, unspecified]: 2.10961e-7 kg; lognormal variance with pedigree 0.0427, pedigree (2,2,3,1,1)
  Weighted average of reported emissions
- Mercury [water, unspecified]: 8.81869e-12 kg; lognormal variance with pedigree 0.6532, pedigree (2,3,3,1,1)
  Weighted average of reported emissions
- Nitrogen oxides [air, unspecified]: 8.96115e-5 kg; lognormal variance with pedigree 0.0427, pedigree (2,2,3,1,1)
  Weighted average of reported emissions
- Cadmium, ion [water, unspecified]: 8.07345e-11 kg; lognormal variance with pedigree 0.6532, pedigree (2,3,3,1,1)
  Weighted average of reported emissions
- Particulates, > 2.5 um, and < 10um [air, unspecified]: 2.87791e-8 kg; lognormal variance with pedigree 0.1232, pedigree (2,3,3,1,1)
  Weighted average of reported emissions
- Arsenic, ion [water, unspecified]: 8.00028e-10 kg; lognormal variance with pedigree 0.6532, pedigree (2,3,3,1,1)
  Weighted average of reported emissions
- Sulfur dioxide [air, unspecified]: 7.78905e-8 kg; lognormal variance with pedigree 0.0038, pedigree (2,3,3,1,1)
  Weighted average of reported emissions
- Copper, ion [water, unspecified]: 1.53357e-7 kg; lognormal variance with pedigree 0.6532, pedigree (2,3,3,1,1)
  Weighted average of reported emissions
- Particulates, > 10 um [air, unspecified]: 1.20348e-7 kg; lognormal variance with pedigree 0.0432, pedigree (2,3,3,1,1)
  Weighted average of reported emissions
- Chromium, ion [water, unspecified]: 9.77205e-10 kg; lognormal variance with pedigree 0.6532, pedigree (2,3,3,1,1)
  Weighted average of reported emissions
- Ethane, 1,2-dichloro- [air, unspecified]: 5.90887e-5 kg; lognormal variance with pedigree 0.1227, pedigree (2,2,3,1,1)
  Weighted average of reported emissions
- Sodium, ion [water, unspecified]: 0.0014287 kg; lognormal variance with pedigree 0.0432, pedigree (2,3,3,1,1)
  Weighted average of reported emissions
- Dioxins, measured as 2,3,7,8-tetrachlorodibenzo-p-dioxin [air, unspecified]: 1.65063e-14 kg; lognormal variance with pedigree 0.3032, pedigree (2,3,3,1,1)
  Weighted average of reported emissions
- Nickel, ion [water, unspecified]: 1.19805e-8 kg; lognormal variance with pedigree 0.6532, pedigree (2,3,3,1,1)
  Weighted average of reported emissions
- Chloroform [air, unspecified]: 1.86696e-6 kg; lognormal variance with pedigree 0.1232, pedigree (2,3,3,1,1)
  Weighted average of reported emissions
- Zinc, ion [water, unspecified]: 1.81543e-8 kg; lognormal variance with pedigree 0.6532, pedigree (2,3,3,1,1)
  Weighted average of reported emissions
- Water [air, unspecified]: 0.000544858 m3; lognormal variance with pedigree 0.0107, pedigree (4,2,3,1,1)
  Calculated to close water balance
- Ethene, trichloro- [air, unspecified]: 6.19684e-7 kg; lognormal variance with pedigree 0.1232, pedigree (2,3,3,1,1)
  Weighted average of reported emissions
- Ethane, 1,2-dichloro- [water, unspecified]: 8.62372e-8 kg; lognormal variance with pedigree 0.3027, pedigree (2,2,3,1,1)
  Weighted average of reported emissions
- Methane, tetrachloro-, R-10 [air, unspecified]: 9.9171e-7 kg; lognormal variance with pedigree 0.1232, pedigree (2,3,3,1,1)
  Weighted average of reported emissions
- Methane, tetrachloro-, R-10 [water, unspecified]: 6.34364e-9 kg; lognormal variance with pedigree 0.3032, pedigree (2,3,3,1,1)
  Weighted average of reported emissions
- Dioxins, measured as 2,3,7,8-tetrachlorodibenzo-p-dioxin [water, unspecified]: 2.87699e-14 kg; lognormal variance with pedigree 0.3032, pedigree (2,3,3,1,1)
  Weighted average of reported emissions
- Ethene, chloro- [air, unspecified]: 1.49629e-5 kg; lognormal variance with pedigree 0.1232, pedigree (2,3,3,1,1)
  Weighted average of reported emissions
- Benzene, pentachloro- [water, unspecified]: 1.32033e-10 kg; lognormal variance with pedigree 0.3032, pedigree (2,3,3,1,1)
  Weighted average of reported emissions
- Sulfate [water, unspecified]: 0.000178563 kg; lognormal variance with pedigree 0.0432, pedigree (2,3,3,1,1)
  Weighted average of reported emissions
- Ethene [air, unspecified]: 8.54069e-5 kg; lognormal variance with pedigree 0.1232, pedigree (2,3,3,1,1)
  Weighted average of reported emissions
- Benzene, hexachloro- [water, unspecified]: 8.04633e-11 kg; lognormal variance with pedigree 0.3032, pedigree (2,3,3,1,1)
  Weighted average of reported emissions
- Methane, fossil [air, unspecified]: 1.0303e-5 kg; lognormal variance with pedigree 0.0432, pedigree (2,3,3,1,1)
  Weighted average of reported emissions

## Sampling procedure
Questionnaires sent out to all production units in Europe operated by PlasticEurope/ECVM member companies.

## Extrapolations
no extrapolation
