# geothermal power plant construction

Dataset: EcoSpold 2, unit process
Geography: CH
Time period: 2015-01-01 to 2019-12-31
Technology level: current
Classification: ISIC rev.4 ecoinvent: 28:Manufacture of machinery and equipment n.e.c.
Tags: geothermal energy; power plant
Scenario: Business-as-Usual
System model: Allocation at the point of substitution
Generated by: Karin Treyer
Published in: S Hirchberg, S Wiemer, P Burgherr 2015
Database: ecoinvent
isCopyrightProtected: true
accessRestrictedTo: 1

## General comment
This dataset represents the construction of the geothermal power plant at the surface, resulting in a coupled underground and surface system. It collects all parts necessary to build a geothermal power plant: deep well drilling, stimulation, and surface power generation installations. It further includes the implementation of a downhole pump connected with the power generator.
Detailed information on this dataset is presented in the book "Energy from the Earth. 2015. Hirschberg, Wiemer, Burgherr (eds.) (see field "Data Generator and Publication").

## Included activities start
Includes all "components" of a 5.5MWel deep geothermal power plant.

## Included activities end
Electricity generation facility, deep geothermal power.

## Geography
Represents installation of a deep geothermal power plant in Switzerland.

## Reference product
- geothermal power plant, 5.5MWel: 1 unit; source S Hirchberg, S Wiemer, P Burgherr 2015; CPC 53262: Power plants; By-product classification allocatable product
  production volume 1 unit
    Placeholder value. No Enhanced Geothermal Systems (EGS) are in commerical operation yet.
  property price 2.18531e7 EUR2005
    Calculated based on inputs: The price of the product has been calculated as a sum of the values of the material and energy inputs for this product. This value is therefore a rough estimation. It may underestimate the real price since there are additional expenses when producing any product. These expences can include for example labour costs, treatment of waste materials and profit for the producer. Please consider carefully whether this level of data quality is acceptable for your application.

## Inputs from technosphere
All rows: source S Hirchberg, S Wiemer, P Burgherr 2015; lognormal variance with pedigree 0.103325, pedigree (2,2,3,2,2)
- inert waste, for final disposal: -223132 kg; = (steel)*-1
  calculated based on the mass of material to be disposed of
  production volume 223132 kg; = Ref('7b4c512c-c784-46e9-a1ca-87a659a76926', 'ProductionVolume') * ((Ref('48f7d1a9-4a20-49b4-988a-7f7c6f579b33')*-1) / Ref('7b4c512c-c784-46e9-a1ca-87a659a76926'))
    Calculated from production volume of reference product using the relative outputs.
  properties: dry mass 0.995 kg, wet mass 1 kg, water content 0.00502513
- heat and power co-generation unit, 1MWel, 6.4MWth: 5.05 unit
  Extrapolation according to Section 5.5.3 in the book.;activityLink introduced to establish a direct link to the corresponding regional supply of this product
- stimulation, deep well: 40000 m3
  Rough assumption that needs further sensitivity analysis, see Section 5.5.2.
- deep well, drilled, for geothermal power: 32000 m
  2*3 wells of 5000 m plus an exploration well of 2000 m;activityLink introduced to establish a direct link to the corresponding regional supply of this product
- steel, low-alloyed: 223132 kg; name steel
  One pump in each of the two production wells with a lifetime of 5 years.
  Source: Sonderegger, M. (2013). Personal Communication with M. Sonderegger, Sankt Galler Stadtwerke, Switzerland.
  Pletl, C. (2010). Geothermal projects of SWM. Stadtwerke München, Sauerlach hydrothermal plant, Germany.
  This item of the LCI belongs to the category; Downhole pump and rising pipes.
  properties: dry mass 1 kg, wet mass 1 kg, carbon content, fossil 0.005

## Inputs from nature
- Occupation, industrial area [natural resource, land]: 240000 m2*year; = transformation_from*30; source S Hirchberg, S Wiemer, P Burgherr 2015; lognormal variance with pedigree 0.103325, pedigree (2,2,3,2,2)
  Lifetime of 30 years.
- Transformation, to industrial area [natural resource, land]: 8000 m2; = transformation_from; source S Hirchberg, S Wiemer, P Burgherr 2015; lognormal variance with pedigree 0.103325, pedigree (2,2,3,2,2)
  Estimation. The ORC unit has an area of 500m2; additional space is needed for the surroundings.
  The process of Transformation to Industrial area belongs to Land use category of the LCI.
- Transformation, from unspecified, natural (non-use) [natural resource, land]: 8000 m2; name transformation_from; lognormal variance with pedigree 0.103325, pedigree (2,2,3,2,2)
  Estimation. The ORC unit has an area of 500m2; additional space is needed for the surroundings.

## Sampling procedure
Literature

## Extrapolations
This dataset has been extrapolated from year 2015 to the year of the calculation (2019). The uncertainty has been adjusted accordingly.
