# ethanolamine production

Dataset: EcoSpold 2, unit process
Geography: RER
Time period: 2000-01-01 to 2020-12-31
Technology level: current
Classification: ISIC rev.4 ecoinvent: 2011:Manufacture of basic chemicals
Synonyms: 2-aminoethanol; Aminoethanol; 141-43-5; Monoethanolamine; 2-Hydroxyethylamine; Ethanolamine
Tags: combined production
Scenario: Business-as-Usual
System model: Allocation at the point of substitution
Generated by: Roland Hischier
Published in: Althaus H.-J. 2007
Database: ecoinvent
isCopyrightProtected: true
accessRestrictedTo: 1

## General comment
This dataset represents a multi-output process that delivers the co-products monoethanolamine, diethanolamine and triethanolamine in variable quantities. These three substances are derivatives of ammonia. While the first and the last one are viscous, colourless, clear liquids at normal room temperature, diethanolamine is a crystalline solid. Ethanolamines are used as intermediates in the production of surfactants, as corrosion inhibitors, for gas purification, as intermediates for the production of various chemicals, and as cement additives. This dataset models the production of ethanolamines by the reaction of ethylene oxide with ammonia.
The inventory is based on stoichiometric calculations and estimations. The energy and water consumptions are approximated based on data from a large chemical factory (Gendorf 2016).
References:
Althaus H.-J., Chudacoff M., Hischier R., Jungbluth N., Osses M. and Primas A. (2007) Life Cycle Inventories of Chemicals. ecoinvent report No. 8, v2.0. EMPA Dübendorf, Swiss Centre for Life Cycle Inventories, Dübendorf, CH.
Gendorf (2016) Umwelterklärung 2015, Werk Gendorf Industriepark, www.gendorf.de.

## Included activities start
The activity starts when the raw materials enter the process.

## Included activities end
This activity ends with the production of monoethanolamine, diethanolamine and triethanolamine. The raw materials and chemicals used for production are included, as well as estimated emissions to air and water from production (incomplete) and estimated energy demand and infrastructure of the plant (approximation). Solid wastes are omitted.

## Geography
The data used has no specific geographical origin as it is based on stoechiometric calculations and estimations. It is assumed to be representative of the production processes in this geography. Some values are based on data from a large chemical factory located in Germany. These are assumed to be valid for this geography.

## Technology
Production from ethylene oxide and ammonia with a process yield of 95%. The inventory is based on stoechiometric calculations. The emissions to air (0.2 wt% of raw material input) and water were estimated using mass balance. The treatment of the waste water in an internal waste water treatment plant is assumed (elimination efficiency of 90% for C).
Electricity is needed to run the process auxiliaries and the wastewater treatment. Fossil fuel is needed to generate the desired heat within the process scheme.
References:
Althaus H.-J., Chudacoff M., Hischier R., Jungbluth N., Osses M. and Primas A. (2007) Life Cycle Inventories of Chemicals. ecoinvent report No. 8, v2.0. EMPA Dübendorf, Swiss Centre for Life Cycle Inventories, Dübendorf, CH.

## Time period
Date of published literature. Some values are based on data published by the Gendorf factory that were collected between 2011 and 2015. The time period has been adjusted accordingly. For more details, see the comments of the exchanges.

## Parameters
- efficiency: 0.95 dimensionless; name process_efficiency
  process efficiency (output relative to input)
- sum of reference products: 1 kg; name sum_RP
  Sum of the amounts of the reference products mono-, di- and tri-ethanolamine.

## Reference product
- triethanolamine: 1 kg; name amount_triethanolamine; = RP3_PV/(RP1_PV + RP2_PV + RP3_PV); By-product classification allocatable product; CPC 34150: Amine-function compounds; oxygen-function amino-compounds, except lysine and its esters and salts thereof and […]; CAS 102-71-6
  Ethanolamines are used as intermediates in the production of surfactants, as corrosion inhibitors, for gas purification, as intermediates for the production of various chemicals, and as cement additives.
  References:
  Althaus H.-J., Chudacoff M., Hischier R., Jungbluth N., Osses M. and Primas A. (2007) Life Cycle Inventories of Chemicals. ecoinvent report No. 8, v2.0. EMPA Dübendorf, Swiss Centre for Life Cycle Inventories, Dübendorf, CH.
  production volume 1.04125e8 kg; name RP3_PV
    Worldwide capacity for ethanolamines was 1.7 million metric tonnes (3.7 billion pounds) in 2007 (Dow Safety Assessments for mono, di and triethanolamine. Accessed from http://www.dow.com/productsafety/finder/index.htm#P).
    About half of the world production is monoethanolamine, 30 to 35% is diethanolamine and the remaining 15 to 20% triethanolamine. 35% of the production is estimated to be in Europe. (http://monographs.iarc.fr/ENG/Monographs/vol77/mono77-14.pdf).
  property price 0.661 EUR2005
    Temporary price data. Calculated as 90% of purchasers price based on: 2004 prices for World Import/Export data (US$ and tonnes) from UN Commodity Trade Statistics Database (http://data.un.org/Explorer.aspxDatabase [Accessed 2 July 2010]). Commodity: 'Triethanolamin salts'.
  property carbon content 0.483221
    carbon content on a dry matter basis (reserved; not for manual entry)
  property true value 0.661; name amount_triethanolamine_true_value
    allocation property applied in "true value" allocation // value calculated from revenue
  properties: wet mass 1 kg, water content 0, water in wet mass 0 kg, carbon content, fossil 0.483221, dry mass 1 kg, carbon content, non-fossil 0, carbon allocation 0.483221 kg
- monoethanolamine: 0 kg; name amount_monoethanolamine; By-product classification allocatable product; CPC 34150: Amine-function compounds; oxygen-function amino-compounds, except lysine and its esters and salts thereof and […]; CAS 141-43-5
  (same comment as for triethanolamine)
  production volume 0 kg; name RP1_PV
    (same comment as for triethanolamine)
  property price 0.91 EUR2005
    Temporary price data. Calculated as 90% of purchasers price based on: 2004 prices for World Import/Export data (US$ and tonnes) from UN Commodity Trade Statistics Database (http://data.un.org/Explorer.aspxDatabase [Accessed 2 July 2010]). Commodity: 'Monoethanolmine, salts'.
  property carbon content 0.393443
    carbon content on a dry matter basis (reserved; not for manual entry)
  properties: carbon content, non-fossil 0, dry mass 1 kg, wet mass 1 kg, water in wet mass 0 kg, water content 0, carbon content, fossil 0.393443, carbon allocation 0.393443 kg
- diethanolamine: 0 kg; name amount_diethanolamine; CPC 34150: Amine-function compounds; oxygen-function amino-compounds, except lysine and its esters and salts thereof and […]; By-product classification allocatable product; CAS 111-42-2
  (same comment as for triethanolamine)
  production volume 0 kg; name RP2_PV
    Worldwide capacity for ethanolamines was 1.7 million metric tonnes (3.7 billion pounds) in 2007 (Dow Safety Assessments for mono, di and triethanolamine. Accessed from http://www.dow.com/productsafety/finder/index.htm#P).
    About half of the world production is monoethanolamine, 30 to 35% is diethanolamine and the remaining 15 to 20% triethanolamine. 35% of the production is estimated to be in Europe.(http://monographs.iarc.fr/ENG/Monographs/vol77/mono77-14.pdf).
  property price 1.08 EUR2005
    Calculated value based on data from United Nations Commodity Trade Statistics Database (comtrade.un.org). UN comtrade category: 292212 Diethanolamine, salts. Year 2005. Using exchange rate of 1EURO = 1.209 USD. Average of price of import into 5 main markets (EU, US, JP, IN and CN).
  property carbon content 0.457143
    carbon content on a dry matter basis (reserved; not for manual entry)
  properties: water in wet mass 0 kg, wet mass 1 kg, water content 0, carbon content, fossil 0.457143, carbon content, non-fossil 0, dry mass 1 kg, carbon allocation 0.457143 kg

## By-products
- heat, for reuse in municipal waste incineration only: 0 MJ; CPC 17300: Steam and hot water; By-product classification allocatable product; pedigree (1,1,1,1,1)
  Net electricity generated from this waste and used in internal MSWI plant energy redistribution.
  Uncertainty: uncertainty is calculated from uncertainties in waste composition and uncertainties in energy efficiency and the uncertainty in internal energy demand
  production volume 362.983 MJ
  property exergy 0.1842 MJ; name E_th_prod_MSWI_exergy
    This exergy property is based on the exergy content of the product.
  property price 0.0106 EUR2005; name E_th_prod_MSWI_price_EUR2005
    Average European district heat price from Ecoheatcool and Euroheat 2005-2006, Ecoheat Work package 1: The European heat market. Final report. 10.6 EUR/GJ i s the price of district heat. http://www.solarthermalworld.org/files/Ecoheatcool%20WP1%20Web.pdf?download
  property true value relation 0.1842; name E_th_prod_MSWI_true_value_relation
    property to calculate "true value" from
  property true value 1.16811e-9
    allocation property applied in "true value" allocation // value calculated from true value relation
- electricity, for reuse in municipal waste incineration only: 0 kWh; CPC 17100: Electrical energy; By-product classification allocatable product; pedigree (1,1,1,1,1)
  (same comment as for heat, for reuse in municipal waste incineration only)
  production volume 51.0381 kWh
  property true value relation 3.6; name E_el_prod_MSWI_true_value_relation
    property to calculate "true value" from
  property price 0.1 EUR2005; name E_el_prod_MSWI_price_EUR2005
    Estimated to be the same price as in case of electricity, medium voltage.
  property exergy 3.6 MJ; name E_el_prod_MSWI_exergy
    This exergy property is based on the exergy content of the product.
  property true value 3.17451e-9
    (same comment as for heat, for reuse in municipal waste incineration only)
- zinc concentrate: 0 kg; CPC 14290: Other non-ferrous metal ores and concentrates (other than uranium or thorium ores and concentrates); By-product classification allocatable product
  Calculated value from the knowledge of the properties of both products.
  production volume 0.00690483 kg
  property price 0.38 EUR2005; name ByP_price_EUR2005
    Temporary price data. Calculated as 90% of purchasers price based on: Zinc content in concentrate 53%. Concentrate price per kg Zn 86.5% of refined Zn price (13.5% treatment charges according to CHR Metals Limited 2005: Dynamic cost curves. http://www.minecost.com/dynamic.pdf). 2004 zinc price from USGS (2007) Mineral commodity summaries 2007. <http://minerals.usgs.gov/minerals/pubs/mcs/2007/mcs2007.pdf> [Accessed 25 May 2010]
  property zinc content 0.53; name zinc_C_zinc_concentrate
    Zinc content on a dry matter basis. Value taken from teh "zinc mine operation" /GLO dataset.
  property dry mass 1 kg; name DM_zinc_concentrate
  property carbon content 0
    carbon content on a dry matter basis (reserved; not for manual entry)
  property true value 4.30488e-13
    allocation property applied in "true value" allocation // value calculated from revenue
  properties: wet mass 1 kg, water content 0, carbon content, non-fossil 0, carbon content, fossil 0, water in wet mass 0 kg, carbon allocation 0 kg

## Inputs from technosphere
- nitrogen, liquid: 0.019 kg; = 0.019*(amount_monoethanolamine + amount_diethanolamine + amount_triethanolamine)/sum_RP; lognormal variance with pedigree 0.009825, pedigree (2,3,1,2,3)
  Calculated based on literature data published by the industry. This value is a 5-year average of data (2011 - 2015) published by the Gendorf factory (Gendorf, 2016, Umwelterklärung, www.gendorf.de), (Gendorf, 2015, Umwelterklärung, www.gendorf.de), (Gendorf, 2014, Umwelterklärung, www.gendorf.de). The amount of nitrogen used per kg of chemical substance produced is calculated using literature data published by the Gendorf factory based in Germany, which produces a wide range of chemical substances. The factory produced 1657400 tonnes of chemical substances in the year 2015 (Gendorf, 2016, Umwelterklärung, www.gendorf.de) and 740000 tonnes of intermediate products. The reported amount of nitrogen used in 2015 was 33512400 Nm3 (Gendorf, 2016, Umwelterklärung, www.gendorf.de). One Nm3 of nitrogen is equal to 1.2506 kg. The resulting amount of nitrogen - the 5-year average (2011 - 2015, weighted by production volume) is 0.019 kg/kg. Nitrogen is mainly used during the production of chemicals for 'blanketing', which is the process of applying gas to the vapour space of a container or vessel in order to control its composition.
  properties: dry mass 1 kg, wet mass 1 kg
- tap water: 0.026 kg; = 0.026*(amount_monoethanolamine + amount_diethanolamine + amount_triethanolamine)/sum_RP; lognormal variance with pedigree 0.009825, pedigree (2,3,1,2,3)
  Calculated based on literature data published by the industry. This value is a 5-year average of data (2011 - 2015) published by the Gendorf factory (Gendorf, 2016, Umwelterklärung, www.gendorf.de), (Gendorf, 2015, Umwelterklärung, www.gendorf.de), (Gendorf, 2014, Umwelterklärung, www.gendorf.de). The amount of tap water per kg of chemical substance produced is calculated using literature data published by the Gendorf factory based in Germany, which produces a wide range of chemical substances. The factory produced 1657400 tonnes of chemical substances in the year 2015 (Gendorf, 2016, Umwelterklärung, www.gendorf.de) and 740000 tonnes of intermediate products. The amount of tap water consumed in the year 2015 was 55100 tonnes (Gendorf, 2016, Umwelterklärung, www.gendorf.de). The resulting amount of tap water is 0.023 kg/kg of chemical product produced. The 5-year average (2011 - 2015, weighted by production volume) is 0.026 kg/kg.
  properties: wet mass 1 kg, dry mass 0.000337476 kg, carbon content, fossil 0.00178991, water content 2962.17
  note on carbon content, fossil: Bicarbonate content is 2.93 mol/m3. CO2 content is 0.1 mol/m3 (ecoinvent v2.2 report 8, Tab 93.1).
- ammonia, liquid: 0.120158 kg; name amount_ammonia; = ((amount_monoethanolamine/61.084) + (amount_diethanolamine/105.14) + (amount_triethanolamine/149.19))*17.03/process_efficiency; lognormal variance with pedigree 0.1786, pedigree (4,5,5,5,5)
  For the production, a yield of 95% is used in this study.
  MW of ammonia: 17.03 g/mol
  MW monoethanolamine: 61.084 g/mol
  MW diethanolamine: 105.14 g/mol
  MW triethanolamine: 149.19 g/mol
  Uncertainty: e
  properties: wet mass 1 kg, dry mass 1 kg
- chemical factory, organics: 4e-10 unit; = 0.0000000004*(amount_monoethanolamine + amount_diethanolamine + amount_triethanolamine)/sum_RP; lognormal variance with pedigree 0.309225, pedigree (2,3,1,2,3)
  Calculated based on literature data published by the industry. For this activity, no information was readily available concerning infrastructure and land-use. Therefore, the infrastructure is estimated based on data from two chemical factories, the BASF site of Ludwigshafen and the chemical factory in Gendorf (which are both located in Germany), which produce a wide range of chemical substances. Based on this data, the following assumptions are made: the built area amounts to about 4.2 ha, the plant has an average output of 50'000 t/a and a lifespan of fifty years. The estimated infrastructure amount is therefore 4.00 E-10 units per kg of produced chemical.
  References:
  Althaus H.-J., Chudacoff M., Hischier R., Jungbluth N., Osses M. and Primas A. (2007) Life Cycle Inventories of Chemicals. ecoinvent report No. 8, v2.0. EMPA Dübendorf, Swiss Centre for Life Cycle Inventories, Dübendorf, CH.
  Gendorf (2000) Umwelterklärung 2000, Werk Gendorf. Werk Gendorf, Burgkirchen.
- ethylene oxide: 0.951602 kg; name amount_ethylene_oxide; = ((amount_monoethanolamine/61.084) + (2*amount_diethanolamine/105.14) + (3*amount_triethanolamine/146.19))*44.053/process_efficiency; lognormal variance with pedigree 0.1786, pedigree (4,5,5,5,5)
  For the production, a yield of 95% is used in this study.
  MW of ethylene oxide: 44.053 g/mol
  MW monoethanolamine: 61.084 g/mol
  MW diethanolamine: 105.14 g/mol
  MW triethanolamine: 149.19 g/mol
  Uncertainty: e
  property carbon content, fossil 0.545455; name amount_ethylene_oxide_C_content_fossil
  properties: dry mass 1 kg, wet mass 1 kg
- heat, from steam, in chemical industry: 0.2 MJ; = 0.2*(amount_monoethanolamine + amount_diethanolamine + amount_triethanolamine)/sum_RP; lognormal variance with pedigree 0.009825, pedigree (2,3,1,2,3)
  Calculated based on literature data published by the industry. This value is a 5-year average of data (2011 - 2015) published by the Gendorf factory (Gendorf, 2016, Umwelterklärung, www.gendorf.de), (Gendorf, 2015, Umwelterklärung, www.gendorf.de), (Gendorf, 2014, Umwelterklärung, www.gendorf.de). The amount of heat used per kg of chemical substance produced is calculated using literature data published by the Gendorf factory based in Germany, which produces a wide range of chemical substances. The factory produced 1657400 tonnes of chemical substances in the year 2015 (Gendorf, 2016, Umwelterklärung, www.gendorf.de) and 740000 tonnes of intermediate products. The amount of heat in the year 2015 was 523500 GJ (Gendorf, 2016, Umwelterklärung, www.gendorf.de) of which 90% was obtained from natural gas and 10% from steam. The resulting amount of heat from steam is 0.22 MJ/kg of chemical product produced. The 5-year average (2011 - 2015, weighted by production volume) is 0.20 MJ/kg. Cross-reference: the amount of chemicals produced (excluding intermediate products) in the EU-28 in the year 2011 was 327 million tonnes (Eurostat, http://ec.europa.eu/eurostat/statistics-explained/index.php/Chemicals_production_statistics, accessed 20170126). The chemical and petrochemical industry sector consumed 2.33 EJ of energy in 2011 (European Commission - Joint Research Centre, 2014, BAT on Common Waste water and Waste Gas Treatment/Management Systems in the Chemical Sector). The resulting energy (both heat and electricity) consumed per kg of chemicals produced in 2011 is thus 7.13 MJ/kg. This is higher than the value calculated using data published by Gendorf – 3.85 MJ/kg, but that is to be expected as the intermediate products are not accounted for.
- wastewater, average: 0 m3; name BP_wastewater_average; pedigree (1,1,1,1,1)
  Calculated based on literature data published by the industry. This value is a 5-year average of data (2011 - 2015) published by the Gendorf factory (Gendorf, 2016, Umwelterklärung, www.gendorf.de), (Gendorf, 2015, Umwelterklärung, www.gendorf.de), (Gendorf, 2014, Umwelterklärung, www.gendorf.de). The amount of wastewater (which is later on treated in the municipal WWTP) per kg of chemical substance produced is calculated using literature data published by the Gendorf factory based in Germany, which produces a wide range of chemical substances. The factory produced 1657400 tonnes of chemical substances in the year 2015 (Gendorf, 2016, Umwelterklärung, www.gendorf.de) and 740000 tonnes of intermediate products. The amount of wastewater which is later on treated in the municipal WWTP in the year 2015 was 1200 tonnes (Gendorf, 2016, Umwelterklärung, www.gendorf.de). The resulting amount of wastewater is 2.7E-06 m3/kg of chemical product produced.
  production volume 0 m3
    Calculated from the production volume of monoethanolamine in proportion to the respective output amounts.
  property price 0 EUR2005; name BP_wastewater_average_price_EUR2005
  properties: wet mass 1000 kg, dry mass 0.346837 kg, water content 2882.2, carbon content, non-fossil 0.194039
  note on carbon content, non-fossil: 0.0673 kg TOC/m3 (Tab A.17, ecoinvent v2.2 report 13_I). TOC was considered as Total Carbon.
- electricity, medium voltage: 0.416 kWh; = 0.416*(amount_monoethanolamine + amount_diethanolamine + amount_triethanolamine)/sum_RP; lognormal variance with pedigree 0.009825, pedigree (2,3,1,2,3)
  Calculated based on literature data published by the industry. This value is a 5-year average of data (2011 - 2015) published by the Gendorf factory (Gendorf, 2016, Umwelterklärung, www.gendorf.de), (Gendorf, 2015, Umwelterklärung, www.gendorf.de), (Gendorf, 2014, Umwelterklärung, www.gendorf.de). The amount of electricity per kg of chemical substance produced is calculated using literature data published by the Gendorf factory based in Germany, which produces a wide range of chemical substances. The factory produced 1657400 tonnes of chemical substances in the year 2015 (Gendorf, 2016, Umwelterklärung, www.gendorf.de) and 740000 tonnes of intermediate products. The amount of electricity consumed in the year 2015 was 3498800 GJ (Gendorf, 2016, Umwelterklärung, www.gendorf.de). The resulting amount of electricity is 0.406 kWh/kg (year 2015) of chemical substance produced. The 5-year average (2011 - 2015, weighted by production volume) is 0.416 kWh/kg (1.5 MJ/kg). Cross-reference: the amount of chemicals produced (excluding intermediate products) in the EU-28 in the year 2011 was 327 million tonnes (Eurostat, http://ec.europa.eu/eurostat/statistics-explained/index.php/Chemicals_production_statistics, accessed 20170126). The chemical and petrochemical industry sector consumed 2.33 EJ of energy in 2011 (European Commission - Joint Research Centre, 2014, BAT on Common Waste water and Waste Gas Treatment/Management Systems in the Chemical Sector). The resulting energy (both heat and electricity) consumed per kg of chemicals produced in 2011 is thus 7.13 MJ/kg. This is higher than the value calculated using data published by Gendorf – 3.85 MJ/kg, but that is to be expected as the intermediate products are not accounted for.
- heat, district or industrial, natural gas: 2.15 MJ; = 2.15*(amount_monoethanolamine + amount_diethanolamine + amount_triethanolamine)/sum_RP; lognormal variance with pedigree 0.009825, pedigree (2,3,1,2,3)
  Calculated based on literature data published by the industry. This value is a 5-year average of data (2011 - 2015) published by the Gendorf factory (Gendorf, 2016, Umwelterklärung, www.gendorf.de), (Gendorf, 2015, Umwelterklärung, www.gendorf.de), (Gendorf, 2014, Umwelterklärung, www.gendorf.de). The amount of heat used per kg of chemical substance produced is calculated using literature data published by the Gendorf factory based in Germany, which produces a wide range of chemical substances. The factory produced 1657400 tonnes of chemical substances in the year 2015 (Gendorf, 2016, Umwelterklärung, www.gendorf.de) and 740000 tonnes of intermediate products. The amount of heat in the year 2015 was 523500 GJ (Gendorf, 2016, Umwelterklärung, www.gendorf.de) of which 90% was obtained from natural gas and 10% from steam. The resulting amount of heat from natural gas is 2.02 MJ/kg of chemical product produced. The 5-year average (2011 - 2015, weighted by production volume) is 2.15 MJ/kg. Cross-reference: the amount of chemicals produced (excluding intermediate products) in the EU-28 in the year 2011 was 327 million tonnes (Eurostat, http://ec.europa.eu/eurostat/statistics-explained/index.php/Chemicals_production_statistics, accessed 20170126). The chemical and petrochemical industry sector consumed 2.33 EJ of energy in 2011 (European Commission - Joint Research Centre, 2014, BAT on Common Waste water and Waste Gas Treatment/Management Systems in the Chemical Sector). The resulting energy (both heat and electricity) consumed per kg of chemicals produced in 2011 is thus 7.13 MJ/kg. This is higher than the value calculated using data published by Gendorf – 3.85 MJ/kg, but that is to be expected as the intermediate products are not accounted for.
- wastewater, average: -2.43642e-6, -2.63575e-7 m3 (2 entries); lognormal variance with pedigree 0.009825, pedigree (2,3,1,2,3)
  (same comment as for wastewater, average)
  production volume 1606.5 m3

## Inputs from nature
- Water, well, in ground [natural resource, in water]: 0.00083 m3; = 0.00083*(amount_monoethanolamine + amount_diethanolamine + amount_triethanolamine)/sum_RP; lognormal variance with pedigree 0.009825, pedigree (2,3,1,2,3)
  Calculated based on literature data published by the industry. This value is a 5-year average of data (2011 - 2015) published by the Gendorf factory (Gendorf, 2016, Umwelterklärung, www.gendorf.de), (Gendorf, 2015, Umwelterklärung, www.gendorf.de), (Gendorf, 2014, Umwelterklärung, www.gendorf.de). The amount of groundwater and surface water (river) extracted per kg of chemical substance produced is calculated using literature data published by the Gendorf factory based in Germany, which produces a wide range of chemical substances. The factory produced 1657400 tonnes of chemical substances in the year 2015 (Gendorf, 2016, Umwelterklärung, www.gendorf.de) and 740000 tonnes of intermediate products. The amount of groundwater and surface water (river) extracted in the year 2015 was 19950000 tonnes and 21488100 tonnes respectively (Gendorf, 2016, Umwelterklärung, www.gendorf.de).
- Water, river [natural resource, in water]: 0.00086 m3; = 0.00086*(amount_monoethanolamine + amount_diethanolamine + amount_triethanolamine)/sum_RP; lognormal variance with pedigree 0.009825, pedigree (2,3,1,2,3)
  (same comment as for Water, well, in ground)
- Water, cooling, unspecified natural origin [natural resource, in water]: 0.024 m3; = 0.024*(amount_monoethanolamine + amount_diethanolamine + amount_triethanolamine)/sum_RP; lognormal variance with pedigree 0.009825, pedigree (2,3,1,2,3)
  Calculated based on literature data published by the industry. This value is a 5-year average of data (2011 - 2015) published by the Gendorf factory (Gendorf, 2016, Umwelterklärung, www.gendorf.de), (Gendorf, 2015, Umwelterklärung, www.gendorf.de), (Gendorf, 2014, Umwelterklärung, www.gendorf.de). The amount of water for cooling extracted per kg of chemical substance produced is calculated using literature data published by the Gendorf factory based in Germany, which produces a wide range of chemical substances. The factory produced 1657400 tonnes of chemical substances in the year 2015 (Gendorf, 2016, Umwelterklärung, www.gendorf.de) and 740000 tonnes of intermediate products. The reported amounts of water extracted as groundwater and surface water (river) are assumed to be used entirely for cooling purposes.

## Emissions to nature
- BOD5, Biological Oxygen Demand [water, surface water]: 0.000397872 kg; = COD*0.05; lognormal variance with pedigree 0.23, pedigree (5,5,5,5,4)
  BOD was considered to be 5% of the COD.
  Uncertainty: e
- Nitrogen [air, unspecified]: 0.019 kg; = 0.019*(amount_monoethanolamine + amount_diethanolamine + amount_triethanolamine)/sum_RP; lognormal variance with pedigree 0.009825, pedigree (2,3,1,2,3)
  Calculated value. The amount of nitrogen released to air is equal to the amount of nitrogen entering the activity.
- Ammonium, ion [water, surface water]: 0.00183268 kg; = (amount_ammonia*(1 - process_efficiency) - ammonia_emissions_air)*0.3*18.038/17.03; lognormal variance with pedigree 0.23, pedigree (5,5,5,5,4)
  With an efficiency of 95%, 5% of ammonia is found in the wastewater, except for the amount in air emissions. For the ammonia within the wastewater a removal efficiency for NH4-N of 70% and for total N of 50% was assumed. The remaining emissions to water were considered as ammonium (NH4) and nitrate (NO3). The nitrogen emitted to air (N2) and remaining in the sewage sludge was neglected.
  MW of ammonia: 17.03 g/mol
  MW ammonium: 18.038 g/mol
  Uncertainty: e
- Nitrate [water, surface water]: 0.0104996 kg; = (amount_ammonia*(1 - process_efficiency) - ammonia_emissions_air)*0.5*62.005/17.03; lognormal variance with pedigree 0.23, pedigree (5,5,5,5,4)
  The non-reacted ammonia is found in the wastewater, except for the amount in air emissions. For the ammonia within the wastewater a removal efficiency for NH4-N of 70% and for total N of 50% was assumed. The remaining emissions to water were considered as ammonium (NH4) and nitrate (NO3). The nitrogen emitted to air (N2) and remaining in the sewage sludge was neglected.
  MW of ammonia: 17.03 g/mol
  MW nitrate: 62.005 g/mol
  Uncertainty: e
- Ammonia [air, urban air close to ground]: 0.000240315 kg; name ammonia_emissions_air; = amount_ammonia*0.002; lognormal variance with pedigree 0.33, pedigree (5,5,5,5,5)
  There was no data available on process emissions to air for the production of ethanolamines. As approximation the air emissions occurring from the purge vent, the distillation vent and fugitive emission sources were estimated to 0.2% of the raw material input.
  Uncertainty: e
- Ethylene oxide [water, surface water]: 0.00456769 kg; name EO_emissions_water; = (amount_ethylene_oxide*(1 - process_efficiency) - EO_emissions_air)*0.1; lognormal variance with pedigree 0.23, pedigree (5,5,5,5,4)
  The unreacted ethylene oxide was assumed to leave the production process with the wastewater. This amount was calculated taken into account losses of 0.2% raw material as air emissions, and the efficiency of the reaction (95%). Further it was assumed that this wastewater is treated in an internal wastewater plant. Therefore, a removal efficiency of 90% for ethylene oxide was assumed.
  Uncertainty: e
- Ethylene oxide [air, urban air close to ground]: 0.0019032 kg; name EO_emissions_air; = amount_ethylene_oxide*0.002; lognormal variance with pedigree 0.33, pedigree (5,5,5,5,5)
  (same comment as for Ammonia)
- COD, Chemical Oxygen Demand [water, surface water]: 0.00795744 kg; name COD; = 1.7421150964958*EO_emissions_water; lognormal variance with pedigree 0.23, pedigree (5,5,5,5,4)
  COD was calculated from the amount of ethylene oxide in wastewater.
  Uncertainty: e
- Water [water, unspecified]: 0.0167 m3; = 0.0167*(amount_monoethanolamine + amount_diethanolamine + amount_triethanolamine)/sum_RP; lognormal variance with pedigree 0.009825, pedigree (2,3,1,2,3)
  Calculated based on literature data published by the industry (Gendorf, 2016, Umwelterklärung, www.gendorf.de). The amount of water released back to the environment consists of the amount of process water treated in the internal WWTP and then released back to the environment and the amount of cooling water released back to the environment.
- DOC, Dissolved Organic Carbon [water, surface water]: 0.00248914 kg; = TOC; lognormal variance with pedigree 0.23, pedigree (5,5,5,5,4)
  DOC was considered equal to TOC.
  Uncertainty: e
- TOC, Total Organic Carbon [water, surface water]: 0.00248914 kg; name TOC; = 0.544944070046333*EO_emissions_water; lognormal variance with pedigree 0.23, pedigree (5,5,5,5,4)
  TOC was expressed relative to ethylene oxide in wastewater
  Uncertainty: e
- Carbon dioxide, fossil [air, urban air close to ground]: 0.0822184 kg; = ((amount_ethylene_oxide*(1 - process_efficiency) - EO_emissions_air)*0.9)*amount_ethylene_oxide_C_content_fossil*44/12; lognormal variance with pedigree 0.2, pedigree (5,5,5,5,4)
  The unreacted ethylene oxide was assumed to leave the production process with the wastewater. This amount was calculated taken into account losses of 0.2% raw material as air emissions, and the efficiency of the reaction (95%). Further it was assumed that this wastewater is treated in an internal wastewater plant. Therefore, a removal efficiency of 90% for ethylene oxide was assumed. The carbon contained in the removed ethylene oxide was accounted as CO2 emissions to air.
  Uncertainty: e
- Water [air, unspecified]: 0.0014 m3; = 0.0014*(amount_monoethanolamine + amount_diethanolamine + amount_triethanolamine)/sum_RP; lognormal variance with pedigree 0.009825, pedigree (2,3,1,2,3)
  Calculated to ensure the water balance. In general, in the case of recirculating cooling systems, 77% of the water input evaporates to air. In case of once-through cooling systems, 4% of the water input evaporates to air. The process water has in the chemical industry an average evaporation rate of 20.5%. In the specific case of the Gendorf factory, the calculated evaporation rate based on the data published is 6.3%. This matches the qualitative information, that the majority of the cooling systems in Gendorf are once-through and that the amount of cooling water used is significantly higher than the amount of process water used (Gendorf, 2016, Umwelterklärung, www.gendorf.de).

## Sampling procedure
The process data is estimated based on literature and stoechiometric calculations. Process emissions are based on estimations only. Some values are calculated based on data from a large chemical factory located in Germany. For more details, see the comments of the exchanges.

## Review by Emilia Moreno Ruiz 2017-08-08
This dataset was additionally reviewed in a separate review process by Eric Johnson of Atlantic Consulting as well as Emilia Moreno Ruiz and Gregor Wernet of ecoinvent.
