# electrolyte production, KOH, LiOH additive

Dataset: EcoSpold 2, unit process
Geography: GLO
Time period: 2002-01-01 to 2019-12-31
Technology level: current
Classification: EcoSpold01Categories: electronics/component
Classification: ISIC rev.4 ecoinvent: 2011:Manufacture of basic chemicals
Tags: ConvertedDataset
Scenario: Business-as-Usual
System model: Allocation at the point of substitution
Generated by: Wolfram Scharnhorst
Published in: Hischier R. 2007
Database: ecoinvent
isCopyrightProtected: true
accessRestrictedTo: 1

## General comment
This dataset represents 1 kg of electrolyte material for the production of NiMH batteries. Main data are taken from an environmental report of a battery producer as well as from literature. In addition own measurements of sizes and weights of batteries were used. It is based on a density of 2040 kg/m3, for KOH the total mass of electrolyte per kg NiMH rechargable battery package is determined as 0.0822 kg electrolyte per kg of NiMH battery. The relevant amount of infrastructure is determined as follows:
-> Electrolyte content per battery package: 0.0822 kg/kg NiMH battery package
-> Life time of the Shenzen BAK Battery Co. plant (own assumption): 30 years
-> Total electrolyte throughput in 2003 (Shenzen BAK Battery Co. (2006)) 100’000

The calculation is then performed as follows:
<- 1 plant/ (1’000’000 electrolytes per day * 0.0822 kg electrolyte *50 years*365 d)
= 1.1109E-09 plants/kg electrolyte
[This dataset was already contained in the ecoinvent database version 2. It was not individually updated during the transfer to ecoinvent version 3. Life Cycle Impact Assessment results may still have changed, as they are affected by changes in the supply chain, i.e. in other datasets. This dataset was generated following the ecoinvent quality guidelines for version 2. It may have been subject to central changes described in the ecoinvent version 3 change report (http://www.ecoinvent.org/database/ecoinvent-version-3/reports-of-changes/), and the results of the central updates were reviewed extensively. The changes added e.g. consistent water flows and other information throughout the database. The documentation of this dataset can be found in the ecoinvent reports of version 2, which are still available via the ecoinvent website. The change report linked above covers all central changes that were made during the conversion process.]

## Included activities start
From reception of raw materials at the factory gate.

## Included activities end
This dataset includes (Raw) materials for the production of the electrolyte for NiMH batteries. No further aspects (input/output) are taken into account.

## Geography
This module relates to the global situation.

## Technology
Construction details for NiMH-rechargable batteries and manufacturing conditions documented in the environmental report were adopted.

## Parameters
- fraction, process water, to air: 0.061 dimensionless; name fraction_PW_to_air; lognormal variance with pedigree 0.092025, pedigree (4,4,3,2,4)
  Literature value (Statistics Canada, 2007 & Shaffer, K.H., 2008, Consumptive water use in the Great Lakes Basin, USGS) (Vionnet, S., Quantis Water Database - Technical Report, 2012).
- fraction, water, completely softened, to air: 0.061; name fraction_WCS_to_air; = fraction_PW_to_air; lognormal variance with pedigree 0.092025, pedigree (4,4,3,2,4)
  Calculated value. See comment in the other parametres present in this dataset. Water, completely softened is considered to be always used as process water, thus process water fractions to air are applied to all water, completely softened input flows to calculate the amount of water consumed in the processes.

## Reference product
- electrolyte, KOH, LiOH additive: 1 kg; By-product classification allocatable product; CPC 342: Basic inorganic chemicals n.e.c.
  EcoSpold01Location=GLO
  The battery package consists of only one large sized battery cell. Technologically a battery cell consists of a multilayered assembly of coats sandwiched to each other and wound eiter circular or prismatically around a virtual axis. The size of this wound layer assembly is specified based on approximations for single cell layer assembly as contained in a LiIo rechargable battery.
  The mass of the entire multilayer cell assembly of the considered reference NiMH rechargable battery package is approximated based upon size approximations for the above noted LiIo battery model and is made as follows:
  Cell layer assembly length (LiIo rechargable battery): 100.00 mm
  Cell layer assembly width (LiIo rechargable battery): 60.00 mm
  Battery length (LiIo rechargable battery): 128.00 mm
  Battery width (LiIo rechargable battery): 77.00 mm
  Battery length (NiMH rechargable battery): 138.00 mm
  The calculation is then performed as follows:
  Cell layer assembly length (NiMH rechargable battery):
  100.00 mm / 128.00 mm = 78.125%
  138.00 mm *0.781 = 107.81 mm
  Cell layer assembly width (NiMH rechargable battery):
  60.00 mm / 77.00 mm = 77.922%
  105.00 mm *0.779 = 81.81 mm
  The thickness (i.e. the depth) of the single unwound layer compartments is approximated with 0.15 mm. Accordingly the single layers are dimensioned as follows (W x D x H): 81.81 mm x 0.15 mm x 107.81 mm.
  A multilayer package consists of 5 individual layers, namely positive and negative electrode, separator and electrolyte layer. The thickness of the entire prismatically wound multilayer assembly is approximated to 13.5 mm. Adopting the above defined thickness for a single layer (0.15 mm), the entire prismatically wound multilayer assembly consists in total of 90 individual layers and 18 windings (with each time 5 individual layers).
  production volume 1 kg
    Dummy value to be replaced by measured, estimated or calculated value
  property carbon content, non-fossil 0
    The functional unit represents 1 kg of electrolyte material for the production of NiMH batteries,
  property carbon content, fossil 0
    (same comment as for electrolyte, KOH, LiOH additive)
  property price 3.2 EUR2005
    Calculated value based on data from United Nations Commodity Trade Statistics Database (comtrade.un.org). UN comtrade category: 831190 Electrodes etc of base metal or metal carbide, nes. Year 2005. Using exchange rate of 1EURO = 1.209 USD. Average of price of import into 5 main markets (EU, US, JP, IN and CN).
  property carbon content 0
    carbon content on a dry matter basis (reserved; not for manual entry)
  properties: water content 0, wet mass 1 kg, dry mass 1 kg, water in wet mass 0 kg, carbon allocation 0 kg

## Inputs from technosphere
All rows: source Linden D. 2002
- lithium: 0.017 kg; lognormal variance with pedigree 0.140025, pedigree (4,4,5,2,4)
  EcoSpold01Location=GLO
  Estimation based on literature.
  Further references:
  Fetcenko M. (2002) Propulsion and industrial Nickel-Metal hydride batteries. In: Handbook of Batteries (ed. Linden D. and Reddy T. B.), 3rd Edition Edition. McGraw-Hill Companies, Inc., New York, Chicago, San Francisco, Lisbon, London, Madrid, Mexico City, Milan, New Delhi, San Juan, Seoul, Singapore, Sydney, Toronto
  properties: dry mass 1 kg, wet mass 1 kg
- water, completely softened: 0 kg; name water_softened_input; pedigree (1,1,1,1,1)
  Estimation based on literature.
  Further references:
  Fetcenko M. (2002) Propulsion and industrial Nickel-Metal hydride batteries. In: Handbook of Batteries (ed. Linden D. and Reddy T. B.), 3rd Edition Edition. McGraw-Hill Companies, Inc., New York, Chicago, San Francisco, Lisbon, London, Madrid, Mexico City, Milan, New Delhi, San Juan, Seoul, Singapore, Sydney, Toronto
  Estimation based on literature.
  Further references:
  Fetcenko M. (2002) Propulsion and industrial Nickel-Metal hydride batteries. In: Handbook of Batteries (ed. Linden D. and Reddy T. B.), 3rd Edition Edition. McGraw-Hill Companies, Inc., New York, Chicago, San Francisco, Lisbon, London, Madrid, Mexico City, Milan, New Delhi, San Juan, Seoul, Singapore, Sydney, Toronto
  EcoSpold01Location=RER
  properties: wet mass 1 kg
- sodium hydroxide, without water, in 50% solution state: 0.983 kg; lognormal variance with pedigree 0.0501, pedigree (1,2,5,1,1)
  Estimation based on literature.
  Further references:
  Fetcenko M. (2002) Propulsion and industrial Nickel-Metal hydride batteries. In: Handbook of Batteries (ed. Linden D. and Reddy T. B.), 3rd Edition Edition. McGraw-Hill Companies, Inc., New York, Chicago, San Francisco, Lisbon, London, Madrid, Mexico City, Milan, New Delhi, San Juan, Seoul, Singapore, Sydney, Toronto
  EcoSpold01Location=RER
  properties: wet mass 1 kg, dry mass 1 kg
- oxygen, liquid: 0 kg; pedigree (1,1,1,1,1)
  EcoSpold01Location=RER
  Estimation based on literature.
  Further references:
  Fetcenko M. (2002) Propulsion and industrial Nickel-Metal hydride batteries. In: Handbook of Batteries (ed. Linden D. and Reddy T. B.), 3rd Edition Edition. McGraw-Hill Companies, Inc., New York, Chicago, San Francisco, Lisbon, London, Madrid, Mexico City, Milan, New Delhi, San Juan, Seoul, Singapore, Sydney, Toronto
  properties: dry mass 1 kg, wet mass 1 kg
- water, completely softened: 0.00233299, 0.00324589, 0.00433622 kg (3 entries); lognormal variance with pedigree 0.140025, pedigree (4,4,5,2,4)
  (same comment as for water, completely softened)
- oxygen, liquid: 0.00189587, 0.00690943 kg (2 entries); lognormal variance with pedigree 0.140025, pedigree (4,4,5,2,4)
  (same comment as for oxygen, liquid)

## Emissions to nature
- Water [air, unspecified]: 6.04821e-7 m3; name water_to_air_unspecified; = (water_softened_input/1000*fraction_WCS_to_air); lognormal variance with pedigree 0.0807, pedigree (2,2,5,1,1)
  Calculated value based on literature values and expert opinion. See comments in the parametres' comment field.
  property fraction, origin: salt water 0; name fraction_origin_salt_water
  property fraction, origin: fresh water 1; name fraction_origin_fresh_water
  property fraction, origin: unspecified 0; name fraction_origin_unspecified
- Water [water, unspecified]: 9.31028e-6 m3; name water_to_water_unspecified; = (water_softened_input/1000)*(1-fraction_WCS_to_air); lognormal variance with pedigree 0.0807, pedigree (2,2,5,1,1)
  (same comment as for Water)
  property fraction, origin: fresh water 1; name fraction_origin_fresh_water_Ww
  property fraction, origin: salt water 0; name fraction_origin_salt_water_Ww
  property fraction, origin: unspecified 0; name fraction_origin_unspecified_Ww
  property carbon content, fossil 0; name C_content_fossil
  property wet mass 1000 kg; name WM
  property dry mass 0 kg; name DM
  property carbon content, non-fossil 0; name C_content_non_fossil
  property water in wet mass 1000 kg; name WWM

## Sampling procedure
Literature, measurements

## Extrapolations
This dataset has been extrapolated from year 2006 to the year of the calculation (2019). The uncertainty has been adjusted accordingly.

## Review by Roland Hischier 2011-09-30
Transfer of documentation done.

## Review by Rolf Frischknecht 2007-09-14
passed
