# packaging production for fertiliser, per kilogram of packed product

Dataset: EcoSpold 2, unit process
Geography: GLO
Time period: 2009-01-01 to 2019-12-31
Technology level: current
Classification: ISIC rev.4 ecoinvent: 2220:Manufacture of plastics products
Scenario: Business-as-Usual
System model: Allocation at the point of substitution
Generated by: Avraam Symeonidis
Database: ecoinvent
isCopyrightProtected: true
accessRestrictedTo: 1

## General comment
This dataset represents the production and disposal of packaging material for 1 kg of solid fertilisers used at the farm. Based on measured data, 0.1 kg of plastic is needed for a plastic bag that can deliver 50 kg of solid fertilisers. The dataset considers all fertilisers to be in a solid form. The reference product (1 kg) represents the packaging necessary for the respective amount of packed fertilisers used on the farm level. Therefore, this dataset should be used considering the amount of the active substance present in fertiliser and the final amount of fertiliser (that contains the active substance dilluted) that is packed and finally applied in the field, i.e.: 1 kg of packaging for fertilisers should be used per 0.5 kg of input of fertilisers active substance - assuming here a dillution rate of 2 (parts of fertiliser per parts of active substance).
The activity is also considering the wastes generated by the use of packaging for fertilisers on the farm level, so no addition of the waste is needed in the agricultural dataset.

## Included activities start
This activity starts with the reception of HDPE granulates and the production of the plastic bag for packaging solid fertilisers.

## Included activities end
The dataset is also considering the production of the HDPE bag, weighting 0.1 kg and able to deliver 50 kg of solid fertilisers. The bag is produced with stretch blow moulding.
This activity ends with the disposal of waste packaging.

## Reference product
- packaging, for fertilisers: 1 kg; name RP; By-product classification allocatable product; CPC 36410: Sacks and bags, of plastics
  The reference product represents the production of the packaging material that is needed to store 1 kg of solid fertilisers (or pesticides) in a plastic bag for storing 50 kg of solide fertilsers.
  production volume 6.84848e7 kg; name PV_RP; = 1.13E+10*1/0.33/50*0.1
    Based on Eurostat, in 2017 the total amount of manufactured fertilisers sold in Europe amounted to 1.13E+10 kg. Considering that EU represends circa 33% of the world GDP, the global figure is derived with GDP scaling. Therefore, the global consumption of manufacted fertilisers in 2017 was calculated to be 3.43E+10 kg. Given this information, the amount of packaging of fertilisers is calculated to be 6.86E+07 kg considering that 50 liters of pesticide need a plastic container that weights 0.1 kg. The calculation is considering all fertilisers to be in a solid form.
    Source: Eurostat, 2019, Sales of manufactured fertilizers, accessed at: https://ec.europa.eu/eurostat/data/database on 03/04/2019.
  property carbon content, fossil 0.825301
    Considering a chemical formula (C2H4)n for polyethylene, carbon content-fossil is calculated to be 0.856286 kg of Carbon per kg of dry mass.
  property carbon content, non-fossil 0
    Biogenic carbon content of plastics with fossil origin is considered zero.
  property price 0.00221522 EUR2005
    Calculated based on inputs: The price of the product has been calculated as a sum of the values of the material and energy inputs for this product. This value is therefore a rough estimation. It may underestimate the real price since there are additional expenses when producing any product. These expences can include for example labour costs, treatment of waste materials and profit for the producer. Please consider carefully whether this level of data quality is acceptable for your application.
  property carbon content 0.825301
    carbon content on a dry matter basis (reserved; not for manual entry)
  property true value 0.00221522; name RP_true_value
    allocation property applied in "true value" allocation // value calculated from revenue
  properties: water content 0, dry mass 1 kg, water in wet mass 0 kg, wet mass 1 kg, carbon allocation 0.825301 kg

## By-products
- heat, for reuse in municipal waste incineration only: 0 MJ; CPC 17300: Steam and hot water; By-product classification allocatable product; pedigree (1,1,1,1,1)
  Net electricity generated from this waste and used in internal MSWI plant energy redistribution.
  Uncertainty: uncertainty is calculated from uncertainties in waste composition and uncertainties in energy efficiency and the uncertainty in internal energy demand
  production volume 169959 MJ
  property exergy 0.1842 MJ; name E_th_prod_MSWI_exergy
    This exergy property is based on the exergy content of the product.
  property true value relation 0.1842; name E_th_prod_MSWI_true_value_relation
    property to calculate "true value" from
  property price 0.0106 EUR2005; name E_th_prod_MSWI_price_EUR2005
    Average European district heat price from Ecoheatcool and Euroheat 2005-2006, Ecoheat Work package 1: The European heat market. Final report. 10.6 EUR/GJ i s the price of district heat. http://www.solarthermalworld.org/files/Ecoheatcool%20WP1%20Web.pdf?download
  property true value 1.2108e-5
    allocation property applied in "true value" allocation // value calculated from true value relation
- electricity, for reuse in municipal waste incineration only: 0 kWh; CPC 17100: Electrical energy; By-product classification allocatable product; pedigree (1,1,1,1,1)
  (same comment as for heat, for reuse in municipal waste incineration only)
  production volume 24498.9 kWh
  property exergy 3.6 MJ; name E_el_prod_MSWI_exergy
    This exergy property is based on the exergy content of the product.
  property true value relation 3.6; name E_el_prod_MSWI_true_value_relation
    property to calculate "true value" from
  property price 0.1 EUR2005; name E_el_prod_MSWI_price_EUR2005
    Estimated to be the same price as in case of electricity, medium voltage.
  property true value 3.41104e-5
    (same comment as for heat, for reuse in municipal waste incineration only)

## Inputs from technosphere
- waste polyethylene: 0 kg; name BP1; pedigree (1,1,1,1,1)
  This waste exchange is taking into account the waste polyethylene that is produced after the application of the fertiliser.
  production volume 0 kg
    Calculated from reference product production volume, reference product amount and byproduct amount.
  property price 0 EUR2005; name BP1_price_EUR2005
  properties: wet mass 1 kg, carbon content, fossil 0.825301, water content 0.00401606, dry mass 0.996 kg
- polyethylene, high density, granulate: 0.0020073 kg; lognormal variance with pedigree 0.0073, pedigree (3,2,3,5,2)
  Mass of 1 plastic bag for 50 kg solid fertiliser = 0.100 kg (measured data, Agroscope) which results in 0.002 kg packaging per kg stored fertiliser. The strech blow moulding process requiers 0.00205 kg of HDPE since 1.0 kg product of this process equals 0.976 kg of strech blow plastics.
  properties: dry mass 1 kg, wet mass 1 kg, carbon content, fossil 0.857143
- stretch blow moulding: 0.0020073 kg; lognormal variance with pedigree 0.0073, pedigree (3,2,3,5,2)
  (same comment as for polyethylene, high density, granulate)
- waste polyethylene: -0.000193212, -1.48955e-5, -6.15238e-6, -5.84226e-6, -0.000222933, -2.48549e-6, -1.12652e-6, -0.00156065 kg (8 entries); lognormal variance with pedigree 0.0073, pedigree (3,2,3,5,2)
  (same comment as for waste polyethylene)
  production volume 140338 kg

## Sampling procedure
Measured values originate from the Swiss Federal Office for Agriculture.
