# steel production, converter, chromium steel 18/8

Dataset: EcoSpold 2, unit process
Geography: RER
Time period: 2001-01-01 to 2019-12-31
Technology level: modern
Classification: EcoSpold01Categories: metals/extraction
Classification: ISIC rev.4 ecoinvent: 2410:Manufacture of basic iron and steel
Tags: ConvertedDataset
Scenario: Business-as-Usual
System model: Allocation at the point of substitution
Generated by: Hans-Jörg Althaus
Published in: Classen M. 2009
Database: ecoinvent
isCopyrightProtected: true
accessRestrictedTo: 1

## General comment
This process produces primary steel. Scrap is only used for cooling the liquid steel.
[This dataset was already contained in the ecoinvent database version 2. It was not individually updated during the transfer to ecoinvent version 3. Life Cycle Impact Assessment results may still have changed, as they are affected by changes in the supply chain, i.e. in other datasets. This dataset was generated following the ecoinvent quality guidelines for version 2. It may have been subject to central changes described in the ecoinvent version 3 change report (http://www.ecoinvent.org/database/ecoinvent-version-3/reports-of-changes/), and the results of the central updates were reviewed extensively. The changes added e.g. consistent water flows and other information throughout the database. The documentation of this dataset can be found in the ecoinvent reports of version 2, which are still available via the ecoinvent website. The change report linked above covers all central changes that were made during the conversion process.]

## Included activities end
Transports of hot metal and other input materials to converter, steel making process and casting.

## Geography
Data relate to plants in the EU

## Technology
EU technology mix (mainly LD converter)

## Parameters
- fraction, cooling water, to air: 0.56; name fraction_CW_to_air; lognormal variance with pedigree 0.041425, pedigree (2,3,2,2,1)
  Calculated value based on literature value (Byers,2003) (Vionnet, S., Quantis Water Database - Technical Report, 2012).
- fraction, cooling water, cooling pond system, to air: 0.032; name fraction_CW_CP_to_air; lognormal variance with pedigree 0.0413, pedigree (2,3,1,3,1)
  Calculated based on literature value (Scown, C.D., 2011, Water Footprint of U.S. Transportation Fuels and supplying information of the article) (Vionnet, S., Quantis Water Database - Technical Report, 2012).
- fraction, process water, to air: 0.095 dimensionless; name fraction_PW_to_air; lognormal variance with pedigree 0.092025, pedigree (4,4,3,2,4)
  Literature value (Statistics Canada, 2007 & Shaffer, K.H., 2008, Consumptive water use in the Great Lakes Basin, USGS) (Vionnet, S., Quantis Water Database - Technical Report, 2012).
- fraction, cooling water, once-through system, to air: 0.004; name fraction_CW_OT_to_air; lognormal variance with pedigree 0.0413, pedigree (2,3,1,3,1)
  (same comment as for fraction, cooling water, cooling pond system, to air)
- fraction, cooling water, recirculating system, to air: 0.771; name fraction_CW_R_to_air; lognormal variance with pedigree 0.0413, pedigree (2,3,1,3,1)
  (same comment as for fraction, cooling water, cooling pond system, to air)

## Reference product
- steel, chromium steel 18/8: 1 kg; CPC 41122: Alloy steel in ingots or other primary forms and semi-finished products of alloy steel; By-product classification allocatable product
  EcoSpold01Location=RER
  production volume 4.21673e9 kg; = 7147000000*0.59
    Calculated based on literature values. The production of stainless steel in Europe in 2013 was 7.15E9 kg (Stainless Steel in Figures, 2014, International Stainless Steel Forum). This is distributed between converter (59%) and electric furnace (38%). The missing 3% correspond to open hearth furnace. The shares were calculated using data from the Steel Statistical Yearbook 2014, World Steel Association.
  property carbon content, fossil 0.0008
    Stainless steel model is the grade 304 steel (18/8 stainless, 18% chromium 8% nickel; max. 0.08% C)
  property carbon content 0.0008
    carbon content on a dry matter basis (reserved; not for manual entry)
  properties: water content 0, carbon content, non-fossil 0, price 0.468 EUR2005, water in wet mass 0 kg, wet mass 1 kg, dry mass 1 kg, carbon allocation 0.0008 kg

## Inputs from technosphere
- electricity, medium voltage: 0.021944 kWh; lognormal variance with pedigree 0.0413, pedigree (2,3,5,3,1)
  EcoSpold01Location=UCTE
- natural gas, high pressure: 0 m3; pedigree (1,1,1,1,1)
  EcoSpold01Location=RER
  properties: wet mass 0.84 kg, dry mass 0.84 kg, heating value, gross 39 MJ, carbon content, fossil 0.602381
  note on carbon content, fossil: An average C content of 0.506 kg C/ m3 has been assumed (this average has been calculated using data in Tab 3.5, ecoinvent v2.2 report 6_V
- iron ore, beneficiated, 65% Fe: 0.022 kg; lognormal variance with pedigree 0.0413, pedigree (2,3,5,3,1)
  EcoSpold01Location=GLO
  properties: dry mass 1 kg, wet mass 1 kg
- basic oxygen furnace waste: -0.032077 kg; lognormal variance with pedigree 0.0413, pedigree (2,3,5,3,1)
  EcoSpold01Location=CH
  production volume 1.3526e8 kg; = (Ref('e556898f-9c6c-4e51-a598-5251a15bb1ab')*-1)/ Ref('7f254c7e-5a46-4d1a-8843-84be51edee6f')* Ref('7f254c7e-5a46-4d1a-8843-84be51edee6f', 'ProductionVolume')
    Calculated from the production volume of steel, chromium steel 18/8 in proportion to the respective output amounts.
  properties: dry mass 1 kg, wet mass 1 kg
- ferrochromium, high-carbon, 68% Cr: 0.26471 kg; lognormal variance with pedigree 0.0512, pedigree (2,5,5,5,1)
  EcoSpold01Location=GLO
  properties: carbon content, fossil 0.07, wet mass 1 kg, dry mass 1 kg
  note on carbon content, fossil: Ferrochromium is a master alloy of iron and chromium, containing 45 – 95 % Cr and various amounts of iron, carbon, and other elements. High-carbon ferrochromium (HC ferrochromium) contains 4 – 10 % C (ecoinvent v2.2 report 20_part VI). An average content of 7% C was considered
- quicklime, in pieces, loose: 0.0425 kg; lognormal variance with pedigree 0.0413, pedigree (2,3,5,3,1)
  EcoSpold01Location=CH
  properties: wet mass 1 kg, water content 0.010101, dry mass 0.99 kg
- pig iron: 0.52779 kg; lognormal variance with pedigree 0.0413, pedigree (2,3,5,3,1)
  EcoSpold01Location=GLO
  properties: wet mass 1 kg, dry mass 1 kg, carbon content, fossil 0.045
  note on carbon content, fossil: Pig iron is the iron produced in the blast furnace. It is an alloy of 94% Fe and more than 2% C (world average 4.5%). (ecoinvent v2.2 report 10_partII)
- blast oxygen furnace converter: 1.3333e-11 unit; lognormal variance with pedigree 0.5, pedigree (5,5,5,5,5)
  activityLink introduced to establish a direct link to the corresponding regional supply of this product
  EcoSpold01Location=RER
- oxygen, liquid: 0.07145 kg; lognormal variance with pedigree 0.0413, pedigree (2,3,5,3,1)
  EcoSpold01Location=RER
  properties: dry mass 1 kg, wet mass 1 kg
- ferronickel, 25% Ni: 0.32 kg; lognormal variance with pedigree 0.0512, pedigree (2,5,5,5,1)
  EcoSpold01Location=GLO
  properties: carbon content, fossil 0.0165, dry mass 1 kg, wet mass 1 kg
  note on carbon content, fossil: Ferronickel (CAS 11133-76-9) is a market product of the nickel industry. It consists of an alloy of iron with nickel, with a nickel content of 20 - 50 %, and a C content of 1.5 - 1.8% (Tab. 3.2 ecoinvent v2.2 report 20_part IV). An average C content of 1.65% was considered
- inert waste, for final disposal: -0.0029 kg; lognormal variance with pedigree 0.0413, pedigree (2,3,5,3,1)
  EcoSpold01Location=CH
  production volume 1.22285e7 kg; = (Ref('3ebc5d8c-88d1-4931-93a5-137516554240')*-1)/ Ref('7f254c7e-5a46-4d1a-8843-84be51edee6f')* Ref('7f254c7e-5a46-4d1a-8843-84be51edee6f', 'ProductionVolume')
    (same comment as for basic oxygen furnace waste)
  properties: dry mass 0.995 kg, water content 0.00502513, wet mass 1 kg
- dolomite: 0.00275 kg; lognormal variance with pedigree 0.0413, pedigree (2,3,5,3,1)
  EcoSpold01Location=RER
  properties: wet mass 1 kg, carbon content, fossil 0.130435, dry mass 1 kg
- dust, alloyed electric arc furnace steel: -0.0010625 kg; lognormal variance with pedigree 0.0413, pedigree (2,3,5,3,1)
  EcoSpold01Location=CH
  production volume 4.48028e6 kg; = (Ref('b573bda1-016b-4d0c-8b34-1939d5f1c990')*-1)/ Ref('7f254c7e-5a46-4d1a-8843-84be51edee6f')* Ref('7f254c7e-5a46-4d1a-8843-84be51edee6f', 'ProductionVolume')
    (same comment as for basic oxygen furnace waste)
  properties: water content 0.182033, wet mass 1 kg, dry mass 0.846 kg, carbon content, fossil 0.00777526
- coke: 0.00025 MJ; lognormal variance with pedigree 0.0413, pedigree (2,3,5,3,1)
  EcoSpold01Location=RER
  properties: dry mass 0.0328671 kg, wet mass 0.034965 kg, water content 0.0638298, carbon content, fossil 0.869149
  note on carbon content, fossil: 81.7% C and 6% water in wet mass (ecoinvent v2.1 report 6_VI Table 7.1)
- natural gas, high pressure: 0.00095537, 6.16842e-6 m3 (2 entries); lognormal variance with pedigree 0.0413, pedigree (2,3,5,3,1)
  EcoSpold01Location=RER

## Inputs from nature
- Water, unspecified natural origin [natural resource, in water]: 0 m3; name water_UNO_input; source Byers, W. 2003; pedigree (3,3,5,2,1)
  Based on literature, (Vionnet, S., Quantis Water Database - Technical Report, 2012). It includes the three main technologies processes: blast furnace, basic oxygen furnace and casting.
- Water, cooling, unspecified natural origin [natural resource, in water]: 0.00452085 m3; name water_cooling_UNO_input; source Byers, W. 2003; lognormal variance with pedigree 0.0513, pedigree (2,3,5,3,1)
  Calculated based on literature, (Vionnet, S., Quantis Water Database - Technical Report, 2012). It includes the three main technologies processes: blast furnace, basic oxygen furnace and casting. The process boundary is given by the phisical boundary of the caster.
  property carbon content, fossil 0.0104329; name C_content_fossil
  property wet mass 1000 kg; name WM
  property carbon content, non-fossil 0; name C_content_non_fossil
  property water in wet mass 999.89 kg; name WWM
  property dry mass 0.1101 kg; name DM
  property water content 9081.65; name water_content

## Emissions to nature
- Carbon dioxide, fossil [air, unspecified]: 0.0756 kg; lognormal variance with pedigree 0.0413, pedigree (2,3,5,3,1)
- Water [air, unspecified]: 0.00253167 m3; name water_to_air_unspecified; = (water_cooling_UNO_input*fraction_CW_to_air)+(water_UNO_input*fraction_PW_to_air); lognormal variance with pedigree 0.0807, pedigree (2,2,5,1,1)
  Calculated value based on literature values and expert opinion. See comments in the parametres' comment field.
  property fraction, origin: unspecified 1; name fraction_origin_unspecified
  property fraction, origin: salt water 0; name fraction_origin_salt_water
  property fraction, origin: fresh water 0; name fraction_origin_fresh_water
- PAH, polycyclic aromatic hydrocarbons [air, unspecified]: 1.2e-10 kg; lognormal variance with pedigree 0.3413, pedigree (2,3,5,3,1)
- Manganese [air, unspecified]: 6.05e-7 kg; lognormal variance with pedigree 0.6913, pedigree (2,3,5,3,1)
- Chromium [air, unspecified]: 1.85e-7 kg; lognormal variance with pedigree 0.6913, pedigree (2,3,5,3,1)
- Copper [air, unspecified]: 2.5e-8 kg; lognormal variance with pedigree 0.6913, pedigree (2,3,5,3,1)
- Lead [air, unspecified]: 5.15e-7 kg; lognormal variance with pedigree 0.6913, pedigree (2,3,5,3,1)
- Carbon monoxide, fossil [air, unspecified]: 0.00473 kg; lognormal variance with pedigree 0.6913, pedigree (2,3,5,3,1)
- Nitrogen oxides [air, unspecified]: 1.25e-5 kg; lognormal variance with pedigree 0.0813, pedigree (2,3,5,3,1)
- Particulates, < 2.5 um [air, unspecified]: 4.75e-5 kg; lognormal variance with pedigree 0.3413, pedigree (2,3,5,3,1)
- Dioxins, measured as 2,3,7,8-tetrachlorodibenzo-p-dioxin [air, unspecified]: 3.05e-14 kg; lognormal variance with pedigree 0.3413, pedigree (2,3,5,3,1)
- Water [water, unspecified]: 0.00198917 m3; name water_to_water_unspecified; = water_cooling_UNO_input*(1-fraction_CW_to_air)+water_UNO_input*(1-fraction_PW_to_air); lognormal variance with pedigree 0.0807, pedigree (2,2,5,1,1)
  (same comment as for Water)
  property fraction, origin: fresh water 0; name fraction_origin_fresh_water_Ww
  property fraction, origin: salt water 0; name fraction_origin_salt_water_Ww
  property fraction, origin: unspecified 1; name fraction_origin_unspecified_Ww

## Sampling procedure
based on literature

## Extrapolations
This dataset has been extrapolated from year 2001 to the year of the calculation (2019). The uncertainty has been adjusted accordingly.

## Review by Emilia Moreno Ruiz 2015-10-28
PV adjusted

## Review by Roland Hischier 2007-08-13
passed
