# treatment of waste expanded polystyrene, municipal incineration

Dataset: EcoSpold 2, unit process
Geography: CH
Time period: 1994-01-01 to 2019-12-31
Technology level: outdated
Classification: ISIC rev.4 ecoinvent: 3821:Treatment and disposal of non-hazardous waste
Classification: EcoSpold01Categories: waste management/municipal incineration
Synonyms: EPS
Tags: ConvertedDataset; Treatment
Scenario: Business-as-Usual
System model: Allocation at the point of substitution
Generated by: Gabor Doka (obsolete)
Published in: Doka G. 2007
Database: ecoinvent
isCopyrightProtected: true
accessRestrictedTo: 1

## General comment
Inventoried waste contains 100% EPS insulation; .
waste composition (wet, in ppm): upper heating value 33.2 MJ/kg; lower heating value 32.2 MJ/kg; H2O 1988.4; O 38626; H 77592; C 863430; S 674.8; N 1931.3; P n.a.; B n.a.; Cl 1125.5; Br 6700; F 14.167; I n.a.; Ag n.a.; As 1.8311; Ba 179.73; Cd 23.201; Co 30.444; Cr 39.382; Cu 106.94; Hg 0.81832; Mn 77.018; Mo n.a.; Ni 19.852; Pb 14.848; Sb 41.408; Se 2.0238; Sn 25.255; V 277.7; Zn 829.75; Be 0.48186; Sc n.a.; Sr 85.289; Ti 963.72; Tl 0.38549; W n.a.; Si n.a.; Fe 3590.5; Ca n.a.; Al 192.74; K n.a.; Mg n.a.; Na 1412.3;
Share of carbon in waste that is biogenic 0%.
Share of iron in waste that is metallic/recyclable 0%.
Net energy produced in MSWI: 3.67MJ/kg waste electric energy and 7.39MJ/kg waste thermal energy
Allocation of energy production: no substitution or expansion. Total burden allocated to waste disposal function of MSWI.
One kg of this waste produces 0.01704 kg of slag and 0.01217 kg of residues, which are landfilled. Additional solidification with 0.004869 kg of cement.
[This dataset was already contained in the ecoinvent database version 2. It was not individually updated during the transfer to ecoinvent version 3. Life Cycle Impact Assessment results may still have changed, as they are affected by changes in the supply chain, i.e. in other datasets. This dataset was generated following the ecoinvent quality guidelines for version 2. It may have been subject to central changes described in the ecoinvent version 3 change report (http://www.ecoinvent.org/database/ecoinvent-version-3/reports-of-changes/), and the results of the central updates were reviewed extensively. The changes added e.g. consistent water flows and other information throughout the database. The documentation of this dataset can be found in the ecoinvent reports of version 2, which are still available via the ecoinvent website. The change report linked above covers all central changes that were made during the conversion process.]

## Included activities end
waste-specific air and water emisions from incineration, auxiliary material consumption for flue gas cleaning. Short-term emissions to river water and long-term emisisons to ground water from slag compartment (from bottom slag) and residual material landfill (from solidified fly ashes and scrubber slugde). Process energy demands for MSWI.

## Geography
Specific to the technology mix encountered in Switzerland in 2000. Well applicable to modern incineration practices in Europe, North America or Japan.

## Technology
replaced by newer incineration technology with fly ash extraction. Average Swiss MSWI plants in 2000 with electrostatic precipitator for fly ash (ESP), wet flue gas scrubber and 29.4% SNCR , 32.2% SCR-high dust , 24.6% SCR-low dust -DeNOx facilities and 13.8% without Denox (by burnt waste, according to Swiss average). Share of waste incinerated in plants with magnetic scrap separation from slag : 50%. Gross electric efficiency technology mix 12.997% and Gross thermal efficiency technology mix 25.57%

## Time period
Waste composition as given in literature reference, theoretical data or other source. Transfer coefficients for modern Swiss MSWI. Emission speciation based on early 90ies data.

## Reference product
- waste expanded polystyrene: -1 kg; CPC 39: Wastes or scraps; By-product classification Waste; CAS 9003-53-6
  EcoSpold01Location=CH
  production volume 0 kg
    outdated. Replaced by newer incineration technology with fly ash extraction.
  property carbon content, fossil 0.864875
    Average of different polystyrene extruded. Shares are 50% (w/w) extruded using CO2/acetone as blowing agent, 25% (w/w) using HFC-134a as a blowing agent and 25% (w/w) using HFC-152a as a blowing agent (ecoinvent v2.2 report 16, part XIV, Tab 4.21). Similar result is reported in Tab A.5, ecoinvent report 13_I.
  property price 0 EUR2005
    Waste products are assigned a price of zero as they are assumed to require further treatment.
  property carbon content 0.864875
    carbon content on a dry matter basis (reserved; not for manual entry)
  properties: water in wet mass 0.05 kg, dry mass 0.95 kg, carbon content, non-fossil 0, water content 0.0526316, wet mass 1 kg, carbon allocation 0.821631 kg

## Inputs from technosphere
- sodium hydroxide, without water, in 50% solution state: 0.00135 kg; lognormal variance with pedigree 0.53, pedigree (1,1,5,1,1)
  EcoSpold01Location=RER
  uncertainty calculated from uncertainty in average auxiliary material input, and the unertainty of the waste composition of this waste
  properties: wet mass 1 kg, dry mass 1 kg
- municipal waste incineration facility: 2.5e-10 unit; lognormal variance with pedigree 0.04, pedigree (1,1,5,1,1)
  demands per kilogram waste. uncertainty is heeded in the module
  EcoSpold01Location=CH
- process-specific burdens, residual material landfill: 0.0122 kg; lognormal variance with pedigree 0.17, pedigree (1,1,5,1,1)
  uncertainty is calculated from uncertainties in waste composition and transfer coefficients in incinerator;activityLink introduced to establish a direct link to the corresponding regional supply of this product
  EcoSpold01Location=CH
- quicklime, milled, packed: 0.000196 kg; lognormal variance with pedigree 0.68, pedigree (1,1,5,1,1)
  uncertainty calculated from uncertainty in average auxiliary material input, and the unertainty of the waste composition of this waste
  EcoSpold01Location=CH
  properties: wet mass 1 kg, water content 0.010101, dry mass 0.99 kg
- chemical, organic: 9.41e-5 kg; lognormal variance with pedigree 1.17, pedigree (1,1,5,1,1)
  EcoSpold01Location=GLO
  Proxy for TMT15. uncertainty calculated from uncertainty in average auxiliary material input, and the unertainty of the waste composition of this waste
  properties: wet mass 1 kg, dry mass 1 kg, carbon content, fossil 0.628
  note on carbon content, fossil: This dataset is an unweighted average of 20 organic substances (listed in Tab 88.1, ecoinvent v2.2 report 8, part II), being part of the top100 chemicals included in this database. The C-content has also been calculated as an unweighted average of the C content of the substances composing this dataset.
- iron (III) chloride, without water, in 40% solution state: 0.000105 kg; lognormal variance with pedigree 0.54, pedigree (1,1,5,1,1)
  (same comment as for quicklime, milled, packed)
  properties: dry mass 1 kg, wet mass 1 kg
- residual material landfill: 2.54e-11 unit; lognormal variance with pedigree 0.17, pedigree (1,1,5,1,1)
  uncertainty is calculated from uncertainties in waste composition and transfer coefficients in incinerator
  EcoSpold01Location=CH
- waste cement, hydrated: -0.0122 kg; lognormal variance with pedigree 0.18, pedigree (1,1,5,1,1)
  Hydrated cement for solidification of landfilled residual material. Uncertainty calculated from unertainty of the waste composition of this waste and transfer coefficients in the incinerator and of the solidification recipe.
  EcoSpold01Location=CH
  production volume 0 kg; = Ref('69e06305-c5d2-4300-a81e-c93fe5870924', 'ProductionVolume')* (Ref('273fc11d-fa1c-42ff-b1f9-996e53b6f4e1')*-1)
    Calculated from the production volume of waste expanded polystyrene, 5% water in proportion to the respective output amounts.
  properties: dry mass 1 kg, wet mass 1 kg
- process-specific burdens, municipal waste incineration: 1 kg; lognormal variance with pedigree 0.04, pedigree (1,1,5,1,1)
  EcoSpold01Location=CH
  demands per kilogram waste. uncertainty is heeded in the module;activityLink introduced to establish a direct link to the corresponding regional supply of this product
- hydrochloric acid, without water, in 30% solution state: 2.67e-6 kg; lognormal variance with pedigree 0.45, pedigree (1,1,5,1,1)
  (same comment as for sodium hydroxide, without water, in 50% solution state)
  properties: dry mass 1 kg, wet mass 1 kg
- slag landfill: 3.03e-11 unit; lognormal variance with pedigree 0.09, pedigree (1,1,5,1,1)
  (same comment as for residual material landfill)
- ammonia, liquid: 9.74e-5 kg; lognormal variance with pedigree 1.53, pedigree (1,1,5,1,1)
  EcoSpold01Location=CH
  uncertainty calculated from uncertainty in average DeNOx input, uncertainty in the share of thermal NOx, uncertainty of nitrogen content in average municipal waste and the unertainty in nitrogen content in *this* waste.
  properties: wet mass 1 kg, dry mass 1 kg
- titanium dioxide: 2.79e-6 kg; lognormal variance with pedigree 2.24, pedigree (1,1,5,1,1)
  EcoSpold01Location=RER
  uncertainty calculated from uncertainty in average DeNOx input, uncertainty in the share of thermal NOx, uncertainty of nitrogen content in average municipal waste and the unertainty in nitrogen content in *this* waste.
  properties: wet mass 1 kg, dry mass 1 kg
- process-specific burdens, slag landfill: 0.017 kg; lognormal variance with pedigree 0.09, pedigree (1,1,5,1,1)
  EcoSpold01Location=CH
  uncertainty is calculated from uncertainties in waste composition and transfer coefficients in incinerator;activityLink introduced to establish a direct link to the corresponding regional supply of this product
- chemical, inorganic: 4.45e-6 kg; lognormal variance with pedigree 0.45, pedigree (1,1,5,1,1)
  Proxy for Polyelectrolyte. uncertainty calculated from uncertainty in average auxiliary material input, and the unertainty of the waste composition of this waste
  EcoSpold01Location=GLO
  properties: wet mass 1 kg, carbon content, fossil 0.003, dry mass 1 kg
  note on carbon content, fossil: This dataset is an unweighted average of 20 inorganic substances (listed in Tab 88.1, ecoinvent v2.2 report 8, part II), being part of the top100 chemicals included in this database. The C-content has also been calculated as an unweighted average of the C content of the substances composing this dataset.
- chromium oxide, flakes: 5.69e-8 kg; lognormal variance with pedigree 2.24, pedigree (1,1,5,1,1)
  EcoSpold01Location=RER
  Proxy for vanadium pentoxide V2O5 in SCR catalyst, uncertainty calculated from uncertainty in average DeNOx input, uncertainty in the share of thermal NOx, uncertainty of nitrogen content in average municipal waste and the unertainty in nitrogen content in *this* waste.
  properties: dry mass 1 kg, wet mass 1 kg
- heat, district or industrial, natural gas: 0.00855 MJ; lognormal variance with pedigree 1.53, pedigree (1,1,5,1,1)
  uncertainty calculated from uncertainty in average DeNOx input, uncertainty in the share of thermal NOx, uncertainty of nitrogen content in average municipal waste and the unertainty in nitrogen content in *this* waste.
  EcoSpold01Location=RER
- cement, unspecified: 0.00487 kg; lognormal variance with pedigree 0.18, pedigree (1,1,5,1,1)
  EcoSpold01Location=CH
  Cement for solidification of landfilled residual material. Uncertainty calculated from unertainty of the waste composition of this waste, of transfer coefficients in the incinerator and of the solidification recipe.
  properties: wet mass 1 kg, dry mass 1 kg

## Emissions to nature
- Chromium [air, urban air close to ground]: 2.91e-12 kg; lognormal variance with pedigree 1.22, pedigree (1,1,5,1,1)
  uncertainty is calculated from uncertainties in waste composition and transfer coefficients in incinerator
- Bromine [water, ground-, long-term]: 0.00117 kg; lognormal variance with pedigree 0.46, pedigree (1,1,5,1,1)
  Long-term emissions from landfilling of incineration residues. uncertainty is calculated from uncertainties in waste composition and transfer coefficients in incinerator and landfills.
- Arsenic, ion [water, ground-, long-term]: 1.01e-6 kg; lognormal variance with pedigree 1.53, pedigree (1,1,5,1,1)
  (same comment as for Bromine)
- Lead [water, surface water]: 4.14e-10 kg; lognormal variance with pedigree 1.25, pedigree (1,1,5,1,1)
  uncertainty is calculated from uncertainties in waste composition and transfer coefficients in incinerator and landfills
- Tin, ion [water, ground-, long-term]: 1.27e-5 kg; lognormal variance with pedigree 1.54, pedigree (1,1,5,1,1)
  (same comment as for Bromine)
- Nickel [air, urban air close to ground]: 8.57e-13 kg; lognormal variance with pedigree 1.32, pedigree (1,1,5,1,1)
  (same comment as for Chromium)
- Iron [air, urban air close to ground]: 1.2e-7 kg; lognormal variance with pedigree 0.58, pedigree (1,1,5,1,1)
  (same comment as for Chromium)
- Strontium [air, urban air close to ground]: 8.53e-9 kg; lognormal variance with pedigree 1.06, pedigree (1,1,5,1,1)
  (same comment as for Chromium)
- Antimony [air, urban air close to ground]: 1.61e-13 kg; lognormal variance with pedigree 1.25, pedigree (1,1,5,1,1)
  (same comment as for Chromium)
- Antimony [water, ground-, long-term]: 2.65e-5 kg; lognormal variance with pedigree 0.91, pedigree (1,1,5,1,1)
  (same comment as for Bromine)
- Chromium VI [water, surface water]: 1.28e-6 kg; lognormal variance with pedigree 1.07, pedigree (1,1,5,1,1)
  (same comment as for Lead)
- Thallium [water, ground-, long-term]: 2.25e-7 kg; lognormal variance with pedigree 1.31, pedigree (1,1,5,1,1)
  (same comment as for Bromine)
- Beryllium [water, ground-, long-term]: 3.88e-7 kg; lognormal variance with pedigree 1.48, pedigree (1,1,5,1,1)
  (same comment as for Bromine)
- Antimony [water, surface water]: 1.44e-5 kg; lognormal variance with pedigree 0.94, pedigree (1,1,5,1,1)
  (same comment as for Lead)
- Methane, fossil [air, urban air close to ground]: 6.38e-6 kg; lognormal variance with pedigree 0.091225, pedigree (2,3,5,2,1)
  Confidential data from 5 plants in Switzerland and Germany
  Uncertainty: & basic uncertainty of 1.5; confidential data from 5 plants in Switzerland and Germany
- Titanium [air, urban air close to ground]: 9.64e-7 kg; lognormal variance with pedigree 0.72, pedigree (1,1,5,1,1)
  (same comment as for Chromium)
- Vanadium, ion [water, ground-, long-term]: 4.76e-5 kg; lognormal variance with pedigree 1.6, pedigree (1,1,5,1,1)
  (same comment as for Bromine)
- Beryllium [air, urban air close to ground]: 4.82e-10 kg; lognormal variance with pedigree 1.72, pedigree (1,1,5,1,1)
  (same comment as for Chromium)
- Copper, ion [water, surface water]: 4.34e-9 kg; lognormal variance with pedigree 1.61, pedigree (1,1,5,1,1)
  (same comment as for Lead)
- Barium [air, urban air close to ground]: 1.8e-7 kg; lognormal variance with pedigree 0.95, pedigree (1,1,5,1,1)
  (same comment as for Chromium)
- Beryllium [water, surface water]: 2.99e-10 kg; lognormal variance with pedigree 1.94, pedigree (1,1,5,1,1)
  (same comment as for Lead)
- Lead [water, ground-, long-term]: 1.06e-6 kg; lognormal variance with pedigree 7.3, pedigree (1,1,5,1,1)
  (same comment as for Bromine)
- Iron, ion [water, surface water]: 1.23e-6 kg; lognormal variance with pedigree 0.53, pedigree (1,1,5,1,1)
  (same comment as for Lead)
- Cobalt [air, urban air close to ground]: 9.67e-13 kg; lognormal variance with pedigree 1.26, pedigree (1,1,5,1,1)
  (same comment as for Chromium)
- Thallium [water, surface water]: 2.36e-10 kg; lognormal variance with pedigree 1.91, pedigree (1,1,5,1,1)
  (same comment as for Lead)
- Titanium, ion [water, surface water]: 4.64e-9 kg; lognormal variance with pedigree 2.06, pedigree (1,1,5,1,1)
  (same comment as for Lead)
- Manganese [water, ground-, long-term]: 6.63e-5 kg; lognormal variance with pedigree 1.13, pedigree (1,1,5,1,1)
  (same comment as for Bromine)
- Nitrate [water, ground-, long-term]: 6.94e-5 kg; lognormal variance with pedigree 0.62, pedigree (1,1,5,1,1)
  (same comment as for Bromine)
- Cobalt [water, surface water]: 5.21e-9 kg; lognormal variance with pedigree 1.61, pedigree (1,1,5,1,1)
  (same comment as for Lead)
- Cadmium, ion [water, ground-, long-term]: 2.33e-7 kg; lognormal variance with pedigree 6.99, pedigree (1,1,5,1,1)
  (same comment as for Bromine)
- Chloride [water, ground-, long-term]: 2.66e-5 kg; lognormal variance with pedigree 0.34, pedigree (1,1,5,1,1)
  (same comment as for Bromine)
- Zinc, ion [water, ground-, long-term]: 1.29e-5 kg; lognormal variance with pedigree 5.36, pedigree (1,1,5,1,1)
  (same comment as for Bromine)
- Mercury [water, ground-, long-term]: 4.26e-8 kg; lognormal variance with pedigree 3.4, pedigree (1,1,5,1,1)
  (same comment as for Bromine)
- Strontium [water, surface water]: 5.37e-8 kg; lognormal variance with pedigree 1.73, pedigree (1,1,5,1,1)
  (same comment as for Lead)
- Carbon dioxide, fossil [air, urban air close to ground]: 3.13 kg; lognormal variance with pedigree 0.04, pedigree (1,1,5,1,1)
  (same comment as for Chromium)
- COD, Chemical Oxygen Demand [water, surface water]: 5.77e-5 kg; lognormal variance with pedigree 0.28, pedigree (1,1,5,1,1)
  (same comment as for Lead)
- Cadmium [air, urban air close to ground]: 1.28e-9 kg; lognormal variance with pedigree 1.23, pedigree (1,1,5,1,1)
  (same comment as for Chromium)
- Cadmium, ion [water, surface water]: 1.05e-8 kg; lognormal variance with pedigree 1.16, pedigree (1,1,5,1,1)
  (same comment as for Lead)
- Vanadium [air, urban air close to ground]: 2.78e-8 kg; lognormal variance with pedigree 0.9, pedigree (1,1,5,1,1)
  (same comment as for Chromium)
- Aluminium [water, ground-, long-term]: 0.000143 kg; lognormal variance with pedigree 0.85, pedigree (1,1,5,1,1)
  (same comment as for Bromine)
- Nickel, ion [water, surface water]: 1.25e-8 kg; lognormal variance with pedigree 1.79, pedigree (1,1,5,1,1)
  (same comment as for Lead)
- Cobalt [water, ground-, long-term]: 2.67e-5 kg; lognormal variance with pedigree 1.11, pedigree (1,1,5,1,1)
  (same comment as for Bromine)
- Copper, ion [water, ground-, long-term]: 8.64e-5 kg; lognormal variance with pedigree 0.97, pedigree (1,1,5,1,1)
  (same comment as for Bromine)
- Chromium VI [water, ground-, long-term]: 4.17e-6 kg; lognormal variance with pedigree 1.35, pedigree (1,1,5,1,1)
  (same comment as for Bromine)
- Titanium, ion [water, ground-, long-term]: 0.000289 kg; lognormal variance with pedigree 1.06, pedigree (1,1,5,1,1)
  (same comment as for Bromine)
- Sulfate [water, surface water]: 0.000328 kg; lognormal variance with pedigree 0.37, pedigree (1,1,5,1,1)
  (same comment as for Lead)
- BOD5, Biological Oxygen Demand [water, surface water]: 3.23e-5 kg; lognormal variance with pedigree 0.16, pedigree (1,1,5,1,1)
  (same comment as for Lead)
- Copper [air, urban air close to ground]: 7.89e-10 kg; lognormal variance with pedigree 1.05, pedigree (1,1,5,1,1)
  (same comment as for Chromium)
- Nitrogen oxides [air, urban air close to ground]: 6.14e-5 kg; lognormal variance with pedigree 1.64, pedigree (1,1,5,1,1)
  uncertainty calculated from uncertainty in average N-emissions, uncertainty in the share of thermal NOx, uncertainty of nitrogen content in average municipal waste and the unertainty in nitrogen content in *this* waste.
- Ammonia [air, urban air close to ground]: 1.53e-6 kg; lognormal variance with pedigree 1.64, pedigree (1,1,5,1,1)
  (same comment as for Nitrogen oxides)
- COD, Chemical Oxygen Demand [water, ground-, long-term]: 0.0213 kg; lognormal variance with pedigree 0.05, pedigree (1,1,5,1,1)
  (same comment as for Bromine)
- Hydrogen chloride [air, urban air close to ground]: 1.25e-8 kg; lognormal variance with pedigree 0.73, pedigree (1,1,5,1,1)
  (same comment as for Chromium)
- Zinc [air, urban air close to ground]: 1.36e-8 kg; lognormal variance with pedigree 0.77, pedigree (1,1,5,1,1)
  (same comment as for Chromium)
- TOC, Total Organic Carbon [water, ground-, long-term]: 0.00843 kg; lognormal variance with pedigree 0.05, pedigree (1,1,5,1,1)
  (same comment as for Bromine)
- Barium [water, ground-, long-term]: 0.00016 kg; lognormal variance with pedigree 0.97, pedigree (1,1,5,1,1)
  (same comment as for Bromine)
- Sulfur dioxide [air, urban air close to ground]: 2.87e-6 kg; lognormal variance with pedigree 0.76, pedigree (1,1,5,1,1)
  (same comment as for Chromium)
- Lead [air, urban air close to ground]: 5.51e-10 kg; lognormal variance with pedigree 1.3, pedigree (1,1,5,1,1)
  (same comment as for Chromium)
- Selenium [water, ground-, long-term]: 1.36e-6 kg; lognormal variance with pedigree 1.03, pedigree (1,1,5,1,1)
  (same comment as for Bromine)
- Vanadium, ion [water, surface water]: 1.87e-7 kg; lognormal variance with pedigree 1.09, pedigree (1,1,5,1,1)
  (same comment as for Lead)
- Dinitrogen monoxide [air, urban air close to ground]: 8.16e-6 kg; lognormal variance with pedigree 1.64, pedigree (1,1,5,1,1)
  (same comment as for Nitrogen oxides)
- Selenium [water, surface water]: 6.59e-7 kg; lognormal variance with pedigree 1.21, pedigree (1,1,5,1,1)
  (same comment as for Lead)
- Arsenic [air, urban air close to ground]: 1.87e-14 kg; lognormal variance with pedigree 1.64, pedigree (1,1,5,1,1)
  (same comment as for Chromium)
- Chloride [water, surface water]: 0.0011 kg; lognormal variance with pedigree 0.62, pedigree (1,1,5,1,1)
  (same comment as for Lead)
- Zinc, ion [water, surface water]: 1.53e-7 kg; lognormal variance with pedigree 0.65, pedigree (1,1,5,1,1)
  (same comment as for Lead)
- Carbon monoxide, fossil [air, urban air close to ground]: 0.000223 kg; lognormal variance with pedigree 0.690625, pedigree (1,3,5,2,1)
  Literature data from switzerland and germany adapted to plant age distribution in switzerland
  Uncertainty: & basic uncertainty of 5; literature data from switzerland and germany adapted to plant age distribution in switzerland
- Iron, ion [water, ground-, long-term]: 0.00168 kg; lognormal variance with pedigree 1.31, pedigree (1,1,5,1,1)
  (same comment as for Bromine)
- Mercury [air, urban air close to ground]: 2.83e-14 kg; lognormal variance with pedigree 1.73, pedigree (1,1,5,1,1)
  (same comment as for Chromium)
- Bromine [air, urban air close to ground]: 2.01e-5 kg; lognormal variance with pedigree 0.47, pedigree (1,1,5,1,1)
  (same comment as for Chromium)
- Mercury [water, surface water]: 8.75e-9 kg; lognormal variance with pedigree 1.6, pedigree (1,1,5,1,1)
  (same comment as for Lead)
- Thallium [air, urban air close to ground]: 3.85e-10 kg; lognormal variance with pedigree 1.75, pedigree (1,1,5,1,1)
  (same comment as for Chromium)
- DOC, Dissolved Organic Carbon [water, surface water]: 2.37e-5 kg; lognormal variance with pedigree 0.27, pedigree (1,1,5,1,1)
  (same comment as for Lead)
- Arsenic, ion [water, surface water]: 8.25e-7 kg; lognormal variance with pedigree 1.29, pedigree (1,1,5,1,1)
  (same comment as for Lead)
- Sodium, ion [water, ground-, long-term]: 0.00109 kg; lognormal variance with pedigree 0.43, pedigree (1,1,5,1,1)
  (same comment as for Bromine)
- Hydrogen fluoride [air, urban air close to ground]: 7.46e-9 kg; lognormal variance with pedigree 1.29, pedigree (1,1,5,1,1)
  (same comment as for Chromium)
- Cyanide [air, urban air close to ground]: 1.74e-6 kg; lognormal variance with pedigree 1.64, pedigree (1,1,5,1,1)
  (same comment as for Nitrogen oxides)
- Fluoride [water, ground-, long-term]: 1.26e-5 kg; lognormal variance with pedigree 0.87, pedigree (1,1,5,1,1)
  (same comment as for Bromine)
- Nickel, ion [water, ground-, long-term]: 1.86e-5 kg; lognormal variance with pedigree 1.17, pedigree (1,1,5,1,1)
  (same comment as for Bromine)
- Aluminium [water, surface water]: 1.6e-8 kg; lognormal variance with pedigree 1.21, pedigree (1,1,5,1,1)
  (same comment as for Lead)
- Barium [water, surface water]: 2.47e-8 kg; lognormal variance with pedigree 1.8, pedigree (1,1,5,1,1)
  (same comment as for Lead)
- TOC, Total Organic Carbon [water, surface water]: 2.37e-5 kg; lognormal variance with pedigree 0.27, pedigree (1,1,5,1,1)
  (same comment as for Lead)
- Sodium [air, urban air close to ground]: 1.33e-5 kg; lognormal variance with pedigree 0.66, pedigree (1,1,5,1,1)
  (same comment as for Chromium)
- BOD5, Biological Oxygen Demand [water, ground-, long-term]: 0.00697 kg; lognormal variance with pedigree 0.05, pedigree (1,1,5,1,1)
  (same comment as for Bromine)
- Fluoride [water, surface water]: 1.09e-6 kg; lognormal variance with pedigree 0.91, pedigree (1,1,5,1,1)
  (same comment as for Lead)
- Chromium, ion [water, surface water]: 1.26e-7 kg; lognormal variance with pedigree 1.14, pedigree (1,1,5,1,1)
  (same comment as for Lead)
- Tin, ion [water, surface water]: 9.37e-10 kg; lognormal variance with pedigree 1.29, pedigree (1,1,5,1,1)
  (same comment as for Lead)
- Sulfate [water, ground-, long-term]: 0.00169 kg; lognormal variance with pedigree 0.45, pedigree (1,1,5,1,1)
  (same comment as for Bromine)
- DOC, Dissolved Organic Carbon [water, ground-, long-term]: 0.00843 kg; lognormal variance with pedigree 0.05, pedigree (1,1,5,1,1)
  (same comment as for Bromine)
- Strontium [water, ground-, long-term]: 8.52e-5 kg; lognormal variance with pedigree 1.02, pedigree (1,1,5,1,1)
  (same comment as for Bromine)
- Aluminium [air, urban air close to ground]: 3.01e-7 kg; lognormal variance with pedigree 0.93, pedigree (1,1,5,1,1)
  (same comment as for Chromium)
- Sodium, ion [water, surface water]: 0.000305 kg; lognormal variance with pedigree 0.35, pedigree (1,1,5,1,1)
  (same comment as for Lead)
- Nitrate [water, surface water]: 2.47e-5 kg; lognormal variance with pedigree 0.44, pedigree (1,1,5,1,1)
  (same comment as for Lead)
- Manganese [air, urban air close to ground]: 4.19e-13 kg; lognormal variance with pedigree 1.16, pedigree (1,1,5,1,1)
  (same comment as for Chromium)
- Bromine [water, surface water]: 0.00552 kg; lognormal variance with pedigree 0.37, pedigree (1,1,5,1,1)
  (same comment as for Lead)
- Manganese [water, surface water]: 4.31e-9 kg; lognormal variance with pedigree 1.8, pedigree (1,1,5,1,1)
  (same comment as for Lead)
- Tin [air, urban air close to ground]: 3.35e-8 kg; lognormal variance with pedigree 1.2, pedigree (1,1,5,1,1)
  (same comment as for Chromium)
- Selenium [air, urban air close to ground]: 1.02e-14 kg; lognormal variance with pedigree 1.63, pedigree (1,1,5,1,1)
  (same comment as for Chromium)

## Sampling procedure
waste-specific calculation based on literature data

## Extrapolations
This dataset has been extrapolated from year 2000 to the year of the calculation (2019). The uncertainty has been adjusted accordingly.

## Review by Niels Jungbluth 2003-07-15
Passed. Calculation for standard deviation 95 of, i.e., infrastructure,
land occupation, transport services or other services can differ from
standard Pedigree approach used in this project and figures obtained by
this procedure.
