# uranium hexafluoride production

Dataset: EcoSpold 2, unit process
Geography: CN
Time period: 1982-01-01 to 2019-12-31
Technology level: current
Classification: ISIC rev.4 ecoinvent: 2011:Manufacture of basic chemicals
Classification: EcoSpold01Categories: nuclear power/production
Tags: ConvertedDataset
Scenario: Business-as-Usual
System model: Allocation at the point of substitution
Generated by: Roberto Dones
Published in: Dones, R. 2007
Database: ecoinvent
isCopyrightProtected: true
accessRestrictedTo: 1

## General comment
Data are from old but accurate US references. The wet process for converting yellowcake U3O8 to uraniumhexafloride UF6 is described. Data for the Sequoyah facility are used, although it has been shut down at the end of 1992, because the wet process is the mostly used worldwide and because of data availability. Particles have been assumed to be between 2.5 and 10 micrometer. Radioactive solid waste has been accurately accounted. Radioactive waste from decommissioning is taken from an old source, which does not differenciate between dry and wet process, and may not reflect current conditions. The non radioactive solid waste given from the used reference is interpreted as ashes, because most probably incineration occurs internally in the factory. However, the consideration of this waste species as “average incineration residue" should be understood as a guess done to cope with missing information on the specific composition. Transport requirements recalculated either using ecoinvent standard distances for Europe (e.g. for chemicals) or given average distances by train from Chinese 2004 statistics or own assumptions. Yellowcake is asssumed to be delivered in China from Australia, because the domestic uranium production in China is likely not sufficient for all plants. Uncertainties have been increased with regard to the original dataset for the US plant, when necessary. Product loss has been assumed 0.3% vs. 0.1% of the US dataset, and relevant uncertainty increased. This dataset has been developed with the goal to serve a preliminary estimation of the Chinese nuclear chain for the Chinese electricity mix. Hence, it cannot be used for comparisons of conversion among countries.
[This dataset was already contained in the ecoinvent database version 2. It was not individually updated during the transfer to ecoinvent version 3. Life Cycle Impact Assessment results may still have changed, as they are affected by changes in the supply chain, i.e. in other datasets. This dataset was generated following the ecoinvent quality guidelines for version 2. It may have been subject to central changes described in the ecoinvent version 3 change report (http://www.ecoinvent.org/database/ecoinvent-version-3/reports-of-changes/), and the results of the central updates were reviewed extensively. The changes added e.g. consistent water flows and other information throughout the database. The documentation of this dataset can be found in the ecoinvent reports of version 2, which are still available via the ecoinvent website. The change report linked above covers all central changes that were made during the conversion process.]

## Included activities end
The module includes: input of yellowcake U3O8 from uranium milling; electricity and natural gas used for operation; chemicals for the wet process; water use; cement assumed to be used for conditioning of contaminated sludge; transport requirements of operation materials, industrial wastes, and contaminated waste from operation and decommissioning. Radioactive and non-radioactive emissions to air and to water from the operation are also included. The infrastructure requirements are accounted for, although construction and operation data partially refer to different plants rather than to one single unit.

## Geography
US data.

## Technology
Effluents correspond to operational characteristics in 1980s in USA.

## Parameters
- fraction, water, decarbonised, to air: 0.3875; name fraction_WDC_to_air; = fraction_CW_to_air; lognormal variance with pedigree 0.092025, pedigree (4,4,3,2,4)
  Calculated value. See comments in the other parametres present in this dataset. Decarbonised water is considered to be always used as cooling water, thus cooling water fractions to air are applied to all carbonised water input flows to calculate the amount of water consumed in the processes.
- fraction, cooling water, to air: 0.3875; name fraction_CW_to_air; = (0.5*fraction_CW_OT_to_air)+(0.5*fraction_CW_R_to_air); lognormal variance with pedigree 0.092025, pedigree (4,4,3,2,4)
  Calculated value based on literature value (see comments of the other parametres present in this dataset) and expert opinion. In the case when no industry/literature data are available about the type of cooling or directly fraction, cooling water, to air specific for the process a default assumption is applied. It is assumed that the once-through cooling system is used in 50% of all cases and recirculating system is used in another 50% of all cases.
- fraction, cooling water, cooling pond system, to air: 0.032; name fraction_CW_CP_to_air; lognormal variance with pedigree 0.0413, pedigree (2,3,1,3,1)
  Calculated based on literature value (Scown, C.D., 2011, Water Footprint of U.S. Transportation Fuels and supplying information of the article) (Vionnet, S., Quantis Water Database - Technical Report, 2012).
- fraction, cooling water, recirculating system, to air: 0.771; name fraction_CW_R_to_air; lognormal variance with pedigree 0.0413, pedigree (2,3,1,3,1)
  (same comment as for fraction, cooling water, cooling pond system, to air)
- fraction, cooling water, once-through system, to air: 0.004; name fraction_CW_OT_to_air; lognormal variance with pedigree 0.0413, pedigree (2,3,1,3,1)
  (same comment as for fraction, cooling water, cooling pond system, to air)

## Reference product
- uranium hexafluoride: 1 kg; By-product classification allocatable product; CPC 33620: Uranium enriched in U235 and its compounds; plutonium and its compounds; alloys, dispersions, ceramic products[…]
  EcoSpold01Location=CN
  production volume 323422 kg
    1.48 kg UF6 per kg U in global mine production (http://www.world-nuclear.org/info/inf23.html), after an assumed 5% loss in yellowcake production. Chinese capacity is 0.55% of global conversion capacity (http://www.wise-uranium.org/efac.html#CONV).
  property price 22.9 EUR2005
    Using price 2005 of "Short, Medium, and Long-Term Contracts (Weighted-Average Price)" in http://www.eia.gov/cneaf/nuclear/umar/summarytable1.html and including price increase.
  property carbon content 0
    carbon content on a dry matter basis (reserved; not for manual entry)
  property true value 22.9
    allocation property applied in "true value" allocation // value calculated from revenue
  properties: water content 0, dry mass 1 kg, wet mass 1 kg, water in wet mass 0 kg, carbon content, fossil 0, carbon content, non-fossil 0, carbon allocation 0 kg

## By-products
- electricity, for reuse in municipal waste incineration only: 0 kWh; CPC 17100: Electrical energy; By-product classification allocatable product; pedigree (1,1,1,1,1)
  Net electricity generated from this waste and used in internal MSWI plant energy redistribution.
  Uncertainty: uncertainty is calculated from uncertainties in waste composition and uncertainties in energy efficiency and the uncertainty in internal energy demand
  production volume 0.00406209 kWh
  property exergy 3.6 MJ; name E_el_prod_MSWI_exergy
    This exergy property is based on the exergy content of the product.
  property true value relation 3.6; name E_el_prod_MSWI_true_value_relation
    property to calculate "true value" from
  property price 0.1 EUR2005; name E_el_prod_MSWI_price_EUR2005
    Estimated to be the same price as in case of electricity, medium voltage.
  property true value 1.61823e-9
    allocation property applied in "true value" allocation // value calculated from true value relation
- heat, for reuse in municipal waste incineration only: 0 MJ; CPC 17300: Steam and hot water; By-product classification allocatable product; pedigree (1,1,1,1,1)
  Net useful heat generated from this waste and used in internal MSWI plant energy redistribution.
  Uncertainty: uncertainty is calculated from uncertainties in waste composition and uncertainties in energy efficiency and the uncertainty in internal energy demand
  production volume 0.0292356 MJ
  property true value relation 0.1842; name E_th_prod_MSWI_true_value_relation
    property to calculate "true value" from
  property exergy 0.1842 MJ; name E_th_prod_MSWI_exergy
    This exergy property is based on the exergy content of the product.
  property price 0.0106 EUR2005; name E_th_prod_MSWI_price_EUR2005
    Average European district heat price from Ecoheatcool and Euroheat 2005-2006, Ecoheat Work package 1: The European heat market. Final report. 10.6 EUR/GJ i s the price of district heat. http://www.solarthermalworld.org/files/Ecoheatcool%20WP1%20Web.pdf?download
  property true value 5.95924e-10
    (same comment as for electricity, for reuse in municipal waste incineration only)
- zinc concentrate: 0 kg; CPC 14290: Other non-ferrous metal ores and concentrates (other than uranium or thorium ores and concentrates); By-product classification allocatable product
  Calculated value from the knowledge of the properties of both products.
  production volume 1.62512e-8 kg
  property price 0.38 EUR2005; name ByP_price_EUR2005
    Temporary price data. Calculated as 90% of purchasers price based on: Zinc content in concentrate 53%. Concentrate price per kg Zn 86.5% of refined Zn price (13.5% treatment charges according to CHR Metals Limited 2005: Dynamic cost curves. http://www.minecost.com/dynamic.pdf). 2004 zinc price from USGS (2007) Mineral commodity summaries 2007. <http://minerals.usgs.gov/minerals/pubs/mcs/2007/mcs2007.pdf> [Accessed 25 May 2010]
  property zinc content 0.53; name zinc_C_zinc_concentrate
    Zinc content on a dry matter basis. Value taken from teh "zinc mine operation" /GLO dataset.
  property dry mass 1 kg; name DM_zinc_concentrate
  property carbon content 0
    carbon content on a dry matter basis (reserved; not for manual entry)
  property true value 1.90941e-14
    allocation property applied in "true value" allocation // value calculated from revenue
  properties: wet mass 1 kg, water content 0, carbon content, non-fossil 0, carbon content, fossil 0, water in wet mass 0 kg, carbon allocation 0 kg

## Inputs from technosphere
- uranium, in yellowcake: 1 kg; lognormal variance with pedigree 0.2106, pedigree (5,5,5,5,5)
  EcoSpold01Location=RNA
  Own assumption (1.01 in original US dataset, from range of data)
  properties: dry mass 1 kg, wet mass 1 kg
- electricity, medium voltage: 10.3 kWh; lognormal variance with pedigree 0.16, pedigree (1,1,5,1,1)
  EcoSpold01Location=CN
  own estimation
- chemical, organic: 0.03 kg; lognormal variance with pedigree 0.08, pedigree (1,1,5,1,1)
  own estimation
  EcoSpold01Location=GLO
  properties: carbon content, fossil 0.628, dry mass 1 kg, wet mass 1 kg
  note on carbon content, fossil: This dataset is an unweighted average of 20 organic substances (listed in Tab 88.1, ecoinvent v2.2 report 8, part II), being part of the top100 chemicals included in this database. The C-content has also been calculated as an unweighted average of the C content of the substances composing this dataset.
- water, decarbonised: 500 kg; name water_decarbonised_input; lognormal variance with pedigree 0.08, pedigree (1,1,5,1,1)
  own estimation
  EcoSpold01Location=RER
  properties: wet mass 1 kg
- heat, district or industrial, natural gas: 665 MJ; lognormal variance with pedigree 0.16, pedigree (1,1,5,1,1)
  EcoSpold01Location=RER
  own estimation
- uranium conversion facility: 3.13e-9 unit; lognormal variance with pedigree 0.05, pedigree (1,1,5,1,1)
  own estimation;activityLink introduced to establish a direct link to the corresponding regional supply of this product
  EcoSpold01Location=CN
- cement, unspecified: 0.81 kg; lognormal variance with pedigree 0.16, pedigree (1,1,5,1,1)
  own estimation
  EcoSpold01Location=CH
  properties: dry mass 1 kg, wet mass 1 kg
- hydrogen fluoride: 0.59 kg; lognormal variance with pedigree 0.08, pedigree (1,1,5,1,1)
  EcoSpold01Location=GLO
  own estimation
  properties: dry mass 1 kg, wet mass 1 kg
- average incineration residue: -0.17 kg; lognormal variance with pedigree 0.05, pedigree (1,1,5,1,1)
  EcoSpold01Location=CH
  from interval of available data
  production volume 54981.7 kg
    Calculated from the production volume of uranium hexafluoride in proportion to the respective output amounts.
  properties: dry mass 1 kg, carbon content, non-fossil 0.0511208, carbon content, fossil 0.0325466, wet mass 1 kg
  note on carbon content, non-fossil: Tab A.1, ecoinvent v2.2 report 13_I. It is considered that 61.1% of the C has a biogenic origin
- ammonia, liquid: 0.25 kg; lognormal variance with pedigree 0.08, pedigree (1,1,5,1,1)
  own estimation
  EcoSpold01Location=RER
  properties: dry mass 1 kg, wet mass 1 kg
- nitric acid, without water, in 50% solution state: 0.9 kg; lognormal variance with pedigree 0.08, pedigree (1,1,5,1,1)
  own estimation
  EcoSpold01Location=RER
  properties: wet mass 1 kg, dry mass 1 kg
- chemical, inorganic: 0.052 kg; lognormal variance with pedigree 0.08, pedigree (1,1,5,1,1)
  own estimation
  EcoSpold01Location=GLO
  properties: dry mass 1 kg, wet mass 1 kg, carbon content, fossil 0.003
  note on carbon content, fossil: This dataset is an unweighted average of 20 inorganic substances (listed in Tab 88.1, ecoinvent v2.2 report 8, part II), being part of the top100 chemicals included in this database. The C-content has also been calculated as an unweighted average of the C content of the substances composing this dataset.
- quicklime, milled, loose: 0.5 kg; lognormal variance with pedigree 0.08, pedigree (1,1,5,1,1)
  EcoSpold01Location=CH
  own estimation
  properties: water content 0.010101, wet mass 1 kg, dry mass 0.99 kg
- low level radioactive waste: -0.00061 m3; lognormal variance with pedigree 0.08, pedigree (1,1,5,1,1)
  EcoSpold01Location=CH
  own estimation
  production volume 197.287 m3
    (same comment as for average incineration residue)
  properties: dry mass 2500 kg, wet mass 2500 kg

## Emissions to nature
- Nitrate [water, surface water]: 0.00061 kg; lognormal variance with pedigree 0.16, pedigree (1,1,5,1,1)
  own estimation (1.2 in the US dataset)
- Hydrogen fluoride [air, non-urban air or from high stacks]: 0.00027 kg; lognormal variance with pedigree 0.16, pedigree (1,1,5,1,1)
  own estimation (1.2 in the US dataset)
- Protactinium-234 [air, non-urban air or from high stacks]: 0.27 kBq; lognormal variance with pedigree 0.34, pedigree (1,1,5,1,1)
  own estimation, uncertainty on radioactivity releases
- Thorium-234 [water, surface water]: 5 kBq; lognormal variance with pedigree 0.34, pedigree (1,1,5,1,1)
  own estimation, uncertainty on radioactivity releases
- Uranium-234 [air, non-urban air or from high stacks]: 0.25 kBq; lognormal variance with pedigree 0.34, pedigree (1,1,5,1,1)
  based on ranges from North American literature
- Uranium-235 [water, surface water]: 0.2 kBq; lognormal variance with pedigree 0.69, pedigree (1,1,5,1,1)
  based on ranges from North American literature
- Radium-226 [air, non-urban air or from high stacks]: 3.7e-5 kBq; lognormal variance with pedigree 0.34, pedigree (1,1,5,1,1)
  own estimation, uncertainty on radioactivity releases
- Sulfur dioxide [air, non-urban air or from high stacks]: 0.0055 kg; lognormal variance with pedigree 0.16, pedigree (1,1,5,1,1)
  own estimation (1.2 in the US dataset)
- Mercury [water, surface water]: 1.7e-7 kg; lognormal variance with pedigree 0.16, pedigree (1,1,5,1,1)
  own estimation (1.2 in the US dataset)
- Magnesium [water, surface water]: 0.00035 kg; lognormal variance with pedigree 0.16, pedigree (1,1,5,1,1)
  own estimation (1.2 in the US dataset)
- Uranium-235 [air, non-urban air or from high stacks]: 0.013 kBq; lognormal variance with pedigree 0.34, pedigree (1,1,5,1,1)
  based on ranges from North American literature
- Aluminium [water, surface water]: 6.9e-5 kg; lognormal variance with pedigree 0.16, pedigree (1,1,5,1,1)
  own estimation (1.2 in the US dataset)
- Radium-226 [water, surface water]: 0.0014 kBq; lognormal variance with pedigree 0.25, pedigree (1,1,5,1,1)
  based on ranges from North American literature
- Iron, ion [water, surface water]: 0.00017 kg; lognormal variance with pedigree 0.16, pedigree (1,1,5,1,1)
  own estimation (1.2 in the US dataset)
- TOC, Total Organic Carbon [water, surface water]: 0.00017 kg; lognormal variance with pedigree 0.16, pedigree (1,1,5,1,1)
  own estimation (1.2 in the US dataset)
- Uranium-238 [air, non-urban air or from high stacks]: 0.27 kBq; lognormal variance with pedigree 0.34, pedigree (1,1,5,1,1)
  based on ranges from North American literature
- Titanium, ion [water, surface water]: 1.7e-6 kg; lognormal variance with pedigree 0.16, pedigree (1,1,5,1,1)
  own estimation (1.2 in the US dataset)
- COD, Chemical Oxygen Demand [water, surface water]: 0.0017 kg; lognormal variance with pedigree 0.16, pedigree (1,1,5,1,1)
  own estimation (1.2 in the US dataset)
- Chloride [water, surface water]: 0.0087 kg; lognormal variance with pedigree 0.16, pedigree (1,1,5,1,1)
  own estimation (1.2 in the US dataset)
- Copper, ion [water, surface water]: 1.6e-5 kg; lognormal variance with pedigree 0.16, pedigree (1,1,5,1,1)
  own estimation (1.2 in the US dataset)
- Ammonium, ion [water, surface water]: 0.00017 kg; lognormal variance with pedigree 0.16, pedigree (1,1,5,1,1)
  own estimation (1.2 in the US dataset)
- Suspended solids, unspecified [water, surface water]: 0.0035 kg; lognormal variance with pedigree 0.16, pedigree (1,1,5,1,1)
  own estimation (1.2 in the US dataset)
- Potassium, ion [water, surface water]: 0.00017 kg; lognormal variance with pedigree 0.16, pedigree (1,1,5,1,1)
  own estimation (1.2 in the US dataset)
- Thorium-234 [air, non-urban air or from high stacks]: 0.27 kBq; lognormal variance with pedigree 0.34, pedigree (1,1,5,1,1)
  based on ranges from North American literature
- Cadmium, ion [water, surface water]: 1.7e-6 kg; lognormal variance with pedigree 0.16, pedigree (1,1,5,1,1)
  own estimation (1.2 in the US dataset)
- Thorium-230 [air, non-urban air or from high stacks]: 0.00022 kBq; lognormal variance with pedigree 0.69, pedigree (1,1,5,1,1)
  based on ranges from North American literature
- Water [water, unspecified]: 0.30625 m3; name water_to_water_unspecified; = (water_decarbonised_input/1000)*(1-fraction_WDC_to_air); lognormal variance with pedigree 0.0807, pedigree (2,2,5,1,1)
  Calculated value based on literature values and expert opinion. See comments in the parametres' comment field.
  property dry mass 0 kg; name DM
  property water in wet mass 1000 kg; name WWM
  property fraction, origin: salt water 0; name fraction_origin_salt_water_Ww
  property fraction, origin: fresh water 1; name fraction_origin_fresh_water_Ww
  property fraction, origin: unspecified 0; name fraction_origin_unspecified_Ww
  property carbon content, fossil 0; name C_content_fossil
  property carbon content, non-fossil 0; name C_content_non_fossil
  property wet mass 1000 kg; name WM
- Particulates, > 2.5 um, and < 10um [air, non-urban air or from high stacks]: 0.00073 kg; lognormal variance with pedigree 0.16, pedigree (1,1,5,1,1)
  own estimation (1.4 in the US dataset)
- Carbon monoxide, fossil [air, non-urban air or from high stacks]: 0.00069 kg; lognormal variance with pedigree 0.16, pedigree (1,1,5,1,1)
  own estimation (1.2 in the US dataset)
- Water [air, unspecified]: 0.19375 m3; name water_to_air_unspecified; = (water_decarbonised_input/1000*fraction_WDC_to_air); lognormal variance with pedigree 0.0807, pedigree (2,2,5,1,1)
  (same comment as for Water)
  property fraction, origin: salt water 0; name fraction_origin_salt_water
  property fraction, origin: fresh water 1; name fraction_origin_fresh_water
  property fraction, origin: unspecified 0; name fraction_origin_unspecified
- Thorium-230 [water, surface water]: 0.0012 kBq; lognormal variance with pedigree 0.34, pedigree (1,1,5,1,1)
  own estimation, uncertainty on radioactivity releases
- Uranium-238 [water, surface water]: 5.4 kBq; lognormal variance with pedigree 0.69, pedigree (1,1,5,1,1)
  based on ranges from North American literature
- Zinc, ion [water, surface water]: 6.9e-6 kg; lognormal variance with pedigree 0.16, pedigree (1,1,5,1,1)
  own estimation (1.2 in the US dataset)
- Hexane [air, non-urban air or from high stacks]: 0.019 kg
- Sodium, ion [water, surface water]: 0.0061 kg; lognormal variance with pedigree 0.16, pedigree (1,1,5,1,1)
  own estimation (1.2 in the US dataset)
- Nitrogen oxides [air, non-urban air or from high stacks]: 0.025 kg; lognormal variance with pedigree 0.16, pedigree (1,1,5,1,1)
  own estimation (1.2 in the US dataset)
- Barium [water, surface water]: 2.2e-5 kg; lognormal variance with pedigree 0.16, pedigree (1,1,5,1,1)
  own estimation (1.2 in the US dataset)
- Lead [water, surface water]: 1.7e-6 kg; lognormal variance with pedigree 0.16, pedigree (1,1,5,1,1)
  own estimation (1.2 in the US dataset)
- Sulfate [water, surface water]: 0.0028 kg; lognormal variance with pedigree 0.16, pedigree (1,1,5,1,1)
  own estimation (1.2 in the US dataset)
- Protactinium-234 [water, surface water]: 5 kBq; lognormal variance with pedigree 0.34, pedigree (1,1,5,1,1)
  own estimation, uncertainty on radioactivity releases
- Uranium-234 [water, surface water]: 5.4 kBq; lognormal variance with pedigree 0.69, pedigree (1,1,5,1,1)
  based on ranges from North American literature
- DOC, Dissolved Organic Carbon [water, surface water]: 0.00017 kg; lognormal variance with pedigree 0.16, pedigree (1,1,5,1,1)
  Calculated as equal to TOC.
- Calcium, ion [water, surface water]: 0.0083 kg; lognormal variance with pedigree 0.16, pedigree (1,1,5,1,1)
  own estimation (1.2 in the US dataset)
- Fluoride [water, surface water]: 0.00027 kg; lognormal variance with pedigree 0.16, pedigree (1,1,5,1,1)
  own estimation (1.2 in the US dataset)
- BOD5, Biological Oxygen Demand [water, surface water]: 0.00035 kg; lognormal variance with pedigree 0.16, pedigree (1,1,5,1,1)
  own estimation (1.2 in the US dataset)
- Manganese [water, surface water]: 0.00022 kg; lognormal variance with pedigree 0.16, pedigree (1,1,5,1,1)
  own estimation (1.2 in the US dataset)
- NMVOC, non-methane volatile organic compounds, unspecified origin [air, non-urban air or from high stacks]: 0.00012 kg; lognormal variance with pedigree 0.16, pedigree (1,1,5,1,1)
  own estimation (1.2 in the US dataset)
- Tin, ion [water, surface water]: 6.9e-6 kg; lognormal variance with pedigree 0.16, pedigree (1,1,5,1,1)
  own estimation (1.2 in the US dataset)
- Chromium, ion [water, surface water]: 1e-5 kg; lognormal variance with pedigree 0.16, pedigree (1,1,5,1,1)
  own estimation (1.2 in the US dataset)
- Phosphate [water, surface water]: 5.2e-5 kg; lognormal variance with pedigree 0.16, pedigree (1,1,5,1,1)
  own estimation (1.2 in the US dataset)
- Sulfide [water, surface water]: 1.7e-5 kg; lognormal variance with pedigree 0.16, pedigree (1,1,5,1,1)
  own estimation (1.2 in the US dataset)

## Sampling procedure
Literature

## Review by Rolf Frischknecht 2007-09-05
passed
