# kerosene, import from unspecified

Dataset: EcoSpold 2, unit process
Geography: BR
Time period: 2014-01-01 to 2019-12-31
Technology level: current
Classification: ISIC rev.4 ecoinvent: 1920:Manufacture of refined petroleum products
Scenario: Business-as-Usual
System model: Allocation at the point of substitution
Generated by: Axel Lieblich
Published in: Fehrenbach, H. 2018
Database: ecoinvent
isCopyrightProtected: true
accessRestrictedTo: 1

## General comment
This dataset represents the import of a refined petroleum products of unspecified geographical origin of supply to the domestic/regional market for this product. The transport requirements (expressed in tkm) with tanker ship was assumed to 10'000 km by sea by default. No product losses or other aspects, besides transport requirements have been included. The dataset is only a rough proxy with large uncertainties, and it should hence be revised accordingly if its contribution is expected to be important.

## Included activities start
Activity starts with transport by sea of a refined petroleum product of unspecified geographical origin.

## Included activities end
Activity ends with the refined petroleum product entering the domestic/regional market.

## Reference product
- kerosene: 1 kg; By-product classification allocatable product; CPC 3334: Kerosenes
  production volume 1.3757e9 kg
    Import according to the JODI-oil database for 2015 (jodidata.org)
  property price 0.297 EUR2005
    Temporary price data. Calculated as 90% of purchasers price based on: Source: U.S. energy information administration_Independent statistics and analysis: Average daily data of Amsterdam-Rotterdam-Antwerp (ARA) Kerosene-Type Jet Fuel Spot Price FOB (Cents per Gallon) (http://tonto.eia.doe.gov/dnav/pet/pet_pri_spt_s1_d.htm; accessed 2010-07-06). Conversion factors: 0.0038 m3/US gallon; 803 kg/m3.
  property carbon content 0.85
    carbon content on a dry matter basis (reserved; not for manual entry)
  properties: carbon content, fossil 0.85, water in wet mass 0 kg, water content 0, wet mass 1 kg, dry mass 1 kg, carbon content, non-fossil 0, carbon allocation 0.85 kg

## Inputs from technosphere
- kerosene: 1 kg
  Unspecified geographical origin of supply assumed due to lack of information on actual origin or missing corresponding supplying activity.
  properties: wet mass 1 kg, dry mass 1 kg, carbon content, fossil 0.85
- transport, freight, sea, tanker for petroleum: 10 metric ton*km; lognormal variance with pedigree 0.33, pedigree (5,5,5,5,5)
  A transport distance of 10'000 km by sea assumed by default.

## Extrapolations
This dataset has been extrapolated from year 2017 to the year of the calculation (2019). The uncertainty has been adjusted accordingly.
