# tap water production, seawater reverse osmosis, conventional pretreatment, baseline module, single stage

Dataset: EcoSpold 2, unit process
Geography: GLO
Time period: 2004-01-01 to 2019-12-31
Technology level: current
Classification: ISIC rev.4 ecoinvent: 3600:Water collection, treatment and supply
Classification: EcoSpold01Categories: water supply/production
Scenario: Business-as-Usual
System model: Allocation at the point of substitution
Generated by: Marylène Dussault
Published in: Al-Sarkal, T. 2013
Database: ecoinvent
isCopyrightProtected: true
accessRestrictedTo: 1

## General comment
This dataset represents the production of 1 kg of drinking water (potable water) from seawater reverse osmosis with conventional pretreatment using baseline membrane modules and a single stage configuration. Baseline membrane is a polyamide membrane of 35.3 m2 of active membrane surface and maximum operating pressure of 1000 psig (69 bars). This dataset is based on published literature and on modeling. Reverse osmosis system was modeled using typical seawater characterisation, single stage baseline module membrane system with recovery rate of 40% and energy recovery by pressure exchanger of 40%. It includes water intake of seawater, conventional pretreatment, reverse osmosis filtration, recarbonisation and emissions of brine to sea. The modeling of the reverse osmosis treatment was done using the ROSA (Reverse Osmosis System Analysis) system design software from Dow Chemical. Recarbonation and post-treatment of permeate water are modeled with the Rothberg, Tamburini and Winsor (RTW) Model for Corrosion Control and Process Chemistry 4.0 by Tetra Tech. Typical seawater characterisation for salinity of 3.5% (w/w) was used for modeling. Composition is based on literature (Open University 1989).
Open University (1989). Seawater: its composition, properties and behaviour. Gerry Bearman Editor, Pergamon Press, 165p.

## Included activities start
From intake of seawater. This dataset includes energy and material inputs for the different water treatment stages: chlorination, coagulation, flocculation, clarification, sedimentation of sludge, dual media filtration, cartridge filtration, membrane filtration and post-treatment. It includes material for the membrane module and pressure vessel assuming lifetimes of 5 and 15 years, respectively.

## Included activities end
This dataset ends with the production of tap water, at facility gate. Electricity for lighting and heating the building is excluded due to lack of data. Note that the energy for the pumps pressurizing water at the beginning of the network was estimated due to lack of data. It excludes energy for pumping stations and water losses within the network which is included in the tap water market. Emissions to the environment are limited to release of brine to the environment and carbon dioxide emissions from water under atmospheric conditions.

## Parameters
- reverse osmosis sulfuric acid: 3.68e-5 kg; name ro_H2SO4; lognormal variance with pedigree 0.0046, pedigree (3,4,1,1,1)
  Calculated value. Sulfuric acid associated with reverse osmosis operation based on modeling for seawater reverse osmosis with conventional pretreatment considering single stage baseline 8-inch spiral wound modules using ROSA system design software (Dow Chemical).
- reverse osmosis electricity: 0.00298 kWh; name RO_kWh; lognormal variance with pedigree 0.0046, pedigree (3,4,1,1,1)
  Calculated value. Electricity associated with operational pression based on modeling for seawater reverse osmosis with conventional pretreatment considering single stage baseline 8-inch spiral wound modules using ROSA system design software (Dow Chemical). Energy recovery from pressure exchanger of 40% is considered which is a typical value.
- pressure vessel, epoxy mass per module: 2.09048 kg/unit; name PressV_epoxy; lognormal variance with pedigree 0.0046, pedigree (3,4,1,1,1)
  Calculated value. Average mass of material per module unit based on technical drawing for 8-inch pressure vessel - 1000 PSI from Advanced composite PVT. LTD, India.
- pretreatment and post-treament electricity: 0.000337 kWh; name pre_post_kWh; lognormal variance with pedigree 0.0052, pedigree (3,4,1,1,2)
  Literature value. Based on Fujairah-1 seawater reverse osmosis plant (Al-sarkal, T. et al. 2013).
- amount of pressure vessels: 126 unit; name pressV; lognormal variance with pedigree 0.0038, pedigree (2,4,1,1,2)
  Calculated value. Amount of pressure vessel based on simulation using ROSA for on seawater reverse osmosis medium size train (10080 m3/d).
- reinforcing steel in concrete: 0.02 dimensionless; name reinf_steel; lognormal variance with pedigree 0.014, pedigree (4,1,1,1,1)
  Estimation. Reinforcing steel content in reinforced concrete for potable water treatment equipements provided by industrial expert.
- amount of modules unit per pressure vessel: 7 unit; name module_pressV; lognormal variance with pedigree 0.0038, pedigree (2,4,1,1,2)
  Calculated value. Amount of module units per pressure vessel based on simulation using ROSA for on seawater reverse osmosis medium size train (10080 m3/d).
- sodium hypochlorite commercial concentration: 0.15 kg/kg; name conc_NaClO; lognormal variance with pedigree 0.0006, pedigree (1,1,1,1,1)
  Literature value. Based on ecoinvent process definition for sodium hypochlorite. Used to account for water content in commercial product.
- average permeate flux: 13.5 l/(h.m2); name av_p_flux; lognormal variance with pedigree 0.0038, pedigree (2,4,1,1,2)
  Calculated value. Average permeate flux for reverse osmosis operation based on modeling for seawater reverse osmosis with conventional pretreatment considering single stage baseline 8-inch spiral wound modules using ROSA system design software (Dow Chemical). Value is a function of pre-treatment.
- iron trichloride commercial concentration: 0.35 kg/kg; name conc_FeCl3; lognormal variance with pedigree 0.0006, pedigree (1,1,1,1,1)
  Literature value. Based on ecoinvent process definition for iron trichloride. Used to account for water content in commercial product.
- pressurization electricity: 0.000375 kWh; name pressur_kWh; lognormal variance with pedigree 0.0246, pedigree (4,5,1,1,3)
  Estimated value. Energy requirements for pressurizing treated water into network at facility gate. Calculated from report share of energy requirements from convention potable water treatment and average energy consumption for entire treatment as reported by the Energy Sector Management Assistance Program and the American Water Works Association (American Water Works Association, AWWA - American Society of Civil Engineers, ASCE (2012). Water Treatment Plant Design, 5th edition. Editors: Randtke S.J., Horsley M.B.. McGraw-Hill; Energy Sector Management Assistance Program, ESMAP (2012). A primer on energy efficiency for municipal water and wastewater utilities).
- concentrate, carbon dioxide under pressure: 3.25e-5 kg; name concentrate_CO2; lognormal variance with pedigree 0.0052, pedigree (3,4,1,1,2)
  Calculated value. Carbon dioxide concentration in concentrate from reverse osmosis operation is based on modeling for seawater reverse osmosis with conventional pretreatment considering single stage baseline 8-inch spiral wound modules using ROSA system design software (Dow Chemical).
- pressure vessel_lifetime: 15 year; name PressV_lft; lognormal variance with pedigree 0.0426, pedigree (5,4,1,1,1)
  Estimated value. Lifetime of pressure vessel assumed to be of 15 years. Pressure vessel is the epoxy/fiberglass casing in which membrane modules are inserted.
- polycarboxylate commercial concentration: 0.4 kg/kg; name conc_polycarbox; lognormal variance with pedigree 0.0006, pedigree (1,1,1,1,1)
  Literature value. Based on ecoinvent process definition for polycarboxylate. Used to account for water content in commercial product.
- pressure vessel, glass fibre mass per module: 26.78 kg/unit; name PressV_fglass; lognormal variance with pedigree 0.0046, pedigree (3,4,1,1,1)
  (same comment as for pressure vessel, epoxy mass per module)
- pretreatment and post-treatment sulfuric acid: 5.825e-5 kg; name pp_H2SO4; lognormal variance with pedigree 0.004, pedigree (3,4,1,1,1)
  Literature value. Average and uncertainty based on published amounts by Al-sarkal, T. et al. 2013, Tarnacki et al. 2012, Darwish, M.et al. 2013, Sanz, M. A. 2007, G. Raluy et al. 2006 and Sadhwani, J. J.et al. 2005.
- module lifetime: 5 year; name module_lft; lognormal variance with pedigree 0.0087, pedigree (4,2,1,1,1)
  Literature value. Expected lifetime of membrane from 5 years to years (Bureau of Reclamation (2003) Desalting Handbook for Planners. 3rd Edition, July 2003, Desalination and Water Purification Research and Development Program. Report No. 72). For conservative reason a lifetime of 5 years was selected, but is parametrised for easy adaptation by user.
- sulfuric acid commercial concentration: 0.93 kg/kg; name conc_H2SO4; lognormal variance with pedigree 0.0112, pedigree (4,4,1,1,2)
  Literature value. Based on typical commercial concentration for sulfuric acid. Used to account for water content in commercial product.

## Reference product
- tap water: 1 kg; name tapwater; CPC 18000: Natural water; By-product classification allocatable product; CAS 7732-18-5
  production volume 2.39e12 kg; name PV_water
    Estimated value. Total production of tap water from seawater reverse osmosis is based on reported value from Lattermann 2010 (2006 reported data). Share of pretreatment (i.e. 91% conventional vs 9% ultrafiltration) is based on proportion ratio of installed capacity of ultrafiltration pretreatment to water desalination technologies in 2010 and total installed desalination capacity in 2010 (Lattermann, 2012). Share for seawater membrane module (baseline vs enhanced) and configuration (1 stage vs 2 stages) where fixed arbitrary and should be revised as soon as better data is available. Total production of tap water from seawater reverse osmosis (based on installed capacity in 2006) is 3.51E12 kg. Thus, 3.19E12 kg of tap water from seawater reverse osmosis produced with conventional pretreatment and 3.16E11 kg produced using ultrafiltration pretreatment. It was assumed that baseline module with 1 stage configuration would be the most frequent combination used within facilities and that more recent technologies involving enhanced modules and 2 stages configuration be less frequent. Share where fixed as follow: 75% baseline-1stage, 15% enhanced-1stage, 10% enhanced-2stages.
  property mass concentration, chloride 0.12705 kg/m3; name tapwater_C_Cl_ion
    Calculated value. Concentration of ion species in treated water after reverse osmosis and recarbonization treatment. Permeate ion concentration was modeled with Rosa. Recarbonisation was modeled with RWT software.
  property mass concentration, potassium 0.00318 kg/m3; name tapwater_c_K
    Calculated value. Concentration of ion species in treated water after reverse osmosis and recarbonization treatment. Permeat ion concentration was modeled with Rosa. Recarbonisation was modeled with RWT software.
  property price 0.000397 EUR2005; name tapwater_price_EUR2005
    Converted from EU price by using Purchasing Power Parities (0.8458 in 2003 and 0.8426 in 2004)
  property mass concentration, carbonic acid 0.0046 kg/m3; name tapwater_c_H2CO3
    (same comment as for tap water)
  property mass concentration, calcium 0.0242 kg/m3; name tapwater_c_Ca
    (same comment as for tap water)
  property pH 7.49; name tapwater_pH
    Calculated value. Value of tap water after recarbonisation as modeled using pH is a measure of acidity it is defined as -log10(c_H+) where c_H+ is the hydrogen ion concentration in moles per liter.
  property mass concentration, boron 0.00098 kg/m3; name tapwater_c_B
    (same comment as for tap water)
  property carbon content, fossil 1.51949e-5; = (tapwater_c_CO3*0.2+ tapwater_c_HCO3*0.197+ tapwater_c_H2CO3*0.194)/1000
    Calculated value. Carbon content based on concentration of H2CO3, HCO3- and CO3 ions. Assumed to be of fossil origin because of recarbonization.
  property mass concentration, strontium 2e-5 kg/m3; name tapwater_c_Sr
    (same comment as for tap water)
  property mass concentration, sodium 0.07706 kg/m3; name tapwater_c_Na
    (same comment as for tap water)
  property mass concentration, carbonate 0.0001 kg/m3; name tapwater_c_CO3
    (same comment as for tap water)
  property mass concentration, fluorine 1e-5 kg/m3; name tapwater_c_F
    (same comment as for tap water)
  property mass concentration, magnesium 0.00211 kg/m3; name tapwater_c_Mg
    (same comment as for tap water)
  property carbon content, non-fossil 0
    Calculated value. Carbon content based on concentration of H2CO3, HCO3- and CO3 ions. Assumed to be non-fossil origin.
  property mass concentration, bicarbonate 0.0725 kg/m3; name tapwater_c_HCO3
    (same comment as for tap water)
  property mass concentration, dissolved sulfate SO4 as S 0.00178 kg/m3; name tapwater_c_SO4_S
    (same comment as for tap water)
  property carbon content 1.51949e-5
    carbon content on a dry matter basis (reserved; not for manual entry)
  property true value 0.000397; name tapwater_true_value
    allocation property applied in "true value" allocation // value calculated from revenue
  properties: water in wet mass 0.999663 kg, dry mass 0.000337476 kg, wet mass 1 kg, water content 2962.17, carbon allocation 5.12792e-9 kg

## By-products
- heat, for reuse in municipal waste incineration only: 0 MJ; CPC 17300: Steam and hot water; By-product classification allocatable product; pedigree (1,1,1,1,1)
  Net useful heat generated from this waste and used in internal MSWI plant energy redistribution.
  Uncertainty: uncertainty is calculated from uncertainties in waste composition and uncertainties in energy efficiency and the uncertainty in internal energy demand
  production volume 9.743e8 MJ
  property price 0.0106 EUR2005; name E_th_prod_MSWI_price_EUR2005
    Average European district heat price from Ecoheatcool and Euroheat 2005-2006, Ecoheat Work package 1: The European heat market. Final report. 10.6 EUR/GJ i s the price of district heat. http://www.solarthermalworld.org/files/Ecoheatcool%20WP1%20Web.pdf?download
  property exergy 0.1842 MJ; name E_th_prod_MSWI_exergy
    This exergy property is based on the exergy content of the product.
  property true value relation 0.1842; name E_th_prod_MSWI_true_value_relation
    property to calculate "true value" from
  property true value 1.99315e-6
    allocation property applied in "true value" allocation // value calculated from true value relation
- electricity, for reuse in municipal waste incineration only: 0 kWh; CPC 17100: Electrical energy; By-product classification allocatable product; pedigree (1,1,1,1,1)
  Net electricity generated from this waste and used in internal MSWI plant energy redistribution.
  Uncertainty: uncertainty is calculated from uncertainties in waste composition and uncertainties in energy efficiency and the uncertainty in internal energy demand
  production volume 1.38596e8 kWh
  property price 0.1 EUR2005; name E_el_prod_MSWI_price_EUR2005
    Estimated to be the same price as in case of electricity, medium voltage.
  property exergy 3.6 MJ; name E_el_prod_MSWI_exergy
    This exergy property is based on the exergy content of the product.
  property true value relation 3.6; name E_el_prod_MSWI_true_value_relation
    property to calculate "true value" from
  property true value 5.54139e-6
    (same comment as for heat, for reuse in municipal waste incineration only)

## Inputs from technosphere
- water works, capacity 6.23E10l/year: 5.25291e-13 unit; name RO_plant_1; = 1/RO_plant_lifetime_capacity_l; lognormal variance with pedigree 0.0026, pedigree (1,1,3,1,1)
  Calculated value. Based on water works capacity and lifetime. Share of infrastructure attributed to the prodction of 1 kg of drinking water is estimated by dividing the 1 unit of drinking water plant by the total estimated amount of water this plant will produce.
  Uncertainty: Calculated variable. Uncertainty will be determined from propagation of uncertainty factors of underlying variables. Uncertainty of actual relation between variables not accounted for at this time, although this could be included in a future update.
  property lifetime capacity [l] 1.86825e12 l; name RO_plant_lifetime_capacity_l
  note on lifetime capacity [l]: Lifetime capacity in litres. Based on water works daily capacity, and expected lifetime (30 yr). Assumed 1kg/l water density
- waste glass pane in burnable frame: 0 kg; name w_fglass; pedigree (1,1,1,1,1)
  Calculated value. Process used as proxy for disposal of fiber glass/epoxy pressure vessel.
  Uncertainty: Calculated variable. Uncertainty will be determined from propagation of uncertainty factors of underlying variables. Uncertainty of actual relation between variables not accounted for at this time, although this could be included in a future update.
  production volume 0 kg
    Calculated from production volume of reference product using the relative outputs.
  property price 0 EUR2005; name w_fglass_price_EUR2005
  properties: wet mass 1 kg, dry mass 1 kg
- electricity, low voltage: 0.00362324 kWh; = RO_kWh+ pre_post_kWh+pressur_kWh; lognormal variance with pedigree 0.002, pedigree (1,1,3,1,1)
  Calculated value.
  Uncertainty: Calculated variable. Uncertainty will be determined from propagation of uncertainty factors of underlying variables. Uncertainty of actual relation between variables not accounted for at this time, although this could be included in a future update.
- carbon dioxide, liquid: 0 kg; pedigree (1,1,1,1,1)
  Calculated value. Represents dosage for recarbonisation of permeate water as calculated by RWT software. Caracterisation of permeate used was calculated from modeling seawater reverse osmosis with conventional pretreatment considering single stage baseline 8-inch spiral wound modules using ROSA system design software (Dow Chemical).
  properties: dry mass 1 kg, wet mass 1 kg, carbon content, fossil 0.272727
- lime, hydrated, packed: 0 kg; pedigree (1,1,1,1,1)
  (same comment as for carbon dioxide, liquid)
  properties: water content 0.00300903, dry mass 0.997 kg, wet mass 1 kg
- chlorine, liquid: 0 kg; pedigree (1,1,1,1,1)
  Literature value. Chlorine for final desinfection. Taken directly from ecoinvent V.3 tap water.
  properties: wet mass 1 kg, dry mass 1 kg
- waste plastic, mixture: 0 kg; name w_plastic; pedigree (1,1,1,1,1)
  Estimation. Based on material input.
  Uncertainty: Calculated variable. Uncertainty will be determined from propagation of uncertainty factors of underlying variables. Uncertainty of actual relation between variables not accounted for at this time, although this could be included in a future update.
  production volume 0 kg
    Calculated from production volume of reference product using the relative outputs.
  property price 0 EUR2005; name w_plastic_price_EUR2005
  properties: water content 0.180638, wet mass 1 kg, dry mass 0.847 kg, carbon content, fossil 0.747344
- sulfuric acid: 0 kg; name H2SO4; pedigree (1,1,1,1,1)
  (same comment as for electricity, low voltage)
  properties: dry mass 1 kg, wet mass 1 kg
- polyvinylidenchloride, granulate: 0 kg; name PVDC; pedigree (1,1,1,1,1)
  Literature value. Material for catridge, filtration step upstream of reverse osmosis filtration.
  properties: carbon content, fossil 0.387097, dry mass 1 kg, wet mass 1 kg
- iron(III) chloride, without water, in a 12% iron solution state: 2.02454e-5 kg; name FeCl3; lognormal variance with pedigree 0.002, pedigree (1,1,3,1,1)
  Literature value. Average and uncertainty based on published amounts by Al-sarkal, T. et al. 2013, Tarnacki et al. 2012, Darwish, M.et al. 2013, Sanz, M. A. 2007, G. Raluy et al. 2006 and Sadhwani, J. J.et al. 2005.
  Al-Sarkal, T., & Arafat, H. a. (2013). Ultrafiltration versus sedimentation-based pretreatment in Fujairah-1 RO plant: Environmental impact study. Desalination, 317, 55–66.
  Tarnacki, K., Meneses, M., Melin, T., van Medevoort, J., & Jansen, a. (2012). Environmental assessment of desalination processes: Reverse osmosis and Memstill®. Desalination, 296, 69–80.
  Darwish, M., Hassabou, A. H., & Shomar, B. (2013). Using Seawater Reverse Osmosis (SWRO) desalting system for less environmental impacts in Qatar. Desalination, 309, 113–124.
  Sanza, M. A., Bonnélyea, V., & Cremerb, G. (2007). Fujairah reverse osmosis plant: 2 years of operation. Desalination, 203(1-3), 91–99.
  Raluy, G., Serra, L., & Uche, J. (2006). Life cycle assessment of MSF, MED and RO desalination technologies. Energy, 31(13), 2361–2372.
  Sadhwani, J. J., Veza, J. M., & Santana, C. (2005). Case studies on environmental impact of seawater desalination. Desalination, 185(1-3), 1–8.
- sodium hydrogen sulfite: 2.32586e-5 kg; lognormal variance with pedigree 0.21, pedigree (5,5,5,5,5)
  Literature value. Average and uncertainty based on published amounts by Al-sarkal, T. et al. 2013, Tarnacki et al. 2012, Darwish, M.et al. 2013, Sanz, M. A. 2007, G. Raluy et al. 2006 and Sadhwani, J. J.et al. 2005.
  Al-Sarkal, T., & Arafat, H. a. (2013). Ultrafiltration versus sedimentation-based pretreatment in Fujairah-1 RO plant: Environmental impact study. Desalination, 317, 55-66.
  Tarnacki, K., Meneses, M., Melin, T., van Medevoort, J., & Jansen, a. (2012). Environmental assessment of desalination processes: Reverse osmosis and Memstill®. Desalination, 296, 69-80.
  Darwish, M., Hassabou, A. H., & Shomar, B. (2013). Using Seawater Reverse Osmosis (SWRO) desalting system for less environmental impacts in Qatar. Desalination, 309, 113-124.
  Sanza, M. A., Bonnélyea, V., & Cremerb, G. (2007). Fujairah reverse osmosis plant: 2 years of operation. Desalination, 203(1-3), 91-99.
  Raluy, G., Serra, L., & Uche, J. (2006). Life cycle assessment of MSF, MED and RO desalination technologies. Energy, 31(13), 2361-2372.
  Sadhwani, J. J., Veza, J. M., & Santana, C. (2005). Case studies on environmental impact of seawater desalination. Desalination, 185(1-3), 1-8.
  properties: dry mass 1 kg, wet mass 1 kg
- sodium hypochlorite, without water, in 15% solution state: 0 kg; name NaClO; pedigree (1,1,1,1,1)
  (same comment as for sodium hydrogen sulfite)
  properties: wet mass 1 kg, dry mass 1 kg
- seawater reverse osmosis module: 1.65969e-6 m2; = AMS* module_pressV* pressV/(av_p_flux* module_lft*UnitConversion(1, 'year', 'hour')*AMS* module_pressV* pressV); lognormal variance with pedigree 0.002, pedigree (1,1,3,1,1)
  This unit process refers to the unit of active membrane surface for reverse osmosis of seawater.
  Uncertainty: Calculated variable. Uncertainty will be determined from propagation of uncertainty factors of underlying variables. Uncertainty of actual relation between variables not accounted for at this time, although this could be included in a future update.
  property active membrane surface per module unit 35.3 m2; name AMS
- tap water: 0.000128095 kg; = (NaClO/conc_NaClO-NaClO)+ (FeCl3/conc_FeCl3-FeCl3)+( polycarbox/ conc_polycarbox- polycarbox)+( H2SO4/conc_H2SO4 - H2SO4); lognormal variance with pedigree 0.002, pedigree (1,1,3,1,1)
  Calculated variable. This flow represents the amount of water in chemical solution. Chemical processes represent active substance only. Water is added seperatly.
  Uncertainty: Calculated variable. Uncertainty will be determined from propagation of uncertainty factors of underlying variables. Uncertainty of actual relation between variables not accounted for at this time, although this could be included in a future update.
  properties: water content 2962.17, carbon content, fossil 0.00178991, dry mass 0.000337476 kg, wet mass 1 kg
  note on carbon content, fossil: Bicarbonate content is 2.93 mol/m3. CO2 content is 0.1 mol/m3 (ecoinvent v2.2 report 8, Tab 93.1).
- glass fibre: 4.19703e-7 kg; name fglass; = PressV_fglass* module_pressV* pressV/( av_p_flux* PressV_lft*UnitConversion(1, 'year', 'hour')*AMS* module_pressV* pressV); lognormal variance with pedigree 0.002, pedigree (1,1,3,1,1)
  (same comment as for electricity, low voltage)
  properties: dry mass 1 kg, wet mass 1 kg
- polycarboxylates, 40% active substance: 0 kg; name polycarbox; pedigree (1,1,1,1,1)
  (same comment as for sodium hydrogen sulfite)
  properties: wet mass 1 kg, carbon content, fossil 0.496429, dry mass 0.4 kg, water content 1.5
- polyacrylamide: 1.03044e-6 kg; lognormal variance with pedigree 0.002, pedigree (1,1,3,1,1)
  (same comment as for sodium hydrogen sulfite)
- epoxy resin, liquid: 0 kg; name epoxy; pedigree (1,1,1,1,1)
  (same comment as for electricity, low voltage)
  properties: carbon content, fossil 0.42325, wet mass 1 kg, dry mass 1 kg
- waste glass pane in burnable frame: -3.80835e-9, -4.48657e-7 kg (2 entries); lognormal variance with pedigree 0.002, pedigree (1,1,3,1,1)
  (same comment as for waste glass pane in burnable frame)
  production volume 1.10192e6 kg
- carbon dioxide, liquid: 5.71705e-6, 2.7159e-5 kg (2 entries); lognormal variance with pedigree 0.0066, pedigree (3,4,3,1,1)
  (same comment as for carbon dioxide, liquid)
- lime, hydrated, packed: 3.59315e-7, 4.23305e-5 kg (2 entries); lognormal variance with pedigree 0.0066, pedigree (3,4,3,1,1)
  (same comment as for carbon dioxide, liquid)
- chlorine, liquid: 1.63588e-8, 8.17787e-8 kg (2 entries); lognormal variance with pedigree 0.0606, pedigree (5,5,3,5,3)
  (same comment as for chlorine, liquid)
- waste plastic, mixture: -4.43971e-5, -3.42276e-6, -1.41372e-6, -1.34246e-6, -5.12265e-5, -5.71127e-7, -2.58857e-7, -0.000358614 kg (8 entries); lognormal variance with pedigree 0.002, pedigree (1,1,3,1,1)
  (same comment as for waste plastic, mixture)
  production volume 1.1233e9 kg
- sulfuric acid: 1.38333e-5, 7.94464e-5 kg (2 entries); lognormal variance with pedigree 0.002, pedigree (1,1,3,1,1)
  (same comment as for electricity, low voltage)
- polyvinylidenchloride, granulate: 0.000152484, 0.000308762 kg (2 entries); lognormal variance with pedigree 0.0058, pedigree (2,4,3,1,2)
  (same comment as for polyvinylidenchloride, granulate)
- sodium hypochlorite, without water, in 15% solution state: 2.36023e-6, 1.12043e-5 kg (2 entries); lognormal variance with pedigree 0.210001, pedigree (5,5,5,5,5)
  (same comment as for sodium hydrogen sulfite)
- polycarboxylates, 40% active substance: 1.45671e-6, 2.94966e-6 kg (2 entries); lognormal variance with pedigree 0.21, pedigree (5,5,5,5,5)
  (same comment as for sodium hydrogen sulfite)
- epoxy resin, liquid: 5.70069e-9, 2.70619e-8 kg (2 entries); lognormal variance with pedigree 0.002, pedigree (1,1,3,1,1)
  (same comment as for electricity, low voltage)

## Inputs from nature
- Water, salt, ocean [natural resource, in water]: 0.00245344 m3; name raw_water; source Al-Sarkal, T. 2013; lognormal variance with pedigree 0.002, pedigree (1,1,3,1,1)
  Calculated value. Based on ratio of raw water intake and permeate of Fujairah-1 seawater reverse osmosis plant.
  Uncertainty: Calculated variable. Uncertainty will be determined from propagation of uncertainty factors of underlying variables. Uncertainty of actual relation between variables not accounted for at this time, although this could be included in a future update.
  property mass concentration, calcium 0.406 kg/m3; name raw_water_c_Ca
  property mass concentration, carbone dioxide 0.0007 kg/m3; name raw_water_c_CO2_s
  property mass concentration, dissolved sulfate SO4 as S 2.689 kg/m3; name raw_water_c_SO4_S
  property mass concentration, boron 0.0045 kg/m3; name raw_water_c_B
  property mass concentration, fluoride 0.001 kg/m3; name raw_water_c_F_s
  property mass concentration, potassium 0.386 kg/m3; name raw_water_c_K
  property mass concentration, magnesium 1.291 kg/m3; name raw_water_c_Mg
  property mass concentration, bicarbonate 0.142 kg/m3; name raw_water_c_HCO3
  property mass concentration, sodium 10.7151 kg/m3; name raw_water_c_Na
  property mass concentration, carbonate 0.0182 kg/m3; name raw_water_c_CO3
  property mass concentration, chloride 19.2741 kg/m3; name raw_water_C_Cl_ion
  property mass concentration, strontium 0.013 kg/m3; name raw_water_c_Sr

## Emissions to nature
- Boron [water, ocean]: 1.00787e-5 kg; lognormal variance with pedigree 0.046, pedigree (3,4,3,1,1)
  Calculated value. Mass of ion returned to the ocean with the concentrate as calculated by modeling for seawater reverse osmosis with conventional pretreatment considering single stage baseline 8-inch spiral wound modules using ROSA system design software (Dow Chemical). Note that the impact from emission of concentrate reside mostly in the high ion loaded water and small area of release which individual substance emissions will not be well acounted by impact models.
- Carbon dioxide, non-fossil [air, non-urban air or from high stacks]: 3.18947e-5 kg; lognormal variance with pedigree 0.0446, pedigree (5,4,3,1,1)
  Calculated value. Mass of carbon dioxide emitted to air assuming carbon dioxide in concentrate under pressure will all be emited to air after release of concentrate at atmospheric conditions. Concentraiton in concentrate was calculated by modeling seawater reverse osmosis using ROSA system design software (Dow Chemical).
  property molecular weight 44.01 g/mol; name CO2_mol_weight
- Potassium, ion [water, ocean]: 0.000943906 kg; lognormal variance with pedigree 0.046, pedigree (3,4,3,1,1)
  (same comment as for Boron)
- Hydrogen carbonate [water, ocean]: 0.000319339 kg; name HCO3; lognormal variance with pedigree 0.046, pedigree (3,4,3,1,1)
  Calculated value. Mass of ion returned to the ocean with the concentrate as calculated by modeling for seawater reverse osmosis with conventional pretreatment considering single stage baseline 8-inch spiral wound modules using ROSA system design software (Dow Chemical) and RWT for recarbonisation. Note that the impact from emission of concentrate reside mostly in the high ion loaded water and small area of release which individual substance emissions will not be well acounted by impact models.
- Strontium [water, ocean]: 3.18751e-5 kg; lognormal variance with pedigree 0.046, pedigree (3,4,3,1,1)
  (same comment as for Boron)
- Chloride [water, ocean]: 0.0471631 kg; lognormal variance with pedigree 0.046, pedigree (3,4,3,1,1)
  (same comment as for Boron)
- Water [water, ocean]: 0.00147206 m3; name concentrate; lognormal variance with pedigree 0.0066, pedigree (3,4,3,1,1)
  Calculated value. Volume of concentrate (water returned to the environment) based production of 1 kg of tap water and on recovery rate.
- Fluoride [water, ocean]: 2.44362e-6 kg; lognormal variance with pedigree 0.046, pedigree (3,4,3,1,1)
  (same comment as for Boron)
- Sodium, ion [water, ocean]: 0.0262132 kg; lognormal variance with pedigree 0.046, pedigree (3,4,3,1,1)
  (same comment as for Boron)
- Carbonate [water, ocean]: 2.64971e-6 kg; lognormal variance with pedigree 0.046, pedigree (3,4,3,1,1)
  (same comment as for Hydrogen carbonate)
- Calcium, ion [water, ocean]: 0.000995448 kg; lognormal variance with pedigree 0.046, pedigree (3,4,3,1,1)
  (same comment as for Hydrogen carbonate)
- Sulfate [water, ocean]: 0.00659555 kg; lognormal variance with pedigree 0.046, pedigree (3,4,3,1,1)
  (same comment as for Boron)
- Magnesium [water, ocean]: 0.00316532 kg; lognormal variance with pedigree 0.046, pedigree (3,4,3,1,1)
  (same comment as for Boron)

## Extrapolations
Model represents seawater reverse osmosis system with conventional pretreatment using baseline membrane modules and a single stage configuration and is used to represent actual tap water production using this technologie.

## Review by Emilia Moreno Ruiz 2014-05-22
renaming water work infrastructure
