# iron pellet production

Dataset: EcoSpold 2, unit process
Geography: IN
Time period: 2010-01-01 to 2019-12-31
Technology level: current
Classification: EcoSpold01Categories: metals/extraction
Classification: ISIC rev.4 ecoinvent: 2410:Manufacture of basic iron and steel
Scenario: Business-as-Usual
System model: Allocation at the point of substitution
Share of production covered: 20 %
Generated by: Harshita Soni
Published in: Soni H. 2017
Database: ecoinvent
isCopyrightProtected: true
accessRestrictedTo: 1

## General comment
This dataset represents iron pellet production in India.
Pellets are primarily used in blast furnaces and are also used in DR-plants. Occasionally pellets are used
in the steel process.
Pellets are stored in bunkers before charging to the blast furnace.
The mixture of iron bearing materials (iron ore rubble, sinter and/or pellets) and additives (flux material)
are known collectively as the "burden".

## Included activities start
After iron ore mining and beneficiation, the next step in steel manufacturing is iron pellet production.

## Included activities end
After iron ore mining and beneficiation, the next step is iron pellet production. This activity ends at iron pelletization plant.The iron pellets are sent to Blast Furnace or Corex for hot metal and pig iron production.

## Geography
Inputs related to integrated steel plants in India

## Technology
Pellets are primarily used in blast furnaces and are also used in DR-plants. Occasionally pellets are used
in the steel process.
Pellets are stored in bunkers before charging to the blast furnace.
The mixture of iron bearing materials (iron ore rubble, sinter and/or pellets) and additives (flux material)
are known collectively as the "burden". The burden and the accompanying coke are charged into the top
of the furnace either via skips or mechanical conveyor belts. It enters into the furnace via a sealed
charging system, which isolates the furnace gases from the atmosphere.
As for all blast furnace material (coke, sinter, pellets and lump ore) a final screening takes place at the
blast furnace site. Undersize pellets can be recycled.
The pellets for the BOS plant are stored in bunkers. Transport in the BOS plant can take place by truck or
conveyor belt. Iron ore pellets are spheres of typically 6–16 mm (0.24–0.63 in) to be used as raw material for blast furnaces. They typically contain 67%-72% Fe and various additional material adjusting the chemical composition and the metallurgic properties of the pellets.Typically limestone, dolostone and olivine is added and Bentonite is used as binder.

The process of pelletizing combines mixing of the raw material, forming the pellet and a thermal treatment baking the soft raw pellet to hard spheres. The raw material is rolled into a ball, then fired in a kiln to sinter the particles into a hard sphere.

The configuration of iron ore pellets as packed spheres in the blast furnace allows air to flow between the pellets, decreasing the resistance to the air that flows up through the layers of material during the smelting. The configuration of iron ore powder in a blast furnace is more tightly-packed and restricts the air flow. This is the reason that iron ore is preferred in the form of pellets rather than in the form of finer particles.

## Time period
Data for this dataset was provided for the year April 2014- March 2015.

## Parameters
- fraction, process water, to air: 0.2 dimensionless; name fraction_PW_to_air; lognormal variance with pedigree 0.092025, pedigree (4,4,3,2,4)
  Literature value. In case when no industry/process specific data are available, default evaporation fraction value is used. This value is 15% and is based on literature (Statistics Canada, 2007 & Shaffer, K.H., 2008, Consumptive water use in the Great Lakes Basin, USGS & Shiklomanov, 2003, World Water Resources at the Beginning of the 21st Century) and has been approved by an expert.

## Reference product
- iron pellet: 0 kg; name RP_amount; By-product classification allocatable product; CPC 41116: Ferrous products obtained by direct reduction of iron ore and other spongy ferrous products, in lumps, pellets[…]
  This dataset represents iron pellet production in India.
  Pellets are primarily used in blast furnaces and are also used in DR-plants. Occasionally pellets are used
  in the steel process.
  Pellets are stored in bunkers before charging to the blast furnace.
  The mixture of iron bearing materials (iron ore rubble, sinter and/or pellets) and additives (flux material)
  are known collectively as the "burden".
  EcoSpold01Location=GLO
  production volume 0 kg; name RP_PV
    It is assumed that since the dataset represents 20% of total iron pellet production in India, the total production is five times the value.
  property price 0.0666015 EUR2005; name prod_ironPellet_kg_price_EUR2005
    Calculated based on inputs: The price of the product has been calculated as a sum of the values of the material and energy inputs for this product. This value is therefore a rough estimation. It may underestimate the real price since there are additional expenses when producing any product. These expences can include for example labour costs, treatment of waste materials and profit for the producer. Please consider carefully whether this level of data quality is acceptable for your application.
  property carbon content, fossil 0
    In pellets, the ore particles are connected chiefly by bridges of ore. The formation of iron oxide bridges is supported by additional slag bridges. Pellets are thoroughly oxidised (a maximum of 0.5 % (w/w) FeO) (ecoinvent v2.2 report 10_partII)
  property carbon content, non-fossil 0
    (same comment as for iron pellet)
  property carbon content 0
    carbon content on a dry matter basis (reserved; not for manual entry)
  properties: wet mass 1 kg, dry mass 1 kg, water content 0, water in wet mass 0 kg, carbon allocation 0 kg
- blast furnace gas: 0 MJ; CPC 17200: Coal gas, water gas, producer gas and similar gases, other than petroleum gases and other gaseous hydrocarbons; By-product classification Recyclable; pedigree (1,1,1,1,1)
  Data received from integrated steel plants in India. This exchange includes information for blast furnace gas used as well as corex gas.
  properties: dry mass 0.367647 kg, wet mass 0.367647 kg, water content 0, carbon content, fossil 0.156611, carbon content, non-fossil 0, water in wet mass 0 kg, carbon content 0.156611, carbon allocation 0.0575774 kg
- iron pellet: 1 kg; By-product classification allocatable product; CPC 41116: Ferrous products obtained by direct reduction of iron ore and other spongy ferrous products, in lumps, pellets[…]
  (same comment as for iron pellet)
  production volume 6e10 kg

## By-products
- iron pellet: 0 kg; By-product classification allocatable product; CPC 41116: Ferrous products obtained by direct reduction of iron ore and other spongy ferrous products, in lumps, pellets[…]
  (same comment as for iron pellet)
  properties: wet mass 1 kg, dry mass 1 kg, carbon content, fossil 0, water content 0, water in wet mass 0 kg, carbon content, non-fossil 0, carbon content 0, carbon allocation 0 kg
- heat, for reuse in municipal waste incineration only: 0 MJ; CPC 17300: Steam and hot water; By-product classification allocatable product; pedigree (1,1,1,1,1)
  Net electricity generated from this waste and used in internal MSWI plant energy redistribution.
  Uncertainty: uncertainty is calculated from uncertainties in waste composition and uncertainties in energy efficiency and the uncertainty in internal energy demand
  property exergy 0.1842 MJ; name E_th_prod_MSWI_exergy
    This exergy property is based on the exergy content of the product.
  property price 0.0106 EUR2005; name E_th_prod_MSWI_price_EUR2005
    Average European district heat price from Ecoheatcool and Euroheat 2005-2006, Ecoheat Work package 1: The European heat market. Final report. 10.6 EUR/GJ i s the price of district heat. http://www.solarthermalworld.org/files/Ecoheatcool%20WP1%20Web.pdf?download
  property true value relation 0.1842; name E_th_prod_MSWI_true_value_relation
    property to calculate "true value" from
- electricity, for reuse in municipal waste incineration only: 0 kWh; CPC 17100: Electrical energy; By-product classification allocatable product; pedigree (1,1,1,1,1)
  (same comment as for heat, for reuse in municipal waste incineration only)
  property price 0.1 EUR2005; name E_el_prod_MSWI_price_EUR2005
    Estimated to be the same price as in case of electricity, medium voltage.
  property exergy 3.6 MJ; name E_el_prod_MSWI_exergy
    This exergy property is based on the exergy content of the product.
  property true value relation 3.6; name E_el_prod_MSWI_true_value_relation
    property to calculate "true value" from

## Inputs from technosphere
- wastewater, average: -2.011e-5 m3; name wastewater; = water_UNO_input*(1 - fraction_PW_to_air); lognormal variance with pedigree 0.0434, pedigree (3,3,2,1,2)
  It is assumed that 80% of water consumed as input to the process is sent out as wastewater for treatment. The wastewater after treatment is recycled and reused again in the process.
  production volume 0 m3; = (wastewater / RP_amount) * RP_PV
    Calculated from production volume of reference product using the relative outputs.
  property price 0 EUR2005; name wastewater_price_EUR2005
  properties: wet mass 1000 kg, water content 2882.2, carbon content, non-fossil 0.194039, dry mass 0.346837 kg
  note on carbon content, non-fossil: 0.0673 kg TOC/m3 (Tab A.17, ecoinvent v2.2 report 13_I). TOC was considered as Total Carbon.
- bentonite: 0 kg; pedigree (1,1,1,1,1)
  Data received from integrated steel plants in India.
  properties: dry mass 1 kg, wet mass 1 kg
- hard coal: 8.26273e-11 kg; lognormal variance with pedigree 0.0168, pedigree (3,3,2,1,3)
  Data received from integrated steel plants in India. Diesel is used in ISP only as power back up.
  properties: dry mass 0.94 kg, wet mass 1 kg, water content 0.0638298, carbon content, fossil 0.845
  note on carbon content, fossil: C content 75-94% (specified in Tab 1.1, report 6, part VI). A mean content of 0.845 kg C/ kg dry hard coal was considered
- iron ore, beneficiated, 65% Fe: 0.015694 kg; lognormal variance with pedigree 0.004, pedigree (3,3,2,1,2)
  EcoSpold01Location=GLO
  Data received from integrated steel plants in India.
  properties: wet mass 1 kg, dry mass 1 kg
- electricity, medium voltage: 0.00239164 kWh; lognormal variance with pedigree 0.004, pedigree (3,3,2,1,2)
  Data received from integrated steel plants in India
  EcoSpold01Location=UCTE
- scrap steel: 0 kg; name scrapSteel; pedigree (1,1,1,1,1)
  Data received from integrated steel plants in India
  production volume 0 kg; = (scrapSteel / RP_amount) * RP_PV
    Calculated from production volume of reference product using the relative outputs.
  property price 0 EUR2005; name scrapSteel_price_EUR2005
  properties: dry mass 1 kg, wet mass 1 kg
- steam, in chemical industry: 0.00783211 kg; lognormal variance with pedigree 0.004, pedigree (3,3,2,1,2)
  Data received from integrated steel plants in India.
  properties: wet mass 1 kg, dry mass 1 kg
- blast furnace gas: 0 MJ; pedigree (1,1,1,1,1)
  (same comment as for blast furnace gas)
  properties: dry mass 0.367647 kg, wet mass 0.367647 kg, carbon content, fossil 0.156611
- lime: 0.00215946 kg; lognormal variance with pedigree 0.004, pedigree (3,3,2,1,2)
  Data received from integrated steel plants in India
  properties: dry mass 1 kg, carbon content, fossil 0.120005, wet mass 1 kg
- aluminium oxide factory: 0 unit; pedigree (1,1,1,1,1)
  EcoSpold01Location=RER
  Data from ecoinvent dataset for iron pellet production, GLO
  Uncertainty: rough estimation
- diesel: 3.03435e-6 kg; lognormal variance with pedigree 0.004, pedigree (3,3,2,1,2)
  (same comment as for hard coal)
  properties: carbon content, fossil 0.865, dry mass 1 kg, wet mass 1 kg
  note on carbon content, fossil: C-content of diesel is 86.5% (ecoinvent v2.2 report 6_IV, Tab 3.14)
- heat, district or industrial, other than natural gas: 0.00815577 MJ; lognormal variance with pedigree 0.004, pedigree (3,3,2,1,2)
  Data received from integrated steel plants in India. This exchange has been used for coke oven gas.
  Uncertainty: Calculated variable. Uncertainty will be determined from propagation of uncertainty factors of underlying variables.
  property Corresponding fuel use 1.2499 MJ; name fuel_use_coke
  property heating value, net 28.6 MJ; name Net_heat_value_coke
  property fuel input in physical units, kg 0.0201 kg; name fuel_input_coke
  note on Corresponding fuel use: Lower heating value of the fuel input related to the heat/electricity output. Calculated from heat production, at hard coal industrial furnace, based on hard coal NHV and fuel input. fuel input: 0,04325 kg/Mj of output Hard coal NHV= 28,9 MJ/kg Corresponding fuel use= 28,9* 0,04325
  note on fuel input in physical units, kg: Estimation. Taken from dataset ''iron pellet production, Quebec, 2011''.
- coke: 1.24319 MJ; lognormal variance with pedigree 0.004, pedigree (3,3,2,1,2)
  (same comment as for hard coal)
  properties: wet mass 0.034965 kg, carbon content, fossil 0.869149, dry mass 0.0328671 kg, water content 0.0638298
- dolomite: 0.00167608 kg; lognormal variance with pedigree 0.004, pedigree (3,3,2,1,2)
  Data received from integrated steel plants in India
  properties: wet mass 1 kg, carbon content, fossil 0.130435, dry mass 1 kg
- blast furnace gas: -0.377847 MJ; lognormal variance with pedigree 0.0284, pedigree (3,3,2,1,2)
  Based on data received from integrated steel plants in India. This value corresponds to the net output. 0.45 MJ of BF gas is used as input and 4.79 MJ of BF gas is generated as output. So the net BF gas of 4.34 MJ is entered as byproduct.
  production volume 2.54771e11 MJ
- iron pellet: 0.0204503 kg; lognormal variance with pedigree 0.004, pedigree (3,3,2,1,2)
  EcoSpold01Location=GLO
  Based on data received from integrated steel plants in India
- oxygen, liquid: 0.00869048 kg; lognormal variance with pedigree 0.004, pedigree (3,3,2,1,2)
  Based on data received from integrated steel plants in India
- blast furnace: 1.47081e-12 unit; lognormal variance with pedigree 0.2934, pedigree (3,3,2,1,2)
  Based on ecoinvent dataset " pig iron production, GLO" accessed through ecoeditor on 20170815
  EcoSpold01Location=RER
- wastewater from pig iron production: -3.46622e-5 m3; lognormal variance with pedigree 0.0434, pedigree (3,3,2,1,2)
  (same comment as for wastewater, average)
  production volume 3.94015e7 m3
- sinter, iron: 0.0475107 kg; lognormal variance with pedigree 0.004, pedigree (3,3,2,1,2)
  Based on data received from integrated steel plants in India
  EcoSpold01Location=GLO
- nitrogen, liquid: 0.00314198 kg; lognormal variance with pedigree 0.004, pedigree (3,3,2,1,2)
  Based on data received from integrated steel plants in India
- limestone, unprocessed: 0.000137884 kg; lognormal variance with pedigree 0.043825, pedigree (3,3,5,2,2)
  EcoSpold01Location=CH
  Based on data received from integrated steel plants in India
- sponge iron: 0.00073249 kg; lognormal variance with pedigree 0.004, pedigree (3,3,2,1,2)
  Based on data received from integrated steel plants in Inida
- sludge, pig iron production: -0.016009 kg; lognormal variance with pedigree 0.3034, pedigree (3,3,2,1,2)
  Based on data received from integrated steel plants in India
  EcoSpold01Location=CH
  production volume 1.81979e10 kg
- blast furnace slag: -0.0445697 kg; lognormal variance with pedigree 0.0284, pedigree (3,3,2,1,2)
  Based on data received from integrated steel plants in India
  production volume 2.36573e10 kg
- calcium carbide, technical grade: 0.000178922 kg; lognormal variance with pedigree 0.0094, pedigree (3,3,2,1,2)
  Based on data received from integrated steel plants in India
- copper: 7.4934e-7 kg; lognormal variance with pedigree 0.004, pedigree (3,3,2,1,2)
  Based on data received from integrated steel plants in India
- basic oxygen furnace waste: -0.00428166 kg; lognormal variance with pedigree 0.043225, pedigree (3,3,5,2,2)
  Based on data received from integrated steel plants in India
  EcoSpold01Location=CH
  production volume 3.57267e9 kg
- ferromanganese, high-coal, 74.5% Mn: 0.00073214 kg; lognormal variance with pedigree 0.004, pedigree (3,3,2,1,2)
  Based on data received from integrated steel plants in India
- dust, unalloyed electric arc furnace steel: -7.38789e-5 kg; lognormal variance with pedigree 0.004, pedigree (3,3,2,1,2)
  Based on ecoinvent dataset for steel production, converter, lowalloyed, GLO
  EcoSpold01Location=CH
  production volume 4.11264e7 kg
- manganese: 1.90741e-5 kg; lognormal variance with pedigree 0.004, pedigree (3,3,2,1,2)
  Based on data received from integrated steel plants in India
- blast oxygen furnace converter: 9.27084e-13 unit; lognormal variance with pedigree 0.2934, pedigree (3,3,2,1,2)
  EcoSpold01Location=RER
  Based on ecoinvent dataset for steel production, converter, unalloyed, GLO
- liquefied petroleum gas: 9.94919e-6 kg; lognormal variance with pedigree 0.004, pedigree (3,3,2,1,2)
  Based on data received from integrated steel plants in India
- pig iron: 0.0344356 kg; lognormal variance with pedigree 0.0034, pedigree (3,3,2,1,2)
  EcoSpold01Location=GLO
  Based on data received from integrated steel plants in India
- ferrosilicon: 7.14598e-6 kg; lognormal variance with pedigree 0.004, pedigree (3,3,2,1,2)
  Based on data received from integrated steel plants in India
- propane: 1.1751e-5 kg; lognormal variance with pedigree 0.004, pedigree (3,3,2,1,2)
  Based on data received from integrated steel plants in India
- iron scrap, sorted, pressed: 0.0097472 kg; lognormal variance with pedigree 0.004, pedigree (3,3,2,1,2)
  Based on data received from integrated steel plants in India
- nickel, 99.5%: 5.47699e-7 kg; lognormal variance with pedigree 0.004, pedigree (3,3,2,1,2)
  Based on data received from integrated steel plants in India
- aluminium, wrought alloy: 8.24274e-5 kg; lognormal variance with pedigree 0.004, pedigree (3,3,2,1,2)
  Based on data received from integrated steel plants in India
- argon, liquid: 0.000109744 kg; lognormal variance with pedigree 0.004, pedigree (3,3,2,1,2)
  Based on data received from integrated steel plants in India
- electrode, negative, Ni: 4.87071e-6 kg; lognormal variance with pedigree 0.004, pedigree (3,3,2,1,2)
  Based on data received from integrated steel plants in India
- iron pellet: 0.0234685 kg; lognormal variance with pedigree 0.0401, pedigree (1,2,5,1,1)
  EcoSpold01Location=GLO
- iron ore, beneficiated, 65% Fe: 0.00958107 kg; lognormal variance with pedigree 0.0401, pedigree (1,2,5,1,1)
  EcoSpold01Location=GLO
- sinter, iron: 0.0616047 kg; lognormal variance with pedigree 0.0401, pedigree (1,2,5,1,1)
  EcoSpold01Location=GLO
- refractory, fireclay, packed: 0.000117342 kg; lognormal variance with pedigree 0.0402, pedigree (1,2,5,3,1)
  EcoSpold01Location=DE
- limestone, unprocessed: 2.39808e-7, 0.000586472 kg (2 entries); lognormal variance with pedigree 0.0402, pedigree (1,2,5,3,1)
  EcoSpold01Location=CH
- sludge, pig iron production: -3.91877e-5, -0.0008834 kg (2 entries); lognormal variance with pedigree 0.3413, pedigree (2,3,5,3,1)
  The original value for this exchange was 0.0042553 kg. However, it was recalculated in order to take into account data collected for the geography covering India (IN). The amount from the geography IN has been scaled down based on the annual production volumes of the reference product in the IN and GLO datasets.
  EcoSpold01Location=CH
- hard coal: 0.000365763, 0.000604306, 0.004191, 0.00059218, 0.00014052, 0.000882871, 0.000461064, 0.000256988, 0.00130599 kg (9 entries); lognormal variance with pedigree 0.0402, pedigree (1,2,5,3,1)
  EcoSpold01Location=UCTE
- natural gas, high pressure: 1.71359e-7, 3.24827e-6, 5.40745e-6, 2.41335e-5, 4.4151e-5, 7.45302e-6, 2.65403e-5, 0.00010353 m3 (8 entries); lognormal variance with pedigree 0.0402, pedigree (1,2,5,3,1)
  EcoSpold01Location=RER
- inert waste, for final disposal: -7.8726e-6, -0.00131213 kg (2 entries); lognormal variance with pedigree 0.0413, pedigree (2,3,5,3,1)
  EcoSpold01Location=CH
  production volume 2.40078e10 kg
- wastewater from pig iron production: -1.64355e-6, -5.49339e-6 m3 (2 entries); lognormal variance with pedigree 0.0413, pedigree (2,3,5,3,1)
  EcoSpold01Location=CH
  production volume 1.01374e8 m3
- pig iron: 0.031925 kg; lognormal variance with pedigree 0.0432, pedigree (2,3,5,5,1)
  EcoSpold01Location=GLO
- molybdenite: 2.11588e-5 kg; lognormal variance with pedigree 0.0512, pedigree (2,5,5,5,1)
  EcoSpold01Location=GLO
- quicklime, in pieces, loose: 0.00150757 kg; lognormal variance with pedigree 0.0432, pedigree (2,3,5,5,1)
  EcoSpold01Location=CH
- ferrochromium, high-carbon, 68% Cr: 0.00116537 kg; lognormal variance with pedigree 0.042, pedigree (1,1,5,5,1)
  EcoSpold01Location=GLO
  composite
- ferronickel, 25% Ni: 0.00159625 kg; lognormal variance with pedigree 0.042, pedigree (1,1,5,5,1)
  EcoSpold01Location=GLO
  composite
- electricity, medium voltage: 2.4594e-5, 4.47508e-6, 7.58905e-5, 0.000157478, 0.000515963 kWh (5 entries); lognormal variance with pedigree 0.0432, pedigree (2,3,5,5,1)
  EcoSpold01Location=UCTE

## Inputs from nature
- Water, unspecified natural origin [natural resource, in water]: 0.000133074 m3; name water_UNO_input; lognormal variance with pedigree 0.004, pedigree (3,3,2,1,2)
  Data received from integrated steel plants in India
- Water, unspecified natural origin [natural resource, in ground]: 4.33277e-5 m3; lognormal variance with pedigree 0.0134, pedigree (3,3,2,1,2)
  Based on data received from integrated steel plants in India
- Water, cooling, unspecified natural origin [natural resource, in water]: 0.000435002 m3; source Byers, W. 2003; lognormal variance with pedigree 0.052625, pedigree (3,3,5,2,1)
  Calculated based on literature, (Vionnet, S., Quantis Water Database - Technical Report, 2012).

## Emissions to nature
- PAH, polycyclic aromatic hydrocarbons [air, unspecified]: 8.34397e-12 kg; lognormal variance with pedigree 0.3033, pedigree (2,3,3,3,1)
  Data from ecoinvent dataset for "iron pellet production, GLO" accessed through ecoeditor on 20170815
- Vanadium [air, unspecified]: 0 kg; pedigree (1,1,1,1,1)
  (same comment as for PAH, polycyclic aromatic hydrocarbons)
- Hydrocarbons, aliphatic, alkanes, unspecified [air, unspecified]: 0 kg; pedigree (1,1,1,1,1)
  (same comment as for PAH, polycyclic aromatic hydrocarbons)
- Chromium [air, unspecified]: 1.28636e-8 kg; lognormal variance with pedigree 0.6533, pedigree (2,3,3,3,1)
  (same comment as for PAH, polycyclic aromatic hydrocarbons)
  property chromium, fraction 0.15; name grindingBalls_chromiumFraction
- Particulates, < 2.5 um [air, unspecified]: 6.47135e-6 kg; lognormal variance with pedigree 0.3033, pedigree (2,3,3,3,1)
  (same comment as for PAH, polycyclic aromatic hydrocarbons)
- Nickel [air, unspecified]: 1.76027e-9 kg; lognormal variance with pedigree 0.6533, pedigree (2,3,3,3,1)
  (same comment as for PAH, polycyclic aromatic hydrocarbons)
- Cadmium [air, unspecified]: 0 kg; pedigree (1,1,1,1,1)
  (same comment as for PAH, polycyclic aromatic hydrocarbons)
- Carbon dioxide, fossil [air, unspecified]: 0.0655307 kg; lognormal variance with pedigree 0.0033, pedigree (2,3,3,3,1)
  Emissions are calculated based on the following formula:
  Sum of -
  amount of coke used by process * 0.031 * 44.01/12.01
  amount of coal used by process * 0.732 * 44.01/12.01
  amount of BF gas used by process * 0.0803 * 44.01/12.01
  amount of diesel used by process * 0.865 * 44.01/12.01
- Sulfur dioxide [air, unspecified]: 1.46695e-5 kg; lognormal variance with pedigree 0.0033, pedigree (2,3,3,3,1)
  (same comment as for PAH, polycyclic aromatic hydrocarbons)
- Lead [air, unspecified]: 4.34376e-8 kg; lognormal variance with pedigree 0.6533, pedigree (2,3,3,3,1)
  (same comment as for PAH, polycyclic aromatic hydrocarbons)
- Mercury [air, unspecified]: 0 kg; pedigree (1,1,1,1,1)
  (same comment as for PAH, polycyclic aromatic hydrocarbons)
- Nitrogen oxides [air, unspecified]: 9.67073e-6 kg; lognormal variance with pedigree 0.0433, pedigree (2,3,3,3,1)
  (same comment as for PAH, polycyclic aromatic hydrocarbons)
- Manganese [air, unspecified]: 5.02823e-8 kg; lognormal variance with pedigree 0.6533, pedigree (2,3,3,3,1)
  (same comment as for PAH, polycyclic aromatic hydrocarbons)
- Dioxins, measured as 2,3,7,8-tetrachlorodibenzo-p-dioxin [air, unspecified]: 2.41415e-15 kg; lognormal variance with pedigree 0.3033, pedigree (2,3,3,3,1)
  (same comment as for PAH, polycyclic aromatic hydrocarbons)
- Hydrogen fluoride [air, unspecified]: 0 kg; pedigree (1,1,1,1,1)
  (same comment as for PAH, polycyclic aromatic hydrocarbons)
- Hydrogen chloride [air, unspecified]: 0 kg; pedigree (1,1,1,1,1)
  (same comment as for PAH, polycyclic aromatic hydrocarbons)
- Zinc [air, unspecified]: 0 kg; pedigree (1,1,1,1,1)
  (same comment as for PAH, polycyclic aromatic hydrocarbons)
- Water [air, unspecified]: 0.000254465 m3; = water_UNO_input*(fraction_PW_to_air); lognormal variance with pedigree 0.0434, pedigree (3,3,2,1,2)
  It is assumed that 80% of water consumed as input to the process is sent out as wastewater for treatment and 20% is lost in evaporationt to air.
- Copper [air, unspecified]: 1.73833e-9 kg; lognormal variance with pedigree 0.6533, pedigree (2,3,3,3,1)
  (same comment as for PAH, polycyclic aromatic hydrocarbons)
- Carbon monoxide, fossil [air, unspecified]: 0.000476755 kg; lognormal variance with pedigree 0.6533, pedigree (2,3,3,3,1)
  (same comment as for PAH, polycyclic aromatic hydrocarbons)
- Particulates, > 2.5 um, and < 10um [air, unspecified]: 1.76027e-7 kg; lognormal variance with pedigree 0.1234, pedigree (3,3,2,1,2)
  Based on ecoinvent dataset " pig iron production, GLO" accessed through ecoeditor on 20170815
- Hydrogen sulfide [air, unspecified]: 1.18532e-6 kg; lognormal variance with pedigree 0.0434, pedigree (3,3,2,1,2)
  (same comment as for Particulates, > 2.5 um, and < 10um)
- Particulates, > 10 um [air, unspecified]: 1.76027e-7 kg; lognormal variance with pedigree 0.0434, pedigree (3,3,2,1,2)
  (same comment as for Particulates, > 2.5 um, and < 10um)
- Water [air, non-urban air or from high stacks]: 4.7004e-6 m3; lognormal variance with pedigree 0.0094, pedigree (3,3,2,1,2)
  Based on the formula given in ecoinvent dataset " pig iron production, GLO" accessed through ecoeditor on 20170815
- Water [water, unspecified]: 0.000298774 m3; lognormal variance with pedigree 0.130025, pedigree (4,4,5,2,4)
  Calculated value based on literature values and expert opinion. See comments in the parametres' comment field.

## Sampling procedure
Data from three production plants in India with total iron pellet production capacity of 1,25,07,215 tonnes per year.

## Extrapolations
Certain emissions to air have been extrapolated from GLO dataset.

## Review by Louis Brimacombe 2017-11-01
data look reasonable, no specific comments
