# nuclear spent fuel reprocessing facility construction

Dataset: EcoSpold 2, unit process
Geography: RoW
Time period: 1980-01-01 to 2019-12-31
Technology level: current
Classification: ISIC rev.4 ecoinvent: 4100:Construction of buildings
Classification: EcoSpold01Categories: nuclear power/waste treatment
Tags: ConvertedDataset
Scenario: Business-as-Usual
System model: Allocation at the point of substitution
Generated by: Roberto Dones
Published in: Dones, R. 2007
Database: ecoinvent
isCopyrightProtected: true
accessRestrictedTo: 1

## General comment
Data on material and energy for construction are relatively poor, sometimes the only available were from non-realised projects (in USA and DE). The THORP plant (BNFL, Sellafield, UK) and its adjoint facilities (for vitrification and conditioning of waste from light water reactors) have been used as main reference for the estimation of the infrastructure, although for the operation most of the data are for UP2 and UP3 plants (Cogema, La Hague, FR). Annual design throughput is 1200 tonne heavy metal. Extrapolations have been made to take into account visual estimations and aerial photos of the facilities. No direct emissions during construction are considered, only indirect through the energy (and material) requirements. Decommissioning is only very roughly described. Only non-radioactive wastes from dismantling are accounded for, because low radioactive wastes are attributed to operation.
[This dataset was already contained in the ecoinvent database version 2. It was not individually updated during the transfer to ecoinvent version 3. Life Cycle Impact Assessment results may still have changed, as they are affected by changes in the supply chain, i.e. in other datasets. This dataset was generated following the ecoinvent quality guidelines for version 2. It may have been subject to central changes described in the ecoinvent version 3 change report (http://www.ecoinvent.org/database/ecoinvent-version-3/reports-of-changes/), and the results of the central updates were reviewed extensively. The changes added e.g. consistent water flows and other information throughout the database. The documentation of this dataset can be found in the ecoinvent reports of version 2, which are still available via the ecoinvent website. The change report linked above covers all central changes that were made during the conversion process.]

## Included activities end
The module includes an estimation of the main material and energy use for the construction and the decommissioning of the facility. Land use, transport requirements, excavation for foundation, and disposal of inerts from decommissioning of the plant are also accounted for.

## Geography
European facilities.

## Technology
Current commercial facilities.

## Reference product
- nuclear spent fuel reprocessing facility: 1 unit; By-product classification allocatable product; CPC 54290: General construction services of other civil engineering works
  EcoSpold01Location=RER
  production volume 2.67763 unit
    This is a placeholder value that does not reflect real-world production volumes. This dataset does not currently require a real-world production volume to work in the database framework, and no actual data were collected yet. This has no negative effect on the results of the ecoinvent database.
  property price 2.12666e8 EUR2005
    Calculated based on inputs: The price of the product has been calculated as a sum of the values of the material and energy inputs for this product. This value is therefore a rough estimation. It may underestimate the real price since there are additional expenses when producing any product. These expences can include for example labour costs, treatment of waste materials and profit for the producer. Please consider carefully whether this level of data quality is acceptable for your application.
  property true value 2.12666e8
    allocation property applied in "true value" allocation // value calculated from revenue

## By-products
- heat, for reuse in municipal waste incineration only: 0 MJ; CPC 17300: Steam and hot water; By-product classification allocatable product; pedigree (1,1,1,1,1)
  Net electricity generated from this waste and used in internal MSWI plant energy redistribution.
  Uncertainty: uncertainty is calculated from uncertainties in waste composition and uncertainties in energy efficiency and the uncertainty in internal energy demand
  production volume 2499.71 MJ
  property exergy 0.1842 MJ; name E_th_prod_MSWI_exergy
    This exergy property is based on the exergy content of the product.
  property price 0.0106 EUR2005; name E_th_prod_MSWI_price_EUR2005
    Average European district heat price from Ecoheatcool and Euroheat 2005-2006, Ecoheat Work package 1: The European heat market. Final report. 10.6 EUR/GJ i s the price of district heat. http://www.solarthermalworld.org/files/Ecoheatcool%20WP1%20Web.pdf?download
  property true value relation 0.1842; name E_th_prod_MSWI_true_value_relation
    property to calculate "true value" from
  property true value 5.48101
    allocation property applied in "true value" allocation // value calculated from true value relation
- electricity, for reuse in municipal waste incineration only: 0 kWh; CPC 17100: Electrical energy; By-product classification allocatable product; pedigree (1,1,1,1,1)
  (same comment as for heat, for reuse in municipal waste incineration only)
  production volume 352.026 kWh
  property true value relation 3.6; name E_el_prod_MSWI_true_value_relation
    property to calculate "true value" from
  property price 0.1 EUR2005; name E_el_prod_MSWI_price_EUR2005
    Estimated to be the same price as in case of electricity, medium voltage.
  property exergy 3.6 MJ; name E_el_prod_MSWI_exergy
    This exergy property is based on the exergy content of the product.
  property true value 15.0855
    (same comment as for heat, for reuse in municipal waste incineration only)

## Inputs from technosphere
- aluminium, cast alloy: 41600 kg; lognormal variance with pedigree 0.162, pedigree (1,1,5,5,1)
  old reference
  EcoSpold01Location=RER
  properties: wet mass 1 kg, dry mass 1 kg
- corrugated board box: 0 kg; pedigree (1,1,1,1,1)
  EcoSpold01Location=RER
  old reference
  properties: carbon content, non-fossil 0.432275, carbon content, fossil 0.000656085, water content 0.0582011, dry mass 0.945 kg, wet mass 1 kg
  note on carbon content, non-fossil: Biogenic C content was calculated after biogenic C contents of chemicals used in the production of board (Tab 10.15 & 10.16, ecoinvent v2.2 report 11_III, part 10).
  note on carbon content, fossil: Fossil C content was calculated after fossil C contents of chemicals used in the production of board (Tab 10-15 & 10.16 ecoinvent v2.2 report 11_III, part 10)
- aluminium, wrought alloy: 88400 kg; lognormal variance with pedigree 0.162, pedigree (1,1,5,5,1)
  old reference
  EcoSpold01Location=RER
  properties: dry mass 1 kg, wet mass 1 kg
- lead: 40000 kg; lognormal variance with pedigree 0.342, pedigree (1,1,5,5,1)
  EcoSpold01Location=RER
  old reference
  properties: wet mass 1 kg, dry mass 1 kg
- zinc: 65000 kg; lognormal variance with pedigree 0.342, pedigree (1,1,5,5,1)
  EcoSpold01Location=RER
  old reference
  properties: dry mass 1 kg, wet mass 1 kg
- plywood, for outdoor use: 3780 m3; lognormal variance with pedigree 0.342, pedigree (1,1,5,5,1)
  EcoSpold01Location=RER
  old reference
  properties: water content 0.0601214, carbon content, non-fossil 0.424285, carbon content, fossil 0.0439893, wet mass 625 kg, dry mass 589.555 kg
  note on carbon content, non-fossil: Plywood is composed of wood and additives. The weight of the wood is assumed to be the DM kg minus 83.2 kg additives. C content of wood is 0.494 kgC/kg dry wood (ecoinvent v2.2 report 9)
- concrete, normal: 0 m3; pedigree (1,1,1,1,1)
  estimation
  EcoSpold01Location=CH
  properties: water content 0.086758, dry mass 2190 kg, wet mass 2380 kg
- excavation, hydraulic digger: 300000 m3; lognormal variance with pedigree 0.082, pedigree (1,1,5,5,1)
  estimation
  EcoSpold01Location=RER
- diesel, burned in building machine: 2.75e8 MJ; lognormal variance with pedigree 0.162, pedigree (1,1,5,5,1)
  old reference
  EcoSpold01Location=GLO
- steel, chromium steel 18/8, hot rolled: 1.45e8 kg; lognormal variance with pedigree 0.342, pedigree (1,1,5,5,1)
  EcoSpold01Location=RER
  own calculation
  properties: wet mass 1 kg, dry mass 1 kg, carbon content, fossil 0.0008
  note on carbon content, fossil: Stainless steel model is the grade 304 steel (18/8 stainless, 18% chromium 8% nickel; max. 0.08% C)
- copper: 360000 kg; lognormal variance with pedigree 0.162, pedigree (1,1,5,5,1)
  extrapolation from one reference
  EcoSpold01Location=RER
  properties: dry mass 1 kg, wet mass 1 kg
- reinforcing steel: 5.3e7 kg; lognormal variance with pedigree 0.162, pedigree (1,1,5,5,1)
  estimation
  EcoSpold01Location=RER
  properties: carbon content, fossil 0.004, wet mass 1 kg, dry mass 1 kg
- waste reinforced concrete: -1e9 kg; lognormal variance with pedigree 0.162, pedigree (1,1,5,5,1)
  estimation
  EcoSpold01Location=CH
  production volume 3e9 kg
    Calculated from the production volume of nuclear spent fuel reprocessing facility in proportion to the respective output amounts.
  properties: water content 0.00585407, wet mass 1 kg, dry mass 0.99418 kg
- electricity, medium voltage: 0 kWh; pedigree (1,1,1,1,1)
  old reference
  EcoSpold01Location=UCTE
- steel, low-alloyed, hot rolled: 3.13e7 kg; lognormal variance with pedigree 0.162, pedigree (1,1,5,5,1)
  extrapolation from one reference
  EcoSpold01Location=RER
  properties: carbon content, fossil 0.005, wet mass 1 kg, dry mass 1 kg
  note on carbon content, fossil: Low alloyed steel composition given in Tab. 3.2 ecoinvent v2.2 report 10_partII. Steel assumed to have a C content of 0.5%
- corrugated board box: 919.101, 78080.9 kg (2 entries); lognormal variance with pedigree 0.342, pedigree (1,1,5,5,1)
  EcoSpold01Location=RER
  old reference
- concrete, normal: 11480, 1196.2, 9684.09, 5447.3, 23067.8, 778.063, 448346 m3 (7 entries); lognormal variance with pedigree 0.162, pedigree (1,1,5,5,1)
  estimation
  EcoSpold01Location=CH
- electricity, medium voltage: 70820.9, 12886.4, 218534, 3.16852e6, 453475, 1.48577e6 kWh (6 entries); lognormal variance with pedigree 0.162, pedigree (1,1,5,5,1)
  old reference
  EcoSpold01Location=UCTE

## Inputs from nature
- Transformation, to unspecified [natural resource, land]: 500000 m2; lognormal variance with pedigree 0.082, pedigree (1,1,5,5,1)
  estimation
- Transformation, from industrial area [natural resource, land]: 500000 m2; lognormal variance with pedigree 0.082, pedigree (1,1,5,5,1)
  estimation
- Occupation, industrial area [natural resource, land]: 3e7 m2*year; lognormal variance with pedigree 0.082, pedigree (1,1,5,5,1)
  estimation
- Transformation, to industrial area [natural resource, land]: 500000 m2; lognormal variance with pedigree 0.082, pedigree (1,1,5,5,1)
  estimation
- Occupation, construction site [natural resource, land]: 5e6 m2*year
- Transformation, from unspecified [natural resource, land]: 500000 m2; lognormal variance with pedigree 0.082, pedigree (1,1,5,5,1)
  estimation

## Sampling procedure
Literature

## Extrapolations
none This dataset has been copied from an original dataset covering the geography RER. The uncertainty has been adjusted accordingly.

## Review by Roberto Dones 2003-08-19
passed
for final calculation August 2003
