# electricity production, hard coal

Dataset: EcoSpold 2, unit process
Geography: GB
Time period: 1980-01-01 to 2019-12-31
Technology level: modern
Classification: ISIC rev.4 ecoinvent: 3510:Electric power generation, transmission and distribution
Classification: EcoSpold01Categories: hard coal/power plants
Synonyms: anthracite; coking coal; other bituminous coal
Tags: hard coal power; fossil fuels; coal power
Scenario: Business-as-Usual
System model: Allocation at the point of substitution
Generated by: Karin Treyer
Published in: Röder, A. 2007
Database: ecoinvent
isCopyrightProtected: true
accessRestrictedTo: 1

## General comment
This dataset represents the production of high voltage electricity in an average hard coal power plant in United Kingdom in 2012. 'Hard coal' includes anthracite, coking coal and other bituminous coal according to the definition of the IEA electricity information 2014. (IEA. 2014. Electricity Information 2014. ISBN 978-92-64-21692-1. International Energy Agency (IEA), Paris Cedex (FR).)
All exchanges in this dataset except for emissions of SO2, NOx and particles are production-weighted averages of the figures in the datasets in ecoinvent version two, which are valid for the following 14 countries: AT, BE, ES, FR, IT, NL, PT, DE, CZ, HR, PL, SK, CN, US. The exception values are production-weighted averages of version 2 countries and the new countries in version 3 (AU, CA, CL, ID, IN, KR, MX, MY, PE, RU, TH, TR, TW, TZ, UA, ZA)
Comments on the inventory data of emissions:
- For the assessment of main characteristics (sulphur and ash content of coal, efficiency of the plant) and CO2 a bottom-up approach has been used. It consists in the collection of information about single plants.
- The size distribution of particle emissions has been derived from German data.
- Halogene emissions have been estimated on the basis of the content of the species in the country-specific coal input mix, assuming average retention rates.
- For CO and particle emissions average values for the former UCTE are included (Union for the Coordination of the Transmission of Electricity, since 2009 replaced by ENTSO-E European Network of Transmission System Operators for Electricity).
- The country specific emission depend on the share of DeNOx.
- Emissions of trace elements were calculated by means of a formula (CORINAIR) using the ash content in the country-specific coal input mix and average transfer coefficients for coal power plants, taking into account the share of DeSOx installed.
- Emission of uranium and thorium radioactive isotopes were assumed proportional to the corresponding element emitted with particles; the other non-gaseous radioactive isotopes of the uranium and thorium decay chain were assumed proportional to the emitted U-238 or Th-232.
- The emission of gaseous radon and K-40 are taken from the literature.
The module describes the operation of an average plant in the country. The plant is used for middle load with 4000 hours of operation at full capacity per year. The plant is assumed to operate 150000 hours during its lifetime. For the assessment of main characteristics (LHV, sulphur and ash content of coal, efficiency of the plant) and criteria emissions (SOx, NOx, particles, and CO2) a bottom-up approach has been used. It consists on the collection of information about single plants. Base data on all major UCTE power plants in 1993 have been integrated, to the extent possible, with updated information for year 2000 (v1.0) and 2004-2005 (v2.0). The size distribution of particles has been derived from German data. Halogene emissions have been estimated on the basis of the content of the species in the country-specific coal input mix, assuming average retention rates. For CO and VOC-emissions average values for UCTE are included. Two average values for N2O emissions from UCTE plants are considered for the two cases with or without DeNOx; the country specific emission depend therefore on the share of DeNOx. Emissions of trace elements were calculated by means of a formula (CORINAIR) using the ash content in the country-specific coal input mix and average transfer coefficients for coal power plants, taking into account the share of DeSOx installed. Emission of uranium and thorium radioactive isotopes were assumed proportional to the corresponding element emitted with particles; the other non-gaseous radioactive isotopes of the uranium and thorium decay chain were assumed proportional to the emitted U-238 or Th-232. The emission of gaseous radon and K-40 are taken from the literature. The waste heat releases to air and water have been allocated on the basis of the assumed share of river cooled power plants and assumptions on the direct losses to air. The share of the recycled ash is country-specific. For the disposal of the remaining ash, typical country-specific compositions are taken into account in appropriate disposal modules.
[This dataset was already contained in the ecoinvent database version 2. It was not individually updated during the transfer to ecoinvent version 3. Life Cycle Impact Assessment results may still have changed, as they are affected by changes in the supply chain, i.e. in other datasets. This dataset was generated following the ecoinvent quality guidelines for version 2. It may have been subject to central changes described in the ecoinvent version 3 change report (http://www.ecoinvent.org/database/ecoinvent-version-3/reports-of-changes/), and the results of the central updates were reviewed extensively. The changes added e.g. consistent water flows and other information throughout the database. The documentation of this dataset can be found in the ecoinvent reports of version 2, which are still available via the ecoinvent website. The change report linked above covers all central changes that were made during the conversion process.]

## Included activities start
From the constructed hard coal power plant ready to produce electricity.
From reception of hard coal and operating materials at power plant gate.

## Included activities end
Energy conversion for electricity production. Use of fuel oil for startup is accounted for. Particle removal is included in this module. DeSOx is described in a different module; it is applied here according to the actual use in the country; SOx emission is the reduced one. There is no information about the use of DeNOx in the country. It is assumed that 25 % of the plants are river cooled, 75 % use cooling tower (average UCTE). The water treatment is described in separate modules. The disposal of non-recycled ashes is modelled separately.

## Technology
POWER PLANT:
Hard coal power plant input is a market mix of 100MWe power plants (representing all power plants with a capacity <250MWe and 7% of installed capacity) and 500MWe power plants (representing all power plants with a capacity >250MWe and 93% of installed capacity). Please note that in contrast to ecoinvent v2, the two power plant types do not exist anymore as single datasets. Along with (Röder et al. 2004), lifetime of these power plants is assumed to be 150’000 full load hours. Whereas European hard coal power plants are assumed to be operated in mid-load mode with 4000 full load hours per year (corresponding to a lifetime of 37.5 years) (Röder et al. 2004), a capacity factor (average US) of 66% is documented (eGRID 2006), corresponding to about 5800 full load hours per year, or a lifetime of about 26 years.
Average installed technology.
- Share of installed capacity with desulfurisation 2% (rough estimation based on sulfur mass balance
- Average efficiency of desulfurisation installations: 92% (rough estimation based on Dones et al. 27
- Share of installed capacity with denitrification (primary and/or secondary installations): 73% (figure based on IEA 212 )
- Average efficiency of denitrification installations: 8% (estimation based on Dones et al. 27, p.128. Valid for selective catalytic reaction systems)
- Share of installed capacity with particle filters: 98% (figure based on IEA 212 )
- Average efficiency of particle filters: 98% (figure based on IEA 212 )
- IEA 2012. Coal Power Database. International Energy Agency Clean Coal Centre, London
- IEA/OECD. 2010. Electricity Information 2010. International Energy Agency (IEA), Paris Cedex (FR). Part IV. Detailed OECD Electricity And Heat Data.
- Dones, R., Bauer, C., Röder, A. (2007) Kohle. In: Dones, R. (Ed.) et al., Sachbilanzen von Energiesystemen: Grundlagen für den ökologischen Vergleich von Energiesystemen und den Einbezug von Energiesystemen in Ökobilanzen für die Schweiz. Final report ecoinvent No.

## Time period
The Annual Production Volume is valid for the year 2012.

## Parameters
- efficiency: 0.374 dimensionless; lognormal variance with pedigree 0.003325, pedigree (3,2,1,2,2)
  Literature value/calculated value. Net electrical efficiency based on the lower heating value (LHV).
  For all OECD countries, the IEA Electricity information 2014 provides data for the year 2012 on fuel input (TJ, Net calorific value NCV) and gross electricity production (GWh) as well as heat production (TJ) in tables 8 and 9 for each country for electricity only and Combined Heat and Power (CHP) plants each. Together with the information on own use (see parameter 'losses'), the net electrical efficiency based on the NCV is calculated.
  For all non-OECD countries, data from the IEA Energy balances of non-OECD countries 2014 have been used. These tables do not always provide information on how much of the electricity has been produced in electricity only and in CHP plants, but often give the total value only.
  IEA. 2014. Electricity Information 2014. ISBN 978-92-64-21692-1. International Energy Agency (IEA), Paris Cedex (FR).
  IEA/OECD. 2014. Energy balances of non-OECD countries 2014. International Energy Agency (IEA), Paris Cedex (FR).
- losses from gross electricity production: 0.04 dimensionless; name losses_gross_net; lognormal variance with pedigree 0.003525, pedigree (3,2,2,2,2)
  Calculated value. Own use of electricity plants in this country in 2012. For the OECD countries, the OECD iLibrary provides gross and net electricity values for the specific sector 'Total Fuel Combustion', from which the loss value is being calculated. This value is then applied to all fossil fuel datasets, as no data on a more detailed level were available.
  OECD. 2014. IEA Electricity Information Statistics: OECD - Electricity and heat generation. OECD iLibrary. Online database. DOI : 10.1787/elect-data-en
  nan
  Uncertainty: Generic IEA value used.
- factor: input of MJ for the production of 1 kWh: 9.62567 MJ/kWh; name factor_MJ_kWh; = 1*3.6/efficiency; undefined min 11.1801, max 11.1801, standardDeviation95 0, pedigree (1,1,1,1,1)
  Calculated value. 3.6 MJ = 1kWh.
  nan
- once-through and cooling pond cooling systems as a fraction of all cooling syste: 0.73 dimensionless; name once_through_andCP_CS_fractio_from_allCS; lognormal variance with pedigree 0.092025, pedigree (4,4,3,2,4)
  Calculated as an average of data available for Europe (Floerke, 2008, Future changes of freshwater needs in the electricity production sector) and USA (NERL, 2011, Estimating freshwater needs to meet future thermoelectric generation requirements).
  nan
- gross electricity production: 1.43181e11 kWh; name gross_electricity; lognormal variance with pedigree 0.0012, pedigree (2,1,1,1,1)
  Literature value/statistics. Taken from the IEA electricity information 2014, table 1.3.
  IEA. 2014. Electricity Information 2014. ISBN 978-92-64-21692-1. International Energy Agency (IEA), Paris Cedex (FR).
  nan
- fraction, water, decarbonised, to air: 0.0251074; name fraction_WDC_to_air; = fraction_CW_to_air; lognormal variance with pedigree 0.092025, pedigree (4,4,3,2,4)
  Calculated value. See comments in the other parametres present in this dataset. Decarbonised water is considered to be always used as cooling water, thus cooling water fractions to air are applied to all carbonised water input flows to calculate the amount of water consumed in the processes.
  nan
- fraction, cooling water, to air: 0.0251074; name fraction_CW_to_air; lognormal variance with pedigree 0.092025, pedigree (4,4,3,2,4)
  Calculated
  nan
- recirculating cooling system as a fraction of all cooling systems: 0.27 dimensionless; name recirculating_CS_fraction_from_allCS; lognormal variance with pedigree 0.092025, pedigree (4,4,3,2,4)
  (same comment as for once-through and cooling pond cooling systems as a fraction of all coo)
- fraction, water, completely softened, to air: 0.15; name fraction_WCS_to_air; = fraction_PW_to_air; lognormal variance with pedigree 0.092025, pedigree (4,4,3,2,4)
  Calculated value. See comment in the other parametres present in this dataset. Water, completely softened is considered to be always used as process water, thus process water fractions to air are applied to all water, completely softened input flows to calculate the amount of water consumed in the processes.
  nan
- water consumption, electricity production from hard coal, recirculating CS: 0.0018 m3/kWh; name WConsumption_EP_HC_recirculatingCS; lognormal variance with pedigree 0.092025, pedigree (4,4,3,2,4)
  Estimated based on literature (Scown, 2011, Water Footprint of U.S. Transportation Fuels, SI). The amount of water consumed while burning lignite and peat is assumed to be the same as in case of coal.
  nan
- water withdrawal, electricity production from hard coal, recirculating CS: 0.0021 m3/kWh; name WWithdrawal_EP_HC_recirculating_CS; lognormal variance with pedigree 0.092025, pedigree (4,4,3,2,4)
  Estimated based on literature (Scown, 2011, Water Footprint of U.S. Transportation Fuels, SI). The amount of water withdrawn while burning lignite and peat is assumed to be the same as in case of coal.
  nan
- water withdrawal, electricity production from hard coal, once-through and coolin: 0.0815 m3/kWh; name WWithdrawal_EP_HC_once_through_andCP_CS; lognormal variance with pedigree 0.092025, pedigree (4,4,3,2,4)
  (same comment as for water withdrawal, electricity production from hard coal, recirculating)
- water consumption, electricity production from hard coal, once-through and cooli: 0.0014 m3/kWh; name WConsumption_EP_HC_once_through_andCP_CS; lognormal variance with pedigree 0.092025, pedigree (4,4,3,2,4)
  (same comment as for water consumption, electricity production from hard coal, recirculatin)
- fraction, process water, to air: 0.15 dimensionless; name fraction_PW_to_air; lognormal variance with pedigree 0.092025, pedigree (4,4,3,2,4)
  Literature value. In case when no industry/process specific data are available, default evaporation fraction value is used. This value is 15% and is based on literature (Statistics Canada, 2007 & Shaffer, K.H., 2008, Consumptive water use in the Great Lakes Basin, USGS & Shiklomanov, 2003, World Water Resources at the Beginning of the 21st Century) and has been approved by an expert.
  nan

## Reference product
- electricity, high voltage: 1 kWh; name electricity; CPC 17100: Electrical energy; By-product classification allocatable product
  production volume 1.37454e11 kWh; name electricity_apv; = gross_electricity*(1- losses_gross_net)
    Calculated value
  property price 0.0977 EUR2005
    Temporary price data. Calculated as 90% of purchasers price based on: 94% of the average price (to account for a 6% loss in transformation and transmission) for electricity for industrial consumersin 2005 (excluded taxes). From IEA.
  property true value 0.0977; name electricity_true_value
    allocation property applied in "true value" allocation // value calculated from revenue

## By-products
- heat, for reuse in municipal waste incineration only: 0 MJ; CPC 17300: Steam and hot water; By-product classification allocatable product; pedigree (1,1,1,1,1)
  Net electricity generated from this waste and used in internal MSWI plant energy redistribution.
  Uncertainty: uncertainty is calculated from uncertainties in waste composition and uncertainties in energy efficiency and the uncertainty in internal energy demand
  production volume 2860.08 MJ
  property exergy 0.1842 MJ; name E_th_prod_MSWI_exergy
    This exergy property is based on the exergy content of the product.
  property price 0.0106 EUR2005; name E_th_prod_MSWI_price_EUR2005
    Average European district heat price from Ecoheatcool and Euroheat 2005-2006, Ecoheat Work package 1: The European heat market. Final report. 10.6 EUR/GJ i s the price of district heat. http://www.solarthermalworld.org/files/Ecoheatcool%20WP1%20Web.pdf?download
  property true value relation 0.1842; name E_th_prod_MSWI_true_value_relation
    property to calculate "true value" from
  property true value 1.3687e-10
    allocation property applied in "true value" allocation // value calculated from true value relation
- electricity, for reuse in municipal waste incineration only: 0 kWh; CPC 17100: Electrical energy; By-product classification allocatable product; pedigree (1,1,1,1,1)
  (same comment as for heat, for reuse in municipal waste incineration only)
  production volume 402.808 kWh
  property true value relation 3.6; name E_el_prod_MSWI_true_value_relation
    property to calculate "true value" from
  property price 0.1 EUR2005; name E_el_prod_MSWI_price_EUR2005
    Estimated to be the same price as in case of electricity, medium voltage.
  property exergy 3.6 MJ; name E_el_prod_MSWI_exergy
    This exergy property is based on the exergy content of the product.
  property true value 3.7674e-10
    (same comment as for heat, for reuse in municipal waste incineration only)

## Inputs from technosphere
- NOx retained, by selective catalytic reduction: 0 kg; name nox_retained; source Itten R. 2012; pedigree (1,1,3,1,1)
  Exchange present due to parent child relationship
  properties: wet mass 1 kg, dry mass 1 kg
- residue from cooling tower: -4.81283e-5 kg; name amount_residue; = (5E-06 * factor_MJ_kWh)*-1; lognormal variance with pedigree 0.072, pedigree (5,1,3,1,1)
  Calculated from mass balance
  Amount was scaled to the amount of reference product.
  production volume 6.61542e6 kg; = amount_residue/electricity*electricity_apv
    Calculated from the production volume of hard coal, burned in power plant in proportion to the respective output amounts.
  property price 0 EUR2005; name amount_residue_price_EUR2005
  properties: wet mass 1 kg, water content 0.428571, carbon content, fossil 0.0544233, dry mass 0.7 kg
- water, decarbonised: 1.44385 kg; name water_decarbonised_input; = 0.15 * factor_MJ_kWh; lognormal variance with pedigree 0.052025, pedigree (4,5,4,2,3)
  Estimate based on literature
  Amount was scaled to the amount of reference product.
  estimate based on literature
  Amount was scaled to the amount of reference product.
  properties: wet mass 1 kg
- hard coal: 0.436043 kg; name hard_coal; = 0.0453 * factor_MJ_kWh; lognormal variance with pedigree 0.21, pedigree (5,5,5,5,5)
  own assumption, based on uncertainty on power plant data base and coal quality (mismatch between regional supply mix and input coal)
  Amount was scaled to the amount of reference product.
  properties: wet mass 1 kg, water content 0.0638298, dry mass 0.94 kg, carbon content, fossil 0.845
  note on carbon content, fossil: C content 75-94% (specified in Tab 1.1, report 6, part VI). A mean content of 0.845 kg C/ kg dry hard coal was considered
- hard coal ash: -0.0688235 kg; name amount_ash; = (0.00715 * factor_MJ_kWh)*-1; lognormal variance with pedigree 0.092, pedigree (5,1,3,5,3)
  calculated from mass balance
  Amount was scaled to the amount of reference product.
  production volume 9.46005e9 kg; = amount_ash/electricity*electricity_apv
    (same comment as for residue from cooling tower)
  property price 0 EUR2005; name amount_ash_price_EUR2005
  properties: dry mass 1 kg, wet mass 1 kg
- SOx retained, in hard coal flue gas desulfurisation: 0.00453369 kg; name sox_retained; = 0.000471 * factor_MJ_kWh; source Itten R. 2012; lognormal variance with pedigree 0.004, pedigree (3,1,3,1,1)
  See power plant data base for details
  Amount was scaled to the amount of reference product.
  properties: wet mass 1 kg, dry mass 1 kg
- light fuel oil: 0.000163636 kg; name light_fuel_oil; = 1.7E-05 * factor_MJ_kWh; lognormal variance with pedigree 0.0221, pedigree (3,4,4,3,1)
  Typical value for hard coal plant in DE
  Amount was scaled to the amount of reference product.
  properties: carbon content, fossil 0.862, dry mass 1 kg, wet mass 1 kg
- hard coal power plant: 1.25134e-11 unit; name hard_coal_power_plant; = 1.3E-12 * factor_MJ_kWh; source Röder, A. 2007; lognormal variance with pedigree 0.3147, pedigree (3,3,3,3,1)
  Calculated value. At the moment, the hard coal power plant input consists of a market mix of a 100MWe power plant and a 500MWe power plant
  .
  For this calculation, 4000 load hours per year are assumed. It is assumed that a total of 150'000h is reached during the lifetime. A capacity of 500MW is taken for the calculation.
- water, completely softened: 0.057754 kg; name water_softened_input; = 0.006 * factor_MJ_kWh; lognormal variance with pedigree 0.052025, pedigree (4,5,4,2,3)
  (same comment as for water, decarbonised)
  properties: wet mass 1 kg
- chlorine, liquid: 9.62567e-5 kg; = 1E-05 * factor_MJ_kWh; lognormal variance with pedigree 0.108025, pedigree (5,4,4,2,3)
  Rough guess
  Amount was scaled to the amount of reference product.
  properties: dry mass 1 kg, wet mass 1 kg
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
## Inputs from nature
- Water, cooling, unspecified natural origin [natural resource, in water]: 0.0511173 m3; name water_cooling_UNO_input; = ((recirculating_CS_fraction_from_allCS*WWithdrawal_EP_HC_recirculating_CS)+(once_through_andCP_CS_fractio_from_allCS*WWithdrawal_EP_HC_once_through_andCP_CS))/11.31*factor_MJ_kWh; lognormal variance with pedigree 0.098025, pedigree (4,4,4,2,4)
  Estimate based on literature
  Amount was scaled to the amount of reference product.
  Calculated based on literature data.

## Emissions to nature
- Water [water, unspecified]: 0.0512906 m3; name water_to_water_unspecified; = (water_softened_input/1000)*(1-fraction_WCS_to_air)+(water_decarbonised_input/1000)*(1-fraction_WDC_to_air)+water_cooling_UNO_input*(1-fraction_CW_to_air); lognormal variance with pedigree 0.098025, pedigree (4,4,4,2,4)
  Calculated value based on literature values and expert opinion. See comments in the parametres' comment field.
  property fraction, origin: fresh water 0.0283958; name fraction_origin_fresh_water_Ww
  property fraction, origin: unspecified 0.971604; name fraction_origin_unspecified_Ww
  property fraction, origin: salt water 0; name fraction_origin_salt_water_Ww
- Ethane [air, non-urban air or from high stacks]: 3.94652e-7 kg; name ethane; = 4.1E-08 * factor_MJ_kWh; lognormal variance with pedigree 0.078025, pedigree (3,5,4,2,1)
  Based on available literature
  Amount was scaled to the amount of reference product.
- Selenium [air, non-urban air or from high stacks]: 1.29947e-7 kg; name selenium; = 1.35E-08 * factor_MJ_kWh; lognormal variance with pedigree 0.732, pedigree (5,1,3,1,1)
  Calculated from trace element balance, input uncertain
  Amount was scaled to the amount of reference product.
- Xylene [air, non-urban air or from high stacks]: 8.87487e-6 kg; name xylene; = 9.22E-07 * factor_MJ_kWh; lognormal variance with pedigree 0.078025, pedigree (3,5,4,2,1)
  Based on available literature
  Amount was scaled to the amount of reference product.
- Nickel [air, non-urban air or from high stacks]: 7.46952e-8 kg; name nickel; = 7.76E-09 * factor_MJ_kWh; lognormal variance with pedigree 0.732, pedigree (5,1,3,1,1)
  (same comment as for Selenium)
- Benzo(a)pyrene [air, non-urban air or from high stacks]: 1.92513e-12 kg; name benzo_a_pyrene; = 2E-13 * factor_MJ_kWh; lognormal variance with pedigree 0.078025, pedigree (3,5,4,2,1)
  Based on available literature
  Amount was scaled to the amount of reference product.
- Radium-226 [air, non-urban air or from high stacks]: 4.07166e-5 kBq; name radium_226; = 4.23E-06 * factor_MJ_kWh; lognormal variance with pedigree 0.382, pedigree (5,1,3,1,1)
  (same comment as for Selenium)
- Manganese [air, non-urban air or from high stacks]: 1.19358e-7 kg; name manganese; = 1.24E-08 * factor_MJ_kWh; lognormal variance with pedigree 0.732, pedigree (5,1,3,1,1)
  (same comment as for Selenium)
- Radium-228 [air, non-urban air or from high stacks]: 1.52086e-5 kBq; name radium_228; = 1.58E-06 * factor_MJ_kWh; lognormal variance with pedigree 0.382, pedigree (5,1,3,1,1)
  (same comment as for Selenium)
- Lead [air, non-urban air or from high stacks]: 1.23209e-7 kg; name lead; = 1.28E-08 * factor_MJ_kWh; lognormal variance with pedigree 0.732, pedigree (5,1,3,1,1)
  (same comment as for Selenium)
- Antimony [air, non-urban air or from high stacks]: 5.49626e-9 kg; name antimony; = 5.71E-10 * factor_MJ_kWh; lognormal variance with pedigree 0.732, pedigree (5,1,3,1,1)
  (same comment as for Selenium)
- Butane [air, non-urban air or from high stacks]: 1.82888e-7 kg; name butane; = 1.9E-08 * factor_MJ_kWh; lognormal variance with pedigree 0.078025, pedigree (3,5,4,2,1)
  Based on available literature
  Amount was scaled to the amount of reference product.
- PAH, polycyclic aromatic hydrocarbons [air, non-urban air or from high stacks]: 9.62567e-9 kg; name pah; = 1E-09 * factor_MJ_kWh; lognormal variance with pedigree 0.338025, pedigree (3,5,4,2,1)
  Based on available literature
  Amount was scaled to the amount of reference product.
- Sulfur dioxide [air, non-urban air or from high stacks]: 0.00420642 kg; name sulfur_dioxide; = 0.000437 * factor_MJ_kWh; source Itten R. 2012; lognormal variance with pedigree 0.004, pedigree (3,1,3,1,1)
  (same comment as for SOx retained, in hard coal flue gas desulfurisation)
- Hydrogen chloride [air, non-urban air or from high stacks]: 0.000293583 kg; name hydrogen_chloride; = 3.05E-05 * factor_MJ_kWh; lognormal variance with pedigree 0.202, pedigree (5,1,3,1,1)
  (same comment as for Selenium)
- Thorium-232 [air, non-urban air or from high stacks]: 1.28021e-5 kBq; name thorium_232; = 1.33E-06 * factor_MJ_kWh; lognormal variance with pedigree 0.382, pedigree (5,1,3,1,1)
  (same comment as for Selenium)
- Mercury [air, non-urban air or from high stacks]: 3.74439e-8 kg; name mercury; = 3.89E-09 * factor_MJ_kWh; lognormal variance with pedigree 0.732, pedigree (5,1,3,1,1)
  (same comment as for Selenium)
- Vanadium [air, non-urban air or from high stacks]: 5.98717e-8 kg; name vanadium; = 6.22E-09 * factor_MJ_kWh; lognormal variance with pedigree 0.732, pedigree (5,1,3,1,1)
  (same comment as for Selenium)
- Molybdenum [air, non-urban air or from high stacks]: 6.7861e-9 kg; name molybdenum; = 7.05E-10 * factor_MJ_kWh; lognormal variance with pedigree 0.732, pedigree (5,1,3,1,1)
  (same comment as for Selenium)
- Propene [air, non-urban air or from high stacks]: 1.54011e-7 kg; name propene; = 1.6E-08 * factor_MJ_kWh; lognormal variance with pedigree 0.078025, pedigree (3,5,4,2,1)
  Based on available literature
  Amount was scaled to the amount of reference product.
- Polonium-210 [air, non-urban air or from high stacks]: 0.00028877 kBq; name polonium_210; = 3E-05 * factor_MJ_kWh; lognormal variance with pedigree 0.382, pedigree (5,1,3,1,1)
  (same comment as for Selenium)
- Uranium-238 [air, non-urban air or from high stacks]: 3.39786e-5 kBq; name uranium_238; = 3.53E-06 * factor_MJ_kWh; lognormal variance with pedigree 0.382, pedigree (5,1,3,1,1)
  (same comment as for Selenium)
- Lead-210 [air, non-urban air or from high stacks]: 0.000157861 kBq; name lead_210; = 1.64E-05 * factor_MJ_kWh; lognormal variance with pedigree 0.382, pedigree (5,1,3,1,1)
  (same comment as for Selenium)
- Toluene [air, non-urban air or from high stacks]: 1.0492e-6 kg; name toluene; = 1.09E-07 * factor_MJ_kWh; lognormal variance with pedigree 0.078025, pedigree (3,5,4,2,1)
  Based on available literature
  Amount was scaled to the amount of reference product.
- Hydrocarbons, aliphatic, unsaturated [air, non-urban air or from high stacks]: 2.07914e-6 kg; name hydrocarbons_aliphatic_unsaturated; = 2.16E-07 * factor_MJ_kWh; lognormal variance with pedigree 0.078025, pedigree (3,5,4,2,1)
  Based on available literature
  Amount was scaled to the amount of reference product.
- Pentane [air, non-urban air or from high stacks]: 1.41497e-6 kg; name pentane; = 1.47E-07 * factor_MJ_kWh; lognormal variance with pedigree 0.078025, pedigree (3,5,4,2,1)
  Based on available literature
  Amount was scaled to the amount of reference product.
- Boron [air, non-urban air or from high stacks]: 2.05027e-6 kg; name boron; = 2.13E-07 * factor_MJ_kWh; lognormal variance with pedigree 0.732, pedigree (5,1,3,1,1)
  (same comment as for Selenium)
- Thorium-228 [air, non-urban air or from high stacks]: 8.17219e-6 kBq; name throium_228; = 8.49E-07 * factor_MJ_kWh; lognormal variance with pedigree 0.382, pedigree (5,1,3,1,1)
  (same comment as for Selenium)
- Nitrogen oxides [air, non-urban air or from high stacks]: 0.00166524 kg; name nitrogen_oxides; = 0.000173 * factor_MJ_kWh; source Itten R. 2012; lognormal variance with pedigree 0.044, pedigree (3,1,3,1,1)
  (same comment as for SOx retained, in hard coal flue gas desulfurisation)
- Formaldehyde [air, non-urban air or from high stacks]: 5.58289e-7 kg; name formaldehyde; = 5.8E-08 * factor_MJ_kWh; lognormal variance with pedigree 0.078025, pedigree (3,5,4,2,1)
  Based on available literature
  Amount was scaled to the amount of reference product.
- Chromium [air, non-urban air or from high stacks]: 2.01176e-8 kg; name chromium; = 2.09E-09 * factor_MJ_kWh; lognormal variance with pedigree 0.732, pedigree (5,1,3,1,1)
  (same comment as for Selenium)
- Cadmium [air, non-urban air or from high stacks]: 3.16684e-9 kg; name cadmium; = 3.29E-10 * factor_MJ_kWh; lognormal variance with pedigree 0.732, pedigree (5,1,3,1,1)
  (same comment as for Selenium)
- Arsenic [air, non-urban air or from high stacks]: 8.52834e-8 kg; name arsenic; = 8.86E-09 * factor_MJ_kWh; lognormal variance with pedigree 0.732, pedigree (5,1,3,1,1)
  (same comment as for Selenium)
- Carbon disulfide [air, non-urban air or from high stacks]: 0 kg; name carbon_disulfide; pedigree (1,1,3,1,1)
  Literature value/calculated value. Emissions when producing 1kWh of electricity from hard coal, based on the value for burning 1MJ of hard coal. Weighted average with electricity production data (Itten&Frischknecht 2012) and emission values of 14 countries
  (AT, BE, ES, FR, IT, NL, PT, DE, CZ, HR, PL, SK, CN, US) (Röder et al. 2007)
  Source:
  Itten R. and Frischknecht R. (2012) Life Cycle Inventories of Electricity Mixes and Grid. ESU-services Ltd., Uster, Switzerland.
- Bromine [air, non-urban air or from high stacks]: 5.49626e-6 kg; name bromine; = 5.71E-07 * factor_MJ_kWh; lognormal variance with pedigree 0.202, pedigree (5,1,3,1,1)
  (same comment as for Selenium)
- Zinc [air, non-urban air or from high stacks]: 3.20535e-7 kg; name zinc; = 3.33E-08 * factor_MJ_kWh; lognormal variance with pedigree 0.732, pedigree (5,1,3,1,1)
  (same comment as for Selenium)
- Strontium [air, non-urban air or from high stacks]: 2.23316e-7 kg; name strontium; = 2.32E-08 * factor_MJ_kWh; lognormal variance with pedigree 0.732, pedigree (5,1,3,1,1)
  (same comment as for Selenium)
- Particulates, > 10 um [air, non-urban air or from high stacks]: 5.98717e-5 kg; name particulates_gt10; = 6.22E-06 * factor_MJ_kWh; source Itten R. 2012; lognormal variance with pedigree 0.122, pedigree (5,1,3,1,1)
  (same comment as for SOx retained, in hard coal flue gas desulfurisation)
- Particulates, < 2.5 um [air, non-urban air or from high stacks]: 0.000199251 kg; name particulates_lt2_5; = 2.07E-05 * factor_MJ_kWh; source Itten R. 2012; lognormal variance with pedigree 0.382, pedigree (5,1,3,1,1)
  (same comment as for SOx retained, in hard coal flue gas desulfurisation)
- Propane [air, non-urban air or from high stacks]: 3.36898e-7 kg; name propane; = 3.5E-08 * factor_MJ_kWh; lognormal variance with pedigree 0.078025, pedigree (3,5,4,2,1)
  Based on available literature
  Amount was scaled to the amount of reference product.
- Acrolein [air, non-urban air or from high stacks]: 0 kg; name acrolein; pedigree (1,1,3,1,1)
  Literature value/calculated value. Emissions when producing 1kWh of electricity from hard coal, based on the value for burning 1MJ of hard coal. Weighted average with electricity production data (Itten&Frischknecht 2012) and emission values of 14 countries
  (AT, BE, ES, FR, IT, NL, PT, DE, CZ, HR, PL, SK, CN, US) (Röder et al. 2007)
  Country emissions values based on literature.
  Source:
  Itten R. and Frischknecht R. (2012) Life Cycle Inventories of Electricity Mixes and Grid. ESU-services Ltd., Uster, Switzerland.
- Dioxins, measured as 2,3,7,8-tetrachlorodibenzo-p-dioxin [air, non-urban air or from high stacks]: 6.73797e-14 kg; name dioxins; = 7E-15 * factor_MJ_kWh; lognormal variance with pedigree 0.338025, pedigree (3,5,4,2,1)
  Based on available literature
  Amount was scaled to the amount of reference product.
- Chloroform [air, non-urban air or from high stacks]: 0 kg; name chloroform; pedigree (1,1,3,1,1)
  (same comment as for Carbon disulfide)
- Cobalt [air, non-urban air or from high stacks]: 1.19358e-8 kg; name cobalt; = 1.24E-09 * factor_MJ_kWh; lognormal variance with pedigree 0.732, pedigree (5,1,3,1,1)
  (same comment as for Selenium)
- Barium [air, non-urban air or from high stacks]: 2.26203e-7 kg; name barium; = 2.35E-08 * factor_MJ_kWh; lognormal variance with pedigree 0.732, pedigree (5,1,3,1,1)
  (same comment as for Selenium)
- Hydrocarbons, aliphatic, alkanes, unspecified [air, non-urban air or from high stacks]: 2.10802e-6 kg; name hydrocarbons_al_al_unspec; = 2.19E-07 * factor_MJ_kWh; lognormal variance with pedigree 0.078025, pedigree (3,5,4,2,1)
  Based on available literature
  Amount was scaled to the amount of reference product.
- Hydrogen fluoride [air, non-urban air or from high stacks]: 2.62781e-5 kg; name hydrogen_fluoride; = 2.73E-06 * factor_MJ_kWh; lognormal variance with pedigree 0.202, pedigree (5,1,3,1,1)
  (same comment as for Selenium)
- Chromium VI [air, non-urban air or from high stacks]: 2.49305e-9 kg; name chromium_vi; = 2.59E-10 * factor_MJ_kWh; lognormal variance with pedigree 0.482, pedigree (1,1,3,1,1)
  based on range of data
  Amount was scaled to the amount of reference product.
- Carbon monoxide, fossil [air, non-urban air or from high stacks]: 7.70053e-5 kg; name carbon_monoxide_fossil; = 8E-06 * factor_MJ_kWh; lognormal variance with pedigree 0.672025, pedigree (3,4,4,2,1)
  Based on available literature
  Amount was scaled to the amount of reference product.
- Methane, fossil [air, non-urban air or from high stacks]: 9.62567e-6 kg; name methane_fossil; = 1E-06 * factor_MJ_kWh; lognormal variance with pedigree 0.072025, pedigree (3,4,4,2,1)
  Based on available literature
  Amount was scaled to the amount of reference product.
- Radon-222 [air, non-urban air or from high stacks]: 0.00625668 kBq; name radon_222; = 0.00065 * factor_MJ_kWh; lognormal variance with pedigree 0.382, pedigree (5,1,3,1,1)
  (same comment as for Selenium)
- Aldehydes, unspecified [air, non-urban air or from high stacks]: 0 kg; name aldehydes_unspecified; pedigree (1,1,3,1,1)
  (same comment as for Acrolein)
- Radon-220 [air, non-urban air or from high stacks]: 0.00352299 kBq; name radon_220; = 0.000366 * factor_MJ_kWh; lognormal variance with pedigree 0.382, pedigree (5,1,3,1,1)
  (same comment as for Selenium)
- Copper [air, non-urban air or from high stacks]: 6.4877e-8 kg; name copper; = 6.74E-09 * factor_MJ_kWh; lognormal variance with pedigree 0.732, pedigree (5,1,3,1,1)
  (same comment as for Selenium)
- Beryllium [air, non-urban air or from high stacks]: 0 kg; name beryllium; pedigree (1,1,3,1,1)
  (same comment as for Carbon disulfide)
- Benzene [air, non-urban air or from high stacks]: 2.08877e-6 kg; name benzene; = 2.17E-07 * factor_MJ_kWh; lognormal variance with pedigree 0.078025, pedigree (3,5,4,2,1)
  Based on available literature
  Amount was scaled to the amount of reference product.
- Benzene, ethyl- [air, non-urban air or from high stacks]: 0 kg; name benzene_ethyl; pedigree (1,1,3,1,1)
  (same comment as for Carbon disulfide)
- Actinides, radioactive, unspecified [air, non-urban air or from high stacks]: 0 kBq; name actinides_radioactive_unspecified; pedigree (1,1,3,1,1)
  (same comment as for Acrolein)
- Dinitrogen monoxide [air, non-urban air or from high stacks]: 4.81283e-6 kg; name dinitrogen_monoxide; = 5E-07 * factor_MJ_kWh; lognormal variance with pedigree 0.072025, pedigree (3,4,4,2,1)
  Based on available literature
  Amount was scaled to the amount of reference product.
- Carbon dioxide, fossil [air, non-urban air or from high stacks]: 0.895187 kg; name carbon_dioxide_fossil; = 0.093 * factor_MJ_kWh; lognormal variance with pedigree 0.004, pedigree (3,1,3,1,1)
  Based on available literature
  Amount was scaled to the amount of reference product.
- Potassium-40 [air, non-urban air or from high stacks]: 3.87914e-5 kBq; name potassium_40; = 4.03E-06 * factor_MJ_kWh; lognormal variance with pedigree 0.382, pedigree (5,1,3,1,1)
  (same comment as for Selenium)
- Iodine [air, non-urban air or from high stacks]: 2.8107e-6 kg; name iodine; = 2.92E-07 * factor_MJ_kWh; lognormal variance with pedigree 0.202, pedigree (5,1,3,1,1)
  (same comment as for Selenium)
- Water [air, unspecified]: 0.00132834 m3; name water_to_air_unspecified; = (water_softened_input/1000)*fraction_WCS_to_air+(water_decarbonised_input/1000)*fraction_WDC_to_air+water_cooling_UNO_input*fraction_CW_to_air; lognormal variance with pedigree 0.098025, pedigree (4,4,4,2,4)
  (same comment as for Water)
  property fraction, origin: fresh water 0.0338067; name fraction_origin_fresh_water
  property fraction, origin: unspecified 0.966193; name fraction_origin_unspecified
  property fraction, origin: salt water 0; name fraction_origin_salt_water
- Particulates, > 2.5 um, and < 10um [air, non-urban air or from high stacks]: 2.33904e-5 kg; name particulates_2_5_to_10; = 2.43E-06 * factor_MJ_kWh; source Itten R. 2012; lognormal variance with pedigree 0.202, pedigree (5,1,3,1,1)
  (same comment as for SOx retained, in hard coal flue gas desulfurisation)
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
## Sampling procedure
literature and statistics

## Extrapolations
Data from 1993 have been updated for the years 2000 (v1.0), and 2004-2005 (v2.0). Uncertainty was adjusted accordingly.

## Review by Carl Vadenbo 2015-07-23
The update of the whole electricity sector for the ecoinvent v3.2 database consist of hundreds of datasets. All these datasets have passed through a streamlined review processes where the underlying modelling of production volumes, technology shares and efficiencies was reviewed in detail prior to the datasets being submitted to the database.
