# particle board production, for indoor use, from virgin wood

Dataset: EcoSpold 2, unit process
Geography: RoW
Time period: 2000-01-01 to 2019-12-31
Technology level: current
Classification: EcoSpold01Categories: wooden materials/extraction
Classification: ISIC rev.4 ecoinvent: 1621:Manufacture of veneer sheets and wood-based panels
Synonyms: Particleboard; Medium density particleboard (MDP) production
Scenario: Business-as-Usual
System model: Allocation at the point of substitution
Generated by: Diogo Silva
Database: ecoinvent
isCopyrightProtected: true
accessRestrictedTo: 1

## General comment
This dataset represents particleboard production (uncoated), for indoor use (furniture industry), from virgin wood (eucalyptus species). This dataset was extrapolated from the Brazilian dataset of the same name. Default properties of the products are kept.

## Included activities start
From reception of raw materials at the factory gate. Includes the inputs to the production processes and the main process emissions.

## Included activities end
Until and including loading of the product on lorries. Capital goods, such as industrial machinery and infrastructure, as well as personnel activities, for instance, transport of workers to and from the workplace, were not included within the system boundary.

## Geography
Average of data from Germany and Brazil.

## Technology
Particleboard production is characterized by the use of wood coming from dedicated eucalyptus plantations. The main activities included in the industrial production are: reception and storage of wood logs; production, drying and classification of particles; blending; mat forming and pressing; and finishing. Stored wood logs are debarked and chips and flakes are produced using choppers and ring flakers. The wood particles are then dried and classified. The larger particles form the internal layer of the panel, while the smaller ones are incorporated in the external layers. Bark and other wood residues from the manufacturing process as well as heavy fuel oil are burned to produce hot gas for particle drying and hot pressing processes. The dried particles are then blended with the synthetic adhesive and a mat of glued particles is made using feeding machines which form the three layers of the panel. The next steps are the pre-pressing and hot pressing (160-200ºC) of the mat to consolidate the panel. Afterwards, the panel is cut to the final dimensions and sanded.

## Parameters
- fraction, cooling water, recirculating system, to air: 0.771; name fraction_CW_R_to_air; lognormal variance with pedigree 0.0413, pedigree (2,3,1,3,1)
  Calculated based on literature value (Scown, C.D., 2011, Water Footprint of U.S. Transportation Fuels and supplying information of the article) (Vionnet, S., Quantis Water Database - Technical Report, 2012).
- fraction, cooling water, cooling pond system, to air: 0.032; lognormal variance with pedigree 0.0413, pedigree (2,3,1,3,1)
- fraction, cooling water, to air: 0.3875; name fraction_CW_to_air; = (0.5*fraction_CW_OT_to_air)+(0.5*fraction_CW_R_to_air); lognormal variance with pedigree 0.092025, pedigree (4,4,3,2,4)
  Calculated value based on literature value (see comments of the other parametres present in this dataset) and expert opinion. In the case when no industry/literature data are available about the type of cooling or directly fraction, cooling water, to air specific for the process a default assumption is applied. It is assumed that the once-through cooling system is used in 50% of all cases and recirculating system is used in another 50% of all cases.
- fraction, cooling water, once-through system, to air: 0.004; name fraction_CW_OT_to_air; lognormal variance with pedigree 0.0413, pedigree (2,3,1,3,1)
  (same comment as for fraction, cooling water, recirculating system, to air)

## Reference product
- particle board, for indoor use: 1 m3; CPC 31431: Particle board; By-product classification allocatable product
  production volume 1.49607e7 m3; = 1.6623E+06*(1/0.1)
    Calculated based on literature value and expert judgement.
    1.6623E+06 m3/year is the annual production volume of particle board, for indoor use. It is estimated, that the barzilian production represents 10% of global production.
  property water in wet mass 42 kg; = Ref('67f102e2-9cb6-4d20-aa16-bf74d8a03326', '7b166e36-2af7-4400-88f9-9c15f02c4a54')- Ref('3a0af1d6-04c3-41c6-a3da-92c4f61e0eaa', '7b166e36-2af7-4400-88f9-9c15f02c4a54')
  property water content 0.0658307; = Ref('6d9e1462-80e3-4f10-b3f4-71febd6f1168', '7b166e36-2af7-4400-88f9-9c15f02c4a54')/ Ref('3a0af1d6-04c3-41c6-a3da-92c4f61e0eaa', '7b166e36-2af7-4400-88f9-9c15f02c4a54')
  property price 217 EUR2005
    Export prices for the World+ according to: http://faostat.fao.org/site/626/DesktopDefault.aspx?PageID=626#ancor downloaded 28 April 2009; calculated as export value divided by export volume.
  property carbon content 0.493291
    carbon content on a dry matter basis (reserved; not for manual entry)
  property true value 217
    allocation property applied in "true value" allocation // value calculated from revenue
  properties: wet mass 680 kg, carbon content, non-fossil 0.446121, dry mass 638 kg, carbon content, fossil 0.0471697, carbon allocation 314.72 kg

## By-products
- heat, for reuse in municipal waste incineration only: 0 MJ; CPC 17300: Steam and hot water; By-product classification allocatable product; pedigree (1,1,1,1,1)
  Net electricity generated from this waste and used in internal MSWI plant energy redistribution.
  Uncertainty: uncertainty is calculated from uncertainties in waste composition and uncertainties in energy efficiency and the uncertainty in internal energy demand
  production volume 5.11161e8 MJ
  property exergy 0.1842 MJ; name E_th_prod_MSWI_exergy
    This exergy property is based on the exergy content of the product.
  property price 0.0106 EUR2005; name E_th_prod_MSWI_price_EUR2005
    Average European district heat price from Ecoheatcool and Euroheat 2005-2006, Ecoheat Work package 1: The European heat market. Final report. 10.6 EUR/GJ i s the price of district heat. http://www.solarthermalworld.org/files/Ecoheatcool%20WP1%20Web.pdf?download
  property true value relation 0.1842; name E_th_prod_MSWI_true_value_relation
    property to calculate "true value" from
  property true value 0.19342
    allocation property applied in "true value" allocation // value calculated from true value relation
- electricity, for reuse in municipal waste incineration only: 0 kWh; CPC 17100: Electrical energy; By-product classification allocatable product; pedigree (1,1,1,1,1)
  (same comment as for heat, for reuse in municipal waste incineration only)
  production volume 7.06499e7 kWh
  property true value relation 3.6; name E_el_prod_MSWI_true_value_relation
    property to calculate "true value" from
  property price 0.1 EUR2005; name E_el_prod_MSWI_price_EUR2005
    Estimated to be the same price as in case of electricity, medium voltage.
  property exergy 3.6 MJ; name E_el_prod_MSWI_exergy
    This exergy property is based on the exergy content of the product.
  property true value 0.522478
    (same comment as for heat, for reuse in municipal waste incineration only)

## Inputs from technosphere
- waste wood, untreated: 0 kg
  Estimate. The value is extrapolated from the particle board production, for indoor use, from virgin wood, BR (Brazil).
  production volume 0 kg
    Calculated from production volume of reference product using the relative outputs.
  properties: wet mass 1 kg, carbon content, non-fossil 0.48632, water content 0.25, dry mass 0.8 kg
- wooden board factory, organic bonded boards: 3.31905e-8 unit; lognormal variance with pedigree 0.56, pedigree (5,5,5,5,5)
  Estimate. The value is extrapolated from the particle board production, for indoor use, from virgin wood, BR (Brazil).
  EcoSpold01Location=RER
- ammonium sulfate, as N: 1.37546 kg; lognormal variance with pedigree 0.2106, pedigree (5,5,5,5,5)
  (same comment as for waste wood, untreated)
  properties: dry mass 1 kg, wet mass 1 kg
- electricity, medium voltage: 0 kWh; pedigree (1,1,1,1,1)
  EcoSpold01Location=UCTE
  Estimate. The value is extrapolated from the particle board production, for indoor use, from virgin wood, BR (Brazil).
- wood ash mixture, pure: 0 kg; pedigree (1,1,1,1,1)
  (same comment as for waste wood, untreated)
  production volume 0 kg
    Calculated from production volume of reference product using the relative outputs.
  properties: dry mass 1 kg, carbon content, non-fossil 0.012, wet mass 1 kg
- heavy fuel oil: 0 kg; pedigree (1,1,1,1,1)
  (same comment as for waste wood, untreated)
  properties: wet mass 1 kg, carbon content, fossil 0.849, dry mass 1 kg
- diesel: 0 kg; pedigree (1,1,1,1,1)
  (same comment as for waste wood, untreated)
  properties: wet mass 1 kg, dry mass 1 kg, carbon content, fossil 0.865
  note on carbon content, fossil: C-content of diesel is 86.5% (ecoinvent v2.2 report 6_IV, Tab 3.14)
- lubricating oil: 0.0179408 kg; lognormal variance with pedigree 0.2106, pedigree (5,5,5,5,5)
  (same comment as for waste wood, untreated)
  properties: carbon content, fossil 0.75, wet mass 1 kg, dry mass 1 kg
  note on carbon content, fossil: Lubricating oil is produced from diesel. C-content/dry mass of fats and oils considered 75%, from: ecoinvent v2.2 report, n 15a, pg 40
- roundwood, eucalyptus ssp. from sustainable forest management, under bark: 1.30071 m3; name roundwood_eucalyptus_input; lognormal variance with pedigree 0.2106, pedigree (5,5,5,5,5)
  (same comment as for waste wood, untreated)
  property dry mass 793 kg; name DM_eucalyptus
  property wet mass 1186 kg; name WM_eucalyptus; = Ref('3a0af1d6-04c3-41c6-a3da-92c4f61e0eaa', 'c31db099-6057-44ea-9e60-d150cc35cb1e')+ Ref('6d9e1462-80e3-4f10-b3f4-71febd6f1168', 'c31db099-6057-44ea-9e60-d150cc35cb1e')
  property water content 0.495586; name U_eucalyptus; = WWM_eucalyptus/ DM_eucalyptus
  property water in wet mass 393 kg; name WWM_eucalyptus
  property bark 0.1; name roundwood_eucalyptus_input_bark
  properties: carbon content, non-fossil 0.494
  note on bark: The bark of eucalyptus is app. 10% (68.72kg) of the eucalyptus wood, under bark. This amount represents wood with a dry mass of 1.
- urea formaldehyde resin: 71.4642 kg; lognormal variance with pedigree 0.31, pedigree (5,5,5,5,5)
  (same comment as for wooden board factory, organic bonded boards)
  properties: wet mass 1 kg, dry mass 1 kg, carbon content, fossil 0.408958
  note on carbon content, fossil: Chemical formula of the urea formaldehide monomer was assumed to be C3H8N2O
- bark chips, wet, measured as dry mass: 19.1867 kg; name bark_input; = 38.5/2; lognormal variance with pedigree 0.2106, pedigree (5,5,5,5,5)
  (same comment as for waste wood, untreated)
  property water in wet mass 1.4 kg; name bark_input_WWM
  properties: wet mass 2.4 kg, water content 1.4, dry mass 1 kg, carbon content, non-fossil 0.494
- wastewater from particle board production: -0.00598027 m3; name wastewater_output; lognormal variance with pedigree 0.212, pedigree (5,5,5,5,5)
  Estimate. The value is extrapolated from the particle board production, for indoor use, from virgin wood, BR (Brazil).
  EcoSpold01Location=CH
  production volume 89764.5 m3; = (Ref('d541803b-2c6d-471d-9567-78968430b840')*-1)/ Ref('7b166e36-2af7-4400-88f9-9c15f02c4a54')* Ref('7b166e36-2af7-4400-88f9-9c15f02c4a54', 'ProductionVolume')
    Calculated from production volume of reference product using the relative outputs.
  property price 0 EUR2005; name wastewater_output_price_EUR2005
  properties: dry mass 0.337476 kg, wet mass 1000 kg, carbon content, non-fossil 0.377131, water content 2962.17
  note on carbon content, non-fossil: BOD= 0.196 kg/m3 (Tab A.17, ecoinvent v2.2 report 13_I). BOD was converted to TOC, using conversion factors in Tab 4.10 (ecoinvent v2.2 report 13_IV). TOC was considered as Total Carbon.
- slab and siding, softwood, wet, measured as dry mass: 19.1867 kg; name slab_input; = 38.5/2; lognormal variance with pedigree 0.2106, pedigree (5,5,5,5,5)
  (same comment as for waste wood, untreated)
  property water in wet mass 0.7 kg; name slab_input_WWM
  properties: wet mass 1.7 kg, water content 0.7, carbon content, non-fossil 0.494, dry mass 1 kg
- paraffin: 5.45201 kg; lognormal variance with pedigree 0.31, pedigree (5,5,5,5,5)
  (same comment as for wooden board factory, organic bonded boards)
  properties: wet mass 1 kg, dry mass 1 kg, carbon content, fossil 0.847059
  note on carbon content, fossil: An average composition of C12H26 (molecular weight of 170 g/mol) was assumed for n-parafins, after ecoinvent v2.2 report 8, part II, pg 398
- waste wood, untreated: -0.777927, -0.0568752, -2.18496, -0.330095, -0.521853, -9.88769, -83.121 kg (7 entries)
  (same comment as for waste wood, untreated)
  production volume 1.45418e9 kg
- electricity, medium voltage: 1.58224, 0.287901, 6.64559, 4.88236, 70.7892, 22.9855, 33.1941 kWh (7 entries); lognormal variance with pedigree 0.21, pedigree (5,5,5,5,5)
  (same comment as for electricity, medium voltage)
- wood ash mixture, pure: -0.00777699, -0.380941 kg (2 entries); lognormal variance with pedigree 0.2106, pedigree (5,5,5,5,5)
  (same comment as for waste wood, untreated)
  production volume 5.83469e6 kg
- heavy fuel oil: 0.153858, 0.455478, 0.0895937, 0.114936, 2.19362, 10.6475 kg (6 entries); lognormal variance with pedigree 0.2106, pedigree (5,5,5,5,5)
  (same comment as for waste wood, untreated)
- diesel: 0.0031032, 0.130277, 0.00912539, 0.0131897, 0.272227, 1.28642 kg (6 entries); lognormal variance with pedigree 0.2106, pedigree (5,5,5,5,5)
  (same comment as for waste wood, untreated)

## Inputs from nature
- Water, cooling, unspecified natural origin [natural resource, in water]: 0.0901027 m3; name water_cooling_UNO_input; source Wilson, J.B. 2009; lognormal variance with pedigree 0.22, pedigree (5,5,5,5,5)
  (same comment as for waste wood, untreated)

## Emissions to nature
- Formaldehyde [air, unspecified]: 0.149507 kg; lognormal variance with pedigree 0.25, pedigree (5,5,5,5,5)
  (same comment as for waste wood, untreated)
- Carbon dioxide, fossil [air, unspecified]: 47.9299 kg; lognormal variance with pedigree 0.2106, pedigree (5,5,5,5,5)
  (same comment as for waste wood, untreated)
- Formaldehyde [water, unspecified]: 7.276e-5 kg; lognormal variance with pedigree 0.25, pedigree (5,5,5,5,5)
  (same comment as for waste wood, untreated)
- Water [water, unspecified]: 0.0492077 m3; name water_to_water_unspecified; = water_cooling_UNO_input*(1-fraction_CW_to_air)-(wastewater_output*-1); lognormal variance with pedigree 0.25, pedigree (5,5,5,5,5)
  (same comment as for waste wood, untreated)
  property carbon content, non-fossil 0; name C_content_non_fossil
  property water in wet mass 1000 kg; name WWM
  property carbon content, fossil 0; name C_content_fossil
  property dry mass 0 kg; name DM
  property wet mass 1000 kg; name WM
- Water [air, unspecified]: 0.531238 m3; name water_to_air_unspecified; = (water_cooling_UNO_input*fraction_CW_to_air)+(slab_input* slab_input_WWM/1000*0.9)+(bark_input* bark_input_WWM/1000*0.9)+(roundwood_eucalyptus_input* WWM_eucalyptus/1000*0.9); lognormal variance with pedigree 0.25, pedigree (5,5,5,5,5)
  (same comment as for waste wood, untreated)
- Carbon monoxide, fossil [air, unspecified]: 0.00962525 kg; lognormal variance with pedigree 0.86, pedigree (5,5,5,5,5)
  (same comment as for waste wood, untreated)
- Methane, fossil [air, urban air close to ground]: 0.00168444 kg; lognormal variance with pedigree 0.25, pedigree (5,5,5,5,5)
  (same comment as for waste wood, untreated)
- Hydrocarbons, aliphatic, alkanes, unspecified [air, unspecified]: 0.00163461 kg; lognormal variance with pedigree 0.25, pedigree (5,5,5,5,5)
  (same comment as for waste wood, untreated)
- Carbon monoxide, non-fossil [air, unspecified]: 1.82398 kg; lognormal variance with pedigree 0.86, pedigree (5,5,5,5,5)
  (same comment as for waste wood, untreated)
- Particulates, > 10 um [air, unspecified]: 0.0797369 kg; lognormal variance with pedigree 0.25, pedigree (5,5,5,5,5)
  (same comment as for waste wood, untreated)
- Particulates, < 2.5 um [air, unspecified]: 0.0199342 kg; lognormal variance with pedigree 0.51, pedigree (5,5,5,5,5)
  (same comment as for waste wood, untreated)
- Nitrogen oxides [air, unspecified]: 0.179408 kg; lognormal variance with pedigree 0.25, pedigree (5,5,5,5,5)
  (same comment as for waste wood, untreated)
- Sulfur dioxide [air, urban air close to ground]: 1.30569 kg; lognormal variance with pedigree 0.2106, pedigree (5,5,5,5,5)
  (same comment as for waste wood, untreated)
- Particulates, > 2.5 um, and < 10um [air, unspecified]: 0.0797369 kg; lognormal variance with pedigree 0.51, pedigree (5,5,5,5,5)
  (same comment as for waste wood, untreated)
- Carbon dioxide, non-fossil [air, unspecified]: 140.487 kg; lognormal variance with pedigree 0.2106, pedigree (5,5,5,5,5)
  (same comment as for waste wood, untreated)
- NMVOC, non-methane volatile organic compounds, unspecified origin [air, unspecified]: 0.358816 kg; lognormal variance with pedigree 0.25, pedigree (5,5,5,5,5)
  (same comment as for waste wood, untreated)
- Suspended solids, unspecified [water, unspecified]: 0.0243198 kg; lognormal variance with pedigree 0.25, pedigree (5,5,5,5,5)
  (same comment as for waste wood, untreated)
- Sulfur trioxide [air, unspecified]: 0.0170438 kg; lognormal variance with pedigree 0.2106, pedigree (5,5,5,5,5)
  (same comment as for waste wood, untreated)
- Oils, unspecified [soil, industrial]: 0.0158477 kg; lognormal variance with pedigree 0.25, pedigree (5,5,5,5,5)
  (same comment as for waste wood, untreated)

## Sampling procedure
This dataset has been copied from an original dataset covering the geography BR.

## Extrapolations
see Geography and Technology This dataset has been copied from an original dataset covering the geography BR. The uncertainty has been adjusted accordingly.

## Review by Emilia Moreno Ruiz 2014-06-20
wood fuel, softwood, wet, measured as solid wood under bark input replaced
