# concrete production 35MPa

Dataset: EcoSpold 2, unit process
Geography: CA-QC
Time period: 2006-01-01 to 2019-12-31
Technology level: current
Classification: ISIC rev.4 ecoinvent: 2395:Manufacture of articles of concrete, cement and plaster
Classification: EcoSpold01Categories: construction materials/concrete
Synonyms: ready-mix concrete; ready mixed concrete
Scenario: Business-as-Usual
System model: Allocation at the point of substitution
Generated by: Geneviève Martineau
Published in: Marceau 2006
Database: ecoinvent
isCopyrightProtected: true
accessRestrictedTo: 1

## General comment
This dataset represents the production of Quebec 35 MPa ready-mix concrete. Density: 2'315 kg/m³. Ingredients (for 1 m³): Cement 312 kg, Water 162 kg, Gravel 950 kg, Sand 815 kg, Fly ash, Silica fume or Blast furnace slag 73 kg, Admixtures (air-entrainers, water reducing admixture and superplastisizers) 3kg. 35 MPa concrete is intended for structurally reinforced commercial and industrial usage, exposed to chlorides and freezing and thawing conditions (e.g. bridge, decks, parking decks and ramps, etc.) (following the Canadian CSA specs - http://www.rmcao.org/sites/default/files/CSA%20Quickspec%202012.pdf).

Generic concrete mixes (cement, SCM, aggregate, water, admixtures) provided by the Technical Committee of Association Béton Québec (Canada) (Recipe compliant with Quebec standards for Work of art concrete, Ministère des transports du Québec - Ministry of Transport, Québec- Canada).
The average water consumption (not including batch water) is 65 L/m³ of ready mixed concrete. The average amount of water disposed is 35 L/m³. Water not discarded is recycled back into the process or into other products, and therefore not accounted for in this dataset.

Annual production volume of Ready-Mix concrete for North America estimated based on US production, and GDP ratio.
Distribution by ready-mix strength class estimated as:
- 20 MPa = 20%
- 25 MPa = 40%
- 30-32 MPa = 15%
- 35 MPa = 24%
- 50 MPa = 1%
(coherent with distribution presented in http://www.ermco.eu/documents/ermco-documents/ermco_-statistics2008_091310.pdf (Table 3)

[This dataset is meant to replace the following datasets:
- concrete production 35MPa, RNA only, CA-QC, 2006 - 2006]

## Included activities start
From reception of raw materials at the ready-mix plant gate.

## Included activities end
This activity ends before the delivery of concrete at the construction site.
The dataset includes the whole manufacturing processes to produce ready-mixed concrete, internal processes (material handling and mixing) and infrastructure.
The dataset does not include:
- the fly ash content of the concrete. This value is specified in the Exchange properties of the reference flow. This flow is currently not included as an input material, due to temporary technical problems (fly ash being a waste, to include it as an input would make concrete production a combined production). When this issue is solved, an input of 'fly_ash*(1+Waste/Ref_WM)' of fly ash should be added. This mathematical relation is used in order to take into account the fraction of cement that is never used.
- the transport of concrete in a mixing truck. The combustion of 5.74 litres of diesel should be used to take into account the average transportation of 1m³ of concrete.

## Geography
Quebec data. For some exchanges RNA or RER-modules have been used. Data quality indicators adjusted accordingly.

## Technology
Typical technology for average North American production. Data quality indicators adjusted accordingly.

## Parameters
- fraction of 35 MPa concrete to overall concrete production: 0.24 dimensionless; name fraction_35MPa_concrete; lognormal variance with pedigree 0.0014, pedigree (2,2,1,3,1)
  For Annual production volume purpose.Estimated value for Quebec: 35MPa concrete represent 24% of the overall ready-mix concrete production. Source; Personal communication, ABQ (Association Béton Québec), October 2013.
- fraction: 0 dimensionless
  Estimated value. In Quebec, Canada, 35MPa concrete represent 24% of the ready-mix production. Source; Personal communication, ABQ (Association Béton Québec), October 2013.
- quebec production volume in cubic meter: 4.7e6 m3; name PV_ready_mix_Qc; lognormal variance with pedigree 0.0026, pedigree (3,1,1,1,1)
  Estimated value, from Association Béton Québec (2008). Source: http://www.betonabq.org/images/fichiers_documents/rapport%20annuel%202008.pdf
- fraction_02: 0.2 dimensionless; name fraction_acetic_acid; lognormal variance with pedigree 0.0427, pedigree (3,1,1,3,4)
  Literature value. Superplastisizer assumed to be 20% acetic acid. Extrapolated from 20 MPa mix admixtures. Source: Athena and morrison Hershfield (2012): Life Cycle Assessment of Precast Concrete Commerical Buildings Cradle-to-Grave
- fraction, process water, to air: 0.15 dimensionless; name fraction_PW_to_air; lognormal variance with pedigree 0.0226, pedigree (4,4,3,5,3)
  Rough estimation to represent water evaporation of process water.
- north america production volume in cubic meter: 1.36778e8 m3; name PV_ready_mix_RNA; = 270E09/2350/0.84; lognormal variance with pedigree 0.0033, pedigree (3,2,1,1,2)
  Based on U.S. Ready-Mix concrete production in 2008 (270 Mt, assuming an average density of 2350 kg/m³), Literature value from: Sakai, K and Noguchi, T. (2012) The Sustainable Use of Concrete. CRC Press, 188 pages. (p.27).
- superplastisizer: 1.75 kg; lognormal variance with pedigree 0.0029, pedigree (3,2,2,1,1)
  Estimated value by Association Béton Québec Technical Committee.
- fraction_01: 0.8 dimensionless; name fraction_ethylene_oxide; lognormal variance with pedigree 0.0427, pedigree (3,1,1,3,4)
  Literature value. Superplastisizer assumed to be 80% ehtlyne oxide. Extrapolated from 20 MPa mix admixtures. Source: Athena and morrison Hershfield (2012): Life Cycle Assessment of Precast Concrete Commerical Buildings Cradle-to-Grave

## Reference product
- concrete, 35MPa: 1 m3; name ref; CPC 37510: Non-refractory mortars and concretes; By-product classification allocatable product
  35 MPa concrete is intended for structurally reinforced commercial and industrial usage, exposed to chlorides and freezing and thawing conditions (e.g. bridge, decks, parking decks and ramps, etc.) (following the Canadian CSA specs - http://www.rmcao.org/sites/default/files/CSA%20Quickspec%202012.pdf)
  production volume 1.128e6 m3; name PV_ref; = fraction_35MPa_concrete* PV_ready_mix_Qc
    Considering North American production only, and a 20% proportion of ready-mix concrete of 35MPa strength class. See parameters and Activity Description for details.
  property wet mass 2312 kg; name ref_WM; = ref_WWM+ref_DM
  property price 185 EUR2005; name ref_price_EUR2005
    Estimated to be the same price as in case of concrete, normal (Data are not easily available. Therefore, an average price of products supplied by the activities in the same ISIC 3 code has been applied.This price is obtained as '_49 Concrete, asphalt and other mineral products, EU27 virgin, EU27' in the 'EU & DK Input Output Database' (available in SimaPro). The price is assumed to be valid for both RER2003, RER 2004, world 2003 and world 2004. Multiplied by density.).
  property sand content 815 kg; name sand
    Extrapolated value. Estimation for Quebec Province by Association Béton Québec Technical Committee - nov 2013.Based on Ministère des transports du Québec (Ministry of Transport, Québec- Canada). Recipe compliant with Quebec standards for Work of art concrete.
  property dry mass 2150 kg; name ref_DM; = sand+gravel+fly_ash+cement
  property fly ash content 73 kg; name fly_ash
    (same comment as for concrete, 35MPa)
  property water in wet mass 162 kg; name ref_WWM; = batch_water
  property gravel content 950 kg; name gravel
    (same comment as for concrete, 35MPa)
  property cement content 312 kg; name cement
    (same comment as for concrete, 35MPa)
  property carbon content, fossil 1e-51; name ref_C_content_fossil
    Estimated value to zero, based on components properties.
  property water content 0.0753488; name ref_water_content; = ref_WWM/ref_DM
  property carbon content 1e-51
    carbon content on a dry matter basis (reserved; not for manual entry)
  property true value 185; name ref_true_value
    allocation property applied in "true value" allocation // value calculated from revenue
  properties: carbon allocation 2.15e-48 kg

## By-products
- heat, for reuse in municipal waste incineration only: 0 MJ; CPC 17300: Steam and hot water; By-product classification allocatable product; pedigree (1,1,1,1,1)
  Net electricity generated from this waste and used in internal MSWI plant energy redistribution.
  Uncertainty: uncertainty is calculated from uncertainties in waste composition and uncertainties in energy efficiency and the uncertainty in internal energy demand
  production volume 2519.14 MJ
  property exergy 0.1842 MJ; name E_th_prod_MSWI_exergy
    This exergy property is based on the exergy content of the product.
  property price 0.0106 EUR2005; name E_th_prod_MSWI_price_EUR2005
    Average European district heat price from Ecoheatcool and Euroheat 2005-2006, Ecoheat Work package 1: The European heat market. Final report. 10.6 EUR/GJ i s the price of district heat. http://www.solarthermalworld.org/files/Ecoheatcool%20WP1%20Web.pdf?download
  property true value relation 0.1842; name E_th_prod_MSWI_true_value_relation
    property to calculate "true value" from
  property true value 1.47237e-5
    allocation property applied in "true value" allocation // value calculated from true value relation
- electricity, for reuse in municipal waste incineration only: 0 kWh; CPC 17100: Electrical energy; By-product classification allocatable product; pedigree (1,1,1,1,1)
  (same comment as for heat, for reuse in municipal waste incineration only)
  production volume 349.879 kWh
  property price 0.1 EUR2005; name E_el_prod_MSWI_price_EUR2005
    Estimated to be the same price as in case of electricity, medium voltage.
  property exergy 3.6 MJ; name E_el_prod_MSWI_exergy
    This exergy property is based on the exergy content of the product.
  property true value relation 3.6; name E_el_prod_MSWI_true_value_relation
    property to calculate "true value" from
  property true value 3.99666e-5
    (same comment as for heat, for reuse in municipal waste incineration only)

## Inputs from technosphere
- chemical, organic: 1.15 kg; lognormal variance with pedigree 0.0427, pedigree (3,2,5,1,1)
  Water reducing admixture (usually based on lignosulphonate). Estimated value for Quebec concrete by Association Béton Québec Technical Committee- (Nov 2013)
  properties: wet mass 1 kg, carbon content, fossil 0.628, dry mass 1 kg
  note on carbon content, fossil: This dataset is an unweighted average of 20 organic substances (listed in Tab 88.1, ecoinvent v2.2 report 8, part II), being part of the top100 chemicals included in this database. The C-content has also been calculated as an unweighted average of the C content of the substances composing this dataset.
- gravel, round: 960.067 kg; = gravel*(1+(Waste*-1)/Ref_WM); lognormal variance with pedigree 0.04, pedigree (1,1,5,1,1)
  Including waste concrete. See Exchange Properties
  Uncertainty: C
  properties: dry mass 1 kg, wet mass 1 kg
- waste concrete: -24.5 kg; name Waste; source Marceau, M.L. 2007; lognormal variance with pedigree 0.0507, pedigree (2,1,5,3,1)
  Literature value. Solid waste consists of concrete and small amounts of paste (cement and water after aggregate has been reclaimed)
  production volume 2.7636e7 kg; = PV_ref*Waste/ref
    Calculated from the production volume of reference product, in proportion to the respective output amounts.
  property price 0 EUR2005; name Waste_price_EUR2005
  properties: water content 0.0753488, dry mass 0.929931 kg, wet mass 1 kg, carbon content, fossil 1e-51
- synthetic rubber: 0.00713 kg; source Kellenberger D. 2007; lognormal variance with pedigree 0.0526, pedigree (2,1,5,5,1)
  Literature value. From ecoinvent dataset 'concrete production, normal'
  properties: carbon content, fossil 0.871949, wet mass 1 kg, dry mass 1 kg
  note on carbon content, fossil: EPDM (Ethylene-propene-diene terpolymer) rubber is a terpolymer of ethylene, propene, and a diene with the residual unsaturated portion of the diene in the side chain (ecoinvent v2.2 report 7-part XX & Ullmann). Chemical formula (deduced from Evidences of Solvent-Induced Miscibility in Polychloroprene-co-Ethylene-Propene Diene Terpolymer Blends, Dubey et al., Journal of Applied Polymer Science, 2009, 111:1884–1891): C20H35
- concrete mixing factory: 4.57e-7 unit; source Kellenberger D. 2007; lognormal variance with pedigree 0.3626, pedigree (2,1,5,5,1)
  Literature value. From ecoinvent dataset 'concrete production, normal'
- fatty alcohol: 0.18 kg; lognormal variance with pedigree 0.0427, pedigree (3,2,5,1,1)
  Air-entrainers. Estimated value for Quebec by Association Béton Québec Technical Committee- (Nov 2013)
  .
  properties: dry mass 1 kg, wet mass 1 kg, carbon content, non-fossil 0.743434, carbon content, fossil 0.0408973
- sand: 823.636 kg; = sand*(1+(Waste*-1)/Ref_WM); lognormal variance with pedigree 0.04, pedigree (1,1,5,1,1)
  Including waste concrete. See Exchange Properties
  Uncertainty: C
  properties: dry mass 1 kg, wet mass 1 kg
- steel, low-alloyed, hot rolled: 0.0238 kg; source Kellenberger D. 2007; lognormal variance with pedigree 0.0526, pedigree (2,1,5,5,1)
  Literature value. From ecoinvent dataset 'concrete production, normal'
  properties: wet mass 1 kg, dry mass 1 kg, carbon content, fossil 0.005
  note on carbon content, fossil: Low alloyed steel composition given in Tab. 3.2 ecoinvent v2.2 report 10_partII. Steel assumed to have a C content of 0.5%
- ethylene oxide: 1.4 kg; = fraction_ethylene_oxide*superplastisizer; lognormal variance with pedigree 0.04, pedigree (1,1,5,1,1)
  See parameters.
  Uncertainty: C
  properties: dry mass 1 kg, carbon content, fossil 0.545455, wet mass 1 kg
- wastewater from concrete production: -0.0348 m3; name WWater; source Marceau, M.L. 2007; lognormal variance with pedigree 0.0507, pedigree (2,1,5,3,1)
  Literature value. Table E1a.
  production volume 39254.4 m3; = PV_ref*WWater/ref
    (same comment as for waste concrete)
  property price 0 EUR2005; name WWater_price_EUR2005
  properties: dry mass 0.449139 kg, water content 2225.48, carbon content, fossil 0.027074, wet mass 1000 kg
  note on carbon content, fossil: TOC =0.01216 kg/m3 (Tab A.20, ecoinvent v2.2 report 13_I). TOC was considered as Total Carbon.
- electricity, medium voltage: 4.114 kWh; source Marceau, M.L. 2007; lognormal variance with pedigree 0.0581, pedigree (4,1,5,3,1)
  Literature value. Energy use in ready-mix plant.
  Uncertainty: T
- acetic acid, without water, in 98% solution state: 0.35 kg; = fraction_acetic_acid*superplastisizer; lognormal variance with pedigree 0.04, pedigree (1,1,5,1,1)
  See parameters
  Uncertainty: C
  property carbon content, fossil 0.400016; name AA_C_content_fossil
  properties: wet mass 1 kg, dry mass 1 kg
- diesel, burned in building machine: 15.6427 MJ; = diesel_input*1000*density_diesel*NHV_diesel; lognormal variance with pedigree 0.04, pedigree (1,1,5,1,1)
  See parameters. Energy use in ready-mix plant. Includes air emissions from diesel combustion.
  Uncertainty: C
  property density 0.84 kg/l; name density_diesel
  property net heating value 42.8 MJ/kg; name NHV_diesel
  property fuel input in physical units, m3 0.0004351 m3; name diesel_input; = 0.4351/1000
- cement, Portland: 315.306 kg; = cement*(1+(Waste*-1)/Ref_WM); lognormal variance with pedigree 0.04, pedigree (1,1,5,1,1)
  Including waste concrete. See Exchange Properties
  Uncertainty: C
  properties: wet mass 1 kg, dry mass 1 kg
- lubricating oil: 0.0119 kg; source Kellenberger D. 2007; lognormal variance with pedigree 0.0526, pedigree (2,1,5,5,1)
  Literature value. From ecoinvent dataset 'concrete production, normal'
  properties: dry mass 1 kg, carbon content, fossil 0.75, wet mass 1 kg
  note on carbon content, fossil: Lubricating oil is produced from diesel. C-content/dry mass of fats and oils considered 75%, from: ecoinvent v2.2 report, n 15a, pg 40
- tap water: 202.941 kg; = batch_water+non_process_water; lognormal variance with pedigree 0.04, pedigree (1,1,5,1,1)
  Water use in ready-mix plant, assumed to be sourced from municipal water system. See Exchange properties comment for Sources.
  Uncertainty: C
  property batch water 162 kg; name batch_water
  property non-process water, net 40.9412 kg; name non_process_water; = (WWater*-1)*1000/(1-fraction_PW_to_air)
  properties: wet mass 1 kg, dry mass 0.000337476 kg, carbon content, fossil 0.00178991, water content 2962.17
  note on batch water: Extrapolated value. Estimation for Quebec Province by Association Béton Québec Technical Committee - nov 2013.Based on Ministère des transports du Québec (Ministry of Transport, Québec- Canada). Recipe compliant with Quebec standards for Work of art concrete.
  note on non-process water, net: The average water consumption (not including batch water) is 65 L/m3 of ready mixed concrete. The average amount of water disposed is 34,8 L/m3. Water not discarded is recycled back into the process or into other products. Source: Athena (2005):Cement and Structural Concrete: LCI Update 2005 An amount of 15% water evaporated to air was assumed, in order to calculate to non-process water input.
  note on carbon content, fossil: Bicarbonate content is 2.93 mol/m3. CO2 content is 0.1 mol/m3 (ecoinvent v2.2 report 8, Tab 93.1).
- heat, district or industrial, natural gas: 10.6323 MJ; = natural_gas_input*NHV_natural_gas; lognormal variance with pedigree 0.04, pedigree (1,1,5,1,1)
  See parameters. Energy use in ready-mix plant. Includes air emissions from natural gas combustion.
  Uncertainty: C
  property fuel input in physical units, m3 0.2929 m3; name natural_gas_input
  property net heating value, per m3 36.3 MJ/m3; name NHV_natural_gas

## Emissions to nature
- Suspended solids, unspecified [water, unspecified]: 4.64e-7 kg; source Marceau, M.L. 2007; lognormal variance with pedigree 0.0413, pedigree (2,1,5,3,1)
  Literature value. Table E1a.
- Chlorides, unspecified [water, unspecified]: 3.09e-9 kg; source Marceau, M.L. 2007; lognormal variance with pedigree 0.0413, pedigree (2,1,5,3,1)
  Literature value. Table E1a.
- Iron, ion [water, unspecified]: 1.55e-8 kg; source Marceau, M.L. 2007; lognormal variance with pedigree 0.0413, pedigree (2,1,5,3,1)
  Literature value. Table E1a.
- Copper, ion [water, unspecified]: 1.55e-8 kg; source Marceau, M.L. 2007; lognormal variance with pedigree 0.0413, pedigree (2,1,5,3,1)
  Literature value. Table E1a.
- Water [air, unspecified]: 0.00614117 m3; = non_process_water/1000*fraction_PW_to_air; lognormal variance with pedigree 0.04, pedigree (1,1,5,1,1)
  Calculated value. See exchange propeties.
  Uncertainty: C
- Oils, unspecified [water, unspecified]: 2.32e-7 kg; source Marceau, M.L. 2007; lognormal variance with pedigree 0.0413, pedigree (2,1,5,3,1)
  Literature value. Table E1a.

## Sampling procedure
Data on process inputs were provided by the Technical Committee of Association Béton Québec (Canada). Water use is from Confidential Life Cycle Inventory Survey of Ready-Mix Concrete Plant (Marceau, VanGeem, and Ranchero 2006a). This survey was distributed to a sample of member-plants of the National Ready Mixed Concrete Association. The sample was chosen so that the plants in the sample are representative of climates of the conterminous United States and plant size in terms of production in cubic yards of ready mixed concrete. The sample consists of 47 plants.

## Extrapolations
This activity represents a Quebec concrete production. Some flows have been kept as in the original (European) ecoinvent dataset (infrastructure, lubricant, rubber, and steel). The uncertainty has been adjusted accordingly.
