# paper production, woodcontaining, supercalendered

Dataset: EcoSpold 2, unit process
Geography: CA-QC
Time period: 2000-01-01 to 2019-12-31
Technology level: current
Classification: EcoSpold01Categories: paper & cardboard/graphic paper
Classification: ISIC rev.4 ecoinvent: 1701:Manufacture of pulp, paper and paperboard
Tags: recontextualization
Scenario: Business-as-Usual
System model: Allocation at the point of substitution
Generated by: Pascal Lesage
Published in: Hischier R. 2007
Database: ecoinvent
isCopyrightProtected: true
accessRestrictedTo: 1

## General comment
[This dataset was already contained in the ecoinvent database version 2. It was not individually updated during the transfer to ecoinvent version 3. Life Cycle Impact Assessment results may still have changed, as they are affected by changes in the supply chain, i.e. in other datasets. This dataset was generated following the ecoinvent quality guidelines for version 2. It may have been subject to central changes described in the ecoinvent version 3 change report (http://www.ecoinvent.org/database/ecoinvent-version-3/reports-of-changes/), and the results of the central updates were reviewed extensively. The changes added e.g. consistent water flows and other information throughout the database. The documentation of this dataset can be found in the ecoinvent reports of version 2, which are still available via the ecoinvent website. The change report linked above covers all central changes that were made during the conversion process.]
Child dataset exchanges identical to GLO dataset. Created to enable linking to regional markets (e.g. for electricity). Data quality indicators adjusted accordingly.

## Included activities end
This dataset is a copy of the European production of SC paper - including transports to paper mill, wood handling, mechanical pulping and bleaching, deinking of waste paper, paper production, energy production on-site and internal waste water treatment. Not included is the transport of waste paper to the mill, as this is already included in the used waste paper datasets. A small amount of waste paper input (6.1% of output paper weight) has been included in the amount of pulp. The sorting of this paper and the related by-products have been excluded, since the sorting of unsorted paper takes place in a separate activity.

## Geography
Data from several European SC paper producers used as European average data.

## Technology
Average of present used technology

## Parameters
- fraction, cooling water, to air: 0.3875; lognormal variance with pedigree 0.092025, pedigree (4,4,3,2,4)
- fraction, process water, to air: 0.15 dimensionless; lognormal variance with pedigree 0.092025, pedigree (4,4,3,2,4)
- fraction, cooling water, cooling pond system, to air: 0.032; lognormal variance with pedigree 0.0413, pedigree (2,3,1,3,1)
- fraction, cooling water, once-through system, to air: 0.004; lognormal variance with pedigree 0.0413, pedigree (2,3,1,3,1)
- fraction, cooling water, recirculating system, to air: 0.771; lognormal variance with pedigree 0.0413, pedigree (2,3,1,3,1)

## Reference product
- paper, woodcontaining, supercalendered: 1 kg; name ref; CPC 321: Pulp, paper and paperboard; By-product classification allocatable product
  EcoSpold01Location=RER
  production volume 4.72e8 kg; name ref_PV
    FAO mechanical uncoated (= supercalendered). Production volume based on installed capacity in 2008 in Quebec.
  property price 0.572 EUR2005
    Export prices for the World+ according to: http://faostat.fao.org/site/626/DesktopDefault.aspx?PageID=626#ancor downloaded 6 May 2009; calculated as export value divided by export volume.
  property carbon content, non-fossil 0.289073
    Biogenic C content was calculated after biogenic C contents of chemicals used in the production of the paper (in Tab 8.24 ecoinvent v2.2 report 11_III, part 8). The cellulose content in 1 kg of paper (on a wet mas basis) was estimated as (1-chemical content), C content of cellulose was considered 0.44 kgC/kg dry mass (ecoinvent v2.2 report, n 15a, pg 40)
  property carbon content, fossil 0.0109646
    Fossil C content was calculated after fossil C contents of chemicals used in the production of the paper (in Tab 8.24 ecoinvent v2.2 report 11_III, part 8).
  property carbon content 0.300037
    carbon content on a dry matter basis (reserved; not for manual entry)
  property true value 0.572; name ref_true_value
    allocation property applied in "true value" allocation // value calculated from revenue
  properties: dry mass 0.945 kg, water in wet mass 0.055 kg, water content 0.0582011, wet mass 1 kg, carbon allocation 0.283535 kg

## By-products
- heat, for reuse in municipal waste incineration only: 0 MJ; CPC 17300: Steam and hot water; By-product classification allocatable product; pedigree (1,1,1,1,1)
  Net electricity generated from this waste and used in internal MSWI plant energy redistribution.
  Uncertainty: uncertainty is calculated from uncertainties in waste composition and uncertainties in energy efficiency and the uncertainty in internal energy demand
  production volume 130.252 MJ
  property exergy 0.1842 MJ; name E_th_prod_MSWI_exergy
    This exergy property is based on the exergy content of the product.
  property price 0.0106 EUR2005; name E_th_prod_MSWI_price_EUR2005
    Average European district heat price from Ecoheatcool and Euroheat 2005-2006, Ecoheat Work package 1: The European heat market. Final report. 10.6 EUR/GJ i s the price of district heat. http://www.solarthermalworld.org/files/Ecoheatcool%20WP1%20Web.pdf?download
  property true value relation 0.1842; name E_th_prod_MSWI_true_value_relation
    property to calculate "true value" from
  property true value 1.81523e-9
    allocation property applied in "true value" allocation // value calculated from true value relation
- electricity, for reuse in municipal waste incineration only: 0 kWh; CPC 17100: Electrical energy; By-product classification allocatable product; pedigree (1,1,1,1,1)
  (same comment as for heat, for reuse in municipal waste incineration only)
  production volume 18.3433 kWh
  property price 0.1 EUR2005; name E_el_prod_MSWI_price_EUR2005
    Estimated to be the same price as in case of electricity, medium voltage.
  property exergy 3.6 MJ; name E_el_prod_MSWI_exergy
    This exergy property is based on the exergy content of the product.
  property true value relation 3.6; name E_el_prod_MSWI_true_value_relation
    property to calculate "true value" from
  property true value 4.99619e-9
    (same comment as for heat, for reuse in municipal waste incineration only)

## Inputs from technosphere
- chemical, organic: 0.00802 kg; lognormal variance with pedigree 0.0426, pedigree (1,3,5,5,1)
  Average from several SC paper producers
  EcoSpold01Location=GLO
  Uncertainty: average from several SC paper producers
  properties: dry mass 1 kg, carbon content, fossil 0.628, wet mass 1 kg
  note on carbon content, fossil: This dataset is an unweighted average of 20 organic substances (listed in Tab 88.1, ecoinvent v2.2 report 8, part II), being part of the top100 chemicals included in this database. The C-content has also been calculated as an unweighted average of the C content of the substances composing this dataset.
- electricity, medium voltage: 1.51 kWh; lognormal variance with pedigree 0.0426, pedigree (1,3,5,5,1)
  EcoSpold01Location=NORDEL
  Average from several SC paper producers
  Uncertainty: average from several SC paper producers
- aluminium sulfate, powder: 0.0033 kg; lognormal variance with pedigree 0.0426, pedigree (1,3,5,5,1)
  Average from several SC paper producers
  EcoSpold01Location=RER
  Uncertainty: average from several SC paper producers
  properties: wet mass 1 kg, dry mass 1 kg
- kaolin: 0.221364 kg; lognormal variance with pedigree 0.0426, pedigree (1,3,5,5,1)
  EcoSpold01Location=RER
  Average from several SC paper producers
  Uncertainty: average from several SC paper producers
  properties: wet mass 1 kg, dry mass 1 kg
- pulpwood, softwood, measured as solid wood under bark: 0.0015947 m3; = 0.001401+0.0001937; lognormal variance with pedigree 0.0426, pedigree (1,3,5,5,1)
  average from several SC paper producers; includes a small amount of residual wood from ordinary softwood forestry
  EcoSpold01Location=RER
  Uncertainty: average from several SC paper producers
  properties: dry mass 450 kg, wet mass 1080 kg, water content 1.4, carbon content, non-fossil 0.494
  note on carbon content, non-fossil: C content of dry mass is 0.494 kgC/kg dry wood (ecoinvent v2.2 report 9)
- potato starch: 0.00921 kg; lognormal variance with pedigree 0.0426, pedigree (1,3,5,5,1)
  EcoSpold01Location=DE
  Average from several SC paper producers
  Uncertainty: average from several SC paper producers
  properties: dry mass 0.8 kg, water content 0.25, carbon content, non-fossil 0.46, wet mass 1 kg
  note on carbon content, non-fossil: C-content of starch is considered 46% on dry mass basis (from "Evolutionary and Biochemical Aspects", A.D. Kay and T. Vrede (in Global Ecology, 2010, Elsevier B.V., S.E. Jørgensen Ed.)).
- activated bentonite: 0.0002 kg; lognormal variance with pedigree 0.0426, pedigree (1,3,5,5,1)
  (same comment as for potato starch)
  properties: dry mass 1 kg, wet mass 1 kg
- wood ash mixture, pure: -0.0155 kg; name ash_mix; lognormal variance with pedigree 0.0426, pedigree (1,3,5,5,1)
  EcoSpold01Location=CH
  Average from several SC paper producers
  Uncertainty: average from several SC paper producers
  production volume 7.316e6 kg; = ref_PV*ash_mix/ref
    Calculated from the production volume of paper, woodcontaining, supercalendred in proportion to the respective output amounts.
  properties: dry mass 1 kg, wet mass 1 kg, carbon content, non-fossil 0.012
- municipal solid waste: -0.0003 kg; name msw; lognormal variance with pedigree 0.0426, pedigree (1,3,5,5,1)
  (same comment as for wood ash mixture, pure)
  production volume 141600 kg; = ref_PV*msw/ref
    (same comment as for wood ash mixture, pure)
  properties: wet mass 1 kg, dry mass 0.771 kg, carbon content, non-fossil 0.261655, carbon content, fossil 0.171549, water content 0.297017
  note on carbon content, non-fossil: MSW composition in tab 4.1, ecoinvent v2.2 report 13_I. C content referred to 1 kg DM
- sulfate pulp, bleached: 0.24605 kg; = (0.198+0.061)*0.95; lognormal variance with pedigree 0.0426, pedigree (1,3,5,5,1)
  average from several SC paper producers; includes a small amount of waste paper. pulp input is 5% unbleached pulp and 95% bleached pulp
  Uncertainty: average from several SC paper producers
  properties: dry mass 0.9 kg, wet mass 1 kg, water content 0.111111
- ash from deinking sludge: -0.00117 kg; name ash_deink_sludge; lognormal variance with pedigree 0.0426, pedigree (1,3,5,5,1)
  (same comment as for wood ash mixture, pure)
  production volume 552240 kg; = ref_PV*ash_deink_sludge/ref
    (same comment as for wood ash mixture, pure)
  properties: wet mass 1 kg, dry mass 1 kg
- ash from paper production sludge: -0.00414 kg; name ash_prod_sludge; lognormal variance with pedigree 0.0426, pedigree (1,3,5,5,1)
  (same comment as for wood ash mixture, pure)
  production volume 1.95408e6 kg; = ref_PV*ash_prod_sludge/ref
    (same comment as for wood ash mixture, pure)
  properties: wet mass 1 kg, dry mass 1 kg, carbon content, non-fossil 0.0092
- hazardous waste, for underground deposit: -0.0002 kg; name haz_waste; lognormal variance with pedigree 0.0426, pedigree (1,3,5,5,1)
  (same comment as for potato starch)
  production volume 94400 kg; = ref_PV*haz_waste/ref
    (same comment as for wood ash mixture, pure)
  properties: carbon content, fossil 0.554667, wet mass 1 kg, dry mass 1 kg
  note on carbon content, fossil: Tab A.6, ecoinvent v2.2 report 13_I, average hazardous waste composition was used, and referred to 0% water mass. No waste-specific emission are currently inventoried for underground deposits. Accordingly, no waste composition must be specified. For generic, average waste to underground deposit deposition in a 200 liter steel drum without cement solidification is assumed (ecoinvent v2.2 report 13_I).
- paper mill, integrated: 5.44e-11 unit; lognormal variance with pedigree 0.448, pedigree (4,5,5,5,5)
  Own assumption
  EcoSpold01Location=RER
  Uncertainty: own assumption
- urea, as N: 0.000235 kg; lognormal variance with pedigree 0.0426, pedigree (1,3,5,5,1)
  (same comment as for kaolin)
  properties: wet mass 1 kg, carbon content, fossil 0.2, dry mass 1 kg
- sodium dithionite, anhydrous: 0.00127 kg; lognormal variance with pedigree 0.0426, pedigree (1,3,5,5,1)
  (same comment as for kaolin)
  properties: wet mass 1 kg, dry mass 1 kg
- phosphoric acid, industrial grade, without water, in 85% solution state: 0.0001 kg; lognormal variance with pedigree 0.0426, pedigree (1,3,5,5,1)
  (same comment as for aluminium sulfate, powder)
  properties: wet mass 1 kg, dry mass 1 kg
- chlorine, liquid: 5e-5 kg; lognormal variance with pedigree 0.0426, pedigree (1,3,5,5,1)
  (same comment as for kaolin)
  properties: wet mass 1 kg, dry mass 1 kg
- heat, district or industrial, other than natural gas: 2.5873 MJ; lognormal variance with pedigree 0.0601, pedigree (1,2,5,5,3)
  Value according to CEPI energy report
  EcoSpold01Location=RER
  Uncertainty: value according to CEPI energy report
- chemical, inorganic: 0.00802 kg; lognormal variance with pedigree 0.0426, pedigree (1,3,5,5,1)
  EcoSpold01Location=GLO
  Average from several SC paper producers
  Uncertainty: average from several SC paper producers
  properties: wet mass 1 kg, carbon content, fossil 0.003, dry mass 1 kg
  note on carbon content, fossil: This dataset is an unweighted average of 20 inorganic substances (listed in Tab 88.1, ecoinvent v2.2 report 8, part II), being part of the top100 chemicals included in this database. The C-content has also been calculated as an unweighted average of the C content of the substances composing this dataset.
- heat, central or small-scale, other than natural gas: 0.2114 MJ; lognormal variance with pedigree 0.0601, pedigree (1,2,5,5,3)
  EcoSpold01Location=RER
  Value according to CEPI energy report
  Uncertainty: value according to CEPI energy report
- sulfate pulp, unbleached: 0.01295 kg; = (0.198+0.061)*0.05; lognormal variance with pedigree 0.0426, pedigree (1,3,5,5,1)
  (same comment as for sulfate pulp, bleached)
  properties: dry mass 0.9 kg, water content 0.111111, carbon content, non-fossil 0.494, price 0.355 EUR2005, wet mass 1 kg
  note on carbon content, non-fossil: C content of dry mass of sulfate pulp is 0.494 kgC/kg dry wood (ecoinvent v2.2 report 6_IX & ecoinvent v2.2 report 9). No other C containing products in the formulation of the pulp.
- sulfur dioxide, liquid: 0.00425 kg; lognormal variance with pedigree 0.0426, pedigree (1,3,5,5,1)
  (same comment as for aluminium sulfate, powder)
  properties: wet mass 1 kg, dry mass 1 kg
- hydrogen peroxide, without water, in 50% solution state: 0.00678 kg; lognormal variance with pedigree 0.0426, pedigree (1,3,5,5,1)
  (same comment as for kaolin)
  properties: wet mass 1 kg, dry mass 1 kg
- sulfuric acid: 0.0004 kg; lognormal variance with pedigree 0.0426, pedigree (1,3,5,5,1)
  (same comment as for kaolin)
  properties: wet mass 1 kg, dry mass 1 kg
- heat, district or industrial, natural gas: 1.5485 MJ; lognormal variance with pedigree 0.0601, pedigree (1,2,5,5,3)
  (same comment as for heat, district or industrial, other than natural gas)
- lime: 0.04995 kg; lognormal variance with pedigree 0.0426, pedigree (1,3,5,5,1)
  (same comment as for wood ash mixture, pure)
  properties: dry mass 1 kg, wet mass 1 kg, carbon content, fossil 0.120005
- sodium chloride, powder: 0.00015 kg; lognormal variance with pedigree 0.0426, pedigree (1,3,5,5,1)
  (same comment as for aluminium sulfate, powder)
  properties: wet mass 1 kg, dry mass 1 kg
- malusil: 0.023586 kg; lognormal variance with pedigree 0.0426, pedigree (1,3,5,5,1)
  (same comment as for aluminium sulfate, powder)
  properties: dry mass 1 kg, wet mass 1 kg
- sodium hydroxide, without water, in 50% solution state: 0.0135 kg; lognormal variance with pedigree 0.0426, pedigree (1,3,5,5,1)
  (same comment as for kaolin)
  properties: dry mass 1 kg, wet mass 1 kg

## Inputs from nature
- Water, cooling, unspecified natural origin [natural resource, in water]: 0.024 m3; lognormal variance with pedigree 0.1126, pedigree (1,3,5,5,4)
  Estimated value based on CER from LWC production
  Uncertainty: estimated value based on CER from LWC production
- Water, unspecified natural origin [natural resource, in water]: 0.0192 m3; lognormal variance with pedigree 0.0426, pedigree (1,3,5,5,1)
  Average from several SC paper producers
  Uncertainty: average from several SC paper producers

## Emissions to nature
- DOC, Dissolved Organic Carbon [water, surface water]: 0.00125185 kg; lognormal variance with pedigree 0.0826, pedigree (1,3,5,5,1)
  Calculated as equal to TOC.
  Uncertainty: average from several SC paper producers
- Water [air, unspecified]: 0.01218 m3; lognormal variance with pedigree 0.0827, pedigree (2,2,5,5,1)
  Calculated value based on literature values and expert opinion. See comments in the parametres' comment field.
- Water [water, unspecified]: 0.03102 m3; lognormal variance with pedigree 0.0827, pedigree (2,2,5,5,1)
  (same comment as for Water)
  property carbon content, non-fossil 0; name C_content_non_fossil
  property carbon content, fossil 0; name C_content_fossil
  property dry mass 0 kg; name DM
  property wet mass 1000 kg; name WM
  property water in wet mass 1000 kg; name WWM
- TOC, Total Organic Carbon [water, surface water]: 0.00125185 kg; lognormal variance with pedigree 0.0826, pedigree (1,3,5,5,1)
  Calculated by default as TOC (gC) = COD/2.7 (COD measured in g O2). Should more correctly be calculated from the carbon content of the specified emissions to water.
  Uncertainty: average from several SC paper producers
- Phosphorus [water, surface water]: 6.3e-6 kg; lognormal variance with pedigree 0.0826, pedigree (1,3,5,5,1)
  (same comment as for Water, unspecified natural origin)
- Suspended solids, unspecified [water, surface water]: 0.00018 kg; lognormal variance with pedigree 0.0826, pedigree (1,3,5,5,1)
  (same comment as for Water, unspecified natural origin)
- AOX, Adsorbable Organic Halogen as Cl [water, surface water]: 6.9e-8 kg; lognormal variance with pedigree 0.0826, pedigree (1,3,5,5,1)
  (same comment as for Water, unspecified natural origin)
- COD, Chemical Oxygen Demand [water, surface water]: 0.00338 kg; lognormal variance with pedigree 0.0826, pedigree (1,3,5,5,1)
  (same comment as for Water, unspecified natural origin)
- Nitrogen [water, surface water]: 4e-5 kg; lognormal variance with pedigree 0.0826, pedigree (1,3,5,5,1)
  (same comment as for Water, unspecified natural origin)
- BOD5, Biological Oxygen Demand [water, surface water]: 0.00065 kg; lognormal variance with pedigree 0.0826, pedigree (1,3,5,5,1)
  (same comment as for Water, unspecified natural origin)

## Extrapolations
GLO dataset extrapolated from European dataset, which in turn was used to create this child dataset. Exchanges identical to GLO dataset. Created to enable linking to regional markets (e.g. for electricity). Data quality indicators adjusted accordingly.

## Review by Hans-Jörg Althaus 2003-08-06
Passed
