# ethylene production, average

Dataset: EcoSpold 2, unit process
Geography: RoW
Time period: 1999-01-01 to 2019-12-31
Technology level: current
Classification: EcoSpold01Categories: plastics/monomers
Classification: ISIC rev.4 ecoinvent: 1920:Manufacture of refined petroleum products
Synonyms: ethene; Ethan
Tags: ConvertedDataset
Scenario: Business-as-Usual
System model: Allocation at the point of substitution
Generated by: Roland Hischier
Published in: Hischier R. 2007
Database: ecoinvent
isCopyrightProtected: true
accessRestrictedTo: 1

## General comment
Data are derived from the Eco-profiles of the European plastics industry (PlasticsEurope). Not included are the values reported for: recyclable wastes, amount of air / N2 / O2 consumed, unspecified metal emission to air and to water, mercaptan emission to air, unspecified CFC/HCFC emission to air, dioxin to water. The amount of "sulphur (bonded)" is assumed to be included into the amount of raw oil.
[This dataset was already contained in the ecoinvent database version 2. It was not individually updated during the transfer to ecoinvent version 3. Life Cycle Impact Assessment results may still have changed, as they are affected by changes in the supply chain, i.e. in other datasets. This dataset was generated following the ecoinvent quality guidelines for version 2. It may have been subject to central changes described in the ecoinvent version 3 change report (http://www.ecoinvent.org/database/ecoinvent-version-3/reports-of-changes/), and the results of the central updates were reviewed extensively. The changes added e.g. consistent water flows and other information throughout the database. The documentation of this dataset can be found in the ecoinvent reports of version 2, which are still available via the ecoinvent website. The change report linked above covers all central changes that were made during the conversion process.]

## Included activities end
Aggregated data for all processes from raw material extraction until delivery at plant

## Geography
19 European production sites

## Technology
product out of steam cracking of naphtha

## Time period
time to which data refer

## Parameters
- fraction, cooling water, to air: 0.3875; name fraction_CW_to_air; = (0.5*fraction_CW_OT_to_air)+(0.5*fraction_CW_R_to_air); lognormal variance with pedigree 0.092025, pedigree (4,4,3,2,4)
  Calculated value based on literature value (see comments of the other parametres present in this dataset) and expert opinion. In the case when no industry/literature data are available about the type of cooling or directly fraction, cooling water, to air specific for the process a default assumption is applied. It is assumed that the once-through cooling system is used in 50% of all cases and recirculating system is used in another 50% of all cases.
- fraction, cooling water, recirculating system, to air: 0.771; name fraction_CW_R_to_air; lognormal variance with pedigree 0.0413, pedigree (2,3,1,3,1)
  Calculated based on literature value (Scown, C.D., 2011, Water Footprint of U.S. Transportation Fuels and supplying information of the article) (Vionnet, S., Quantis Water Database - Technical Report, 2012).
- fraction, cooling water, once-through system, to air: 0.004; name fraction_CW_OT_to_air; lognormal variance with pedigree 0.0413, pedigree (2,3,1,3,1)
  (same comment as for fraction, cooling water, recirculating system, to air)
- fraction, process water, to air: 0.205 dimensionless; name fraction_PW_to_air; lognormal variance with pedigree 0.092025, pedigree (4,4,3,2,4)
- fraction, cooling water, cooling pond system, to air: 0.032; name fraction_CW_CP_to_air; lognormal variance with pedigree 0.0413, pedigree (2,3,1,3,1)
  (same comment as for fraction, cooling water, recirculating system, to air)

## Reference product
- ethylene, average: 1 kg; name RP; CPC 33421: Ethylene, propylene, butylene, butadiene; By-product classification allocatable product; CAS 74-85-1
  EcoSpold01Location=RER
  production volume 3.83312e10 kg; name ethylene_RP_PV; = 143E09*0.41
    Estimated value. The global demand of ethylene in 2015 was of 143 million tons (Plotkin, 2016). Ethylene can be produced by a number of feedstocks; this dataset represents the production from Naphtha. According to Arns (n.d.), globally, a little over 40% of ethylene is produced from Naphtha. Arns (n.d.) predicted a slight decrease in the use of Naphtha, we therefore assume that 41% of production is based on this feedstock.
    References:
    Plotkins, J.S. 2016. Beyond the Ethylene Steam Cracker. American Chemical Society. Retrieved from: https://www.acs.org/content/acs/en/pressroom/cutting-edge-chemistry/beyond-the-ethylene-steam-cracker.html, accessed 17 October 2018
    Arns, D. n.d. The European Petrochemical Industry in Challenging Times. Power point presentation from Cefic. Retrieved from: https://www.platts.com/IM.Platts.Content/ProductsServices/ConferenceandEvents/emea/european-petrochemicals/presentations/Dorothee_Arns.pdf, accessed 17 October 2018
  property price 0.754 EUR2005
    Source: CMAI (2011) Monomers Market Report (http://www.cmaiglobal.com/Marketing/Samples/MMR_Summary.pdf). Price: approx. 0.9 USD/kg
  property carbon content 0.857143
    carbon content on a dry matter basis (reserved; not for manual entry)
  property true value 0.754; name RP_true_value
    allocation property applied in "true value" allocation // value calculated from revenue
  properties: dry mass 1 kg, water content 0, carbon content, fossil 0.857143, carbon content, non-fossil 0, water in wet mass 0 kg, wet mass 1 kg, carbon allocation 0.857143 kg

## By-products
- electricity, for reuse in municipal waste incineration only: 0 kWh; CPC 17100: Electrical energy; By-product classification allocatable product; pedigree (1,1,1,1,1)
  Net electricity generated from this waste and used in internal MSWI plant energy redistribution.
  Uncertainty: uncertainty is calculated from uncertainties in waste composition and uncertainties in energy efficiency and the uncertainty in internal energy demand
  production volume 1.73069e6 kWh
  property true value relation 3.6; name E_el_prod_MSWI_true_value_relation
    property to calculate "true value" from
  property exergy 3.6 MJ; name E_el_prod_MSWI_exergy
    This exergy property is based on the exergy content of the product.
  property price 0.1 EUR2005; name E_el_prod_MSWI_price_EUR2005
    Estimated to be the same price as in case of electricity, medium voltage.
  property true value 5.82381e-6
    allocation property applied in "true value" allocation // value calculated from true value relation
- heat, for reuse in municipal waste incineration only: 0 MJ; CPC 17300: Steam and hot water; By-product classification allocatable product; pedigree (1,1,1,1,1)
  Net useful heat generated from this waste and used in internal MSWI plant energy redistribution.
  Uncertainty: uncertainty is calculated from uncertainties in waste composition and uncertainties in energy efficiency and the uncertainty in internal energy demand
  production volume 1.27822e7 MJ
  property true value relation 0.1842; name E_th_prod_MSWI_true_value_relation
    property to calculate "true value" from
  property exergy 0.1842 MJ; name E_th_prod_MSWI_exergy
    This exergy property is based on the exergy content of the product.
  property price 0.0106 EUR2005; name E_th_prod_MSWI_price_EUR2005
    Average European district heat price from Ecoheatcool and Euroheat 2005-2006, Ecoheat Work package 1: The European heat market. Final report. 10.6 EUR/GJ i s the price of district heat. http://www.solarthermalworld.org/files/Ecoheatcool%20WP1%20Web.pdf?download
  property true value 2.20089e-6
    (same comment as for electricity, for reuse in municipal waste incineration only)
- zinc concentrate: 0 kg; CPC 14290: Other non-ferrous metal ores and concentrates (other than uranium or thorium ores and concentrates); By-product classification allocatable product
  Calculated value from the knowledge of the properties of both products.
  production volume 2.60314e-5 kg
  property price 0.38 EUR2005; name ByP_price_EUR2005
    Temporary price data. Calculated as 90% of purchasers price based on: Zinc content in concentrate 53%. Concentrate price per kg Zn 86.5% of refined Zn price (13.5% treatment charges according to CHR Metals Limited 2005: Dynamic cost curves. http://www.minecost.com/dynamic.pdf). 2004 zinc price from USGS (2007) Mineral commodity summaries 2007. <http://minerals.usgs.gov/minerals/pubs/mcs/2007/mcs2007.pdf> [Accessed 25 May 2010]
  property zinc content 0.53; name zinc_C_zinc_concentrate
    Zinc content on a dry matter basis. Value taken from teh "zinc mine operation" /GLO dataset.
  property dry mass 1 kg; name DM_zinc_concentrate
  property carbon content 0
    carbon content on a dry matter basis (reserved; not for manual entry)
  property true value 2.5312e-16
    allocation property applied in "true value" allocation // value calculated from revenue
  properties: wet mass 1 kg, water content 0, carbon content, non-fossil 0, carbon content, fossil 0, water in wet mass 0 kg, carbon allocation 0 kg
- copper: 0 kg; By-product classification allocatable product; CPC 41413: Refined copper and copper alloys, unwrought; master alloys of copper
  production volume 7523.61 kg
  property price 5.52 EUR2005
    Literature value (http://www.economist.com/news/business/21576714-mining-industry-has-enriched-chile-its-future-precarious-copper-solution). Average price between 20015 and 2013.
  property carbon content 0
    carbon content on a dry matter basis (reserved; not for manual entry)
  property true value 9.92957e-7
    allocation property applied in "true value" allocation // value calculated from revenue
  properties: water in wet mass 0 kg, water content 0, carbon content, non-fossil 0, dry mass 1 kg, carbon content, fossil 0, wet mass 1 kg, carbon allocation 0 kg
- lead: 0 kg; CPC 41441: Lead, unwrought; By-product classification allocatable product
  EcoSpold01Location=SE
  production volume 0.00193079 kg
  property price 0.744 EUR2005
    Temporary price data. Calculated as 90% of purchasers price based on: Source: ecoinvent v2 report 10-part IX, Tab 5.10 & 2.5
  property carbon content 0
    carbon content on a dry matter basis (reserved; not for manual entry)
  property true value 3.74763e-14
    allocation property applied in "true value" allocation // value calculated from revenue
  properties: wet mass 1 kg, water content 0, carbon content, non-fossil 0, carbon content, fossil 0, dry mass 1 kg, water in wet mass 0 kg, carbon allocation 0 kg
- nickel, 99.5%: 0 kg; CPC 41422: Unwrought nickel; By-product classification allocatable product
  EcoSpold01Location=SE
  production volume 0.00403048 kg
  property price 10.4 EUR2005
    Temporary price data. Calculated as 90% of purchasers price based on: 2004 nickel price from USGS (2007) Mineral commodity summaries 2007. <http://minerals.usgs.gov/minerals/pubs/mcs/2007/mcs2007.pdf> [Accessed 25 May 2010]
  property carbon content 0
    carbon content on a dry matter basis (reserved; not for manual entry)
  property true value 1.09355e-12
    allocation property applied in "true value" allocation // value calculated from revenue
  properties: water in wet mass 0 kg, wet mass 1 kg, carbon content, non-fossil 0, dry mass 1 kg, water content 0, carbon content, fossil 0, carbon allocation 0 kg
- silver: 0 kg; CPC 41310: Silver (including silver plated with gold or platinum), unwrought or in semi-manufactured forms, or in powder […]; By-product classification allocatable product; CAS 7440-22-4
  EcoSpold01Location=SE
  production volume 0.000665594 kg
  property price 178 EUR2005
    (same comment as for lead)
  property carbon content 0
    carbon content on a dry matter basis (reserved; not for manual entry)
  property true value 3.09085e-12
    allocation property applied in "true value" allocation // value calculated from revenue
  properties: wet mass 1 kg, carbon content, non-fossil 0, dry mass 1 kg, water content 0, carbon content, fossil 0, water in wet mass 0 kg, carbon allocation 0 kg
- palladium: 0 kg; CPC 4160: Other non-ferrous metals and articles thereof (including waste and scrap of some metals); cermets and articles […]; By-product classification allocatable product
  EcoSpold01Location=SE
  production volume 3.6845e-5 kg
  property price 5640 EUR2005
    Temporary price data. Calculated as 90% of purchasers price based on: 2004 price from USGS (2007) Mineral commodity summaries 2007. <http://minerals.usgs.gov/minerals/pubs/mcs/2007/mcs2007.pdf> [Accessed 25 May 2010]
  property carbon content 0
    carbon content on a dry matter basis (reserved; not for manual entry)
  property true value 5.42133e-12
    allocation property applied in "true value" allocation // value calculated from revenue
  properties: wet mass 1 kg, carbon content, fossil 0, water in wet mass 0 kg, water content 0, carbon content, non-fossil 0, dry mass 1 kg, carbon allocation 0 kg
- gold: 0 kg; CPC 41320: Gold (including gold plated with platinum), unwrought or in semi-manufactured forms, or in powder form; By-product classification allocatable product; CAS 7440-57-5
  EcoSpold01Location=SE
  production volume 2.02056e-5 kg
  property price 10600 EUR2005
    Temporary price data. Calculated as 90% of purchasers price based on: Source: ecoinvent v2 report 10-part IX, Tab 2.5
  property carbon content 0
    carbon content on a dry matter basis (reserved; not for manual entry)
  property true value 5.58762e-12
    allocation property applied in "true value" allocation // value calculated from revenue
  properties: wet mass 1 kg, carbon content, fossil 0, dry mass 1 kg, carbon content, non-fossil 0, water content 0, water in wet mass 0 kg, carbon allocation 0 kg
- iron scrap, sorted, pressed: 0 kg; By-product classification Recyclable; CPC 39310: Slag, dross, scalings and other waste from the manufacture of iron or steel; pedigree (1,1,1,1,1)
  Iron scrap recovered from this waste.
  production volume 233481 kg
  property price 0.175 EUR2005
    Temporary price data. Calculated as 90% of purchasers price based on: 2005 import and export prices (total trades (USD) divided by total weight (kg) in biggest economies of the world: EU27, USA, Brasil, China, India, Japan and Russia) from UN Commodity Trade Statistics Database (http://data.un.org/Explorer.aspxDatabase [Accessed 2011.06.20]). Commodity: Waste or scrap, of cast iron
  property carbon content 0
    carbon content on a dry matter basis (reserved; not for manual entry)
  property true value 9.88975e-7
    allocation property applied in "true value" allocation // value calculated from revenue
  properties: water content 0, water in wet mass 0 kg, carbon content, fossil 0, dry mass 1 kg, carbon content, non-fossil 0, wet mass 1 kg, carbon allocation 0 kg
- iron scrap, unsorted: 0 kg; source European Aluminium Association 2008; CPC 39310: Slag, dross, scalings and other waste from the manufacture of iron or steel; By-product classification Recyclable; pedigree (1,1,1,1,1)
  production volume 6.17696 kg
  property price 0.149 EUR2005; name ironScrapAmount_price_EUR2005
    Temporary price data. Calculated as 90% of purchasers price based on: estimated at 85% of sorted scrap
  property carbon content 0
    carbon content on a dry matter basis (reserved; not for manual entry)
  property true value 2.39563e-11
    allocation property applied in "true value" allocation // value calculated from revenue
  properties: water in wet mass 0 kg, water content 0, carbon content, fossil 0, carbon content, non-fossil 0, dry mass 1 kg, wet mass 1 kg, carbon allocation 0 kg
- aluminium oxide, non-metallurgical: 0 kg; source European Aluminium Association 2008; CPC 41432: Alumina (aluminium oxide), except artificial corundum; By-product classification allocatable product; CAS 1344-28-1; pedigree (1,1,1,1,1)
  production volume 388.693 kg
  property carbon content, non-fossil 0; name C_content_non_fossil
  property price 0.28 EUR2005; name Al2O3Amount_price_EUR2005
    From UN trade database. http://data.un.org/ Import data from the largest economies of the world are used (Brazil, India, USA, China, Japan and EU-27).
  property dry mass 1 kg; name DM
  property water content 0; name water_content
  property wet mass 1 kg; name WM
  property water in wet mass 0 kg; name WWM
  property carbon content, fossil 0; name C_content_fossil
  property carbon content 0
    carbon content on a dry matter basis (reserved; not for manual entry)
  property true value 2.83285e-9
    allocation property applied in "true value" allocation // value calculated from revenue
  properties: carbon allocation 0 kg
- aluminium, cast alloy: 0 kg; source European Aluminium Association 2008; By-product classification allocatable product; CPC 41431: Unwrought aluminium; pedigree (1,1,1,1,1)
  EcoSpold01Location=RER
  production volume 3633.42 kg
  property price 1.3 EUR2005; name castAlloyAmount_price_EUR2005
    Temporary price data. Calculated as 90% of purchasers price based on: Source: London Metal Exchange, Aluminium alloy price for 2005
  property carbon content 0
    carbon content on a dry matter basis (reserved; not for manual entry)
  property true value 1.22947e-7
    allocation property applied in "true value" allocation // value calculated from revenue
  properties: water in wet mass 0 kg, carbon content, non-fossil 0, water content 0, dry mass 1 kg, carbon content, fossil 0, wet mass 1 kg, carbon allocation 0 kg
- aluminium, wrought alloy: 0 kg; source European Aluminium Association 2008; By-product classification allocatable product; CPC 4153: Semi-finished products of aluminium or aluminium alloys; pedigree (1,1,1,1,1)
  production volume 1590.64 kg
  property price 1.44 EUR2005; name secondaryAluminiumOutput_price_EUR2005
    Estimated based on literature values and expert judgement. Aluminium ccast alloys are about 90% of the price of aluminium wrought alloys.
  property carbon content 0
    carbon content on a dry matter basis (reserved; not for manual entry)
  property true value 5.96203e-8
    allocation property applied in "true value" allocation // value calculated from revenue
  properties: wet mass 1 kg, water content 0, carbon content, fossil 0, water in wet mass 0 kg, carbon content, non-fossil 0, dry mass 1 kg, carbon allocation 0 kg

## Inputs from technosphere
- municipal solid waste: 0 kg; name MSW
  EcoSpold01Location=CH
  Uncertainty for LCI results cannot be determined
  production volume 0 kg
    Calculated from the production volume of ethylene, average in proportion to the respective output amounts.
  properties: dry mass 0.771 kg, water content 0.297017, wet mass 1 kg, carbon content, non-fossil 0.261655, carbon content, fossil 0.171549
  note on carbon content, non-fossil: MSW composition in tab 4.1, ecoinvent v2.2 report 13_I. C content referred to 1 kg DM
- decommissioned chemical production facilities: -5.22873e-10 kg; name facilities
  EcoSpold01Location=RER
  Uncertainty for LCI results cannot be determined
  production volume 20.0426 kg; = facilities*ethylene_RP_PV/ABS(RP)
    (same comment as for municipal solid waste)
  property price 0 EUR2005; name facilities_price_EUR2005
  properties: wet mass 1 kg, carbon content, non-fossil 5.78006e-6, dry mass 1 kg, carbon content, fossil 0.0169382
  note on carbon content, non-fossil: Calculated from C content in input materials in the infrastructure
- spoil from hard coal mining: -0.00813559 kg; name spoil
  EcoSpold01Location=GLO
  Uncertainty for LCI results cannot be determined
  production volume 3.11851e8 kg; = spoil*ethylene_RP_PV/ABS(RP)
    (same comment as for municipal solid waste)
  property price 0 EUR2005; name spoil_price_EUR2005
  properties: dry mass 1 kg, carbon content, fossil 0.007879, wet mass 1 kg
  note on carbon content, fossil: Composition of coal spoil is adopted by proxy from lignite spoil (pg 19, Doka G. (2009) Life Cycle Inventory of the disposal of lignite spoil, coal spoil and coal tailings. Doka Life Cycle Assessments, Zurich. Commissioned by the Swiss Centre for Life Cycle Inventories ecoinvent Centre)
- waste wood, untreated: 0 kg; name waste_wood
  Uncertainty for LCI results cannot be determined
  EcoSpold01Location=CH
  production volume 0 kg
    (same comment as for municipal solid waste)
  property price 0 EUR2005; name waste_wood_price_EUR2005
  properties: dry mass 0.8 kg, wet mass 1 kg, carbon content, non-fossil 0.48632, water content 0.25
  note on carbon content, non-fossil: Tab A.4, ecoinvent v2.2 report 13_I. C content has been referred to 1 kg DM,
- hazardous waste, for incineration: -0.00205327 kg; name haz_waste
  EcoSpold01Location=CH
  Uncertainty for LCI results cannot be determined
  production volume 7.87054e7 kg; = haz_waste*ethylene_RP_PV/ABS(RP)
    (same comment as for municipal solid waste)
  property price 0 EUR2005; name haz_waste_price_EUR2005
  properties: wet mass 1 kg, dry mass 0.75 kg, carbon content, fossil 0.554667, water content 0.333333
  note on carbon content, fossil: Tab A.6, ecoinvent v2.2 report 13_I. C content has been calculated after data in the tables, and then referred to 1 kg DM
- coal slurry: -7.3324e-7 kg; name coal_slurry
  Uncertainty for LCI results cannot be determined
  EcoSpold01Location=GLO
  production volume 28106.3 kg; = coal_slurry*ethylene_RP_PV/ABS(RP)
    (same comment as for municipal solid waste)
  property price 0 EUR2005; name coal_slurry_price_EUR2005
  properties: dry mass 1 kg, wet mass 1 kg, carbon content, fossil 0.124
  note on carbon content, fossil: Coal tailings composition in Tab 3.4, (Doka G. (2009) Life Cycle Inventory of the disposal of lignite spoil, coal spoil and coal tailings. Doka Life Cycle Assessments, Zurich. Commissioned by the Swiss Centre for Life Cycle Inventories ecoinvent Centre)
- waste plastic, mixture: 0 kg; name plastic
  EcoSpold01Location=CH
  Uncertainty for LCI results cannot be determined
  production volume 0 kg
    (same comment as for municipal solid waste)
  property price 0 EUR2005; name plastic_price_EUR2005
  properties: wet mass 1 kg, water content 0.180638, dry mass 0.847 kg, carbon content, fossil 0.747344
  note on carbon content, fossil: C content in 1 kg DM was calculated using data in Tab A.2, ecoinvent v2.2 report 13_I
- average incineration residue: -0.00377015 kg; name inc_residue
  EcoSpold01Location=CH
  Uncertainty for LCI results cannot be determined
  production volume 1.44516e8 kg; = inc_residue*ethylene_RP_PV/ABS(RP)
    (same comment as for municipal solid waste)
  property price 0 EUR2005; name inc_residue_price_EUR2005
  properties: wet mass 1 kg, dry mass 1 kg, carbon content, fossil 0.0325466, carbon content, non-fossil 0.0511208
  note on carbon content, fossil: Tab A.1, ecoinvent v2.2 report 13_I. It is considered that 61.1% of the C has a biogenic origin
- municipal solid waste: -2.59571e-6, -6.54055e-7, -9.34683e-7, -0.00183579 kg (4 entries)
  EcoSpold01Location=CH
  Uncertainty for LCI results cannot be determined
  production volume 7.05293e7 kg
- waste wood, untreated: -4.29268e-9, -5.33001e-10, -3.89683e-11, -1.49704e-9, -2.26166e-10, -3.5755e-10, -5.69507e-8 kg (7 entries)
  Uncertainty for LCI results cannot be determined
  EcoSpold01Location=CH
  production volume 2449.25 kg
- waste plastic, mixture: -1.48891e-7, -9.94834e-9, -7.52376e-10, -4.10902e-9, -1.66e-9, -3.9019e-9, -1.04232e-6 kg (7 entries)
  EcoSpold01Location=CH
  Uncertainty for LCI results cannot be determined
  production volume 46442 kg

## Inputs from nature
- Uranium, in ground [natural resource, in ground]: 2.76636e-6 kg
  Uncertainty for LCI results cannot be determined
- Peat, in ground [natural resource, biotic]: 0.000343285 kg
  Uncertainty for LCI results cannot be determined
- Gas, natural, in ground [natural resource, in ground]: 0.573162 m3
  Uncertainty for LCI results cannot be determined
- Manganese, in ground [natural resource, in ground]: 2.63936e-7 kg
  35.7% Mn in sedimentary deposit; 14.2% Mn in ore; Uncertainty for LCI results cannot be determined
- Sodium nitrate, in ground [natural resource, in ground]: 0 kg
  Uncertainty for LCI results cannot be determined
- Chromium, in ground [natural resource, in ground]: 3.82235e-13 kg
  25.5% Cr in chromite; 11.6% in ore; Uncertainty for LCI results cannot be determined
- Copper, in ground [natural resource, in ground]: 1.03079e-11 kg
  0.99% Cu in sulfide; 0.36% Cu and 82 ppm Mo in ore; Uncertainty for LCI results cannot be determined
- Phosphorus, in ground [natural resource, in ground]: 1.14008e-12 kg
  18% P in apatite; 12% in ore; Uncertainty for LCI results cannot be determined
- Aluminium, in ground [natural resource, in ground]: 2.00747e-7 kg
  24% Al in bauxite; 11% Al in ore; Uncertainty for LCI results cannot be determined
- Shale, in ground [natural resource, in ground]: 1.58068e-5 kg
  Uncertainty for LCI results cannot be determined
- Energy, potential (in hydropower reservoir), converted [natural resource, in water]: 0.0825859 MJ
- Sulfur, in ground [natural resource, in ground]: 7.4566e-5 kg
  Uncertainty for LCI results cannot be determined
- Energy, gross calorific value, in biomass [natural resource, biotic]: 0.116008 MJ
- Magnesite, in ground [natural resource, in ground]: 0 kg
  60% Magnesite in ore; Uncertainty for LCI results cannot be determined
- Sylvite, in ground [natural resource, in ground]: 5.59692e-9 kg
  25% Sylvite in sylvinite; Uncertainty for LCI results cannot be determined
- Clay, unspecified, in ground [natural resource, in ground]: 2.24827e-10 kg
  Uncertainty for LCI results cannot be determined
- Dolomite, in ground [natural resource, in ground]: 2.50817e-6 kg
  Uncertainty for LCI results cannot be determined
- Nickel, in ground [natural resource, in ground]: 5.59632e-13 kg
  1.98% Ni in silicates; 1.04% Ni in ore; Uncertainty for LCI results cannot be determined
- Sand, unspecified, in ground [natural resource, in ground]: 5.93302e-5 kg
  Uncertainty for LCI results cannot be determined
- Titanium, in ground [natural resource, in ground]: 0 kg
  95% TiO2 in rutile; 0.4% TiO2 in ore; Uncertainty for LCI results cannot be determined
- Coal, brown, in ground [natural resource, in ground]: 3.41275e-8 kg
  Uncertainty for LCI results cannot be determined
- Sodium chloride, in ground [natural resource, in ground]: 0.000492333 kg
  Uncertainty for LCI results cannot be determined
- Gravel, in ground [natural resource, in ground]: 7.5504e-7 kg
  Uncertainty for LCI results cannot be determined
- Olivine, in ground [natural resource, in ground]: 1.91987e-6 kg
  Uncertainty for LCI results cannot be determined
- Talc, in ground [natural resource, in ground]: 0 kg
  Uncertainty for LCI results cannot be determined
- Zinc, in ground [natural resource, in ground]: 6.90421e-9 kg
  9.0% Zn in sulfide; 5.3% Zn in ore; Uncertainty for LCI results cannot be determined
- Clay, bentonite, in ground [natural resource, in ground]: 5.59852e-5 kg
  Uncertainty for LCI results cannot be determined
- Oil, crude, in ground [natural resource, in ground]: 0.927017 kg
  Uncertainty for LCI results cannot be determined
- Lead, in ground [natural resource, in ground]: 1.88947e-7 kg
  5.0% Pb in sulfide; 3.0% Pb in ore; Uncertainty for LCI results cannot be determined
- Granite, in ground [natural resource, in ground]: 1.69228e-15 kg
  Uncertainty for LCI results cannot be determined
- Iron, in ground [natural resource, in ground]: 0.000204637 kg
  46% Fe in siderite; 25% Fe in ore; Uncertainty for LCI results cannot be determined
- Feldspar, in ground [natural resource, in ground]: 0 kg
  Uncertainty for LCI results cannot be determined
- Water, unspecified natural origin [natural resource, in water]: 0.00127968 m3; name water_UNO_input; lognormal variance with pedigree 1.21, pedigree (5,5,5,5,5)
  Uncertainty for LCI results cannot be determined
- Water, river [natural resource, in water]: 0.000397765 m3; name water_river_input; lognormal variance with pedigree 1.21, pedigree (5,5,5,5,5)
  Uncertainty for LCI results cannot be determined
- Anhydrite, in ground [natural resource, in ground]: 5.58342e-6 kg
  Uncertainty for LCI results cannot be determined
- Barium, in ground [natural resource, in ground]: 3.37435e-8 kg
  15% BaSO4 in ore; Uncertainty for LCI results cannot be determined
- Wood, unspecified, standing [natural resource, biotic]: 4.85803e-9 m3
  Uncertainty for LCI results cannot be determined
- Fluorspar, in ground [natural resource, in ground]: 1.88507e-7 kg
  92% CaF2 in ore; Uncertainty for LCI results cannot be determined
- Mercury, in ground [natural resource, in ground]: 1.00889e-9 kg
  Uncertainty for LCI results cannot be determined
- Calcite, in ground [natural resource, in ground]: 0.000199047 kg
  Uncertainty for LCI results cannot be determined
- Coal, hard, unspecified, in ground [natural resource, in ground]: 0.0407614 kg
  Uncertainty for LCI results cannot be determined
- Water, cooling, unspecified natural origin [natural resource, in water]: 0.0267576 m3; name water_cooling_UNO_input; lognormal variance with pedigree 1.21, pedigree (5,5,5,5,5)
  Uncertainty for LCI results cannot be determined
- Water, salt, ocean [natural resource, in water]: 0.000224387 m3; name water_salt_ocean_input; lognormal variance with pedigree 1.21, pedigree (5,5,5,5,5)
  Uncertainty for LCI results cannot be determined
- Water, well, in ground [natural resource, in water]: 9.31637e-11 m3; name water_well_in_ground_input; lognormal variance with pedigree 1.21, pedigree (5,5,5,5,5)
  Uncertainty for LCI results cannot be determined

## Emissions to nature
- Ethene, chloro- [water, surface water]: 3.41365e-12 kg
  Uncertainty for LCI results cannot be determined
- Sulfate [water, surface water]: 0.000498543 kg
  Uncertainty for LCI results cannot be determined
- Propene [air, urban air close to ground]: 2.06717e-6 kg
  Uncertainty for LCI results cannot be determined
- Ethene [air, urban air close to ground]: 2.79066e-6 kg
  Uncertainty for LCI results cannot be determined
- Carbon monoxide, non-fossil [air, urban air close to ground]: 5.19923e-6 kg
  Uncertainty for LCI results cannot be determined
- AOX, Adsorbable Organic Halogen as Cl [water, surface water]: 5.28983e-13 kg
  Uncertainty for LCI results cannot be determined
- Nitrate [water, surface water]: 2.13197e-6 kg
  Uncertainty for LCI results cannot be determined
- Carbon dioxide, non-fossil [air, urban air close to ground]: 0.00308326 kg
  Uncertainty for LCI results cannot be determined
- Hydrocarbons, aromatic [air, urban air close to ground]: 3.98105e-5 kg
  Uncertainty for LCI results cannot be determined
- Phosphorus [water, surface water]: 5.92832e-8 kg
  Uncertainty for LCI results cannot be determined
- Chromium, ion [water, surface water]: 7.6273e-14 kg
  Uncertainty for LCI results cannot be determined
- Carbon disulfide [air, urban air close to ground]: 2.54057e-11 kg
  Uncertainty for LCI results cannot be determined
- Potassium, ion [water, surface water]: 1.62308e-10 kg
  Uncertainty for LCI results cannot be determined
- Sulfide [water, surface water]: 2.07767e-13 kg
  Uncertainty for LCI results cannot be determined
- Strontium [water, surface water]: 1.55478e-11 kg
  Uncertainty for LCI results cannot be determined
- Ammonium, ion [water, surface water]: 2.30767e-6 kg
  Uncertainty for LCI results cannot be determined
- Calcium, ion [water, surface water]: 3.87535e-8 kg
  Uncertainty for LCI results cannot be determined
- Water [air, unspecified]: 0.0104961 m3; name water_to_air_unspecified; lognormal variance with pedigree 0.0827, pedigree (2,2,5,5,1)
  Calculated value based on literature values and expert opinion. See comments in the parametres' comment field.
  property fraction, origin: unspecified 0.988145; name fraction_origin_unspecified
  property fraction, origin: fresh water 0.00757932; name fraction_origin_fresh_water
  property fraction, origin: salt water 0.00427564; name fraction_origin_salt_water
- Water [water, unspecified]: 0.0168837 m3; name water_to_water_unspecified; lognormal variance with pedigree 0.0827, pedigree (2,2,5,5,1)
  (same comment as for Water)
  property fraction, origin: fresh water 0.0176651; name fraction_origin_fresh_water_Ww
  property fraction, origin: salt water 0.00996523; name fraction_origin_salt_water_Ww
  property fraction, origin: unspecified 0.97237; name fraction_origin_unspecified_Ww
  property water in wet mass 1000 kg; name WWM
  property dry mass 0 kg; name DM
  property wet mass 1000 kg; name WM
  property carbon content, fossil 0; name C_content_fossil
  property carbon content, non-fossil 0; name C_content_non_fossil
- TOC, Total Organic Carbon [water, surface water]: 1.57598e-5 kg
  Uncertainty for LCI results cannot be determined
- Chlorinated solvents, unspecified [water, surface water]: 8.48139e-9 kg
  Uncertainty for LCI results cannot be determined
- Carbonate [water, surface water]: 4.94623e-5 kg
  Uncertainty for LCI results cannot be determined
- Methane, fossil [air, urban air close to ground]: 0.0105679 kg
  Uncertainty for LCI results cannot be determined
- Zinc, ion [water, surface water]: 9.95707e-8 kg
  Uncertainty for LCI results cannot be determined
- BOD5, Biological Oxygen Demand [water, surface water]: 1.94067e-5 kg
  Uncertainty for LCI results cannot be determined
- Suspended solids, unspecified [water, surface water]: 9.43897e-5 kg
  Uncertainty for LCI results cannot be determined
- Arsenic, ion [water, surface water]: 2.62216e-10 kg
  Uncertainty for LCI results cannot be determined
- Particulates, > 10 um [air, urban air close to ground]: 0.000133318 kg
  Uncertainty for LCI results cannot be determined
- Nitrogen [water, surface water]: 1.28708e-6 kg
  Uncertainty for LCI results cannot be determined
- Chromium [air, urban air close to ground]: 3.97295e-10 kg
  Uncertainty for LCI results cannot be determined
- Copper [air, urban air close to ground]: 2.88186e-14 kg
  Uncertainty for LCI results cannot be determined
- Hydrogen sulfide [air, urban air close to ground]: 6.86901e-9 kg
  Uncertainty for LCI results cannot be determined
- Zinc [air, urban air close to ground]: 4.21924e-11 kg
  Uncertainty for LCI results cannot be determined
- Nickel, ion [water, surface water]: 5.45663e-10 kg
  Uncertainty for LCI results cannot be determined
- Nitrogen oxides [air, urban air close to ground]: 0.00227037 kg
  Uncertainty for LCI results cannot be determined
- Lead [air, urban air close to ground]: 5.97882e-10 kg
  Uncertainty for LCI results cannot be determined
- Methane, dichloro-, HCC-30 [air, urban air close to ground]: 5.09373e-14 kg
  Uncertainty for LCI results cannot be determined
- Dissolved solids [water, surface water]: 1.66068e-5 kg
  Uncertainty for LCI results cannot be determined
- Manganese [water, surface water]: 1.52228e-14 kg
  Uncertainty for LCI results cannot be determined
- Phenol [water, surface water]: 1.25798e-6 kg
  Uncertainty for LCI results cannot be determined
- Oils, unspecified [water, surface water]: 9.59737e-6 kg
  Uncertainty for LCI results cannot be determined
- Magnesium [water, surface water]: 3.69165e-10 kg
  Uncertainty for LCI results cannot be determined
- Sulfur dioxide [air, urban air close to ground]: 0.00224427 kg
  Uncertainty for LCI results cannot be determined
- Lead [water, surface water]: 1.45528e-10 kg
  Uncertainty for LCI results cannot be determined
- Mercury [water, surface water]: 1.96807e-10 kg
  Uncertainty for LCI results cannot be determined
- Methane, non-fossil [air, urban air close to ground]: 2.89956e-5 kg
  Uncertainty for LCI results cannot be determined
- Antimony [air, urban air close to ground]: 1.39138e-15 kg
  Uncertainty for LCI results cannot be determined
- Hydrogen chloride [air, urban air close to ground]: 1.93967e-5 kg
  Uncertainty for LCI results cannot be determined
- Hydrocarbons, chlorinated [air, urban air close to ground]: 1.67248e-9 kg
  Uncertainty for LCI results cannot be determined
- Cyanide [water, surface water]: 1.93917e-11 kg
  Uncertainty for LCI results cannot be determined
- Ethene, chloro- [air, urban air close to ground]: 1.84638e-10 kg
  Uncertainty for LCI results cannot be determined
- Ammonia [air, urban air close to ground]: 1.40838e-10 kg
  Uncertainty for LCI results cannot be determined
- Aluminium [water, surface water]: 4.59444e-7 kg
  Uncertainty for LCI results cannot be determined
- Chlorate [water, surface water]: 1.43168e-7 kg
  Uncertainty for LCI results cannot be determined
- Nickel [air, urban air close to ground]: 5.15883e-14 kg
  Uncertainty for LCI results cannot be determined
- COD, Chemical Oxygen Demand [water, surface water]: 0.000134648 kg
  Uncertainty for LCI results cannot be determined
- Particulates, < 2.5 um [air, urban air close to ground]: 0.000104149 kg
  Uncertainty for LCI results cannot be determined
- Chloride [water, surface water]: 6.95851e-5 kg
  Uncertainty for LCI results cannot be determined
- Ethane, 1,2-dichloro- [air, urban air close to ground]: 8.21469e-12 kg
  Uncertainty for LCI results cannot be determined
- Chlorine [air, urban air close to ground]: 3.23116e-11 kg
  Uncertainty for LCI results cannot be determined
- Ethane, 1,2-dichloro- [water, surface water]: 1.86877e-13 kg
  Uncertainty for LCI results cannot be determined
- Mercury [air, urban air close to ground]: 1.35668e-9 kg
  Uncertainty for LCI results cannot be determined
- Bromate [water, surface water]: 5.22973e-10 kg
  Uncertainty for LCI results cannot be determined
- NMVOC, non-methane volatile organic compounds, unspecified origin [air, urban air close to ground]: 0.00212877 kg
  Uncertainty for LCI results cannot be determined
- Sulfate [air, urban air close to ground]: 3.09936e-15 kg
  Uncertainty for LCI results cannot be determined
- Carbon dioxide, fossil [air, urban air close to ground]: 1.12378 kg
  Uncertainty for LCI results cannot be determined
- Hydrogen fluoride [air, urban air close to ground]: 7.2875e-7 kg
  Uncertainty for LCI results cannot be determined
- Carbon monoxide, fossil [air, urban air close to ground]: 0.00189487 kg
  Uncertainty for LCI results cannot be determined
- Hydrocarbons, unspecified [water, surface water]: 1.61098e-5 kg
  Uncertainty for LCI results cannot be determined
- Fluorine [air, urban air close to ground]: 1.29048e-11 kg
  Uncertainty for LCI results cannot be determined
- Acidity, unspecified [water, surface water]: 1.01979e-6 kg
  Uncertainty for LCI results cannot be determined
- Fluoride [water, surface water]: 7.4789e-10 kg
  Uncertainty for LCI results cannot be determined
- DOC, Dissolved Organic Carbon [water, surface water]: 1.57598e-5 kg
  Calculated as equal to TOC.
- Arsenic [air, urban air close to ground]: 8.71708e-11 kg
  Uncertainty for LCI results cannot be determined
- Copper, ion [water, surface water]: 2.67876e-7 kg
  Uncertainty for LCI results cannot be determined
- Chlorine [water, surface water]: 1.00389e-9 kg
  Uncertainty for LCI results cannot be determined
- Iron, ion [water, surface water]: 8.82408e-9 kg
  Uncertainty for LCI results cannot be determined
- Cadmium [air, urban air close to ground]: 1.56548e-11 kg
  Uncertainty for LCI results cannot be determined
- Hydrogen [air, urban air close to ground]: 2.43027e-5 kg
  Uncertainty for LCI results cannot be determined
- Sodium, ion [water, surface water]: 7.3993e-5 kg
  Uncertainty for LCI results cannot be determined
- Dinitrogen monoxide [air, urban air close to ground]: 2.85226e-13 kg
  Uncertainty for LCI results cannot be determined
- Cadmium, ion [water, surface water]: 2.97926e-15 kg
  Uncertainty for LCI results cannot be determined
- Particulates, > 2.5 um, and < 10um [air, urban air close to ground]: 0.000179138 kg
  Uncertainty for LCI results cannot be determined
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
## Sampling procedure
literature values based on company survey

## Extrapolations
no extrapolation This dataset has been copied from an original dataset covering the geography RER. The uncertainty has been adjusted accordingly.

## Review by Jürgen Sutter 2010-04-06
passed.
