# hair dryer production

Dataset: EcoSpold 2, unit process
Geography: GLO
Time period: 2009-01-01 to 2019-12-31
Technology level: current
Classification: ISIC rev.4 ecoinvent: 2750:Manufacture of domestic appliances
Synonyms: hairdryer
Scenario: Business-as-Usual
System model: Allocation at the point of substitution
Generated by: Viachaslau Filimonau
Published in: Ashby, M.F. 2009
Database: ecoinvent
isCopyrightProtected: true
accessRestrictedTo: 1

## General comment
This activity represents the production and disposal of an average hair dryer which is approximately 0.89 kg in mass and has a rating of 2000 W. It has the envisaged lifetime of 3 years and is manufactured in Southeast Asia. The figures on material inputs from technosphere and energy required to produce an average hair dryer are taken from Ashby 2009. The figure on the annual world production volume (85000000 units) is assumed to equate to the world demand for hair dryers as estimated by Panasonic IR Day 2012.

## Included activities start
This activity starts with the reception of materials at the factory.

## Included activities end
The activity includes the processes of material and energy use in manufacturing an average hair dryer. The inventory additionally accounts for disposal of all materials. Packaging is not included.

## Geography
Geography GLO was chosen because the dataset aims to represent the production of an average hairdryer. The literature sources used refer to manufacturing in Southeast Asia.

## Time period
The literature sources used refer to the underpinning technology as being current.

## Reference product
- hair dryer: 1 unit; By-product classification allocatable product; CPC 88744: Consumer electronics manufacturing services
  production volume 8.5e7 unit
    Data from Panasonic IR day 2012
  property lifetime capacity [h] 22.5 hour; = (3/60)*150*3
    Estimated based on the following information reported in the source "The dryer has an expected life of three years (it is guaranteed for only two), and will be used, on average, for 3 minutes per day for 150 days per year." (Ashby 2009, p. 153). Source: Ashby 2009, 2009, Ashby, M.F., Materials and the Environment. Eco-informed material choice, Oxford, Elsevier, 2 - ChaptersInAnthology, Ashby, M.F., 2009. Materials and the Environment. Eco-informed material choice. Elsevier, Oxford, 2009.
  property price 40 EUR2005
    Estimated value. The price is taken from MediaWorld, a shop for electronics, website (retrieved from: https://www.mediaworld.it/mw/SearchDisplay?searchTerm=phon&categoryId=&search=WCS&storeId=20000&catalogId=20000&langId=-4&pageSize=25&beginIndex=0&sType=SimpleSearch&resultCatEntryType=2&showResultsPage=true&searchSource=Q&pageView=). The range of prices varies greatly from 20 to over 200 euros. A representative price of 60 was chosen. The choice is based on the most common price for an average appliance, and accounting for profit margins. According to an article from Blokhin "What profit margin is average for a company in the electronics sector?" (Source: Investopedia, retrieved from: https://www.investopedia.com/ask/answers/051215/what-profit-margin-average-company-electronics-sector.asp, 13Feb2018) the average profit margin made in the electronics sector in 2015 was of 9%.
  property weight 0.89 kg; name weight
    Source: Ashby 2009, 2009, Ashby, M.F., Materials and the Environment. Eco-informed material choice, Oxford, Elsevier, 2 - ChaptersInAnthology, Ashby, M.F., 2009. Materials and the Environment. Eco-informed material choice. Elsevier, Oxford, 2009.
  property lifetime 3 year
    (same comment as for hair dryer)
  property true value 40
    allocation property applied in "true value" allocation // value calculated from revenue

## By-products
- iron scrap, sorted, pressed: 0 kg; By-product classification Recyclable; CPC 39310: Slag, dross, scalings and other waste from the manufacture of iron or steel; pedigree (1,1,1,1,1)
  Iron scrap recovered from this waste.
  production volume 556776 kg
  property price 0.175 EUR2005
    Temporary price data. Calculated as 90% of purchasers price based on: 2005 import and export prices (total trades (USD) divided by total weight (kg) in biggest economies of the world: EU27, USA, Brasil, China, India, Japan and Russia) from UN Commodity Trade Statistics Database (http://data.un.org/Explorer.aspxDatabase [Accessed 2011.06.20]). Commodity: Waste or scrap, of cast iron
  property carbon content 0
    carbon content on a dry matter basis (reserved; not for manual entry)
  property true value 7.73436e-6
    allocation property applied in "true value" allocation // value calculated from revenue
  properties: water content 0, water in wet mass 0 kg, carbon content, fossil 0, dry mass 1 kg, carbon content, non-fossil 0, wet mass 1 kg, carbon allocation 0 kg
- electricity, for reuse in municipal waste incineration only: 0 kWh; CPC 17100: Electrical energy; By-product classification allocatable product; pedigree (1,1,1,1,1)
  Net electricity generated from this waste and used in internal MSWI plant energy redistribution.
  Uncertainty: uncertainty is calculated from uncertainties in waste composition and uncertainties in energy efficiency and the uncertainty in internal energy demand
  production volume 6.83576e7 kWh
  property price 0.1 EUR2005; name E_el_prod_MSWI_price_EUR2005
    Estimated to be the same price as in case of electricity, medium voltage.
  property exergy 3.6 MJ; name E_el_prod_MSWI_exergy
    This exergy property is based on the exergy content of the product.
  property true value relation 3.6; name E_el_prod_MSWI_true_value_relation
    property to calculate "true value" from
  property true value 0.0524593
    allocation property applied in "true value" allocation // value calculated from true value relation
- heat, for reuse in municipal waste incineration only: 0 MJ; CPC 17300: Steam and hot water; By-product classification allocatable product; pedigree (1,1,1,1,1)
  (same comment as for electricity, for reuse in municipal waste incineration only)
  production volume 4.77261e8 MJ
  property exergy 0.1842 MJ; name E_th_prod_MSWI_exergy
    This exergy property is based on the exergy content of the product.
  property true value relation 0.1842; name E_th_prod_MSWI_true_value_relation
    property to calculate "true value" from
  property price 0.0106 EUR2005; name E_th_prod_MSWI_price_EUR2005
    Average European district heat price from Ecoheatcool and Euroheat 2005-2006, Ecoheat Work package 1: The European heat market. Final report. 10.6 EUR/GJ i s the price of district heat. http://www.solarthermalworld.org/files/Ecoheatcool%20WP1%20Web.pdf?download
  property true value 0.018778
    (same comment as for electricity, for reuse in municipal waste incineration only)
- iron scrap, unsorted: 0 kg; source European Aluminium Association 2008; CPC 39310: Slag, dross, scalings and other waste from the manufacture of iron or steel; By-product classification Recyclable; pedigree (1,1,1,1,1)
  production volume 1788.21 kg
  property price 0.149 EUR2005; name ironScrapAmount_price_EUR2005
    Temporary price data. Calculated as 90% of purchasers price based on: estimated at 85% of sorted scrap
  property carbon content 0
    carbon content on a dry matter basis (reserved; not for manual entry)
  property true value 1.04488e-6
    allocation property applied in "true value" allocation // value calculated from revenue
  properties: water in wet mass 0 kg, water content 0, carbon content, fossil 0, carbon content, non-fossil 0, dry mass 1 kg, wet mass 1 kg, carbon allocation 0 kg
- aluminium oxide, non-metallurgical: 0 kg; source European Aluminium Association 2008; CPC 41432: Alumina (aluminium oxide), except artificial corundum; By-product classification allocatable product; CAS 1344-28-1; pedigree (1,1,1,1,1)
  production volume 112526 kg
  property carbon content, non-fossil 0; name C_content_non_fossil
  property price 0.28 EUR2005; name Al2O3Amount_price_EUR2005
    From UN trade database. http://data.un.org/ Import data from the largest economies of the world are used (Brazil, India, USA, China, Japan and EU-27).
  property dry mass 1 kg; name DM
  property water content 0; name water_content
  property wet mass 1 kg; name WM
  property water in wet mass 0 kg; name WWM
  property carbon content, fossil 0; name C_content_fossil
  property carbon content 0
    carbon content on a dry matter basis (reserved; not for manual entry)
  property true value 0.000123558
    allocation property applied in "true value" allocation // value calculated from revenue
  properties: carbon allocation 0 kg
- aluminium, cast alloy: 0 kg; source European Aluminium Association 2008; By-product classification allocatable product; CPC 41431: Unwrought aluminium; pedigree (1,1,1,1,1)
  EcoSpold01Location=RER
  production volume 1.05186e6 kg
  property price 1.3 EUR2005; name castAlloyAmount_price_EUR2005
    Temporary price data. Calculated as 90% of purchasers price based on: Source: London Metal Exchange, Aluminium alloy price for 2005
  property carbon content 0
    carbon content on a dry matter basis (reserved; not for manual entry)
  property true value 0.00536245
    allocation property applied in "true value" allocation // value calculated from revenue
  properties: water in wet mass 0 kg, carbon content, non-fossil 0, water content 0, dry mass 1 kg, carbon content, fossil 0, wet mass 1 kg, carbon allocation 0 kg
- aluminium, wrought alloy: 0 kg; source European Aluminium Association 2008; By-product classification allocatable product; CPC 4153: Semi-finished products of aluminium or aluminium alloys; pedigree (1,1,1,1,1)
  production volume 460486 kg
  property price 1.44 EUR2005; name secondaryAluminiumOutput_price_EUR2005
    Estimated based on literature values and expert judgement. Aluminium ccast alloys are about 90% of the price of aluminium wrought alloys.
  property carbon content 0
    carbon content on a dry matter basis (reserved; not for manual entry)
  property true value 0.00260039
    allocation property applied in "true value" allocation // value calculated from revenue
  properties: wet mass 1 kg, water content 0, carbon content, fossil 0, water in wet mass 0 kg, carbon content, non-fossil 0, dry mass 1 kg, carbon allocation 0 kg
- copper: 0 kg; source Rentz O. 1999; By-product classification allocatable product; CPC 41413: Refined copper and copper alloys, unwrought; master alloys of copper
  Literature value. Copper uses: Before end-use copper is manufactured into semi fabricated products, such as shapes and ingots (known as 'semis'). These manufacturing processes are subdivided into hot working, cold working and, if necessary, process annealing. Few of the semis are ready for use as such. They more typically travel to first-stage manufacturers, who make metal rods, wire, and casting, and then to component manufacturers who produce such things as motors, valves, and insulated cables The components in turn are incorporated by final-stage manufacturers into a variety of finished products - automobiles, commercial buildings, residential housing, and so forth. These uses account for about 79% of the world-wide consumption of copper.
  production volume 4.22405e6 kg
  properties: dry mass 1 kg, water in wet mass 0 kg, wet mass 1 kg, carbon content, non-fossil 0, water content 0, price 5.52 EUR2005, carbon content, fossil 0, carbon content 0, carbon allocation 0 kg, true value 0.0914382
- zinc concentrate: 0 kg; CPC 14290: Other non-ferrous metal ores and concentrates (other than uranium or thorium ores and concentrates); By-product classification allocatable product
  Calculated value from the knowledge of the properties of both products.
  production volume 5521.97 kg
  property price 0.38 EUR2005; name ByP_price_EUR2005
    Temporary price data. Calculated as 90% of purchasers price based on: Zinc content in concentrate 53%. Concentrate price per kg Zn 86.5% of refined Zn price (13.5% treatment charges according to CHR Metals Limited 2005: Dynamic cost curves. http://www.minecost.com/dynamic.pdf). 2004 zinc price from USGS (2007) Mineral commodity summaries 2007. <http://minerals.usgs.gov/minerals/pubs/mcs/2007/mcs2007.pdf> [Accessed 25 May 2010]
  property zinc content 0.53; name zinc_C_zinc_concentrate
    Zinc content on a dry matter basis. Value taken from teh "zinc mine operation" /GLO dataset.
  property dry mass 1 kg; name DM_zinc_concentrate
  property carbon content 0
    carbon content on a dry matter basis (reserved; not for manual entry)
  property true value 3.67404e-7
    allocation property applied in "true value" allocation // value calculated from revenue
  properties: wet mass 1 kg, water content 0, carbon content, non-fossil 0, carbon content, fossil 0, water in wet mass 0 kg, carbon allocation 0 kg

## Inputs from technosphere
- polyvinylchloride, bulk polymerised: 0.113515 kg; name PVC; lognormal variance with pedigree 0.0118, pedigree (1,4,4,4,2)
  Data are from Ashby 2009.
  properties: wet mass 1 kg, dry mass 1 kg, carbon content, fossil 0.387097
  note on carbon content, fossil: Monomer is vynyl chloride, C2H3Cl (ecoinvent v2.2 report 11_II). MW=62 g/mol
- polypropylene, granulate: 0.134426 kg; name PP; lognormal variance with pedigree 0.0118, pedigree (1,4,4,4,2)
  Data are from Ashby 2009.
  properties: dry mass 1 kg, wet mass 1 kg, carbon content, fossil 0.857143
- brass: 0 kg; pedigree (1,1,1,1,1)
  Data are from Ashby 2009. In terms of outputs, assumed to have gone to scrap copper.
  properties: dry mass 1 kg, wet mass 1 kg
- scrap steel: 0 kg; pedigree (1,1,1,1,1)
  Contains scrap steel and scrap iron-nickel-chrome alloys. Data are from Ashby 2009. The amount is set equal to the input amount for the respective material
  production volume 0 kg
    Calculated from production volume of reference product using the relative outputs.
  properties: wet mass 1 kg, dry mass 1 kg
- aluminium, primary, ingot: 0 kg; name aluminium; pedigree (1,1,1,1,1)
  Data are from Ashby 2009.
  properties: dry mass 1 kg, wet mass 1 kg
- electricity, medium voltage: 1.88197 kWh; lognormal variance with pedigree 0.0118, pedigree (1,4,4,4,2)
  Used here in place of the generic category 'energy' as provided by the original literature source. Convertion from MJ (1kWh = 3.6 MJ). Data are from Ashby 2009.
- waste polypropylene: 0 kg; pedigree (1,1,1,1,1)
  Contains waste polypropylene and waste phenols. Data are from Ashby 2009. The amount is set equal to the input amount for the respective material
  production volume 0 kg
    Calculated from production volume of reference product using the relative outputs.
  properties: water content 0.189061, wet mass 1 kg, carbon content, fossil 0.825208, dry mass 0.841 kg
- scrap aluminium: 0 kg; pedigree (1,1,1,1,1)
  Data are from Ashby 2009. The amount is set equal to the input amount for the respective material
  production volume 0 kg
    Calculated from production volume of reference product using the relative outputs.
  properties: wet mass 1 kg, dry mass 1 kg
- steel, low-alloyed: 0.0507832 kg; name steel; lognormal variance with pedigree 0.0118, pedigree (1,4,4,4,2)
  Data are from Ashby 2009.
  properties: wet mass 1 kg, carbon content, fossil 0.005, dry mass 1 kg
- scrap copper: 0 kg; pedigree (1,1,1,1,1)
  Data are from Ashby 2009. The amount is set equal to the input amount for the respective material. Also contains scrap brass.
  production volume 0 kg
    Calculated from production volume of reference product using the relative outputs.
  properties: dry mass 1 kg, wet mass 1 kg
- polycarbonate: 0.0517789 kg; lognormal variance with pedigree 0.0118, pedigree (1,4,4,4,2)
  Data are from Ashby 2009.
  properties: carbon content, fossil 0.755906, wet mass 1 kg, dry mass 1 kg
- nickel, 99.5%: 0.0219065 kg; name nickel; lognormal variance with pedigree 0.0118, pedigree (1,4,4,4,2)
  Data are from Ashby 2009.
  properties: wet mass 1 kg, dry mass 1 kg
- plastic processing factory: 6.56457e-10 unit; = 1/1516853933; lognormal variance with pedigree 0.3112, pedigree (1,4,4,4,2)
  Used here in place of infrastructure based on the amount of the largest contributor to the final product mass (plastics). This is an estimated value. According to the technology comment of the dataset 'Plastic processing factory construction, GLO' [accessed 19.01.2018], the life time of the tanks is assumed to be 50 years and the annual production is 27000 t/a. Thus, the estimated lifetime output of the factory is 27000 x 50 = 1350000. As the hair dryer mass is 0.89 kg, then the number of hair dryers produced during the lifetime of the factory is 1350000 / 0.00089 = 1516853933 units. The calculation of the infrastructure is therefore 1/life time capacity = 1/1516853933 unit.
- waste plastic, industrial electronics: 0 kg; pedigree (1,1,1,1,1)
  Used here to describe waste from ABS, waste nylons (PA) and waste polycarbonate. Data are from Ashby 2009. The amount is set equal to the input amount for the respective material
  production volume 0 kg
    Calculated from production volume of reference product using the relative outputs.
  properties: wet mass 1 kg, carbon content, fossil 0.81386, dry mass 0.847 kg, water content 0.180638
- nickel smelter slag: -0.0219065 kg; = (nickel)*-1; lognormal variance with pedigree 0.0118, pedigree (1,4,4,4,2)
  Used here to describe waste nickel. Data are from Ashby 2009. The amount is set equal to the input amount for the respective material
  production volume 1.87e6 kg; = Ref('24d315de-a934-4db9-97f2-7e1ce0844ad6', 'ProductionVolume') * ((Ref('a3f47753-c14f-4fed-8c3f-94541c83d42a')*-1) / Ref('24d315de-a934-4db9-97f2-7e1ce0844ad6'))
    Calculated from production volume of reference product using the relative outputs.
  properties: carbon content, fossil 0.00345, dry mass 1 kg, wet mass 1 kg
- waste polyvinylchloride: 0 kg; pedigree (1,1,1,1,1)
  (same comment as for scrap aluminium)
  production volume 0 kg
    Calculated from production volume of reference product using the relative outputs.
  properties: wet mass 1 kg, water content 0.00200401, dry mass 0.998 kg, carbon content, fossil 0.440882
- acrylonitrile-butadiene-styrene copolymer: 0.176248 kg; name ABS; lognormal variance with pedigree 0.0118, pedigree (1,4,4,4,2)
  Data are from Ashby 2009.
  properties: wet mass 1 kg, carbon content, fossil 0.853081, dry mass 1 kg
- iron-nickel-chromium alloy: 0.00796599 kg; name iron_alloy; lognormal variance with pedigree 0.0118, pedigree (1,4,4,4,2)
  Data are from Ashby 2009. Used here in place of nickel-chrome alloys. In terms of outputs, assumed to have gone to scrap steel.
  properties: wet mass 1 kg, dry mass 1 kg
- phenol: 0 kg; pedigree (1,1,1,1,1)
  Data are from Ashby 2009. Used here to describe phenolics. In terms of outputs, assumed to have gone to waste polypropylene.
  properties: dry mass 1 kg, carbon content, fossil 0.765957, wet mass 1 kg
- glass fibre reinforced plastic, polyamide, injection moulded: 0.0806557 kg; name glass_fibre_plastic; lognormal variance with pedigree 0.0118, pedigree (1,4,4,4,2)
  Used here to describe nylons (PA). Data are from Ashby 2009.
  properties: carbon content, fossil 0.446018, wet mass 1 kg, dry mass 1 kg
- copper: 0.0468002 kg; lognormal variance with pedigree 0.0118, pedigree (1,4,4,4,2)
  Data are from Ashby 2009.
  properties: wet mass 1 kg, dry mass 1 kg
- brass: 0.000114511, 0.0227877 kg (2 entries); lognormal variance with pedigree 0.0118, pedigree (1,4,4,4,2)
  Data are from Ashby 2009. In terms of outputs, assumed to have gone to scrap copper.
- scrap steel: -0.0143052, -1.80853e-5, -0.0444259 kg (3 entries); lognormal variance with pedigree 0.0118, pedigree (1,4,4,4,2)
  (same comment as for scrap steel)
  production volume 5.015e6 kg
- aluminium, primary, ingot: 0.0174082, 0.00250676 kg (2 entries); lognormal variance with pedigree 0.0118, pedigree (1,4,4,4,2)
  Data are from Ashby 2009.
- waste polypropylene: -0.016102, -0.00124137, -0.000512731, -0.000486886, -0.0185789, -0.000207138, -9.3883e-5, -0.130063 kg (8 entries); lognormal variance with pedigree 0.0118, pedigree (1,4,4,4,2)
  (same comment as for waste polypropylene)
  production volume 1.428e7 kg
- scrap aluminium: -0.00631719, -0.000296388, -0.0133014 kg (3 entries); lognormal variance with pedigree 0.0118, pedigree (1,4,4,4,2)
  (same comment as for scrap aluminium)
  production volume 1.7e6 kg
- scrap copper: -0.0221101, -0.00103736, -0.0465549 kg (3 entries); lognormal variance with pedigree 0.0118, pedigree (1,4,4,4,2)
  (same comment as for scrap copper)
  production volume 5.95e6 kg
- waste plastic, industrial electronics: -0.004594, -0.304088 kg (2 entries); lognormal variance with pedigree 0.0118, pedigree (1,4,4,4,2)
  (same comment as for waste plastic, industrial electronics)
  production volume 2.635e7 kg
- waste polyvinylchloride: -0.0109264, -0.00084236, -0.000347925, -0.000330387, -0.0126071, -0.000140558, -6.37063e-5, -0.0882569 kg (8 entries); lognormal variance with pedigree 0.0118, pedigree (1,4,4,4,2)
  (same comment as for scrap aluminium)
  production volume 9.69e6 kg
- phenol: 0.00570495, 0.0271548 kg (2 entries); lognormal variance with pedigree 0.0118, pedigree (1,4,4,4,2)
  (same comment as for phenol)

## Sampling procedure
Manufacturing data are taken from Ashby 2009. Data on the annual production volume are assumed to equate to the world demand for hair dryers as estimated by Panasonic IR Day 2012. Sources: Ashby, M.F., 2009. Materials and the Environment. Eco-informed material choice. Elsevier, Oxford, 2009. Panasonic IR Day 2012. Appliances company business strategy. 23 May 2012. Available from: https://www.panasonic.com/global/corporate/ir/pdf/irday_es.pdf (Accessed 12 January 2018).
