# electric parts production, heat and power co-generation unit, 160kW electrical

Dataset: EcoSpold 2, unit process
Geography: RoW
Time period: 1987-01-01 to 2019-12-31
Technology level: current
Classification: ISIC rev.4 ecoinvent: 2710:Manufacture of electric motors, generators, transformers and electricity di
Classification: EcoSpold01Categories: natural gas/cogeneration
Tags: ConvertedDataset
Scenario: Business-as-Usual
System model: Allocation at the point of substitution
Generated by: Thomas Heck
Published in: Heck, T. 2007
Database: ecoinvent
isCopyrightProtected: true
accessRestrictedTo: 1

## General comment
Inventory refers to infrastructure of an existing natural gas cogeneration plant (lambda=1 motor, 160kWe, operation start 1987) at Jakobsberg, Basel, Switzerland. (Life time for operation assumed 100'000 h.)
[This dataset was already contained in the ecoinvent database version 2. It was not individually updated during the transfer to ecoinvent version 3. Life Cycle Impact Assessment results may still have changed, as they are affected by changes in the supply chain, i.e. in other datasets. This dataset was generated following the ecoinvent quality guidelines for version 2. It may have been subject to central changes described in the ecoinvent version 3 change report (http://www.ecoinvent.org/database/ecoinvent-version-3/reports-of-changes/), and the results of the central updates were reviewed extensively. The changes added e.g. consistent water flows and other information throughout the database. The documentation of this dataset can be found in the ecoinvent reports of version 2, which are still available via the ecoinvent website. The change report linked above covers all central changes that were made during the conversion process.]

## Included activities end
The module includes the most important materials used for production. It includes also the transport of these materials and the energy and water needed for production.

## Geography
Data refers to a plant in Switzerland, assumed valid for Europe (RER)

## Technology
Component of a specific cogeneration unit installed in Switzerland. Technology at end of 1980s.

## Parameters
- fraction, process water, to air: 0.15 dimensionless; name fraction_PW_to_air; lognormal variance with pedigree 0.092025, pedigree (4,4,3,2,4)

## Reference product
- electric parts, heat and power co-generation unit, 160kW electrical: 1 unit; CPC 461: Electric motors, generators and transformers, and parts thereof; By-product classification allocatable product
  EcoSpold01Location=RER
  production volume 2.67763 unit
    This is a placeholder value that does not reflect real-world production volumes. This dataset does not currently require a real-world production volume to work in the database framework, and no actual data were collected yet. This has no negative effect on the results of the ecoinvent database.
  property price 1943.6 EUR2005
    Calculated based on inputs: The price of the product has been calculated as a sum of the values of the material and energy inputs for this product. This value is therefore a rough estimation. It may underestimate the real price since there are additional expenses when producing any product. These expences can include for example labour costs, treatment of waste materials and profit for the producer. Please consider carefully whether this level of data quality is acceptable for your application.
  property true value 1943.6
    allocation property applied in "true value" allocation // value calculated from revenue

## By-products
- heat, for reuse in municipal waste incineration only: 0 MJ; CPC 17300: Steam and hot water; By-product classification allocatable product; pedigree (1,1,1,1,1)
  Net electricity generated from this waste and used in internal MSWI plant energy redistribution.
  Uncertainty: uncertainty is calculated from uncertainties in waste composition and uncertainties in energy efficiency and the uncertainty in internal energy demand
  production volume 135.32 MJ
  property exergy 0.1842 MJ; name E_th_prod_MSWI_exergy
    This exergy property is based on the exergy content of the product.
  property price 0.0106 EUR2005; name E_th_prod_MSWI_price_EUR2005
    Average European district heat price from Ecoheatcool and Euroheat 2005-2006, Ecoheat Work package 1: The European heat market. Final report. 10.6 EUR/GJ i s the price of district heat. http://www.solarthermalworld.org/files/Ecoheatcool%20WP1%20Web.pdf?download
  property true value relation 0.1842; name E_th_prod_MSWI_true_value_relation
    property to calculate "true value" from
  property true value 0.244036
    allocation property applied in "true value" allocation // value calculated from true value relation
- electricity, for reuse in municipal waste incineration only: 0 kWh; CPC 17100: Electrical energy; By-product classification allocatable product; pedigree (1,1,1,1,1)
  (same comment as for heat, for reuse in municipal waste incineration only)
  production volume 19.2498 kWh
  property price 0.1 EUR2005; name E_el_prod_MSWI_price_EUR2005
    Estimated to be the same price as in case of electricity, medium voltage.
  property exergy 3.6 MJ; name E_el_prod_MSWI_exergy
    This exergy property is based on the exergy content of the product.
  property true value relation 3.6; name E_el_prod_MSWI_true_value_relation
    property to calculate "true value" from
  property true value 0.678473
    (same comment as for heat, for reuse in municipal waste incineration only)

## Inputs from technosphere
- wastewater from pig iron production: -0.0730653 m3; lognormal variance with pedigree 0.342, pedigree (1,1,5,5,1)
  EcoSpold01Location=CH
  rough estimate, uncertainty refers to amount of water only; not quantified here: composition of waste water unkown, therefore high uncertainty of applicability of modul.
  production volume 0.2193 m3
    Calculated from the production volume of electric parts, cogen unit 160kWe in proportion to the respective output amounts.
  properties: wet mass 1000 kg, carbon content, fossil 1.2149e-5, water content 2962.17, dry mass 0.337476 kg
  note on carbon content, fossil: TOC = 0.0000041 kg/m3 (Tab A.19, ecoinvent v2.2 report 13_I). TOC was considered as Total Carbon.
- transport, passenger car: 5697.3 km; lognormal variance with pedigree 0.252, pedigree (1,1,5,5,1)
  uncertainty of person kilometres
  EcoSpold01Location=RER
- electricity, medium voltage: 0 kWh; pedigree (1,1,1,1,1)
  EcoSpold01Location=UCTE
  estimate based on material price
- aluminium, wrought alloy: 0.0999526 kg; lognormal variance with pedigree 0.342, pedigree (1,1,5,5,1)
  EcoSpold01Location=RER
  estimate based on material price
  properties: wet mass 1 kg, dry mass 1 kg
- polyvinylchloride, suspension polymerised: 0.500895 kg; lognormal variance with pedigree 0.342, pedigree (1,1,5,5,1)
  EcoSpold01Location=RER
  estimate based on material price
  properties: carbon content, fossil 0.387097, dry mass 1 kg, wet mass 1 kg
  note on carbon content, fossil: Monomer is vynyl chloride, C2H3Cl (ecoinvent v2.2 report 11_II). MW=62 g/mol
- tin: 0.996527 kg; lognormal variance with pedigree 0.342, pedigree (1,1,5,5,1)
  EcoSpold01Location=RER
  estimate based on material price
  properties: wet mass 1 kg, dry mass 1 kg
- nickel, 99.5%: 0.2099 kg; lognormal variance with pedigree 0.342, pedigree (1,1,5,5,1)
  EcoSpold01Location=GLO
  estimate based on material price
  properties: dry mass 1 kg, wet mass 1 kg
- polyethylene, low density, granulate: 47.3775 kg; lognormal variance with pedigree 0.342, pedigree (1,1,5,5,1)
  estimate based on material price
  EcoSpold01Location=RER
  properties: carbon content, fossil 0.857143, wet mass 1 kg, dry mass 1 kg
  note on carbon content, fossil: Polyethylene is formed out of a huge amount of ethylene monomers (C2H4) (ecoinvent v2.2 report 11_II). MW=28 g/mol
- platinum: 0.00129938 kg; lognormal variance with pedigree 0.342, pedigree (1,1,5,5,1)
  EcoSpold01Location=RER
  estimate based on material price
  properties: dry mass 1 kg, wet mass 1 kg
- copper: 6.49692 kg; lognormal variance with pedigree 0.342, pedigree (1,1,5,5,1)
  EcoSpold01Location=RER
  estimate based on material price
  properties: wet mass 1 kg, dry mass 1 kg
- heat, district or industrial, other than natural gas: 0 MJ; pedigree (1,1,1,1,1)
  EcoSpold01Location=RER
  estimate based on material price
- zinc: 0.153927 kg; lognormal variance with pedigree 0.342, pedigree (1,1,5,5,1)
  estimate based on material price
  EcoSpold01Location=RER
  properties: dry mass 1 kg, wet mass 1 kg
- reinforcing steel: 52.675 kg; lognormal variance with pedigree 0.342, pedigree (1,1,5,5,1)
  EcoSpold01Location=RER
  estimate based on material price
  properties: carbon content, fossil 0.004, dry mass 1 kg, wet mass 1 kg
- waste plastic, mixture: 0 kg; pedigree (1,1,1,1,1)
  EcoSpold01Location=CH
  production volume 0 kg
    (same comment as for wastewater from pig iron production)
  properties: carbon content, fossil 0.747344, water content 0.180638, wet mass 1 kg, dry mass 0.847 kg
  note on carbon content, fossil: C content in 1 kg DM was calculated using data in Tab A.2, ecoinvent v2.2 report 13_I
- lead: 0.469777 kg; lognormal variance with pedigree 0.342, pedigree (1,1,5,5,1)
  estimate based on material price
  EcoSpold01Location=RER
  properties: wet mass 1 kg, dry mass 1 kg
- electricity, medium voltage: 74.1893, 13.4993, 228.928, 3319.22, 475.043, 1556.43 kWh (6 entries); lognormal variance with pedigree 0.342, pedigree (1,1,5,5,1)
  EcoSpold01Location=UCTE
  estimate based on material price
- heat, district or industrial, other than natural gas: 13.1478, 29327.9 MJ (2 entries); lognormal variance with pedigree 0.342, pedigree (1,1,5,5,1)
  EcoSpold01Location=RER
  estimate based on material price
- waste plastic, mixture: -6.38724, -0.42677, -0.032276, -0.176271, -0.0712117, -0.167386, -44.7142 kg (7 entries); lognormal variance with pedigree 0.1246, pedigree (3,3,5,5,4)
  EcoSpold01Location=CH
  production volume 156 kg

## Inputs from nature
- Water, unspecified natural origin [natural resource, in water]: 0.0913566 m3; name water_UNO_input; lognormal variance with pedigree 0.342, pedigree (1,1,5,5,1)
  rough estimate

## Emissions to nature
- Water [air, unspecified]: 0.0137035 m3; name water_to_air_unspecified; lognormal variance with pedigree 0.0827, pedigree (2,2,5,5,1)
  Calculated value based on literature values and expert opinion. See comments in the parametres' comment field.
  property fraction, origin: salt water 0; name fraction_origin_salt_water
  property fraction, origin: fresh water 0; name fraction_origin_fresh_water
  property fraction, origin: unspecified 1; name fraction_origin_unspecified
- Water [water, unspecified]: 0.00458782 m3; name water_to_water_unspecified; lognormal variance with pedigree 0.0827, pedigree (2,2,5,5,1)
  (same comment as for Water)
  property fraction, origin: fresh water 0; name fraction_origin_fresh_water_Ww
  property fraction, origin: unspecified 1; name fraction_origin_unspecified_Ww
  property fraction, origin: salt water 0; name fraction_origin_salt_water_Ww
  property dry mass 0 kg; name DM
  property water in wet mass 1000 kg; name WWM
  property carbon content, non-fossil 0; name C_content_non_fossil
  property wet mass 1000 kg; name WM
  property carbon content, fossil 0; name C_content_fossil

## Sampling procedure
Operator and manufacturer information

## Extrapolations
see Geography/Text This dataset has been copied from an original dataset covering the geography RER. The uncertainty has been adjusted accordingly.

## Review by Gerald Rebitzer (obsolete) 2003-08-27
had passed
