# ethanol production from grass

Dataset: EcoSpold 2, unit process
Geography: CH
Time period: 2000-01-01 to 2019-12-31
Technology level: current
Classification: EcoSpold01Categories: biomass/production
Classification: ISIC rev.4 ecoinvent: 19a: Liquid and gaseous fuels from biomass
Tags: ConvertedDataset
Scenario: Business-as-Usual
System model: Allocation at the point of substitution
Share of production covered: 100 %
Generated by: Jürgen Sutter
Published in: Jungbluth N. 2007
Database: ecoinvent
isCopyrightProtected: true
accessRestrictedTo: 1

## General comment
The multioutput-process 'grass, to fermentation' delivers the co-products Ethanol, 95% in H20, from grass', 'fibres from grass', and 'proteins from grass'. The allocation is based on economic criteria. The production of ethanol from grass is of no economical importance in the world.
[This dataset was already contained in the ecoinvent database version 2. It was not individually updated during the transfer to ecoinvent version 3. Life Cycle Impact Assessment results may still have changed, as they are affected by changes in the supply chain, i.e. in other datasets. This dataset was generated following the ecoinvent quality guidelines for version 2. It may have been subject to central changes described in the ecoinvent version 3 change report (http://www.ecoinvent.org/database/ecoinvent-version-3/reports-of-changes/), and the results of the central updates were reviewed extensively. The changes added e.g. consistent water flows and other information throughout the database. The documentation of this dataset can be found in the ecoinvent reports of version 2, which are still available via the ecoinvent website. The change report linked above covers all central changes that were made during the conversion process.]

## Included activities end
Fermentation of grass including materials, energy uses, infrastructure, and emissions.

## Geography
The inventory is modelled with data from a pilot plant in Switzerland.

## Technology
Production of ethanol from grass with the Saccharification and Simultanous Fermentation process.

## Time period
Time of publications.

## Reference product
- ethanol, without water, in 95% solution state, from fermentation: 1 kg; name RP; CPC 35491: Biodiesel; By-product classification allocatable product; CAS 64-17-5
  production volume 3.54509e7 kg; name PVRP
    Matched with the global Production volume as this process is Swiss relevant only.
  property price 0.324 EUR2005
    Temporary price data. Calculated as 90% of purchasers price based on: 2005 prices from FAPRI2007, 2009. Agricultural outlook. (http://www.fapri.missouri.edu/outreach/publications/ag_outlook.asp?current_page=outreach; accessed 22/06/10). Unit conversion from US gallon to kg - 1 gallon = 3.7856 liter * 0.789 kg/liter (ethanol density) = 2.9868 kg
  property carbon content 0.521739
    carbon content on a dry matter basis (reserved; not for manual entry)
  property true value 0.0401274; name RP_true_value
    allocation property applied in "true value" allocation // value calculated from revenue
  properties: water content 0, water in wet mass 0 kg, carbon content, non-fossil 0.521739, carbon content, fossil 0, dry mass 1 kg, wet mass 1 kg, carbon allocation 0.521739 kg

## By-products
- protein feed, 100% crude: 0 kg; name BP2; By-product classification allocatable product; CPC 23319: Preparations used in animal feeding n.e.c.
  production volume 7.13427e7 kg; = PVRP*BP2/RP
    The production of ethanol from grass in Switzerland was 15000 hl in 2000.
    Calculated from the production volume of ethanol, without water, in 95% solution state, from fermentation in proportion to the respective output amounts.
  property carbon content, non-fossil 0.53
    considered pure protein (ecoinvent v2.2 report 17, pg 288). C-content in protein is estimated to be 53% ( from 'Evolutionary and Biochemical Aspects', A.D. Kay and T. Vrede (in Global Ecology, 2010, Elsevier B.V., S.E. Jørgensen Ed.).
  property price 0.424 EUR2005
    Based on protein content and energy feed, gross content in soybean meal and prices per kg of soybean meal. Assumed soybean meal is the most used feed. Soybean meal 2004 prices for World import/export data (tonnes and US$) from FaoStat statistics (http://faostat.fao.org/site/535/default.aspx#ancor, TRADE)- [Accessed 24 May 2010]. See calculations for protein /energy content
  property carbon content 0.53
    carbon content on a dry matter basis (reserved; not for manual entry)
  property true value 0.105678; name BP2_true_value
    allocation property applied in "true value" allocation // value calculated from revenue
  properties: water content 0, water in wet mass 0 kg, dry mass 1 kg, wet mass 1 kg, carbon content, fossil 0, carbon allocation 0.53 kg
- energy feed, gross: 0 MJ; source Agroscope 2011; CPC 23319: Preparations used in animal feeding n.e.c.; By-product classification allocatable product; pedigree (1,1,1,1,1)
  Calculated based on formula for calculating the gross energy of straw and grass feedstuff (Agroscope, 2011).
  Gross Energy (MJ/kg dry mass) = 0.0188 * Organic Substances (g/kgDM) + 0.0078* Crude Protein (g/kg DM)
  The Organic Substances is obtained from rye straw (OS = 955 g/kgDM), since no specific data is given for grass fibres. The formula for calculating the OS content is based on the ash content (ash content of rye straw is 45 g/kg DM). The dry mass of the reference product is 0.979kg/kg.
  OS (g/kgDM)= 1000- Ash content (g/kgDM)
  production volume 1.02943e9 MJ
  property price 0.0108 EUR2005; name gross_energy_output_1_1_price_EUR2005
    Based on energy feed, gross content in soybean meal and prices per kg of soybean meal. Assumed soybean meal is the most used feed. Soybean meal 2004 prices for World import/export data (tonnes and US$) from FaoStat statistics (http://faostat.fao.org/site/535/default.aspx#ancor, TRADE)- [Accessed 24 May 2010]. See calculations for protein /energy content
  property carbon content 0
    carbon content on a dry matter basis (reserved; not for manual entry)
  property true value 0.0388407
    allocation property applied in "true value" allocation // value calculated from revenue
  properties: carbon content, non-fossil 0, carbon content, fossil 0, water in wet mass 0 kg, wet mass 1 kg, dry mass 1 kg, water content 0, carbon allocation 0 kg

## Inputs from technosphere
- electricity, medium voltage: 0.547347 kWh; lognormal variance with pedigree 0.04, pedigree (1,1,5,1,1)
  Frometin 2000
  Frometin 2000
- grass fibre: -0.351486 kg; name BP1
  production volume 5.73369e7 kg; = PVRP*BP1/RP
    (same comment as for protein feed, 100% crude)
  properties: price 0.645 EUR2005, carbon content, non-fossil 0.46, wet mass 1 kg, water content 0.0214505, dry mass 0.979 kg
  note on carbon content, non-fossil: considered pure fibre (Tab 12.43, ecoinvent v2.2 report 17). C-content in fibre is estimated to be 46% in dry mass (from 'Evolutionary and Biochemical Aspects', A.D. Kay and T. Vrede (in Global Ecology, 2010, Elsevier B.V., S.E. Jørgensen Ed.)).
- ethanol fermentation plant: 8.68581e-11 unit; lognormal variance with pedigree 0.3626, pedigree (2,4,5,5,3)
  Estimation
  This exchange has an activity link directly to the producing activity because the product is primarily consumed in the same geographical area where it is produced.
- heat, central or small-scale, other than natural gas: 6.15763 MJ; lognormal variance with pedigree 0.04, pedigree (1,1,5,1,1)
  Frometin 2000
  Frometin 2000
- grass, Swiss integrated production: 1.75471 kg; lognormal variance with pedigree 0.0406, pedigree (1,3,5,1,1)
  Frometin 2000
  Frometin 2000
  properties: carbon content, non-fossil 0.443857, dry mass 1 kg, water content 5.66667, wet mass 6.66667 kg
  note on carbon content, non-fossil: Composition data obtained from the average composition of Fescue Fresh, Orchardgrass Fresh, and Timothy Fresh in (http://beefmagazine.com/images/2009%20feed%20table.pdf). First, composition data were refered to 1 kg dry mass. Then, C-contents were calculated considering a C-content/dry mass of 46% in carbohydrates (including fibres), 53% in proteins and 75% in fats. All data from 'Evolutionary and Biochemical Aspects', A.D. Kay and T. Vrede (in Global Ecology, 2010, Elsevier B.V., S.E. Jørgensen Ed.).

## Emissions to nature
- Carbon dioxide, non-fossil [air, urban air close to ground]: 1.29236 kg; lognormal variance with pedigree 0.058, pedigree (4,1,5,1,1)
  Calculated from the carbon balance

## Sampling procedure
Literature data

## Extrapolations
Some data are derived from other or unknown plants or have been estimated.

## Review by Niels Jungbluth 2006-05-05
Passed.

## Review by Emilia Moreno Ruiz 2012-03-16
name change from 'proteins from ethanol fermentation of grass' to 'protein feed, 100% crude'
