# pump production, 40W

Dataset: EcoSpold 2, unit process
Geography: CH
Time period: 1994-01-01 to 2019-12-31
Technology level: current
Classification: EcoSpold01Categories: solar collector systems/production of components
Classification: ISIC rev.4 ecoinvent: 2812:Manufacture of fluid power equipment
Tags: ConvertedDataset
Scenario: Business-as-Usual
System model: Allocation at the point of substitution
Generated by: Niels Jungbluth
Published in: Jungbluth, N. 2007
Database: ecoinvent
isCopyrightProtected: true
accessRestrictedTo: 1

## General comment
Water pump Grundfos UP 15-35x20 with a capacity of 40W for use in solar collector systems.
[This dataset was already contained in the ecoinvent database version 2. It was not individually updated during the transfer to ecoinvent version 3. Life Cycle Impact Assessment results may still have changed, as they are affected by changes in the supply chain, i.e. in other datasets. This dataset was generated following the ecoinvent quality guidelines for version 2. It may have been subject to central changes described in the ecoinvent version 3 change report (http://www.ecoinvent.org/database/ecoinvent-version-3/reports-of-changes/), and the results of the central updates were reviewed extensively. The changes added e.g. consistent water flows and other information throughout the database. The documentation of this dataset can be found in the ecoinvent reports of version 2, which are still available via the ecoinvent website. The change report linked above covers all central changes that were made during the conversion process.]

## Included activities end
Production and disposal of a water pump. Including materials. Not including energy use of production and infrastructure for factory.

## Geography
Pump produced in CH.

## Technology
Circulating pump for heat exchange fluid in solar collector systems for a one family dwelling.

## Time period
Time of weighting the different parts of the pump.

## Reference product
- pump, 40W: 1 unit; By-product classification allocatable product; CPC 432: Pumps, compressors, hydraulic and pneumatic power engines, and valves, and parts thereof
  production volume 0.0336675 unit
    This is a placeholder value that does not reflect real-world production volumes. This dataset does not currently require a real-world production volume to work in the database framework, and no actual data were collected yet. This has no negative effect on the results of the ecoinvent database. The placeholder value of this activity was scaled according to the nominal GDP of 2005 (source: United Nations, http://data.un.org/Glossary.aspx?q=GDP+%28current+US%24%29, accessed 20130726) to reflect an appropriate share of the global production volume, which is also a placeholder value.
  property price 13.6 EUR2005
    EU27 I/O database, the price of "_66 machinery and equipment n.e.c., EU27" (in the 'EU & DK Input Output Database' (available in SimaPro))(5.71 Euro/kg DS); 2.4 kg/unit
  property true value 13.6
    allocation property applied in "true value" allocation // value calculated from revenue

## By-products
- electricity, for reuse in municipal waste incineration only: 0 kWh; CPC 17100: Electrical energy; By-product classification allocatable product; pedigree (1,1,1,1,1)
  Net electricity generated from this waste and used in internal MSWI plant energy redistribution.
  Uncertainty: uncertainty is calculated from uncertainties in waste composition and uncertainties in energy efficiency and the uncertainty in internal energy demand
  production volume 0.0276305 kWh
  property exergy 3.6 MJ; name E_el_prod_MSWI_exergy
    This exergy property is based on the exergy content of the product.
  property true value relation 3.6; name E_el_prod_MSWI_true_value_relation
    property to calculate "true value" from
  property price 0.1 EUR2005; name E_el_prod_MSWI_price_EUR2005
    Estimated to be the same price as in case of electricity, medium voltage.
  property true value 0.00360011
    allocation property applied in "true value" allocation // value calculated from true value relation
- heat, for reuse in municipal waste incineration only: 0 MJ; CPC 17300: Steam and hot water; By-product classification allocatable product; pedigree (1,1,1,1,1)
  Net useful heat generated from this waste and used in internal MSWI plant energy redistribution.
  Uncertainty: uncertainty is calculated from uncertainties in waste composition and uncertainties in energy efficiency and the uncertainty in internal energy demand
  production volume 0.212817 MJ
  property true value relation 0.1842; name E_th_prod_MSWI_true_value_relation
    property to calculate "true value" from
  property exergy 0.1842 MJ; name E_th_prod_MSWI_exergy
    This exergy property is based on the exergy content of the product.
  property price 0.0106 EUR2005; name E_th_prod_MSWI_price_EUR2005
    Average European district heat price from Ecoheatcool and Euroheat 2005-2006, Ecoheat Work package 1: The European heat market. Final report. 10.6 EUR/GJ i s the price of district heat. http://www.solarthermalworld.org/files/Ecoheatcool%20WP1%20Web.pdf?download
  property true value 0.0014188
    (same comment as for electricity, for reuse in municipal waste incineration only)
- zinc concentrate: 0 kg; CPC 14290: Other non-ferrous metal ores and concentrates (other than uranium or thorium ores and concentrates); By-product classification allocatable product
  Calculated value from the knowledge of the properties of both products.
  production volume 0.000126959 kg
  property price 0.38 EUR2005; name ByP_price_EUR2005
    Temporary price data. Calculated as 90% of purchasers price based on: Zinc content in concentrate 53%. Concentrate price per kg Zn 86.5% of refined Zn price (13.5% treatment charges according to CHR Metals Limited 2005: Dynamic cost curves. http://www.minecost.com/dynamic.pdf). 2004 zinc price from USGS (2007) Mineral commodity summaries 2007. <http://minerals.usgs.gov/minerals/pubs/mcs/2007/mcs2007.pdf> [Accessed 25 May 2010]
  property zinc content 0.53; name zinc_C_zinc_concentrate
    Zinc content on a dry matter basis. Value taken from teh "zinc mine operation" /GLO dataset.
  property dry mass 1 kg; name DM_zinc_concentrate
  property carbon content 0
    carbon content on a dry matter basis (reserved; not for manual entry)
  property true value 4.82445e-5
    allocation property applied in "true value" allocation // value calculated from revenue
  properties: wet mass 1 kg, water content 0, carbon content, non-fossil 0, carbon content, fossil 0, water in wet mass 0 kg, carbon allocation 0 kg

## Inputs from technosphere
- synthetic rubber: 0.00699739 kg; lognormal variance with pedigree 0.0686, pedigree (2,5,5,1,1)
  Own measurement
  Own measurement
  properties: wet mass 1 kg, carbon content, fossil 0.871949, dry mass 1 kg
  note on carbon content, fossil: EPDM (Ethylene-propene-diene terpolymer) rubber is a terpolymer of ethylene, propene, and a diene with the residual unsaturated portion of the diene in the side chain (ecoinvent v2.2 report 7-part XX & Ullmann). Chemical formula (deduced from Evidences of Solvent-Induced Miscibility in Polychloroprene-co-Ethylene-Propene Diene Terpolymer Blends, Dubey et al., Journal of Applied Polymer Science, 2009, 111:1884–1891): C20H35
- waste plastic, mixture: -0.00699739 kg; lognormal variance with pedigree 0.0686, pedigree (2,5,5,1,1)
  Estimation
  Estimation
  production volume 0.007 kg
    Calculated from the production volume of pump, 40W in proportion to the respective output amounts.
  properties: carbon content, fossil 0.747344, dry mass 0.847 kg, water content 0.180638, wet mass 1 kg
  note on carbon content, fossil: C content in 1 kg DM was calculated using data in Tab A.2, ecoinvent v2.2 report 13_I
- aluminium, wrought alloy: 0.0199926 kg; lognormal variance with pedigree 0.0686, pedigree (2,5,5,1,1)
  Own measurement
  Own measurement
  properties: dry mass 1 kg, wet mass 1 kg
- cast iron: 1.19955 kg; lognormal variance with pedigree 0.0686, pedigree (2,5,5,1,1)
  Own measurement
  Own measurement
  properties: wet mass 1 kg, carbon content, fossil 0.04, dry mass 1 kg
  note on carbon content, fossil: Cast iron is made by remelting pig iron in small furnaces (e.g. cupola furnaces or electric arc furnaces) and poured into moulds to make castings. It usually contains 2% to 6% carbon (ecoinvent v2.2 report 10_partII). An average content of 4% was considered
- waste polyvinylchloride product: -0.0299888 kg; lognormal variance with pedigree 0.0686, pedigree (2,5,5,1,1)
  Estimation
  Estimation
  production volume 0.03 kg
    (same comment as for waste plastic, mixture)
  properties: wet mass 1 kg, carbon content, fossil 0.440882, dry mass 0.998 kg, water content 0.00200401
- hot water tank factory: 1.99926e-7 unit; lognormal variance with pedigree 0.648, pedigree (5,5,5,1,5)
  Rough estimation
  This exchange has an activity link directly to the producing activity because the product is primarily consumed in the same geographical area where it is produced.
- copper: 0.249907 kg; lognormal variance with pedigree 0.0686, pedigree (2,5,5,1,1)
  Own measurement
  Own measurement
  properties: dry mass 1 kg, wet mass 1 kg
- steel, chromium steel 18/8, hot rolled: 0.919657 kg; lognormal variance with pedigree 0.0686, pedigree (2,5,5,1,1)
  Own measurement
  Own measurement
  properties: carbon content, fossil 0.0008, dry mass 1 kg, wet mass 1 kg
  note on carbon content, fossil: Stainless steel model is the grade 304 steel (18/8 stainless, 18% chromium 8% nickel; max. 0.08% C)
- polyvinylchloride, emulsion polymerised: 0.00382837 kg; lognormal variance with pedigree 0.0686, pedigree (2,5,5,1,1)
  Own measurement
  Own measurement
  properties: dry mass 1 kg, carbon content, fossil 0.387097, wet mass 1 kg
  note on carbon content, fossil: Monomer is vynyl chloride, C2H3Cl (ecoinvent v2.2 report 11_II). MW=62 g/mol
- polyvinylchloride, suspension polymerised: 0.0261605 kg; lognormal variance with pedigree 0.0686, pedigree (2,5,5,1,1)
  Own measurement
  Own measurement
  properties: dry mass 1 kg, carbon content, fossil 0.387097, wet mass 1 kg

## Sampling procedure
Own weighting of the different parts of the pump.

## Review by Sebastiano Meier 2003-07-29
Passed.
