# cable production, printer cable, without plugs

Dataset: EcoSpold 2, unit process
Geography: GLO
Time period: 2000-01-01 to 2019-12-31
Technology level: current
Classification: ISIC rev.4 ecoinvent: 2610:Manufacture of electronic components and boards
Classification: EcoSpold01Categories: electronics/component
Synonyms: Printer cord
Tags: ConvertedDataset
Scenario: Business-as-Usual
System model: Allocation at the point of substitution
Generated by: Martin Lehmann
Published in: Hischier R. 2007
Database: ecoinvent
isCopyrightProtected: false
accessRestrictedTo: 1

## General comment
This dataset represents the production of 1 m of a typical printer cable to connect to the desktop or laptop computer. It is based on a a parallel, DB25 ST/Cen36 ST (1.8 m), brand name “Roline”, with a weight of 0.072 kg (without plugs). Main data are based on weighting and calculations of a Swiss type computer cable at EMPA laboratories, supported by EPD information.
[This dataset was already contained in the ecoinvent database version 2. It was not individually updated during the transfer to ecoinvent version 3. Life Cycle Impact Assessment results may still have changed, as they are affected by changes in the supply chain, i.e. in other datasets. This dataset was generated following the ecoinvent quality guidelines for version 2. It may have been subject to central changes described in the ecoinvent version 3 change report (http://www.ecoinvent.org/database/ecoinvent-version-3/reports-of-changes/), and the results of the central updates were reviewed extensively. The changes added e.g. consistent water flows and other information throughout the database. The documentation of this dataset can be found in the ecoinvent reports of version 2, which are still available via the ecoinvent website. The change report linked above covers all central changes that were made during the conversion process.]

## Included activities start
From reception of metal and plastic materials at the factory gate.

## Included activities end
This dataset includes the materials copper, PVC, and aluminium with their attributed manufacturing processes like wire drawing or extrusion, infrastructure, electricity for the assembly of the connector, the fuel oil, propane and water input, the disposal of plastic and rubber parts, the VOC and methanol emissions created during the processing, plus the road and rail transportation for input materials from the regional storage to the production site. The accumulated hazardous waste is also reported.

## Geography
The data describes a typical printer cable in 2006. The kind of printer cable is produced by international manufacturers and available all over the world. Therefore a global dataset is justifiable.

## Technology
The manufacturing process is represented through plastic extrusion (PVC), sheet rolling (aluminium), and wire drawing (copper). Cable manufacturing is a process that typically is composed of: Insulation of copper conductors or optical fibres with selected polymer(s); If specified, shielding of insulated copper conductors (based on cable design); If specified, twisting of insulated conductors into pairs or triplets or quads (based on cable design); If specified, shielding of insulated pairs, triplets, or quads (based on cable design); Cabling of insulated conductors and/or pairs, triplets, quads into groups (based on cable de-sign); If specified, shielding of group(s) of conductors/pairs/triplets (based on cable design); Cabling of together unshielded and shielded groups of conductors into the cable bundle; If specified, overall shielding of cable bundle (based on cable design); If specified, application of separation barriers around cable bundle and/or overall shield; Jacketing over cable bundle or shielded cable bundle with selected polymer; Perform outgoing QA testing (tests based on cable design).

## Parameters
- fraction, tap water, to air: 0.061; name fraction_TW_to_air; = fraction_PW_to_air; lognormal variance with pedigree 0.092025, pedigree (4,4,3,2,4)
  Calculated value. See comment in the other parametres present in this dataset. Tap water is considered to be always used as process water, thus process water fractions to air are applied to all tap water input flows to calculate the amount of water consumed in the processes.
- fraction, process water, to air: 0.061 dimensionless; name fraction_PW_to_air; lognormal variance with pedigree 0.092025, pedigree (4,4,3,2,4)
  Literature value (Statistics Canada, 2007 & Shaffer, K.H., 2008, Consumptive water use in the Great Lakes Basin, USGS) (Vionnet, S., Quantis Water Database - Technical Report, 2012).

## Reference product
- cable, printer cable, without plugs: 1 m; CPC 471: Electronic valves and tubes; electronic components; parts thereof; By-product classification allocatable product
  A printer cable refers to the cable that carries data between a computer and a printer. There are many different types of printer cables, for example: Serial, Parallel, Fire wire, USB. Parallel ports are not built in most new computers anymore, but are still part of the majority of computers currently in use. For new laptops and PCs with parallel port printers and scanners, USB adapters are available, commonly through docking stations. The key features of this specific printer cable are:
  parallel printer cable for PC
  bidirectional
  Cen 36 male to DB 25 female
  length 5m
  25 cores
  connection 1:1
  long thumb screws (DB 25)
  shielded cable (foil)
  molded plugs with strain relief
  for standard printers (ink jet, laser, impact printers)
  not to use with IEEE 1284 printers (high speed EPP mode)
  EcoSpold01Location=GLO
  production volume 1 m
    Unknown
    Dummy value to be replaced by measured, estimated or calculated value
  property price 0.933707 EUR2005
    Calculated based on inputs: The price of the product has been calculated as a sum of the values of the material and energy inputs for this product. This value is therefore a rough estimation. It may underestimate the real price since there are additional expenses when producing any product. These expences can include for example labour costs, treatment of waste materials and profit for the producer. Please consider carefully whether this level of data quality is acceptable for your application.
  property carbon content, fossil 0.282258
    Calculated as the addition of C contents in the product composition. Then referred to 1 kg DM
  property carbon content 0.282258
    carbon content on a dry matter basis (reserved; not for manual entry)
  property true value 0.933707
    allocation property applied in "true value" allocation // value calculated from revenue
  properties: water in wet mass 0 kg, carbon content, non-fossil 0, water content 0, dry mass 0.072 kg, wet mass 0.072 kg, carbon allocation 0.0203226 kg

## By-products
- heat, for reuse in municipal waste incineration only: 0 MJ; CPC 17300: Steam and hot water; By-product classification allocatable product; pedigree (1,1,1,1,1)
  Net electricity generated from this waste and used in internal MSWI plant energy redistribution.
  Uncertainty: uncertainty is calculated from uncertainties in waste composition and uncertainties in energy efficiency and the uncertainty in internal energy demand
  production volume 0.00157804 MJ
  property exergy 0.1842 MJ; name E_th_prod_MSWI_exergy
    This exergy property is based on the exergy content of the product.
  property price 0.0106 EUR2005; name E_th_prod_MSWI_price_EUR2005
    Average European district heat price from Ecoheatcool and Euroheat 2005-2006, Ecoheat Work package 1: The European heat market. Final report. 10.6 EUR/GJ i s the price of district heat. http://www.solarthermalworld.org/files/Ecoheatcool%20WP1%20Web.pdf?download
  property true value relation 0.1842; name E_th_prod_MSWI_true_value_relation
    property to calculate "true value" from
  property true value 7.71559e-6
    allocation property applied in "true value" allocation // value calculated from true value relation
- electricity, for reuse in municipal waste incineration only: 0 kWh; CPC 17100: Electrical energy; By-product classification allocatable product; pedigree (1,1,1,1,1)
  (same comment as for heat, for reuse in municipal waste incineration only)
  production volume 0.000224484 kWh
  property price 0.1 EUR2005; name E_el_prod_MSWI_price_EUR2005
    Estimated to be the same price as in case of electricity, medium voltage.
  property exergy 3.6 MJ; name E_el_prod_MSWI_exergy
    This exergy property is based on the exergy content of the product.
  property true value relation 3.6; name E_el_prod_MSWI_true_value_relation
    property to calculate "true value" from
  property true value 2.14511e-5
    (same comment as for heat, for reuse in municipal waste incineration only)

## Inputs from technosphere
- wire drawing, copper: 0.0195994 kg; lognormal variance with pedigree 0.0527, pedigree (2,4,5,3,1)
  Measured Value, in the Empa laboratories.
  EcoSpold01Location=RER
- aluminium, wrought alloy: 0.000899972 kg; lognormal variance with pedigree 0.0521, pedigree (1,4,5,3,1)
  EcoSpold01Location=RER
  Measured Value, in the Empa laboratories.
  properties: dry mass 1 kg, wet mass 1 kg
- liquefied petroleum gas: 1.33546e-5 kg; source Draka 2004; lognormal variance with pedigree 0.0527, pedigree (2,4,5,3,1)
  Literature Value.
  EcoSpold01Location=RER
  properties: dry mass 1 kg, wet mass 1 kg, carbon content, fossil 0.821863
- hazardous waste, for incineration: 0 kg; source Draka 2004; pedigree (1,1,1,1,1)
  Literature Value.
  EcoSpold01Location=CH
  production volume 0 kg
    Calculated from the production volume of cable, printer cable, without plugs in proportion to the respective output amounts.
  properties: carbon content, fossil 0.554667, water content 0.333333, wet mass 1 kg, dry mass 0.75 kg
  note on carbon content, fossil: Tab A.6, ecoinvent v2.2 report 13_I. C content has been calculated after data in the tables, and then referred to 1 kg DM
- waste plastic, mixture: 0 kg; source Draka 2004; pedigree (1,1,1,1,1)
  Literature Value.
  EcoSpold01Location=CH
  production volume 0 kg
    (same comment as for hazardous waste, for incineration)
  properties: dry mass 0.847 kg, wet mass 1 kg, carbon content, fossil 0.747344, water content 0.180638
  note on carbon content, fossil: C content in 1 kg DM was calculated using data in Tab A.2, ecoinvent v2.2 report 13_I
- printed wiring board mounting facility: 1.49755e-8 unit; lognormal variance with pedigree 0.3527, pedigree (2,4,5,3,1)
  EcoSpold01Location=GLO
  Proxy, infrastructure for printed wiring board is used.
- extrusion, plastic pipes: 0.0524984 kg; lognormal variance with pedigree 0.0527, pedigree (2,4,5,3,1)
  Measured Value, in the Empa laboratories.
  EcoSpold01Location=RER
- sheet rolling, aluminium: 0.000899972 kg; lognormal variance with pedigree 0.0521, pedigree (1,4,5,3,1)
  EcoSpold01Location=RER
  Measured Value, in the Empa laboratories.
- polyvinylchloride, suspension polymerised: 0.0457964 kg; lognormal variance with pedigree 0.0527, pedigree (2,4,5,3,1)
  Measured Value, in the Empa laboratories.
  EcoSpold01Location=RER
  properties: carbon content, fossil 0.387097, wet mass 1 kg, dry mass 1 kg
  note on carbon content, fossil: Monomer is vynyl chloride, C2H3Cl (ecoinvent v2.2 report 11_II). MW=62 g/mol
- electricity, medium voltage: 0.0935371 kWh; source Draka 2004; lognormal variance with pedigree 0.0527, pedigree (2,4,5,3,1)
  EcoSpold01Location=UCTE
  Estimation, based on literature.
  Further references:
  Nichigoh (2006) Environmental Product Declaration for Wire and Cable World Wide Standard Cable ECO-FLEX Series from <http://www.jia-page.or.jp/jia/epd/directory/nichigoh/nichigoh_e.pdf>.
- tap water: 1.45195 kg; name tap_water_input; source Draka 2004; lognormal variance with pedigree 0.0527, pedigree (2,4,5,3,1)
  Literature Value.
  EcoSpold01Location=RER
  properties: dry mass 0.000337476 kg, wet mass 1 kg, carbon content, fossil 0.00178991, water content 2962.17
  note on carbon content, fossil: Bicarbonate content is 2.93 mol/m3. CO2 content is 0.1 mol/m3 (ecoinvent v2.2 report 8, Tab 93.1).
- heat, district or industrial, other than natural gas: 0.0450566 MJ; source Draka 2004; lognormal variance with pedigree 0.0527, pedigree (2,4,5,3,1)
  Literature Value.
  EcoSpold01Location=RER
- copper: 0.0195994 kg; lognormal variance with pedigree 0.0527, pedigree (2,4,5,3,1)
  EcoSpold01Location=RER
  Measured Value, in the Empa laboratories.
  properties: dry mass 1 kg, wet mass 1 kg
- polyvinylchloride, emulsion polymerised: 0.00670194 kg; lognormal variance with pedigree 0.0527, pedigree (2,4,5,3,1)
  Measured Value, in the Empa laboratories.
  EcoSpold01Location=RER
  properties: carbon content, fossil 0.387097, wet mass 1 kg, dry mass 1 kg
- hazardous waste, for incineration: -7.10471e-5, -1.85713e-6, -0.000147739 kg (3 entries); source Draka 2004; lognormal variance with pedigree 0.0521, pedigree (1,4,5,3,1)
  Literature Value.
  EcoSpold01Location=CH
  production volume 0.00022065 kg
- waste plastic, mixture: -0.00017512, -1.35007e-5, -5.57629e-6, -5.29521e-6, -0.000202058, -2.25276e-6, -1.02104e-6, -0.00141452 kg (8 entries); source Draka 2004; lognormal variance with pedigree 0.0527, pedigree (2,4,5,3,1)
  Literature Value.
  EcoSpold01Location=CH
  production volume 0.0018194 kg

## Emissions to nature
- Water [water, unspecified]: 0.00136339 m3; name water_to_water_unspecified; = (tap_water_input/1000)*(1-fraction_TW_to_air); lognormal variance with pedigree 0.0807, pedigree (2,2,5,1,1)
  Calculated value based on literature values and expert opinion. See comments in the parametres' comment field.
  property fraction, origin: unspecified 0; name fraction_origin_unspecified_Ww
  property fraction, origin: fresh water 1; name fraction_origin_fresh_water_Ww
  property fraction, origin: salt water 0; name fraction_origin_salt_water_Ww
  property dry mass 0 kg; name DM
  property wet mass 1000 kg; name WM
  property water in wet mass 1000 kg; name WWM
  property carbon content, non-fossil 0; name C_content_non_fossil
  property carbon content, fossil 0; name C_content_fossil
- Methanol [air, non-urban air or from high stacks]: 9.29001e-6 kg; source Draka 2004; lognormal variance with pedigree 0.1721, pedigree (1,4,5,3,1)
  Literature Value.
- NMVOC, non-methane volatile organic compounds, unspecified origin [air, non-urban air or from high stacks]: 6.96748e-6 kg; source Draka 2004; lognormal variance with pedigree 0.1721, pedigree (1,4,5,3,1)
  Literature Value.
- Water [air, unspecified]: 8.85692e-5 m3; name water_to_air_unspecified; = (tap_water_input/1000*fraction_TW_to_air); lognormal variance with pedigree 0.0807, pedigree (2,2,5,1,1)
  (same comment as for Water)
  property fraction, origin: salt water 0; name fraction_origin_salt_water
  property fraction, origin: unspecified 0; name fraction_origin_unspecified
  property fraction, origin: fresh water 1; name fraction_origin_fresh_water

## Sampling procedure
Weighing and measuring of materials. Literature for electricity consumption (assembly), emissions and waste.

## Review by Rolf Frischknecht 2007-11-07
passed

## Review by Roland Hischier 2011-09-22
Transfer of documentation done.
