# treatment of precious metal from electronics scrap, in anode slime, precious metal extraction

Dataset: EcoSpold 2, unit process
Geography: SE
Time period: 2000-01-01 to 2019-12-31
Technology level: current
Classification: EcoSpold01Categories: metals/extraction
Classification: ISIC rev.4 ecoinvent: 2420:Manufacture of basic precious and other non-ferrous metals
Tags: ConvertedDataset
Scenario: Business-as-Usual
System model: Allocation at the point of substitution
Generated by: Mischa Classen
Published in: Classen M. 2009
Database: ecoinvent
isCopyrightProtected: true
accessRestrictedTo: 1

## General comment
The multi-output-process "precious metal refining, secondary copper" delivers the co-products "silver, secondary, at precious metal refinery", "gold, secondary, at precious metal refinery" and "palladium, secondary, at precious metal refinery". The flows "silver, …" and "gold, …" are part of the global supply mix of gold and silver modelled in this part. The by-product "palladium, …" receives its part of the burdens, but it is not aimed to be used by the data-user.
[This dataset was already contained in the ecoinvent database version 2. It was not individually updated during the transfer to ecoinvent version 3. Life Cycle Impact Assessment results may still have changed, as they are affected by changes in the supply chain, i.e. in other datasets. This dataset was generated following the ecoinvent quality guidelines for version 2. It may have been subject to central changes described in the ecoinvent version 3 change report (http://www.ecoinvent.org/database/ecoinvent-version-3/reports-of-changes/), and the results of the central updates were reviewed extensively. The changes added e.g. consistent water flows and other information throughout the database. The documentation of this dataset can be found in the ecoinvent reports of version 2, which are still available via the ecoinvent website. The change report linked above covers all central changes that were made during the conversion process.]

## Included activities end
Inculdes the refining of gold and silver.

## Geography
Data describes a Swedish plant that is singular in the region and ranges worldwide among the big producer. It may be taken as approximation for the global situation

## Technology
Anode slime treatment by pressure leaching and top blown rotary converter. Production of Silver by Möbius Electrolysis, Gold by Wohlwill electrolysis, Palladium to further processing

## Reference product
- precious metal from electronics scrap, in anode slime: 0 kg; name metal_from_elscrap_RP; By-product classification allocatable product; CPC 3933: Waste and scrap of precious metal
  EcoSpold01Location=SE
  production volume 0 kg; name RP_PV; = ABS(metal_from_elscrap_RP/ silver_byP* silver_byP_PV)
    Calculated production volume (PV). The PV of this activity has been extrapolated using the nominal GDP of 2005 (source: United Nations, http://data.un.org/Glossary.aspx?q=GDP+%28current+US%24%29, accessed 20130726 and 20130312).
  property price 897 EUR2005
    Temporary price data. Calculated as 90% of purchasers price based on: Price is from Ecoinvent report no 10, fig 5.15, page 94. Same price assumed for all considereed years and parts of the world.
  property carbon content 0
    carbon content on a dry matter basis (reserved; not for manual entry)
  properties: wet mass 1 kg, water content 0, water in wet mass 0 kg, carbon content, non-fossil 0, dry mass 1 kg, carbon content, fossil 0, carbon allocation 0 kg
- silver: 1 kg; CPC 41310: Silver (including silver plated with gold or platinum), unwrought or in semi-manufactured forms, or in powder […]; By-product classification allocatable product; CAS 7440-22-4
  EcoSpold01Location=SE
  production volume 1130 kg

## By-products
- silver: 0 kg; name silver_byP; CPC 41310: Silver (including silver plated with gold or platinum), unwrought or in semi-manufactured forms, or in powder […]; By-product classification allocatable product; CAS 7440-22-4
  EcoSpold01Location=SE
  production volume 0 kg; name silver_byP_PV
    Calculated based on literature data and estimates. Supply of silver scrap from Sweden in 2017 was approximately 11,300 kg (Source: The Silver Institute (2018), World Silver Survey 2018. Available from: http://sprott.com/media/1834/the-silver-institute-world-silver-survey-2018.pdf [downloaded 02 July 2019]). We assume that 10% of the secondary silver comes from the treatment of precious metal from electronics scrap.
  property price 178 EUR2005
    Temporary price data. Calculated as 90% of purchasers price based on: Source: ecoinvent v2 report 10-part IX, Tab 5.10 & 2.5
  property carbon content 0
    carbon content on a dry matter basis (reserved; not for manual entry)
  properties: wet mass 1 kg, carbon content, non-fossil 0, dry mass 1 kg, water content 0, carbon content, fossil 0, water in wet mass 0 kg, carbon allocation 0 kg
- palladium: 0 kg; name palladium_byP; CPC 4160: Other non-ferrous metals and articles thereof (including waste and scrap of some metals); cermets and articles […]; By-product classification allocatable product
  EcoSpold01Location=SE
  production volume 0 kg; = palladium_byP/ silver_byP* silver_byP_PV
    Calculated in relation to the production volume of the reference product.
  property price 5640 EUR2005
    Temporary price data. Calculated as 90% of purchasers price based on: 2004 price from USGS (2007) Mineral commodity summaries 2007. <http://minerals.usgs.gov/minerals/pubs/mcs/2007/mcs2007.pdf> [Accessed 25 May 2010]
  property carbon content 0
    carbon content on a dry matter basis (reserved; not for manual entry)
  properties: wet mass 1 kg, carbon content, fossil 0, water in wet mass 0 kg, water content 0, carbon content, non-fossil 0, dry mass 1 kg, carbon allocation 0 kg
- gold: 0 kg; name gold_byP; CPC 41320: Gold (including gold plated with platinum), unwrought or in semi-manufactured forms, or in powder form; By-product classification allocatable product; CAS 7440-57-5
  EcoSpold01Location=SE
  production volume 0 kg; = gold_byP/ silver_byP* silver_byP_PV
    Calculated in relation to the silver produced as a by-product in this activity.
  property price 10600 EUR2005
    Temporary price data. Calculated as 90% of purchasers price based on: Source: ecoinvent v2 report 10-part IX, Tab 2.5
  property carbon content 0
    carbon content on a dry matter basis (reserved; not for manual entry)
  properties: wet mass 1 kg, carbon content, fossil 0, dry mass 1 kg, carbon content, non-fossil 0, water content 0, water in wet mass 0 kg, carbon allocation 0 kg
## Inputs from technosphere
- heat, district or industrial, other than natural gas: 0 MJ; pedigree (1,1,1,1,1)
  estimation
  EcoSpold01Location=RER
- electricity, high voltage: 0 kWh; pedigree (1,1,1,1,1)
  EcoSpold01Location=UCTE
- precious metal refinery: 0 unit; pedigree (1,1,1,1,1)
  EcoSpold01Location=SE
  activityLink introduced to establish a direct link to the corresponding regional supply of this product
- oxygen, liquid: 9.39112e-6 kg; lognormal variance with pedigree 0.066125, pedigree (4,2,5,2,3)
  EcoSpold01Location=RER
  properties: wet mass 1 kg, dry mass 1 kg
- sulfuric acid: 0.000191131 kg; lognormal variance with pedigree 0.38, pedigree (5,5,5,5,5)
  EcoSpold01Location=RER
- water, completely softened: 0.0662811 kg; lognormal variance with pedigree 0.38, pedigree (5,5,5,5,5)
  EcoSpold01Location=RER
- heat, district or industrial, natural gas: 0.159484 MJ; lognormal variance with pedigree 0.084, pedigree (4,5,5,1,3)
  EcoSpold01Location=RER
- electronics scrap: -0.175158 kg
  EcoSpold01Location=GLO
- electricity, medium voltage: 0.572086 kWh; lognormal variance with pedigree 0.0767, pedigree (4,3,5,3,3)
  Estimation, based on information in Huisman (2003)
  EcoSpold01Location=UCTE
  Uncertainty: estimation, based on information in Huisman (2003)
- waste plastic, industrial electronics: -0.0305995 kg; lognormal variance with pedigree 0.1786, pedigree (4,5,5,5,5)
  Based on composition of this device
  EcoSpold01Location=CH
  Uncertainty: based on composition of this device
- scrap steel: -1.4637, -2.47279 kg (2 suppliers, which the file names only by identifier); sum of these -3.93649 kg; lognormal variance with pedigree 0.1786, pedigree (4,5,5,5,5)
  Calculated value; the scrap steel as an exchange was not present in ecoinvent v2 due to cut-off rules.
  Uncertainty: based on composition of this device
- waste plastic, mixture: -0.0311965 kg
  EcoSpold01Location=CH
  Uncertainty for LCI results cannot be determined
  production volume 24594.1 kg
- coal slurry: -0.0489568 kg
  EcoSpold01Location=GLO
  Uncertainty for LCI results cannot be determined
  production volume 14884.1 kg
- decommissioned chemical production facilities: -0.154435 kg
  Uncertainty for LCI results cannot be determined
  EcoSpold01Location=RER
  production volume 10.6139 kg
- municipal solid waste: -0.335963 kg
  EcoSpold01Location=CH
  Uncertainty for LCI results cannot be determined
  production volume 3.73499e7 kg
- average incineration residue: -0.776906 kg
  EcoSpold01Location=CH
  Uncertainty for LCI results cannot be determined
  production volume 7.65307e7 kg
- waste wood, untreated: -0.0015175 kg
  EcoSpold01Location=CH
  Uncertainty for LCI results cannot be determined
  production volume 1297.04 kg
- spoil from hard coal mining: -3.79582 kg
  EcoSpold01Location=GLO
  Uncertainty for LCI results cannot be determined
  production volume 1.65145e8 kg
- hazardous waste, for incineration: -0.726903, -0.0248277 kg (2 suppliers, which the file names only by identifier); sum of these -0.751731 kg
  Uncertainty for LCI results cannot be determined
  EcoSpold01Location=CH
  production volume 4.16796e7 kg
- aluminium, wrought alloy: 0.221488 kg; source Starzner S. and Wurmer-Weiss P.  2000; lognormal variance with pedigree 0.1461, pedigree (5,5,5,3,3)
  Estimated from data of small plants. The infrastructure of the air separation plant contains besides cold resistant steel and aluminium for the piping and the column also low-alloyed steel and various other materials in the compressors and other components. . The weight of the equipment is largely dependent of the size of the plant. For small plants with an output of 100 kg liquefied product per hour a plant weight of 8-10 t is common. For very large plants the specific weight (referred to the output per hour) of the plant is estimated to be more than 10 times smaller. For this inventory an amount of 10 kg per kg hourly production output was assumed. This leads to a total plant weight of 100 t. 10% of the total weight was accounted as aluminium for the column. The rest was assumed to be a similar material composition as used for the production facilities in the chemical industry.
  EcoSpold01Location=RER
  Uncertainty: Estimated from data of small plants
- chemical factory: 0.0764287 kg; source Starzner S. and Wurmer-Weiss P.  2000; lognormal variance with pedigree 0.4461, pedigree (5,5,5,3,3)
  (same comment as for aluminium, wrought alloy)
- hazardous waste, for underground deposit: -0.00376008 kg; lognormal variance with pedigree 0.04, pedigree (1,1,5,1,1)
  EcoSpold01Location=DE
  production volume 178963 kg
- building, hall, steel construction: 0.00324701 m2; lognormal variance with pedigree 0.4787, pedigree (4,3,5,3,4)
  Estimated from two sites
  EcoSpold01Location=CH
  Uncertainty: estimated from two sites
- building, multi-storey: 0.00244248 m3; lognormal variance with pedigree 0.4787, pedigree (4,3,5,3,4)
  EcoSpold01Location=RER
  Estimated from two sites
  Uncertainty: estimated from two sites
- municipal solid waste: -0.000236955, -0.00190295, -0.00228848, -2.03607e-5, -0.000256236, -0.000303361, -0.000464941 kg (7 suppliers, which the file names only by identifier); sum of these -0.00547329 kg; lognormal variance with pedigree 0.04, pedigree (1,1,5,1,1)
  EcoSpold01Location=CH
  production volume 0.0016045 kg
- waste plastic, mixture: -1.17389e-7, -1.48445e-6, -7.75139e-7, -1.68032e-8, -4.97948e-8, -1.49782e-7, -4.69486e-7 kg (7 suppliers, which the file names only by identifier); sum of these -3.06284e-6 kg; lognormal variance with pedigree 0.04, pedigree (1,1,5,1,1)
  EcoSpold01Location=CH
  production volume 5e-7 kg
- waste wood, untreated: -4.57348e-8, -4.66639e-7, -3.68115e-7, -5.17554e-9, -4.26319e-8, -4.3444e-8, -1.05975e-7 kg (7 suppliers, which the file names only by identifier); sum of these -1.07772e-6 kg; lognormal variance with pedigree 0.04, pedigree (1,1,5,1,1)
  EcoSpold01Location=CH
  production volume 5e-7 kg
- road, company, internal: 0.0258711 m2*year; lognormal variance with pedigree 0.4921, pedigree (5,4,5,3,4)
  EcoSpold01Location=CH
  Estimated, based on photos
  Uncertainty: Estimated, based on photos
- paper machine: 3.57817e-9 unit; lognormal variance with pedigree 0.3406, pedigree (1,3,5,1,1)
  EcoSpold01Location=RER
  Information from several european mills
  Uncertainty: Information from several european mills
- wastewater treatment facility, capacity 1.6E8l/year: 1.26399e-8 unit; lognormal variance with pedigree 0.4921, pedigree (5,4,5,3,4)
  Approximation
  EcoSpold01Location=CH
  Uncertainty: Approximation
- industrial furnace, 1MW, oil: 1.35255e-8 unit; lognormal variance with pedigree 0.4921, pedigree (5,4,5,3,4)
  EcoSpold01Location=CH
  Approximation for energy system
  Uncertainty: approximation for energy system
- pipeline, petroleum: 5.59383e-8 km; lognormal variance with pedigree 0.3401, pedigree (1,2,5,1,1)
  Calculation for 100a, approx. 150 factories
  EcoSpold01Location=RER
  Uncertainty: Calculation for 100a, approx. 150 factories
- railway track: 2.77215e-5 m*year; lognormal variance with pedigree 0.3401, pedigree (1,2,5,1,1)
  Calculation for 100a, approx. 150 factories
  EcoSpold01Location=CH
  Uncertainty: Calculation for 100a, approx. 150 factories
- building, hall: 0.00399232 m2; lognormal variance with pedigree 0.3401, pedigree (1,2,5,1,1)
  EcoSpold01Location=CH
  Calculation for 100a, approx. 150 factories
  Uncertainty: Calculation for 100a, approx. 150 factories
- pipeline, natural gas, low pressure distribution network: 7.12835e-8 km; lognormal variance with pedigree 0.3401, pedigree (1,2,5,1,1)
  (same comment as for railway track)
- hazardous waste, for incineration: -0.751628 kg
  EcoSpold01Location=CH
  Uncertainty for LCI results cannot be determined
  production volume 7.87054e7 kg
- average incineration residue: -0.776808 kg
  EcoSpold01Location=CH
  Uncertainty for LCI results cannot be determined
  production volume 1.44516e8 kg
- municipal solid waste: -0.00048121, -0.000121253, -0.000173278, -0.340331 kg (4 suppliers, which the file names only by identifier); sum of these -0.341107 kg
  EcoSpold01Location=CH
  Uncertainty for LCI results cannot be determined
  production volume 7.05293e7 kg
- waste wood, untreated: -0.000753138, -9.35135e-5, -6.83689e-6, -0.000262651, -3.96803e-5, -6.27312e-5, -0.0151103 kg (7 suppliers, which the file names only by identifier); sum of these -0.0163289 kg
  Uncertainty for LCI results cannot be determined
  EcoSpold01Location=CH
  production volume 2449.25 kg
- waste plastic, mixture: -0.0176196, -0.00117727, -8.90353e-5, -0.000486256, -0.000196442, -0.000461746, -0.0494965 kg (7 suppliers, which the file names only by identifier); sum of these -0.0695269 kg
  EcoSpold01Location=CH
  Uncertainty for LCI results cannot be determined
  production volume 46442 kg
- chemical factory: 0.0764287 kg; lognormal variance with pedigree 0.448, pedigree (5,5,5,5,3)
  EcoSpold01Location=RER
  Estimated from data of small plants
  Uncertainty: Estimated from data of small plants
- building, multi-storey: 0.0074493 m3; lognormal variance with pedigree 0.4806, pedigree (4,3,5,5,4)
  EcoSpold01Location=RER
  Estimated from two sites
  Uncertainty: estimated from two sites
- waste wood, untreated: -4.59657e-10, -8.3229e-10, -1.60721e-9, -3.06066e-10, -1.99536e-9, -2.24618e-10, -1.37475e-8, -1.89576e-9, -1.15383e-8, -3.85686e-9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 kg (29 suppliers, which the file names only by identifier); sum of these -7.12257e-8 kg; lognormal variance with pedigree 0.042, pedigree (1,1,5,5,1)
  EcoSpold01Location=CH
  production volume 1.5e-6 kg
- municipal solid waste: -2.16973e-6, -3.91746e-6, -6.94947e-6, -6.65366e-6, -6.50531e-6, -8.30598e-7, -4.3535e-5, -4.66973e-6, -5.20419e-5, -1.3452e-5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 kg (29 suppliers, which the file names only by identifier); sum of these -0.000283217 kg; lognormal variance with pedigree 0.042, pedigree (1,1,5,5,1)
  EcoSpold01Location=CH
  production volume 0.0048135 kg
- waste plastic, mixture: -1.61679e-9, -2.20734e-9, -4.50756e-9, -6.04116e-10, -6.70215e-9, -6.97612e-10, -4.01043e-8, -4.61869e-9, -2.25168e-8, -8.38717e-9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 kg (29 suppliers, which the file names only by identifier); sum of these -1.99684e-7 kg; lognormal variance with pedigree 0.042, pedigree (1,1,5,5,1)
  EcoSpold01Location=CH
  production volume 1.5e-6 kg
- paper machine: 3.57817e-9 unit; lognormal variance with pedigree 0.3426, pedigree (1,3,5,5,1)
  Information from several european mills
  EcoSpold01Location=RER
  Uncertainty: Information from several european mills
- pipeline, petroleum: 5.59383e-8 km; lognormal variance with pedigree 0.3421, pedigree (1,2,5,5,1)
  EcoSpold01Location=RER
  Calculation for 100a, approx. 150 factories
  Uncertainty: Calculation for 100a, approx. 150 factories
- copper: 0.513482 kg; lognormal variance with pedigree 0.078025, pedigree (4,4,5,2,3)
  Estimation based on few references
  Estimation based on few references
- heat, central or small-scale, other than natural gas: 2.80021 MJ; lognormal variance with pedigree 0.062, pedigree (3,4,5,1,3)
  Estimation based on specific energy demand of engineering hours
  Estimation based on specific energy demand of engineering hours
- wire drawing, copper: 0.118926 kg; lognormal variance with pedigree 0.078025, pedigree (4,4,5,2,3)
  Based on material input
  Based on material input
- zinc coat, coils: 0.0146868 m2; lognormal variance with pedigree 0.078025, pedigree (4,4,5,2,3)
  Based on material input
  Based on material input
- ammonia, liquid: 0.00807558 kg; lognormal variance with pedigree 0.078025, pedigree (4,4,5,2,3)
  Estimation based on few references
  Estimation based on few references
- injection moulding: 0.0434526 kg; lognormal variance with pedigree 0.078025, pedigree (4,4,5,2,3)
  Based on material input
  Based on material input
- steel, chromium steel 18/8, hot rolled: 1.93678 kg; lognormal variance with pedigree 0.078025, pedigree (4,4,5,2,3)
  Estimation based on few references
  Estimation based on few references
- transport, passenger car: 0.306332 km; lognormal variance with pedigree 0.198, pedigree (4,4,5,1,3)
  Estimation
  Estimation
- sheet rolling, chromium steel: 0.179498 kg; lognormal variance with pedigree 0.078025, pedigree (4,4,5,2,3)
  Based on material input
  Based on material input
- reinforcing steel: 1.86018 kg; lognormal variance with pedigree 0.078025, pedigree (4,4,5,2,3)
  Estimation based on few references
  Estimation based on few references
- sheet rolling, steel: 1.05681 kg; lognormal variance with pedigree 0.078025, pedigree (4,4,5,2,3)
  Based on material input
  Based on material input
- electricity, low voltage: 34.4177 kWh; lognormal variance with pedigree 0.062, pedigree (3,4,5,1,3)
  (same comment as for heat, central or small-scale, other than natural gas)
- electronics scrap from control units: -0.0708151 kg; lognormal variance with pedigree 0.078025, pedigree (4,4,5,2,3)
  Disposal of electronic parts material
  Disposal of electronic parts material
  production volume 3 kg
- sheet rolling, aluminium: 0.042451 kg; lognormal variance with pedigree 0.078025, pedigree (4,4,5,2,3)
  Based on material input
  Based on material input
- waste mineral wool: -0.0112649 kg; lognormal variance with pedigree 0.078025, pedigree (4,4,5,2,3)
  Disposal of heat insulation material
  Disposal of heat insulation material
  production volume 3.5 kg
- stone wool, packed: 0.0225144 kg; lognormal variance with pedigree 0.078025, pedigree (4,4,5,2,3)
  Estimation for heat insulation
  Estimation for heat insulation
- waste polyethylene/polypropylene product: -0.437733 kg; lognormal variance with pedigree 0.078025, pedigree (4,4,5,2,3)
  Disposal of plastic material
  Disposal of plastic material
  production volume 6.5 kg
- heat carrier liquid, 40% C3H8O2: -3.79027e-5 m3; lognormal variance with pedigree 0.078025, pedigree (4,4,5,2,3)
  Disposal of insulation material
  Disposal of insulation material
  production volume 0.01875 m3
- electronics, for control units: 0.0744883 kg; lognormal variance with pedigree 0.078025, pedigree (4,4,5,2,3)
  Estimation for control electronic based on few references
  Estimation for control electronic based on few references
- wastewater, from residence: -0.000763302 m3; lognormal variance with pedigree 0.140025, pedigree (4,4,5,2,4)
  Approximation for waste water treatment
  Approximation for waste water treatment
  production volume 0.299 m3
- ethylene glycol: 0.0303752 kg; lognormal variance with pedigree 0.078025, pedigree (4,4,5,2,3)
  Estimation based on few references
  Estimation based on few references
- polyethylene, high density, granulate: 0.146432 kg; lognormal variance with pedigree 0.078025, pedigree (4,4,5,2,3)
  Estimation for plastic material based on few references
  Estimation for plastic material based on few references
- heat, district or industrial, natural gas: 0.561349 MJ; lognormal variance with pedigree 0.122625, pedigree (2,4,5,2,4)
  Approximation with company data of similar branch
  Approximation with company data of similar branch
- electricity, medium voltage: 0.0827251 kWh; lognormal variance with pedigree 0.122625, pedigree (2,4,5,2,4)
  (same comment as for heat, district or industrial, natural gas)
- building, hall, steel construction: 2.25263e-5 m2; lognormal variance with pedigree 0.39, pedigree (4,4,5,5,3)
  Rough estimation based on company data of similar branch
  This exchange has an activity link directly to the producing activity because the product is primarily consumed in the same geographical area where it is produced.
- tube insulation, elastomere: 0.0223948 kg; lognormal variance with pedigree 0.078025, pedigree (4,4,5,2,3)
  Estimation based on few references
  Estimation based on few references
- helium: 0.000104242 kg; lognormal variance with pedigree 0.076025, pedigree (4,5,5,2,1)
  Rough estimation
  Rough estimation
- nylon 6: 0.0029205, 0.00291956 kg (2 suppliers, which the file names only by identifier); sum of these 0.00584007 kg; lognormal variance with pedigree 0.13, pedigree (1,5,5,5,4)
  EcoSpold01Location=RER
  Average of 4 machines
  Uncertainty: average of 4 machines
- polymer foaming: 0.00468847, 0.00497162 kg (2 suppliers, which the file names only by identifier); sum of these 0.00966009 kg; lognormal variance with pedigree 0.2, pedigree (5,5,5,5,4)
  Assumed type of processing
  EcoSpold01Location=RER
  Uncertainty: assumed type of processing
- printed wiring board, surface mounted, unspecified, Pb containing: 0.00120533 kg; lognormal variance with pedigree 0.13, pedigree (1,5,5,5,4)
  average of 4 machines.
  This original value from production mix has been replaced by 2 flows. Each has 50% share in the production mix.
  Uncertainty: average of 4 machines
- sheet rolling, copper: 0.0521987 kg; lognormal variance with pedigree 0.2, pedigree (5,5,5,5,4)
  Assumed type of processing
  EcoSpold01Location=RER
  Uncertainty: assumed type of processing
- polypropylene, granulate: 0.00237758 kg; lognormal variance with pedigree 0.13, pedigree (1,5,5,5,4)
  Average of 4 machines
  EcoSpold01Location=RER
  Uncertainty: average of 4 machines
- waste polyurethane: -0.00468847 kg; lognormal variance with pedigree 0.2, pedigree (5,5,5,5,4)
  EcoSpold01Location=CH
  Assumed route of disposal
  Uncertainty: assumed route of disposal
  production volume 0.00847 kg
- waste glass: -0.0217652 kg; lognormal variance with pedigree 0.2, pedigree (5,5,5,5,4)
  Assumed route of disposal
  EcoSpold01Location=CH
  Uncertainty: assumed route of disposal
  production volume 0.00383 kg
- metal working, average for chromium steel product manufacturing: 0.126517 kg; lognormal variance with pedigree 0.2, pedigree (5,5,5,5,4)
  EcoSpold01Location=RER
  Assumed type of processing
  Uncertainty: assumed type of processing
- silicone product: 0.00238575, 0.00238382 kg (2 suppliers, which the file names only by identifier); sum of these 0.00476957 kg; lognormal variance with pedigree 0.13, pedigree (1,5,5,5,4)
  Average of 4 machines
  EcoSpold01Location=RER
  Uncertainty: average of 4 machines
- alkyd paint, white, without solvent, in 60% solution state: 0.0028779 kg; lognormal variance with pedigree 0.13, pedigree (1,5,5,5,4)
  EcoSpold01Location=RER
  Average of 4 machines
  Uncertainty: average of 4 machines
- flat glass, uncoated: 0.002154 kg; lognormal variance with pedigree 0.13, pedigree (1,5,5,5,4)
  Average of 4 machines
  EcoSpold01Location=RER
  Uncertainty: average of 4 machines
- steel, low-alloyed, hot rolled: 5.17877 kg; lognormal variance with pedigree 0.13, pedigree (1,5,5,5,4)
  Average of 4 machines
  EcoSpold01Location=RER
  Uncertainty: average of 4 machines
- waste polyethylene: -0.0350088 kg; lognormal variance with pedigree 0.2, pedigree (5,5,5,5,4)
  EcoSpold01Location=CH
  Assumed route of disposal
  Uncertainty: assumed route of disposal
  production volume 0.0457 kg
- metal working, average for steel product manufacturing: 0.368047 kg; lognormal variance with pedigree 0.2, pedigree (5,5,5,5,4)
  EcoSpold01Location=RER
  Assumed type of processing
  Uncertainty: assumed type of processing
- synthetic rubber: 0.0138752 kg; lognormal variance with pedigree 0.13, pedigree (1,5,5,5,4)
  Average of 4 machines
  EcoSpold01Location=RER
  Uncertainty: average of 4 machines
- printed wiring board, surface mounted, unspecified, Pb free: 0.00339294 kg; lognormal variance with pedigree 0.13, pedigree (1,5,5,5,4)
  (same comment as for printed wiring board, surface mounted, unspecified, Pb containing)
- polyurethane, flexible foam: 0.00468847 kg; lognormal variance with pedigree 0.13, pedigree (1,5,5,5,4)
  Average of 4 machines
  EcoSpold01Location=RER
  Uncertainty: average of 4 machines
- polycarbonate: 0.00499305 kg; lognormal variance with pedigree 0.13, pedigree (1,5,5,5,4)
  Average of 4 machines
  EcoSpold01Location=RER
  Uncertainty: average of 4 machines
- aluminium, cast alloy: 0.105962 kg; lognormal variance with pedigree 0.0906, pedigree (1,5,5,5,4)
  this flow replaces aluminium, production mix
- cast iron: 0.419956 kg; lognormal variance with pedigree 0.13, pedigree (1,5,5,5,4)
  Average of 4 machines
  EcoSpold01Location=RER
  Uncertainty: average of 4 machines
- polyvinylchloride, suspension polymerised: 0.00725717 kg; lognormal variance with pedigree 0.13, pedigree (1,5,5,5,4)
  EcoSpold01Location=RER
  Average of 4 machines
  Uncertainty: average of 4 machines
- waste polyvinylchloride: -0.00779078 kg; lognormal variance with pedigree 0.2, pedigree (5,5,5,5,4)
  Assumed route of disposal
  EcoSpold01Location=CH
  Uncertainty: assumed route of disposal
  production volume 0.00682 kg
- metal working, average for aluminium product manufacturing: 0.013124 kg; lognormal variance with pedigree 0.2, pedigree (5,5,5,5,4)
  EcoSpold01Location=RER
  Assumed type of processing
  Uncertainty: assumed type of processing
- waste rubber, unspecified: -0.00664899, -0.000279123 kg (2 suppliers, which the file names only by identifier); sum of these -0.00692811 kg; lognormal variance with pedigree 0.2, pedigree (5,5,5,5,4)
  EcoSpold01Location=CH
  Assumed route of disposal
  Uncertainty: assumed route of disposal
  production volume 0.00933 kg
- waste bulk iron, excluding reinforcement: -1.0514 kg; lognormal variance with pedigree 0.072, pedigree (3,4,5,1,3)
  Estimation based on data of Questionnaire
  EcoSpold01Location=CH
  Uncertainty: Estimation based on data of Questionnaire
- blower and heat exchange unit, central, 600-1200 m3/h: 0.00123161 unit; lognormal variance with pedigree 0.044, pedigree (3,4,5,1,1)
  Questionnaire, Data related to building considered
  EcoSpold01Location=RER
  Uncertainty: Questionnaire, Data related to building considered
- used air filter in exhaust air valve: -0.249511 unit; lognormal variance with pedigree 0.044, pedigree (3,4,5,1,1)
  Questionnaire, Data related to building considered
  EcoSpold01Location=CH
  Uncertainty: Questionnaire, Data related to building considered
  production volume 0.0226 unit
- used air filter central unit, 600 m3/h: -0.00995656 unit; lognormal variance with pedigree 0.044, pedigree (3,4,5,1,1)
  (same comment as for used air filter in exhaust air valve)
  production volume 0.00251 unit
- used silencer steel, DN 315: -0.00122175 unit; lognormal variance with pedigree 0.044, pedigree (3,4,5,1,1)
  EcoSpold01Location=CH
  Questionnaire, Data related to building considered
  Uncertainty: Questionnaire, Data related to building considered
  production volume 0.000103 unit
- air filter, central unit, 600 m3/h: 0.0199383 unit; lognormal variance with pedigree 0.044, pedigree (3,4,5,1,1)
  (same comment as for blower and heat exchange unit, central, 600-1200 m3/h)
- air filter, in exhaust air valve: 0.499906 unit; lognormal variance with pedigree 0.044, pedigree (3,4,5,1,1)
  EcoSpold01Location=RER
  Questionnaire, Data related to building considered
  Uncertainty: Questionnaire, Data related to building considered
- ventilation system, central, 1 x 720 m3/h, polyethylene ducts, with earth tube heat exchanger: 4.64511e-5 unit; lognormal variance with pedigree 0.044, pedigree (3,4,5,1,1)
  (same comment as for used silencer steel, DN 315)
- silencer, steel, DN 315, 50 mm: 0.00246612 unit; lognormal variance with pedigree 0.044, pedigree (3,4,5,1,1)
  (same comment as for used silencer steel, DN 315)
- used flexible duct aluminium/PET, DN of 125: -0.0309377 m; lognormal variance with pedigree 0.044, pedigree (3,4,5,1,1)
  (same comment as for used air filter in exhaust air valve)
  production volume 0.000513 m
- used ventilation control and wiring central unit: -0.000610147 unit; lognormal variance with pedigree 0.044, pedigree (3,4,5,1,1)
  (same comment as for used air filter in exhaust air valve)
  production volume 5.13e-5 unit
- ventilation control and wiring, central unit: 0.00123161 unit; lognormal variance with pedigree 0.044, pedigree (3,4,5,1,1)
  (same comment as for blower and heat exchange unit, central, 600-1200 m3/h)
- used silencer steel, DN 125: -0.0446179 unit; lognormal variance with pedigree 0.044, pedigree (3,4,5,1,1)
  (same comment as for used air filter in exhaust air valve)
  production volume 0.000615 unit
- used blower and heat exchange unit central, 600-1200 m3/h: -0.000610147 unit; lognormal variance with pedigree 0.044, pedigree (3,4,5,1,1)
  (same comment as for used air filter in exhaust air valve)
  production volume 5.13e-5 unit
- flexible duct, aluminium/PET, DN of 125: 0.062322 m; lognormal variance with pedigree 0.044, pedigree (3,4,5,1,1)
  (same comment as for air filter, in exhaust air valve)
- silencer, steel, DN 125: 0.0899755 unit; lognormal variance with pedigree 0.044, pedigree (3,4,5,1,1)
  (same comment as for used silencer steel, DN 315)
- ventilation system, central, 1 x 720 m3/h, steel ducts, with earth tube heat exchanger: 4.64493e-5 unit; lognormal variance with pedigree 0.044, pedigree (3,4,5,1,1)
  (same comment as for used air filter in exhaust air valve)
- spiral-seam duct, steel, DN 400: 0.0692684 m; lognormal variance with pedigree 0.0426, pedigree (2,4,5,1,1)
  (same comment as for blower and heat exchange unit, central, 600-1200 m3/h)
- insulation spiral-seam duct, rockwool, DN 400, 30 mm: 0.0477877 m; lognormal variance with pedigree 0.0426, pedigree (2,4,5,1,1)
  (same comment as for blower and heat exchange unit, central, 600-1200 m3/h)
- exhaust air roof hood, steel, DN 400: 0.00162431 unit; lognormal variance with pedigree 0.04, pedigree (1,1,5,1,1)
  EcoSpold01Location=CH
  2,4,1,1,1,nA; Questionnaire, Data related to building considered
- used insulation spiral-seam duct rockwool, DN 400: -0.0235896 m; lognormal variance with pedigree 0.0426, pedigree (2,4,5,1,1)
  (same comment as for used air filter in exhaust air valve)
  production volume 0.67336 m
- excavation, hydraulic digger: 0.109837 m3; lognormal variance with pedigree 0.06, pedigree (4,4,5,1,1)
  Assumption, Data related to building considered
  EcoSpold01Location=RER
  Uncertainty: Assumption, Data related to building considered
- used exhaust air valve in-wall housing, plastic/steel: -0.0299926 unit; lognormal variance with pedigree 0.0426, pedigree (2,4,5,1,1)
  (same comment as for used silencer steel, DN 315)
  production volume 0.606024 unit
- used sealing tape aluminium/PE, 50 mm wide: -0.672322 m; lognormal variance with pedigree 0.0426, pedigree (2,4,5,1,1)
  (same comment as for used silencer steel, DN 315)
  production volume 6.7336 m
- used room-connecting overflow element steel, approx. 40 m3/h: -0.0299926 unit; lognormal variance with pedigree 0.0426, pedigree (2,4,5,1,1)
  (same comment as for used air filter in exhaust air valve)
  production volume 0.606024 unit
- spiral-seam duct, steel, DN 125: 0.0404215 m; lognormal variance with pedigree 0.0426, pedigree (2,4,5,1,1)
  (same comment as for air filter, in exhaust air valve)
- outside air intake, stainless steel, DN 370: 0.00162431 unit; lognormal variance with pedigree 0.0426, pedigree (2,4,5,1,1)
  (same comment as for air filter, in exhaust air valve)
- used outside air intake stainless steel, DN 370: -0.000801731 unit; lognormal variance with pedigree 0.0426, pedigree (2,4,5,1,1)
  (same comment as for used air filter in exhaust air valve)
  production volume 0.033668 unit
- supply air inlet, steel/SS, DN 75: 0.101054 unit; lognormal variance with pedigree 0.0426, pedigree (2,4,5,1,1)
  (same comment as for blower and heat exchange unit, central, 600-1200 m3/h)
- room-connecting overflow element, steel, approx. 40 m3/h: 0.0606323 unit; lognormal variance with pedigree 0.0426, pedigree (2,4,5,1,1)
  (same comment as for blower and heat exchange unit, central, 600-1200 m3/h)
- polyethylene pipe, DN 200, SDR 41: 0.194917 m; lognormal variance with pedigree 0.0426, pedigree (2,4,5,1,1)
  (same comment as for air filter, in exhaust air valve)
- air distribution terminal panel, steel, 120 m3/h: 0.0404215 unit; lognormal variance with pedigree 0.0426, pedigree (2,4,5,1,1)
  (same comment as for used silencer steel, DN 315)
- exhaust air valve, in-wall housing, plastic/steel, DN 125: 0.0606323 unit; lognormal variance with pedigree 0.0426, pedigree (2,4,5,1,1)
  (same comment as for used air filter in exhaust air valve)
- polyethylene pipe, corrugated, DN 75: 0.80171 m; lognormal variance with pedigree 0.0426, pedigree (2,4,5,1,1)
  (same comment as for air filter, in exhaust air valve)
- used air distribution terminal panel steel, 120 m3/h: -0.0199951 unit; lognormal variance with pedigree 0.0426, pedigree (2,4,5,1,1)
  (same comment as for used silencer steel, DN 315)
  production volume 0.404016 unit
- sealing tape, aluminium/PE, 50 mm wide: 1.35578 m; lognormal variance with pedigree 0.0426, pedigree (2,4,5,1,1)
  (same comment as for blower and heat exchange unit, central, 600-1200 m3/h)
- used exhaust air roof hood steel, DN 400: -0.000801731 unit; lognormal variance with pedigree 0.0426, pedigree (2,4,5,1,1)
  (same comment as for used silencer steel, DN 315)
  production volume 0.033668 unit
- ventilation duct, steel, 100x50 mm: 0.818511 m; lognormal variance with pedigree 0.0426, pedigree (2,4,5,1,1)
  (same comment as for air filter, in exhaust air valve)
- ventilation duct, connection piece, steel, 100x50 mm: 0.204628 unit; lognormal variance with pedigree 0.0426, pedigree (2,4,5,1,1)
  (same comment as for blower and heat exchange unit, central, 600-1200 m3/h)
- ventilation duct, elbow 90°, steel, 100x50 mm: 0.311034 unit; lognormal variance with pedigree 0.0426, pedigree (2,4,5,1,1)
  (same comment as for blower and heat exchange unit, central, 600-1200 m3/h)
- ventilation control and wiring, decentralized unit: 0.0188062 unit; lognormal variance with pedigree 0.044, pedigree (3,4,5,1,1)
  (same comment as for blower and heat exchange unit, central, 600-1200 m3/h)
- air filter, decentralized unit, 180-250 m3/h: 0.213999 unit; lognormal variance with pedigree 0.044, pedigree (3,4,5,1,1)
  (same comment as for blower and heat exchange unit, central, 600-1200 m3/h)
- ventilation system, decentralized, 6 x 120 m3/h, polyethylene ducts, with earth tube heat exchanger: 3.894e-5 unit; lognormal variance with pedigree 0.044, pedigree (3,4,5,1,1)
  (same comment as for used silencer steel, DN 315)
- used ventilation control and wiring decentralized unit: -0.00932761 unit; lognormal variance with pedigree 0.044, pedigree (3,4,5,1,1)
  (same comment as for used silencer steel, DN 315)
  production volume 0.000308 unit
- used air filter decentralized unit, 180-250 m3/h: -0.10678 unit; lognormal variance with pedigree 0.044, pedigree (3,4,5,1,1)
  (same comment as for used air filter in exhaust air valve)
  production volume 0.0151 unit
- blower and heat exchange unit, decentralized, 180-250 m3/h: 0.0188062 unit; lognormal variance with pedigree 0.044, pedigree (3,4,5,1,1)
  (same comment as for air filter, in exhaust air valve)
- used blower and heat exchange unit decentralized, 180-250 m3/h: -0.00932761 unit; lognormal variance with pedigree 0.044, pedigree (3,4,5,1,1)
  (same comment as for used silencer steel, DN 315)
  production volume 0.000308 unit
- ventilation system, decentralized, 6 x 120 m3/h, polyethylene ducts: 3.894e-5 unit; lognormal variance with pedigree 0.044, pedigree (3,4,5,1,1)
  (same comment as for used silencer steel, DN 315)
- ventilation system, decentralized, 6 x 120 m3/h, steel ducts, with earth tube heat exchanger: 3.89388e-5 unit; lognormal variance with pedigree 0.04, pedigree (1,1,5,1,1)
  3,4,1,1,1,nA; Questionnaire, Data related to building considered
  EcoSpold01Location=CH
- ventilation system, decentralized, 6 x 120 m3/h, steel ducts: 3.89388e-5 unit; lognormal variance with pedigree 0.044, pedigree (3,4,5,1,1)
  (same comment as for used air filter in exhaust air valve)
- exhaust air outlet, steel/aluminium, 85x365 mm: 0.0209299 unit; lognormal variance with pedigree 0.0426, pedigree (2,4,5,1,1)
  (same comment as for used silencer steel, DN 315)
- scrap copper: -0.105965 kg; lognormal variance with pedigree 0.008, pedigree (1,1,4,1,1)
  Estimated value. It can be assumed that 100% of the copper enter a recycling process.
  Uncertainty: Calculated variable. Uncertainty will be determined from propagation of uncertainty factors of underlying variables. Uncertainty of actual relation between variables not accounted at this time, although this could be included in a future update.
  production volume 58493.4 kg
- waste polyethylene/polypropylene product: -0.370419 kg; lognormal variance with pedigree 0.008, pedigree (1,1,4,1,1)
  Calculated value. Proxy for the treatment of the epoxy resin (polyepoxide, formed from reaction of an epoxide resin with polyamine hardener). When using PrePreg in the manufacturing process, up to 10% of the PrePreg turns into waste due to cutoffs directly. The remaining amount will turn into waste/by-product after 20 years.
  Uncertainty: Calculated variable. Uncertainty will be determined from propagation of uncertainty factors of underlying variables. Uncertainty of actual relation between variables not accounted at this time, although this could be included in a future update.
  production volume 70196 kg
- waste reinforced concrete: -5.96215 kg; lognormal variance with pedigree 0.008, pedigree (1,1,4,1,1)
  Calculated value. A density of 2400kg/m3 is assumed for the reinforced concrete.
  Uncertainty: Calculated variable. Uncertainty will be determined from propagation of uncertainty factors of underlying variables. Uncertainty of actual relation between variables not accounted at this time, although this could be included in a future update.
  production volume 8.9765e6 kg
- scrap steel: -3.32578 kg; lognormal variance with pedigree 0.008, pedigree (1,1,4,1,1)
  Calculated value. The zinc coating of the steel tower is included in the scrap steel, which is a simplification. It can be assumed that 100% of the steel enter a recycling process.
  Uncertainty: Calculated variable. Uncertainty will be determined from propagation of uncertainty factors of underlying variables. Uncertainty of actual relation between variables not accounted at this time, although this could be included in a future update.
  production volume 301056 kg
- waste glass: -0.0374243 kg; lognormal variance with pedigree 0.008, pedigree (1,1,4,1,1)
  Estimated value based on 2MW GLO dataset.
  The glass fibre reinforced plastic of the rotor is disposed of as 50% glass and 50% plastic. When using PrePreg in the manufacturing process, up to 10% of the PrePreg turns into waste due to cutoffs directly. The remaining amount will turn into waste/by-product after 20 years.
  Today, it is not possible to recycle the turbine blades. When the turbine’s lifetime expires, the blades will
  be dismantled into smaller pieces, which are deposited at controlled waste deposits.[Elsam. 2004b. Life Cycle Assessment of turbines PSO 1999. Elsam Engineering A/S, Fredericia, Denmark]
  Uncertainty: Calculated variable. Uncertainty will be determined from propagation of uncertainty factors of underlying variables. Uncertainty of actual relation between variables not accounted at this time, although this could be included in a future update.
  production volume 39127.8 kg
- waste polyethylene: -0.0573059 kg; lognormal variance with pedigree 0.008, pedigree (1,1,4,1,1)
  Calculated value
  Uncertainty: Calculated variable. Uncertainty will be determined from propagation of uncertainty factors of underlying variables. Uncertainty of actual relation between variables not accounted at this time, although this could be included in a future update.
  production volume 17024.3 kg
- aluminium scrap, post-consumer: -0.0155785 kg; lognormal variance with pedigree 0.008, pedigree (1,1,4,1,1)
  Calculated value. It can be assumed that 100% of the aluminium enter a recycling process.
  Uncertainty: Calculated variable. Uncertainty will be determined from propagation of uncertainty factors of underlying variables. Uncertainty of actual relation between variables not accounted at this time, although this could be included in a future update.
  production volume 7161.44 kg
- road: 0.114191 m*year; source Vestas 2011, p. p.81; lognormal variance with pedigree 0.0577, pedigree (2,5,5,3,3)
  Estimated value. Value taken from the 2MW wind turbine construction
  Literature value/estimation. Generally a combination of tarred roads and dirt roads need to be built to provide access to the power plant turbines, which are often located in remote locations. It has been estimated that 10 km of tarred road is needed for a power plant with 25 wind turbines.
  No maintenance is assumed.
  Uncertainty: estimated variance
- sheet rolling, aluminium: 0.0584838 kg; lognormal variance with pedigree 0.008, pedigree (1,1,4,1,1)
  Proxy for wire drawing of aluminium.
  Uncertainty: Calculated variable. Uncertainty will be determined from propagation of uncertainty factors of underlying variables. Uncertainty of actual relation between variables not accounted at this time, although this could be included in a future update.
- wire drawing, copper: 0.219797 kg; lognormal variance with pedigree 0.008, pedigree (1,1,4,1,1)
  Estimated value. Value taken from the 2MW wind turbine construction
  Uncertainty: Calculated variable. Uncertainty will be determined from propagation of uncertainty factors of underlying variables. Uncertainty of actual relation between variables not accounted at this time, although this could be included in a future update.
- epoxy resin, liquid: 0.050695 kg; source ENERCON GmbH 2010; lognormal variance with pedigree 0.0147, pedigree (2,1,4,3,1)
  Literature value. Used for the rotor blades. The main materials used in the rotor blades are glass fibres and epoxy resin.
  Split between materials is based on prepeg used in the 2MW dataset.
  Prepreg is used as material for the blades in this dataset. It was not possible to get information on the exact composition of Prepreg. From the supplier’s PrePreg safety data sheets it is assumed that Prepreg consists of approx 40% epoxy and 60% glass fibre. Total Prepreg mass is 21507 kg. When using PrePreg in the manufacturing process, up to 10% of the PrePreg turns into waste due to cutoffs.
  Uncertainty: estimated variance
- steel, chromium steel 18/8: 0.483706 kg; source ENERCON GmbH 2010, p. p. 25, Tab. 5.3; lognormal variance with pedigree 0.0097, pedigree (2,1,4,3,1)
  Literature/assumed value. Steel used in rotor blades
  Uncertainty: estimated variance. higher uncertainty because of the fact discussed in the comment.
- excavation, hydraulic digger: 0.116418 m3; lognormal variance with pedigree 0.008, pedigree (1,1,4,1,1)
  Estimated value. Same amount than the concrete in foundation
  Uncertainty: Calculated variable. Uncertainty will be determined from propagation of uncertainty factors of underlying variables. Uncertainty of actual relation between variables not accounted at this time, although this could be included in a future update.
- glass fibre reinforced plastic, polyamide, injection moulded: 0.14067 kg; source ENERCON GmbH 2010, p. p. 25, Tab. 5.3; lognormal variance with pedigree 0.0147, pedigree (2,1,4,3,1)
  (same comment as for epoxy resin, liquid)
- concrete, normal: 0.00196105, 0.00012727, 1.32614e-5, 0.00010736, 6.03901e-5, 8.62579e-6, 0.00497048 m3 (7 suppliers, which the file names only by identifier); sum of these 0.00724843 m3; source ENERCON GmbH 2010, p. p. 13, 21+25, Tab. 5.3; lognormal variance with pedigree 0.008, pedigree (1,1,4,1,1)
  Calculated value. Concrete used for foundation and in tower structure.
  Estimated values based on % of total weight per component and material of the turbine published by the Princeton Energy Resources International, LLC
  Uncertainty: Calculated variable. Uncertainty will be determined from propagation of uncertainty factors of underlying variables. Uncertainty of actual relation between variables not accounted at this time, although this could be included in a future update.
- sheet rolling, chromium steel: 0.388839 kg; lognormal variance with pedigree 0.008, pedigree (1,1,4,1,1)
  (same comment as for waste polyethylene)
- steel, low-alloyed: 1.33209 kg; source ENERCON GmbH 2010, p. p. 25, Tab. 5.3; lognormal variance with pedigree 0.0097, pedigree (2,1,4,3,1)
  Literature/assumed value. Steel used in nacelle
  Uncertainty: estimated variance
- sheet rolling, steel: 1.51457 kg
  Calculated value. The steel is delivered to in steel plates, which have already been pre-cut. In addition, there is no waste of steel. The plates for the tower sections are rolled. Every section is welded lengthwise, then the individual sections are welded together.
- concrete, normal: 0.0011735 m3; source Elsam Engineering A/S,Fredericia,Denmark 2004, p. p. 13, 21+25, Tab. 5.3; lognormal variance with pedigree 0.044225, pedigree (2,4,5,2,2)
  Literature value. Used for foundation.
  The traditional bottom plates are approx 15 × 15m wide and 2m deep. In total, approx 400m3 of reinforced concrete.
  Uncertainty: estimated variance
- zinc: 0.00778673 kg; source Elsam Engineering A/S,Fredericia,Denmark 2004, p. p. 25, Tab. 5.3; lognormal variance with pedigree 0.044225, pedigree (2,4,5,2,2)
  Literature value
  Uncertainty: estimated variance
- zinc coat, pieces: 0.0138793 m2
  Calculated value. The surface for zinc coating is estimated with a diameter and a height of the tower of 4 m and 78 m, respectively.
- electricity, medium voltage: 1.03115 kWh; source Burger, B. 2007; lognormal variance with pedigree 0.1006, pedigree (5,4,5,4,3)
  Literatur value / calculation: Additional to energy requirements for material processing, a factor of 0.5 kWh/kg material (except of concrete for the foundation) after is included.Total wind turbine weight is about 286000 kg (see Technology comment for details). This should also cover the energy required for mounting and removal of the turbine.
  Uncertainty: rough estimation
- welding, arc, steel: 0.00395867 m; source Burger, B. 2007; lognormal variance with pedigree 0.211, pedigree (5,5,5,5,5)
  Literature/empiric value: The number for welding is an empiric factor. The steel is delivered to in steel plates, which have already been pre-cut. In addition, there is no waste of steel. The plates for the tower sections are rolled. Every section is welded lengthwise, then the individual sections are welded together.
  Uncertainty: empiric factor, high uncertainty
- waste reinforced concrete: -4.64749, -0.0492436 kg (2 suppliers, which the file names only by identifier); sum of these -4.69673 kg
  Calculated value. A density of 2400kg/m3 is assumed for the reinforced concrete.
  production volume 8.11948e9 kg
- scrap copper: -0.0667977, -0.0794021 kg (2 suppliers, which the file names only by identifier); sum of these -0.1462 kg
  Calculated value. It can be assumed that 100% of the copper enter a recycling process.
  production volume 2.63719e7 kg
- waste polyethylene: -0.000755204, -0.000311926, -0.000296203, -0.0113027, -0.000126015, -5.71149e-5 kg (6 suppliers, which the file names only by identifier); sum of these -0.0128492 kg
  Calculated value
  production volume 2.89192e7 kg
- waste glass: -0.00097068, -9.0563e-5, -0.000405236, -0.0105317, -0.000137525, -2.20215e-5 kg (6 suppliers, which the file names only by identifier); sum of these -0.0121577 kg
  Estimation. The glass fibre reinforced plastic of the rotor is disposed of as 50% glass and 50% plastic. When using PrePreg in the manufacturing process, up to 10% of the PrePreg turns into waste due to cutoffs directly. The remaining amount will turn into waste/by-product after 20 years.
  Today, it is not possible to recycle the turbine blades. When the turbine’s lifetime expires, the blades will
  be dismantled into smaller pieces, which are deposited at controlled waste deposits.[Elsam. 2004b. Life Cycle Assessment of turbines PSO 1999. Elsam Engineering A/S, Fredericia, Denmark]
  production volume 6.64665e7 kg
- waste polyethylene/polypropylene product: -0.172308 kg
  Calculated value. Proxy for the treatment of the epoxy resin (polyepoxide, formed from reaction of an epoxide resin with polyamine hardener). When using PrePreg in the manufacturing process, up to 10% of the PrePreg turns into waste due to cutoffs directly. The remaining amount will turn into waste/by-product after 20 years.
  production volume 8.8622e7 kg
- epoxy resin, liquid: 0.0465392 kg
  Literature value. Used for the rotor blades. Steel and aluminium blades are used for small wind turbines. For large ones, they have problems of weight or metal fatigue. Most modern rotor blades on large wind turbines are made of glass fiber reinforced polyester or epoxy. Carbon fiber or Kevlar seems to be too expensive for large turbines. [Chataignere A. and Le Boulch D. (2003) Wind Turbine Systems. Final report ECLIPSE. EDF R&D, Clamart Cedex, France.]
  Prepreg is used as material for the blades in this dataset. It was not possible to get information on the exact composition of Prepreg. From the supplier’s PrePreg safety data sheets it is assumed that Prepreg consists of approx 40% epoxy and 60% glass fibre. Total Prepreg mass is 21507 kg. When using PrePreg in the manufacturing process, up to 10% of the PrePreg turns into waste due to cutoffs.
- waste paint on wall: -0.000356295 kg
  Estimation. Alkyd paint at the concrete tower.
  production volume 1.52834e6 kg
- polyvinylchloride, emulsion polymerised: 0.000918894 kg; source Chataignere A. 2003, p. 46f; lognormal variance with pedigree 0.0641, pedigree (4,4,5,3,3)
  Literature value/calculated value. Used for the three blades. The shares of "polyvinylchloride, emulsion polymersied" and "polyvinylchloride, suspension polymerised" in the cancelled ecoinvent v2 "aluminium production mix" dataset amounted to 12.8% (emulsion) and 87.2% (suspension) respectively. These shares have been overtaken to distribute the original amount of 4569 kg polyvinylchloride.These shares correspond to the European distribution of the different PVC types.
  Sum of PVC-foam (3*279 kg) and PVC (3*131 kg) extrapolated with a weight factor from a 1.5MW wind turbine.
  Uncertainty: estimated variance. higher basic uncertainty because of the extrapolation and the age of the data. slightly higher technological score because of the split of the pvc use in the two pvc types.
- waste rubber, unspecified: -0.00685288 kg
  Calculated value
  production volume 388537 kg
- waste polyvinylchloride: -0.000287495, -0.000118746, -0.00011276, -0.00430277, -4.79718e-5, -2.17427e-5, -0.0301218 kg (7 suppliers, which the file names only by identifier); sum of these -0.0350133 kg
  Calculated value.
  production volume 2.89636e6 kg
- alkyd paint, white, without water, in 60% solution state: 0.000194904, 0.000925234 kg (2 suppliers, which the file names only by identifier); sum of these 0.00112014 kg; source Chataignere A. 2003, p. 46f; lognormal variance with pedigree 0.0567, pedigree (4,4,5,3,2)
  Literature value/calculated value. Used for the tower, the nacelle and the three blades.
  Sum of paint used for the tower (2411kg, directly final value) as well as for the nacelle (654 kg) and in the three blades (3*184 kg) extrapolated with accordant weight factors from a 1.5MW wind turbine.
  Uncertainty: estimated variance. higher basic uncertainty because of the extrapolation and the age of the data.
- waste paint on metal: -6.42918e-6, -0.000757414 kg (2 suppliers, which the file names only by identifier); sum of these -0.000763843 kg
  Calculated value/estimation. Paint on the nacelle and the blades.
  production volume 3.27653e6 kg
- wire drawing, steel: 0.00369616 kg
  Estimation.
- waste concrete, not reinforced: -0.0139744, -0.000148069, -0.0371966 kg (3 suppliers, which the file names only by identifier); sum of these -0.051319 kg
  Calculated value. A density of 2400kg/m3 is assumed for the concrete.
  production volume 2.28205e7 kg
- lubricating oil: 0.0697254, 0.079159 kg (2 suppliers, which the file names only by identifier); sum of these 0.148884 kg; source Chataignere A. 2003, p. 46f; lognormal variance with pedigree 0.0641, pedigree (4,4,5,3,3)
  Literature value. Lubricating oil use of 940 kg is extrapolated with a capacity factor 4.5MW/1.5MW from a 1.5MW wind turbine network connection.
  Uncertainty: estimated variance. higher basic uncertainty because of the extrapolation and the age of the data.
- waste mineral oil: -0.0685582, -0.00263805, -0.080757 kg (3 suppliers, which the file names only by identifier); sum of these -0.151953 kg
  Estimation
  production volume 1.78761e6 kg
- cable, three-conductor cable: 0.190909 m; source Ruegg Cheminèe company 2011; lognormal variance with pedigree 0.0258, pedigree (2,1,4,1,1)
  EcoSpold01Location=GLO
  estimation
- ceramic tile: 0.0574728 kg; source G&M E-Filter GMBH company 2011; lognormal variance with pedigree 0.0358, pedigree (2,5,4,5,1)
  estimation - comparison between two producer companies G&M E-Filter (CH) and Coral Engineering (IT)
- glass wool mat: 0.075262 kg; source G&M E-Filter GMBH company 2011; lognormal variance with pedigree 0.0332, pedigree (4,1,4,1,1)
  estimation - comparison between two producer companies G&M E-Filter (CH) and Coral Engineering (IT)
  EcoSpold01Location=CH
- inert waste, for final disposal: -0.503472 kg; lognormal variance with pedigree 0.0087, pedigree (1,2,4,1,1)
  EcoSpold01Location=CH
  ceramic
  production volume 2100 kg
- waste polyethylene: -0.024541 kg; lognormal variance with pedigree 0.0087, pedigree (1,2,4,1,1)
  plastics
  EcoSpold01Location=CH
  production volume 1550 kg
- waste mineral wool, for final disposal: -0.102799 kg; lognormal variance with pedigree 0.0087, pedigree (1,2,4,1,1)
  EcoSpold01Location=CH
  insulation and filters
  production volume 2750 kg
- scrap aluminium: -0.0105359 kg; lognormal variance with pedigree 0.0087, pedigree (1,2,4,1,1)
  EcoSpold01Location=CH
  various elements
  production volume 600 kg
- drawing of pipe, steel: 0.0572162, 0.088865 kg (2 suppliers, which the file names only by identifier); sum of these 0.146081 kg; source G&M E-Filter GMBH company 2011; lognormal variance with pedigree 0.0358, pedigree (2,5,4,5,1)
  estimation - comparison between two producer companies G&M E-Filter (CH) and Coral Engineering (IT)
  EcoSpold01Location=RER
- polystyrene foam slab: 0.0604987 kg; source ETA Heiztechnik GmbH 2011; lognormal variance with pedigree 0.0265, pedigree (2,3,4,3,1)
  EcoSpold01Location=RER
  calculated value - insulation of the accumulator hot water tanks
- concrete, normal: 0.00365029 m3; source ETA Heiztechnik GmbH 2011; lognormal variance with pedigree 0.0265, pedigree (2,3,4,3,1)
  EcoSpold01Location=CH
  calculated value - basing on the space required for the furnace basement (about 4m2) the amount of concrete was calculated
- waste polystyrene isolation, flame-retardant: -0.0184417 kg; lognormal variance with pedigree 0.0167, pedigree (1,5,4,3,1)
  disposal of insulation of the water storage
  production volume 14250 kg
- waste concrete: -8.3985 kg; lognormal variance with pedigree 0.0167, pedigree (1,5,4,3,1)
  EcoSpold01Location=CH
  disposal of the concrete for the furnace basement - around 0,2 m3 of concrete * 2350 kg/m3 (concrete density) = around 460 kg
  production volume 342750 kg
- stone wool: 0.138156 kg; source ETA Heiztechnik GmbH 2011; lognormal variance with pedigree 0.0265, pedigree (2,3,4,3,1)
  EcoSpold01Location=CH
  calculated value
- refractory, fireclay, packed: 1.06381 kg; source ETA Heiztechnik GmbH 2011; lognormal variance with pedigree 0.0093, pedigree (1,3,4,3,1)
  EcoSpold01Location=DE
  measured value - refractory bricks in fireclay are used in the combustion chamber inside the furnace (value measured with a technician during wood boilers exposition in the modeled furnace)
- iron-nickel-chromium alloy: 0.0248697 kg; source Uniconfort srl 2011; lognormal variance with pedigree 0.0279, pedigree (3,3,4,3,1)
  estimation - components for the conveyor grate in the combustion chamber
  EcoSpold01Location=RER
- metal working, average for metal product manufacturing: 0.00189622, 0.00189513 kg (2 suppliers, which the file names only by identifier); sum of these 0.00379135 kg; source AEK Pellets AG 2011; lognormal variance with pedigree 0.0052, pedigree (1,3,3,5,1)
  calculated value
- tower silo, plastic: 0.00431981 m3; source AEK Pellets AG 2011; lognormal variance with pedigree 0.0106, pedigree (1,3,3,5,1)
  estimation - value given from pellets company in the filled questionnaire (dimensions of the pellet silos in their factory). This dataset include its own disposal in the end of its lifetime.
- waste mineral wool: -0.00524089 kg; lognormal variance with pedigree 0.0052, pedigree (1,3,3,5,1)
  calculated value
  production volume 371250 kg
    Calculated from production volume of reference product using the relative outputs.
- scrap aluminium: -0.00516288 kg; lognormal variance with pedigree 0.0052, pedigree (1,3,3,5,1)
  calculated value
  production volume 422820 kg
    Calculated from production volume of reference product using the relative outputs.
- heat, district or industrial, other than natural gas: 0.790369 MJ; source Frischknecht R. 1996; lognormal variance with pedigree 0.0513, pedigree (2,3,5,3,1)
  Calculated: energy consumption for the construction of the technical material (melting furnace, forming machines, cooling furnace) calcualted based on literature source. 45% of energy is from oil.
  Uncertainty: c
- heat, district or industrial, natural gas: 0.74877 MJ; source Frischknecht R. 1996; lognormal variance with pedigree 0.0513, pedigree (2,3,5,3,1)
  Calculated: energy consumption for the construction of the technical material (melting furnace, forming machines, cooling furnace) calcualted based on literature source. 45% of energy is from natural gas.
  Uncertainty: c
- electricity, medium voltage: 0.891086 kWh; source Frischknecht R. 1996; lognormal variance with pedigree 0.0513, pedigree (2,3,5,3,1)
  Calculated: energy consumption for the construction of the technical material (melting furnace, forming machines, cooling furnace) calculated based on literature source. 10% of energy is from electricity.
  Uncertainty: c
- waste concrete: -0.663062 kg; lognormal variance with pedigree 0.1561, pedigree (4,5,5,3,4)
  Calculated, based on input
  Uncertainty: C
  production volume 2.54e6 kg
- injection moulding: 0.177021 kg; lognormal variance with pedigree 0.08, pedigree (4,4,5,5,3)
  EcoSpold01Location=RER
  Based on material input
  Uncertainty: based on material input
- ammonia, liquid: 0.00823284 kg; lognormal variance with pedigree 0.08, pedigree (4,4,5,5,3)
  Estimation based on few references
  EcoSpold01Location=CH
  Uncertainty: estimation based on few references
- heat carrier liquid, 40% C3H8O2: -3.80353e-5 m3; lognormal variance with pedigree 0.08, pedigree (4,4,5,5,3)
  EcoSpold01Location=CH
  Disposal of insulation material
  Uncertainty: disposal of insulation material
  production volume 0.05625 m3
- transport, passenger car: 0.307154 km; lognormal variance with pedigree 0.2, pedigree (4,4,5,5,3)
  Estimation
  EcoSpold01Location=CH
  Uncertainty: estimation
- wastewater, from residence: -0.000765592 m3; lognormal variance with pedigree 0.142, pedigree (4,4,5,5,4)
  Approximation for waste water treatment
  EcoSpold01Location=CH
  Uncertainty: approximation for waste water treatment
  production volume 0.897 m3
- zinc coat, coils: 0.0147195 m2; lognormal variance with pedigree 0.08, pedigree (4,4,5,5,3)
  Based on material input
  EcoSpold01Location=RER
  Uncertainty: based on material input
- electricity, medium voltage: 0.0174544, 0.00317596, 0.0291678, 0.0124816, 0.0538594, 0.780905, 0.111762, 0.238806 kWh (8 suppliers, which the file names only by identifier); sum of these 1.24761 kWh; lognormal variance with pedigree 0.1246, pedigree (2,4,5,5,4)
  Approximation with company data of similar branch
  EcoSpold01Location=UCTE
  Uncertainty: approximation with company data of similar branch
- water, completely softened: 0.0284715, 0.0380353 kg (2 suppliers, which the file names only by identifier); sum of these 0.0665068 kg; lognormal variance with pedigree 0.08, pedigree (4,4,5,5,3)
  EcoSpold01Location=RER
  Estimation based on few references
  Uncertainty: estimation based on few references
- waste mineral wool: -0.0124309 kg; lognormal variance with pedigree 0.08, pedigree (4,4,5,5,3)
  Disposal of heat insulation material
  EcoSpold01Location=CH
  Uncertainty: disposal of heat insulation material
  production volume 10.5 kg
- electricity, low voltage: 0.368279, 0.0645915, 1.46494, 5.25218, 1.06214, 16.0627, 2.64765, 7.54174 kWh (8 suppliers, which the file names only by identifier); sum of these 34.4642 kWh; lognormal variance with pedigree 0.064, pedigree (3,4,5,5,3)
  EcoSpold01Location=CH
  Estimation based on specific energy demand of engineering hours
  Uncertainty: estimation based on specific energy demand of engineering hours
- heat, district or industrial, natural gas: 2.1841, 1.13141 MJ (2 suppliers, which the file names only by identifier); sum of these 3.31551 MJ; lognormal variance with pedigree 0.1246, pedigree (2,4,5,5,4)
  Approximation with company data of similar branch
  EcoSpold01Location=RER
  Uncertainty: approximation with company data of similar branch
- heat, central or small-scale, other than natural gas: 0.0398811, 2.79004 MJ (2 suppliers, which the file names only by identifier); sum of these 2.82992 MJ; lognormal variance with pedigree 0.064, pedigree (3,4,5,5,3)
  Estimation based on specific energy demand of engineering hours
  EcoSpold01Location=CH
  Uncertainty: estimation based on specific energy demand of engineering hours
- metal working, average for aluminium product manufacturing: 0.0538342 kg; lognormal variance with pedigree 0.2, pedigree (5,5,5,5,4)
  Assumed type of processing
  EcoSpold01Location=RER
  Uncertainty: assumed type of processing
- metal working, average for steel product manufacturing: 0.426092 kg; lognormal variance with pedigree 0.2, pedigree (5,5,5,5,4)
  Assumed type of processing
  EcoSpold01Location=RER
  Uncertainty: assumed type of processing
- polyurethane, flexible foam: 0.00468468 kg; lognormal variance with pedigree 0.13, pedigree (1,5,5,5,4)
  EcoSpold01Location=RER
  Average of 4 machines
  Uncertainty: average of 4 machines
- flat glass, uncoated: 0.00218737 kg; lognormal variance with pedigree 0.13, pedigree (1,5,5,5,4)
  EcoSpold01Location=RER
  Average of 4 machines
  Uncertainty: average of 4 machines
- waste plastic, industrial electronics: -0.0305941 kg; lognormal variance with pedigree 0.2, pedigree (5,5,5,5,4)
  Assumed route of disposal
  EcoSpold01Location=CH
  Uncertainty: assumed route of disposal
  production volume 0.02862 kg
- sheet rolling, copper: 0.0540943 kg; lognormal variance with pedigree 0.2, pedigree (5,5,5,5,4)
  EcoSpold01Location=RER
  Assumed type of processing
  Uncertainty: assumed type of processing
- metal working, average for chromium steel product manufacturing: 0.126424 kg; lognormal variance with pedigree 0.2, pedigree (5,5,5,5,4)
  Assumed type of processing
  EcoSpold01Location=RER
  Uncertainty: assumed type of processing
- alkyd paint, white, without solvent, in 60% solution state: 0.00288146 kg; lognormal variance with pedigree 0.13, pedigree (1,5,5,5,4)
  Average of 4 machines
  EcoSpold01Location=RER
  Uncertainty: average of 4 machines
- waste polyurethane: -0.000575699, -3.8466e-5, -2.90912e-6, -1.58878e-5, -6.4185e-6, -1.5087e-5, -0.00403021 kg (7 suppliers, which the file names only by identifier); sum of these -0.00468468 kg; lognormal variance with pedigree 0.2, pedigree (5,5,5,5,4)
  EcoSpold01Location=CH
  Assumed route of disposal
  Uncertainty: assumed route of disposal
  production volume 0.02541 kg
- waste bulk iron, excluding reinforcement: -0.34689, -0.721341 kg (2 suppliers, which the file names only by identifier); sum of these -1.06823 kg; lognormal variance with pedigree 0.074, pedigree (3,4,5,5,3)
  (same comment as for waste bulk iron, excluding reinforcement)
- used air filter in exhaust air valve: -0.250395 unit; lognormal variance with pedigree 0.046, pedigree (3,4,5,5,1)
  (same comment as for used silencer steel, DN 315)
- ventilation system, central, 1 x 720 m3/h, polyethylene ducts, with earth tube heat exchanger: 4.64642e-5 unit; lognormal variance with pedigree 0.046, pedigree (3,4,5,5,1)
  (same comment as for used silencer steel, DN 315)
- used ventilation control and wiring central unit: -0.000621463 unit; lognormal variance with pedigree 0.046, pedigree (3,4,5,5,1)
  (same comment as for used silencer steel, DN 315)
- used blower and heat exchange unit central, 600-1200 m3/h: -0.000621463 unit; lognormal variance with pedigree 0.046, pedigree (3,4,5,5,1)
  (same comment as for used silencer steel, DN 315)
- used silencer steel, DN 125: -0.0453577 unit; lognormal variance with pedigree 0.046, pedigree (3,4,5,5,1)
  (same comment as for used air filter in exhaust air valve)
- used silencer steel, DN 315: -0.00124438 unit; lognormal variance with pedigree 0.046, pedigree (3,4,5,5,1)
  (same comment as for used silencer steel, DN 315)
- used flexible duct aluminium/PET, DN of 125: -0.0313843 m; lognormal variance with pedigree 0.046, pedigree (3,4,5,5,1)
  (same comment as for used air filter in exhaust air valve)
- used air filter central unit, 600 m3/h: -0.00998174 unit; lognormal variance with pedigree 0.046, pedigree (3,4,5,5,1)
  (same comment as for used air filter in exhaust air valve)
- ventilation system, central, 1 x 720 m3/h, steel ducts, with earth tube heat exchanger: 4.64633e-5 unit; lognormal variance with pedigree 0.046, pedigree (3,4,5,5,1)
  (same comment as for used silencer steel, DN 315)
- used exhaust air valve in-wall housing, plastic/steel: -0.0306397 unit; lognormal variance with pedigree 0.0446, pedigree (2,4,5,5,1)
  (same comment as for used air filter in exhaust air valve)
  production volume 71.394 unit
- used outside air intake stainless steel, DN 370: -0.000822575 unit; lognormal variance with pedigree 0.0446, pedigree (2,4,5,5,1)
  (same comment as for used air filter in exhaust air valve)
  production volume 3.96633 unit
- used exhaust air roof hood steel, DN 400: -0.000822575 unit; lognormal variance with pedigree 0.0446, pedigree (2,4,5,5,1)
  (same comment as for used silencer steel, DN 315)
  production volume 3.96633 unit
- used room-connecting overflow element steel, approx. 40 m3/h: -0.0306397 unit; lognormal variance with pedigree 0.0446, pedigree (2,4,5,5,1)
  (same comment as for used air filter in exhaust air valve)
  production volume 71.394 unit
- used air distribution terminal panel steel, 120 m3/h: -0.0204264 unit; lognormal variance with pedigree 0.0446, pedigree (2,4,5,5,1)
  (same comment as for used air filter in exhaust air valve)
  production volume 47.596 unit
- used sealing tape aluminium/PE, 50 mm wide: -0.683463 m; lognormal variance with pedigree 0.0446, pedigree (2,4,5,5,1)
  (same comment as for used air filter in exhaust air valve)
  production volume 793.266 m
- used insulation spiral-seam duct rockwool, DN 400: -0.0241981 m; lognormal variance with pedigree 0.0446, pedigree (2,4,5,5,1)
  (same comment as for used air filter in exhaust air valve)
  production volume 79.3266 m
- used air filter decentralized unit, 180-250 m3/h: -0.107219 unit; lognormal variance with pedigree 0.046, pedigree (3,4,5,5,1)
  (same comment as for used air filter in exhaust air valve)
- used blower and heat exchange unit decentralized, 180-250 m3/h: -0.00947862 unit; lognormal variance with pedigree 0.046, pedigree (3,4,5,5,1)
  (same comment as for used air filter in exhaust air valve)
- used ventilation control and wiring decentralized unit: -0.00947862 unit; lognormal variance with pedigree 0.046, pedigree (3,4,5,5,1)
  (same comment as for used air filter in exhaust air valve)
- ventilation system, decentralized, 6 x 120 m3/h, polyethylene ducts, with earth tube heat exchanger: 3.90001e-5 unit; lognormal variance with pedigree 0.046, pedigree (3,4,5,5,1)
  (same comment as for used silencer steel, DN 315)
- ventilation system, decentralized, 6 x 120 m3/h, polyethylene ducts: 3.90001e-5 unit; lognormal variance with pedigree 0.046, pedigree (3,4,5,5,1)
  (same comment as for used silencer steel, DN 315)
- ventilation system, decentralized, 6 x 120 m3/h, steel ducts, with earth tube heat exchanger: 3.89995e-5 unit; lognormal variance with pedigree 0.042, pedigree (1,1,5,5,1)
  3,4,1,1,1,nA; Questionnaire, Data related to building considered
  EcoSpold01Location=CH
- ventilation system, decentralized, 6 x 120 m3/h, steel ducts: 3.89995e-5 unit; lognormal variance with pedigree 0.046, pedigree (3,4,5,5,1)
  (same comment as for used silencer steel, DN 315)
- electricity, medium voltage: 0.00895367, 0.113417 kWh (2 suppliers, which the file names only by identifier); sum of these 0.122371 kWh; source Burger, B. 2007; lognormal variance with pedigree 0.008, pedigree (1,1,4,1,1)
  Extrapolated value from 2MW GLO dataset
  Literature value / calculation: Additional to energy requirements for material processing, a factor of 0.5 kWh/kg material (except of concrete for the foundation) after is included.Total wind turbine weight is about 2243554 kg (see Technology comment for details). This should also cover the energy required for mounting and removal of the turbine.
  Uncertainty: Calculated variable. Uncertainty will be determined from propagation of uncertainty factors of underlying variables. Uncertainty of actual relation between variables not accounted at this time, although this could be included in a future update.
- inert waste, for final disposal: -0.507468 kg; lognormal variance with pedigree 0.0186, pedigree (1,5,4,5,1)
  EcoSpold01Location=CH
  ceramic
  production volume 9.1539e6 kg
- waste mineral wool, for final disposal: -0.0448188, -0.0592309 kg (2 suppliers, which the file names only by identifier); sum of these -0.10405 kg; lognormal variance with pedigree 0.0186, pedigree (1,5,4,5,1)
  EcoSpold01Location=CH
  insulation and filters
  production volume 1.19872e7 kg
- scrap aluminium: -0.010885 kg; lognormal variance with pedigree 0.0186, pedigree (1,5,4,5,1)
  EcoSpold01Location=CH
  various elements
  production volume 2.6154e6 kg
- waste polyethylene: -0.00237996 kg; lognormal variance with pedigree 0.0186, pedigree (1,5,4,5,1)
  plastics
  EcoSpold01Location=CH
  production volume 6.75645e6 kg
- waste polystyrene isolation, flame-retardant: -0.00523779, -0.0132785 kg (2 suppliers, which the file names only by identifier); sum of these -0.0185163 kg; lognormal variance with pedigree 0.0186, pedigree (1,5,4,5,1)
  disposal of insulation of the water storage
  production volume 5.24875e6 kg
- waste concrete: -7.9445 kg; lognormal variance with pedigree 0.0186, pedigree (1,5,4,5,1)
  (same comment as for waste concrete)
  production volume 1.26246e8 kg
- heat, district or industrial, other than natural gas: 0.000354141, 0.789958 MJ (2 suppliers, which the file names only by identifier); sum of these 0.790312 MJ; lognormal variance with pedigree 0.0532, pedigree (2,3,5,5,1)
  Calculated, based on Frischknecht 1996
  Uncertainty: c
- used printed wiring boards: -0.116848 kg; lognormal variance with pedigree 0.0438, pedigree (1,4,5,4,2)
  The amount is set equal to the input amount for the respective material. Data are from Fulvio and Peiro 2015.
  production volume 1.2e6 kg
- heat, district or industrial, natural gas: 1.11566 MJ; lognormal variance with pedigree 0.0438, pedigree (1,4,5,4,2)
  Converted from kWh. Data are from Fulvio and Peiro 2015.
- polyvinylchloride, bulk polymerised: 0.0313858 kg; lognormal variance with pedigree 0.0438, pedigree (1,4,5,4,2)
  Used here to describe 'plastics' as provided in the original literature source. Data are from Fulvio and Peiro 2015.
- metal working factory: 3.98325e-10 unit; lognormal variance with pedigree 0.3432, pedigree (1,4,5,4,2)
  Estimated value.The input of infrastructure is approximated with the exchange 'metal working factory', this was chosen as metal is the main material constituting the final product. The general comment for the activity 'metal working faculty, GLO' [accessed 19.01.2018] specifies: '4.58E-10 units of this process are needed to produce 1 kg of final product. Additionally, the dataset for 'metal working factory' needs to be used together with the 'energy and auxilliary inputs, metal working factory', 1 kg of this exchange is required per 1 kg of final product.
- cable, unspecified: 0.0106464 kg; lognormal variance with pedigree 0.0438, pedigree (1,4,5,4,2)
  This product represents average, unspecified cable. Data are from Fulvio and Peiro 2015.
- used cable: -0.0130115 kg; lognormal variance with pedigree 0.0438, pedigree (1,4,5,4,2)
  (same comment as for used printed wiring boards)
  production volume 1.8e7 kg
- plywood, for indoor use: 2.00004e-6, 1.79652e-5 m3 (2 suppliers, which the file names only by identifier); sum of these 1.99652e-5 m3; lognormal variance with pedigree 0.0438, pedigree (1,4,5,4,2)
  Data are from Fulvio and Peiro 2015. Used here to describe all 'wood' and 'other organic materials' as presented in the original literature source as presented in the original literature source. Convertion to volume from mass (3.7 kg) assuming wood density 600 kg/m3.
- brass: 1.53577e-6, 0.000305618 kg (2 suppliers, which the file names only by identifier); sum of these 0.000307154 kg; lognormal variance with pedigree 0.0438, pedigree (1,4,5,4,2)
  Data are from Fulvio and Peiro 2015. In terms of outputs assumed to have gone to waste copper.
- energy and auxilliary inputs, metal working factory: 3.54599e-11, 1.59015e-10 kg (2 suppliers, which the file names only by identifier); sum of these 1.94475e-10 kg; lognormal variance with pedigree 0.0438, pedigree (1,4,5,4,2)
  (same comment as for metal working factory)
- electronic component, passive, unspecified: 0.00150421 kg; lognormal variance with pedigree 0.0064, pedigree (2,4,3,4,2)
  Data are from Miljogiraff 2015.
- waste electric and electronic equipment: -1.55176 kg; lognormal variance with pedigree 0.0064, pedigree (2,4,3,4,2)
  The amount is set equal to the input amount for the respective material. Data are from Miljogiraff 2015.
  production volume 1.29283e7 kg
- glass fibre: 0.00205545 kg; lognormal variance with pedigree 0.0064, pedigree (2,4,3,4,2)
  Data are from Miljogiraff 2015.
- medium density fibreboard: 1.17386e-5 m3; lognormal variance with pedigree 0.0064, pedigree (2,4,3,4,2)
  In terms of outputs, assumed to have gone to waste wood, unsorted. Data are from Miljogiraff 2015.
- seal, natural rubber based: 0.000831522 kg; lognormal variance with pedigree 0.0064, pedigree (2,4,3,4,2)
  Data are from Miljogiraff 2015.
- krypton, gaseous: 1.45201e-7 kg; source Socolof M. L. 2001; lognormal variance with pedigree 0.0407, pedigree (1,3,5,3,1)
  Literature Value.
  EcoSpold01Location=CH
  Uncertainty: data from an US-EPA LCA study
- argon, crude, liquid: 4.42921e-5 kg; source Socolof M. L. 2001; lognormal variance with pedigree 0.0407, pedigree (1,3,5,3,1)
  EcoSpold01Location=RER
  Estimation, based on literature. A 50:50 split between panel assembly and module assembly is used.
  Uncertainty: data from an US-EPA LCA study
- sludge, NaCl electrolysis: -0.00032248 kg; source Socolof M. L. 2001; lognormal variance with pedigree 0.1107, pedigree (1,3,5,3,4)
  EcoSpold01Location=CH
  Estimation, based on literature. A 50:50 split between panel assembly and module assembly is used.
  Uncertainty: data from an US-EPA LCA study - approximated with existing waste process
  production volume 0.00382 kg
- wastewater from liquid crystal display production: -0.0080761 m3; source Socolof M. L. 2001; lognormal variance with pedigree 0.0407, pedigree (1,3,5,3,1)
  EcoSpold01Location=CH
  Estimation, based on literature. A 50:50 split between panel assembly and module assembly is used.
  Uncertainty: data from an US-EPA LCA study
  production volume 0.095667 m3
- heat, district or industrial, other than natural gas: 0.261808 MJ; source Socolof M. L. 2001; lognormal variance with pedigree 0.0407, pedigree (1,3,5,3,1)
  EcoSpold01Location=RER
  Estimation, based on literature. A 50:50 split between panel assembly and module assembly is used. Fuel oil #4, liquid petroleum gas (LPG) and kerosene are summed up and translated into light fuel oil.
  Uncertainty: data from an US-EPA LCA study
- printed wiring board mounting facility: 3.41677e-8 unit; lognormal variance with pedigree 0.3861, pedigree (4,5,5,3,1)
  EcoSpold01Location=GLO
  Proxy, due to a lack of specific information, the infrastructure module for the mounting of printed wiring board is used.
  Uncertainty: Estimation, based on PWB mounting plant
- dimethyl sulfoxide: 0.000373132 kg; source Socolof M. L. 2001; lognormal variance with pedigree 0.0407, pedigree (1,3,5,3,1)
  Estimation, based on literature. A 50:50 split between panel assembly and module assembly is used.
  EcoSpold01Location=RER
  Uncertainty: data from an US-EPA LCA study
- acetic acid, without water, in 98% solution state: 3.6019e-5 kg; source Socolof M. L. 2001; lognormal variance with pedigree 0.0407, pedigree (1,3,5,3,1)
  (same comment as for dimethyl sulfoxide)
- sodium hydroxide, without water, in 50% solution state: 0.0020204 kg; source Socolof M. L. 2001; lognormal variance with pedigree 0.0407, pedigree (1,3,5,3,1)
  (same comment as for dimethyl sulfoxide)
- chemical, organic: 0.00338798 kg; source Socolof M. L. 2001; lognormal variance with pedigree 0.0407, pedigree (1,3,5,3,1)
  EcoSpold01Location=GLO
  Proxy with estimation, based on literature. For those cases where no respective datasets for auxiliaries were available chemical organic is used. A 50:50 split between panel assembly and module assembly is used.
  Uncertainty: data from an US-EPA LCA study
- phosphoric acid, industrial grade, without water, in 85% solution state: 0.000600464 kg; source Socolof M. L. 2001; lognormal variance with pedigree 0.0407, pedigree (1,3,5,3,1)
  (same comment as for dimethyl sulfoxide)
- isopropanol: 0.000341766, 0.00162241 kg (2 suppliers, which the file names only by identifier); sum of these 0.00196417 kg; source Socolof M. L. 2001; lognormal variance with pedigree 0.0407, pedigree (1,3,5,3,1)
  (same comment as for dimethyl sulfoxide)
- propylene glycol, liquid: 3.73217e-5, 7.55717e-5 kg (2 suppliers, which the file names only by identifier); sum of these 0.000112893 kg; source Socolof M. L. 2001; lognormal variance with pedigree 0.0407, pedigree (1,3,5,3,1)
  (same comment as for dimethyl sulfoxide)
- refinery sludge: -1.65748e-5, -6.82569e-7, -0.000156646 kg (3 suppliers, which the file names only by identifier); sum of these -0.000173903 kg; source Socolof M. L. 2001; lognormal variance with pedigree 0.1107, pedigree (1,3,5,3,4)
  Estimation, based on literature. A 50:50 split between panel assembly and module assembly is used.
  EcoSpold01Location=CH
  Uncertainty: data from an US-EPA LCA study - approximated with existing waste process
  production volume 0.00206 kg
- nitric acid, without water, in 50% solution state: 1.21429e-5, 5.76437e-5 kg (2 suppliers, which the file names only by identifier); sum of these 6.97866e-5 kg; source Socolof M. L. 2001; lognormal variance with pedigree 0.0407, pedigree (1,3,5,3,1)
  (same comment as for argon, crude, liquid)
- spent solvent mixture: -0.00483235, -0.000105679, -0.0139271 kg (3 suppliers, which the file names only by identifier); sum of these -0.0188651 kg; source Socolof M. L. 2001; lognormal variance with pedigree 0.1107, pedigree (1,3,5,3,4)
  (same comment as for sludge, NaCl electrolysis)
  production volume 0.22347 kg
- nitrogen, liquid: 0.0071514, 0.0260531 kg (2 suppliers, which the file names only by identifier); sum of these 0.0332045 kg; source Socolof M. L. 2001; lognormal variance with pedigree 0.0407, pedigree (1,3,5,3,1)
  (same comment as for argon, crude, liquid)
- acetone, liquid: 1.54005e-5, 4.25674e-5 kg (2 suppliers, which the file names only by identifier); sum of these 5.79679e-5 kg; source Socolof M. L. 2001; lognormal variance with pedigree 0.0407, pedigree (1,3,5,3,1)
  (same comment as for argon, crude, liquid)
- lime, hydrated, packed: 6.5844e-6, 0.0007757 kg (2 suppliers, which the file names only by identifier); sum of these 0.000782285 kg; source Socolof M. L. 2001; lognormal variance with pedigree 0.0407, pedigree (1,3,5,3,1)
  Literature Value.
  EcoSpold01Location=CH
  Uncertainty: data from an US-EPA LCA study
- xylene: 1.3513e-6, 7.48483e-6 kg (2 suppliers, which the file names only by identifier); sum of these 8.83613e-6 kg; source Socolof M. L. 2001; lognormal variance with pedigree 0.0407, pedigree (1,3,5,3,1)
  (same comment as for argon, crude, liquid)
- aluminium sulfate, powder: 0.000102822, 0.00263718 kg (2 suppliers, which the file names only by identifier); sum of these 0.00274 kg; source Socolof M. L. 2001; lognormal variance with pedigree 0.0407, pedigree (1,3,5,3,1)
  Literature Value.
  EcoSpold01Location=RER
  Uncertainty: data from an US-EPA LCA study
- hydrogen fluoride: 6.04118e-6, 1.76527e-5 kg (2 suppliers, which the file names only by identifier); sum of these 2.36939e-5 kg; source Socolof M. L. 2001; lognormal variance with pedigree 0.0407, pedigree (1,3,5,3,1)
  Estimation, based on literature. A 50:50 split between panel assembly and module assembly is used.
  EcoSpold01Location=GLO
  Uncertainty: data from an US-EPA LCA study
- hydrochloric acid, without water, in 30% solution state: 4.43466e-5, 0.000198214 kg (2 suppliers, which the file names only by identifier); sum of these 0.000242561 kg; source Socolof M. L. 2001; lognormal variance with pedigree 0.0407, pedigree (1,3,5,3,1)
  (same comment as for dimethyl sulfoxide)
- hydrogen peroxide, without water, in 50% solution state: 1.43951e-7, 0.0394779 kg (2 suppliers, which the file names only by identifier); sum of these 0.0394781 kg; source Socolof M. L. 2001; lognormal variance with pedigree 0.0407, pedigree (1,3,5,3,1)
  (same comment as for argon, crude, liquid)
- waste plastic, consumer electronics: -0.00383138, -0.253608 kg (2 suppliers, which the file names only by identifier); sum of these -0.25744 kg; source Socolof M. L. 2001; lognormal variance with pedigree 0.1107, pedigree (1,3,5,3,4)
  (same comment as for refinery sludge)
  production volume 0.0054 kg
- carbon dioxide, liquid: 4.79602e-5, 0.00319319 kg (2 suppliers, which the file names only by identifier); sum of these 0.00324115 kg; source Socolof M. L. 2001; lognormal variance with pedigree 0.0407, pedigree (1,3,5,3,1)
  (same comment as for dimethyl sulfoxide)
- chlorine, liquid: 1.45406e-5, 7.26894e-5 kg (2 suppliers, which the file names only by identifier); sum of these 8.723e-5 kg; source Socolof M. L. 2001; lognormal variance with pedigree 0.0407, pedigree (1,3,5,3,1)
  (same comment as for dimethyl sulfoxide)
- hydrogen, liquid: 0.000448203, 0.0020506 kg (2 suppliers, which the file names only by identifier); sum of these 0.0024988 kg; source Socolof M. L. 2001; lognormal variance with pedigree 0.0407, pedigree (1,3,5,3,1)
  (same comment as for argon, crude, liquid)
- sulfuric acid: 0.00109769 kg; source Socolof M. L. 2001; lognormal variance with pedigree 0.0407, pedigree (1,3,5,3,1)
  (same comment as for argon, crude, liquid)
- oxygen, liquid: 0.0288573 kg; source Socolof M. L. 2001; lognormal variance with pedigree 0.0407, pedigree (1,3,5,3,1)
  (same comment as for dimethyl sulfoxide)
- cyclohexanol: 3.77682e-8, 7.64759e-8 kg (2 suppliers, which the file names only by identifier); sum of these 1.14244e-7 kg; source Socolof M. L. 2001; lognormal variance with pedigree 0.0407, pedigree (1,3,5,3,1)
  (same comment as for argon, crude, liquid)
- ethanol, without water, in 99.7% solution state, from ethylene: 2.35464e-5, 5.24306e-5 kg (2 suppliers, which the file names only by identifier); sum of these 7.5977e-5 kg; source Socolof M. L. 2001; lognormal variance with pedigree 0.0407, pedigree (1,3,5,3,1)
  (same comment as for argon, crude, liquid)
- methyl ethyl ketone: 1.13328e-8, 3.00324e-8 kg (2 suppliers, which the file names only by identifier); sum of these 4.13653e-8 kg; source Socolof M. L. 2001; lognormal variance with pedigree 0.0407, pedigree (1,3,5,3,1)
  (same comment as for argon, crude, liquid)
- printed wiring board, mounted mainboard, desktop computer, Pb containing: 0.000270406 kg; lognormal variance with pedigree 0.0701, pedigree (1,4,5,3,3)
  EcoSpold01Location=GLO
  Measured Value.
- printed wiring board, for surface mounting, Pb containing surface: 0.00182777 m2; lognormal variance with pedigree 0.0701, pedigree (1,4,5,3,3)
  Measured Value.
  This original value from production mix has been replaced by 2 flows. Each has 50% share in the production mix.
- disk drive, CD/DVD, ROM, for desktop computer: 0.00179338 unit; lognormal variance with pedigree 0.0701, pedigree (1,4,5,3,3)
  EcoSpold01Location=GLO
  Measured Value.
- cable, network cable, category 5, without plugs: 0.12841 m; lognormal variance with pedigree 0.0701, pedigree (1,4,5,3,3)
  EcoSpold01Location=GLO
  Measured Value.
- acrylonitrile-butadiene-styrene copolymer: 0.0368492 kg; lognormal variance with pedigree 0.0701, pedigree (1,4,5,3,3)
  Measured Value.
  EcoSpold01Location=RER
- powder coat, steel: 0.000713227 m2; lognormal variance with pedigree 0.0701, pedigree (1,4,5,3,3)
  Measured Value.
  EcoSpold01Location=RER
- plug, inlet and outlet, for network cable: 0.139386 unit; lognormal variance with pedigree 0.0701, pedigree (1,4,5,3,3)
  EcoSpold01Location=GLO
  Measured Value.
- battery, Li-ion, rechargeable, prismatic: 0.00282499 kg; lognormal variance with pedigree 0.0701, pedigree (1,4,5,3,3)
  EcoSpold01Location=GLO
  Measured Value.
- hot rolling, steel: 0.000357716 kg; lognormal variance with pedigree 0.0701, pedigree (1,4,5,3,3)
  Measured Value.
  EcoSpold01Location=RER
- power supply unit, for desktop computer: 0.00179338 unit; lognormal variance with pedigree 0.0701, pedigree (1,4,5,3,3)
  EcoSpold01Location=CN
  Measured Value.
- integrated circuit, memory type: 0.000921811 kg; lognormal variance with pedigree 0.0701, pedigree (1,4,5,3,3)
  EcoSpold01Location=GLO
  Measured Value.
- section bar extrusion, aluminium: 0.0619782 kg; lognormal variance with pedigree 0.0701, pedigree (1,4,5,3,3)
  Measured Value.
  EcoSpold01Location=RER
- hard disk drive, for desktop computer: 0.00179338 unit; lognormal variance with pedigree 0.0701, pedigree (1,4,5,3,3)
  Measured Value.
  EcoSpold01Location=GLO
- plug, inlet and outlet, for computer cable: 0.132257 unit; lognormal variance with pedigree 0.0701, pedigree (1,4,5,3,3)
  Measured Value.
  EcoSpold01Location=GLO
- cable, ribbon cable, 20-pin, with plugs: 9.0745e-5 kg; lognormal variance with pedigree 0.0701, pedigree (1,4,5,3,3)
  Measured Value.
  EcoSpold01Location=GLO
- printed wiring board, for surface mounting, Pb free surface: 0.00182469 m2; lognormal variance with pedigree 0.0701, pedigree (1,4,5,3,3)
  (same comment as for printed wiring board, for surface mounting, Pb containing surface)
- photovoltaic cell factory: 5.53657e-10 unit; lognormal variance with pedigree 0.3701, pedigree (1,4,5,3,3)
  EcoSpold01Location=DE
  Proxy, due to a lack of data of the infrastructure for the computer production the photovoltaic cell factory was used. It was assumed a life-time of 25 years, and a annual production volume of 3’000’000 pieces.
- cable, connector for computer, without plugs: 0.239318 m; lognormal variance with pedigree 0.0701, pedigree (1,4,5,3,3)
  EcoSpold01Location=GLO
  Measured Value.
- stretch blow moulding: 0.00251523 kg; lognormal variance with pedigree 0.0701, pedigree (1,4,5,3,3)
  Measured Value.
  EcoSpold01Location=RER
- tap water: 5.57869 kg; source Fujitsu L. 2003; lognormal variance with pedigree 0.0701, pedigree (1,4,5,3,3)
  Estimation, based on literature.
  EcoSpold01Location=RER
- used desktop computer: -0.0202652 kg; lognormal variance with pedigree 0.0701, pedigree (1,4,5,3,3)
  Measured Value.
  EcoSpold01Location=CH
  production volume 11.3 kg
- corrugated board box: 0.069523, 0.0011737, 0.0997102 kg (3 suppliers, which the file names only by identifier); sum of these 0.170407 kg; source Atlantic Consulting 1998; lognormal variance with pedigree 0.0701, pedigree (1,4,5,3,3)
  Literature Value.
  EcoSpold01Location=RER
- waste polypropylene: -2.76194e-5, -2.12929e-6, -8.79474e-7, -8.35143e-7, -3.18679e-5, -3.55297e-7, -1.61035e-7, -0.000223093 kg (8 suppliers, which the file names only by identifier); sum of these -0.000286941 kg; source Atlantic Consulting 1998; lognormal variance with pedigree 0.0701, pedigree (1,4,5,3,3)
  Literature Value. Disposed of via a municipal incineration plant.
  EcoSpold01Location=CH
  production volume 0.16 kg
- wastewater, unpolluted: -5.13682e-5, -0.00636966 m3 (2 suppliers, which the file names only by identifier); sum of these -0.00642103 m3; source Fujitsu L. 2003; lognormal variance with pedigree 0.0701, pedigree (1,4,5,3,3)
  EcoSpold01Location=CH
  Estimation, based on literature.
  production volume 1.62 m3
- power adapter, for laptop: 0.00107967 unit; source von Geibler J. 2003; lognormal variance with pedigree 0.0701, pedigree (1,4,5,3,3)
  Literature Value.
  EcoSpold01Location=GLO
- hard disk drive, for laptop computer: 0.00107967 unit; source von Geibler J. 2003; lognormal variance with pedigree 0.0701, pedigree (1,4,5,3,3)
  Literature Value.
  EcoSpold01Location=GLO
- magnesium-alloy, AZ91, diecast: 0.00319061 kg; source von Geibler J. 2003; lognormal variance with pedigree 0.0701, pedigree (1,4,5,3,3)
  EcoSpold01Location=RER
  Literature Value.
- magnesium-alloy, AZ91: 0.000305763 kg; source von Geibler J. 2003; lognormal variance with pedigree 0.0707, pedigree (2,4,5,3,3)
  EcoSpold01Location=RER
  Literature Value.
- printed wiring board, mounted mainboard, laptop computer, Pb containing: 4.62532e-5 kg; source von Geibler J. 2003; lognormal variance with pedigree 0.0701, pedigree (1,4,5,3,3)
  Literature Value.
  EcoSpold01Location=GLO
- liquid crystal display, unmounted: 0.000354132 kg; source von Geibler J. 2003; lognormal variance with pedigree 0.0701, pedigree (1,4,5,3,3)
  Literature Value.
  EcoSpold01Location=GLO
- packaging film, low density polyethylene: 0.00136703 kg; source von Geibler J. 2003; lognormal variance with pedigree 0.0701, pedigree (1,4,5,3,3)
  Literature Value.
  EcoSpold01Location=RER
- extrusion, plastic pipes: 0.0133859 kg; source von Geibler J. 2003; lognormal variance with pedigree 0.0701, pedigree (1,4,5,3,3)
  Literature Value.
  EcoSpold01Location=RER
- disk drive, CD/DVD, ROM, for laptop computer: 0.00107967 unit; source von Geibler J. 2003; lognormal variance with pedigree 0.0701, pedigree (1,4,5,3,3)
  EcoSpold01Location=GLO
  Literature Value.
- used laptop computer: -0.00336858 kg; lognormal variance with pedigree 0.0701, pedigree (1,4,5,3,3)
  EcoSpold01Location=CH
  Measured Value.
  production volume 3.12 kg
- polystyrene, high impact: 0.114254 kg; source von Geibler J. 2003; lognormal variance with pedigree 0.0701, pedigree (1,4,5,3,3)
  EcoSpold01Location=RER
  Literature Value.
- battery, NiMH, rechargeable, prismatic: 8.63738e-6 kg; source von Geibler J. 2003; lognormal variance with pedigree 0.0701, pedigree (1,4,5,3,3)
  Literature Value.
  EcoSpold01Location=GLO
- waste polystyrene: -0.00795041, -0.000130362, -5.38441e-5, -5.113e-5, -0.00195105, -2.17524e-5, -9.85904e-6, -0.0136584 kg (8 suppliers, which the file names only by identifier); sum of these -0.0238268 kg; source von Geibler J. 2003; lognormal variance with pedigree 0.0701, pedigree (1,4,5,3,3)
  Literature Value.
  EcoSpold01Location=CH
  production volume 0.089 kg
- used perfluoropentane: -0.0170706 kg; lognormal variance with pedigree 0.0186, pedigree (1,5,4,5,1)
  calculated value
  production volume 2.52e6 kg
- perfluoropentane: 0.0170706 kg; source Turboden srl 2011; lognormal variance with pedigree 0.0358, pedigree (2,5,4,5,1)
  literature value (organic fluid for the cycle turbine)
- heat, central or small-scale, other than natural gas: 0.193081 MJ; source Turboden srl 2011; lognormal variance with pedigree 0.156, pedigree (3,5,5,5,1)
  estimated from personal communication technician ORC turbine company (annual heating value/production)
  EcoSpold01Location=CH
- used industrial electronic device: -0.0129157, -0.0432395 kg (2 suppliers, which the file names only by identifier); sum of these -0.0561552 kg; lognormal variance with pedigree 0.0186, pedigree (1,5,4,5,1)
  EcoSpold01Location=CH
  calculated value
  production volume 63000 kg
- machine, for treatment of waste electric and electronic equipment: 1.29153e-6 unit; lognormal variance with pedigree 0.3701, pedigree (3,5,5,3,1)
  EcoSpold01Location=GLO
  Own estimation, based on proper knowledge of Swiss recycling sites
  Uncertainty: own estimation, based on proper knowledge of Swiss recycling sites
- printed wiring board mounting facility, surface mounting line: 2.84809e-7 unit; lognormal variance with pedigree 0.3761, pedigree (4,5,5,3,1)
  EcoSpold01Location=GLO
  Estimation, based on the description of several PC motherboard mounting facilities in China, assuming a life-span of 10 years, 2.5 times are taken into account here.
  Uncertainty: estimation, based on Locascio (2000) and own plant visit
- printed wiring board mounting facility, through-hole mounting line: 2.3734e-7 unit; lognormal variance with pedigree 0.3761, pedigree (4,5,5,3,1)
  (same comment as for printed wiring board mounting facility, surface mounting line)
- clay brick: 0.00245129 kg; source AMD 2007; lognormal variance with pedigree 0.3507, pedigree (1,3,5,3,1)
  Estimation, based on literature.
  Uncertainty: d
- cable, data cable in infrastructure: 0.0315424 m; source AMD 2007; lognormal variance with pedigree 0.8607, pedigree (1,3,5,3,1)
  Estimation, based on literature. Life-span of 10 years is considered - i.e. 2.5 times the amounts is needed.
  Uncertainty: d
- electronic component machinery, unspecified: 1.80242e-6 unit; source Csatary P. 2002; lognormal variance with pedigree 0.3701, pedigree (4,4,5,3,1)
  Estimation, conservative estimation based on literature. For the process steps in the production chain of semiconductors and other electronic components100 units are requested with a life-span of 10 years - i.e. 2.5 times the amount estimated is needed. Hence, an input of 250 times is taken into account per Fab.
  Uncertainty: e
- concrete, medium strength: 0.000731062 m3; source AMD 2007; lognormal variance with pedigree 0.8607, pedigree (1,3,5,3,1)
  Estimation, based on literature.
  Uncertainty: d
- fleece, polyethylene: 0.00302172 kg; lognormal variance with pedigree 0.0612, pedigree (2,3,5,1,1)
  Literature (Schwarz 1992)
  EcoSpold01Location=RER
  Uncertainty: Literature (Schwarz 1992)
- styrene-acrylonitrile copolymer: 0.00028618 kg; lognormal variance with pedigree 0.0512, pedigree (2,3,5,1,1)
  Literature (de Wild 2006)
  EcoSpold01Location=RER
  Uncertainty: Literature (de Wild 2006)
- capacitor, tantalum-, for through-hole mounting: 0.00346732 kg; lognormal variance with pedigree 0.0512, pedigree (2,3,5,1,1)
  EcoSpold01Location=GLO
  Literature (de Wild 2006), Assumption for Ceramic Multilayer Chip Capacitors
  Uncertainty: Literature (de Wild 2006), Assumption for Ceramic Multilayer Chip Capacitors
- printed wiring board, for through-hole mounting, Pb containing surface: 0.00679745 m2; lognormal variance with pedigree 0.0512, pedigree (2,3,5,1,1)
  Literature (de Wild 2006), Calculation
  This original value from production mix has been replaced by 2 flows. Each has 50% share in the production mix.
  Uncertainty: Literature (de Wild 2006), Calculation
- printed wiring board, for through-hole mounting, Pb free surface: 0.00680235 m2; lognormal variance with pedigree 0.0512, pedigree (2,3,5,1,1)
  (same comment as for printed wiring board, for through-hole mounting, Pb containing surface)
- section bar extrusion, aluminium: 0.0439368 kg; lognormal variance with pedigree 0.0512, pedigree (2,3,5,1,1)
  Literature (de Wild 2006)
  EcoSpold01Location=RER
  Uncertainty: Literature (de Wild 2006)
- resistor, metal film type, through-hole mounting: 0.00193065 kg; lognormal variance with pedigree 0.0512, pedigree (2,3,5,1,1)
  Literature (de Wild 2006), Calculation
  EcoSpold01Location=GLO
  Uncertainty: Literature (de Wild 2006), Calculation
- inductor, ring core choke type: 0.0435189 kg; lognormal variance with pedigree 0.0512, pedigree (2,3,5,1,1)
  (same comment as for resistor, metal film type, through-hole mounting)
- capacitor, film type, for through-hole mounting: 0.0151416 kg; lognormal variance with pedigree 0.0512, pedigree (2,3,5,1,1)
  EcoSpold01Location=GLO
  Literature (de Wild 2006), Calculation
  Uncertainty: Literature (de Wild 2006), Calculation
- diode, glass-, for through-hole mounting: 0.00212734 kg; lognormal variance with pedigree 0.0512, pedigree (2,3,5,1,1)
  (same comment as for resistor, metal film type, through-hole mounting)
- transformer, high voltage use: 0.0397053 kg; lognormal variance with pedigree 0.0512, pedigree (2,3,5,1,1)
  EcoSpold01Location=GLO
  Literature (de Wild 2006)
  Uncertainty: Literature (de Wild 2006)
- capacitor, electrolyte type, > 2cm height: 0.0144278 kg; lognormal variance with pedigree 0.0512, pedigree (2,3,5,1,1)
  (same comment as for capacitor, film type, for through-hole mounting)
- electric connector, wire clamp: 0.014083 kg; lognormal variance with pedigree 0.0512, pedigree (2,3,5,1,1)
  (same comment as for capacitor, film type, for through-hole mounting)
- integrated circuit, logic type: 0.00458431 kg; lognormal variance with pedigree 0.0512, pedigree (2,3,5,1,1)
  (same comment as for capacitor, film type, for through-hole mounting)
- transistor, wired, small size, through-hole mounting: 0.00175353 kg; lognormal variance with pedigree 0.0512, pedigree (2,3,5,1,1)
  (same comment as for capacitor, film type, for through-hole mounting)
- metal working factory: 2.0386e-10 unit; lognormal variance with pedigree 0.3526, pedigree (2,4,5,1,1)
  Calculation, based on annual production of electronic component production plant
  EcoSpold01Location=RER
  Uncertainty: Calculation, based on annual production of electronic component production plant
- waste paperboard, unsorted: -0.116973 kg; lognormal variance with pedigree 0.0532, pedigree (2,3,5,5,1)
  EcoSpold01Location=CH
  Calculation, different geographical location
  Uncertainty: Calculation, different geographical location
  production volume 1.12 kg
- glass fibre reinforced plastic, polyester resin, hand lay-up: 0.00660797 kg; lognormal variance with pedigree 0.0686, pedigree (4,3,5,1,1)
  Literature (de Wild 2006), Calculation
  EcoSpold01Location=RER
  Uncertainty: Literature (de Wild 2006), Calculation
- used IT accessory: -0.0977622 kg; source Atlantic Consulting 1998; lognormal variance with pedigree 0.0701, pedigree (1,4,5,3,3)
  EcoSpold01Location=CH
  Literature Value.
  production volume 1.25 kg
- solar glass, low-iron: 4.09537e-5 kg; lognormal variance with pedigree 0.0521, pedigree (1,4,5,3,1)
  Measured Value.
  EcoSpold01Location=RER
- transformer, low voltage use: 0.00571714 kg; lognormal variance with pedigree 0.0687, pedigree (2,5,5,3,1)
  EcoSpold01Location=GLO
  Estimation, based on own dismantling activities.
  Uncertainty: own dismantling activities of a Intel PII Desktop PC PSU
- capacitor, electrolyte type, < 2cm height: 0.00592165 kg; lognormal variance with pedigree 0.0687, pedigree (2,5,5,3,1)
  EcoSpold01Location=GLO
  Own dismantling activities of a Intel PII Desktop PC PSU
  Uncertainty: own dismantling activities of a Intel PII Desktop PC PSU
- transistor, wired, big size, through-hole mounting: 0.0037297 kg; lognormal variance with pedigree 0.0687, pedigree (2,5,5,3,1)
  (same comment as for transformer, low voltage use)
- mounting, through-hole technology, Pb-containing solder: 0.00322942 m2; lognormal variance with pedigree 0.0687, pedigree (2,5,5,3,1)
  Estimation, based on own dismantling activities.
  EcoSpold01Location=GLO
  Uncertainty: own dismantling activities of a Intel PII Desktop PC PSU
- mounting, through-hole technology, Pb-free solder: 0.00323405 m2; lognormal variance with pedigree 0.0687, pedigree (2,5,5,3,1)
  (same comment as for transformer, low voltage use)
- mounting, surface mount technology, Pb-containing solder: 0.00164452 m2; source Alvarado Ascencio C. 2005; lognormal variance with pedigree 0.0527, pedigree (3,3,5,3,1)
  Estimation, based on literature and own assumptions.
  EcoSpold01Location=GLO
  Uncertainty: data from literature plus own assumptions
- electric connector, peripheral type buss: 0.000902191 kg; source Kemna R. 2005; lognormal variance with pedigree 0.0527, pedigree (3,3,5,3,1)
  (same comment as for mounting, surface mount technology, Pb-containing solder)
- light emitting diode: 1.96316e-5 kg; source Kemna R. 2005; lognormal variance with pedigree 0.0527, pedigree (3,3,5,3,1)
  (same comment as for mounting, surface mount technology, Pb-containing solder)
- diode, glass-, for surface-mounting: 5.95754e-5 kg; source Kemna R. 2005; lognormal variance with pedigree 0.0527, pedigree (3,3,5,3,1)
  EcoSpold01Location=GLO
  Estimation, based on literature and own assumptions.
  Uncertainty: data from literature plus own assumptions
- electric connector, peripheral component interconnect buss: 0.00218546 kg; source Kemna R. 2005; lognormal variance with pedigree 0.0527, pedigree (3,3,5,3,1)
  (same comment as for diode, glass-, for surface-mounting)
- capacitor, for surface-mounting: 0.000468614 kg; source Kemna R. 2005; lognormal variance with pedigree 0.0527, pedigree (3,3,5,3,1)
  (same comment as for diode, glass-, for surface-mounting)
- resistor, surface-mounted: 0.000365744 kg; source Kemna R. 2005; lognormal variance with pedigree 0.0527, pedigree (3,3,5,3,1)
  (same comment as for diode, glass-, for surface-mounting)
- mounting, surface mount technology, Pb-free solder: 0.00164172 m2; source Alvarado Ascencio C. 2005; lognormal variance with pedigree 0.0527, pedigree (3,3,5,3,1)
  (same comment as for diode, glass-, for surface-mounting)
- transistor, surface-mounted: 0.000108538 kg; source Kemna R. 2005; lognormal variance with pedigree 0.0527, pedigree (3,3,5,3,1)
  (same comment as for mounting, surface mount technology, Pb-containing solder)
- cable, printer cable, without plugs: 0.0670894 m; lognormal variance with pedigree 0.0521, pedigree (1,4,5,3,1)
  EcoSpold01Location=GLO
  Measured Value.
- magnesium: 0.00288484 kg; source Jemai 2005; lognormal variance with pedigree 0.0701, pedigree (1,4,5,3,3)
  EcoSpold01Location=RER
  Estimation, based on literature.
- toner module, laser printer, black/white: 0.0186359 unit; lognormal variance with pedigree 0.0521, pedigree (1,4,5,3,1)
  Measured Value.
  EcoSpold01Location=GLO
- plug, inlet and outlet, for printer cable: 0.0372719 unit; source Jemai 2005; lognormal variance with pedigree 0.0521, pedigree (1,4,5,3,1)
  Measured Value.
  EcoSpold01Location=GLO
- used printer, laser: -0.218786 kg; lognormal variance with pedigree 0.0701, pedigree (1,4,5,3,3)
  Literature Value.
  production volume 9.20442e7 kg
- toner module, laser printer, colour: 0.0186359 unit; lognormal variance with pedigree 0.0521, pedigree (1,4,5,3,1)
  Measured Value.
  EcoSpold01Location=GLO

- aluminium scrap, post-consumer, prepared for melting: -0.15102 kg; lognormal variance with pedigree 0.2106, pedigree (5,5,5,5,5)
  replaces the original flow "Al fraction of used liquid crystal display from mechanical treatment"
  production volume 0.0420382 kg
- used fluorescent lamp: -0.0170252 kg; lognormal variance with pedigree 0.054, pedigree (3,4,5,1,1)
  EcoSpold01Location=GLO
  Calculated - based on composition data
  Uncertainty: calculated - based on composition data
  production volume 0.008547 kg
- used liquid crystal display module: -0.0100781, -0.667096 kg (2 suppliers, which the file names only by identifier); sum of these -0.677175 kg; lognormal variance with pedigree 0.054, pedigree (3,4,5,1,1)
  Calculated - based on composition data
  EcoSpold01Location=CH
  Uncertainty: calculated - based on composition data
  production volume 0.339955 kg
- residue from mechanical treatment, liquid crystal display: -0.00780701, -0.516769 kg (2 suppliers, which the file names only by identifier); sum of these -0.524576 kg; lognormal variance with pedigree 0.054, pedigree (3,4,5,1,1)
  EcoSpold01Location=CH
  Calculated - based on composition data
  Uncertainty: calculated - based on composition data
  production volume 0.263348 kg
- used diesel-electric generating set, 18.5kW: -8.8288e-5 unit
  production volume 50000 unit
- converter, for electric passenger car: 0.000276451 kg; source F. Habermacher 2011; lognormal variance with pedigree 0.0058, pedigree (1,4,3,4,2)
  This electric drivetrain and the data describing each component is based on direct information from the Swiss manufacturer Brusa.
- electric motor, electric passenger car: 0.00325598 kg
- power distribution unit, for electric passenger car: 0.000239591 kg; source F. Habermacher 2011; lognormal variance with pedigree 0.0058, pedigree (1,4,3,4,2)
  (same comment as for converter, for electric passenger car)
- used powertrain from electric passenger car, manual dismantling: -0.0049282 kg; source F. Habermacher 2011
  production volume 721980 kg
- charger, electric passenger car: 0.000380888 kg; source F. Habermacher 2011; lognormal variance with pedigree 0.0058, pedigree (1,4,3,4,2)
  (same comment as for converter, for electric passenger car)
- inverter, for electric passenger car: 0.000583619 kg; source F. Habermacher 2011; lognormal variance with pedigree 0.0058, pedigree (1,4,3,4,2)
  (same comment as for converter, for electric passenger car)
- used powertrain, from electric scooter: -0.00637703 kg
  production volume 7.79228e6 kg
- electric motor, for electric scooter: 0.00366206 kg; lognormal variance with pedigree 0.0198, pedigree (2,4,4,4,3)
  Based on current available technology.
- charger, for electric scooter: 0.00190995 kg; lognormal variance with pedigree 0.0198, pedigree (2,4,4,4,3)
  Based on current available technology.
- controller, for electric scooter: 0.000801865 kg; lognormal variance with pedigree 0.0198, pedigree (2,4,4,4,3)
  Based on current available technology.
- used refrigeration machine, carbon dioxide, liquid as refrigerant: -6.12414e-5 unit; lognormal variance with pedigree 0.0026, pedigree (1,1,3,1,1)
  Calculated value.
  production volume 52200 unit
- air compressor, screw-type compressor, 4kW: 5.07328e-5 unit; source Maersk Container Industry 2013; lognormal variance with pedigree 0.0186, pedigree (4,5,3,1,1)
  Calculated value.
  The weight od the air compressor present in the database is 140kg. The weight of the compressor needed for the refrigeration unit is 58kg. The amount of the exchange needed is scaled accordingly.
  The original Star Cool refrigeration machine the compressor's description:
  Make; Bitzer
  Type: Semi – hermetic two-stage reciprocating.
  Number of cylinders: 2 Low stages cylinders, 2 High stage cylinders.
  Speed: Variable in interval from 20 Hz – 110 Hz controlled by the frequency converter.
  Model: S4BCF – 5.2Y
  Nominal power: 5.5 kW
  Compressor oil type: Reniso Triton SEZ 55 or equivalent
  Compressor housing: Seawater resistant aluminium, unpainted.
  Displacement: 42 m3/h @ 110 Hz
  Weight: 58 Kg
- maintenance, refrigeration machine: 0.000122458 unit; lognormal variance with pedigree 0.0026, pedigree (1,1,3,1,1)
  Calculated value.
- polyurethane, rigid foam: 0.00059548, 0.00120577 kg (2 suppliers, which the file names only by identifier); sum of these 0.00180125 kg; source Maersk Container Industry 2013; lognormal variance with pedigree 0.0052, pedigree (3,3,3,1,1)
  Calculated value. The rear bulkhead of the refrigeration machine is covered by polyurethane insulation foam.
- used refrigeration machine, R134a as refrigerant: -6.1217e-5 unit; lognormal variance with pedigree 0.0026, pedigree (1,1,3,1,1)
  Calculated value.
  production volume 109800 unit
- refrigerant R134a: 0.000275476 kg; lognormal variance with pedigree 0.0186, pedigree (4,5,3,1,1)
  Literature value.
- glass from used cathode ray tube: -1.53002 kg; lognormal variance with pedigree 0.054, pedigree (3,4,5,1,1)
  (same comment as for used fluorescent lamp)
  production volume 0.410872 kg
- residue from mechanical treatment, cathode ray tube display: -0.00587535, -0.388902 kg (2 suppliers, which the file names only by identifier); sum of these -0.394777 kg; lognormal variance with pedigree 0.054, pedigree (3,4,5,1,1)
  (same comment as for residue from mechanical treatment, liquid crystal display)
  production volume 0.106014 kg
- diesel, low-sulfur: 0.000827422 kg; lognormal variance with pedigree 0.0032, pedigree (2,1,3,1,1)
  Calculated Value. It is assume that the given amount represented the complecte explosive, i.e. 94% ammonium nitrate and 6% petrol.
  Assumption : diesel low sulfur.
- chemical, inorganic: 0.00153736 kg; lognormal variance with pedigree 0.0026, pedigree (1,1,3,1,1)
  Measured Value. Stands for Collector (3418-A) - aérophine (91%); Collector (KAX-51) - xantate (3%); lead nitrate (6%, for Merill-Crowe process).
- fatty alcohol: 0.000441359 kg; lognormal variance with pedigree 0.0026, pedigree (1,1,3,1,1)
  Measured Value. Reported as Oil-based anti-foaming agent. Stands for CC-5428 (77%), Nalco 7810 (7%) and CC-7425/76 (16% ; for wastewater treatment).
- copper sulfate: 0.00384847 kg; lognormal variance with pedigree 0.0026, pedigree (1,1,3,1,1)
  Measured Value.
- municipal solid waste: -0.0051367 kg; lognormal variance with pedigree 0.0026, pedigree (1,1,3,1,1)
  Measured Value. Reported as domestic waste sent to landfill.
  production volume 367162 kg
- zinc monosulfate: 0.0115272 kg; lognormal variance with pedigree 0.0026, pedigree (1,1,3,1,1)
  Measured Value.
- lime, hydrated, loose weight: 0.0244885 kg; lognormal variance with pedigree 0.0026, pedigree (1,1,3,1,1)
  Measured Value. Used for wastewater treatment.
- borax, anhydrous, powder: 0.0021916 kg; lognormal variance with pedigree 0.0026, pedigree (1,1,3,1,1)
  Measured Value. Used as Fluxing agent.
- chromium: 0.00744173 kg; lognormal variance with pedigree 0.0032, pedigree (2,1,3,1,1)
  Calculated Value. Different types of steel balls are used. The only available composition contains 15% chromium. We hence assume a composition of 15% chromium and 85% steel for all balls.
- polyacrylamide: 0.000229288 kg; lognormal variance with pedigree 0.0026, pedigree (1,1,3,1,1)
  Measured Value reported as Floculant (Flomin 905MC). Sum of three uses : 1) 9% of total for concentrate handling, 2) 69% of total for backfilling and 3) 22% of total for wastewater treatment.
- carboxymethyl cellulose, powder: 0.00673888 kg; lognormal variance with pedigree 0.0026, pedigree (1,1,3,1,1)
  Measured Value. Used for the Merill-Crowe process (gold recovery).
- cement, Portland: 0.438321 kg; lognormal variance with pedigree 0.0026, pedigree (1,1,3,1,1)
  Measured Value. Extrapolation for ciment type10 (60%) and ciment type 50 (40%).
- quicklime, milled, loose: 0.0618389 kg; lognormal variance with pedigree 0.0026, pedigree (1,1,3,1,1)
  Measured Value. Reported as quicklime, loose. Assumption : milled.
  Sum of three uses : 1) 56% of total for the Merill-Crowe process (gold recovery), 2) 4% of total for backfilling and 3) 40% of total for wastewater treatment.
- mine infrastructure, underground, non-ferrous metal: 2.79723e-10 unit; lognormal variance with pedigree 0.304, pedigree (3,1,3,1,1)
  Extrapolation based on mine life time of the underground mine dataset which is 50 years. This extrapolation is validated based on the area of buildings. The dataset for the 'lead-copper-zinc-silver-gold' mine infrastructure is based on an open-pit mine, hence not representative for this underground mine
- manganese dioxide: 0.000750858 kg; lognormal variance with pedigree 0.0032, pedigree (2,1,3,1,1)
  Calculated Value. Used as oxydising agent. The amount is given for all 4 agents together (silica sand, manganese dioxide, soda ash, sodium nitrate - we assume 25% of each).
- steel, unalloyed: 0.0421712 kg; lognormal variance with pedigree 0.0032, pedigree (2,1,3,1,1)
  (same comment as for chromium)
- silica sand: 0.000750858 kg; lognormal variance with pedigree 0.0032, pedigree (2,1,3,1,1)
  (same comment as for manganese dioxide)
- soap: 0.000458171 kg; lognormal variance with pedigree 0.0026, pedigree (1,1,3,1,1)
  Measured Value reported as Foaming agent MIBC.
- sulfur dioxide, liquid: 0.0115859 kg; lognormal variance with pedigree 0.0026, pedigree (1,1,3,1,1)
  Measured Value.
- sulfidic tailings, generic: -24.3872 kg; lognormal variance with pedigree 0.0026, pedigree (1,1,3,1,1)
  Measured Value. 20% is sent underground to be used as backfill (excluded from the amount); sulfidic tailing is managed on site.
  production volume 1.74315e9 kg
- soda ash, dense: 0.0189851 kg; lognormal variance with pedigree 0.0026, pedigree (1,1,3,1,1)
  Calculated Value for the first use and Measured Value for the second use. Sum of two uses : 1) 4% of total for oxydising agent - the amount is given for all 4 agents together (silica sand, manganese dioxide, soda ash, sodium nitrate - we assume 25% of each), 2) 96% of total for wastewater treatment.
- diesel, burned in building machine: 2.4366 MJ; lognormal variance with pedigree 0.002, pedigree (1,1,3,1,1)
  Calculated value. See parameters exchanges properties for details.
  Uncertainty: C
- sodium nitrate: 0.000750858 kg; lognormal variance with pedigree 0.0032, pedigree (2,1,3,1,1)
  (same comment as for manganese dioxide)
- sodium cyanide: 0.0136479 kg; lognormal variance with pedigree 0.0026, pedigree (1,1,3,1,1)
  Measured Value. Sum of sodium cyanide (96%, of which 97% is for cyanidation), used in a 30% solution and cyanure (4%, proxy, used for the Merill-Crowe process).
  Proxy: 'sodium cyanide' is used as a proxy for Cyanide.
- iron sulfate: 0.00595501 kg; lognormal variance with pedigree 0.0026, pedigree (1,1,3,1,1)
  Measured Value used for wastewater treatment.
- electricity, high voltage: 5.13873 kWh; lognormal variance with pedigree 0.0026, pedigree (1,1,3,1,1)
  Measured Value.
- sodium silicate, spray powder, 80%: 0.0184646 kg; lognormal variance with pedigree 0.0026, pedigree (1,1,3,1,1)
  Measured Value used for wastewater treatment.
- ammonium nitrate, as N: 0.00453644 kg; lognormal variance with pedigree 0.002, pedigree (1,1,3,1,1)
  Calculated value. See parameters exchanges properties for details.
  Uncertainty: C
- transport, passenger car, large size, petrol, EURO 3: 0.0104172 km; lognormal variance with pedigree 0.292, pedigree (3,5,5,5,5)
  Calculated value. Reported as liters of petrol used in pickup trucks (5.571E+0 liters/kg). Conversion using : 0.081237 kg/km (taken directly from ecoinvent v3.0 dataset 'transport, passenger car, large size, petrol, EURO 3, GLO') and 0.75 kg/l (taken from Table 5.1 of the data quality guideline).
- polycarboxylates, 40% active substance: 0.000460602 kg; lognormal variance with pedigree 0.0026, pedigree (1,1,3,1,1)
  Measured Value. Sum of sodium cyanide (96%, of which 97% is for cyanidation ) and cyanure (4%, proxy, used for the Merill-Crowe process)

## Inputs from nature
- Iron, in ground [natural resource, in ground]: 0.0349987 kg
  46% Fe in siderite; 25% Fe in ore; Uncertainty for LCI results cannot be determined
- Water, unspecified natural origin [natural resource, in water]: 1.16333 m3; lognormal variance with pedigree 1.21, pedigree (5,5,5,5,5)
  Uncertainty for LCI results cannot be determined
- Uranium, in ground [natural resource, in ground]: 0.000648623 kg
  Uncertainty for LCI results cannot be determined
- Peat, in ground [natural resource, biotic]: 0.0136562 kg
  Uncertainty for LCI results cannot be determined
- Mercury, in ground [natural resource, in ground]: 1.69831e-5 kg
  Uncertainty for LCI results cannot be determined
- Chromium, in ground [natural resource, in ground]: 1.54454e-5 kg
  25.5% Cr in chromite; 11.6% in ore; Uncertainty for LCI results cannot be determined
- Magnesite, in ground [natural resource, in ground]: 0.00173488 kg
  60% Magnesite in ore; Uncertainty for LCI results cannot be determined
- Calcite, in ground [natural resource, in ground]: 2.63096 kg
  Uncertainty for LCI results cannot be determined
- Shale, in ground [natural resource, in ground]: 0.00164062 kg
  Uncertainty for LCI results cannot be determined
- Energy, potential (in hydropower reservoir), converted [natural resource, in water]: 19.3099 MJ
- Energy, gross calorific value, in biomass [natural resource, biotic]: 20.5496 MJ
- Zinc, in ground [natural resource, in ground]: 1.0594 kg
  9.0% Zn in sulfide; 5.3% Zn in ore; Uncertainty for LCI results cannot be determined
- Dolomite, in ground [natural resource, in ground]: 0.203024 kg
  Uncertainty for LCI results cannot be determined
- Feldspar, in ground [natural resource, in ground]: 0.00112082 kg
  Uncertainty for LCI results cannot be determined
- Water, river [natural resource, in water]: 0.127399 m3; lognormal variance with pedigree 1.21, pedigree (5,5,5,5,5)
  Uncertainty for LCI results cannot be determined
- Sodium chloride, in ground [natural resource, in ground]: 15.5445 kg
  Uncertainty for LCI results cannot be determined
- Wood, unspecified, standing [natural resource, biotic]: 5.54214e-5 m3
  Uncertainty for LCI results cannot be determined
- Copper, in ground [natural resource, in ground]: 0.0696804 kg
  0.99% Cu in sulfide; 0.36% Cu and 82 ppm Mo in ore; Uncertainty for LCI results cannot be determined
- Fluorspar, in ground [natural resource, in ground]: 0.000411054 kg
  92% CaF2 in ore; Uncertainty for LCI results cannot be determined
- Lead, in ground [natural resource, in ground]: 0.123505 kg
  5.0% Pb in sulfide; 3.0% Pb in ore; Uncertainty for LCI results cannot be determined
- Aluminium, in ground [natural resource, in ground]: 0.00524225 kg
  24% Al in bauxite; 11% Al in ore; Uncertainty for LCI results cannot be determined
- Water, salt, ocean [natural resource, in water]: 0.0233279 m3; lognormal variance with pedigree 1.21, pedigree (5,5,5,5,5)
  Uncertainty for LCI results cannot be determined
- Gas, natural, in ground [natural resource, in ground]: 77.6375 m3
  Uncertainty for LCI results cannot be determined
- Coal, brown, in ground [natural resource, in ground]: 1.42194 kg
  Uncertainty for LCI results cannot be determined
- Water, well, in ground [natural resource, in water]: 0.0136285 m3; lognormal variance with pedigree 1.21, pedigree (5,5,5,5,5)
  Uncertainty for LCI results cannot be determined
- Anhydrite, in ground [natural resource, in ground]: 0.000579837 kg
  Uncertainty for LCI results cannot be determined
- Sulfur, in ground [natural resource, in ground]: 1.27314 kg
  Uncertainty for LCI results cannot be determined
- Coal, hard, unspecified, in ground [natural resource, in ground]: 14.2907 kg
  Uncertainty for LCI results cannot be determined
- Gravel, in ground [natural resource, in ground]: 0.0125469 kg
  Uncertainty for LCI results cannot be determined
- Titanium, in ground [natural resource, in ground]: 0.00122815 kg
  95% TiO2 in rutile; 0.4% TiO2 in ore; Uncertainty for LCI results cannot be determined
- Sodium nitrate, in ground [natural resource, in ground]: 9.11311e-9 kg
  Uncertainty for LCI results cannot be determined
- Clay, bentonite, in ground [natural resource, in ground]: 0.00467398 kg
  Uncertainty for LCI results cannot be determined
- Nickel, in ground [natural resource, in ground]: 0.00013117 kg
  1.98% Ni in silicates; 1.04% Ni in ore; Uncertainty for LCI results cannot be determined
- Sand, unspecified, in ground [natural resource, in ground]: 0.86662 kg
  Uncertainty for LCI results cannot be determined
- Olivine, in ground [natural resource, in ground]: 0.000325559 kg
  Uncertainty for LCI results cannot be determined
- Oil, crude, in ground [natural resource, in ground]: 58.8357 kg
  Uncertainty for LCI results cannot be determined
- Clay, unspecified, in ground [natural resource, in ground]: 0.00138771 kg
  Uncertainty for LCI results cannot be determined
- Phosphorus, in ground [natural resource, in ground]: 0.0201276 kg
  18% P in apatite; 12% in ore; Uncertainty for LCI results cannot be determined
- Manganese, in ground [natural resource, in ground]: 4.30601e-5 kg
  35.7% Mn in sedimentary deposit; 14.2% Mn in ore; Uncertainty for LCI results cannot be determined
- Sylvite, in ground [natural resource, in ground]: 0.0386676 kg
  25% Sylvite in sylvinite; Uncertainty for LCI results cannot be determined
- Barium, in ground [natural resource, in ground]: 0.00448447 kg
  15% BaSO4 in ore; Uncertainty for LCI results cannot be determined
- Talc, in ground [natural resource, in ground]: 0.0303064 kg
  Uncertainty for LCI results cannot be determined
- Water, cooling, unspecified natural origin [natural resource, in water]: 7.21087 m3; lognormal variance with pedigree 1.21, pedigree (5,5,5,5,5)
  Uncertainty for LCI results cannot be determined
- Granite, in ground [natural resource, in ground]: 9.4042e-7 kg
  Uncertainty for LCI results cannot be determined
- Transformation, from unspecified [natural resource, land]: 0.0474134 m2; source Schmocker A. 2002; lognormal variance with pedigree 0.2141, pedigree (4,5,5,3,3)
  Estimated from data of small plants. The land use of the air separation plant depends on the size of the plant. For small plants with an output of 100 kg liquefied product per hour a space requirement of 0.3 m2 per kg hourly production is reported. For larger plants with an output of 3000 kg liquefied product per hour the space requirement lowers to 0.2 m2 per kg hourly production. For very large plants the land use was estimated to be about 0.1 m2 per kg hourly production. For this inventory an average amount of 0.1 m2 per kg hourly production output was assumed. This leads to a total area occupied by the plant of 1000 m2.
  Further references:
  Cosmodyne (2001) Performance Specifications, Aspen 1000 / Aspen 2000. Cosmodyne, Torrance, (CA, USA). Retrieved 16.01.2002 from www.cosmodyne.com
  Uncertainty: Estimated from data of small plants
- Occupation, industrial area [natural resource, land]: 1.72146 m2*year; lognormal variance with pedigree 0.1341, pedigree (4,5,5,3,3)
  Estimated from data of small plants. For the time of occupation 20 years were assumed as plant lifetime, thus a total of 20000 m2*year was obtained.
  Uncertainty: Estimated from data of small plants
- Occupation, construction site [natural resource, land]: 0.0191216 m2*year; lognormal variance with pedigree 0.1341, pedigree (4,5,5,3,3)
  Estimated from data of small plants. One year of occupation as construction site for construction and dismantling was assumed. The occupation of the area before the occupation as industrial area is not known (transformation from unknown).
  Uncertainty: Estimated from data of small plants
- Transformation, to industrial area [natural resource, land]: 0.0631554 m2; source Schmocker A. 2002; lognormal variance with pedigree 0.2141, pedigree (4,5,5,3,3)
  (same comment as for Transformation, from unspecified)
- Ulexite, in ground [natural resource, in ground]: 0.0577152 kg
  Uncertainty for LCI results cannot be determined
- Borax, in ground [natural resource, in ground]: 0.000597397 kg
  Uncertainty for LCI results cannot be determined
- Occupation, dump site [natural resource, land]: 0.00948302 m2*year; lognormal variance with pedigree 0.0801, pedigree (1,2,5,1,1)
  100a occupation
  Uncertainty: 100a occupation
- Occupation, traffic area, road network [natural resource, land]: 0.0222854 m2*year; lognormal variance with pedigree 0.0801, pedigree (1,2,5,1,1)
  100a occupation
  Uncertainty: 100a occupation
- Transformation, to traffic area, road network [natural resource, land]: 0.000222854 m2; lognormal variance with pedigree 0.1601, pedigree (1,2,5,1,1)
  Environmental report
  Uncertainty: Environmental report
- Transformation, to dump site, residual material landfill [natural resource, land]: 9.48302e-5 m2; lognormal variance with pedigree 0.1601, pedigree (1,2,5,1,1)
  Environmental report
  Uncertainty: Environmental report
- Transformation, from pasture, man made [natural resource, land]: 0.0111319 m2; source ENERCON GmbH 2010; lognormal variance with pedigree 0.0481, pedigree (1,1,4,3,1)
  Literature value
  Uncertainty: Estimated variance.
- Transformation, from forest, unspecified [natural resource, land]: 0.00492807 m2; lognormal variance with pedigree 0.002, pedigree (1,1,3,1,1)
  Calculated Value. See parameters exchanges properties for details.
  Uncertainty: S
- Gold, in ground [natural resource, in ground]: 8.18105e-5 kg; source Ressources naturelles Québec 2011; lognormal variance with pedigree 0.0046, pedigree (3,1,3,1,1)
  1.8 ppm Au in ore; Calculated Value. When the amount is calculated based on the ore composition (1,79 g Au/t ore), the amount of recovered gold is higher than the amount of extracted gold. We hence calculate the amount of extracted gold based on a hypothetic recovery rate of 85%.
- Silver, in ground [natural resource, in ground]: 0.00186509 kg; source Ressources naturelles Québec 2011; lognormal variance with pedigree 0.0032, pedigree (2,1,3,1,1)
  54 ppm Ag in ore; Calculated Value based on ore composition.
- Water, lake [natural resource, in water]: 0.0153028 m3; lognormal variance with pedigree 0.0026, pedigree (1,1,3,1,1)
  Measured Value.

## Emissions to nature
- Particulates, < 2.5 um [air, non-urban air or from high stacks]: 1.8738e-5 kg; lognormal variance with pedigree 0.69, pedigree (1,1,5,1,1)
  uncertainty estimated
- Lead [air, non-urban air or from high stacks]: 2.87218e-7 kg; lognormal variance with pedigree 0.69, pedigree (1,1,5,1,1)
  uncertainty estimated
- Particulates, > 2.5 um, and < 10um [air, non-urban air or from high stacks]: 0.000402672 kg; lognormal variance with pedigree 0.69, pedigree (1,1,5,1,1)
  uncertainty estimated
- Nitrogen oxides [air, non-urban air or from high stacks]: 0.00379581 kg; lognormal variance with pedigree 0.69, pedigree (1,1,5,1,1)
  uncertainty estimated
- Sulfur dioxide [air, non-urban air or from high stacks]: 0.000869148 kg; lognormal variance with pedigree 0.69, pedigree (1,1,5,1,1)
  uncertainty estimated
- Particulates, > 10 um [air, non-urban air or from high stacks]: 0.000174761 kg; lognormal variance with pedigree 0.69, pedigree (1,1,5,1,1)
  uncertainty estimated
- Water [air, unspecified]: 3.06367 m3; lognormal variance with pedigree 0.0807, pedigree (2,2,5,1,1)
  Calculated value based on literature values and expert opinion. See comments in the parametres' comment field.
- Water [water, unspecified]: 5.45914 m3; lognormal variance with pedigree 0.0807, pedigree (2,2,5,1,1)
  (same comment as for Water)
- Zinc, ion [water, surface water]: 1.1848e-5 kg; lognormal variance with pedigree 0.792, pedigree (4,4,5,5,5)
- Nickel, ion [water, surface water]: 6.34925e-5 kg; lognormal variance with pedigree 0.792, pedigree (4,4,5,5,5)
- Lead [water, surface water]: 1.46934e-5 kg; lognormal variance with pedigree 0.792, pedigree (4,4,5,5,5)
- Cadmium, ion [water, surface water]: 2.15634e-7 kg; lognormal variance with pedigree 0.792, pedigree (4,4,5,5,5)
- Mercury [water, surface water]: 4.45003e-6 kg; lognormal variance with pedigree 0.792, pedigree (4,4,5,5,5)
- Arsenic, ion [water, surface water]: 6.19415e-5 kg; lognormal variance with pedigree 0.792, pedigree (4,4,5,5,5)
- Copper, ion [water, surface water]: 6.8777e-5 kg; lognormal variance with pedigree 0.792, pedigree (4,4,5,5,5)
- Selenium [air, urban air close to ground]: 2.07256e-10 kg
  Uncertainty for LCI results cannot be determined
- Dinitrogen monoxide [air, urban air close to ground]: 0.0196809 kg
  Uncertainty for LCI results cannot be determined
- Particulates, > 10 um [air, urban air close to ground]: 0.045922 kg
  Uncertainty for LCI results cannot be determined
- Acidity, unspecified [water, surface water]: 0.00338191 kg
  Uncertainty for LCI results cannot be determined
- AOX, Adsorbable Organic Halogen as Cl [water, surface water]: 5.36956e-5 kg
  Uncertainty for LCI results cannot be determined
- Chlorate [water, surface water]: 0.0011587 kg
  Uncertainty for LCI results cannot be determined
- Bromate [water, surface water]: 4.18507e-6 kg
  Uncertainty for LCI results cannot be determined
- Oils, unspecified [water, surface water]: 0.00122915 kg
  Uncertainty for LCI results cannot be determined
- Ammonium, ion [water, surface water]: 0.0496092 kg
  Uncertainty for LCI results cannot be determined
- Benzene [air, urban air close to ground]: 0.000346195 kg
  Uncertainty for LCI results cannot be determined
- Dissolved solids [water, surface water]: 0.10004 kg
  Uncertainty for LCI results cannot be determined
- Fluorine [air, urban air close to ground]: 1.23586e-5 kg
  Uncertainty for LCI results cannot be determined
- Methane, dichloro-, HCC-30 [air, urban air close to ground]: 7.87316e-7 kg
  Uncertainty for LCI results cannot be determined
- Benzene, ethyl- [air, urban air close to ground]: 0.000107562 kg
  Uncertainty for LCI results cannot be determined
- Propene [air, urban air close to ground]: 0.000132245 kg
  Uncertainty for LCI results cannot be determined
- Potassium, ion [water, surface water]: 0.000884809 kg
  Uncertainty for LCI results cannot be determined
- Methane, non-fossil [air, urban air close to ground]: 0.00450626 kg
  Uncertainty for LCI results cannot be determined
- Silicon [water, surface water]: 6.08648e-10 kg
  Uncertainty for LCI results cannot be determined
- Zinc [air, urban air close to ground]: 2.32099e-7 kg
  Uncertainty for LCI results cannot be determined
- Mercury [air, urban air close to ground]: 7.3668e-6 kg
  Uncertainty for LCI results cannot be determined
- Suspended solids, unspecified [water, surface water]: 0.288498 kg
  Uncertainty for LCI results cannot be determined
- Copper [air, urban air close to ground]: 4.87575e-7 kg
  Uncertainty for LCI results cannot be determined
- Arsenic [air, urban air close to ground]: 6.37967e-8 kg
  Uncertainty for LCI results cannot be determined
- Methane, fossil [air, urban air close to ground]: 2.07004 kg
  Uncertainty for LCI results cannot be determined
- Carbon dioxide, fossil [air, urban air close to ground]: 226.445 kg
  Uncertainty for LCI results cannot be determined
- Hydrocarbons, unspecified [water, surface water]: 0.040911 kg
  Uncertainty for LCI results cannot be determined
- Carbon disulfide [air, urban air close to ground]: 3.70172e-6 kg
  Uncertainty for LCI results cannot be determined
- Carbon monoxide, non-fossil [air, urban air close to ground]: 0.000722514 kg
  Uncertainty for LCI results cannot be determined
- Nitrate [water, surface water]: 0.11652 kg
  Uncertainty for LCI results cannot be determined
- Chloride [water, surface water]: 4.47415 kg
  Uncertainty for LCI results cannot be determined
- Aluminium [water, surface water]: 0.000381465 kg
  Uncertainty for LCI results cannot be determined
- Phenol [water, surface water]: 0.000202157 kg
  Uncertainty for LCI results cannot be determined
- Particulates, > 2.5 um, and < 10um [air, urban air close to ground]: 0.0617326 kg
  Uncertainty for LCI results cannot be determined
- Tin, ion [water, surface water]: 1.12822e-8 kg
  Uncertainty for LCI results cannot be determined
- Xylene [air, urban air close to ground]: 2.38184e-5 kg
  Uncertainty for LCI results cannot be determined
- Hydrocarbons, aromatic [air, urban air close to ground]: 0.00342381 kg
  Uncertainty for LCI results cannot be determined
- Phosphorus [water, surface water]: 0.00659811 kg
  Uncertainty for LCI results cannot be determined
- Ammonia [air, urban air close to ground]: 0.00320325 kg
  Uncertainty for LCI results cannot be determined
- Chromium, ion [water, surface water]: 1.49058e-5 kg
  Uncertainty for LCI results cannot be determined
- Chlorinated solvents, unspecified [water, surface water]: 0.0133756 kg
  Uncertainty for LCI results cannot be determined
- Hydrocarbons, aliphatic, alkanes, cyclic [air, urban air close to ground]: 0.000127519 kg
  Uncertainty for LCI results cannot be determined
- Iron, ion [water, surface water]: 0.000708949 kg
  Uncertainty for LCI results cannot be determined
- Styrene [air, urban air close to ground]: 0.000304116 kg
  Uncertainty for LCI results cannot be determined
- Sulfate [water, surface water]: 0.592922 kg
  Uncertainty for LCI results cannot be determined
- Fluoride [water, surface water]: 0.000147408 kg
  Uncertainty for LCI results cannot be determined
- Ethene, chloro- [water, surface water]: 0.000111285 kg
  Uncertainty for LCI results cannot be determined
- Carbon dioxide, non-fossil [air, urban air close to ground]: 0.507002 kg
  Uncertainty for LCI results cannot be determined
- Hydrogen sulfide [air, urban air close to ground]: 5.72913e-6 kg
  Uncertainty for LCI results cannot be determined
- TOC, Total Organic Carbon [water, surface water]: 0.0201034 kg
  Uncertainty for LCI results cannot be determined
- Hydrogen chloride [air, urban air close to ground]: 0.00740192 kg
  Uncertainty for LCI results cannot be determined
- Ethene, chloro- [air, urban air close to ground]: 0.00745578 kg
  Uncertainty for LCI results cannot be determined
- Toluene [air, urban air close to ground]: 6.02476e-5 kg
  Uncertainty for LCI results cannot be determined
- Cadmium [air, urban air close to ground]: 9.09265e-9 kg
  Uncertainty for LCI results cannot be determined
- Manganese [water, surface water]: 5.60383e-9 kg
  Uncertainty for LCI results cannot be determined
- Carbonate [water, surface water]: 0.0760451 kg
  Uncertainty for LCI results cannot be determined
- BOD5, Biological Oxygen Demand [water, surface water]: 0.0145528 kg
  Uncertainty for LCI results cannot be determined
- Particulates, < 2.5 um [air, urban air close to ground]: 0.0358849 kg
  Uncertainty for LCI results cannot be determined
- Magnesium [water, surface water]: 0.00179368 kg
  Uncertainty for LCI results cannot be determined
- Nickel [air, urban air close to ground]: 0.000111587 kg
  Uncertainty for LCI results cannot be determined
- Ethane, 1,2-dichloro- [air, urban air close to ground]: 0.014625 kg
  Uncertainty for LCI results cannot be determined
- Chlorine [air, urban air close to ground]: 0.00218183 kg
  Uncertainty for LCI results cannot be determined
- Sulfide [water, surface water]: 0.000110383 kg
  Uncertainty for LCI results cannot be determined
- DOC, Dissolved Organic Carbon [water, surface water]: 0.0201034 kg
  Calculated as equal to TOC.
- Carbon monoxide, fossil [air, urban air close to ground]: 0.325975 kg
  Uncertainty for LCI results cannot be determined
- Ethene [air, urban air close to ground]: 0.000193619 kg
  Uncertainty for LCI results cannot be determined
- Lead [air, urban air close to ground]: 5.89885e-6 kg
  Uncertainty for LCI results cannot be determined
- Aldehydes, unspecified [air, urban air close to ground]: 0.00181332 kg
  Uncertainty for LCI results cannot be determined
- Chromium [air, urban air close to ground]: 6.13897e-5 kg
  Uncertainty for LCI results cannot be determined
- COD, Chemical Oxygen Demand [water, surface water]: 0.0963737 kg
  Uncertainty for LCI results cannot be determined
- Benzene [water, surface water]: 6.53773e-6 kg
  Uncertainty for LCI results cannot be determined
- Strontium [water, surface water]: 5.59406e-8 kg
  Uncertainty for LCI results cannot be determined
- Nitrogen oxides [air, urban air close to ground]: 0.541772 kg
  Uncertainty for LCI results cannot be determined
- Antimony [air, urban air close to ground]: 5.06151e-10 kg
  Uncertainty for LCI results cannot be determined
- Silver [air, urban air close to ground]: 6.15886e-9 kg
  Uncertainty for LCI results cannot be determined
- Calcium, ion [water, surface water]: 0.61316 kg
  Uncertainty for LCI results cannot be determined
- Sulfate [air, urban air close to ground]: 1.25762e-5 kg
  Uncertainty for LCI results cannot be determined
- Hydrocarbons, chlorinated [air, urban air close to ground]: 0.0261561 kg
  Uncertainty for LCI results cannot be determined
- NMVOC, non-methane volatile organic compounds, unspecified origin [air, urban air close to ground]: 0.353748 kg
  Uncertainty for LCI results cannot be determined
- Hydrogen [air, urban air close to ground]: 0.0242983 kg
  Uncertainty for LCI results cannot be determined
- Hydrogen fluoride [air, urban air close to ground]: 0.000561259 kg
  Uncertainty for LCI results cannot be determined
- Nitrogen [water, surface water]: 0.00995241 kg
  Uncertainty for LCI results cannot be determined
- Dioxins, measured as 2,3,7,8-tetrachlorodibenzo-p-dioxin [air, urban air close to ground]: 1.23366e-9 kg
  Uncertainty for LCI results cannot be determined
- Sulfur dioxide [air, urban air close to ground]: 0.783144 kg
  Uncertainty for LCI results cannot be determined
- Chlorine [water, surface water]: 0.000114938 kg
  Uncertainty for LCI results cannot be determined
- Cyanide [water, surface water]: 0.000330566 kg
  Uncertainty for LCI results cannot be determined
- Cyanide [air, urban air close to ground]: 0.000336759 kg
  Uncertainty for LCI results cannot be determined
- Ethane, 1,2-dichloro- [water, surface water]: 4.35035e-5 kg
  Uncertainty for LCI results cannot be determined
- Sodium, ion [water, surface water]: 2.45959 kg
  Uncertainty for LCI results cannot be determined
- Molybdenum [water, surface water]: 7.46732e-8 kg
  Uncertainty for LCI results cannot be determined
- Methane, dichlorodifluoro-, CFC-12 [air, urban air close to ground]: 0.000544599 kg; lognormal variance with pedigree 0.04, pedigree (1,1,5,1,1)
- Chromium VI [water, surface water]: 4.90277e-7 kg
  Uncertainty for LCI results cannot be determined
- Boron [water, surface water]: 0.00152853 kg
  Uncertainty for LCI results cannot be determined
- Methane, chlorodifluoro-, HCFC-22 [air, urban air close to ground]: 1.66793e-6 kg
  Uncertainty for LCI results cannot be determined
- Sulfite [water, surface water]: 1.77345e-6 kg
  Uncertainty for LCI results cannot be determined
- Acetone [air, urban air close to ground]: 1.04679e-6 kg; source Socolof M. L. 2001; lognormal variance with pedigree 0.1607, pedigree (1,3,5,3,1)
  Estimation, based on literature. A 50:50 split between panel assembly and module assembly is used.
  Uncertainty: data from an US-EPA LCA study
- Cyclohexane [air, urban air close to ground]: 2.72952e-7 kg; source Socolof M. L. 2001; lognormal variance with pedigree 0.1607, pedigree (1,3,5,3,1)
  (same comment as for Acetone)
- Tetramethyl ammonium hydroxide [air, urban air close to ground]: 0.00361878 kg; source Socolof M. L. 2001; lognormal variance with pedigree 0.1607, pedigree (1,3,5,3,1)
  (same comment as for Acetone)
- Phosphine [air, urban air close to ground]: 0.000352305 kg; source Socolof M. L. 2001; lognormal variance with pedigree 0.0807, pedigree (1,3,5,3,1)
  (same comment as for Acetone)
- Antimony [water, surface water]: 4.96922e-6 kg; source Socolof M. L. 2001; lognormal variance with pedigree 0.0807, pedigree (1,3,5,3,1)
  (same comment as for Acetone)
- Solids, inorganic [water, surface water]: 4.24906e-5 kg; source Socolof M. L. 2001; lognormal variance with pedigree 0.0807, pedigree (1,3,5,3,1)
  (same comment as for Acetone)
- Phosphoric acid [air, urban air close to ground]: 2.72952e-7 kg; source Socolof M. L. 2001; lognormal variance with pedigree 0.0807, pedigree (1,3,5,3,1)
  (same comment as for Acetone)
- Boric acid [air, urban air close to ground]: 7.71023e-9 kg; source Socolof M. L. 2001; lognormal variance with pedigree 0.1607, pedigree (1,3,5,3,1)
  (same comment as for Acetone)
- Acetic acid [air, urban air close to ground]: 7.65401e-6 kg; source Socolof M. L. 2001; lognormal variance with pedigree 0.1607, pedigree (1,3,5,3,1)
  (same comment as for Acetone)
- Sodium tetrahydridoborate [air, urban air close to ground]: 0.00010018 kg; source Socolof M. L. 2001; lognormal variance with pedigree 0.1607, pedigree (1,3,5,3,1)
  (same comment as for Acetone)
- Ethane, 1,1,1-trichloro-, HCFC-140 [water, surface water]: 1.28882e-10 kg; source Socolof M. L. 2001; lognormal variance with pedigree 0.3407, pedigree (1,3,5,3,1)
  (same comment as for Acetone)
- Nitrogen fluoride [air, urban air close to ground]: 1.5089e-7 kg; source Socolof M. L. 2001; lognormal variance with pedigree 0.1626, pedigree (3,3,5,1,4)
  Estimation, based on literature. A 50:50 split between panel assembly and module assembly is used.
  Uncertainty: tier 2b default emission factor according to IPCC guidelines
- Boron trifluoride [air, urban air close to ground]: 5.16644e-5 kg; source Socolof M. L. 2001; lognormal variance with pedigree 0.1607, pedigree (1,3,5,3,1)
  (same comment as for Acetone)
- Sulfur hexafluoride [air, urban air close to ground]: 6.03468e-7 kg; source Socolof M. L. 2001; lognormal variance with pedigree 0.2426, pedigree (3,3,5,1,4)
  (same comment as for Nitrogen fluoride)
- Diethylene glycol [air, urban air close to ground]: 5.45346e-7 kg; source Socolof M. L. 2001; lognormal variance with pedigree 0.1607, pedigree (1,3,5,3,1)
  (same comment as for Acetone)
- Phosphate [water, surface water]: 1.28882e-9 kg; source Socolof M. L. 2001; lognormal variance with pedigree 0.0807, pedigree (1,3,5,3,1)
  (same comment as for Acetone)
- Hydrocarbons, aromatic [water, surface water]: 3.30922e-6 kg; source Socolof M. L. 2001; lognormal variance with pedigree 0.3407, pedigree (1,3,5,3,1)
  (same comment as for Acetone)
- Water [water, surface water]: 0.0153465 m3; lognormal variance with pedigree 0.0026, pedigree (1,1,3,1,1)
  Measured Value. Final effluent (does not include recirculated water).
  It is considered that the water emissions given by the plant are additional to those of the sulfidic tailing dataset. The first go to surface water after going through the WWT, while the second come from leaching and go to underground water.
- Cobalt [water, surface water]: 3.52034e-6 kg; lognormal variance with pedigree 0.652, pedigree (1,1,3,1,1)
  (same comment as for Water)
- Dinitrogen monoxide [air, non-urban air or from high stacks]: 6.30947e-6 kg; lognormal variance with pedigree 0.042, pedigree (1,1,3,1,1)
  Measured Value. Process emission only.
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
## Sampling procedure
Literature

## Extrapolations
see Geography and Technology

## Review by Roberto Dones 2007-08-22
Passed

## Review by Emilia Moreno Ruiz 2015-10-22
PV adjusted
