# kraft paper production, unbleached

Dataset: EcoSpold 2, unit process
Geography: RoW
Time period: 2000-01-01 to 2019-12-31
Technology level: current
Classification: EcoSpold01Categories: paper & cardboard/packaging papers
Classification: ISIC rev.4 ecoinvent: 1701:Manufacture of pulp, paper and paperboard
Synonyms: sack paper; Papiersack; Verpackungspapier; packaging paper
Tags: ConvertedDataset
Scenario: Business-as-Usual
System model: Allocation at the point of substitution
Generated by: Roland Hischier
Published in: Hischier R. 2007
Database: ecoinvent
isCopyrightProtected: true
accessRestrictedTo: 1

## General comment
[This dataset was already contained in the ecoinvent database version 2. It was not individually updated during the transfer to ecoinvent version 3. Life Cycle Impact Assessment results may still have changed, as they are affected by changes in the supply chain, i.e. in other datasets. This dataset was generated following the ecoinvent quality guidelines for version 2. It may have been subject to central changes described in the ecoinvent version 3 change report (http://www.ecoinvent.org/database/ecoinvent-version-3/reports-of-changes/), and the results of the central updates were reviewed extensively. The changes added e.g. consistent water flows and other information throughout the database. The documentation of this dataset can be found in the ecoinvent reports of version 2, which are still available via the ecoinvent website. The change report linked above covers all central changes that were made during the conversion process.]

## Included activities end
This module includes the European production of unbleached kraft paper in an integrated mill - including transports to paper mill, wood handling, chemical pulping, paper production, energy production on-site and internal waste water treatment.

## Geography
Data from one European producer and from a finnish database used as European average data.

## Technology
Average of present used technology

## Parameters
- fraction, cooling water, recirculating system, to air: 0.771; name fraction_CW_R_to_air; lognormal variance with pedigree 0.0413, pedigree (2,3,1,3,1)
  Calculated based on literature value (Scown, C.D., 2011, Water Footprint of U.S. Transportation Fuels and supplying information of the article) (Vionnet, S., Quantis Water Database - Technical Report, 2012).
- fraction, process water, to air: 0.15 dimensionless; name fraction_PW_to_air; lognormal variance with pedigree 0.092025, pedigree (4,4,3,2,4)
- fraction, cooling water, cooling pond system, to air: 0.032; name fraction_CW_CP_to_air; lognormal variance with pedigree 0.0413, pedigree (2,3,1,3,1)
  (same comment as for fraction, cooling water, recirculating system, to air)
- fraction, cooling water, to air: 0.3875; name fraction_CW_to_air; = (0.5*fraction_CW_OT_to_air)+(0.5*fraction_CW_R_to_air); lognormal variance with pedigree 0.092025, pedigree (4,4,3,2,4)
  Calculated value based on literature value (see comments of the other parametres present in this dataset) and expert opinion. In the case when no industry/literature data are available about the type of cooling or directly fraction, cooling water, to air specific for the process a default assumption is applied. It is assumed that the once-through cooling system is used in 50% of all cases and recirculating system is used in another 50% of all cases.
- fraction, cooling water, once-through system, to air: 0.004; name fraction_CW_OT_to_air; lognormal variance with pedigree 0.0413, pedigree (2,3,1,3,1)
  (same comment as for fraction, cooling water, recirculating system, to air)

## Reference product
- kraft paper, unbleached: 1 kg; CPC 321: Pulp, paper and paperboard; By-product classification allocatable product
  EcoSpold01Location=RER
  production volume 2.67763 kg
    This is a placeholder value that does not reflect real-world production volumes. This dataset does not currently require a real-world production volume to work in the database framework, and no actual data were collected yet. This has no negative effect on the results of the ecoinvent database.
  property carbon content, fossil 0.00202191
    Fossil C content was calculated after fossil C contents of chemicals used in the production of the paper (in Tab 9.4 ecoinvent v2.2 report 11_III, part 9).
  property carbon content, non-fossil 0.416625
    Biogenic C content was calculated after biogenic C contents of chemicals used in the production of the paper (in Tab 9.4 ecoinvent v2.2 report 11_III, part 9). The cellulose content in 1 kg of paper (on a wet mas basis) was estimated as (1-chemical content), C content of cellulose was considered 0.44 kgC/kg dry mass (ecoinvent v2.2 report, n 15a, pg 40)
  property price 0.598 EUR2005
    Export prices for the World+ according to: http://faostat.fao.org/site/626/DesktopDefault.aspx?PageID=626#ancor downloaded 28 April 2009; calculated as export value divided by export volume.
  property carbon content 0.418647
    carbon content on a dry matter basis (reserved; not for manual entry)
  property true value 0.598
    allocation property applied in "true value" allocation // value calculated from revenue
  properties: water in wet mass 0.055 kg, wet mass 1 kg, water content 0.0582011, dry mass 0.945 kg, carbon allocation 0.395621 kg

## By-products
All rows: By-product classification allocatable product; pedigree (1,1,1,1,1)
- potassium fertiliser, as K2O: 0 kg; source CRAAQ 2010; CPC 3463: Mineral or chemical fertilizers, potassic
  This is the potassium (as K2O) output (organic and mineral forms of potassium contained) from organic origin. In practice, only a part of this total amount is available to the plants and the available amount has to be calculated considering efficiency of organic potassium (to replace mineral potassium ), which also depends on many factors, such as climate, soil, crop, timing and technique of application, etc. Since this dataset includes field emissions from the application of sludge, potassium availability has been accounted for in the calculation of direct field emissions.
  Uncertainty: The uncertainty of calculated values is determined from propagation of uncertainty factors of underlying variables.
  production volume 3.00028e-5 kg
  property price 0.188 EUR2005; name K2O_fertiliser_price_EUR2005
    Temporary price data. Calculated as 90% of purchasers price based on: 2004 import price calulated from FAOSTAT (http://faostat.fao.org/site/575/DesktopDefault.aspx?PageID=575#ancor [accessed 2011.01.27] Potash Fertilizers (K20 total nutrients) in kUSD/Mg
  property carbon content 0
    carbon content on a dry matter basis (reserved; not for manual entry)
  property true value 1.88018e-6
    allocation property applied in "true value" allocation // value calculated from revenue
  properties: carbon content, fossil 0, dry mass 1 kg, water in wet mass 0 kg, water content 0, wet mass 1 kg, carbon content, non-fossil 0, carbon allocation 0 kg
- nitrogen fertiliser, as N: 0 kg; source CRAAQ 2010; CPC 3461: Mineral or chemical fertilizers, nitrogenous
  This is the total nitrogen (as N) output (organic and mineral forms of nitrogen contained) from organic origin. In practice, only a part of this total amount is available to the plants and the available amount has to be calculated considering nitrogen efficiency (to replace mineral nitrogen), which also depends on many factors, such as climate, soil, crop, timing and technique of application, etc. Since this dataset includes field emissions from the application of sludge, nitrogen availability has been accounted for in the calculation of direct field emissions.
  Uncertainty: The uncertainty of calculated values is determined from propagation of uncertainty factors of underlying variables.
  production volume 0.000185553 kg
  property price 0.473 EUR2005; name N_fertiliser_price_EUR2005
    Temporary price data. Calculated as 90% of purchasers price based on: 2004 prices are calculated on basis of Import/Export data (tonnes and US$) from UN Trade Statistics Database (http://data.un.org/Browse.aspx?d=ComTrade, accessed 7/7-2010). N, P2O5, or K2O content (http://www.fertilizer.org/ifa/Home-Page/STATISTICS/Conversions-factors)
  property carbon content 0
    carbon content on a dry matter basis (reserved; not for manual entry)
  property true value 2.92555e-5
    allocation property applied in "true value" allocation // value calculated from revenue
  properties: water content 0, wet mass 1 kg, dry mass 1 kg, carbon content, non-fossil 0, water in wet mass 0 kg, carbon content, fossil 0, carbon allocation 0 kg
- phosphate fertiliser, as P2O5: 0 kg; source CRAAQ 2010; CPC 3462: Mineral or chemical fertilizers, phosphatic
  This is the total phosphate (as P2O5) output (organic and mineral forms of phosphate contained) from organic origin. In practice, only a part of this total amount is available to the plants and the available amount has to be calculated considering efficiency of organic phosphate (to replace mineral phosphate), which also depends on many factors, such as climate, soil, crop, timing and technique of application, etc. Since this dataset includes field emissions from the application of sludge, phosphate availability has been accounted for in the calculation of direct field emissions.
  Uncertainty: The uncertainty of calculated values is determined from propagation of uncertainty factors of underlying variables.
  production volume 0.000124196 kg
  property price 0.241 EUR2005; name P2O5_fertiliser_price_EUR2005
    (same comment as for nitrogen fertiliser, as N)
  property carbon content 0
    carbon content on a dry matter basis (reserved; not for manual entry)
  property true value 9.97709e-6
    allocation property applied in "true value" allocation // value calculated from revenue
  properties: dry mass 1 kg, water content 0, carbon content, fossil 0, wet mass 1 kg, carbon content, non-fossil 0, water in wet mass 0 kg, carbon allocation 0 kg
- soil pH raising agent, as CaCO3: 0 kg; source Marianne Lemieux 2013; CPC 34659: Fertilizers n.e.c.
  Calculated value of the amount of CaCO3 that can be substituted considered the liming efficiency of the sludge.
  Uncertainty: The uncertainty of calculated values is determined from propagation of uncertainty factors of underlying variables.
  production volume 0.0034591 kg
  property carbon content, fossil 0.12; name soil_pH_raising_agent_C_content_fossil_0; = 12/(40+12+3*16)
    Stoichiometric calculation. Fossil carbon content on a dry matter basis.
  property carbon content, non-fossil 0; name soil_pH_raising_a_C_content_non_fossil_0
    biogene carbon content on a dry matter basis
  property price 0.117 EUR2005; name soil_pH_raising_agent_as_CaCO3_price_EUR
    The price is estimated to be the same as for lime.
  property carbon content 0.12
    carbon content on a dry matter basis (reserved; not for manual entry)
  property true value 0.000134905
    allocation property applied in "true value" allocation // value calculated from revenue
  properties: wet mass 1 kg, water in wet mass 0 kg, water content 0, dry mass 1 kg, carbon allocation 0.12 kg
- heat, for reuse in municipal waste incineration only: 0 MJ; CPC 17300: Steam and hot water
  Net electricity generated from this waste and used in internal MSWI plant energy redistribution.
  Uncertainty: uncertainty is calculated from uncertainties in waste composition and uncertainties in energy efficiency and the uncertainty in internal energy demand
  production volume 1.50769e-6 MJ
  property exergy 0.1842 MJ; name E_th_prod_MSWI_exergy
    This exergy property is based on the exergy content of the product.
  property price 0.0106 EUR2005; name E_th_prod_MSWI_price_EUR2005
    Average European district heat price from Ecoheatcool and Euroheat 2005-2006, Ecoheat Work package 1: The European heat market. Final report. 10.6 EUR/GJ i s the price of district heat. http://www.solarthermalworld.org/files/Ecoheatcool%20WP1%20Web.pdf?download
  property true value relation 0.1842; name E_th_prod_MSWI_true_value_relation
    property to calculate "true value" from
  property true value 3.30585e-9
    allocation property applied in "true value" allocation // value calculated from true value relation
- electricity, for reuse in municipal waste incineration only: 0 kWh; CPC 17100: Electrical energy
  (same comment as for heat, for reuse in municipal waste incineration only)
  production volume 2.12323e-7 kWh
  property true value relation 3.6; name E_el_prod_MSWI_true_value_relation
    property to calculate "true value" from
  property price 0.1 EUR2005; name E_el_prod_MSWI_price_EUR2005
    Estimated to be the same price as in case of electricity, medium voltage.
  property exergy 3.6 MJ; name E_el_prod_MSWI_exergy
    This exergy property is based on the exergy content of the product.
  property true value 9.09876e-9
    (same comment as for heat, for reuse in municipal waste incineration only)

## Inputs from technosphere
- malusil: 0.00309909 kg; lognormal variance with pedigree 0.0432, pedigree (2,3,5,5,1)
  Average from 3 European producer
  EcoSpold01Location=RER
  Uncertainty: average from 3 European producer
  properties: dry mass 1 kg, wet mass 1 kg
- rosin size, for paper production: 0.00299912 kg; lognormal variance with pedigree 0.0432, pedigree (2,3,5,5,1)
  EcoSpold01Location=RER
  Average from 3 European producer
  Uncertainty: average from 3 European producer
  properties: carbon content, non-fossil 0.515474, dry mass 1 kg, wet mass 1 kg
  note on carbon content, non-fossil: Mixture of rosin size (approximated by soap) (75%) and alkali (shown as sodium hydroxide) (25%). (ecoinvent v2.2 report 11-III, pg 299).
- paper mill, integrated: 5.4384e-11 unit; lognormal variance with pedigree 0.448, pedigree (4,5,5,5,5)
  EcoSpold01Location=RER
  Own assumption
  Uncertainty: own assumption
- quicklime, milled, loose: 0.00749779 kg; lognormal variance with pedigree 0.0432, pedigree (2,3,5,5,1)
  EcoSpold01Location=CH
  Average from 3 European producer
  Uncertainty: average from 3 European producer
  properties: wet mass 1 kg, dry mass 0.99 kg, water content 0.010101
- hard coal: 0 kg; pedigree (1,1,1,1,1)
  EcoSpold01Location=WEU
  Average from 3 European producer
  Uncertainty: average from 3 European producer
  properties: dry mass 0.94 kg, water content 0.0638298, carbon content, fossil 0.845, wet mass 1 kg
  note on carbon content, fossil: C content 75-94% (specified in Tab 1.1, report 6, part VI). A mean content of 0.845 kg C/ kg dry hard coal was considered
- chemical, organic: 0.00269921 kg; lognormal variance with pedigree 0.0432, pedigree (2,3,5,5,1)
  EcoSpold01Location=GLO
  Average from 3 European producer
  Uncertainty: average from 3 European producer
  properties: wet mass 1 kg, dry mass 1 kg, carbon content, fossil 0.628
  note on carbon content, fossil: This dataset is an unweighted average of 20 organic substances (listed in Tab 88.1, ecoinvent v2.2 report 8, part II), being part of the top100 chemicals included in this database. The C-content has also been calculated as an unweighted average of the C content of the substances composing this dataset.
- electricity, medium voltage: 0 kWh; pedigree (1,1,1,1,1)
  Average from 3 European producer
  EcoSpold01Location=NORDEL
  Uncertainty: average from 3 European producer
- chemical, inorganic: 0.00599823 kg; lognormal variance with pedigree 0.0432, pedigree (2,3,5,5,1)
  (same comment as for chemical, organic)
  properties: wet mass 1 kg, dry mass 1 kg, carbon content, fossil 0.003
  note on carbon content, fossil: This dataset is an unweighted average of 20 inorganic substances (listed in Tab 88.1, ecoinvent v2.2 report 8, part II), being part of the top100 chemicals included in this database. The C-content has also been calculated as an unweighted average of the C content of the substances composing this dataset.
- sludge from pulp and paper production: -0.0107968 kg; lognormal variance with pedigree 0.0432, pedigree (2,3,5,5,1)
  Data from 1 European producer
  EcoSpold01Location=CH
  Uncertainty: data from 1 European producer
  production volume 0.0324 kg
    Calculated from the production volume of kraft paper, unbleached in proportion to the respective output amounts.
  properties: dry mass 0.75 kg, wet mass 1 kg, water content 0.333333, carbon content, non-fossil 0.21
  note on carbon content, non-fossil: Tab 6.21, ecoinvent v2.2 report 11_III & Tab A.9, ecoinvent v2.2 report 13_I. Sludge from pulp and paper contains 15.75% carbon
- lime: 0.00209938 kg; lognormal variance with pedigree 0.0432, pedigree (2,3,5,5,1)
  (same comment as for quicklime, milled, loose)
  properties: wet mass 1 kg, carbon content, fossil 0.120005, dry mass 1 kg
- natural gas, high pressure: 0 m3; pedigree (1,1,1,1,1)
  (same comment as for malusil)
  properties: heating value, gross 39 MJ, carbon content, fossil 0.602381, wet mass 0.84 kg, dry mass 0.84 kg
  note on carbon content, fossil: An average C content of 0.506 kg C/ m3 has been assumed (this average has been calculated using data in Tab 3.5, ecoinvent v2.2 report 6_V
- potato starch: 0.00619818 kg; lognormal variance with pedigree 0.0432, pedigree (2,3,5,5,1)
  EcoSpold01Location=DE
  Average from 3 European producer
  Uncertainty: average from 3 European producer
  properties: wet mass 1 kg, water content 0.25, dry mass 0.8 kg, carbon content, non-fossil 0.46
  note on carbon content, non-fossil: C-content of starch is considered 46% on dry mass basis (from "Evolutionary and Biochemical Aspects", A.D. Kay and T. Vrede (in Global Ecology, 2010, Elsevier B.V., S.E. Jørgensen Ed.)).
- sulfuric acid: 0.00209938 kg; lognormal variance with pedigree 0.0432, pedigree (2,3,5,5,1)
  (same comment as for malusil)
  properties: wet mass 1 kg, dry mass 1 kg
- pulpwood, softwood, measured as solid wood under bark: 0.00424875 m3; lognormal variance with pedigree 0.0432, pedigree (2,3,5,5,1)
  (same comment as for rosin size, for paper production)
  properties: water content 1.4, carbon content, non-fossil 0.494, wet mass 1080 kg, dry mass 450 kg
  note on carbon content, non-fossil: C content of dry mass is 0.494 kgC/kg dry wood (ecoinvent v2.2 report 9)
- soda ash, light, crystalline, heptahydrate: 0.00119965 kg; lognormal variance with pedigree 0.0432, pedigree (2,3,5,5,1)
  (same comment as for malusil)
  properties: wet mass 1 kg, carbon content, fossil 0.0517241, dry mass 1 kg
- hydrogen peroxide, without water, in 50% solution state: 0.000799765 kg; lognormal variance with pedigree 0.0432, pedigree (2,3,5,5,1)
  (same comment as for rosin size, for paper production)
  properties: dry mass 1 kg, wet mass 1 kg
- heavy fuel oil: 0 kg; pedigree (1,1,1,1,1)
  (same comment as for rosin size, for paper production)
  properties: wet mass 1 kg, carbon content, fossil 0.849, dry mass 1 kg
- sodium sulfate, anhydrite: 0.00479859 kg; lognormal variance with pedigree 0.0432, pedigree (2,3,5,5,1)
  Average from 3 European producer. Correction: in v3.5 this exchange replaces the mistaken input of "sodium dithionite, anhydrous" (same amount).
  Uncertainty: average from 3 European producer
  properties: wet mass 1 kg, dry mass 1 kg
- sodium hydroxide, without water, in 50% solution state: 0.00489856 kg; lognormal variance with pedigree 0.0432, pedigree (2,3,5,5,1)
  (same comment as for malusil)
  properties: dry mass 1 kg, wet mass 1 kg
- hydrochloric acid, without water, in 30% solution state: 0.000499853 kg; lognormal variance with pedigree 0.0432, pedigree (2,3,5,5,1)
  (same comment as for malusil)
  properties: dry mass 1 kg, wet mass 1 kg
- aluminium sulfate, powder: 0.0166951 kg; lognormal variance with pedigree 0.0432, pedigree (2,3,5,5,1)
  (same comment as for rosin size, for paper production)
  properties: dry mass 1 kg, wet mass 1 kg
- light fuel oil: 0 kg; pedigree (1,1,1,1,1)
  (same comment as for malusil)
  properties: dry mass 1 kg, wet mass 1 kg, carbon content, fossil 0.862
- bilge oil: -0.000399882 kg; lognormal variance with pedigree 0.0432, pedigree (2,3,5,5,1)
  (same comment as for sludge from pulp and paper production)
  production volume 0.0012 kg
    (same comment as for sludge from pulp and paper production)
  properties: wet mass 1 kg, dry mass 0.1 kg, carbon content, fossil 0.84, water content 9
  note on carbon content, fossil: Tab A.6, ecoinvent v2.2 report 13_I. C content has been calculated after data in the tables, and then referred to 1 kg DM
- ash from paper production sludge: -0.00303911 kg; lognormal variance with pedigree 0.0432, pedigree (2,3,5,5,1)
  EcoSpold01Location=CH
  Data from 1 European producer
  Uncertainty: data from 1 European producer
  production volume 0.00912 kg
    (same comment as for sludge from pulp and paper production)
  properties: carbon content, non-fossil 0.0092, wet mass 1 kg, dry mass 1 kg
- wood ash mixture, pure: -0.0276918 kg; lognormal variance with pedigree 0.0432, pedigree (2,3,5,5,1)
  (same comment as for ash from paper production sludge)
  production volume 0.0831 kg
    (same comment as for sludge from pulp and paper production)
  properties: carbon content, non-fossil 0.012, dry mass 1 kg, wet mass 1 kg
- hard coal: 0.000280093, 0.00017197, 0.00119265, 0.000168519, 3.99884e-5, 0.000251243, 7.31322e-5, 0.000371651 kg (8 entries); lognormal variance with pedigree 0.0432, pedigree (2,3,5,5,1)
  (same comment as for hard coal)
- electricity, medium voltage: 0.0123802, 0.00225267, 0.0382019, 0.553888, 0.0792719, 0.259727 kWh (6 entries); lognormal variance with pedigree 0.0432, pedigree (2,3,5,5,1)
  (same comment as for electricity, medium voltage)
- natural gas, high pressure: 0.000280108, 0.0004663, 0.00380727, 0.000642696, 0.00892767 m3 (5 entries); lognormal variance with pedigree 0.0432, pedigree (2,3,5,5,1)
  (same comment as for malusil)
- heavy fuel oil: 0.00171465, 0.000446688, 0.00132236, 0.000260113, 0.000333686, 0.0309122 kg (6 entries); lognormal variance with pedigree 0.0432, pedigree (2,3,5,5,1)
  (same comment as for rosin size, for paper production)
- light fuel oil: 0.000333183, 4.80504e-5, 0.000672443, 4.46225e-5, 6.46564e-5, 0.00677471 kg (6 entries); lognormal variance with pedigree 0.0432, pedigree (2,3,5,5,1)
  (same comment as for malusil)

## Inputs from nature
- Water, cooling, unspecified natural origin [natural resource, in water]: 0.10297 m3; name water_cooling_UNO_input; lognormal variance with pedigree 0.0432, pedigree (2,3,5,5,1)
  Data from 1 European producer
  Uncertainty: data from 1 European producer
- Water, unspecified natural origin [natural resource, in water]: 0.0239929 m3; name water_UNO_input; lognormal variance with pedigree 0.0432, pedigree (2,3,5,5,1)
  Data from 1 European producer
  Uncertainty: data from 1 European producer

## Emissions to nature
- Vanadium [air, urban air close to ground]: 3.7489e-6 kg; lognormal variance with pedigree 0.7806, pedigree (2,5,5,5,4)
  Estimation - based on respective heating modules
  Uncertainty: estimation - based on respective heating modules
- Radon-220 [air, urban air close to ground]: 7.36783e-8 kBq; lognormal variance with pedigree 0.4406, pedigree (2,5,5,5,4)
  (same comment as for Vanadium)
- Dinitrogen monoxide [air, urban air close to ground]: 5.60835e-5 kg; lognormal variance with pedigree 0.1806, pedigree (2,5,5,5,4)
  (same comment as for Vanadium)
- m-Xylene [air, urban air close to ground]: 2.56924e-6 kg; lognormal variance with pedigree 0.1806, pedigree (2,5,5,5,4)
  (same comment as for Vanadium)
- Iodine [air, urban air close to ground]: 8.39753e-10 kg; lognormal variance with pedigree 0.1806, pedigree (2,5,5,5,4)
  (same comment as for Vanadium)
- Particulates, > 10 um [air, urban air close to ground]: 3.99882e-5 kg; lognormal variance with pedigree 0.0832, pedigree (2,3,5,5,1)
  Average from 2 European producer
  Uncertainty: average from 2 European producer
- Methane, non-fossil [air, urban air close to ground]: 8.54748e-6 kg; lognormal variance with pedigree 0.1806, pedigree (2,5,5,5,4)
  (same comment as for Vanadium)
- Ethyne [air, urban air close to ground]: 3.67892e-8 kg; lognormal variance with pedigree 0.1806, pedigree (2,5,5,5,4)
  (same comment as for Vanadium)
- Thorium-232 [air, urban air close to ground]: 2.57924e-7 kBq; lognormal variance with pedigree 0.4406, pedigree (2,5,5,5,4)
  (same comment as for Vanadium)
- Lead [air, urban air close to ground]: 6.21817e-7 kg; lognormal variance with pedigree 0.7806, pedigree (2,5,5,5,4)
  (same comment as for Vanadium)
- Radium-228 [air, urban air close to ground]: 4.78859e-6 kBq; lognormal variance with pedigree 0.4406, pedigree (2,5,5,5,4)
  (same comment as for Vanadium)
- Chromium [air, urban air close to ground]: 1.08968e-7 kg; lognormal variance with pedigree 0.7806, pedigree (2,5,5,5,4)
  (same comment as for Vanadium)
- Water [water, unspecified]: 0.0834629 m3; name water_to_water_unspecified; lognormal variance with pedigree 0.0827, pedigree (2,2,5,5,1)
  Calculated value based on literature values and expert opinion. See comments in the parametres' comment field.
  property carbon content, fossil 0; name C_content_fossil
  property fraction, origin: salt water 0; name fraction_origin_salt_water_Ww
  property wet mass 1000 kg; name WM
  property fraction, origin: unspecified 1; name fraction_origin_unspecified_Ww
  property fraction, origin: fresh water 0; name fraction_origin_fresh_water_Ww
  property carbon content, non-fossil 0; name C_content_non_fossil
  property dry mass 0 kg; name DM
  property water in wet mass 1000 kg; name WWM
- Copper [air, urban air close to ground]: 7.78771e-7 kg; lognormal variance with pedigree 0.7806, pedigree (2,5,5,5,4)
  (same comment as for Vanadium)
- Magnesium [air, urban air close to ground]: 7.97765e-6 kg; lognormal variance with pedigree 0.7806, pedigree (2,5,5,5,4)
  (same comment as for Vanadium)
- Mercury [air, urban air close to ground]: 7.02793e-9 kg; lognormal variance with pedigree 0.7806, pedigree (2,5,5,5,4)
  (same comment as for Vanadium)
- Uranium-238 [air, urban air close to ground]: 7.36783e-7 kBq; lognormal variance with pedigree 0.4406, pedigree (2,5,5,5,4)
  (same comment as for Vanadium)
- Carbon dioxide, non-fossil [air, urban air close to ground]: 2.0294 kg; lognormal variance with pedigree 0.1406, pedigree (2,5,5,5,4)
  (same comment as for Vanadium)
- Water [air, unspecified]: 0.0434997 m3; name water_to_air_unspecified; lognormal variance with pedigree 0.0827, pedigree (2,2,5,5,1)
  (same comment as for Water)
  property fraction, origin: fresh water 0; name fraction_origin_fresh_water
  property fraction, origin: unspecified 1; name fraction_origin_unspecified
  property fraction, origin: salt water 0; name fraction_origin_salt_water
- Propene [air, urban air close to ground]: 3.67892e-8 kg; lognormal variance with pedigree 0.1806, pedigree (2,5,5,5,4)
  (same comment as for Vanadium)
- Particulates, < 2.5 um [air, urban air close to ground]: 0.000414878 kg; lognormal variance with pedigree 0.3432, pedigree (2,3,5,5,1)
  Average from 2 European producer
  Uncertainty: average from 2 European producer
- TOC, Total Organic Carbon [water, surface water]: 0.000681281 kg; lognormal variance with pedigree 0.0832, pedigree (2,3,5,5,1)
  Calculated by default as TOC (gC) = COD/2.7 (COD measured in g O2). Should more correctly be calculated from the carbon content of the specified emissions to water.
  Uncertainty: average from 2 European producer
- Chlorine [air, urban air close to ground]: 3.84887e-6 kg; lognormal variance with pedigree 0.4406, pedigree (2,5,5,5,4)
  (same comment as for Vanadium)
- Sodium [air, urban air close to ground]: 2.88915e-5 kg; lognormal variance with pedigree 0.7806, pedigree (2,5,5,5,4)
  (same comment as for Vanadium)
- Butane [air, urban air close to ground]: 4.91855e-7 kg; lognormal variance with pedigree 0.4406, pedigree (2,5,5,5,4)
  (same comment as for Vanadium)
- Uranium [air, urban air close to ground]: 1.85945e-10 kg; lognormal variance with pedigree 0.7806, pedigree (2,5,5,5,4)
  (same comment as for Vanadium)
- Carbon monoxide, fossil [air, urban air close to ground]: 1.99941e-5 kg; lognormal variance with pedigree 0.7806, pedigree (2,5,5,5,4)
  (same comment as for Vanadium)
- Ethane [air, urban air close to ground]: 1.10967e-7 kg; lognormal variance with pedigree 0.1806, pedigree (2,5,5,5,4)
  (same comment as for Vanadium)
- Benzene, ethyl- [air, urban air close to ground]: 6.41811e-7 kg; lognormal variance with pedigree 0.1806, pedigree (2,5,5,5,4)
  (same comment as for Vanadium)
- Scandium [air, urban air close to ground]: 9.28727e-11 kg; lognormal variance with pedigree 0.7806, pedigree (2,5,5,5,4)
  (same comment as for Vanadium)
- Formaldehyde [air, urban air close to ground]: 3.78888e-6 kg; lognormal variance with pedigree 0.1806, pedigree (2,5,5,5,4)
  (same comment as for Vanadium)
- Titanium [air, urban air close to ground]: 2.78918e-8 kg; lognormal variance with pedigree 0.7806, pedigree (2,5,5,5,4)
  (same comment as for Vanadium)
- Polonium-210 [air, urban air close to ground]: 6.25816e-6 kBq; lognormal variance with pedigree 0.4406, pedigree (2,5,5,5,4)
  (same comment as for Vanadium)
- Bromine [air, urban air close to ground]: 1.27962e-6 kg; lognormal variance with pedigree 0.1806, pedigree (2,5,5,5,4)
  (same comment as for Vanadium)
- Manganese [air, urban air close to ground]: 3.63893e-6 kg; lognormal variance with pedigree 0.7806, pedigree (2,5,5,5,4)
  (same comment as for Vanadium)
- Beryllium [air, urban air close to ground]: 9.28727e-11 kg; lognormal variance with pedigree 0.7806, pedigree (2,5,5,5,4)
  (same comment as for Vanadium)
- Phosphorus [water, surface water]: 1.99941e-5 kg; lognormal variance with pedigree 0.1106, pedigree (2,5,5,5,1)
  Upper limit from EU-IPPC report
  Uncertainty: upper limit from EU-IPPC report
- Pentane [air, urban air close to ground]: 7.31785e-7 kg; lognormal variance with pedigree 0.1806, pedigree (2,5,5,5,4)
  (same comment as for Vanadium)
- COD, Chemical Oxygen Demand [water, surface water]: 0.00183946 kg; lognormal variance with pedigree 0.0832, pedigree (2,3,5,5,1)
  Average from 2 European producer
  Uncertainty: average from 2 European producer
- Benzene [air, urban air close to ground]: 1.96942e-5 kg; lognormal variance with pedigree 0.1806, pedigree (2,5,5,5,4)
  (same comment as for Vanadium)
- Arsenic [air, urban air close to ground]: 4.19876e-8 kg; lognormal variance with pedigree 0.1806, pedigree (2,5,5,5,4)
  (same comment as for Vanadium)
- Toluene [air, urban air close to ground]: 6.58806e-6 kg; lognormal variance with pedigree 0.1806, pedigree (2,5,5,5,4)
  (same comment as for Vanadium)
- Calcium [air, urban air close to ground]: 0.000124963 kg; lognormal variance with pedigree 0.4406, pedigree (2,5,5,5,4)
  (same comment as for Vanadium)
- Propane [air, urban air close to ground]: 2.33931e-7 kg; lognormal variance with pedigree 0.1806, pedigree (2,5,5,5,4)
  (same comment as for Vanadium)
- Carbon monoxide, non-fossil [air, urban air close to ground]: 0.0010297 kg; lognormal variance with pedigree 0.7806, pedigree (2,5,5,5,4)
  (same comment as for Vanadium)
- Phenol, pentachloro- [air, urban air close to ground]: 1.72949e-10 kg; lognormal variance with pedigree 0.1806, pedigree (2,5,5,5,4)
  (same comment as for Vanadium)
- Propionic acid [air, urban air close to ground]: 1.09968e-8 kg; lognormal variance with pedigree 0.1806, pedigree (2,5,5,5,4)
  (same comment as for Vanadium)
- Radon-222 [air, urban air close to ground]: 7.36783e-8 kBq; lognormal variance with pedigree 0.4406, pedigree (2,5,5,5,4)
  (same comment as for Vanadium)
- Nitrogen [water, surface water]: 0.000199941 kg; lognormal variance with pedigree 0.1106, pedigree (2,5,5,5,1)
  Upper limit from EU-IPPC report
  Uncertainty: upper limit from EU-IPPC report
- Hydrocarbons, aliphatic, alkanes, unspecified [air, urban air close to ground]: 2.0494e-5 kg; lognormal variance with pedigree 0.1806, pedigree (2,5,5,5,4)
  (same comment as for Vanadium)
- Ethanol [air, urban air close to ground]: 4.32873e-7 kg; lognormal variance with pedigree 0.1806, pedigree (2,5,5,5,4)
  (same comment as for Vanadium)
- Hydrogen chloride [air, urban air close to ground]: 5.0985e-6 kg; lognormal variance with pedigree 0.1806, pedigree (2,5,5,5,4)
  (same comment as for Vanadium)
- Cobalt [air, urban air close to ground]: 4.77859e-8 kg; lognormal variance with pedigree 0.7806, pedigree (2,5,5,5,4)
  (same comment as for Vanadium)
- Aluminium [air, urban air close to ground]: 7.88768e-7 kg; lognormal variance with pedigree 0.1806, pedigree (2,5,5,5,4)
  (same comment as for Vanadium)
- Tin [air, urban air close to ground]: 4.65863e-11 kg; lognormal variance with pedigree 0.7806, pedigree (2,5,5,5,4)
  (same comment as for Vanadium)
- Boron [air, urban air close to ground]: 3.48897e-8 kg; lognormal variance with pedigree 0.7806, pedigree (2,5,5,5,4)
  (same comment as for Vanadium)
- Benzene, hexachloro- [air, urban air close to ground]: 1.53955e-13 kg; lognormal variance with pedigree 0.1806, pedigree (2,5,5,5,4)
  (same comment as for Vanadium)
- Hydrocarbons, aromatic [air, urban air close to ground]: 2.26933e-7 kg; lognormal variance with pedigree 0.1806, pedigree (2,5,5,5,4)
  (same comment as for Vanadium)
- Carbon dioxide, fossil [air, urban air close to ground]: 0.174949 kg; lognormal variance with pedigree 0.1406, pedigree (2,5,5,5,4)
  (same comment as for Vanadium)
- Chromium VI [air, urban air close to ground]: 1.28962e-9 kg; lognormal variance with pedigree 0.7806, pedigree (2,5,5,5,4)
  (same comment as for Vanadium)
- Molybdenum [air, urban air close to ground]: 2.33931e-8 kg; lognormal variance with pedigree 0.7806, pedigree (2,5,5,5,4)
  (same comment as for Vanadium)
- Nickel [air, urban air close to ground]: 1.06969e-6 kg; lognormal variance with pedigree 0.7806, pedigree (2,5,5,5,4)
  (same comment as for Vanadium)
- Nitrogen oxides [air, urban air close to ground]: 0.00157954 kg; lognormal variance with pedigree 0.0832, pedigree (2,3,5,5,1)
  Average from 3 European producer
  Uncertainty: average from 3 European producer
- Acetic acid [air, urban air close to ground]: 9.47721e-7 kg; lognormal variance with pedigree 0.1806, pedigree (2,5,5,5,4)
  (same comment as for Vanadium)
- NMVOC, non-methane volatile organic compounds, unspecified origin [air, urban air close to ground]: 1.29962e-5 kg; lognormal variance with pedigree 0.1806, pedigree (2,5,5,5,4)
  (same comment as for Vanadium)
- Sulfur dioxide [air, urban air close to ground]: 0.00084975 kg; lognormal variance with pedigree 0.0432, pedigree (2,3,5,5,1)
  Average from 2 European producer
  Uncertainty: average from 2 European producer
- Hydrogen fluoride [air, urban air close to ground]: 3.03911e-7 kg; lognormal variance with pedigree 0.1806, pedigree (2,5,5,5,4)
  (same comment as for Vanadium)
- Iron [air, urban air close to ground]: 5.84828e-7 kg; lognormal variance with pedigree 0.7806, pedigree (2,5,5,5,4)
  (same comment as for Vanadium)
- Ethene [air, urban air close to ground]: 2.20935e-7 kg; lognormal variance with pedigree 0.7806, pedigree (2,5,5,5,4)
  (same comment as for Vanadium)
- DOC, Dissolved Organic Carbon [water, surface water]: 0.000681281 kg; lognormal variance with pedigree 0.0832, pedigree (2,3,5,5,1)
  Calculated as equal to TOC.
  Uncertainty: average from 2 European producer
- Suspended solids, unspecified [water, surface water]: 0.000999706 kg; lognormal variance with pedigree 0.1106, pedigree (2,5,5,5,1)
  Upper limit from EU-IPPC report
  Uncertainty: upper limit from EU-IPPC report
- Selenium [air, urban air close to ground]: 1.79947e-8 kg; lognormal variance with pedigree 0.7806, pedigree (2,5,5,5,4)
  (same comment as for Vanadium)
- Benzo(a)pyrene [air, urban air close to ground]: 1.06969e-8 kg; lognormal variance with pedigree 0.1806, pedigree (2,5,5,5,4)
  (same comment as for Vanadium)
- Phosphorus [air, urban air close to ground]: 6.41811e-6 kg; lognormal variance with pedigree 0.1806, pedigree (2,5,5,5,4)
  (same comment as for Vanadium)
- Antimony [air, urban air close to ground]: 1.15966e-10 kg; lognormal variance with pedigree 0.1806, pedigree (2,5,5,5,4)
  (same comment as for Vanadium)
- Particulates, > 2.5 um, and < 10um [air, urban air close to ground]: 4.49868e-5 kg; lognormal variance with pedigree 0.1632, pedigree (2,3,5,5,1)
  Average from 2 European producer
  Uncertainty: average from 2 European producer
- Ammonia [air, urban air close to ground]: 3.70891e-5 kg; lognormal variance with pedigree 0.1806, pedigree (2,5,5,5,4)
  (same comment as for Vanadium)
- Dioxins, measured as 2,3,7,8-tetrachlorodibenzo-p-dioxin [air, urban air close to ground]: 2.13937e-12 kg; lognormal variance with pedigree 0.1806, pedigree (2,5,5,5,4)
  (same comment as for Vanadium)
- Cadmium [air, urban air close to ground]: 6.26815e-8 kg; lognormal variance with pedigree 0.7806, pedigree (2,5,5,5,4)
  (same comment as for Vanadium)
- Methanol [air, urban air close to ground]: 7.35783e-7 kg; lognormal variance with pedigree 0.1806, pedigree (2,5,5,5,4)
  (same comment as for Vanadium)
- Fluorine [air, urban air close to ground]: 1.06969e-6 kg; lognormal variance with pedigree 0.1806, pedigree (2,5,5,5,4)
  (same comment as for Vanadium)
- BOD5, Biological Oxygen Demand [water, surface water]: 0.000229932 kg; lognormal variance with pedigree 0.0832, pedigree (2,3,5,5,1)
  Average from 2 European producer
  Uncertainty: average from 2 European producer
- Strontium [air, urban air close to ground]: 1.39959e-8 kg; lognormal variance with pedigree 0.7806, pedigree (2,5,5,5,4)
  (same comment as for Vanadium)
- Silicon [air, urban air close to ground]: 1.15966e-6 kg; lognormal variance with pedigree 0.7806, pedigree (2,5,5,5,4)
  (same comment as for Vanadium)
- Zinc [air, urban air close to ground]: 6.70803e-6 kg; lognormal variance with pedigree 0.7806, pedigree (2,5,5,5,4)
  (same comment as for Vanadium)
- Methane, fossil [air, urban air close to ground]: 6.50808e-6 kg; lognormal variance with pedigree 0.1806, pedigree (2,5,5,5,4)
  (same comment as for Vanadium)
- Lead-210 [air, urban air close to ground]: 3.42899e-6 kBq; lognormal variance with pedigree 0.4406, pedigree (2,5,5,5,4)
  (same comment as for Vanadium)
- Barium [air, urban air close to ground]: 9.28727e-9 kg; lognormal variance with pedigree 0.7806, pedigree (2,5,5,5,4)
  (same comment as for Vanadium)
- Hydrocarbons, aliphatic, unsaturated [air, urban air close to ground]: 6.63805e-5 kg; lognormal variance with pedigree 0.1806, pedigree (2,5,5,5,4)
  (same comment as for Vanadium)
- Thorium-228 [air, urban air close to ground]: 4.04881e-7 kBq; lognormal variance with pedigree 0.4406, pedigree (2,5,5,5,4)
  (same comment as for Vanadium)
- Acetone [air, urban air close to ground]: 2.15936e-7 kg; lognormal variance with pedigree 0.1806, pedigree (2,5,5,5,4)
  (same comment as for Vanadium)
- Radium-226 [air, urban air close to ground]: 8.8374e-7 kBq; lognormal variance with pedigree 0.4406, pedigree (2,5,5,5,4)
  (same comment as for Vanadium)
- Potassium-40 [air, urban air close to ground]: 9.94707e-7 kBq; lognormal variance with pedigree 0.4406, pedigree (2,5,5,5,4)
  (same comment as for Vanadium)
- Thorium [air, urban air close to ground]: 1.39959e-10 kg; lognormal variance with pedigree 0.7806, pedigree (2,5,5,5,4)
  (same comment as for Vanadium)
- Potassium [air, urban air close to ground]: 0.000500853 kg; lognormal variance with pedigree 0.7806, pedigree (2,5,5,5,4)
  (same comment as for Vanadium)
- Xylene [air, urban air close to ground]: 7.36783e-9 kg; lognormal variance with pedigree 0.1806, pedigree (2,5,5,5,4)
  (same comment as for Vanadium)
- PAH, polycyclic aromatic hydrocarbons [air, urban air close to ground]: 2.43928e-7 kg; lognormal variance with pedigree 0.1806, pedigree (2,5,5,5,4)
  (same comment as for Vanadium)
- Acetaldehyde [air, urban air close to ground]: 1.51955e-6 kg; lognormal variance with pedigree 0.1806, pedigree (2,5,5,5,4)
  (same comment as for Vanadium)
- Thallium [air, urban air close to ground]: 1.15966e-10 kg; lognormal variance with pedigree 0.7806, pedigree (2,5,5,5,4)
  (same comment as for Vanadium)

## Extrapolations
This dataset has been copied from an original dataset covering the geography RER. The uncertainty has been adjusted accordingly.

## Review by Hans-Jörg Althaus 2003-08-26
passed
