# planing, lath, softwood, u=20%

Dataset: EcoSpold 2, unit process
Geography: RoW
Time period: 2011-01-01 to 2019-12-31
Technology level: current
Classification: ISIC rev.4 ecoinvent: 1610:Sawmilling and planing of wood
Scenario: Business-as-Usual
System model: Allocation at the point of substitution
Generated by: [System]
Published in: BFS 2013
Database: ecoinvent
isCopyrightProtected: true
accessRestrictedTo: 1

## General comment
This dataset represents the planing of one m3 air dried softwood lath that has been dried to 20% moisture content. The ratio of air dried respectively kiln dried laths corresponds to the estimated current market mix. The planing mill is assumed to be located on the sawmill site. The suction of the shavings is modeled in a separate activity.
The data was provided by and approved by the Swiss forest industry (Holzindustrie Schweiz HIS).
Within ecoinvent, three products - boards, beams and laths - are distinguished:
After being sawn, the resulting products can either be air dried down to a moisture content of u=20% (mass of water per dry mass), kiln dried down to u=20% or kiln dried down to u=10%. The resulting products can then be planed (the ratio of planed products at a moisture content of u=20% reflects the market share of air dried and kiln dried unplaned products). The activity name indicates the respective product and moisture content of the product being planed.

## Included activities start
Planing process starting from air dried respectively kiln dried softwood lath with a moisture content of 20%, at sawmill site.

## Included activities end
This activity ends with planed softwood lath, at plant. The dataset includes the planing process at the sawmill site and input of wood.

## Geography
Represents average Swiss conditions.

## Parameters
- shrinkage ratio (u=30% - 0%): 0.004 dimensionless; name shrinkage_ratio
  shrinkage of volume (%) per change in moisture content in %, relevant for u=30% to 0%
- moisture content lath: 20 dimensionless; name moisture_lath
  moisture content of lath
- wood density, dry: 440 kg/m3; name dry_wood_d
  kg oven-dry matter/oven-dry volume
- share of kiln dried wood: 0.8 dimensionless; name share_kiln_dried
  share of kiln dried sawnwood input (part of sawnwood input is air dried instead of kiln dried)
- wood density, apparent: 485.76 kg/m3; name wood_d_apparent; = (1+moisture_lath/100)* basic_wood_d
  kg wet matter/wet volume
- wood density, basic: 404.8 kg/m3; name basic_wood_d; = dry_wood_d*(1-moisture_lath*shrinkage_ratio)
  kg oven-dry matter/wet volume
- share of lath: 87 dimensionless; name share_lath
  share of lath production per volume of sawlog input
- share of shaving: 13 dimensionless; name share_shaving
  share of shaving production per volume of sawlog input

## Reference product
- sawnwood, lath, softwood, dried (u=20%), planed: 1 m3; name lath_planed; source BFS 2013; CPC 31101: Wood, sawn or chipped lengthwise, sliced or peeled, of a thickness exceeding 6 mm, of coniferous wood; By-product classification allocatable product
  production volume 1.70678e7 m3; name p_sawnwood_planed; = 1.98E+07 *0.5+1.58E+07 *0.5
    Estimated to be 50% of respective air dried and kiln dried sawn timber product; extraplated to global production volume from Swiss production volumes via the production volumes of sawntimber (NC) or (C) as applicable according to FAOStat
  property water in wet mass 80.96 kg; = basic_wood_d*moisture_lath/100
  property carbon content, fossil 0; name lath_planed_C_content_fossil
    fossil carbon content on a dry matter basis
  property water content 0.2; = moisture_lath/100
  property price 160 EUR2005; name lath_planed_price_EUR2005
    Expert judgement (Urs Luginbühl, Swiss Sawmilling industry, personal communication in June 2014). Cross-reference; FAOSTAT (accessed 20140428). The price is calculated by using data on total world import quantity (m3) and import value (1000 USD), year 2005. 109432798 m3 of Sawnwood (C) - coniferous was imported in the world in 2005. The import value was 22249842000 USD. The calculated price is thus (22249842000/109432798=203*0.8=) 164 Euro.
  property wet mass 485.76 kg; = basic_wood_d*(1+moisture_lath/100)
  property dry mass 404.8 kg; = basic_wood_d
  property carbon content 0.494
    carbon content on a dry matter basis (reserved; not for manual entry)
  property true value 160; name lath_planed_true_value
    allocation property applied in "true value" allocation // value calculated from revenue
  properties: carbon content, non-fossil 0.494, carbon allocation 199.971 kg

## By-products
- shavings, softwood, measured as dry mass: 0 kg; source BFS 2013; CPC 39283: Non-agglomerated wood waste and scrap; By-product classification allocatable product; pedigree (1,1,1,1,1)
  shavings recollected from the planing process where they are generated as loose shavings.
  production volume 1.07667e9 kg
    Calculated from production volume of reference product using the relative outputs.
  property price 0.113 EUR2005
    Temporary price data. Calculated as 90% of purchasers price based on: 2004 prices for World Import/Export (USD/cubicmeter) from FaoStat (http://faostat.fao.org/site/626/default.aspx#ancor, [accessed 10th June 2010]) Commodity: 'Chips and Particles' assuming this is for air-dry chips (10% water on a dry matter basis at 650 kg/m3) and no price difference for water content (i.e. assuming air-drying).
  property carbon content 0.494
    carbon content on a dry matter basis (reserved; not for manual entry)
  property true value 6.83507
    allocation property applied in "true value" allocation // value calculated from revenue
  properties: dry mass 1 kg, water in wet mass 0.1 kg, water content 0.1, wet mass 1.1 kg, carbon content, fossil 0, carbon content, non-fossil 0.494, carbon allocation 0.494 kg

## Inputs from technosphere
- planing mill: 7.09683e-7 unit; name planemill; source BFS 2013; lognormal variance with pedigree 0.64, pedigree (5,5,5,5,5)
  data taken from ecoinvent 2.2 dataset
- sawnwood, lath, softwood, raw, dried (u=20%): 0.881868 m3; name lath_raw_u20_kd; = 1/(1-share_shaving/100)*share_kiln_dried; source BFS 2013; lognormal variance with pedigree 0.216, pedigree (5,5,5,5,5)
  input of raw sawn wood to be planed
  property water in wet mass 80.96 kg; name lath_raw_airdried_WWM; = lath_raw_airdried_DM* lath_raw_airdried_water_content
  property carbon content, fossil 0; name lath_raw_airdried_C_content_fossil
  property water content 0.2; name lath_raw_airdried_water_content
  property dry mass 404.8 kg; name lath_raw_airdried_DM; = basic_wood_d
  property wet mass 485.76 kg; name lath_raw_airdried_WM; = lath_raw_airdried_DM*(1+ lath_raw_airdried_water_content)
  property carbon content, non-fossil 0.494; name lath_raw_airdried_C_content_non_fossil
- electricity, medium voltage: 0 kWh; name elec_medvol; source BFS 2013; pedigree (1,1,1,1,1)
  electricity consumed for the planing; the suction of the shavings in covered in a separate dataset; data from Swiss industry
- shavings, softwood, loose, measured as dry mass: -58.0092 kg; name m_shavings; = ((lath_raw_u20_kd+lath_raw_u20_ad)* share_shaving/100* basic_wood_d)*-1; source BFS 2013
  calculated as dry mass
  production volume 1.07667e9 kg; = m_shavings*p_sawnwood_planed
    Calculated from production volume of reference product using the relative outputs.
  property price 0.113 EUR2005; name m_shavings_price_EUR2005
  properties: water content 0.2, wet mass 1.2 kg, carbon content, non-fossil 0.494, dry mass 1 kg
- sawnwood, lath, softwood, raw, dried (u=20%): 0.220467 m3; name lath_raw_u20_ad; = 1/(1-share_shaving/100)*(1-share_kiln_dried); lognormal variance with pedigree 0.216, pedigree (5,5,5,5,5)
  input of raw sawn wood to be planed
  properties: wet mass 485.76 kg, water content 0.2, dry mass 404.8 kg, carbon content, non-fossil 0.494
- electricity, medium voltage: 0.227367, 0.0413713, 0.954969, 0.335307, 3.25019, 0.701594, 10.1724, 1.45586, 4.24736 kWh (9 entries); source BFS 2013; lognormal variance with pedigree 0.41, pedigree (5,5,5,5,5)
  (same comment as for electricity, medium voltage)

## Sampling procedure
complementary literature and sampling from sawmills

## Extrapolations
created manually as a copy of the respective Swiss dataset; uncertainties have been adjusted accodingly
