# electric bicycle production

Dataset: EcoSpold 2, unit process
Geography: RoW
Time period: 2000-01-01 to 2019-12-31
Technology level: current
Classification: EcoSpold01Categories: transport systems/road
Classification: ISIC rev.4 ecoinvent: 3091:Manufacture of motorcycles
Synonyms: e-Bike
Tags: ConvertedDataset
Scenario: Business-as-Usual
System model: Allocation at the point of substitution
Generated by: Marianne Leuenberger
Published in: Spielmann M. 2007
Database: ecoinvent
isCopyrightProtected: true
accessRestrictedTo: 1

## General comment
The data set reflects a e-bike of 24kg including additionals (e.g. carriers, lights). The frame material is Aluminium and the battery contains LiMn2O4-cells.
[This dataset was already contained in the ecoinvent database version 2. It was not individually updated during the transfer to ecoinvent version 3. Life Cycle Impact Assessment results may still have changed, as they are affected by changes in the supply chain, i.e. in other datasets. This dataset was generated following the ecoinvent quality guidelines for version 2. It may have been subject to central changes described in the ecoinvent version 3 change report (http://www.ecoinvent.org/database/ecoinvent-version-3/reports-of-changes/), and the results of the central updates were reviewed extensively. The changes added e.g. consistent water flows and other information throughout the database. The documentation of this dataset can be found in the ecoinvent reports of version 2, which are still available via the ecoinvent website. The change report linked above covers all central changes that were made during the conversion process.]

## Included activities end
This data set includes the material use for the manufacturing of an average bicycle with an additional electric motor. Manufacturing of the bike parts is assumed to take place in China. Transport to Europe included.

## Geography
Data cover manufacturing in China and retail in Europe

## Technology
Electric bicycle with electric motor at wheel-hub and LiMn2O4 battery pack, 100Wh/kg-

## Parameters
- fraction, process water, to air: 0.15 dimensionless; name fraction_PW_to_air; lognormal variance with pedigree 0.092025, pedigree (4,4,3,2,4)
- fraction, tap water, to air: 0.15; name fraction_TW_to_air; lognormal variance with pedigree 0.092025, pedigree (4,4,3,2,4)

## Reference product
- electric bicycle: 1 unit; By-product classification allocatable product; CPC 49913: Motorcycles and cycles fitted with an auxiliary motor, other than those with reciprocating internal combustion[…]
  EcoSpold01Location=RER
  production volume 2.67763 unit
    This is a placeholder value that does not reflect real-world production volumes. This dataset does not currently require a real-world production volume to work in the database framework, and no actual data were collected yet. This has no negative effect on the results of the ecoinvent database.
  property price 2167 EUR2005
    Calculated based on literature values and estimates. The purchaser's price of an electric bicycle is app. 3250 Euro (estimated based on producer's information; http://www.stoeckli.ch/ch-de/produkte/bike-velo/elektrobike?cat=90, accessed 20130726) for electric bicycle which weight 25.8 kg. The purchaser's price is thus (1/25.8*3250=) 126 Euro/kg. The producer's price is calculated as 2/3 of the purchaser's price (based on the information on bicycles) (2/3*126=) 84euro/kg.
  property true value 2167
    allocation property applied in "true value" allocation // value calculated from revenue

## By-products
- heat, for reuse in municipal waste incineration only: 0 MJ; CPC 17300: Steam and hot water; By-product classification allocatable product; pedigree (1,1,1,1,1)
  Net electricity generated from this waste and used in internal MSWI plant energy redistribution.
  Uncertainty: uncertainty is calculated from uncertainties in waste composition and uncertainties in energy efficiency and the uncertainty in internal energy demand
  production volume 2.43888 MJ
  property exergy 0.1842 MJ; name E_th_prod_MSWI_exergy
    This exergy property is based on the exergy content of the product.
  property price 0.0106 EUR2005; name E_th_prod_MSWI_price_EUR2005
    Average European district heat price from Ecoheatcool and Euroheat 2005-2006, Ecoheat Work package 1: The European heat market. Final report. 10.6 EUR/GJ i s the price of district heat. http://www.solarthermalworld.org/files/Ecoheatcool%20WP1%20Web.pdf?download
  property true value relation 0.1842; name E_th_prod_MSWI_true_value_relation
    property to calculate "true value" from
  property true value 0.00536866
    allocation property applied in "true value" allocation // value calculated from true value relation
- electricity, for reuse in municipal waste incineration only: 0 kWh; CPC 17100: Electrical energy; By-product classification allocatable product; pedigree (1,1,1,1,1)
  (same comment as for heat, for reuse in municipal waste incineration only)
  production volume 0.330166 kWh
  property price 0.1 EUR2005; name E_el_prod_MSWI_price_EUR2005
    Estimated to be the same price as in case of electricity, medium voltage.
  property exergy 3.6 MJ; name E_el_prod_MSWI_exergy
    This exergy property is based on the exergy content of the product.
  property true value relation 3.6; name E_el_prod_MSWI_true_value_relation
    property to calculate "true value" from
  property true value 0.0142042
    (same comment as for heat, for reuse in municipal waste incineration only)
- iron scrap, sorted, pressed: 0 kg; By-product classification Recyclable; CPC 39310: Slag, dross, scalings and other waste from the manufacture of iron or steel; pedigree (1,1,1,1,1)
  metallic iron scrap removed from ash reamains and recycled.
  Uncertainty: uncertainty is calculated from uncertainties in waste composition and transfer coefficients to soild residues
  production volume 0.0446905 kg
  property price 0.175 EUR2005
    Temporary price data. Calculated as 90% of purchasers price based on: 2005 import and export prices (total trades (USD) divided by total weight (kg) in biggest economies of the world: EU27, USA, Brasil, China, India, Japan and Russia) from UN Commodity Trade Statistics Database (http://data.un.org/Explorer.aspxDatabase [Accessed 2011.06.20]). Commodity: Waste or scrap, of cast iron
  property carbon content 0
    carbon content on a dry matter basis (reserved; not for manual entry)
  property true value 0.00241869
    allocation property applied in "true value" allocation // value calculated from revenue
  properties: carbon content, non-fossil 0, wet mass 1 kg, dry mass 1 kg, water content 0, carbon content, fossil 0, water in wet mass 0 kg, carbon allocation 0 kg
- copper: 0 kg; source Rentz O. 1999; By-product classification allocatable product; CPC 41413: Refined copper and copper alloys, unwrought; master alloys of copper
  Literature value. Copper uses: Before end-use copper is manufactured into semi fabricated products, such as shapes and ingots (known as 'semis'). These manufacturing processes are subdivided into hot working, cold working and, if necessary, process annealing. Few of the semis are ready for use as such. They more typically travel to first-stage manufacturers, who make metal rods, wire, and casting, and then to component manufacturers who produce such things as motors, valves, and insulated cables The components in turn are incorporated by final-stage manufacturers into a variety of finished products - automobiles, commercial buildings, residential housing, and so forth. These uses account for about 79% of the world-wide consumption of copper.
  production volume 0.00144008 kg
  property price 5.52 EUR2005
    Literature value (http://www.economist.com/news/business/21576714-mining-industry-has-enriched-chile-its-future-precarious-copper-solution). Average price between 20015 and 2013.
  property carbon content 0
    carbon content on a dry matter basis (reserved; not for manual entry)
  property true value 0.0024284
    allocation property applied in "true value" allocation // value calculated from revenue
  properties: dry mass 1 kg, water in wet mass 0 kg, wet mass 1 kg, carbon content, non-fossil 0, water content 0, carbon content, fossil 0, carbon allocation 0 kg
- zinc concentrate: 0 kg; CPC 14290: Other non-ferrous metal ores and concentrates (other than uranium or thorium ores and concentrates); By-product classification allocatable product
  Calculated value from the knowledge of the properties of both products.
  production volume 1.14303e-12 kg
  property price 0.38 EUR2005; name ByP_price_EUR2005
    Temporary price data. Calculated as 90% of purchasers price based on: Zinc content in concentrate 53%. Concentrate price per kg Zn 86.5% of refined Zn price (13.5% treatment charges according to CHR Metals Limited 2005: Dynamic cost curves. http://www.minecost.com/dynamic.pdf). 2004 zinc price from USGS (2007) Mineral commodity summaries 2007. <http://minerals.usgs.gov/minerals/pubs/mcs/2007/mcs2007.pdf> [Accessed 25 May 2010]
  property zinc content 0.53; name zinc_C_zinc_concentrate
    Zinc content on a dry matter basis. Value taken from teh "zinc mine operation" /GLO dataset.
  property dry mass 1 kg; name DM_zinc_concentrate
  property carbon content 0
    carbon content on a dry matter basis (reserved; not for manual entry)
  property true value 1.32689e-13
    allocation property applied in "true value" allocation // value calculated from revenue
  properties: wet mass 1 kg, water content 0, carbon content, non-fossil 0, carbon content, fossil 0, water in wet mass 0 kg, carbon allocation 0 kg
- iron scrap, unsorted: 0 kg; source European Aluminium Association 2008; CPC 39310: Slag, dross, scalings and other waste from the manufacture of iron or steel; By-product classification Recyclable; pedigree (1,1,1,1,1)
  production volume 1.18233e-6 kg
  property price 0.149 EUR2005; name ironScrapAmount_price_EUR2005
    Temporary price data. Calculated as 90% of purchasers price based on: estimated at 85% of sorted scrap
  property carbon content 0
    carbon content on a dry matter basis (reserved; not for manual entry)
  property true value 5.85889e-8
    allocation property applied in "true value" allocation // value calculated from revenue
  properties: water in wet mass 0 kg, water content 0, carbon content, fossil 0, carbon content, non-fossil 0, dry mass 1 kg, wet mass 1 kg, carbon allocation 0 kg
- aluminium oxide, non-metallurgical: 0 kg; source European Aluminium Association 2008; CPC 41432: Alumina (aluminium oxide), except artificial corundum; By-product classification allocatable product; CAS 1344-28-1; pedigree (1,1,1,1,1)
  production volume 7.43996e-5 kg
  property carbon content, non-fossil 0; name C_content_non_fossil
  property price 0.28 EUR2005; name Al2O3Amount_price_EUR2005
    From UN trade database. http://data.un.org/ Import data from the largest economies of the world are used (Brazil, India, USA, China, Japan and EU-27).
  property dry mass 1 kg; name DM
  property water content 0; name water_content
  property wet mass 1 kg; name WM
  property water in wet mass 0 kg; name WWM
  property carbon content, fossil 0; name C_content_fossil
  property carbon content 0
    carbon content on a dry matter basis (reserved; not for manual entry)
  property true value 6.92817e-6
    allocation property applied in "true value" allocation // value calculated from revenue
  properties: carbon allocation 0 kg
- aluminium, cast alloy: 0 kg; source European Aluminium Association 2008; By-product classification allocatable product; CPC 41431: Unwrought aluminium; pedigree (1,1,1,1,1)
  EcoSpold01Location=RER
  production volume 0.000695472 kg
  property price 1.3 EUR2005; name castAlloyAmount_price_EUR2005
  properties: water in wet mass 0 kg, carbon content, non-fossil 0, water content 0, dry mass 1 kg, carbon content, fossil 0, wet mass 1 kg, carbon content 0, carbon allocation 0 kg, true value 0.000300686
- aluminium, wrought alloy: 0 kg; source European Aluminium Association 2008; By-product classification allocatable product; CPC 4153: Semi-finished products of aluminium or aluminium alloys; pedigree (1,1,1,1,1)
  production volume 0.000304464 kg
  property price 1.44 EUR2005; name secondaryAluminiumOutput_price_EUR2005
  properties: wet mass 1 kg, water content 0, carbon content, fossil 0, water in wet mass 0 kg, carbon content, non-fossil 0, dry mass 1 kg, carbon content 0, carbon allocation 0 kg, true value 0.00014581

## Inputs from technosphere
- section bar extrusion, aluminium: 3.76626 kg; lognormal variance with pedigree 0.098, pedigree (4,1,4,5,4)
  Assumption for pipe drawing
  EcoSpold01Location=RER
  Uncertainty: Assumption for pipe drawing
- heat, district or industrial, natural gas: 0 MJ; pedigree (1,1,1,1,1)
  EcoSpold01Location=RER
  Extrapolation from passenger car manufacture; weight ratio
  Uncertainty: Extrapolation from passenger car manufacture; weight ratio
- road vehicle factory: 1.32268e-9 unit; lognormal variance with pedigree 0.3106, pedigree (2,1,4,5,1)
  EcoSpold01Location=RER
  Extrapolation for bicycle plant: 25% of weight ratio
  Uncertainty: Extrapolation for bicycle plant: 25% of weight ratio
- tap water: 0 kg; name tap_water_input; pedigree (1,1,1,1,1)
  Assumption based on: Cherry, C.R. 2009, 1488 liters waste water for all production phases (incl. Battery manufacturing --> 50%)
  EcoSpold01Location=RER
  Uncertainty: Assumption based on: Cherry, C.R. 2009, 1488 liters waste water for all production phases (incl. Battery manufacturing --> 50%)
  properties: carbon content, fossil 0.00178991, water content 2962.17, dry mass 0.000337476 kg, wet mass 1 kg
  note on carbon content, fossil: Bicarbonate content is 2.93 mol/m3. CO2 content is 0.1 mol/m3 (ecoinvent v2.2 report 8, Tab 93.1).
- steel, chromium steel 18/8, hot rolled: 1.58998 kg; lognormal variance with pedigree 0.0106, pedigree (2,1,4,5,1)
  Factsheets Bicycle parts manufacturere: Shimano, DT Swiss
  EcoSpold01Location=RER
  Uncertainty: Factsheets Bicycle parts manufacturere: Shimano, DT Swiss
  properties: carbon content, fossil 0.0008, dry mass 1 kg, wet mass 1 kg
  note on carbon content, fossil: Stainless steel model is the grade 304 steel (18/8 stainless, 18% chromium 8% nickel; max. 0.08% C)
- steel, low-alloyed, hot rolled: 4.90244 kg; lognormal variance with pedigree 0.0106, pedigree (2,1,4,5,1)
  (same comment as for steel, chromium steel 18/8, hot rolled)
  properties: dry mass 1 kg, wet mass 1 kg, carbon content, fossil 0.005
  note on carbon content, fossil: Low alloyed steel composition given in Tab. 3.2 ecoinvent v2.2 report 10_partII. Steel assumed to have a C content of 0.5%
- powder coat, aluminium sheet: 0.349996 m2; lognormal variance with pedigree 0.098, pedigree (4,1,4,5,4)
  Assumption: pipe diamter: 4cm, pipe length: 3m
  EcoSpold01Location=RER
  Uncertainty: Assumption: pipe diamter: 4cm, pipe length: 3m
- wire drawing, steel: 0.337496 kg; lognormal variance with pedigree 0.098, pedigree (4,1,4,5,4)
  EcoSpold01Location=RER
  Assumption
  Uncertainty: Assumption
- polyethylene, high density, granulate: 1.95748 kg; lognormal variance with pedigree 0.0106, pedigree (2,1,4,5,1)
  EcoSpold01Location=RER
  Literature, Shimano/Selle Italia
  Uncertainty: Literature, Shimano/Selle Italia
  properties: wet mass 1 kg, carbon content, fossil 0.857143, dry mass 1 kg
  note on carbon content, fossil: Polyethylene is formed out of a huge amount of ethylene monomers (C2H4) (ecoinvent v2.2 report 11_II). MW=28 g/mol
- municipal solid waste: 0 kg; pedigree (1,1,1,1,1)
  Assumption based on: Cherry, C.R. 2009, 4.5 kg solid waste per bicycle
  EcoSpold01Location=CH
  Uncertainty: Assumption based on: Cherry, C.R. 2009, 4.5 kg solid waste per bicycle
  production volume 0 kg
    Calculated from the production volume of electric bicycle in proportion to the respective output amounts.
  properties: carbon content, fossil 0.171549, carbon content, non-fossil 0.261655, water content 0.297017, dry mass 0.771 kg, wet mass 1 kg
  note on carbon content, fossil: MSW composition in tab 4.1, ecoinvent v2.2 report 13_I. C content referred to 1 kg DM
- wastewater, average: -0.000743991 m3; lognormal variance with pedigree 0.0112, pedigree (2,3,4,5,1)
  Assumption based on: Cherry, C.R. 2009, 1488 liters waste water for all production phases (incl. Battery manufacturing --> 50%)
  EcoSpold01Location=CH
  Uncertainty: Assumption based on: Cherry, C.R. 2009, 1488 liters waste water for all production phases (incl. Battery manufacturing --> 50%)
  production volume 0.002232 m3
    (same comment as for municipal solid waste)
  properties: water content 2882.2, carbon content, non-fossil 0.194039, wet mass 1000 kg, dry mass 0.346837 kg
  note on carbon content, non-fossil: 0.0673 kg TOC/m3 (Tab A.17, ecoinvent v2.2 report 13_I). TOC was considered as Total Carbon.
- heat, district or industrial, other than natural gas: 0 MJ; pedigree (1,1,1,1,1)
  EcoSpold01Location=RER
  Extrapolation from passenger car manufacture using weight ratio, thereof 25%
  Uncertainty: Extrapolation from passenger car manufacture using weight ratio, thereof 25%
- synthetic rubber: 0.562494 kg; lognormal variance with pedigree 0.0106, pedigree (2,1,4,5,1)
  Literature, Schwalbe
  EcoSpold01Location=RER
  Uncertainty: Literature, Schwalbe
  properties: carbon content, fossil 0.871949, wet mass 1 kg, dry mass 1 kg
  note on carbon content, fossil: EPDM (Ethylene-propene-diene terpolymer) rubber is a terpolymer of ethylene, propene, and a diene with the residual unsaturated portion of the diene in the side chain (ecoinvent v2.2 report 7-part XX & Ullmann). Chemical formula (deduced from Evidences of Solvent-Induced Miscibility in Polychloroprene-co-Ethylene-Propene Diene Terpolymer Blends, Dubey et al., Journal of Applied Polymer Science, 2009, 111:1884–1891): C20H35
- chromium steel removed by turning, average, conventional: 0.158998 kg; lognormal variance with pedigree 0.098, pedigree (4,1,4,5,4)
  Assumption
  EcoSpold01Location=RER
  Uncertainty: Assumption
  properties: carbon content, fossil 0.0008, dry mass 1 kg, wet mass 1 kg
- injection moulding: 1.95748 kg; lognormal variance with pedigree 0.098, pedigree (4,1,4,5,4)
  Assumption
  EcoSpold01Location=RER
  Uncertainty: Assumption
- battery, Li-ion, rechargeable, prismatic: 2.59997 kg; lognormal variance with pedigree 0.0106, pedigree (2,1,4,5,1)
  Literature, Biketec
  EcoSpold01Location=GLO
  Uncertainty: Literature, Biketec
  properties: carbon content, fossil 0.328011, wet mass 1 kg, dry mass 1 kg
  note on carbon content, fossil: Calculated as the addition of C contents in the product composition
- welding, arc, aluminium: 0.749991 m; lognormal variance with pedigree 0.098, pedigree (4,1,4,5,4)
  EcoSpold01Location=RER
  Assumption: pipe diameter: 4cm --> 0.125 m per joint, 6 joints per bike
  Uncertainty: Assumption: pipe diameter: 4cm --> 0.125 m per joint, 6 joints per bike
- aluminium, cast alloy: 2.41037 kg; lognormal variance with pedigree 0.0106, pedigree (2,1,4,5,1)
  (same comment as for steel, chromium steel 18/8, hot rolled)
  properties: wet mass 1 kg, dry mass 1 kg
- polyurethane, flexible foam: 0.0299997 kg; lognormal variance with pedigree 0.0106, pedigree (2,1,4,5,1)
  Literature, Selle Italia
  EcoSpold01Location=RER
  Uncertainty: Literature, Selle Italia
  properties: wet mass 1 kg, carbon content, fossil 0.633827, dry mass 1 kg
  note on carbon content, fossil: Polyurethanes (PUR) is the collective name for an extensive group of polymers with very different compositions and correspondingly varied property profiles, though their molecule chain contains all a urethane group (-NH-CO-O-). All PURs are built on a common principle : they are produced by the diisocyanate polyaddition process, that links polyols and (di)isocyanates. In this dataset, an example of typical polyurethane mixture is described (Ullmann, Polyurethanes, Dieterich et al. & ecoinvent v2 report 11_II). C content was calculated as an addition of C contents in its components.
- electricity, medium voltage: 0 kWh; pedigree (1,1,1,1,1)
  Extrapolation from passenger car manufacture using weight ratio, thereof 25%
  EcoSpold01Location=CN
  Uncertainty: Extrapolation from passenger car manufacture using weight ratio, thereof 25%
- electric motor, vehicle: 4.39995 kg; lognormal variance with pedigree 0.0106, pedigree (2,1,4,5,1)
  Literature, Biketec
  EcoSpold01Location=RER
  Uncertainty: Literature, Biketec
  properties: carbon content, fossil 0.00375, dry mass 1 kg, wet mass 1 kg
- aluminium, wrought alloy: 5.12204 kg; lognormal variance with pedigree 0.0106, pedigree (2,1,4,5,1)
  (same comment as for steel, chromium steel 18/8, hot rolled)
  properties: wet mass 1 kg, dry mass 1 kg
- heat, district or industrial, natural gas: 0.236032, 13.3441 MJ (2 entries); lognormal variance with pedigree 0.132, pedigree (4,4,5,5,4)
  (same comment as for heat, district or industrial, natural gas)
- tap water: 0.00139404, 0.011581, 0.00230388, 0.0580947, 0.00151132, 0.00429892, 0.664808 kg (7 entries); lognormal variance with pedigree 0.0112, pedigree (2,3,4,5,1)
  (same comment as for tap water)
- municipal solid waste: -0.00634822, -0.00159959, -0.00228591, -4.48971 kg (4 entries); lognormal variance with pedigree 0.0112, pedigree (2,3,4,5,1)
  (same comment as for municipal solid waste)
  production volume 13.5 kg
- heat, district or industrial, other than natural gas: 8.63475e-5, 0.192609 MJ (2 entries); lognormal variance with pedigree 0.132, pedigree (4,4,5,5,4)
  (same comment as for heat, district or industrial, other than natural gas)
- electricity, medium voltage: 0.0901968, 0.016412, 0.278323, 4.03539, 0.577541, 1.89226 kWh (6 entries); lognormal variance with pedigree 0.132, pedigree (4,4,5,5,4)
  (same comment as for electricity, medium voltage)

## Emissions to nature
- Water [air, unspecified]: 0.000111599 m3; name water_to_air_unspecified; lognormal variance with pedigree 0.0507, pedigree (2,2,4,5,1)
  Calculated value based on literature values and expert opinion. See comments in the parametres' comment field.
  property fraction, origin: fresh water 1; name fraction_origin_fresh_water
  property fraction, origin: salt water 0; name fraction_origin_salt_water
  property fraction, origin: unspecified 0; name fraction_origin_unspecified

## Sampling procedure
Literature

## Extrapolations
Electric motor and battery extrapolated from BEV, Manufacturing plant is extrapolated from passenger car plant, electricity consumption extrapolated according to weight ratio from passenger car This dataset has been copied from an original dataset covering the geography RER. The uncertainty has been adjusted accordingly.

## Review by Christian Bauer 2010-02-07
26.01.2010
passed
C:\Dokumente und Einstellungen\Marianne\Eigene Dateien\Projekte\277_Mobitool\Review\[Ecospold_Bike-v1.1.xls]X-Process
