# paper machine production

Dataset: EcoSpold 2, unit process
Geography: RER
Time period: 2000-01-01 to 2019-12-31
Technology level: current
Classification: EcoSpold01Categories: paper & cardboard/graphic paper
Classification: ISIC rev.4 ecoinvent: 2829:Manufacture of other special-purpose machinery
Tags: ConvertedDataset
Scenario: Business-as-Usual
System model: Allocation at the point of substitution
Generated by: Roland Hischier
Published in: Hischier R. 2007
Database: ecoinvent
isCopyrightProtected: true
accessRestrictedTo: 1

## General comment
The dataset represents a big offset paper machine, used e.g. for newsprint production.
[This dataset was already contained in the ecoinvent database version 2. It was not individually updated during the transfer to ecoinvent version 3. Life Cycle Impact Assessment results may still have changed, as they are affected by changes in the supply chain, i.e. in other datasets. This dataset was generated following the ecoinvent quality guidelines for version 2. It may have been subject to central changes described in the ecoinvent version 3 change report (http://www.ecoinvent.org/database/ecoinvent-version-3/reports-of-changes/), and the results of the central updates were reviewed extensively. The changes added e.g. consistent water flows and other information throughout the database. The documentation of this dataset can be found in the ecoinvent reports of version 2, which are still available via the ecoinvent website. The change report linked above covers all central changes that were made during the conversion process.]

## Included activities end
This module includes the production of the paper machine, its transport to the paper mill and the material amount for the foundation of the machine. Also included is the final disposal of the machine.

## Geography
Data about one newsprint paper machine, installed in Sweden. Data valable for whole Europe.

## Technology
rough estimation based on few information about one single paper machine

## Reference product
- paper machine: 1 unit; CPC 44913: Machinery for making pulp of fibrous cellulosic material or for making or finishing paper or paperboard; machi[…]; By-product classification allocatable product
  production volume 1.32237 unit
    This is a placeholder value that does not reflect real-world production volumes. This dataset does not currently require a real-world production volume to work in the database framework, and no actual data were collected yet. This has no negative effect on the results of the ecoinvent database. The placeholder value of this activity was scaled according to the nominal GDP of 2005 (source: United Nations, http://data.un.org/Glossary.aspx?q=GDP+%28current+US%24%29, accessed 20130726) to reflect an appropriate share of the global production volume, which is also a placeholder value.
  property price 2.71114e7 EUR2005
    Convert from EU 27 price to the world by currency exchange rate.
  property true value 2.71114e7
    allocation property applied in "true value" allocation // value calculated from revenue

## By-products
- electricity, for reuse in municipal waste incineration only: 0 kWh; CPC 17100: Electrical energy; By-product classification allocatable product; pedigree (1,1,1,1,1)
  Net electricity generated from this waste and used in internal MSWI plant energy redistribution.
  Uncertainty: uncertainty is calculated from uncertainties in waste composition and uncertainties in energy efficiency and the uncertainty in internal energy demand
  production volume 37953.6 kWh
  property true value relation 3.6; name E_el_prod_MSWI_true_value_relation
    property to calculate "true value" from
  property exergy 3.6 MJ; name E_el_prod_MSWI_exergy
    This exergy property is based on the exergy content of the product.
  property price 0.1 EUR2005; name E_el_prod_MSWI_price_EUR2005
    Estimated to be the same price as in case of electricity, medium voltage.
  property true value 4869.25
    allocation property applied in "true value" allocation // value calculated from true value relation
- heat, for reuse in municipal waste incineration only: 0 MJ; CPC 17300: Steam and hot water; By-product classification allocatable product; pedigree (1,1,1,1,1)
  Net useful heat generated from this waste and used in internal MSWI plant energy redistribution.
  Uncertainty: uncertainty is calculated from uncertainties in waste composition and uncertainties in energy efficiency and the uncertainty in internal energy demand
  production volume 266106 MJ
  property true value relation 0.1842; name E_th_prod_MSWI_true_value_relation
    property to calculate "true value" from
  property exergy 0.1842 MJ; name E_th_prod_MSWI_exergy
    This exergy property is based on the exergy content of the product.
  property price 0.0106 EUR2005; name E_th_prod_MSWI_price_EUR2005
    Average European district heat price from Ecoheatcool and Euroheat 2005-2006, Ecoheat Work package 1: The European heat market. Final report. 10.6 EUR/GJ i s the price of district heat. http://www.solarthermalworld.org/files/Ecoheatcool%20WP1%20Web.pdf?download
  property true value 1746.83
    (same comment as for electricity, for reuse in municipal waste incineration only)
- zinc concentrate: 0 kg; CPC 14290: Other non-ferrous metal ores and concentrates (other than uranium or thorium ores and concentrates); By-product classification allocatable product
  Calculated value from the knowledge of the properties of both products.
  production volume 2.09482 kg
  property price 0.38 EUR2005; name ByP_price_EUR2005
    Temporary price data. Calculated as 90% of purchasers price based on: Zinc content in concentrate 53%. Concentrate price per kg Zn 86.5% of refined Zn price (13.5% treatment charges according to CHR Metals Limited 2005: Dynamic cost curves. http://www.minecost.com/dynamic.pdf). 2004 zinc price from USGS (2007) Mineral commodity summaries 2007. <http://minerals.usgs.gov/minerals/pubs/mcs/2007/mcs2007.pdf> [Accessed 25 May 2010]
  property zinc content 0.53; name zinc_C_zinc_concentrate
    Zinc content on a dry matter basis. Value taken from teh "zinc mine operation" /GLO dataset.
  property dry mass 1 kg; name DM_zinc_concentrate
  property carbon content 0
    carbon content on a dry matter basis (reserved; not for manual entry)
  property true value 0.79603
    allocation property applied in "true value" allocation // value calculated from revenue
  properties: wet mass 1 kg, water content 0, carbon content, non-fossil 0, carbon content, fossil 0, water in wet mass 0 kg, carbon allocation 0 kg
- copper: 0 kg; By-product classification allocatable product; CPC 41413: Refined copper and copper alloys, unwrought; master alloys of copper
  production volume 7738.91 kg
  property price 5.52 EUR2005
    Literature value (http://www.economist.com/news/business/21576714-mining-industry-has-enriched-chile-its-future-precarious-copper-solution). Average price between 20015 and 2013.
  property carbon content 0
    carbon content on a dry matter basis (reserved; not for manual entry)
  property true value 42718.8
    allocation property applied in "true value" allocation // value calculated from revenue
  properties: water in wet mass 0 kg, water content 0, carbon content, non-fossil 0, dry mass 1 kg, carbon content, fossil 0, wet mass 1 kg, carbon allocation 0 kg
- lead: 0 kg; CPC 41441: Lead, unwrought; By-product classification allocatable product
  EcoSpold01Location=SE
  production volume 201.631 kg
  property price 0.744 EUR2005
    Temporary price data. Calculated as 90% of purchasers price based on: Source: ecoinvent v2 report 10-part IX, Tab 5.10 & 2.5
  property carbon content 0
    carbon content on a dry matter basis (reserved; not for manual entry)
  property true value 150.013
    allocation property applied in "true value" allocation // value calculated from revenue
  properties: wet mass 1 kg, water content 0, carbon content, non-fossil 0, carbon content, fossil 0, dry mass 1 kg, water in wet mass 0 kg, carbon allocation 0 kg
- nickel, 99.5%: 0 kg; CPC 41422: Unwrought nickel; By-product classification allocatable product
  EcoSpold01Location=SE
  production volume 420.898 kg
  property price 10.4 EUR2005
    Temporary price data. Calculated as 90% of purchasers price based on: 2004 nickel price from USGS (2007) Mineral commodity summaries 2007. <http://minerals.usgs.gov/minerals/pubs/mcs/2007/mcs2007.pdf> [Accessed 25 May 2010]
  property carbon content 0
    carbon content on a dry matter basis (reserved; not for manual entry)
  property true value 4377.34
    allocation property applied in "true value" allocation // value calculated from revenue
  properties: water in wet mass 0 kg, wet mass 1 kg, carbon content, non-fossil 0, dry mass 1 kg, water content 0, carbon content, fossil 0, carbon allocation 0 kg
- silver: 0 kg; CPC 41310: Silver (including silver plated with gold or platinum), unwrought or in semi-manufactured forms, or in powder […]; By-product classification allocatable product; CAS 7440-22-4
  EcoSpold01Location=SE
  production volume 69.5071 kg
  property price 178 EUR2005
    (same comment as for lead)
  property carbon content 0
    carbon content on a dry matter basis (reserved; not for manual entry)
  property true value 12372.3
    allocation property applied in "true value" allocation // value calculated from revenue
  properties: wet mass 1 kg, carbon content, non-fossil 0, dry mass 1 kg, water content 0, carbon content, fossil 0, water in wet mass 0 kg, carbon allocation 0 kg
- palladium: 0 kg; CPC 4160: Other non-ferrous metals and articles thereof (including waste and scrap of some metals); cermets and articles […]; By-product classification allocatable product
  EcoSpold01Location=SE
  production volume 3.84768 kg
  property price 5640 EUR2005
    Temporary price data. Calculated as 90% of purchasers price based on: 2004 price from USGS (2007) Mineral commodity summaries 2007. <http://minerals.usgs.gov/minerals/pubs/mcs/2007/mcs2007.pdf> [Accessed 25 May 2010]
  property carbon content 0
    carbon content on a dry matter basis (reserved; not for manual entry)
  property true value 21700.9
    allocation property applied in "true value" allocation // value calculated from revenue
  properties: wet mass 1 kg, carbon content, fossil 0, water in wet mass 0 kg, water content 0, carbon content, non-fossil 0, dry mass 1 kg, carbon allocation 0 kg
- gold: 0 kg; CPC 41320: Gold (including gold plated with platinum), unwrought or in semi-manufactured forms, or in powder form; By-product classification allocatable product; CAS 7440-57-5
  EcoSpold01Location=SE
  production volume 2.11005 kg
  property price 10600 EUR2005
    Temporary price data. Calculated as 90% of purchasers price based on: Source: ecoinvent v2 report 10-part IX, Tab 2.5
  property carbon content 0
    carbon content on a dry matter basis (reserved; not for manual entry)
  property true value 22366.5
    allocation property applied in "true value" allocation // value calculated from revenue
  properties: wet mass 1 kg, carbon content, fossil 0, dry mass 1 kg, carbon content, non-fossil 0, water content 0, water in wet mass 0 kg, carbon allocation 0 kg
- iron scrap, sorted, pressed: 0 kg; By-product classification Recyclable; CPC 39310: Slag, dross, scalings and other waste from the manufacture of iron or steel; pedigree (1,1,1,1,1)
  Iron scrap recovered from this waste.
  production volume 42.0521 kg
  property price 0.175 EUR2005
    Temporary price data. Calculated as 90% of purchasers price based on: 2005 import and export prices (total trades (USD) divided by total weight (kg) in biggest economies of the world: EU27, USA, Brasil, China, India, Japan and Russia) from UN Commodity Trade Statistics Database (http://data.un.org/Explorer.aspxDatabase [Accessed 2011.06.20]). Commodity: Waste or scrap, of cast iron
  property carbon content 0
    carbon content on a dry matter basis (reserved; not for manual entry)
  property true value 7.35912
    allocation property applied in "true value" allocation // value calculated from revenue
  properties: water content 0, water in wet mass 0 kg, carbon content, fossil 0, dry mass 1 kg, carbon content, non-fossil 0, wet mass 1 kg, carbon allocation 0 kg

## Inputs from technosphere
- waste polyvinylchloride: -22408.8 kg; lognormal variance with pedigree 0.1561, pedigree (4,5,5,3,4)
  Calculated, based on input
  Uncertainty: C
  production volume 22500 kg
    Calculated from the production volume of paper machine in proportion to the respective output amounts.
  properties: wet mass 1 kg, dry mass 0.998 kg, water content 0.00200401, carbon content, fossil 0.440882
  note on carbon content, fossil: C content in 1 kg DM was calculated using data in Tab A.1, ecoinvent v2.2 report 13_I
- polyvinylchloride, emulsion polymerised: 2860.71 kg; lognormal variance with pedigree 0.1561, pedigree (4,5,5,3,4)
  Estimation
  Uncertainty: E
  properties: wet mass 1 kg, dry mass 1 kg, carbon content, fossil 0.387097
  note on carbon content, fossil: Monomer is vynyl chloride, C2H3Cl (ecoinvent v2.2 report 11_II). MW=62 g/mol
- electronics scrap from control units: -89635.3 kg; lognormal variance with pedigree 0.1561, pedigree (4,5,5,3,4)
  Calculated, based on input
  Uncertainty: C
  production volume 90000 kg
    (same comment as for waste polyvinylchloride)
  properties: carbon content, fossil 0.337146, dry mass 1 kg, wet mass 1 kg, carbon content, non-fossil 0.00013442
- concrete, normal: 1952.06 m3; lognormal variance with pedigree 0.1561, pedigree (4,5,5,3,4)
  Estimation
  Uncertainty: E
  properties: water content 0.086758, dry mass 2190 kg, wet mass 2380 kg
- heat, district or industrial, other than natural gas: 2.29915e7 MJ; lognormal variance with pedigree 0.1561, pedigree (4,5,5,3,4)
  Rough estimation, based on literature
  Uncertainty: r
- heat, district or industrial, natural gas: 2.17814e7 MJ; lognormal variance with pedigree 0.1561, pedigree (4,5,5,3,4)
  Rough estimation, based on literature
  Uncertainty: r
- electronics, for control units: 89635.3 kg; lognormal variance with pedigree 0.1561, pedigree (4,5,5,3,4)
  Estimation
  Uncertainty: E
  properties: carbon content, non-fossil 0.00013442, dry mass 1 kg, wet mass 1 kg, carbon content, fossil 0.337146
  note on carbon content, non-fossil: The control unit has a composition of 46% steel (housing), 32% plastics, 14% printed wiring boards and 8% cables (various types).;
- polyvinylchloride, suspension polymerised: 19548.1 kg; lognormal variance with pedigree 0.1561, pedigree (4,5,5,3,4)
  Estimation
  Uncertainty: E
  properties: carbon content, fossil 0.387097, dry mass 1 kg, wet mass 1 kg
- steel, low-alloyed, hot rolled: 717082 kg; lognormal variance with pedigree 0.1561, pedigree (4,5,5,3,4)
  Estimation
  Uncertainty: E
  properties: wet mass 1 kg, carbon content, fossil 0.005, dry mass 1 kg
  note on carbon content, fossil: Low alloyed steel composition given in Tab. 3.2 ecoinvent v2.2 report 10_partII. Steel assumed to have a C content of 0.5%
- waste polyethylene: -67226.5 kg; lognormal variance with pedigree 0.1561, pedigree (4,5,5,3,4)
  Calculated, based on input
  Uncertainty: C
  production volume 67500 kg
    (same comment as for waste polyvinylchloride)
  properties: dry mass 0.996 kg, water content 0.00401606, wet mass 1 kg, carbon content, fossil 0.825301
- polyethylene, high density, granulate: 67226.5 kg; lognormal variance with pedigree 0.1561, pedigree (4,5,5,3,4)
  Estimation
  Uncertainty: E
  properties: wet mass 1 kg, dry mass 1 kg, carbon content, fossil 0.857143
  note on carbon content, fossil: Polyethylene is formed out of a huge amount of ethylene monomers (C2H4) (ecoinvent v2.2 report 11_II). MW=28 g/mol
- steel, chromium steel 18/8, hot rolled: 3.58541e6 kg; lognormal variance with pedigree 0.0601, pedigree (4,4,5,3,1)
  Expert information about 1 machine
  Uncertainty: E
  properties: carbon content, fossil 0.0008, wet mass 1 kg, dry mass 1 kg
  note on carbon content, fossil: Stainless steel model is the grade 304 steel (18/8 stainless, 18% chromium 8% nickel; max. 0.08% C)
- waste concrete: 0 kg; pedigree (1,1,1,1,1)
  Calculated, based on input
  Uncertainty: C
  production volume 0 kg
    (same comment as for waste polyvinylchloride)
  properties: dry mass 0.5 kg, water content 1, wet mass 1 kg
- electricity, medium voltage: 4.53156e6 kWh; lognormal variance with pedigree 0.1561, pedigree (4,5,5,3,4)
  Rough estimation, based on literature
  Uncertainty: r
- waste concrete: -2.52079e6, -8912.55 kg (2 entries); lognormal variance with pedigree 0.1561, pedigree (4,5,5,3,4)
  Calculated, based on input
  Uncertainty: C
  production volume 2.54e6 kg

## Sampling procedure
literature

## Extrapolations
Based on information from Voith Paper Heidenheim about the total weight and the amount of chromium steel, the other parts of the machine were estimated and verified with experts. The energy amount for the production is a rough estimation, based on information from Literature. The transport is estimated based on a production place in the southern part of Germany

## Review by Hans-Jörg Althaus 2003-07-02
passed
