# yarn production, cotton, ring spinning, for knitting

Dataset: EcoSpold 2, unit process
Geography: GLO
Time period: 2016-01-01 to 2019-12-31
Technology level: current
Classification: ISIC rev.4 ecoinvent: 131:Spinning, weaving and finishing of textiles
Scenario: Business-as-Usual
System model: Allocation at the point of substitution
Generated by: Mireille Faist Emmenegger
Published in: Cotton Inc 2017
Database: ecoinvent
isCopyrightProtected: true
accessRestrictedTo: 1

## General comment
The activity begins with the opening of cotton bales and ends with the yarn for knitted fabric. It includes electricity use, heat use and the cotton fibres. No lubricating oil needed as the dataset is specific for cotton, which contains natural materials providing lubrication in spinning.
Data collected from mostly vertically integrated mills on a global level.
Because there were
not enough mills to maintain confidentiality for
rotor or air-jet spinning, data for all spinning
methods were rolled together into a production
weighted average for a global average
spinning process for woven fabrics.

## Included activities start
The activity starts from opening of bales.

## Included activities end
The activity ends with spinning and winding after which yarn for knitted fabric is conditioned for packaging.

## Geography
The data are based on primary data collected by cotton Inc.

## Technology
Data set represents average technology.
Once the yarn is received in packaged form, it is placed in creel to feed the knitting zone into the feeder. Upon setting the specific yarn as per the fabric requirement, machine is set as per specific design requirement and the machine processes yarn into loops culminating into production of fabric.

## Reference product
- yarn, cotton: 1 kg; By-product classification allocatable product; CPC 26360: Cotton yarn (other than sewing thread), containing 85% or more by weight of cotton
  production volume 7.5e9 kg; name PVol; = 15E+9 *0.5
    The overall global yarn production (all technologies) is about 15 E+9 kg (The Fibre Year report 2017). It is assumed that about 50% is used for knitting.
  property price 2.265 EUR2005
    Estimated value. Various souces report a value around 3 USD per kg of cotton yarn (YarnsandFibers.com, 2018. Pakistan textile exports hit by rise in prices, retrieved from: http://www.yarnsandfibers.com/news/news-tags/cotton-yarn-prices, accessed 1Feb2018; Alibaba.com, 2018. Retrieved from: https://www.alibaba.com/showroom/100%2525-cotton-yarn-price.html, accessed 1Feb2018). The price was checked also against the values reported from the Indian Ministry of Textile, Price Data for textile, Prices (Month End) for 2018 (retrieved from: http://texmin.nic.in/sites/default/files/monthend_jan2018_1.pdf, accessed 6March 2018).
  property carbon content 0.46
    carbon content on a dry matter basis (reserved; not for manual entry)
  property true value 2.265
    allocation property applied in "true value" allocation // value calculated from revenue
  properties: water content 0.0638298, carbon content, fossil 0, dry mass 0.94 kg, water in wet mass 0.06 kg, wet mass 1 kg, carbon content, non-fossil 0.46, carbon allocation 0.4324 kg

## By-products
- electricity, for reuse in municipal waste incineration only: 0 kWh; CPC 17100: Electrical energy; By-product classification allocatable product; pedigree (1,1,1,1,1)
  Net electricity generated from this waste and used in internal MSWI plant energy redistribution.
  Uncertainty: uncertainty is calculated from uncertainties in waste composition and uncertainties in energy efficiency and the uncertainty in internal energy demand
  production volume 368680 kWh
  property true value relation 3.6; name E_el_prod_MSWI_true_value_relation
    property to calculate "true value" from
  property exergy 3.6 MJ; name E_el_prod_MSWI_exergy
    This exergy property is based on the exergy content of the product.
  property price 0.1 EUR2005; name E_el_prod_MSWI_price_EUR2005
    Estimated to be the same price as in case of electricity, medium voltage.
  property true value 3.14871e-6
    allocation property applied in "true value" allocation // value calculated from true value relation
- heat, for reuse in municipal waste incineration only: 0 MJ; CPC 17300: Steam and hot water; By-product classification allocatable product; pedigree (1,1,1,1,1)
  Net useful heat generated from this waste and used in internal MSWI plant energy redistribution.
  Uncertainty: uncertainty is calculated from uncertainties in waste composition and uncertainties in energy efficiency and the uncertainty in internal energy demand
  production volume 2.669e6 MJ
  property exergy 0.1842 MJ; name E_th_prod_MSWI_exergy
    This exergy property is based on the exergy content of the product.
  property true value relation 0.1842; name E_th_prod_MSWI_true_value_relation
    property to calculate "true value" from
  property price 0.0106 EUR2005; name E_th_prod_MSWI_price_EUR2005
    Average European district heat price from Ecoheatcool and Euroheat 2005-2006, Ecoheat Work package 1: The European heat market. Final report. 10.6 EUR/GJ i s the price of district heat. http://www.solarthermalworld.org/files/Ecoheatcool%20WP1%20Web.pdf?download
  property true value 1.16835e-6
    (same comment as for electricity, for reuse in municipal waste incineration only)
- zinc concentrate: 0 kg; CPC 14290: Other non-ferrous metal ores and concentrates (other than uranium or thorium ores and concentrates); By-product classification allocatable product
  Calculated value from the knowledge of the properties of both products.
  production volume 221.776 kg
  property price 0.38 EUR2005; name ByP_price_EUR2005
    Temporary price data. Calculated as 90% of purchasers price based on: Zinc content in concentrate 53%. Concentrate price per kg Zn 86.5% of refined Zn price (13.5% treatment charges according to CHR Metals Limited 2005: Dynamic cost curves. http://www.minecost.com/dynamic.pdf). 2004 zinc price from USGS (2007) Mineral commodity summaries 2007. <http://minerals.usgs.gov/minerals/pubs/mcs/2007/mcs2007.pdf> [Accessed 25 May 2010]
  property zinc content 0.53; name zinc_C_zinc_concentrate
    Zinc content on a dry matter basis. Value taken from teh "zinc mine operation" /GLO dataset.
  property dry mass 1 kg; name DM_zinc_concentrate
  property carbon content 0
    carbon content on a dry matter basis (reserved; not for manual entry)
  property true value 1.65704e-10
    allocation property applied in "true value" allocation // value calculated from revenue
  properties: wet mass 1 kg, water content 0, carbon content, non-fossil 0, carbon content, fossil 0, water in wet mass 0 kg, carbon allocation 0 kg

## Inputs from technosphere
- heat, district or industrial, natural gas: 6.04999 MJ; lognormal variance with pedigree 0.0021, pedigree (2,3,2,3,1)
  Value from industrial partner [Cotton Inc.]
- waste yarn and waste textile: -0.269949 kg; name WY; lognormal variance with pedigree 0.0021, pedigree (2,3,2,3,1)
  Short fibres which is partly sold.
  production volume 2.02462e9 kg; = PVol*WY
    Calculated based on production volume and waste fibre share.
  property price 0 EUR2005; name WY_price_EUR2005
  properties: carbon content, non-fossil 0.44455, wet mass 1 kg, water content 0.0212731, dry mass 0.97917 kg
- fibre, cotton: 1.27 kg; lognormal variance with pedigree 0.0015, pedigree (1,3,2,3,1)
  properties: wet mass 1 kg, water content 0.0638298, dry mass 0.94 kg, carbon content, non-fossil 0.46
- building, hall: 9.99998e-6 m2; lognormal variance with pedigree 0.3494, pedigree (4,3,2,4,4)
  Proxy based on data for weaving in Bangladesh.
- electricity, low voltage: 3.22999 kWh; lognormal variance with pedigree 0.0015, pedigree (1,3,2,3,1)
  sum of electricity used for spinning machines. Electricity consumption for utilities are not included in this dataset
- waste textile, soiled: 0 kg; name waste; pedigree (1,1,1,1,1)
  waste fibres
  production volume 0 kg
    Calculated based on production volume and waste fibre share.
  property price 0 EUR2005; name waste_price_EUR2005
  properties: water content 0.333333, carbon content, non-fossil 0.570519, dry mass 0.75 kg, wet mass 1 kg
- waste textile, soiled: -7.37334e-7, -4.92626e-5 kg (2 entries); lognormal variance with pedigree 0.0021, pedigree (2,3,2,3,1)
  waste fibres
  production volume 375000 kg

## Extrapolations
Extrapolated from data from mostly vertically integrated mills.
