# treatment of bagasse, from sweet sorghum, in heat and power co-generation unit, 6400kW thermal

Dataset: EcoSpold 2, unit process
Geography: GLO
Time period: 2000-01-01 to 2019-12-31
Technology level: current
Classification: EcoSpold01Categories: waste management/others
Classification: ISIC rev.4 ecoinvent: 3530:Steam and air conditioning supply
Tags: with true value; ConvertedDataset
Scenario: Business-as-Usual
System model: Allocation at the point of substitution
Generated by: Sofia Parada Tur
Published in: Bauer, C. 2007
Database: ecoinvent
isCopyrightProtected: true
accessRestrictedTo: 1

## General comment
Treatment of bagasse, from sweet sorghum by combustion in a heat and power cogeneration unit. Emission factors have been used from dataset "heat and power co-generation, wood chips, 6400kW thermal" . Emissions of CO2 and CO are based on carbon content of bagasse. Electricity and heat generation are based on lower heating value of bagasse and efficiency of the cogen unit.

## Included activities start
From reception of bagasse at the cogeneration plant

## Included activities end
This module describes the combustion of bagasse, from sweet sorghum. Included are the infrastructure, the bagasse input, the emissions to air and the disposal of the ashes. Also included are substances needed for operation: lubricating oil, ammonia, organic chemicals, sodium chloride, chlorine and decarbonized water.

## Geography
based on geography of dataset for cane sugar production with ethanol by-product, that also includes burning of bagasse

## Technology
based on dataset wood chips, burned in cogen 6400 kWh

## Parameters
- fraction, cooling water, cooling pond system, to air: 0.032; name fraction_CW_CP_to_air; lognormal variance with pedigree 0.0413, pedigree (2,3,1,3,1)
  Calculated based on literature value (Scown, C.D., 2011, Water Footprint of U.S. Transportation Fuels and supplying information of the article) (Vionnet, S., Quantis Water Database - Technical Report, 2012).
- fraction, cooling water, once-through system, to air: 0.004; name fraction_CW_OT_to_air; lognormal variance with pedigree 0.0413, pedigree (2,3,1,3,1)
  (same comment as for fraction, cooling water, cooling pond system, to air)
- fraction, water, decarbonised, to air: 0.3875; name fraction_WDC_to_air; = fraction_CW_to_air; lognormal variance with pedigree 0.092025, pedigree (4,4,3,2,4)
  Calculated value. See comments in the other parametres present in this dataset. Decarbonised water is considered to be always used as cooling water, thus cooling water fractions to air are applied to all carbonised water input flows to calculate the amount of water consumed in the processes.
- fraction, cooling water, to air: 0.3875; name fraction_CW_to_air; = (0.5*fraction_CW_OT_to_air)+(0.5*fraction_CW_R_to_air); lognormal variance with pedigree 0.092025, pedigree (4,4,3,2,4)
  Calculated value based on literature value (see comments of the other parametres present in this dataset) and expert opinion. In the case when no industry/literature data are available about the type of cooling or directly fraction, cooling water, to air specific for the process a default assumption is applied. It is assumed that the once-through cooling system is used in 50% of all cases and recirculating system is used in another 50% of all cases.
- fraction, cooling water, recirculating system, to air: 0.771; name fraction_CW_R_to_air; lognormal variance with pedigree 0.0413, pedigree (2,3,1,3,1)
  (same comment as for fraction, cooling water, cooling pond system, to air)

## Reference product
- bagasse, from sweet sorghum: 0 kg; name bagasse_input; CPC 39141: Bagasse; By-product classification allocatable product
  production volume 0 kg; name bagasse_input_annual_production; = 1.5811E+07
    Estimated based on the amount of bagasse produced as a by-product in the ethanol production. This value is likely underestimated.
  property price 0.01 EUR2005; name bagasse_input_price_EUR2005
    Temporary price data. Calculated as 90% of purchasers price based on: Source: ecoinvent report 17, page 380
  property carbon content, non-fossil 0.443; name bagasse_input_C_content_non_fossil
    biogene carbon content on a dry matter basis
    C content (dry matter basis) is 44.3% (Tab 16.31, ecoinvent v2.2 report 17)
  property dry mass 0.702 kg; name bagasse_input_DM
  property low calorific value 13.8 MJ/kg; name bagasse_input_calorific_value
  property carbon content 0.443
    carbon content on a dry matter basis (reserved; not for manual entry)
  properties: carbon content, fossil 0, water content 0.424501, water in wet mass 0.298 kg, wet mass 1 kg, carbon allocation 0.310986 kg
- heat, district or industrial, other than natural gas: 1 MJ; source Bauer, C. 2007; CPC 17300: Steam and hot water; By-product classification allocatable product; pedigree (1,1,1,1,1)
  Heat production is calculated based on heat efficiency of cogen unit (77%), lower calorific value of bagasse (13.8 MJ/kg dry mass) and dry mass of bagasse (0.702 w/w)
  production volume 1.17941e8 MJ

## By-products
- heat, district or industrial, other than natural gas: 0 MJ; name heat_output; = bagasse_input*(-1)*13.8*0.702*(77/100); source Bauer, C. 2007; CPC 17300: Steam and hot water; By-product classification allocatable product; pedigree (1,1,1,1,1)
  (same comment as for heat, district or industrial, other than natural gas)
  production volume 0 MJ; = bagasse_input_annual_production * heat_output
    Calculated from production volume of reference product using the relative outputs.
  property true value relation 0.169678; name heat_output_true_value_relation
    property to calculate "true value" from
  property exergy 0.169678 MJ; name heat_output_exergy
    allocation factor for electricity (=1) vs. heat, where heat is calculated as the termodynamic mean temperature Tm = (Tfeed-Treturn)/ln(Tfeed/Treturn), relative to the application temperature (Tu, typically = 293 K), i.e. (Tm-Tu)/Tm
  property price 0.0106 EUR2005; name heat_output_price_EUR2005
    Average European district heat price from Ecoheatcool and Euroheat 2005-2006, Ecoheat Work package 1: The European heat market. Final report. 10.6 EUR/GJ i s the price of district heat. http://www.solarthermalworld.org/files/Ecoheatcool%20WP1%20Web.pdf?download
- electricity, high voltage: 0 kWh; name electricity_output; = bagasse_input*0.702*13.8*(1/3.6)*(8/100)*(-1); source Bauer, C. 2007; CPC 17100: Electrical energy; By-product classification allocatable product; pedigree (1,1,1,1,1)
  Electricity production is calculated based on lower calorific value of bagasse (13.8 MJ/kg dry matter), the dry matter content (0.702 kg DM/kg fresh bagasse) and the electric efficiency of the cogen unit (8%).
  Note: 1 kWh= 3.6 MJ
  The electric effiency of the specific cogen unit can be found in the report for wood energy (see source).
  production volume 0 kWh; name electricity_annual_production; = bagasse_input_annual_production*electricity_output
    Calculated from production volume of reference product using the relative outputs.
  property price 0.0977 EUR2005; name electricity_output_price_EUR2005
    Temporary price data. Calculated as 90% of purchasers price based on: 94% of the average price (to account for a 6% loss in transformation and transmission) for electricity for industrial consumersin 2005 (excluded taxes). From IEA.
  property exergy 3.6 MJ; name electricity_output_exergy
    (same comment as for heat, district or industrial, other than natural gas)
  property true value relation 3.6; name electricity_output_true_value_relation
    property to calculate "true value" from
- heat, for reuse in municipal waste incineration only: 0 MJ; CPC 17300: Steam and hot water; By-product classification allocatable product; pedigree (1,1,1,1,1)
  Net electricity generated from this waste and used in internal MSWI plant energy redistribution.
  Uncertainty: uncertainty is calculated from uncertainties in waste composition and uncertainties in energy efficiency and the uncertainty in internal energy demand
  property exergy 0.1842 MJ; name E_th_prod_MSWI_exergy
    This exergy property is based on the exergy content of the product.
  property price 0.0106 EUR2005; name E_th_prod_MSWI_price_EUR2005
    (same comment as for heat, district or industrial, other than natural gas)
  property true value relation 0.1842; name E_th_prod_MSWI_true_value_relation
    property to calculate "true value" from
- electricity, for reuse in municipal waste incineration only: 0 kWh; CPC 17100: Electrical energy; By-product classification allocatable product; pedigree (1,1,1,1,1)
  (same comment as for heat, for reuse in municipal waste incineration only)
  property price 0.1 EUR2005; name E_el_prod_MSWI_price_EUR2005
    Estimated to be the same price as in case of electricity, medium voltage.
  property exergy 3.6 MJ; name E_el_prod_MSWI_exergy
    This exergy property is based on the exergy content of the product.
  property true value relation 3.6; name E_el_prod_MSWI_true_value_relation
    property to calculate "true value" from
- iron scrap, sorted, pressed: 0 kg; By-product classification Recyclable; CPC 39310: Slag, dross, scalings and other waste from the manufacture of iron or steel; pedigree (1,1,1,1,1)
  metallic iron scrap removed from ash reamains and recycled.
  Uncertainty: uncertainty is calculated from uncertainties in waste composition and transfer coefficients to soild residues
  property price 0.175 EUR2005
    Temporary price data. Calculated as 90% of purchasers price based on: 2005 import and export prices (total trades (USD) divided by total weight (kg) in biggest economies of the world: EU27, USA, Brasil, China, India, Japan and Russia) from UN Commodity Trade Statistics Database (http://data.un.org/Explorer.aspxDatabase [Accessed 2011.06.20]). Commodity: Waste or scrap, of cast iron
  property carbon content 0
    carbon content on a dry matter basis (reserved; not for manual entry)
  properties: carbon content, non-fossil 0, wet mass 1 kg, dry mass 1 kg, water content 0, carbon content, fossil 0, water in wet mass 0 kg, carbon allocation 0 kg
- copper: 0 kg; source Rentz O. 1999; By-product classification allocatable product; CPC 41413: Refined copper and copper alloys, unwrought; master alloys of copper
  Literature value. Copper uses: Before end-use copper is manufactured into semi fabricated products, such as shapes and ingots (known as 'semis'). These manufacturing processes are subdivided into hot working, cold working and, if necessary, process annealing. Few of the semis are ready for use as such. They more typically travel to first-stage manufacturers, who make metal rods, wire, and casting, and then to component manufacturers who produce such things as motors, valves, and insulated cables The components in turn are incorporated by final-stage manufacturers into a variety of finished products - automobiles, commercial buildings, residential housing, and so forth. These uses account for about 79% of the world-wide consumption of copper.
  property price 5.52 EUR2005
    Literature value (http://www.economist.com/news/business/21576714-mining-industry-has-enriched-chile-its-future-precarious-copper-solution). Average price between 20015 and 2013.
  property carbon content 0
    carbon content on a dry matter basis (reserved; not for manual entry)
  properties: dry mass 1 kg, water in wet mass 0 kg, wet mass 1 kg, carbon content, non-fossil 0, water content 0, carbon content, fossil 0, carbon allocation 0 kg
- zinc concentrate: 0 kg; CPC 14290: Other non-ferrous metal ores and concentrates (other than uranium or thorium ores and concentrates); By-product classification allocatable product
  Calculated value from the knowledge of the properties of both products.
  property price 0.38 EUR2005; name ByP_price_EUR2005
    Temporary price data. Calculated as 90% of purchasers price based on: Zinc content in concentrate 53%. Concentrate price per kg Zn 86.5% of refined Zn price (13.5% treatment charges according to CHR Metals Limited 2005: Dynamic cost curves. http://www.minecost.com/dynamic.pdf). 2004 zinc price from USGS (2007) Mineral commodity summaries 2007. <http://minerals.usgs.gov/minerals/pubs/mcs/2007/mcs2007.pdf> [Accessed 25 May 2010]
  property zinc content 0.53; name zinc_C_zinc_concentrate
    Zinc content on a dry matter basis. Value taken from teh "zinc mine operation" /GLO dataset.
  property dry mass 1 kg; name DM_zinc_concentrate
  property carbon content 0
    carbon content on a dry matter basis (reserved; not for manual entry)
  properties: wet mass 1 kg, water content 0, carbon content, non-fossil 0, carbon content, fossil 0, water in wet mass 0 kg, carbon allocation 0 kg
- iron scrap, unsorted: 0 kg; source European Aluminium Association 2008; CPC 39310: Slag, dross, scalings and other waste from the manufacture of iron or steel; By-product classification Recyclable; pedigree (1,1,1,1,1)
  property price 0.149 EUR2005; name ironScrapAmount_price_EUR2005
    Temporary price data. Calculated as 90% of purchasers price based on: estimated at 85% of sorted scrap
  property carbon content 0
    carbon content on a dry matter basis (reserved; not for manual entry)
  properties: water in wet mass 0 kg, water content 0, carbon content, fossil 0, carbon content, non-fossil 0, dry mass 1 kg, wet mass 1 kg, carbon allocation 0 kg
- aluminium oxide, non-metallurgical: 0 kg; source European Aluminium Association 2008; CPC 41432: Alumina (aluminium oxide), except artificial corundum; By-product classification allocatable product; CAS 1344-28-1; pedigree (1,1,1,1,1)
  property carbon content, non-fossil 0; name C_content_non_fossil
  property price 0.28 EUR2005; name Al2O3Amount_price_EUR2005
    From UN trade database. http://data.un.org/ Import data from the largest economies of the world are used (Brazil, India, USA, China, Japan and EU-27).
  property dry mass 1 kg; name DM
  property water content 0; name water_content
  property wet mass 1 kg; name WM
  property water in wet mass 0 kg; name WWM
  property carbon content, fossil 0; name C_content_fossil
  property carbon content 0
    carbon content on a dry matter basis (reserved; not for manual entry)
  properties: carbon allocation 0 kg
- aluminium, cast alloy: 0 kg; source European Aluminium Association 2008; By-product classification allocatable product; CPC 41431: Unwrought aluminium; pedigree (1,1,1,1,1)
  EcoSpold01Location=RER
  property price 1.3 EUR2005; name castAlloyAmount_price_EUR2005
    Temporary price data. Calculated as 90% of purchasers price based on: Source: London Metal Exchange, Aluminium alloy price for 2005
  property carbon content 0
    carbon content on a dry matter basis (reserved; not for manual entry)
  properties: water in wet mass 0 kg, carbon content, non-fossil 0, water content 0, dry mass 1 kg, carbon content, fossil 0, wet mass 1 kg, carbon allocation 0 kg
- aluminium, wrought alloy: 0 kg; source European Aluminium Association 2008; By-product classification allocatable product; CPC 4153: Semi-finished products of aluminium or aluminium alloys; pedigree (1,1,1,1,1)
  property price 1.44 EUR2005; name secondaryAluminiumOutput_price_EUR2005
    Estimated based on literature values and expert judgement. Aluminium ccast alloys are about 90% of the price of aluminium wrought alloys.
  property carbon content 0
    carbon content on a dry matter basis (reserved; not for manual entry)
  properties: wet mass 1 kg, water content 0, carbon content, fossil 0, water in wet mass 0 kg, carbon content, non-fossil 0, dry mass 1 kg, carbon allocation 0 kg

## Inputs from technosphere
- chemical, organic: 6.11026e-7 kg; = (5.74E-06* heat_output)/0.767; source Bauer, C. 2007; lognormal variance with pedigree 0.0726, pedigree (2,4,5,5,3)
  value adapted from dataset "wood chips, burned in cogen 6400kWh".
  In the original dataset, 5.74E-6 kg of chemical, organic are used to produce 0.767MJ end heat.
  EcoSpold01Location=GLO
  Uncertainty: etha+ project Alcosuisse, industrial data
  properties: dry mass 1 kg, wet mass 1 kg, carbon content, fossil 0.628
  note on carbon content, fossil: This dataset is an unweighted average of 20 organic substances (listed in Tab 88.1, ecoinvent v2.2 report 8, part II), being part of the top100 chemicals included in this database. The C-content has also been calculated as an unweighted average of the C content of the substances composing this dataset.
- sodium chloride, powder: 4.36448e-7 kg; = (4.1E-06* heat_output)/0.767; source Bauer, C. 2007; lognormal variance with pedigree 0.072, pedigree (4,4,5,5,1)
  value adapted from dataset "wood chips, burned in cogen 6400kWh".
  In the original dataset, 4.1E-6 kg of water are used to produce 0.767MJ end heat.
  EcoSpold01Location=RER
  Uncertainty: Adapted from the dataset 'wood chips, in cogen 6400kWth, wood', according to actual water, carbon and energy content of the fuel (wood chips u=40%)
  properties: dry mass 1 kg, wet mass 1 kg
- heat and power co-generation unit, 6400kW thermal, common components for heat+electricity: 1.02723e-10 unit; = heat_output/(0.85*20*4.68E7); source Bauer, C. 2007; lognormal variance with pedigree 0.372, pedigree (4,4,5,5,1)
  EcoSpold01Location=CH
  The demanded infrastructure is calculated as:
  demanded infrastrucutre (unit/MJend) = MJend energy (MJ)/(capacity utilzation rate * Lifetime (y) * capacity (MJ/unit*y)
  The capacity for the cogen unit is 4,67E7 MJ/y. The lifetime is 20 years. The capacity utilization rate is 0.85.
  Uncertainty: Adapted from the dataset 'wood chips, in cogen 6400kWth, wood', according to actual water, carbon and energy content of the fuel (wood chips u=40%)
- water, decarbonised: 0 kg; name water_decarbonised_input; = (0.000787* heat_output)/0.767; source Bauer, C. 2007; pedigree (1,1,1,1,1)
  EcoSpold01Location=RER
  value adapted from dataset "wood chips, burned in cogen 6400kWh".
  In the original dataset, 0.000787 kg of water are used to produce 0.767MJ end heat.
  value adapted from dataset "wood chips, burned in cogen 6400kWh".
  In the original dataset, 0.000787 kg of water are used to produce 0.767MJ end heat.
  Uncertainty: Adapted from the dataset 'wood chips, in cogen 6400kWth, wood', according to actual water, carbon and energy content of the fuel (wood chips u=40%)
  properties: wet mass 1 kg
- waste mineral oil: 0 kg; name waste_oil_output; = (3.28E-06* heat_output)/0.767; pedigree (1,1,1,1,1)
  EcoSpold01Location=CH
  value adapted from dataset "wood chips, burned in cogen 6400kWh".
  In the original dataset, 3.28E-6 kg of waste mineral oil are produced for 0.767MJ end heat.
  Uncertainty: Adapted from the dataset 'wood chips, in cogen 6400kWth, wood', according to actual water, carbon and energy content of the fuel (wood chips u=40%)
  production volume 0 kg; = municipal_waste_output* bagasse_input_annual_production
    Calculated from production volume of reference product using the relative outputs.
  property price 0 EUR2005; name waste_oil_output_price_EUR2005
  properties: dry mass 0.9 kg, wet mass 1 kg, carbon content, fossil 0.864444, water content 0.111111
  note on carbon content, fossil: Tab A.6, ecoinvent v2.2 report 13_I. C content has been calculated after data in the tables, and then referred to 1 kg DM
- wood ash mixture, pure: 0 kg; name wood_ash_output; = (1/100)* bagasse_input*(-1)*0.702; pedigree (1,1,1,1,1)
  for wood chips it is estimated that 1% of the dry mass is converted in ash. This is also assumed for bagasse.
  production volume 0 kg; = bagasse_input_annual_production * wood_ash_output
    Calculated from production volume of reference product using the relative outputs.
  property carbon content, non-fossil 0.012; name wood_ash_output_C_content_non_fossil
  property price 0 EUR2005; name wood_ash_output_price_EUR2005
  properties: dry mass 1 kg, wet mass 1 kg
  note on carbon content, non-fossil: biogene carbon content on a dry matter basis Tab A.9, ecoinvent v2.2 report 13_I.
- heat and power co-generation unit, 6400kW thermal, components for electricity only: 1.02723e-10 unit; = heat_output/(0.85*20*4.68E7); source Bauer, C. 2007; lognormal variance with pedigree 0.372, pedigree (4,4,5,5,1)
  The demanded infrastructure is calculated as:
  demanded infrastrucutre (unit/MJend) = MJend energy (MJ)/(capacity utilzation rate * Lifetime (y) * capacity (MJ/unit*y)
  The capacity for the cogen unit is 4,67E7 MJ/y. The lifetime is 20 years. The capacity utilization rate is 0.85.
  EcoSpold01Location=CH
  Uncertainty: Adapted from the dataset 'wood chips, in cogen 6400kWth, wood', according to actual water, carbon and energy content of the fuel (wood chips u=40%)
- municipal solid waste: 0 kg; name municipal_waste_output; = (3.28E-06* heat_output)/0.767; pedigree (1,1,1,1,1)
  EcoSpold01Location=CH
  value adapted from dataset "wood chips, burned in cogen 6400kWh".
  In the original dataset, 3.28E-6 kg of municipal solid waste are produced for 0.767MJ end heat.
  Uncertainty: Adapted from the dataset 'wood chips, in cogen 6400kWth, wood', according to actual water, carbon and energy content of the fuel (wood chips u=40%)
  production volume 0 kg; = municipal_waste_output* bagasse_input_annual_production
    Calculated from production volume of reference product using the relative outputs.
  property price 0 EUR2005; name municipal_waste_output_price_EUR2005
  properties: carbon content, fossil 0.171549, carbon content, non-fossil 0.261655, water content 0.297017, dry mass 0.771 kg, wet mass 1 kg
  note on carbon content, fossil: MSW composition in tab 4.1, ecoinvent v2.2 report 13_I. C content referred to 1 kg DM
- heat and power co-generation unit, 6400kW thermal, building: 2.56546e-11 unit; = heat_output/(0.85*80*4.68E7); source Bauer, C. 2007; lognormal variance with pedigree 0.372, pedigree (4,4,5,5,1)
  EcoSpold01Location=CH
  The demanded infrastructure is calculated as:
  demanded infrastrucutre (unit/MJend) = MJend energy (MJ)/(capacity utilzation rate * Lifetime (y) * capacity (MJ/unit*y)
  The capacity for the cogen unit is 4,67E7 MJ/y. The lifetime is 80 years. The capacity utilization rate is 0.85.
  Uncertainty: Adapted from the dataset 'wood chips, in cogen 6400kWth, wood', according to actual water, carbon and energy content of the fuel (wood chips u=40%)
- chlorine, liquid: 0 kg; = (3.28E-07* heat_output)/0.767; source Bauer, C. 2007; pedigree (1,1,1,1,1)
  EcoSpold01Location=RER
  value adapted from dataset "wood chips, burned in cogen 6400kWh".
  In the original dataset, 3.28E-7 kg of chlorine are used to produce 0.767MJ end heat.
  Uncertainty: Adapted from the dataset 'wood chips, in cogen 6400kWth, wood', according to actual water, carbon and energy content of the fuel (wood chips u=40%)
  properties: dry mass 1 kg, wet mass 1 kg
- water, decarbonised: 4.18895e-5, 2.18391e-6, 4.40265e-7, 1.44768e-6, 1.13885e-6, 1.0886e-7, 8.52193e-7, 2.2174e-6, 1.38671e-9, 7.99203e-8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 kg (13 entries); source Bauer, C. 2007; lognormal variance with pedigree 0.072, pedigree (4,4,5,5,1)
  (same comment as for water, decarbonised)
- waste mineral oil: -1.7063e-7, -3.9482e-9, -1.74578e-7 kg (3 entries); lognormal variance with pedigree 0.072, pedigree (4,4,5,5,1)
  (same comment as for waste mineral oil)
- wood ash mixture, pure: -2.7593e-5, -5.63318e-7, -2.81564e-5 kg (3 entries); lognormal variance with pedigree 0.0666, pedigree (4,5,5,5,3)
  (same comment as for wood ash mixture, pure)
  properties: carbon content, non-fossil 0.012, dry mass 1 kg, wet mass 1 kg
- municipal solid waste: -1.69915e-7, -1.04146e-9, -7.28773e-10, -2.89224e-9, -1.74578e-7 kg (5 entries); lognormal variance with pedigree 0.072, pedigree (4,4,5,5,1)
  (same comment as for municipal solid waste)
- chlorine, liquid: 1.74578e-8, 1.74578e-8 kg (2 entries); source Bauer, C. 2007; lognormal variance with pedigree 0.072, pedigree (4,4,5,5,1)
  (same comment as for chlorine, liquid)
- nitrogen fertiliser, as N: 2.97988e-5 kg; lognormal variance with pedigree 0.0707, pedigree (2,4,5,3,3)
  Etha+ project Alcosuisse, industrial data
  EcoSpold01Location=RER
  Uncertainty: etha+ project Alcosuisse, industrial data
- tap water: 0.0290235 kg; lognormal variance with pedigree 0.04, pedigree (1,1,5,1,1)
  Literature survey, industrial data
  EcoSpold01Location=RER
  Uncertainty: Literature survey, industrial data
- sulfuric acid: 7.44969e-5 kg; lognormal variance with pedigree 0.0707, pedigree (2,4,5,3,3)
  (same comment as for nitrogen fertiliser, as N)
- bagasse, from sweet sorghum: -0.0017607 kg
  EcoSpold01Location=CN
  production volume 780583 kg
- ammonia, liquid: 4.36462e-10, 4.36462e-10 kg (2 entries); lognormal variance with pedigree 0.072, pedigree (4,4,5,5,1)
  EcoSpold01Location=RER
  Adapted from the dataset 'wood chips, in cogen 6400kWth, wood', according to actual water, carbon and energy content of the fuel (pressed sorghum bagasse)
  Uncertainty: Adapted from the dataset 'wood chips, in cogen 6400kWth, wood', according to actual water, carbon and energy content of the fuel (pressed sorghum bagasse)
- lubricating oil: 6.28003e-7 kg; lognormal variance with pedigree 0.070625, pedigree (2,4,5,2,3)
  EcoSpold01Location=RER
  Compilation of data from sugarcane and sorghum milling, industrial data
  Uncertainty: Compilation of data from sugarcane and sorghum milling, industrial data
- sweet sorghum stem: 0.0678262 kg; lognormal variance with pedigree 0.0406, pedigree (2,1,5,1,1)
  EcoSpold01Location=CN
  Average ethanol yields in China, literature survey
  Uncertainty: Average ethanol yields in China, literature survey
- ethanol fermentation plant: 1.97598e-12 unit; lognormal variance with pedigree 0.3527, pedigree (2,4,5,3,1)
  Calculation, according to feed capacity and lifetime of the plant
  EcoSpold01Location=CH
  Uncertainty: Calculation, according to feed capacity and lifetime of the plant
- wastewater, average: -4.18895e-8 m3; lognormal variance with pedigree 0.072, pedigree (4,4,5,5,1)
  Adapted from the dataset 'wood chips, in cogen 6400kWth, wood', according to actual water, carbon and energy content of the fuel (pressed sorghum bagasse)
  EcoSpold01Location=CH
  Uncertainty: Adapted from the dataset 'wood chips, in cogen 6400kWth, wood', according to actual water, carbon and energy content of the fuel (pressed sorghum bagasse)
  production volume 37.1423 m3
- ammonium sulfate, as N: 1.98656e-5 kg; lognormal variance with pedigree 0.0707, pedigree (2,4,5,3,3)
  EcoSpold01Location=RER
  Etha+ project Alcosuisse, industrial data
  Uncertainty: etha+ project Alcosuisse, industrial data
- lubricating oil: 6.28003e-7 kg; lognormal variance with pedigree 0.0726, pedigree (2,4,5,5,3)
  Compilation of data from sugarcane and sorghum milling, industrial data
  EcoSpold01Location=RER
  Uncertainty: Compilation of data from sugarcane and sorghum milling, industrial data
- sulfuric acid: 7.44969e-5 kg; lognormal variance with pedigree 0.0726, pedigree (2,4,5,5,3)
  (same comment as for ammonium sulfate, as N)
- tap water: 7.02903e-5, 0.0250309, 0.000583937, 0.000116166, 0.00292925, 7.62038e-5, 0.00021676 kg (7 entries); lognormal variance with pedigree 0.042, pedigree (1,1,5,5,1)
  EcoSpold01Location=RER
  Literature survey, industrial data
  Uncertainty: Literature survey, industrial data
- wastewater, average: -4.08927e-9, -3.78002e-8 m3 (2 entries)
  EcoSpold01Location=CH
  Adapted from the dataset 'wood chips, in cogen 6400kWth, wood', according to actual water, carbon and energy content of the fuel (pressed sorghum bagasse)
  production volume 715.181 m3

## Inputs from nature
- Carbon dioxide, in air [natural resource, in air]: 0.00421086 kg; lognormal variance with pedigree 0.04, pedigree (1,1,5,1,1)
  Calculation, to close carbon balance
  Uncertainty: Calculation, to close carbon balance

## Emissions to nature
- Mercury [air, urban air close to ground]: 3.19353e-11 kg; = 3.53E-10* bagasse_input*(-1)*13.8*0.702; source Bauer, C. 2007; lognormal variance with pedigree 0.722, pedigree (4,4,5,5,1)
  calculated from the emission factor (kg/MJ input) given for cogen 6400kW.
  Uncertainty: Adapted from the dataset 'wood chips, in cogen 6400kWth, wood', according to actual water, carbon and energy content of the fuel (wood chips u=40%)
- Zinc [air, urban air close to ground]: 3.19353e-8 kg; = 3.53E-07* bagasse_input*(-1)*13.8*0.702; source Bauer, C. 2007; lognormal variance with pedigree 0.722, pedigree (4,4,5,5,1)
  (same comment as for Mercury)
- Copper [air, urban air close to ground]: 2.3419e-9 kg; = 2.59E-08* bagasse_input*(-1)*13.8*0.702; source Bauer, C. 2007; lognormal variance with pedigree 0.722, pedigree (4,4,5,5,1)
  (same comment as for Mercury)
- Chlorine [air, urban air close to ground]: 1.91609e-8 kg; = 2.12E-07* bagasse_input*(-1)*13.8*0.702; source Bauer, C. 2007; lognormal variance with pedigree 0.112, pedigree (4,4,5,5,1)
  calculated from the emission factor (kg/MJ input) given for cogen 6400kW.
  Uncertainty: Adapted from the dataset 'wood chips, in cogen 6400kWth, wood', according to actual water, carbon and energy content of the fuel (pressed sorghum bagasse)
- Calcium [air, urban air close to ground]: 6.2274e-7 kg; = 6.88E-06* bagasse_input*(-1)*13.8*0.702; source Bauer, C. 2007; lognormal variance with pedigree 0.722, pedigree (4,4,5,5,1)
  (same comment as for Mercury)
- Acetaldehyde [air, urban air close to ground]: 6.49348e-9 kg; = 7.18E-08* bagasse_input*(-1)*13.8*0.702; source Bauer, C. 2007; lognormal variance with pedigree 0.112, pedigree (4,4,5,5,1)
  (same comment as for Mercury)
- PAH, polycyclic aromatic hydrocarbons [air, urban air close to ground]: 1.05009e-9 kg; = 1.31E-08* bagasse_input*(-1)*13.8*0.702; source Bauer, C. 2007; lognormal variance with pedigree 0.372, pedigree (4,4,5,5,1)
  (same comment as for Mercury)
- Water [air, unspecified]: 5.36191e-8 m3; name water_to_air_unspecified; = (water_decarbonised_input/1000)*fraction_WDC_to_air; lognormal variance with pedigree 0.130025, pedigree (4,4,5,2,4)
  Calculated value based on literature values and expert opinion. See comments in the parametres' comment field.
  property fraction, origin: fresh water 1; name fraction_origin_fresh_water
  property fraction, origin: salt water 0; name fraction_origin_salt_water
  property fraction, origin: unspecified 0; name fraction_origin_unspecified
- Sodium [air, urban air close to ground]: 1.38386e-7 kg; = 1.53E-06* bagasse_input*(-1)*13.8*0.702; source Bauer, C. 2007; lognormal variance with pedigree 0.722, pedigree (4,4,5,5,1)
  (same comment as for Mercury)
- Phenol, pentachloro- [air, urban air close to ground]: 7.73219e-13 kg; = 9.53E-12* bagasse_input*(-1)*13.8*0.702; source Bauer, C. 2007; lognormal variance with pedigree 0.112, pedigree (4,4,5,5,1)
  (same comment as for Mercury)
- Water [water, unspecified]: 5.80763e-5 m3; name water_to_water_unspecified; = (water_decarbonised_input/1000)*(1-fraction_WDC_to_air); lognormal variance with pedigree 0.130025, pedigree (4,4,5,2,4)
  (same comment as for Water)
  property fraction, origin: fresh water 1; name fraction_origin_fresh_water_Ww
  property fraction, origin: unspecified 0; name fraction_origin_unspecified_Ww
  property fraction, origin: salt water 0; name fraction_origin_salt_water_Ww
- Cadmium [air, urban air close to ground]: 7.45139e-11 kg; = 8.24E-10* bagasse_input*(-1)*13.8*0.702; source Bauer, C. 2007; lognormal variance with pedigree 0.722, pedigree (4,4,5,5,1)
  (same comment as for Chlorine)
- Benzene, hexachloro- [air, urban air close to ground]: 0 kg; = 8.47E-15* bagasse_input*(-1)*13.8*0.702; source Bauer, C. 2007; pedigree (1,1,1,1,1)
  (same comment as for Mercury)
- Formaldehyde [air, urban air close to ground]: 1.24102e-8 kg; = 1.53E-07* bagasse_input*(-1)*13.8*0.702; source Bauer, C. 2007; lognormal variance with pedigree 0.5906, pedigree (2,1,5,1,5)
  calculated from the emission factor (kg/MJ input) given for cogen 6400kW.
- Chromium [air, urban air close to ground]: 4.21547e-10 kg; = 4.66E-09* bagasse_input*(-1)*13.8*0.702; source Bauer, C. 2007; lognormal variance with pedigree 0.722, pedigree (4,4,5,5,1)
  (same comment as for Mercury)
- Dinitrogen monoxide [air, urban air close to ground]: 2.44839e-7 kg; = 2.71E-06* bagasse_input*(-1)*13.8*0.702; source Bauer, C. 2007; lognormal variance with pedigree 0.112, pedigree (4,4,5,5,1)
  (same comment as for Mercury)
- Magnesium [air, urban air close to ground]: 3.8429e-8 kg; = 4.24E-07* bagasse_input*(-1)*13.8*0.702; source Bauer, C. 2007; lognormal variance with pedigree 0.722, pedigree (4,4,5,5,1)
  (same comment as for Mercury)
- Lead [air, urban air close to ground]: 2.65065e-9 kg; = 2.49E-08* bagasse_input*(-1)*13.8*0.702; source Bauer, C. 2007; lognormal variance with pedigree 0.722, pedigree (4,4,5,5,1)
  (same comment as for Mercury)
- Benzo(a)pyrene [air, urban air close to ground]: 4.77307e-11 kg; = 5.88E-10* bagasse_input*(-1)*13.8*0.702; source Bauer, C. 2007; lognormal variance with pedigree 0.372, pedigree (4,4,5,5,1)
  (same comment as for Mercury)
- Carbon dioxide, non-fossil [air, urban air close to ground]: 0.0209393 kg; name carbon_dioxide; = ((0.31099* bagasse_input*-1) - ( carbon_monoxide*(12/28))- (0.0012* wood_ash_output))*( carbon_dioxide_MW/12); lognormal variance with pedigree 0.042, pedigree (1,1,5,5,1)
  It is assumed that all carbon content in bagasse leaves the system as emissions (CO and CO2) and ash (wood ash). The CO2 emissions are calculated by substracting the amount of C in the bagasse to the amount of carbon that leaves the system as CO (7mg/MJend) and ash (1.2E-3kg/kg ash). The rest of C is assumed to leave the system as CO2. The calculations are done using the molecular weight (MW) and carbon content with the following steps:
  mass of C in input bagasse=(0.31099kgC/1kg bagasse)* mass input bagasse
  mass of C as CO = output emissions CO (kg) * MWC / MWCO
  mass of C as ash = carbon content in ash (kg/kg) * output ash (kg)
  emissions of C as CO2= mass of C in input bagasse - mass of C as CO - mass of C in ash
  emissions of CO2=emissions of C as CO2 * (MW CO2/MW C)
  Note: molecular weight of C is 12 g/mol
  Uncertainty: Adapted from the dataset 'wood chips, in cogen 6400kWth, wood', according to actual water, carbon and energy content of the fuel (wood chips u=40%)
  property molecular weight 44 g/mol; name carbon_dioxide_MW
- Potassium [air, urban air close to ground]: 2.49092e-6 kg; = 2.75E-05* bagasse_input*(-1)*13.8*0.702; source Bauer, C. 2007; lognormal variance with pedigree 0.722, pedigree (4,4,5,5,1)
  (same comment as for Mercury)
- Arsenic [air, urban air close to ground]: 1.06453e-10 kg; = 1.18E-09* bagasse_input*(-1)*13.8*0.702; source Bauer, C. 2007; lognormal variance with pedigree 0.722, pedigree (4,4,5,5,1)
  (same comment as for Mercury)
- Phosphorus [air, urban air close to ground]: 3.19353e-8 kg; = 3.53E-07* bagasse_input*(-1)*13.8*0.702; source Bauer, C. 2007; lognormal variance with pedigree 0.112, pedigree (4,4,5,5,1)
  (same comment as for Mercury)
- Benzene [air, urban air close to ground]: 8.68718e-8 kg; = 1.07E-6* bagasse_input*(-1)*13.8*0.702; source Bauer, C. 2007; lognormal variance with pedigree 0.112, pedigree (4,4,5,5,1)
  (same comment as for Mercury)
- Hydrocarbons, aliphatic, unsaturated [air, urban air close to ground]: 2.95926e-7 kg; = 3.65E-06* bagasse_input*(-1)*13.8*0.702; source Bauer, C. 2007; lognormal variance with pedigree 0.112, pedigree (4,4,5,5,1)
  (same comment as for Mercury)
- Bromine [air, urban air close to ground]: 6.38706e-9 kg; = 7.06E-08* bagasse_input*(-1)*13.8*0.702; source Bauer, C. 2007; lognormal variance with pedigree 0.722, pedigree (4,4,5,5,1)
  (same comment as for Mercury)
- Manganese [air, urban air close to ground]: 1.82032e-8 kg; = 4.24E-07* bagasse_input*(-1)*13.8*0.702; source Bauer, C. 2007; lognormal variance with pedigree 0.722, pedigree (4,4,5,5,1)
  (same comment as for Mercury)
- Benzene, ethyl- [air, urban air close to ground]: 2.86383e-9 kg; = 3.53E-08* bagasse_input*(-1)*13.8*0.702; source Bauer, C. 2007; lognormal variance with pedigree 0.112, pedigree (4,4,5,5,1)
  (same comment as for Mercury)
- Chromium VI [air, urban air close to ground]: 4.25806e-12 kg; = 4.71E-11* bagasse_input*(-1)*13.8*0.702; source Bauer, C. 2007; lognormal variance with pedigree 0.722, pedigree (4,4,5,5,1)
  (same comment as for Mercury)
- Sulfur dioxide [air, urban air close to ground]: 2.65065e-7 kg; = 2.49E-06* bagasse_input*(-1)*13.8*0.702; source Bauer, C. 2007; lognormal variance with pedigree 0.072, pedigree (4,4,5,5,1)
  (same comment as for Chlorine)
- Nickel [air, urban air close to ground]: 6.38706e-10 kg; = 7.06E-09* bagasse_input*(-1)*13.8*0.702; source Bauer, C. 2007; lognormal variance with pedigree 0.722, pedigree (4,4,5,5,1)
  (same comment as for Mercury)
- Nitrogen oxides [air, urban air close to ground]: 9.36748e-6 kg; = 1.14E-04* bagasse_input*(-1)*13.8*0.702; source Bauer, C. 2007; lognormal variance with pedigree 0.112, pedigree (4,4,5,5,1)
  (same comment as for Mercury)
- Carbon monoxide, non-fossil [air, urban air close to ground]: 6.68224e-7 kg; name carbon_monoxide; = 7E-06*13.8*0.702*(77/100); source Bauer, C. 2007; lognormal variance with pedigree 0.722, pedigree (4,4,5,5,1)
  It is assumed that 7 mg of CO are produced per MJend. To calculate this, the calorific value of bagasse, the dry matter content and calorific efficiency of the cogen are used.
  Uncertainty: Adapted from the dataset 'wood chips, in cogen 6400kWth, wood', according to actual water, carbon and energy content of the fuel (wood chips u=40%)
  property molecular weight 28 g/mol; name carbon_monoxide_MW
- Fluorine [air, urban air close to ground]: 5.32253e-9 kg; = 5.88E-08* bagasse_input*(-1)*13.8*0.702; source Bauer, C. 2007; lognormal variance with pedigree 0.112, pedigree (4,4,5,5,1)
  (same comment as for Chlorine)
- NMVOC, non-methane volatile organic compounds, unspecified origin [air, urban air close to ground]: 5.82309e-8 kg; = 7.06E-07* bagasse_input*(-1)*13.8*0.702; source Bauer, C. 2007; lognormal variance with pedigree 0.112, pedigree (4,4,5,5,1)
  (same comment as for Mercury)
- Dioxins, measured as 2,3,7,8-tetrachlorodibenzo-p-dioxin [air, urban air close to ground]: 2.95926e-15 kg; = 3.65E-14* bagasse_input*(-1)*13.8*0.702; source Bauer, C. 2007; lognormal variance with pedigree 0.372, pedigree (4,4,5,5,1)
  (same comment as for Mercury)
- m-Xylene [air, urban air close to ground]: 1.14552e-8 kg; = 1.41E-07* bagasse_input*(-1)*13.8*0.702; source Bauer, C. 2007; lognormal variance with pedigree 0.112, pedigree (4,4,5,5,1)
  (same comment as for Mercury)
- Hydrocarbons, aliphatic, alkanes, unspecified [air, urban air close to ground]: 8.68718e-8 kg; = 1.07E-06* bagasse_input*(-1)*13.8*0.702; source Bauer, C. 2007; lognormal variance with pedigree 0.112, pedigree (4,4,5,5,1)
  (same comment as for Chlorine)
- Methane, non-fossil [air, urban air close to ground]: 4.14303e-8 kg; = 4.71E-07* bagasse_input*(-1)*13.8*0.702; source Bauer, C. 2007; lognormal variance with pedigree 0.112, pedigree (4,4,5,5,1)
  (same comment as for Mercury)
- Toluene [air, urban air close to ground]: 2.86383e-8 kg; = 3.53E-07* bagasse_input*(-1)*13.8*0.702; source Bauer, C. 2007; lognormal variance with pedigree 0.112, pedigree (4,4,5,5,1)
  (same comment as for Mercury)
- Ammonia [air, urban air close to ground]: 1.85227e-7 kg; = 2.04E-06* bagasse_input*(-1)*13.8*0.702; source Bauer, C. 2007; lognormal variance with pedigree 0.082, pedigree (4,4,5,5,1)
  (same comment as for Mercury)
- Particulates, < 2.5 um [air, urban air close to ground]: 4.28621e-6 kg; = 7.18E-05* bagasse_input*(-1)*13.8*0.702; source Bauer, C. 2007; lognormal variance with pedigree 0.372, pedigree (4,4,5,5,1)
  (same comment as for Mercury)

## Extrapolations
The original dataset is valid is based on measures from one cogen unit in Switzerland and has been extrapolated to a global dataset

## Review by Emilia Moreno Ruiz 2015-10-30
PV adjusted
