# oriented strand board production

Dataset: EcoSpold 2, unit process
Geography: RoW
Time period: 2012-01-01 to 2019-12-31
Technology level: current
Classification: ISIC rev.4 ecoinvent: 1621:Manufacture of veneer sheets and wood-based panels
Classification: EcoSpold01Categories: wooden materials/processing
Synonyms: OSB
Scenario: Business-as-Usual
System model: Allocation at the point of substitution
Generated by: Frank Werner
Database: ecoinvent
isCopyrightProtected: true
accessRestrictedTo: 1

## General comment
This dataset represents oriented strand board production as the weighted average of oriented strand board produced by the members of the European Panel Federation (EPF)
Oriented strand board (OSB) is a structural panel made from wood strands, flaked from round wood. OSB is a structural panel, consisting of a sheet material in which rather long strands of wood are bonded together with a synthetic resin adhesive. The strands are orientated in a particular direction in the two outer layers of the panel, and sometimes also in all three layers. OSB varies in colour from a light straw colour to a medium brown depending on the wood species, resin system and pressing conditions. Waterproof and boil proof resin binders are combined with the strands to improve internal strength, rigidity and moisture resistance.
Typical densities are 600-680 kg/m3; typical thickness is in a range of 6 to 40 mm.
The inventoried oriented strand board has the following composition:
OSB is characterised by an excellent strength-to-weight ratio and high mechanical strength, resulting from the uninterrupted wood fibre, interweaving of the long strands and degree of orientation of strands in the surface layers. It is resistant to distortion, splitting and de-lamination. It is dimensionally stable, easy to work and flaw free. It is fully recyclable.
European standards describe different types of OSB:
OSB/1 : boards for general purpose use and interior use in dry conditions
OSB/2 : boards for load-bearing in dry conditions
OSB/3 : boards for load-bearing in wet/moist conditions
OSB/4 : high-specification boards for load-bearing in wet/moist conditions
In construction projects, OSB applications comprise for example:
• wall sheeting - high strength and racking performance under all types of exterior cladding,
• roof sheeting - uniformly sound and extra rigid to handle snow and wind loads, sacking for pitched tiles on slated roofs, structural decking on joists for flat roofs,
• subfloors - strong, rigid and impact-resistant for underlayment, carpet or tiles,
• single-layer floors - directly under carpet, lightweight concrete or hardwood,
• underlayment - uniformly thin yet strong and finely sanded, provides a smooth and uniform base for vinyl or tiles,
• I-joists - a high quality support system that minimizes deflection, provides for long spans and minimizes floor squeaking.
Because it's engineered, OSB can be custom manufactured to meet specific requirements in thick-ness, density, panel size, surface texture, strength and rigidity. OSB is also highly workable, making it easy to saw, drill, nail, plane, file, glue, paint and sand.
OSB is also used as concrete shuttering or framework and for high-quality and high specification packaging. Other OSB uses are (EPF website, 2011):
• in fair- and shop-fittings, for both structural and decorative components
• in furniture manufacture, as decorative furniture and to reduce thickness and weight of furniture components (chair seats and backs, furniture frames, desk tops under lamination);
• for vehicle and wagon interiors;
• for hoarding and barriers, shutters and fences;
• for dry storage pallets.

## Included activities start
From the reception at the factory gate of all materials and fuels used.

## Included activities end
Activity ends with the uncoated oriented strand board at the factory gate.

## Geography
Representation of the production of the member companies of the European Panel Federation (EPF).

## Technology
Key elements in the production are the stranders in which strands are produced. These strands retain the natural strength properties of the wood and are critical to the quality of the finished product. The dry strands are metered into the blender where they are tumbled into a rotating drum with a fine mist of wax and resin. The resin/wax bonds the strands in the pressing process and enhances the moisture resilience of the board. The coated strands are then conveyed overhead to the forming line where a "mat" of flakes is laid on a continuous belt conveyor by a cut-off saw. This mat is loaded in a press where, under high temperature and pressure, a sheet of OSB is formed. In the finishing area the product is trimmed and cut to produce the finished OSB board. Production is subject to the regulations of the Industrial Emissions Directive (EU-IED, 2011) if the production capacity exceeds 600 m3 per day where one or more of the following wood-based panels are produced: oriented strand board particle, board or fibreboard.

## Parameters
- input wood fuel: 3596.62 MJ; name wood_fuel; = 188.7*19.06
  input of wood fuel used in production, i.e. wood fuel from forestry, internal wood residues, post-consumer wood used for energy purposes, etc; expressed in MJ of absolutely dry mass (lower heating value at humidity u=0%)

## Reference product
- bark chips, wet, measured as dry mass: 1 kg; name w_bark; By-product classification allocatable product; CPC 31230: Wood in chips or particles; pedigree (1,1,1,1,1)
  bark from debarking of logs, not used energetically
  production volume 1.26013e8 kg; = w_bark*p_board
    Calculated from production volume of reference product using the relative outputs.
  property price 0.034 EUR2005; name w_bark_price_EUR2005
    Expert judgement (Urs Luginbühl, Swiss Sawmilling industry, personal communication in June 2014). Cross-reference; FAOSTAT database; http://faostat.fao.org/site/626/DesktopDefault.aspx?PageID=626#ancor; Average import/export prices of EU for 'chips and particles'. Price: 48.76 Euro/m3. The density of the wood chips is 650 kg/m3. The price is calculated to be 0.075 EUR/kg.
  property carbon content 0.494
    carbon content on a dry matter basis (reserved; not for manual entry)
  property true value 0.7208; name w_bark_true_value
    allocation property applied in "true value" allocation // value calculated from revenue
  properties: wet mass 2.4 kg, water content 1.4, dry mass 1 kg, water in wet mass 1.4 kg, carbon content, fossil 0, carbon content, non-fossil 0.494, carbon allocation 0.494 kg
- oriented strand board: 0 m3; CPC 31432: Oriented strand board (OSB); By-product classification allocatable product
  production volume 5.86625e6 m3; name p_board
    FaoStat 2011
  property dry mass 581.7 kg; name OSB_DM; = OSB_WM-OSB_WWM
  property water content 0.0434932; = OSB_WWM/OSB_DM
  property carbon content, non-fossil 0.461899; = 543.9*0.494/OSB_DM
    carbon in wood divided by dry mass
  property wet mass 607 kg; name OSB_WM
  property water in wet mass 25.3 kg; name OSB_WWM
  property carbon content 0.534051
    carbon content on a dry matter basis (reserved; not for manual entry)
  property true value 566
    allocation property applied in "true value" allocation // value calculated from revenue
  properties: carbon content, fossil 0.0721522, price 566 EUR2005, carbon allocation 310.658 kg

## By-products
- residual wood, dry: 0 m3; name w_chips; CPC 39283: Non-agglomerated wood waste and scrap; By-product classification allocatable product; pedigree (1,1,1,1,1)
  Emission factor from DS on heat generation from industrial residual wood mulitplied by the input of wood fuel (direct wood fuel plus production residues)
  production volume 524454 m3; = p_board * (Ref('5ec1c360-3f46-4b89-95ca-b27e30c3afc6') / Ref('a24a6e13-199e-49e3-a533-8a72af1a2850'))
    Calculated from production volume of reference product using the relative outputs.
  property price 26.9 EUR2005; name w_chips_price_EUR2005
    Temporary price data. Calculated as 90% of purchasers price based on: 2004 prices for World Import/Export (USD/cubicmeter) from FaoStat (http://faostat.fao.org/site/626/default.aspx#ancor, [accessed 10th June 2010]) Commodity: 'Chips and Particles' assuming this is for air-dry chips (10% water on a dry matter basis at 650 kg/m3) and no price difference for water content (i.e. assuming air-drying).
  property carbon content 0.494
    carbon content on a dry matter basis (reserved; not for manual entry)
  property true value 2.38676; name w_chips_true_value
    allocation property applied in "true value" allocation // value calculated from revenue
  properties: water content 0.15, carbon content, fossil 0, wet mass 632.5 kg, dry mass 550 kg, carbon content, non-fossil 0.494, water in wet mass 82.5 kg, carbon allocation 271.7 kg
- heat, for reuse in municipal waste incineration only: 0 MJ; CPC 17300: Steam and hot water; By-product classification allocatable product; pedigree (1,1,1,1,1)
  Net electricity generated from this waste and used in internal MSWI plant energy redistribution.
  Uncertainty: uncertainty is calculated from uncertainties in waste composition and uncertainties in energy efficiency and the uncertainty in internal energy demand
  production volume 550816 MJ
  property exergy 0.1842 MJ; name E_th_prod_MSWI_exergy
    This exergy property is based on the exergy content of the product.
  property price 0.0106 EUR2005; name E_th_prod_MSWI_price_EUR2005
    Average European district heat price from Ecoheatcool and Euroheat 2005-2006, Ecoheat Work package 1: The European heat market. Final report. 10.6 EUR/GJ i s the price of district heat. http://www.solarthermalworld.org/files/Ecoheatcool%20WP1%20Web.pdf?download
  property true value relation 0.1842; name E_th_prod_MSWI_true_value_relation
    property to calculate "true value" from
  property true value 0.000617952
    allocation property applied in "true value" allocation // value calculated from true value relation
- electricity, for reuse in municipal waste incineration only: 0 kWh; CPC 17100: Electrical energy; By-product classification allocatable product; pedigree (1,1,1,1,1)
  (same comment as for heat, for reuse in municipal waste incineration only)
  production volume 63224.5 kWh
  property price 0.1 EUR2005; name E_el_prod_MSWI_price_EUR2005
    Estimated to be the same price as in case of electricity, medium voltage.
  property exergy 3.6 MJ; name E_el_prod_MSWI_exergy
    This exergy property is based on the exergy content of the product.
  property true value relation 3.6; name E_el_prod_MSWI_true_value_relation
    property to calculate "true value" from
  property true value 0.00138016
    (same comment as for heat, for reuse in municipal waste incineration only)
- biogas: 0 m3; source Raboni, Massimo 2014; By-product classification allocatable product; CPC 17200: Coal gas, water gas, producer gas and similar gases, other than petroleum gases and other gaseous hydrocarbons; pedigree (1,1,1,1,1)
  An average yield of 100 litres of biogas per kg biowaste is assumed
  production volume 3813.04 m3
  property price 0.109 EUR2005; name biogas_yield_price_EUR2005
    Temporary price data. Calculated as 90% of purchasers price based on: Same prices per energy output as natural gas, based on the proportional lower heating value (2/3 that of natural gas)
  property carbon content, non-fossil 0.449939
    Total C content in kg/Nm3 (Tab 12.8, ecoinvent v2.2 report n17), referred to 1kg DM
  property carbon content 0.449939
    carbon content on a dry matter basis (reserved; not for manual entry)
  property true value 6.99229e-5
    allocation property applied in "true value" allocation // value calculated from revenue
  properties: water in wet mass 0 kg, wet mass 1.15 kg, carbon content, fossil 0, lower heating value 0 MJ/Nm3, water content 0, dry mass 1.15 kg, carbon allocation 0.51743 kg
- zinc concentrate: 0 kg; CPC 14290: Other non-ferrous metal ores and concentrates (other than uranium or thorium ores and concentrates); By-product classification allocatable product
  Calculated value from the knowledge of the properties of both products.
  production volume 0.150502 kg
  property price 0.38 EUR2005; name ByP_price_EUR2005
    Temporary price data. Calculated as 90% of purchasers price based on: Zinc content in concentrate 53%. Concentrate price per kg Zn 86.5% of refined Zn price (13.5% treatment charges according to CHR Metals Limited 2005: Dynamic cost curves. http://www.minecost.com/dynamic.pdf). 2004 zinc price from USGS (2007) Mineral commodity summaries 2007. <http://minerals.usgs.gov/minerals/pubs/mcs/2007/mcs2007.pdf> [Accessed 25 May 2010]
  property zinc content 0.53; name zinc_C_zinc_concentrate
    Zinc content on a dry matter basis. Value taken from teh "zinc mine operation" /GLO dataset.
  property dry mass 1 kg; name DM_zinc_concentrate
  property carbon content 0
    carbon content on a dry matter basis (reserved; not for manual entry)
  property true value 9.6216e-9
    allocation property applied in "true value" allocation // value calculated from revenue
  properties: wet mass 1 kg, water content 0, carbon content, non-fossil 0, carbon content, fossil 0, water in wet mass 0 kg, carbon allocation 0 kg
- compost: 0 kg; CPC 391: Wastes from food and tobacco industry; By-product classification allocatable product; pedigree (1,1,1,1,1)
  EcoSpold01Location=CH
  Biowaste is reduced in mass by a factor of 2 during composting
  production volume 303754 kg
  property water in wet mass 0.472 kg; name Water_in_wet_mass_compost; = 1- DM_compost
  property price 0.03 EUR2005
    Temporary price data. Calculated as 90% of purchasers price based on: Estimation done using the following sources: <http://www.wmaa.asn.au/uploads/documents/MarkWinser_1May2007.pdf>; <http://www.swlf.ait.ac.th/UpdData/International/Composting%20and%20anaerobic%20digestion_%20comparions%20for%20Europe%20and%20Asia.pdf>; <http://www.epa.gov/osw/conserve/rrr/composting/basic.htm>, accessed 2011.06.16
  property carbon content, non-fossil 0.1165
    calculation: dry matter 50%, organic matter 40% of dry matter, C content calculated from organic matter divided by 1.72. Relative to dry matter; relative to fresh matter: divided by 2 => 0.1156
  property dry mass 0.528 kg; name DM_compost
  property water content 0.893939; name Water_content_compost; = Water_in_wet_mass_compost/DM_compost
  property concentration, cadmium 0 kg/kg; name Mass_compost_concentration_Cd; = Mass_biowaste_concentration_Cd*2
    Biowaste mass is reduced by a factor of two during composting, therefore concentration is doubled
  property humus equivalent 0.061 kg
    Humus building fraction expressed in kg per kg product on a FM basis. Humus denotes the converted, primary biomass from plants or animals in the ground. More information can be found in the documentation of the composting itself: "treatment of biowaste, industrial composting".
  property concentration, copper 0 kg/kg; name Mass_compost_concentration_Cu; = Mass_biowaste_concentration_Cu*2
    (same comment as for compost)
  property concentration, calcium 0 kg/kg; name Mass_compost_Ca_concentration; = Mass_biowaste_concentration_Ca*2
    (same comment as for compost)
  property concentration, magnesium 0 kg/kg; name Mass_compost_Mg_concentration; = Mass_biowaste_concentration_Mg*2
    (same comment as for compost)
  property concentration, mercury 0 kg/kg; name Mass_compost_Hg_concentration; = Mass_biowaste_concentration_Hg*2
    (same comment as for compost)
  property concentration, lead 0 kg/kg; name Mass_compost_concentration_Pb; = Mass_biowaste_concentration_Pb*2
    (same comment as for compost)
  property concentration, nickel 0 kg/kg; name Mass_compost_Ni_concentration; = Mass_biowaste_concentration_Ni*2
    (same comment as for compost)
  property concentration, phosphorus 0 kg/kg; name Mass_compost_P_concentration; = Mass_biowaste_concentration_P*2
    (same comment as for compost)
  property concentration, sulfur 0 kg/kg; name Mass_compost_concentration_S; = Mass_biowaste_concentration_S*2
    (same comment as for compost)
  property concentration, potassium 0 kg/kg; name Mass_compost_K_concentration; = Mass_biowaste_concentration_K*2
    (same comment as for compost)
  property nickel content 1.60606e-5; name Mass_compost_Ni_content; = Mass_biowaste_Ni_content/0.5*( DM_biowaste / DM_compost)
    nickel content on a dry matter basis
  property concentration, nitrogen 0 kg/kg; = Mass_biowaste_concentration_N*2
    (same comment as for compost)
  property concentration, zinc 0 kg/kg; name Mass_compost_concentration_Zn; = Mass_biowaste_concentration_Zn*2
    (same comment as for compost)
  property lead content 2.66667e-5; name Mass_compost_Pb_content; = Mass_biowaste_Pb_content/0.5*( DM_biowaste / DM_compost)
    lead content on a dry matter basis
  property copper content 3.81818e-5; name Mass_compost_Cu_content; = Mass_biowaste_Cu_content/0.5*( DM_biowaste / DM_compost)
    copper content on a dry matter basis
  property cadmium content 2.89394e-7; name Mass_compost_Cd_content; = Mass_biowaste_Cd_content/0.5*( DM_biowaste / DM_compost)
    cadmium content on a dry matter basis
  property nitrogen content 0.0136364; name Mass_compost_N_content; = Mass_biowaste_N_content/0.5*( DM_biowaste / DM_compost)
    nitrogen content on a dry matter basis
  property magnesium content 0.00525758; name Mass_compost_Mg_content; = Mass_biowaste_Mg_content/0.5*( DM_biowaste / DM_compost)
    magnesium content on a dry matter basis
  property zinc content 0.000120303; name Mass_compost_Zn_content; = Mass_biowaste_Zn_content/0.5*( DM_biowaste / DM_compost)
    zinc content on a dry matter basis
  property potassium content 0.0099697; name Mass_compost_K_content; = Mass_biowaste_K_content/0.5*( DM_biowaste / DM_compost)
    potassium content on a dry matter basis
  property sulfur content 0.00190909; name Mass_compost_S_content; = Mass_biowaste_S_content/0.5*( DM_biowaste / DM_compost)
    sulfur content on a dry matter basis
  property calcium content 0.0504545; name Mass_compost_Ca_content; = Mass_biowaste_Ca_content/0.5*( DM_biowaste / DM_compost)
    calcium content on a dry matter basis
  property mercury content 1e-7; name Mass_compost_Hg_content; = Mass_biowaste_Hg_content/0.5*( DM_biowaste / DM_compost)
    mercury content on a dry matter basis
  property phosphorus content 0.00275758; name Mass_compost_P_content; = Mass_biowaste_P_content/0.5*( DM_biowaste / DM_compost)
    phosphorus content on a dry matter basis
  property carbon content 0.1165
    carbon content on a dry matter basis (reserved; not for manual entry)
  property true value 0.00153308
    allocation property applied in "true value" allocation // value calculated from revenue
  properties: carbon content, fossil 0, wet mass 1 kg, carbon allocation 0.061512 kg
- iron scrap, sorted, pressed: 0 kg; By-product classification Recyclable; CPC 39310: Slag, dross, scalings and other waste from the manufacture of iron or steel; pedigree (1,1,1,1,1)
  metallic iron scrap removed from ash reamains and recycled.
  Uncertainty: uncertainty is calculated from uncertainties in waste composition and transfer coefficients to soild residues
  production volume 0.0319229 kg
  property price 0.175 EUR2005
    Temporary price data. Calculated as 90% of purchasers price based on: 2005 import and export prices (total trades (USD) divided by total weight (kg) in biggest economies of the world: EU27, USA, Brasil, China, India, Japan and Russia) from UN Commodity Trade Statistics Database (http://data.un.org/Explorer.aspxDatabase [Accessed 2011.06.20]). Commodity: Waste or scrap, of cast iron
  property carbon content 0
    carbon content on a dry matter basis (reserved; not for manual entry)
  property true value 9.39858e-10
    allocation property applied in "true value" allocation // value calculated from revenue
  properties: carbon content, non-fossil 0, wet mass 1 kg, dry mass 1 kg, water content 0, carbon content, fossil 0, water in wet mass 0 kg, carbon allocation 0 kg
- copper: 0 kg; source Rentz O. 1999; By-product classification allocatable product; CPC 41413: Refined copper and copper alloys, unwrought; master alloys of copper
  Literature value. Copper uses: Before end-use copper is manufactured into semi fabricated products, such as shapes and ingots (known as 'semis'). These manufacturing processes are subdivided into hot working, cold working and, if necessary, process annealing. Few of the semis are ready for use as such. They more typically travel to first-stage manufacturers, who make metal rods, wire, and casting, and then to component manufacturers who produce such things as motors, valves, and insulated cables The components in turn are incorporated by final-stage manufacturers into a variety of finished products - automobiles, commercial buildings, residential housing, and so forth. These uses account for about 79% of the world-wide consumption of copper.
  production volume 0.00101611 kg
  property price 5.52 EUR2005
    Literature value (http://www.economist.com/news/business/21576714-mining-industry-has-enriched-chile-its-future-precarious-copper-solution). Average price between 20015 and 2013.
  property carbon content 0
    carbon content on a dry matter basis (reserved; not for manual entry)
  property true value 9.43631e-10
    allocation property applied in "true value" allocation // value calculated from revenue
  properties: dry mass 1 kg, water in wet mass 0 kg, wet mass 1 kg, carbon content, non-fossil 0, water content 0, carbon content, fossil 0, carbon allocation 0 kg
- iron scrap, unsorted: 0 kg; source European Aluminium Association 2008; CPC 39310: Slag, dross, scalings and other waste from the manufacture of iron or steel; By-product classification Recyclable; pedigree (1,1,1,1,1)
  production volume 9.08218e-7 kg
  property price 0.149 EUR2005; name ironScrapAmount_price_EUR2005
    Temporary price data. Calculated as 90% of purchasers price based on: estimated at 85% of sorted scrap
  property carbon content 0
    carbon content on a dry matter basis (reserved; not for manual entry)
  property true value 2.27666e-14
    allocation property applied in "true value" allocation // value calculated from revenue
  properties: water in wet mass 0 kg, water content 0, carbon content, fossil 0, carbon content, non-fossil 0, dry mass 1 kg, wet mass 1 kg, carbon allocation 0 kg
- aluminium oxide, non-metallurgical: 0 kg; source European Aluminium Association 2008; CPC 41432: Alumina (aluminium oxide), except artificial corundum; By-product classification allocatable product; CAS 1344-28-1; pedigree (1,1,1,1,1)
  production volume 5.71507e-5 kg
  property carbon content, non-fossil 0; name C_content_non_fossil
  property price 0.28 EUR2005; name Al2O3Amount_price_EUR2005
    From UN trade database. http://data.un.org/ Import data from the largest economies of the world are used (Brazil, India, USA, China, Japan and EU-27).
  property dry mass 1 kg; name DM
  property water content 0; name water_content
  property wet mass 1 kg; name WM
  property water in wet mass 0 kg; name WWM
  property carbon content, fossil 0; name C_content_fossil
  property carbon content 0
    carbon content on a dry matter basis (reserved; not for manual entry)
  property true value 2.69216e-12
    allocation property applied in "true value" allocation // value calculated from revenue
  properties: carbon allocation 0 kg
- aluminium, cast alloy: 0 kg; source European Aluminium Association 2008; By-product classification allocatable product; CPC 41431: Unwrought aluminium; pedigree (1,1,1,1,1)
  EcoSpold01Location=RER
  production volume 0.000534232 kg
  property price 1.3 EUR2005; name castAlloyAmount_price_EUR2005
    Temporary price data. Calculated as 90% of purchasers price based on: Source: London Metal Exchange, Aluminium alloy price for 2005
  property carbon content 0
    carbon content on a dry matter basis (reserved; not for manual entry)
  property true value 1.16841e-10
    allocation property applied in "true value" allocation // value calculated from revenue
  properties: water in wet mass 0 kg, carbon content, non-fossil 0, water content 0, dry mass 1 kg, carbon content, fossil 0, wet mass 1 kg, carbon allocation 0 kg
- aluminium, wrought alloy: 0 kg; source European Aluminium Association 2008; By-product classification allocatable product; CPC 4153: Semi-finished products of aluminium or aluminium alloys; pedigree (1,1,1,1,1)
  production volume 0.000233877 kg
  property price 1.44 EUR2005; name secondaryAluminiumOutput_price_EUR2005
    Estimated based on literature values and expert judgement. Aluminium ccast alloys are about 90% of the price of aluminium wrought alloys.
  property carbon content 0
    carbon content on a dry matter basis (reserved; not for manual entry)
  property true value 5.66592e-11
    allocation property applied in "true value" allocation // value calculated from revenue
  properties: wet mass 1 kg, water content 0, carbon content, fossil 0, water in wet mass 0 kg, carbon content, non-fossil 0, dry mass 1 kg, carbon allocation 0 kg

## Inputs from technosphere
- pulpwood, softwood, measured as solid wood under bark: 0.000114585 m3; = 725/378; lognormal variance with pedigree 0.037, pedigree (1,5,3,5,1)
  input in kg divided by the basic wood density of 378 kg/m3
  properties: dry mass 450 kg, wet mass 1080 kg, carbon content, non-fossil 0.494, water content 1.4
- lubricating oil: 3.62098e-6 kg; = 0.055+0.00561; lognormal variance with pedigree 0.037, pedigree (1,5,3,5,1)
  input of lubricating oils plus mineral oils, incl. thermooil
  properties: wet mass 1 kg, dry mass 1 kg, carbon content, fossil 0.75
  note on carbon content, fossil: Lubricating oil is produced from diesel. C-content/dry mass of fats and oils considered 75%, from: ecoinvent v2.2 report, n 15a, pg 40
- furnace, wood chips, with silo, 5000kW: 6.00266e-9 unit; = 2.9333E-08*wood_fuel/1.05; lognormal variance with pedigree 0.037, pedigree (1,5,3,5,1)
  Infrastructure factor from DS on heat generation from industrial residual wood mulitplied by the input of wood fuel (direct wood fuel plus production residues); correction for assumed efficiency as original value refers to heat output
- chemical, organic: 0.00031305 kg; lognormal variance with pedigree 0.037, pedigree (1,5,3,5,1)
  input of unspecified additives, dyes, flame redardants, etc.
  properties: wet mass 1 kg, carbon content, fossil 0.628, dry mass 1 kg
  note on carbon content, fossil: This dataset is an unweighted average of 20 organic substances (listed in Tab 88.1, ecoinvent v2.2 report 8, part II), being part of the top100 chemicals included in this database. The C-content has also been calculated as an unweighted average of the C content of the substances composing this dataset.
- heat, district or industrial, other than natural gas: 0.00014964 MJ; = 2.63/1.05; lognormal variance with pedigree 0.037, pedigree (1,5,3,5,1)
  Fuel input, converted to heat output
- wood ash mixture, pure: -0.000102278 kg; name w_wood_ash; = (0.000476*wood_fuel)*-1; lognormal variance with pedigree 0.037, pedigree (1,5,3,5,1)
  Emission factor from DS on heat generation from industrial residual wood mulitplied by the input of wood fuel (direct wood fuel plus production residues)
  EcoSpold01Location=CH
  production volume 9.8071e6 kg; = w_wood_ash*p_board
    Calculated from production volume of reference product using the relative outputs.
  property price 0 EUR2005; name w_wood_ash_price_EUR2005
  properties: wet mass 1 kg, carbon content, non-fossil 0.012, dry mass 1 kg
- tap water: 0 kg; pedigree (1,1,1,1,1)
  properties: water content 2962.17, wet mass 1 kg, dry mass 0.000337476 kg, carbon content, fossil 0.00178991
  note on carbon content, fossil: Bicarbonate content is 2.93 mol/m3. CO2 content is 0.1 mol/m3 (ecoinvent v2.2 report 8, Tab 93.1).
- dust collector, electrostatic precipitator, for industrial use: 2.84222e-10 unit; = 1.3889E-09*wood_fuel/1.05; lognormal variance with pedigree 0.037, pedigree (1,5,3,5,1)
  (same comment as for furnace, wood chips, with silo, 5000kW)
- heat, district or industrial, natural gas: 0.0207038 MJ; = (355.4+8.48)/1.05; lognormal variance with pedigree 0.037, pedigree (1,5,3,5,1)
  Input of natural gas plus liquified petrolium gas, converted to heat output
- electricity, medium voltage: 0 kWh; pedigree (1,1,1,1,1)
- methylene diphenyl diisocyanate: 0.00109926 kg; lognormal variance with pedigree 0.037, pedigree (1,5,3,5,1)
  part of glueing system (inventoried as averaged production average in Europe)
  properties: wet mass 1 kg, dry mass 1 kg, carbon content, fossil 0.72
- biowaste: -1.5772e-5 kg; name w_biowaste; lognormal variance with pedigree 0.0376, pedigree (2,5,3,5,1)
  sludges from chip washing etc.
  production volume 1.56922e6 kg; = w_biowaste*p_board
    Calculated from production volume of reference product using the relative outputs.
  property price 0 EUR2005; name w_biowaste_price_EUR2005
  properties: wet mass 1 kg, dry mass 0.4 kg, carbon content, non-fossil 0.1624, water content 1.5
- furnace, wood chips, softwood storage area, 1000kW: 1.42029e-9 unit; = 6.61E-09*wood_fuel; lognormal variance with pedigree 0.022, pedigree (1,5,3,5,1)
  EcoSpold01Location=CH
  Factor from DS on heat generation from industrial residual wood mulitplied by the input of wood fuel (direct wood fuel plus production residues)
- wooden board factory, organic bonded boards: 2.2759e-12 unit; = 1/(525000*50); lognormal variance with pedigree 0.037, pedigree (1,5,3,5,1)
  estimated based on an assumed yearly production volume o 525,000 m3/year and a life time of infrastructure of 50 years
- waste wood, untreated: 0 kg; pedigree (1,1,1,1,1)
  Calculated as a weighted average of data on waste wood, untreated from the regional activities.
  production volume 0 kg
    Calculated from production volume of reference product using the relative outputs.
  properties: dry mass 0.8 kg, carbon content, non-fossil 0.48632, wet mass 1 kg, water content 0.25
- diesel, burned in building machine: 0.00201331 MJ; lognormal variance with pedigree 0.037, pedigree (1,5,3,5,1)
  for internal transport
- paraffin: 0.000657165 kg; lognormal variance with pedigree 0.037, pedigree (1,5,3,5,1)
  hydrophobing agent
  properties: dry mass 1 kg, carbon content, fossil 0.847059, wet mass 1 kg
- tap water: 0.000190998, 3.79964e-5, 0.000958118, 2.49252e-5, 7.08993e-5, 0.0109642 kg (6 entries); lognormal variance with pedigree 0.037, pedigree (1,5,3,5,1)
- electricity, medium voltage: 9.24999e-5, 1.68311e-5, 0.000136413, 0.00028543, 0.00413843, 0.000592288, 0.00172795 kWh (7 entries); lognormal variance with pedigree 0.0145, pedigree (1,5,3,5,1)
- waste wood, untreated: -9.96957e-6, -1.23787e-6, -9.05024e-8, -3.47681e-6, -5.25262e-7, -8.30396e-7 kg (6 entries); lognormal variance with pedigree 0.0376, pedigree (2,5,3,5,1)
  (same comment as for waste wood, untreated)
  production volume 1.58727e6 kg

## Inputs from nature
- Water, cooling, unspecified natural origin [natural resource, in water]: 1.79227e-5 m3; lognormal variance with pedigree 0.036, pedigree (1,5,3,5,1)

## Emissions to nature
- NMVOC, non-methane volatile organic compounds, unspecified origin [air, urban air close to ground]: 1.97774e-5 kg; = 3.5E-06*wood_fuel + (0.517-0.0192-0.000343-0.179); lognormal variance with pedigree 0.2106, pedigree (2,5,5,5,1)
  Emission factor from DS on heat generation from industrial residual wood mulitplied by the input of wood fuel (direct wood fuel plus production residues) plus estimated emissions from wood and glue drying processes (based on Albrecht et al. 2009) minus emissions that have been inventoried specifically
- Potassium [air, urban air close to ground]: 5.02797e-6 kg; = 2.34E-05*wood_fuel; lognormal variance with pedigree 0.4806, pedigree (2,5,5,5,1)
  (same comment as for residual wood, dry)
- Ammonia [air, urban air close to ground]: 3.71726e-7 kg; = 1.73E-06*wood_fuel; lognormal variance with pedigree 0.4806, pedigree (2,5,5,5,1)
  (same comment as for residual wood, dry)
- Benzene, ethyl- [air, urban air close to ground]: 6.44611e-9 kg; = 3E-08*wood_fuel; lognormal variance with pedigree 0.4806, pedigree (2,5,5,5,1)
  (same comment as for residual wood, dry)
- Carbon monoxide, non-fossil [air, urban air close to ground]: 4.29741e-5 kg; = 2E-04*wood_fuel; lognormal variance with pedigree 0.0706, pedigree (2,5,5,5,1)
  (same comment as for residual wood, dry)
- Sodium [air, urban air close to ground]: 2.79332e-7 kg; = 1.3E-06*wood_fuel; lognormal variance with pedigree 0.4806, pedigree (2,5,5,5,1)
  (same comment as for residual wood, dry)
- Chromium VI [air, urban air close to ground]: 8.59482e-12 kg; = 4E-11*wood_fuel; lognormal variance with pedigree 0.5306, pedigree (2,5,5,5,1)
  (same comment as for residual wood, dry)
- Acetaldehyde [air, urban air close to ground]: 3.35987e-8 kg; = 6.1E-08*wood_fuel+0.000343; lognormal variance with pedigree 0.4806, pedigree (2,5,5,5,1)
  Emission factor from DS on heat generation from industrial residual wood mulitplied by the input of wood fuel (direct wood fuel plus production residues ) plus estimated emissions from wood and glue drying processes (based on Albrecht et al. 2009).
- Magnesium [air, urban air close to ground]: 7.73533e-8 kg; = 3.6E-07*wood_fuel; lognormal variance with pedigree 0.4806, pedigree (2,5,5,5,1)
  (same comment as for residual wood, dry)
- Hydrocarbons, aliphatic, unsaturated [air, urban air close to ground]: 6.66098e-7 kg; = 3.1E-06*wood_fuel; lognormal variance with pedigree 0.4806, pedigree (2,5,5,5,1)
  (same comment as for residual wood, dry)
- Fluorine [air, urban air close to ground]: 1.07435e-8 kg; = 5E-08*wood_fuel; lognormal variance with pedigree 0.4806, pedigree (2,5,5,5,1)
  (same comment as for residual wood, dry)
- Methane, non-fossil [air, urban air close to ground]: 3.22306e-7 kg; = 1.5E-06*wood_fuel; lognormal variance with pedigree 0.4806, pedigree (2,5,5,5,1)
  (same comment as for residual wood, dry)
- Phenol, pentachloro- [air, urban air close to ground]: 1.74045e-12 kg; = 8.1E-12*wood_fuel; lognormal variance with pedigree 0.4806, pedigree (2,5,5,5,1)
  (same comment as for residual wood, dry)
- Benzene, hexachloro- [air, urban air close to ground]: 1.54707e-15 kg; = 7.2E-15*wood_fuel; lognormal variance with pedigree 0.4806, pedigree (2,5,5,5,1)
  (same comment as for residual wood, dry)
- PAH, polycyclic aromatic hydrocarbons [air, urban air close to ground]: 2.38506e-9 kg; = 1.11E-08*wood_fuel; lognormal variance with pedigree 0.4806, pedigree (2,5,5,5,1)
  (same comment as for residual wood, dry)
- Benzene [air, urban air close to ground]: 1.95532e-7 kg; = 9.1E-07*wood_fuel; lognormal variance with pedigree 0.4806, pedigree (2,5,5,5,1)
  (same comment as for residual wood, dry)
- Dinitrogen monoxide [air, urban air close to ground]: 4.94202e-7 kg; = 2.3E-06*wood_fuel; lognormal variance with pedigree 0.4806, pedigree (2,5,5,5,1)
  (same comment as for residual wood, dry)
- Arsenic [air, urban air close to ground]: 2.1487e-10 kg; = 1E-09*wood_fuel; lognormal variance with pedigree 0.4806, pedigree (2,5,5,5,1)
  (same comment as for residual wood, dry)
- Particulates, > 10 um [air, unspecified]: 5.93838e-6 kg; lognormal variance with pedigree 0.444, pedigree (3,5,3,5,1)
  dust emissions
- Formaldehyde [air, urban air close to ground]: 1.17498e-6 kg; = 1.3E-07*wood_fuel+0.0192; lognormal variance with pedigree 0.4806, pedigree (2,5,5,5,1)
  Emission factor from DS on heat generation from industrial residual wood mulitplied by the input of wood fuel (direct wood fuel plus production residues) plus estimated emissions from wood and glue drying processes
- Lead [air, urban air close to ground]: 5.37176e-9 kg; = 2.5E-08*wood_fuel; lognormal variance with pedigree 0.4806, pedigree (2,5,5,5,1)
  (same comment as for residual wood, dry)
- Methanol [air, non-urban air or from high stacks]: 1.06939e-6 kg; lognormal variance with pedigree 0.482, pedigree (3,5,5,5,1)
  Estimated emissions from wood and glue drying processes
- Carbon dioxide, non-fossil [air, urban air close to ground]: 0.0219168 kg; = 0.102*wood_fuel; lognormal variance with pedigree 0.0506, pedigree (2,5,5,5,1)
  (same comment as for residual wood, dry)
- Copper [air, urban air close to ground]: 4.72715e-9 kg; = 2.2E-08*wood_fuel; lognormal variance with pedigree 0.4806, pedigree (2,5,5,5,1)
  (same comment as for residual wood, dry)
- Bromine [air, urban air close to ground]: 1.28922e-8 kg; = 6E-08*wood_fuel; lognormal variance with pedigree 0.4806, pedigree (2,5,5,5,1)
  (same comment as for residual wood, dry)
- Calcium [air, urban air close to ground]: 1.25699e-6 kg; = 5.85E-06*wood_fuel; lognormal variance with pedigree 0.4806, pedigree (2,5,5,5,1)
  (same comment as for residual wood, dry)
- Particulates, < 2.5 um [air, urban air close to ground]: 5.37176e-7 kg; = 2.5E-06*wood_fuel; lognormal variance with pedigree 0.1206, pedigree (2,5,5,5,1)
  (same comment as for residual wood, dry)
- Toluene [air, urban air close to ground]: 6.44611e-8 kg; = 3E-07*wood_fuel; lognormal variance with pedigree 0.4806, pedigree (2,5,5,5,1)
  (same comment as for residual wood, dry)
- Dioxins, measured as 2,3,7,8-tetrachlorodibenzo-p-dioxin [air, urban air close to ground]: 6.44611e-15 kg; = 3E-14*wood_fuel; lognormal variance with pedigree 0.4806, pedigree (2,5,5,5,1)
  (same comment as for residual wood, dry)
- Manganese [air, urban air close to ground]: 3.6528e-8 kg; = 1.7E-07*wood_fuel; lognormal variance with pedigree 0.4806, pedigree (2,5,5,5,1)
  (same comment as for residual wood, dry)
- Hydrocarbons, aliphatic, alkanes, unspecified [air, urban air close to ground]: 1.95532e-7 kg; = 9.1E-07*wood_fuel; lognormal variance with pedigree 0.4806, pedigree (2,5,5,5,1)
  (same comment as for residual wood, dry)
- Cadmium [air, urban air close to ground]: 1.50409e-10 kg; = 7E-10*wood_fuel; lognormal variance with pedigree 0.4806, pedigree (2,5,5,5,1)
  (same comment as for residual wood, dry)
- Sulfur dioxide [air, urban air close to ground]: 5.37176e-7 kg; = 2.5E-06*wood_fuel; lognormal variance with pedigree 0.4806, pedigree (2,5,5,5,1)
  (same comment as for residual wood, dry)
- Zinc [air, urban air close to ground]: 6.44611e-8 kg; = 3E-07*wood_fuel; lognormal variance with pedigree 0.4806, pedigree (2,5,5,5,1)
  (same comment as for residual wood, dry)
- Benzo(a)pyrene [air, urban air close to ground]: 1.07435e-10 kg; = 5E-10*wood_fuel; lognormal variance with pedigree 0.4806, pedigree (2,5,5,5,1)
  (same comment as for residual wood, dry)
- m-Xylene [air, urban air close to ground]: 2.57844e-8 kg; = 1.2E-07*wood_fuel; lognormal variance with pedigree 0.4806, pedigree (2,5,5,5,1)
  (same comment as for residual wood, dry)
- Chromium [air, urban air close to ground]: 8.50887e-10 kg; = 3.96E-09*wood_fuel; lognormal variance with pedigree 0.4806, pedigree (2,5,5,5,1)
  (same comment as for residual wood, dry)
- Mercury [air, urban air close to ground]: 6.44611e-11 kg; = 3E-10*wood_fuel; lognormal variance with pedigree 0.4806, pedigree (2,5,5,5,1)
  (same comment as for residual wood, dry)
- Nitrogen oxides [air, urban air close to ground]: 2.57844e-5 kg; = 0.00012*wood_fuel; lognormal variance with pedigree 0.1206, pedigree (2,5,5,5,1)
  (same comment as for residual wood, dry)
- Nickel [air, urban air close to ground]: 1.28922e-9 kg; = 6E-09*wood_fuel; lognormal variance with pedigree 0.4806, pedigree (2,5,5,5,1)
  (same comment as for residual wood, dry)
- Phosphorus [air, urban air close to ground]: 6.44611e-8 kg; = 3E-07*wood_fuel; lognormal variance with pedigree 0.4806, pedigree (2,5,5,5,1)
  (same comment as for residual wood, dry)
- Chlorine [air, urban air close to ground]: 3.86767e-8 kg; = 1.8E-07*wood_fuel; lognormal variance with pedigree 0.4806, pedigree (2,5,5,5,1)
  (same comment as for residual wood, dry)

## Sampling procedure
Survey among member companies of the European Panel Federation; emissions profile per MJ wood input from PSI (2014)
