# lignite power plant construction

Dataset: EcoSpold 2, unit process
Geography: RER
Time period: 1980-01-01 to 2019-12-31
Technology level: current
Classification: ISIC rev.4 ecoinvent: 4220a: Construction of utility projects for electricity production, except for liquid fuels
Classification: EcoSpold01Categories: lignite/power plants
Tags: ConvertedDataset
Scenario: Business-as-Usual
System model: Allocation at the point of substitution
Generated by: Christian Bauer
Published in: Röder, A. 2007
Database: ecoinvent
isCopyrightProtected: true
accessRestrictedTo: 1

## General comment
This dataset represents the components of a coal power plant, based on two specific reference coal power plants with 100 MW and 500 MW. The dataset represents a mix with a share of 30 % and 70 %, respectively.

## Included activities start
From pasture land forseen for the construction of a coal power plant.

## Included activities end
This activity ends with a constructed coal power plant. The datasets includes apart the materials necessary for the construction of the hard coal power plant also the construction efforts, land use as well as the disposal of all materials.

## Geography
German data for the end of the 1980s and US data for early 1980s.

## Technology
The coal power plant is installed with an electrical filter and a flue gas desulfurization (DeSOx). Additionally a selective catalytic reduction (SCR) takes place and a DeNOx plant is installed. In the old federal states of Germany 70% of electricity production was produced from lignite power plants within the capacity class 500 MW. This value is assumed for all UCTE countries. It represents an average technology in 1980s.
Reference:
RWE (1993) Personal communication, RWE Energie AG, Essen.

## Reference product
- lignite power plant: 1 unit; source DGMK-Arbeitskreis 1992; CPC 53262: Power plants; By-product classification allocatable product
  EcoSpold01Location=RER
  The materials depend on the capacity, fuel used, applied environmental technology and local conditions. Local conditions in particular, determine the amount of concrete for the foundation and the construction effort for the cooling tower and storage yards.
  As a base load power plant the lignite power plant achieves 6’000 fully load hours per year. The high number of operation hours occurs, since lignite power plants are operated often for two or three years without interruption and then followed by a larger maintenance. A number of 200’000 fully load hours in total are assumed. This corresponds to a lifetime of 38 years.
  The lifetime is a conservative estimate, since coal power plants may be operated 50 years or more. The fact that coal power plants are modernized several times during their lifetime is not considered. That would cause an additional material consumption. However, increases the lifetime and reduces the material consumption per generated unit of energy. Due to large mass flows, lignite power plants are built larger. This results in a higher material consumption per MW. Due to the higher lifetime, this effect is compensated again.
  production volume 1.32237 unit
    This is a placeholder value that does not reflect real-world production volumes. This dataset does not currently require a real-world production volume to work in the database framework, and no actual data were collected yet. This has no negative effect on the results of the ecoinvent database. The placeholder value of this activity was scaled according to the nominal GDP of 2005 (source: United Nations, http://data.un.org/Glossary.aspx?q=GDP+%28current+US%24%29, accessed 20130726) to reflect an appropriate share of the global production volume, which is also a placeholder value.
  property price 2.17262e9 EUR2005
    EU27 I/O database(in the 'EU & DK Input Output Database' (available in SimaPro)); -79 Building, non-residential EU 27 (calculated to be 38.169 EUR2003/kg). Based on consumption of (_53 Iron basic, virgin, EU27;7.25517782294095E-3 kg/EUR building; 0.45 EUR2003 per kg DS), (_61 Iron, after first processing, EU27;5.8766830719783E-3kg/EUR building; 0.62 EUR2003 per kg DS), (_65 Fabricated metal products, except machinery, EU27; 8.9167022775554E-3 kg/EUR building; 3.63 EUR2003 per kg DS) and (_66 Machinery and equipment n.e.c., EU27;4.15071881936446E-3 kg/EUR building; 5.71 EUR2003 per kg DS) - 57357000 kg
  property true value 2.17262e9
    allocation property applied in "true value" allocation // value calculated from revenue

## By-products
- iron scrap, sorted, pressed: 0 kg; By-product classification Recyclable; CPC 39310: Slag, dross, scalings and other waste from the manufacture of iron or steel; pedigree (1,1,1,1,1)
  Iron scrap recovered from this waste.
  production volume 65088.1 kg
  property price 0.175 EUR2005
    Temporary price data. Calculated as 90% of purchasers price based on: 2005 import and export prices (total trades (USD) divided by total weight (kg) in biggest economies of the world: EU27, USA, Brasil, China, India, Japan and Russia) from UN Commodity Trade Statistics Database (http://data.un.org/Explorer.aspxDatabase [Accessed 2011.06.20]). Commodity: Waste or scrap, of cast iron
  property carbon content 0
    carbon content on a dry matter basis (reserved; not for manual entry)
  property true value 938.066
    allocation property applied in "true value" allocation // value calculated from revenue
  properties: water content 0, water in wet mass 0 kg, carbon content, fossil 0, dry mass 1 kg, carbon content, non-fossil 0, wet mass 1 kg, carbon allocation 0 kg
- electricity, for reuse in municipal waste incineration only: 0 kWh; CPC 17100: Electrical energy; By-product classification allocatable product; pedigree (1,1,1,1,1)
  Net electricity generated from this waste and used in internal MSWI plant energy redistribution.
  Uncertainty: uncertainty is calculated from uncertainties in waste composition and uncertainties in energy efficiency and the uncertainty in internal energy demand
  production volume 675098 kWh
  property exergy 3.6 MJ; name E_el_prod_MSWI_exergy
    This exergy property is based on the exergy content of the product.
  property true value relation 3.6; name E_el_prod_MSWI_true_value_relation
    property to calculate "true value" from
  property price 0.1 EUR2005; name E_el_prod_MSWI_price_EUR2005
    Estimated to be the same price as in case of electricity, medium voltage.
  property true value 2518.6
    allocation property applied in "true value" allocation // value calculated from true value relation
- heat, for reuse in municipal waste incineration only: 0 MJ; CPC 17300: Steam and hot water; By-product classification allocatable product; pedigree (1,1,1,1,1)
  Net useful heat generated from this waste and used in internal MSWI plant energy redistribution.
  Uncertainty: uncertainty is calculated from uncertainties in waste composition and uncertainties in energy efficiency and the uncertainty in internal energy demand
  production volume 4.67948e6 MJ
  property true value relation 0.1842; name E_th_prod_MSWI_true_value_relation
    property to calculate "true value" from
  property exergy 0.1842 MJ; name E_th_prod_MSWI_exergy
    This exergy property is based on the exergy content of the product.
  property price 0.0106 EUR2005; name E_th_prod_MSWI_price_EUR2005
    Average European district heat price from Ecoheatcool and Euroheat 2005-2006, Ecoheat Work package 1: The European heat market. Final report. 10.6 EUR/GJ i s the price of district heat. http://www.solarthermalworld.org/files/Ecoheatcool%20WP1%20Web.pdf?download
  property true value 893.257
    (same comment as for electricity, for reuse in municipal waste incineration only)
- zinc concentrate: 0 kg; CPC 14290: Other non-ferrous metal ores and concentrates (other than uranium or thorium ores and concentrates); By-product classification allocatable product
  Calculated value from the knowledge of the properties of both products.
  production volume 44.6881 kg
  property price 0.38 EUR2005; name ByP_price_EUR2005
    Temporary price data. Calculated as 90% of purchasers price based on: Zinc content in concentrate 53%. Concentrate price per kg Zn 86.5% of refined Zn price (13.5% treatment charges according to CHR Metals Limited 2005: Dynamic cost curves. http://www.minecost.com/dynamic.pdf). 2004 zinc price from USGS (2007) Mineral commodity summaries 2007. <http://minerals.usgs.gov/minerals/pubs/mcs/2007/mcs2007.pdf> [Accessed 25 May 2010]
  property zinc content 0.53; name zinc_C_zinc_concentrate
    Zinc content on a dry matter basis. Value taken from teh "zinc mine operation" /GLO dataset.
  property dry mass 1 kg; name DM_zinc_concentrate
  property carbon content 0
    carbon content on a dry matter basis (reserved; not for manual entry)
  property true value 0.494725
    allocation property applied in "true value" allocation // value calculated from revenue
  properties: wet mass 1 kg, water content 0, carbon content, non-fossil 0, carbon content, fossil 0, water in wet mass 0 kg, carbon allocation 0 kg

## Inputs from technosphere
- steel, low-alloyed, hot rolled: 5.05999e6 kg; source Jensch W. 1988; lognormal variance with pedigree 0.16, pedigree (1,1,5,1,1)
  Estimation. Based on a range of literature data.
  Further references:
  DOE (1983) Energy Technology Characterizations Handbook; Environmental Pollution and Control Factors. U.S. Department of Energy. Washington, D.C.
  Gysel B. (1993) Personal communication, Sulzer Thermtec, 5.2.1993.
  ORNL (1980) A Methodology and a Preliminary Data Base for Examining the Health Risks of Electricity Generation from Uranium and Coal Fuels. Oak Ridge, USA.
  Fritsche U., Rausch L. Simon K.-H. (1989) Umweltanalyse von Energie-, Transport- und Stoffsystemen: Gesamt-Emissions-Modell Integrierter Systeme (GEMIS) Version 2.0. Darmstadt/Kassel.
  Uerpmann E.-P. (1990) Betriebserfahrungen mit nasser Rauchgasentschwefelung in Braunkohlekraftwerken. In: VGB-Seminar Rauchgasreinigung und Reststoffentsorgung in Kraftwerken, Industrie- und Heizkraftwerken. Cottbus, Deutschland.
  EcoSpold01Location=RER
  properties: carbon content, fossil 0.005, wet mass 1 kg, dry mass 1 kg
  note on carbon content, fossil: Low alloyed steel composition given in Tab. 3.2 ecoinvent v2.2 report 10_partII. Steel assumed to have a C content of 0.5%
- stone wool: 606999 kg; source Jensch W. 1988; lognormal variance with pedigree 0.16, pedigree (1,1,5,1,1)
  EcoSpold01Location=CH
  Estimation. Based on a range of literature data.
  Further references:
  DOE (1983) Energy Technology Characterizations Handbook; Environmental Pollution and Control Factors. U.S. Department of Energy. Washington, D.C.
  Gysel B. (1993) Personal communication, Sulzer Thermtec, 5.2.1993.
  ORNL (1980) A Methodology and a Preliminary Data Base for Examining the Health Risks of Electricity Generation from Uranium and Coal Fuels. Oak Ridge, USA.
  Fritsche U., Rausch L. Simon K.-H. (1989) Umweltanalyse von Energie-, Transport- und Stoffsystemen: Gesamt-Emissions-Modell Integrierter Systeme (GEMIS) Version 2.0. Darmstadt/Kassel.
  Uerpmann E.-P. (1990) Betriebserfahrungen mit nasser Rauchgasentschwefelung in Braunkohlekraftwerken. In: VGB-Seminar Rauchgasreinigung und Reststoffentsorgung in Kraftwerken, Industrie- und Heizkraftwerken. Cottbus, Deutschland.
  properties: carbon content, fossil 0.015401, dry mass 1 kg, wet mass 1 kg
  note on carbon content, fossil: The chemical composition of the glass fibres used in the rock wool production is similar to the composition of naturally cooled volcano basalt and has a composition listed in Tab. 3.1 and 3.2 in ecoinvent v2.2 report 16, part XIV. Rock wool contains: a minimum of 96% mineral fibres,between 0.5 and 3.0 weight percent of phenolic resin depending on the specific product characteristics, and about 0.2 percent mineral oil (ecoinvent v2.2 report 16, part XIV). An average composition of 1.8% phenolic resin, 0.2% mineral oil, and 98% mineral fibres has been assumed and used to calculate C content of the rock wool
- waste reinforced concrete: 0 kg; pedigree (1,1,1,1,1)
  Estimation.
  EcoSpold01Location=CH
  production volume 0 kg
    Calculated from the production volume of lignite power plant in proportion to the respective output amounts.
  properties: water content 0.00585407, dry mass 0.99418 kg, wet mass 1 kg
- diesel, burned in building machine: 3.08999e8 MJ; source Jensch W. 1988; lognormal variance with pedigree 0.16, pedigree (1,1,5,1,1)
  Estimation. Used as auxiliary material for construction machines. Based on a range of literature data.
  Further references:
  DOE (1983) Energy Technology Characterizations Handbook; Environmental Pollution and Control Factors. U.S. Department of Energy. Washington, D.C.
  Gysel B. (1993) Personal communication, Sulzer Thermtec, 5.2.1993.
  ORNL (1980) A Methodology and a Preliminary Data Base for Examining the Health Risks of Electricity Generation from Uranium and Coal Fuels. Oak Ridge, USA.
  Fritsche U., Rausch L. Simon K.-H. (1989) Umweltanalyse von Energie-, Transport- und Stoffsystemen: Gesamt-Emissions-Modell Integrierter Systeme (GEMIS) Version 2.0. Darmstadt/Kassel.
  Uerpmann E.-P. (1990) Betriebserfahrungen mit nasser Rauchgasentschwefelung in Braunkohlekraftwerken. In: VGB-Seminar Rauchgasreinigung und Reststoffentsorgung in Kraftwerken, Industrie- und Heizkraftwerken. Cottbus, Deutschland.
  EcoSpold01Location=GLO
- steel, chromium steel 18/8, hot rolled: 575999 kg; source Jensch W. 1988; lognormal variance with pedigree 0.16, pedigree (1,1,5,1,1)
  (same comment as for steel, low-alloyed, hot rolled)
  properties: dry mass 1 kg, wet mass 1 kg, carbon content, fossil 0.0008
  note on carbon content, fossil: Stainless steel model is the grade 304 steel (18/8 stainless, 18% chromium 8% nickel; max. 0.08% C)
- polyethylene, high density, granulate: 441999 kg; source Jensch W. 1988; lognormal variance with pedigree 0.16, pedigree (1,1,5,1,1)
  Estimation. Polyethylene is taken as a proxy for lacquer and rubber. Based on a range of literature data.
  Further references:
  DOE (1983) Energy Technology Characterizations Handbook; Environmental Pollution and Control Factors. U.S. Department of Energy. Washington, D.C.
  Gysel B. (1993) Personal communication, Sulzer Thermtec, 5.2.1993.
  ORNL (1980) A Methodology and a Preliminary Data Base for Examining the Health Risks of Electricity Generation from Uranium and Coal Fuels. Oak Ridge, USA.
  Fritsche U., Rausch L. Simon K.-H. (1989) Umweltanalyse von Energie-, Transport- und Stoffsystemen: Gesamt-Emissions-Modell Integrierter Systeme (GEMIS) Version 2.0. Darmstadt/Kassel.
  Uerpmann E.-P. (1990) Betriebserfahrungen mit nasser Rauchgasentschwefelung in Braunkohlekraftwerken. In: VGB-Seminar Rauchgasreinigung und Reststoffentsorgung in Kraftwerken, Industrie- und Heizkraftwerken. Cottbus, Deutschland.
  EcoSpold01Location=RER
  properties: carbon content, fossil 0.857143, wet mass 1 kg, dry mass 1 kg
  note on carbon content, fossil: Polyethylene is formed out of a huge amount of ethylene monomers (C2H4) (ecoinvent v2.2 report 11_II). MW=28 g/mol
- concrete, normal: 80499.8 m3; source Jensch W. 1988; lognormal variance with pedigree 0.16, pedigree (1,1,5,1,1)
  (same comment as for stone wool)
  properties: dry mass 2190 kg, wet mass 2380 kg, water content 0.086758
- reinforcing steel: 5.05999e7 kg; source Jensch W. 1988; lognormal variance with pedigree 0.16, pedigree (1,1,5,1,1)
  Estimation. Reinforcing steel is taken as a proxy for unalloyed steel. Based on a range of literature data.
  Further references:
  DOE (1983) Energy Technology Characterizations Handbook; Environmental Pollution and Control Factors. U.S. Department of Energy. Washington, D.C.
  Gysel B. (1993) Personal communication, Sulzer Thermtec, 5.2.1993.
  ORNL (1980) A Methodology and a Preliminary Data Base for Examining the Health Risks of Electricity Generation from Uranium and Coal Fuels. Oak Ridge, USA.
  Fritsche U., Rausch L. Simon K.-H. (1989) Umweltanalyse von Energie-, Transport- und Stoffsystemen: Gesamt-Emissions-Modell Integrierter Systeme (GEMIS) Version 2.0. Darmstadt/Kassel.
  Uerpmann E.-P. (1990) Betriebserfahrungen mit nasser Rauchgasentschwefelung in Braunkohlekraftwerken. In: VGB-Seminar Rauchgasreinigung und Reststoffentsorgung in Kraftwerken, Industrie- und Heizkraftwerken. Cottbus, Deutschland.
  EcoSpold01Location=RER
  properties: carbon content, fossil 0.004, wet mass 1 kg, dry mass 1 kg
- waste mineral wool: 0 kg; pedigree (1,1,1,1,1)
  Estimation.
  EcoSpold01Location=CH
  production volume 0 kg
    (same comment as for waste reinforced concrete)
  properties: wet mass 1 kg, dry mass 1 kg
- aluminium, wrought alloy: 251599 kg; source Jensch W. 1988; lognormal variance with pedigree 0.16, pedigree (1,1,5,1,1)
  (same comment as for steel, low-alloyed, hot rolled)
  properties: wet mass 1 kg, dry mass 1 kg
- electricity, medium voltage: 1.86e7 kWh; source Jensch W. 1988; lognormal variance with pedigree 0.16, pedigree (1,1,5,1,1)
  Estimation. Based on a range of literature data.
  Further references:
  DOE (1983) Energy Technology Characterizations Handbook; Environmental Pollution and Control Factors. U.S. Department of Energy. Washington, D.C.
  Gysel B. (1993) Personal communication, Sulzer Thermtec, 5.2.1993.
  ORNL (1980) A Methodology and a Preliminary Data Base for Examining the Health Risks of Electricity Generation from Uranium and Coal Fuels. Oak Ridge, USA.
  Fritsche U., Rausch L. Simon K.-H. (1989) Umweltanalyse von Energie-, Transport- und Stoffsystemen: Gesamt-Emissions-Modell Integrierter Systeme (GEMIS) Version 2.0. Darmstadt/Kassel.
  Uerpmann E.-P. (1990) Betriebserfahrungen mit nasser Rauchgasentschwefelung in Braunkohlekraftwerken. In: VGB-Seminar Rauchgasreinigung und Reststoffentsorgung in Kraftwerken, Industrie- und Heizkraftwerken. Cottbus, Deutschland.
  EcoSpold01Location=UCTE
- copper: 750998 kg; source Jensch W. 1988; lognormal variance with pedigree 0.16, pedigree (1,1,5,1,1)
  EcoSpold01Location=RER
  Estimation. Based on a range of literature data.
  Further references:
  DOE (1983) Energy Technology Characterizations Handbook; Environmental Pollution and Control Factors. U.S. Department of Energy. Washington, D.C.
  Gysel B. (1993) Personal communication, Sulzer Thermtec, 5.2.1993.
  ORNL (1980) A Methodology and a Preliminary Data Base for Examining the Health Risks of Electricity Generation from Uranium and Coal Fuels. Oak Ridge, USA.
  Fritsche U., Rausch L. Simon K.-H. (1989) Umweltanalyse von Energie-, Transport- und Stoffsystemen: Gesamt-Emissions-Modell Integrierter Systeme (GEMIS) Version 2.0. Darmstadt/Kassel.
  Uerpmann E.-P. (1990) Betriebserfahrungen mit nasser Rauchgasentschwefelung in Braunkohlekraftwerken. In: VGB-Seminar Rauchgasreinigung und Reststoffentsorgung in Kraftwerken, Industrie- und Heizkraftwerken. Cottbus, Deutschland.
  properties: dry mass 1 kg, wet mass 1 kg
- waste polyethylene/polypropylene product: 0 kg; pedigree (1,1,1,1,1)
  EcoSpold01Location=CH
  Estimation.
  production volume 0 kg
    (same comment as for waste reinforced concrete)
  properties: carbon content, fossil 0.748045, dry mass 0.847 kg, water content 0.180638, wet mass 1 kg
  note on carbon content, fossil: Mixed various plastics was used to estimate the C content of this waste (Tab A.2, ecoinvent v2.2 report 13_I)
- aluminium, cast alloy: 118400 kg; source Jensch W. 1988; lognormal variance with pedigree 0.16, pedigree (1,1,5,1,1)
  (same comment as for copper)
  properties: wet mass 1 kg, dry mass 1 kg
- heat, district or industrial, other than natural gas: 3.08999e8 MJ; source Jensch W. 1988; lognormal variance with pedigree 0.16, pedigree (1,1,5,1,1)
  Estimation. Process heat for the oil. Based on a range of literature data.
  Further references:
  DOE (1983) Energy Technology Characterizations Handbook; Environmental Pollution and Control Factors. U.S. Department of Energy. Washington, D.C.
  Gysel B. (1993) Personal communication, Sulzer Thermtec, 5.2.1993.
  ORNL (1980) A Methodology and a Preliminary Data Base for Examining the Health Risks of Electricity Generation from Uranium and Coal Fuels. Oak Ridge, USA.
  Fritsche U., Rausch L. Simon K.-H. (1989) Umweltanalyse von Energie-, Transport- und Stoffsystemen: Gesamt-Emissions-Modell Integrierter Systeme (GEMIS) Version 2.0. Darmstadt/Kassel.
  Uerpmann E.-P. (1990) Betriebserfahrungen mit nasser Rauchgasentschwefelung in Braunkohlekraftwerken. In: VGB-Seminar Rauchgasreinigung und Reststoffentsorgung in Kraftwerken, Industrie- und Heizkraftwerken. Cottbus, Deutschland.
  EcoSpold01Location=RER
- waste reinforced concrete: -1.84049e8, -1.95014e6 kg (2 entries); lognormal variance with pedigree 0.16, pedigree (1,1,5,1,1)
  Estimation.
  EcoSpold01Location=CH
  production volume 1.86e8 kg
- waste mineral wool: -600151, -6848.17 kg (2 entries); lognormal variance with pedigree 0.16, pedigree (1,1,5,1,1)
  Estimation.
  EcoSpold01Location=CH
  production volume 607000 kg
- waste polyethylene/polypropylene product: -429122, -12876.8 kg (2 entries); lognormal variance with pedigree 0.16, pedigree (1,1,5,1,1)
  EcoSpold01Location=CH
  Estimation.
  production volume 442000 kg

## Inputs from nature
All rows: source Jensch W. 1988; lognormal variance with pedigree 0.16, pedigree (1,1,5,1,1)
- Occupation, construction site [natural resource, land]: 188000 m2*year
  Estimation. General information on land use of coal power plants can be found in (Jensch 1988), (VDI 1993), (Jacobs et al. 1981), (GEK 1978), (OECD 1985), (DOE 1983), (IAEA 1991) and vary from 100-3700 m2/MW. The largest deviations arise from the consideration of landfill sites for ash and residues from flue gas cleaning. In the U.S., these are deposited on the plant site. In Europe, the values vary from 100-600 m2/MW. Important influencing factors are the size of the coal storage, capacity of the plant, applied method of cooling , use of environmental technology, area available and the chosen boundary. These values are also confirmed by exemplary values for environmental statements (HKW Heilbronn 2002), (RDK 2000). 60m2 per MW are assumed for building area and 80m2 per MW for traffic area, whereby traffic area is assumed for the tanks of the power plant (CORINE 121a). The area is derived from 6’000 fully load hours per year resp. 200’000 fully load hours in total. For lignite power plants the coal storage area is eliminated since it is operated as a mine-mouth plant and there are only little if no storage facilities available.
  Further references:
  VDI (1993) Instrumente zur Minderung energiebedingter Klimagasemissionen IKARUS. VDI Bericht 1043. Tagung Schliersee, 29./30. Apri 1993, Schliersee, Deutschland.
  DOE (1983) Energy Technology Characterizations Handbook; Environmental Pollution and Control Factors. U.S. Department of Energy. Washington, D.C.
  Jacobs H., Kreutzer A., Pleyer H., Stoll A. (1981) Grundflächenbedarf von Kraftwerken. In: Siemens-Energietechnik 3 Heft 8-9, s. 298-302.
  GEK (1978) Die Umweltbelastung im Energiebereich. Schriftenreihe der Eidg. Kommission für die Gesamtenergiekonzeption, Studie Nr. 24, Bern.
  OECD (1985) Environmental Effects of Electricity Generation. Organisation for Economic Co-operation and Development/International Energy Agency, Paris.
  IAEA (1991) Senior Expert Symposium on the electricity and the environment. Helsinki 13-17 May 1991, Vienna.
  RDK (2000) Rheinhafen-Dampfkraftwerk Karlsruhe. Umwelterklärung 2000. Energie Baden-Württemberg AG, Karlsruhe.
- Transformation, to industrial area [natural resource, land]: 69999.9 m2
  (same comment as for Occupation, construction site)
- Transformation, to traffic area, road network [natural resource, land]: 39999.9 m2
  (same comment as for Occupation, construction site)
- Transformation, from unspecified [natural resource, land]: 110000 m2
  (same comment as for Occupation, construction site)
- Occupation, industrial area [natural resource, land]: 1.748e6 m2*year
  (same comment as for Occupation, construction site)
- Occupation, traffic area, road network [natural resource, land]: 997998 m2*year
  (same comment as for Occupation, construction site)

## Sampling procedure
Based on literature data for coal power plants.

## Review by Hans-Jörg Althaus 2003-07-04
passed

## Review by Roland Hischier 2011-09-23
Tansfer of documentation done.
