# treatment of sulfidic tailings, from copper mine operation, tailings impoundment

Dataset: EcoSpold 2, unit process
Geography: AU
Time period: 2015-01-01 to 2019-12-31
Technology level: current
Classification: ISIC rev.4 ecoinvent: 3822:Treatment and disposal of hazardous waste
Synonyms: tailing; pond; tails; sulphidic
Scenario: Business-as-Usual
System model: Allocation at the point of substitution
Share of production covered: 80 %
Generated by: David Turner
Database: ecoinvent
isCopyrightProtected: true
accessRestrictedTo: 1

## General comment
This dataset represents the activity of waste disposal of sulfidic tailings, from copper mine operation in a tailings impoundment in Australia.
Background: Tailings, a waste material produced during mineral concentration (beneficiation), often contain significant quantities of mobile toxic metals and are typically produced in large quantities. To manage these wastes, tailings are commonly stored behind dammed impoundments, known as tailings ponds. These ponds pose a significant long-term pollution risk as metals may leach out into the surrounding environment, potentially over very long timeframes.
Modelling approach: This dataset was produced using a model developed specifically for assessing the long-term emissions of tailings disposal (see Doka, 2017). The tailings disposal model is based on the modelling framework applied in existing landfill process models used in ecoinvent and is based on a top-down approach. Literature data on measurements of deposited tailings compositions (solids) and measured current concentrations in leachate (liquid) form the basis of the model and are used to characterise pollutant mobility and calculate the currently occurring rate of emissions of the landfill. Heeding chief parameters, such as hydrology, pH development and elemental chemistry, these emissions are then projected into the future. Tailings composition is based on the typical composition of tailings at copper mine sites worldwide; i.e. composition is not region-specific. Land use was calculated following the approach described by Doka (2008). Based on an assumed generic final height of a tailings impoundment of 60 m and an assumed tailings density of 2200 kg/m3, a land area of 7.58E-06 m2 is required per kilogram of sulfidic tailings. The land is assumed to be converted from unknown origin to a disposal site. After an operational phase of 30 years, spontaneous restoration of a consolidated state is assumed to be reached after one hundred years. The total occupation time is therefore 130 years and the land occupation per kilogram tailings is 9.85E-04 m2.
Waste composition (wet, in ppm): H2O 300000; O 622290; H na; C 6145; S 289.86; N 5.0454; P 212.27; B 54.583; Cl 102.61; Br 0.22894; F 772.88; I na; Ag 8.304; As 46.473; Ba 335.12; Cd 3.6523; Co 13.907; Cr 60.142; Cu 876.83; Hg 0.24258; Mn 158.19; Mo 12.151; Ni 19.339; Pb 133.55; Sb 28.698; Se 3.3486; Sn 28.153; V 136.61; Zn 182.34; Be 1.6625; Sc 13.352; Sr 90.588; Ti 229.49; Tl 8.6074; W 9.7967; Si 38694; Fe 10340; Ca 3158.3; Al 11031; K 1832.5; Mg 1606.1; Na 1060.3. // Share of carbon in waste that is biogenic 0%.
Activity extent: The dataset includes all potential emissions to the environment and land use changes. Input exchanges of infrastructure, materials, energy, and water are not included here but are accounted for in the activity, copper mine operation.
References
Doka, G. (2008). Life Cycle Inventory data of mining waste: Emissions from sulfidic tailings disposal. Zürich, Switzerland: Doka Life Cycle Assessments.
Doka, G. (2017). A model for waste-specific and climate-specific life cycle inventories of tailings impoundments. Zürich, Switzerland: Doka Life Cycle Assessments.

## Included activities start
The activity starts at the point of waste deposition in the impoundment. All upstream activities, including the pumping of tailings to the site, any dewatering or treatment, or other transport-related activities are excluded.

## Included activities end
Waste-specific short- and long-term emissions to the environment via impoundment leachate; land transformation and occupation. Note that the structural integrity of the site is assumed to be unwavering during the entie modelled time horizon; i.e. accidental releases of leachate (due to impoundment failure) are not considered.

## Geography
Given name of site is 'Copper deposits; Australia'. Impoundment site with mean annual temperature (MAT) of 19.0639665759297 degC, mean annual precipitation (MAP) of 516.966705416912 mm/year, mean annual actual evaporation (EAT) of 522.426569529048 mm/year, and net infiltration of 255.753420652388 mm/year (using half of natural surface evapotranspiration).

## Technology
This is an inventory for a tailings impoundment for ore beneficiation waste (=tailings). Ultimate average impoundment height is 60 meters. Operation phase duration is 30 years.
Leachate of the impoundment is not treated. Based on waste composition and climate data the end of carbonate phase of this impoundment is estimated to be reached 9973 years after waste deposition.

## Time period
'Data on average composition of tailings and tailings-derived leachates from literature sources published between 1994 and 2017 (mean publication date: 2009±6). Mean annual temperature and precipitation data for 1970-2000 (source: Fick and Hijmans, 2017); mean annual evapotranspiration for 1950-2000 (source: Fekete et al., 2002). Production volume based on world mine production data from the USGS Minerals Yearbook 2015. Transfer coefficients from prospective, tailings-specific model.
References:
Fekete, B. M., Vorosmarty, C. J. & Grabs, W. (2002). High-resolution fields of global runoff combining observed river discharge and simulated water balances. Global Biogeochemical Cycles, 16, 15-1 - 15-10.
Fick, S. E. & Hijmans, R. J. (2017). Worldclim 2: New 1-km spatial resolution climate surfaces for global land areas. International Journal of Climatology, 37, 4302-4315.'

## Reference product
- sulfidic tailings, from copper mine operation: -1 kg; By-product classification Waste
  main reference product of this activity (supply of disposal service).
  production volume 1.49e11 kg
    Estimate of the national tailings production volume from the mining and concentration of sulfidic copper ores, based on national mine production of copper from sulfide mineral deposits (kg) multiplied by estimated tailings generation rate per kg copper concentrate produced (160 kg per kg copper concentrate).
  property price 0 EUR2005
    Waste products are assigned a price of zero as they are assumed to require further treatment.
  property carbon content 0.0087785
    carbon content on a dry matter basis (reserved; not for manual entry)
  properties: nickel content 2.7626e-5, boron content 7.7976e-5, silver content 1.1863e-5, aluminium content 0.015758, carbon content, non-fossil 0, oxygen content 0.88899, cadmium content 5.2176e-6, cobalt content 1.9866e-5, tin content 4.0219e-5, magnesium content 0.0022944, silicon content 0.055278, arsenic content 6.639e-5, bromine content 3.2706e-7, barium content 0.00047874, mercury content 3.4654e-7, phosphorus content 0.00030324, sodium content 0.0015148, vanadium content 0.00019515, water in wet mass 0.3 kg, selenium content 4.7837e-6, dry mass 0.7 kg, chromium content 8.5917e-5, thallium content 1.2296e-5, carbon content, fossil 0.0087785, manganese content 0.00022598, chlorine content 0.00014659, sulfur content 0.00041409, iron content 0.014771, nitrogen content 7.2076e-6, fluorine content 0.0011041, strontium content 0.00012941, scandium content 1.9074e-5, copper content 0.0012526, wet mass 1 kg, beryllium content 2.375e-6, titanium content 0.00032784, molybdenum content 1.7358e-5, lead content 0.00019078, water content 0.42857, tungsten content 1.3995e-5, calcium content 0.0045119, potassium content 0.0026178, zinc content 0.00026049, antimony content 4.0998e-5, carbon allocation 0.00614495 kg

## Emissions to nature
- Tin, ion [water, ground-]: 1.6647e-8 kg; lognormal variance with pedigree 0.46299, pedigree (1,1,1,1,1)
  burden from short-term leachate to groundwater in uncontrolled impoundment in moist cimate.
  Uncertainty: U
- Fluoride [water, ground-]: 4.8373e-7 kg; lognormal variance with pedigree 0.35129, pedigree (1,1,1,1,1)
  (same comment as for Tin, ion)
- Thallium [water, ground-, long-term]: 8.6065e-6 kg; lognormal variance with pedigree 0.32193, pedigree (1,1,1,1,1)
  Emissions from long-term leachate (>100a) directly from tailings impoundment.
  Uncertainty: U
- COD, Chemical Oxygen Demand [water, ground-, long-term]: 3.184e-5 kg; lognormal variance with pedigree 0.62026, pedigree (1,1,1,1,1)
  (same comment as for Thallium)
- Strontium [water, ground-, long-term]: 9.0516e-5 kg; lognormal variance with pedigree 0.2438, pedigree (1,1,1,1,1)
  (same comment as for Thallium)
- Copper, ion [water, ground-]: 2.4021e-7 kg; lognormal variance with pedigree 0.37428, pedigree (1,1,1,1,1)
  (same comment as for Tin, ion)
- Sulfate [water, ground-]: 0.0001678 kg; lognormal variance with pedigree 0.21746, pedigree (1,1,1,1,1)
  (same comment as for Tin, ion)
- COD, Chemical Oxygen Demand [water, ground-]: 5.3155e-8 kg; lognormal variance with pedigree 0.34723, pedigree (1,1,1,1,1)
  (same comment as for Tin, ion)
- Strontium [water, ground-]: 7.2094e-8 kg; lognormal variance with pedigree 0.41443, pedigree (1,1,1,1,1)
  (same comment as for Tin, ion)
- Cobalt [water, ground-, long-term]: 1.3832e-5 kg; lognormal variance with pedigree 0.30607, pedigree (1,1,1,1,1)
  (same comment as for Thallium)
- Sodium, ion [water, ground-]: 5.808e-6 kg; lognormal variance with pedigree 0.27182, pedigree (1,1,1,1,1)
  (same comment as for Tin, ion)
- Chromium VI [water, ground-, long-term]: 5.2174e-7 kg; lognormal variance with pedigree 1.666, pedigree (1,1,1,1,1)
  (same comment as for Thallium)
- Sodium, ion [water, ground-, long-term]: 0.0010153 kg; lognormal variance with pedigree 0.1626, pedigree (1,1,1,1,1)
  (same comment as for Thallium)
- Cobalt [water, ground-]: 7.4265e-8 kg; lognormal variance with pedigree 0.41617, pedigree (1,1,1,1,1)
  (same comment as for Tin, ion)
- Silver, ion [water, ground-, long-term]: 8.3034e-6 kg; lognormal variance with pedigree 0.32311, pedigree (1,1,1,1,1)
  (same comment as for Thallium)
- Chromium VI [water, ground-]: 5.052e-9 kg; lognormal variance with pedigree 0.50209, pedigree (1,1,1,1,1)
  (same comment as for Tin, ion)
- Silicon [water, ground-, long-term]: 0.0002241 kg; lognormal variance with pedigree 1.7121, pedigree (1,1,1,1,1)
  (same comment as for Thallium)
- Calcium, ion [water, ground-, long-term]: 0.0031272 kg; lognormal variance with pedigree 0.12741, pedigree (1,1,1,1,1)
  (same comment as for Thallium)
- Silver, ion [water, ground-]: 5.5489e-10 kg; lognormal variance with pedigree 0.57535, pedigree (1,1,1,1,1)
  (same comment as for Tin, ion)
- Calcium, ion [water, ground-]: 3.1082e-5 kg; lognormal variance with pedigree 0.219, pedigree (1,1,1,1,1)
  (same comment as for Tin, ion)
- Silicon [water, ground-]: 2.1605e-6 kg; lognormal variance with pedigree 0.31172, pedigree (1,1,1,1,1)
  (same comment as for Tin, ion)
- Chloride [water, ground-]: 1.0679e-5 kg; lognormal variance with pedigree 0.26883, pedigree (1,1,1,1,1)
  (same comment as for Tin, ion)
- Selenium [water, ground-, long-term]: 1.5372e-7 kg; lognormal variance with pedigree 0.94629, pedigree (1,1,1,1,1)
  (same comment as for Thallium)
- Chloride [water, ground-, long-term]: 9.1931e-5 kg; lognormal variance with pedigree 0.23984, pedigree (1,1,1,1,1)
  (same comment as for Thallium)
- Scandium [water, ground-, long-term]: 1.3328e-5 kg; lognormal variance with pedigree 0.30742, pedigree (1,1,1,1,1)
  (same comment as for Thallium)
- Bromine [water, ground-, long-term]: 7.1551e-8 kg; lognormal variance with pedigree 0.52424, pedigree (1,1,1,1,1)
  (same comment as for Thallium)
- Scandium [water, ground-]: 2.3169e-8 kg; lognormal variance with pedigree 0.45287, pedigree (1,1,1,1,1)
  (same comment as for Tin, ion)
- Cadmium, ion [water, ground-]: 7.2282e-9 kg; lognormal variance with pedigree 0.49138, pedigree (1,1,1,1,1)
  (same comment as for Tin, ion)
- Selenium [water, ground-]: 1.5174e-9 kg; lognormal variance with pedigree 0.54202, pedigree (1,1,1,1,1)
  (same comment as for Tin, ion)
- Cadmium, ion [water, ground-, long-term]: 3.6451e-6 kg; lognormal variance with pedigree 0.35013, pedigree (1,1,1,1,1)
  (same comment as for Thallium)
- Potassium, ion [water, ground-, long-term]: 0.00020052 kg; lognormal variance with pedigree 0.45072, pedigree (1,1,1,1,1)
  (same comment as for Thallium)
- Boron [water, ground-, long-term]: 1.126e-6 kg; lognormal variance with pedigree 1.2021, pedigree (1,1,1,1,1)
  (same comment as for Thallium)
- Phosphate [water, ground-, long-term]: 0.00062956 kg; lognormal variance with pedigree 0.21551, pedigree (1,1,1,1,1)
  (same comment as for Thallium)
- Bromine [water, ground-]: 1.4329e-10 kg; lognormal variance with pedigree 0.61818, pedigree (1,1,1,1,1)
  (same comment as for Tin, ion)
- Potassium, ion [water, ground-]: 3.5457e-7 kg; lognormal variance with pedigree 0.36184, pedigree (1,1,1,1,1)
  (same comment as for Tin, ion)
- Boron [water, ground-]: 1.097e-8 kg; lognormal variance with pedigree 0.47646, pedigree (1,1,1,1,1)
  (same comment as for Tin, ion)
- Nickel, ion [water, ground-]: 3.4024e-8 kg; lognormal variance with pedigree 0.44015, pedigree (1,1,1,1,1)
  (same comment as for Tin, ion)
- BOD5, Biological Oxygen Demand [water, ground-, long-term]: 6.3679e-7 kg; lognormal variance with pedigree 0.62026, pedigree (1,1,1,1,1)
  (same comment as for Thallium)
- Phosphate [water, ground-]: 2.0935e-5 kg; lognormal variance with pedigree 0.27345, pedigree (1,1,1,1,1)
  (same comment as for Tin, ion)
- Barium [water, ground-, long-term]: 9.4729e-5 kg; lognormal variance with pedigree 0.30012, pedigree (1,1,1,1,1)
  (same comment as for Thallium)
- Occupation, dump site [natural resource, land]: 0.00098485 m2*year; lognormal variance with pedigree 0.14966, pedigree (1,1,1,1,1)
  for impoundment operation phase and 100 year renaturation phase.
  Uncertainty: U
- Beryllium [water, ground-, long-term]: 1.66e-6 kg; lognormal variance with pedigree 0.37585, pedigree (1,1,1,1,1)
  (same comment as for Thallium)
- Nickel, ion [water, ground-, long-term]: 1.9305e-5 kg; lognormal variance with pedigree 0.29514, pedigree (1,1,1,1,1)
  (same comment as for Thallium)
- Beryllium [water, ground-]: 2.455e-9 kg; lognormal variance with pedigree 0.52648, pedigree (1,1,1,1,1)
  (same comment as for Tin, ion)
- Molybdenum [water, ground-, long-term]: 5.7253e-6 kg; lognormal variance with pedigree 0.34577, pedigree (1,1,1,1,1)
  (same comment as for Thallium)
- BOD5, Biological Oxygen Demand [water, ground-]: 1.0631e-9 kg; lognormal variance with pedigree 0.34723, pedigree (1,1,1,1,1)
  (same comment as for Tin, ion)
- Mercury [water, ground-, long-term]: 2.4245e-7 kg; lognormal variance with pedigree 0.43787, pedigree (1,1,1,1,1)
  (same comment as for Thallium)
- Barium [water, ground-]: 1.1322e-9 kg; lognormal variance with pedigree 0.55085, pedigree (1,1,1,1,1)
  (same comment as for Tin, ion)
- Molybdenum [water, ground-]: 7.505e-8 kg; lognormal variance with pedigree 0.41618, pedigree (1,1,1,1,1)
  (same comment as for Tin, ion)
- Zinc, ion [water, ground-, long-term]: 0.00018189 kg; lognormal variance with pedigree 0.22053, pedigree (1,1,1,1,1)
  (same comment as for Thallium)
- Antimony [water, ground-]: 6.702e-9 kg; lognormal variance with pedigree 0.49289, pedigree (1,1,1,1,1)
  (same comment as for Tin, ion)
- Manganese [water, ground-, long-term]: 0.00015757 kg; lognormal variance with pedigree 0.22525, pedigree (1,1,1,1,1)
  (same comment as for Thallium)
- Vanadium, ion [water, ground-, long-term]: 1.9018e-7 kg; lognormal variance with pedigree 2.9336, pedigree (1,1,1,1,1)
  (same comment as for Thallium)
- Antimony [water, ground-, long-term]: 6.8676e-7 kg; lognormal variance with pedigree 1.1528, pedigree (1,1,1,1,1)
  (same comment as for Thallium)
- Manganese [water, ground-]: 6.1469e-7 kg; lognormal variance with pedigree 0.34521, pedigree (1,1,1,1,1)
  (same comment as for Tin, ion)
- Vanadium, ion [water, ground-]: 1.8348e-9 kg; lognormal variance with pedigree 0.53539, pedigree (1,1,1,1,1)
  (same comment as for Tin, ion)
- Aluminium [water, ground-, long-term]: 0.011027 kg; lognormal variance with pedigree 0.088925, pedigree (1,1,1,1,1)
  (same comment as for Thallium)
- Mercury [water, ground-]: 1.2884e-10 kg; lognormal variance with pedigree 0.6217, pedigree (1,1,1,1,1)
  (same comment as for Tin, ion)
- Zinc, ion [water, ground-]: 4.5333e-7 kg; lognormal variance with pedigree 0.35453, pedigree (1,1,1,1,1)
  (same comment as for Tin, ion)
- Nitrate [water, ground-, long-term]: 1.4262e-5 kg; lognormal variance with pedigree 0.34019, pedigree (1,1,1,1,1)
  (same comment as for Thallium)
- Lead [water, ground-]: 8.3922e-9 kg; lognormal variance with pedigree 0.48515, pedigree (1,1,1,1,1)
  (same comment as for Tin, ion)
- Tungsten [water, ground-, long-term]: 1.1343e-6 kg; lognormal variance with pedigree 0.60813, pedigree (1,1,1,1,1)
  (same comment as for Thallium)
- Aluminium [water, ground-]: 4.1664e-6 kg; lognormal variance with pedigree 0.28394, pedigree (1,1,1,1,1)
  (same comment as for Tin, ion)
- Magnesium [water, ground-]: 1.6084e-5 kg; lognormal variance with pedigree 0.24011, pedigree (1,1,1,1,1)
  (same comment as for Tin, ion)
- Transformation, to dump site [natural resource, land]: 7.5758e-6 m2; lognormal variance with pedigree 0.030596, pedigree (1,1,1,1,1)
  conversion to impoundment area.
  Uncertainty: U
- Ammonium, ion [water, ground-, long-term]: 9.0352e-7 kg; lognormal variance with pedigree 0.34019, pedigree (1,1,1,1,1)
  (same comment as for Thallium)
- Magnesium [water, ground-, long-term]: 0.00159 kg; lognormal variance with pedigree 0.14903, pedigree (1,1,1,1,1)
  (same comment as for Thallium)
- Tungsten [water, ground-]: 1.1629e-8 kg; lognormal variance with pedigree 0.47532, pedigree (1,1,1,1,1)
  (same comment as for Tin, ion)
- Arsenic, ion [water, ground-]: 6.8114e-9 kg; lognormal variance with pedigree 0.49225, pedigree (1,1,1,1,1)
  (same comment as for Tin, ion)
- Lead [water, ground-, long-term]: 0.00013354 kg; lognormal variance with pedigree 0.23088, pedigree (1,1,1,1,1)
  (same comment as for Thallium)
- Transformation, from unspecified [natural resource, land]: 7.5758e-6 m2; lognormal variance with pedigree 0.030596, pedigree (1,1,1,1,1)
  conversion of impoundment area.
  Uncertainty: U
- Arsenic, ion [water, ground-, long-term]: 7.0115e-7 kg; lognormal variance with pedigree 1.3653, pedigree (1,1,1,1,1)
  (same comment as for Thallium)
- Iron, ion [water, ground-, long-term]: 0.010337 kg; lognormal variance with pedigree 0.090851, pedigree (1,1,1,1,1)
  (same comment as for Thallium)
- TOC, Total Organic Carbon [water, ground-, long-term]: 0.00034955 kg; lognormal variance with pedigree 0.62026, pedigree (1,1,1,1,1)
  (same comment as for Thallium)
- Nitrate [water, ground-]: 4.0798e-6 kg; lognormal variance with pedigree 0.35386, pedigree (1,1,1,1,1)
  (same comment as for Tin, ion)
- Hydrogen sulfide [water, ground-, long-term]: 5.3713e-5 kg; lognormal variance with pedigree 0.20596, pedigree (1,1,1,1,1)
  (same comment as for Thallium)
- TOC, Total Organic Carbon [water, ground-]: 5.8356e-7 kg; lognormal variance with pedigree 0.34723, pedigree (1,1,1,1,1)
  (same comment as for Tin, ion)
- Ammonium, ion [water, ground-]: 2.5847e-7 kg; lognormal variance with pedigree 0.35386, pedigree (1,1,1,1,1)
  (same comment as for Tin, ion)
- Iron, ion [water, ground-]: 2.8102e-6 kg; lognormal variance with pedigree 0.2967, pedigree (1,1,1,1,1)
  (same comment as for Tin, ion)
- Tin, ion [water, ground-, long-term]: 2.8137e-5 kg; lognormal variance with pedigree 0.28267, pedigree (1,1,1,1,1)
  (same comment as for Thallium)
- Hydrogen sulfide [water, ground-]: 1.8056e-5 kg; lognormal variance with pedigree 0.21746, pedigree (1,1,1,1,1)
  (same comment as for Tin, ion)
- Titanium, ion [water, ground-, long-term]: 0.00022948 kg; lognormal variance with pedigree 0.21289, pedigree (1,1,1,1,1)
  (same comment as for Thallium)
- Fluoride [water, ground-, long-term]: 0.00024155 kg; lognormal variance with pedigree 0.25735, pedigree (1,1,1,1,1)
  (same comment as for Thallium)
- Titanium, ion [water, ground-]: 4.9393e-9 kg; lognormal variance with pedigree 0.5026, pedigree (1,1,1,1,1)
  (same comment as for Tin, ion)
- DOC, Dissolved Organic Carbon [water, ground-]: 5.8356e-7 kg; lognormal variance with pedigree 0.34723, pedigree (1,1,1,1,1)
  (same comment as for Tin, ion)
- Thallium [water, ground-]: 9.0872e-10 kg; lognormal variance with pedigree 0.55902, pedigree (1,1,1,1,1)
  (same comment as for Tin, ion)
- Copper, ion [water, ground-, long-term]: 0.00087659 kg; lognormal variance with pedigree 0.16869, pedigree (1,1,1,1,1)
  (same comment as for Thallium)
- Sulfate [water, ground-, long-term]: 0.00049915 kg; lognormal variance with pedigree 0.20596, pedigree (1,1,1,1,1)
  (same comment as for Thallium)
- DOC, Dissolved Organic Carbon [water, ground-, long-term]: 0.00034955 kg; lognormal variance with pedigree 0.62026, pedigree (1,1,1,1,1)
  (same comment as for Thallium)

## Sampling procedure
Tailings model based on observed leachate concentrations in literature. Extrapolated to 60'000 years heeding chemical characteristics. Initial waste composition from various literature sources. Climate information for national copper deposits (identified from the USGS Major Mineral Deposits database) from literature as follows: global mean annual temperature and precipitation data from Fick and Hijmans (2017); global mean annual evapotranspiration data from Fekete et al. (2002).

References:
Fekete, B. M., Vorosmarty, C. J. & Grabs, W. (2002). High-resolution fields of global runoff combining observed river discharge and simulated water balances. Global Biogeochemical Cycles, 16, 15-1 - 15-10.
Fick, S. E. & Hijmans, R. J. (2017). Worldclim 2: New 1-km spatial resolution climate surfaces for global land areas. International Journal of Climatology, 37, 4302-4315.

## Extrapolations
Climate data collected for copper deposits in Australia and aggregated to reflect average climatic conditions of copper deposits in the country. Initial tailings composition based on global average copper tailings composition, derived from literature data. Initial leachate concentration based on generic global average data also obtained from the literature.
