# sheet rolling, chromium steel

Dataset: EcoSpold 2, unit process
Geography: RER
Time period: 1997-01-01 to 2019-12-31
Technology level: current
Classification: ISIC rev.4 ecoinvent: 2410:Manufacture of basic iron and steel
Classification: EcoSpold01Categories: metals/processing
Tags: ConvertedDataset
Scenario: Business-as-Usual
System model: Allocation at the point of substitution
Share of production covered: 0 %
Generated by: Silvio Blaser
Published in: Werner F. 2007
Database: ecoinvent
isCopyrightProtected: true
accessRestrictedTo: 1

## General comment
This process is to be used only for high alloyed (chromium) steel. For many applications, the products of hot rolling are unsatisfactory, e.g., with respect to cross section, surface quality, dimensional accuracy, and general finish, so that cold rolling is necessary. Cold rolled products are mainly strips and sheets with high quality surface finish and precise metallurgical properties for use in high specification products.
[This dataset was already contained in the ecoinvent database version 2. It was not individually updated during the transfer to ecoinvent version 3. Life Cycle Impact Assessment results may still have changed, as they are affected by changes in the supply chain, i.e. in other datasets. This dataset was generated following the ecoinvent quality guidelines for version 2. It may have been subject to central changes described in the ecoinvent version 3 change report (http://www.ecoinvent.org/database/ecoinvent-version-3/reports-of-changes/), and the results of the central updates were reviewed extensively. The changes added e.g. consistent water flows and other information throughout the database. The documentation of this dataset can be found in the ecoinvent reports of version 2, which are still available via the ecoinvent website. The change report linked above covers all central changes that were made during the conversion process.]

## Included activities end
Includes the process steps annealing (I) and pickling (I), cold rolling, annealing (II) and pickling (II), tempering, inspecting and finishing, packing coils or sheets, roll maintenance. Does not include the material beeing rolled.

## Geography
Data-set is representative for European Union

## Technology
Average technique for EU, for high-alloyed or chromium steel.

## Parameters
- fraction, water, deionised, to air: 0.2; name fraction_WDI_to_air; = fraction_PW_to_air; lognormal variance with pedigree 0.092025, pedigree (4,4,3,2,4)
  Calculated value. See comment in the other parametres present in this dataset. Deionised water is considered to be always used as process water, thus process water fractions to air are applied to all deionised water input flows to calculate the amount of water consumed in the processes.
- fraction, cooling water, recirculating system, to air: 0.771; name fraction_CW_R_to_air; lognormal variance with pedigree 0.0413, pedigree (2,3,1,3,1)
  Calculated based on literature value (Scown, C.D., 2011, Water Footprint of U.S. Transportation Fuels and supplying information of the article) (Vionnet, S., Quantis Water Database - Technical Report, 2012).
- fraction, process water, to air: 0.2 dimensionless; name fraction_PW_to_air; lognormal variance with pedigree 0.092025, pedigree (4,4,3,2,4)
  Literature value (Statistics Canada, 2007 & Shaffer, K.H., 2008, Consumptive water use in the Great Lakes Basin, USGS) (Vionnet, S., Quantis Water Database - Technical Report, 2012).
- fraction, cooling water, to air: 0.3875; name fraction_CW_to_air; = (0.5*fraction_CW_OT_to_air)+(0.5*fraction_CW_R_to_air); lognormal variance with pedigree 0.092025, pedigree (4,4,3,2,4)
  Calculated value based on literature value (see comments of the other parametres present in this dataset) and expert opinion. In the case when no industry/literature data are available about the type of cooling or directly fraction, cooling water, to air specific for the process a default assumption is applied. It is assumed that the once-through cooling system is used in 50% of all cases and recirculating system is used in another 50% of all cases.
- fraction, cooling water, cooling pond system, to air: 0.032; name fraction_CW_CP_to_air; lognormal variance with pedigree 0.0413, pedigree (2,3,1,3,1)
  (same comment as for fraction, cooling water, recirculating system, to air)
- fraction, cooling water, once-through system, to air: 0.004; name fraction_CW_OT_to_air; lognormal variance with pedigree 0.0413, pedigree (2,3,1,3,1)
  (same comment as for fraction, cooling water, recirculating system, to air)

## Reference product
- sheet rolling, chromium steel: 1 kg; CPC 88601: Basic iron and steel manufacturing services; By-product classification allocatable product
  EcoSpold01Location=RER
  production volume 1.32237 kg
    This is a placeholder value that does not reflect real-world production volumes. This dataset does not currently require a real-world production volume to work in the database framework, and no actual data were collected yet. This has no negative effect on the results of the ecoinvent database. The placeholder value of this activity was scaled according to the nominal GDP of 2005 (source: United Nations, http://data.un.org/Glossary.aspx?q=GDP+%28current+US%24%29, accessed 20130726) to reflect an appropriate share of the global production volume, which is also a placeholder value.
  property price 0.111001 EUR2005
    Calculated based on inputs: The price of the product has been calculated as a sum of the values of the material and energy inputs for this product. This value is therefore a rough estimation. It may underestimate the real price since there are additional expenses when producing any product. These expences can include for example labour costs, treatment of waste materials and profit for the producer. Please consider carefully whether this level of data quality is acceptable for your application.
  property true value 0.111001
    allocation property applied in "true value" allocation // value calculated from revenue

## By-products
- iron scrap, sorted, pressed: 0 kg; By-product classification Recyclable; CPC 39310: Slag, dross, scalings and other waste from the manufacture of iron or steel; pedigree (1,1,1,1,1)
  Iron scrap recovered from this waste.
  Uncertainty: uncertainty calculated from uncertainty in waste composition, uncertainty of share of recyclable metal, uncertainty of transfer coefficient to bottom ash, uncertainty of the efficiency of scrap removal in MSWI plant.
  production volume 0.00183944 kg
  property price 0.175 EUR2005
    Temporary price data. Calculated as 90% of purchasers price based on: 2005 import and export prices (total trades (USD) divided by total weight (kg) in biggest economies of the world: EU27, USA, Brasil, China, India, Japan and Russia) from UN Commodity Trade Statistics Database (http://data.un.org/Explorer.aspxDatabase [Accessed 2011.06.20]). Commodity: Waste or scrap, of cast iron
  property carbon content 0
    carbon content on a dry matter basis (reserved; not for manual entry)
  property true value 0.000321901
    allocation property applied in "true value" allocation // value calculated from revenue
  properties: carbon content, non-fossil 0, water in wet mass 0 kg, wet mass 1 kg, carbon content, fossil 0, dry mass 1 kg, water content 0, carbon allocation 0 kg
- zinc concentrate: 0 kg; CPC 14290: Other non-ferrous metal ores and concentrates (other than uranium or thorium ores and concentrates); By-product classification allocatable product
  Calculated value from the knowledge of the properties of both products.
  production volume 3.84975e-7 kg
  property price 0.38 EUR2005; name ByP_price_EUR2005
    Temporary price data. Calculated as 90% of purchasers price based on: Zinc content in concentrate 53%. Concentrate price per kg Zn 86.5% of refined Zn price (13.5% treatment charges according to CHR Metals Limited 2005: Dynamic cost curves. http://www.minecost.com/dynamic.pdf). 2004 zinc price from USGS (2007) Mineral commodity summaries 2007. <http://minerals.usgs.gov/minerals/pubs/mcs/2007/mcs2007.pdf> [Accessed 25 May 2010]
  property zinc content 0.53; name zinc_C_zinc_concentrate
    Zinc content on a dry matter basis. Value taken from teh "zinc mine operation" /GLO dataset.
  property dry mass 1 kg; name DM_zinc_concentrate
  property carbon content 0
    carbon content on a dry matter basis (reserved; not for manual entry)
  property true value 1.46291e-7
    allocation property applied in "true value" allocation // value calculated from revenue
  properties: wet mass 1 kg, water content 0, carbon content, non-fossil 0, carbon content, fossil 0, water in wet mass 0 kg, carbon allocation 0 kg

## Inputs from technosphere
- kraft paper, bleached: 1.59537e-6 kg; lognormal variance with pedigree 0.04, pedigree (1,1,5,1,1)
  EcoSpold01Location=RER
  calculated from max value assuming lognormal distribution
  properties: carbon content, non-fossil 0.428894, water content 0.0582011, wet mass 1 kg, dry mass 0.945 kg, carbon content, fossil 9.3e-6
  note on carbon content, non-fossil: Biogenic C content was calculated after biogenic C contents of chemicals used in the production of the paper (in Tab 9.12 ecoinvent v2.2 report 11_III, part 9). The cellulose content in 1 kg of paper (on a wet mas basis) was estimated as (1-chemical content), C content of cellulose was considered 0.44 kgC/kg dry mass (ecoinvent v2.2 report, n 15a, pg 40)
  note on carbon content, fossil: Fossil C content was calculated after fossil C contents of chemicals used in the production of the paper (in Tab 9.12 ecoinvent v2.2 report 11_III, part 9).
- water, deionised: 0 kg; name water_deionised_input; pedigree (1,1,1,1,1)
  EcoSpold01Location=CH
  calculated from max value assuming lognormal distribution
  properties: wet mass 1 kg
- rolling mill: 1.61531e-9 unit; lognormal variance with pedigree 0.344, pedigree (3,4,5,1,1)
  EcoSpold01Location=RER
  activityLink introduced to establish a direct link to the corresponding regional supply of this product
- silicon carbide: 0.00216372 kg; lognormal variance with pedigree 0.07, pedigree (1,1,5,1,1)
  EcoSpold01Location=RER
  calculated from max value assuming lognormal distribution
  properties: carbon content, fossil 0.3, dry mass 1 kg, wet mass 1 kg
- lubricating oil: 0.00737859 kg; lognormal variance with pedigree 0.16, pedigree (1,1,5,1,1)
  EcoSpold01Location=RER
  calculated from max value assuming lognormal distribution
  properties: dry mass 1 kg, carbon content, fossil 0.75, wet mass 1 kg
  note on carbon content, fossil: Lubricating oil is produced from diesel. C-content/dry mass of fats and oils considered 75%, from: ecoinvent v2.2 report, n 15a, pg 40
- steel in car shredder residue: -0.00787715 kg; lognormal variance with pedigree 0.16, pedigree (1,1,5,1,1)
  calculated from max value assuming lognormal distribution
  EcoSpold01Location=CH
  production volume 0.0079 kg
    Calculated from the production volume of sheet rolling, chromium steel in proportion to the respective output amounts.
  properties: wet mass 1 kg, dry mass 1 kg
- lime, hydrated, loose weight: 4.72629e-5 kg; lognormal variance with pedigree 0.05, pedigree (1,1,5,1,1)
  calculated from max value assuming lognormal distribution
  EcoSpold01Location=CH
  properties: dry mass 0.997 kg, water content 0.00300903, wet mass 1 kg
- waste mineral oil: 0 kg; pedigree (1,1,1,1,1)
  EcoSpold01Location=CH
  calculated from max value assuming lognormal distribution
  production volume 0 kg
    (same comment as for steel in car shredder residue)
  properties: water content 0.111111, carbon content, fossil 0.864444, wet mass 1 kg, dry mass 0.9 kg
  note on carbon content, fossil: Tab A.6, ecoinvent v2.2 report 13_I. C content has been calculated after data in the tables, and then referred to 1 kg DM
- steel, chromium steel 18/8, hot rolled: 0.0514507 kg; lognormal variance with pedigree 0.066, pedigree (4,5,5,1,1)
  EcoSpold01Location=RER
  properties: carbon content, fossil 0.0008, wet mass 1 kg, dry mass 1 kg
  note on carbon content, fossil: Stainless steel model is the grade 304 steel (18/8 stainless, 18% chromium 8% nickel; max. 0.08% C)
- heat, district or industrial, natural gas: 0.0362703 MJ; lognormal variance with pedigree 0.04, pedigree (1,1,5,1,1)
  EcoSpold01Location=RER
  calculated from max value assuming lognormal distribution
- steel, low-alloyed: 0.000235317 kg; lognormal variance with pedigree 0.04, pedigree (1,1,5,1,1)
  EcoSpold01Location=RER
  calculated from max value assuming lognormal distribution
  properties: carbon content, fossil 0.005, dry mass 1 kg, wet mass 1 kg
  note on carbon content, fossil: Low alloyed steel composition given in Tab. 3.2 ecoinvent v2.2 report 10_partII. Steel assumed to have a C content of 0.5%
- electricity, medium voltage: 0.454045 kWh; lognormal variance with pedigree 0.04, pedigree (1,1,5,1,1)
  EcoSpold01Location=UCTE
  calculated from max value assuming lognormal distribution
- kraft paper, unbleached: 2.67225e-5 kg; lognormal variance with pedigree 0.34, pedigree (1,1,5,1,1)
  calculated from max value assuming lognormal distribution
  EcoSpold01Location=RER
  properties: dry mass 0.945 kg, carbon content, non-fossil 0.416625, carbon content, fossil 0.00202191, water content 0.0582011, wet mass 1 kg
  note on carbon content, non-fossil: Biogenic C content was calculated after biogenic C contents of chemicals used in the production of the paper (in Tab 9.4 ecoinvent v2.2 report 11_III, part 9). The cellulose content in 1 kg of paper (on a wet mas basis) was estimated as (1-chemical content), C content of cellulose was considered 0.44 kgC/kg dry mass (ecoinvent v2.2 report, n 15a, pg 40)
  note on carbon content, fossil: Fossil C content was calculated after fossil C contents of chemicals used in the production of the paper (in Tab 9.4 ecoinvent v2.2 report 11_III, part 9).
- heat, district or industrial, other than natural gas: 0.0189915 MJ; lognormal variance with pedigree 0.04, pedigree (1,1,5,1,1)
- wood preservative, inorganic salt, containing Cr: 0.000149566 kg; lognormal variance with pedigree 0.04, pedigree (1,1,5,1,1)
  calculated from max value assuming lognormal distribution
  EcoSpold01Location=RER
  properties: dry mass 1 kg, wet mass 1 kg
- hydrogen fluoride: 0.00431747 kg; lognormal variance with pedigree 0.11, pedigree (1,1,5,1,1)
  EcoSpold01Location=GLO
  calculated from max value assuming lognormal distribution
  properties: dry mass 1 kg, wet mass 1 kg
- packaging film, low density polyethylene: 8.46544e-5 kg; lognormal variance with pedigree 0.04, pedigree (1,1,5,1,1)
  calculated from max value assuming lognormal distribution
  EcoSpold01Location=RER
  properties: dry mass 1 kg, wet mass 1 kg, carbon content, fossil 0.857143
  note on carbon content, fossil: Polyethylene is formed out of a huge amount of ethylene monomers (C2H4) (ecoinvent v2.2 report 11_II). MW=28 g/mol
- sludge from steel rolling: -0.0175491 kg; lognormal variance with pedigree 0.0986, pedigree (2,5,5,1,1)
  EcoSpold01Location=CH
  production volume 0.0176 kg
    (same comment as for steel in car shredder residue)
  properties: dry mass 0.8 kg, carbon content, fossil 0.0123943, water content 0.25, wet mass 1 kg
- sawnwood, softwood, raw, dried (u=20%): 1.84465e-6 m3; lognormal variance with pedigree 0.04, pedigree (1,1,5,1,1)
  calculated from max value assuming lognormal distribution
  EcoSpold01Location=RER
  properties: water content 0.2, dry mass 450 kg, carbon content, non-fossil 0.494, wet mass 540 kg
  note on carbon content, non-fossil: C content of dry mass is 0.494 kgC/kg dry wood (ecoinvent v2.2 report 9)
- hydrogen peroxide, without water, in 50% solution state: 0.00381892 kg; lognormal variance with pedigree 0.13, pedigree (1,1,5,1,1)
  calculated from max value assuming lognormal distribution
  EcoSpold01Location=RER
  properties: wet mass 1 kg, dry mass 1 kg
- dust, unalloyed electric arc furnace steel: -0.000138598 kg; lognormal variance with pedigree 0.06, pedigree (1,1,5,1,1)
  EcoSpold01Location=CH
  calculated from max value assuming lognormal distribution
  production volume 0.000139 kg
    (same comment as for steel in car shredder residue)
  properties: water content 0.182033, carbon content, fossil 0.01339, dry mass 0.846 kg, wet mass 1 kg
- sheet rolling, steel: 0.000235317 kg; lognormal variance with pedigree 0.04, pedigree (1,1,5,1,1)
  EcoSpold01Location=RER
  calculated from max value assuming lognormal distribution
- nitric acid, without water, in 50% solution state: 0.00764781 kg; lognormal variance with pedigree 0.13, pedigree (1,1,5,1,1)
  calculated from max value assuming lognormal distribution
  EcoSpold01Location=RER
  properties: wet mass 1 kg, dry mass 1 kg
- municipal solid waste: -0.000356964 kg; lognormal variance with pedigree 0.0586, pedigree (2,5,5,1,1)
  EcoSpold01Location=CH
  production volume 0.000358 kg
    (same comment as for steel in car shredder residue)
  properties: carbon content, fossil 0.171549, carbon content, non-fossil 0.261655, water content 0.297017, wet mass 1 kg, dry mass 0.771 kg
  note on carbon content, fossil: MSW composition in tab 4.1, ecoinvent v2.2 report 13_I. C content referred to 1 kg DM
- chemical, inorganic: 1.37601e-8 kg; lognormal variance with pedigree 0.16, pedigree (1,1,5,1,1)
  calculated from max value assuming lognormal distribution
  EcoSpold01Location=GLO
  properties: carbon content, fossil 0.003, wet mass 1 kg, dry mass 1 kg
  note on carbon content, fossil: This dataset is an unweighted average of 20 inorganic substances (listed in Tab 88.1, ecoinvent v2.2 report 8, part II), being part of the top100 chemicals included in this database. The C-content has also been calculated as an unweighted average of the C content of the substances composing this dataset.
- water, deionised: 0.169894, 0.000611576 kg (2 entries); lognormal variance with pedigree 0.86, pedigree (1,1,5,1,1)
  EcoSpold01Location=CH
  calculated from max value assuming lognormal distribution
- waste mineral oil: -0.000965786, -2.23473e-5 kg (2 entries); lognormal variance with pedigree 0.06, pedigree (1,1,5,1,1)
  EcoSpold01Location=CH
  calculated from max value assuming lognormal distribution
  production volume 0.000991 kg

## Inputs from nature
- Water, cooling, unspecified natural origin [natural resource, in water]: 0.0135441 m3; name water_cooling_UNO_input; source Byers, W. 2003; lognormal variance with pedigree 0.0593, pedigree (2,3,5,3,3)
  Calculated based on literature, (Vionnet, S., Quantis Water Database - Technical Report, 2012). Assumed to have same or very similar water use as "sheet rolling, steel". Water is used for chromium conditioning, which basically means it is directly sprayed on the hot metal to cool it down. In this case the water comes into contact with the product, i.e. It is treated as process water, not cooling water. It includes the processes: hot rolling, acid pockling, cold rolling and finishing. The process ends when finished, rolled metal sheets leaves the plant.

## Emissions to nature
- NMVOC, non-methane volatile organic compounds, unspecified origin [air, unspecified]: 7.58798e-5 kg; lognormal variance with pedigree 0.05, pedigree (1,1,5,1,1)
  calculated from max value assuming lognormal distribution
- Nitrogen oxides [air, unspecified]: 0.000121647 kg; lognormal variance with pedigree 3.28, pedigree (1,1,5,1,1)
  calculated from max value assuming lognormal distribution
- Copper, ion [water, unspecified]: 2.53265e-7 kg; lognormal variance with pedigree 0.1486, pedigree (2,5,5,1,1)
- Nickel, ion [water, unspecified]: 7.39853e-7 kg; lognormal variance with pedigree 0.1486, pedigree (2,5,5,1,1)
- Chromium VI [water, unspecified]: 2.62239e-8 kg; lognormal variance with pedigree 0.1486, pedigree (2,5,5,1,1)
- TOC, Total Organic Carbon [water, unspecified]: 1.95433e-7 kg; lognormal variance with pedigree 0.42, pedigree (5,5,5,5,5)
- DOC, Dissolved Organic Carbon [water, unspecified]: 2.53265e-7 kg; lognormal variance with pedigree 0.28, pedigree (5,5,5,5,5)
- Chromium [air, unspecified]: 4.16791e-9 kg; lognormal variance with pedigree 0.708, pedigree (1,5,5,1,1)
- Iron [soil, unspecified]: 0.00546415 kg; lognormal variance with pedigree 0.29, pedigree (1,1,5,1,1)
  calculated from max value assuming lognormal distribution
- Aluminium [water, unspecified]: 1.23641e-6 kg; lognormal variance with pedigree 0.1486, pedigree (2,5,5,1,1)
- COD, Chemical Oxygen Demand [water, unspecified]: 3.59956e-5 kg; lognormal variance with pedigree 0.0986, pedigree (2,5,5,1,1)
- Chromium, ion [water, unspecified]: 4.70635e-7 kg; lognormal variance with pedigree 0.1486, pedigree (2,5,5,1,1)
- Particulates, > 2.5 um, and < 10um [air, unspecified]: 2.94147e-5 kg; lognormal variance with pedigree 0.07, pedigree (1,1,5,1,1)
  calculated from max value assuming lognormal distribution
- Hydrogen fluoride [air, unspecified]: 8.22613e-7 kg; lognormal variance with pedigree 0.54, pedigree (1,1,5,1,1)
  calculated from max value assuming lognormal distribution
- Suspended solids, unspecified [water, unspecified]: 0.000138598 kg; lognormal variance with pedigree 0.0986, pedigree (2,5,5,1,1)
- Sulfur dioxide [air, unspecified]: 1.59537e-5 kg; lognormal variance with pedigree 0.0986, pedigree (2,5,5,1,1)
- Lead [water, unspecified]: 2.62239e-7 kg; lognormal variance with pedigree 0.1486, pedigree (2,5,5,1,1)
- Manganese [water, unspecified]: 5.33452e-7 kg; lognormal variance with pedigree 0.1486, pedigree (2,5,5,1,1)
- Water [air, unspecified]: 0.00528245 m3; name water_to_air_unspecified; = (water_deionised_input/1000*fraction_WDI_to_air)+(water_cooling_UNO_input*fraction_CW_to_air); lognormal variance with pedigree 0.0807, pedigree (2,2,5,1,1)
  Calculated value based on literature values and expert opinion. See comments in the parametres' comment field.
  property fraction, origin: unspecified 0.993544; name fraction_origin_unspecified
  property fraction, origin: fresh water 0.00645553; name fraction_origin_fresh_water
  property fraction, origin: salt water 0; name fraction_origin_salt_water
- BOD5, Biological Oxygen Demand [water, unspecified]: 1.64523e-6 kg; lognormal variance with pedigree 0.25, pedigree (5,5,5,5,5)
- Water [water, unspecified]: 0.00843219 m3; name water_to_water_unspecified; = (water_deionised_input/1000)*(1-fraction_WDI_to_air)+water_cooling_UNO_input*(1-fraction_CW_to_air); lognormal variance with pedigree 0.0807, pedigree (2,2,5,1,1)
  (same comment as for Water)
  property fraction, origin: fresh water 0.0161766; name fraction_origin_fresh_water_Ww
  property carbon content, fossil 0; name C_content_fossil
  property wet mass 1000 kg; name WM
  property carbon content, non-fossil 0; name C_content_non_fossil
  property water in wet mass 1000 kg; name WWM
  property dry mass 0 kg; name DM
  property fraction, origin: unspecified 0.983823; name fraction_origin_unspecified_Ww
  property fraction, origin: salt water 0; name fraction_origin_salt_water_Ww
- Zinc, ion [water, unspecified]: 1.95433e-7 kg; lognormal variance with pedigree 0.1486, pedigree (2,5,5,1,1)
- Iron, ion [water, unspecified]: 4.05823e-6 kg; lognormal variance with pedigree 0.1486, pedigree (2,5,5,1,1)
- Chloride [water, unspecified]: 1.16662e-6 kg; lognormal variance with pedigree 0.0986, pedigree (2,5,5,1,1)
- Oils, unspecified [soil, industrial]: 3.83886e-5 kg; lognormal variance with pedigree 0.04, pedigree (1,1,5,1,1)
  calculated from max value assuming lognormal distribution
- Cadmium, ion [water, unspecified]: 1.30621e-7 kg; lognormal variance with pedigree 0.1486, pedigree (2,5,5,1,1)
- Hydrocarbons, unspecified [water, unspecified]: 1.64523e-6 kg; lognormal variance with pedigree 0.3686, pedigree (2,5,5,1,1)
- Particulates, > 10 um [air, unspecified]: 2.94147e-5 kg; lognormal variance with pedigree 0.07, pedigree (1,1,5,1,1)
  calculated from max value assuming lognormal distribution
- Mercury [water, unspecified]: 2.62239e-8 kg; lognormal variance with pedigree 0.1486, pedigree (2,5,5,1,1)

## Sampling procedure
Literature

## Review by Roland Hischier 2003-06-17
Passed.
