# sweet sorghum production

Dataset: EcoSpold 2, unit process
Geography: CN
Time period: 2000-01-01 to 2019-12-31
Technology level: current
Classification: ISIC rev.4 ecoinvent: 0111:Growing of cereals (except rice), leguminous crops and oil seeds
Scenario: Business-as-Usual
System model: Allocation at the point of substitution
Share of production covered: 100 %
Generated by: Jürgen Sutter
Published in: Jungbluth N. 2007
Database: ecoinvent
isCopyrightProtected: true
accessRestrictedTo: 1

## General comment
This dataset represents the cultivation of sweet sorghum on an area of 1 ha producing the co-products sweet sorghum grain and sweet sorghum stem. The yield of sweet sorghum grain is 3860 kg/ha at a moisture content at storage of 9.1%, the yield of sweet sorghum stem is 48263 kg/ha at a moisture content of 73%.
[This dataset was already contained in the ecoinvent database version 2. It was not individually updated during the transfer to ecoinvent version 3. Life Cycle Impact Assessment results may still have changed, as they are affected by changes in the supply chain, i.e. in other datasets. This dataset was generated following the ecoinvent quality guidelines for version 2. It may have been subject to central changes described in the ecoinvent version 3 change report (http://www.ecoinvent.org/database/ecoinvent-version-3/reports-of-changes/), and the results of the central updates were reviewed extensively. The changes added e.g. consistent water flows and other information throughout the database. The documentation of this dataset can be found in the ecoinvent reports of version 2, which are still available via the ecoinvent website. The change report linked above covers all central changes that were made during the conversion process.]

## Included activities start
This activity starts after the harvest of the previous crop. The inputs of seeds, mineral fertilisers and pesticides are considered. It is assumed that no organic fertilisers are applied. Seed input is approximated by reducing the yield by 5 kg (required amount of seed per hectare for sowing)

## Included activities end
The dataset includes all machine operations and corresponding machine infrastructure and sheds. Machine operations are: soil cultivation, sowing, fertilisation, weed control, pest and pathogen control, combine-harvest and transport from field to farm (15 km). Further, direct field emissions are included. This activity ends after harvest at the farm gate.

## Geography
The inventory is modelled for China.

## Technology
High yield production.

## Time period
Time of publications.

## Parameters
- fraction, irrigation water to surface water: 0.2; name fraction_IW_to_surface_water; lognormal variance with pedigree 0.0886, pedigree (4,3,1,1,4)
  Literature value (Döll, 2011) cross referenced with expert opinion.
- fraction, irrigation water, to ground water: 0.8; name fraction_IW_to_ground_water; lognormal variance with pedigree 0.0886, pedigree (4,3,1,1,4)
  Literature value (Döll, 2011) cross referenced with expert opinion.
- LUC_crop_specific: 1
  This parameter allows to switch between a "crop specific" and a "country specific" approach when calculating the LUC of a crop. By default, the chosen approach is "crop specific", so the value of the parameter is 1. If you want to apply a "country specific" approach, turn the parameter to 0.
- fraction, irrigation water, to air: 0.4909; name fraction_IW_to_air; lognormal variance with pedigree 0.0409, pedigree (2,2,2,1,1)
  Literature value (Siebert, 2010) (Vionnet, S., Quantis Water Database - Technical Report, 2012).

## Reference product
- sweet sorghum stem: 1 kg; name REF_PRODUCT; source FAO 2002; CPC 01809: Other sugar crops n.e.c.; By-product classification allocatable product
  Yield per hectare (FAO 2002)
  EcoSpold01Location=CN
  production volume 3.18963e10 kg
    Total production in China is around 35 Million tons.
    Sweet sorghum stem production volumes were calculated using information in Tab 11.3 (ecoinvent v2 report 17-part 11). Production volumes were calculated from "sweet sorghum grain" production volumes (2005), using a yield ratio obtained from the table mentioned above.
  property price 0.013 EUR2005; name REF_PRODUCT_price_EUR2005
    Temporary price data. Calculated as 90% of purchasers price based on: Source: Dauriat 2006
  property carbon content, fossil 0; name REF_PRODUCT_C_content_fossil
    fossil carbon content on a dry matter basis
  property energy content 4.45 MJ; name REF_PRODUCT_energy_content
    as gross calorific value (when relevant)
  property water content 2.7037; name REF_PRODUCT_water_content; = (1-REF_PRODUCT_DM)/ REF_PRODUCT_DM
  property dry mass 0.27 kg; name REF_PRODUCT_DM
  property wet mass 1 kg; name REF_PRODUCT_WM
  property carbon content, non-fossil 0.425926; name REF_PRODUCT_C_content_non_fossil
    biogene carbon content on a dry matter basis
  property water in wet mass 0.73 kg; name REF_PRODUCT_WWM; = 1- REF_PRODUCT_DM
  property carbon content 0.425926
    carbon content on a dry matter basis (reserved; not for manual entry)
  property true value 627.419; name REF_PRODUCT_true_value
    allocation property applied in "true value" allocation // value calculated from revenue
  properties: carbon allocation 0.115 kg

## By-products
- protein feed, 100% crude: 0 kg; source Agroscope 2011; By-product classification allocatable product; CPC 23319: Preparations used in animal feeding n.e.c.; pedigree (1,1,1,1,1)
  Calculated based on crude protein content of sweet sorghum grain (0.38kg/kg dry mass). The dry mass of the reference product is 0.909kg/kg.
  production volume 8.82315e8 kg
  property carbon content, non-fossil 0.53
    considered pure protein (ecoinvent v2.2 report 17, pg 288). C-content in protein is estimated to be 53% ( from "Evolutionary and Biochemical Aspects", A.D. Kay and T. Vrede (in Global Ecology, 2010, Elsevier B.V., S.E. Jørgensen Ed.).
  property price 0.424 EUR2005; name protein_feed_price_EUR2005
    Based on protein content and energy feed, gross content in soybean meal and prices per kg of soybean meal. Assumed soybean meal is the most used feed. Soybean meal 2004 prices for World import/export data (tonnes and US$) from FaoStat statistics (http://faostat.fao.org/site/535/default.aspx#ancor, TRADE)- [Accessed 24 May 2010]. See calculations for protein /energy content
  property carbon content 0.53
    carbon content on a dry matter basis (reserved; not for manual entry)
  property true value 565.328
    allocation property applied in "true value" allocation // value calculated from revenue
  properties: water in wet mass 0 kg, water content 0, wet mass 1 kg, carbon content, fossil 0, dry mass 1 kg, carbon allocation 0.53 kg
- energy feed, gross: 0 MJ; source Agroscope 2011; CPC 23319: Preparations used in animal feeding n.e.c.; By-product classification allocatable product; pedigree (1,1,1,1,1)
  Calculated based on gross energy of sweet sorghum grain (18.36MJ/kg dry mass). The dry mass of the reference product is 0.909kg/kg.
  production volume 4.26297e10 MJ
  property price 0.0108 EUR2005; name energy_feed_price_EUR2005
    Based on energy feed, gross content in soybean meal and prices per kg of soybean meal. Assumed soybean meal is the most used feed. Soybean meal 2004 prices for World import/export data (tonnes and US$) from FaoStat statistics (http://faostat.fao.org/site/535/default.aspx#ancor, TRADE)- [Accessed 24 May 2010]. See calculations for protein /energy content
  property carbon content 0
    carbon content on a dry matter basis (reserved; not for manual entry)
  property true value 695.741
    allocation property applied in "true value" allocation // value calculated from revenue
  properties: dry mass 1 kg, wet mass 1 kg, carbon content, fossil 0, carbon content, non-fossil 0, water content 0, water in wet mass 0 kg, carbon allocation 0 kg

## Inputs from technosphere
- ammonium nitrate, as N: 0.000275353 kg; source IFA 2006; lognormal variance with pedigree 0.042, pedigree (3,1,5,1,1)
  EcoSpold01Location=RER
  Uncertainty: IFA 2006
  properties: dry mass 1 kg, wet mass 1 kg
- atrazine: 5.61705e-6 kg; source NASS 2004; lognormal variance with pedigree 0.0401, pedigree (1,1,5,3,1)
  The application of pesticides is approximated by data on sweet sorghum production in the USA. The amounts of active ingredients stem from NASS (2004). Substnaces that are not availabe in the ecoinvent database are approximated by inventories of superordinate chemical classes. The inventories were assigned according to Sutter (2010, Tab. 2.25). If no inventory for the active ingredient or the corresponding chemical class was available, the pesticide was approximated with the product “pesticide, unspecified”. --- Sources: Sutter J. (2010) Life Cycle Inventories of Pesticides. Swiss Centre for Life Cycle Inventories, St. Gallen, Switzerland.
  EcoSpold01Location=RER
  Uncertainty: USDA 2004
  properties: wet mass 1 kg, dry mass 1 kg, carbon content, fossil 0.446512
- fertilising, by broadcaster: 2.06514e-5 ha; source FAO 2002; lognormal variance with pedigree 0.05, pedigree (1,1,5,1,1)
  EcoSpold01Location=CH
  Uncertainty: FAO 2002
- sweet sorghum grain: -0.0265715 kg; name BY_PRODUCT; source Smith C.W. 2000
  Average yield per hectare (2001-2005; FAOSTAT Database Query: Sorghum Production. Retrieved 16. May 2006, from http://faostat.fao.org/faostat/). The original value is 3865 kg/ha; 5 kg of grain are needed as seed input (Smith & Frederikson 2000). As there is no separate dataset for sorghum seed, the 5 kg seed are directly subtracted from the yield.
  EcoSpold01Location=CN
  production volume 2.55432e9 kg
    Total production in China is around 35 Million tons.
    Production volumes from FAOSTAT (2005). It was considered that sweet sorghum (Sorghum bicolor vr. sweet) was produced in China at the same rates as sorghum (Sorghum bicolor), from info in ecoinvent v2 report 17-part 11, and in http://www.new-ag.info/en/focus/focusItem.php?a=1071
  property carbon content, non-fossil 0.46818; name BY_PRODUCT_C_content_non_fossil
  property wet mass 1 kg; name BY_PRODUCT_WM
  property water in wet mass 0.091 kg; name BY_PRODUCT_WWM; = 1-BY_PRODUCT_DM
  property dry mass 0.909 kg; name BY_PRODUCT_DM
  property energy content 14.27 MJ; name BY_PRODUCT_energy_content
  property price 0.121 EUR2005; name BY_PRODUCT_price_EUR2005
  properties: water content 0.10011
  note on carbon content, non-fossil: biogene carbon content on a dry matter basis Composition data obtained from Sorgho, grain (http://www.feed-alp.admin.ch/start.php?action=adv_search&cmd=list_feed ). First, composition data were refered to 1 kg dry mass. Then, C-contents were calculated considering a C-content/dry mass of 46% in carbohydrates (including fibres), 53% in proteins and 75% in fats. All data from "Evolutionary and Biochemical Aspects", A.D. Kay and T. Vrede (in Global Ecology, 2010, Elsevier B.V., S.E. Jørgensen Ed.).
- urea, as N: 0.000275353 kg; source IFA 2006; lognormal variance with pedigree 0.042, pedigree (3,1,5,1,1)
  EcoSpold01Location=RER
  Uncertainty: IFA 2006
  properties: dry mass 1 kg, wet mass 1 kg, carbon content, fossil 0.2
- acetamide-anillide-compound, unspecified: 2.42507e-6 kg; source NASS 2004; lognormal variance with pedigree 0.0401, pedigree (1,1,5,3,1)
  (same comment as for atrazine)
  properties: wet mass 1 kg, carbon content, fossil 0.659175, dry mass 1 kg
  note on carbon content, fossil: Approximated as an unweighted average of the C-content of the acetamide-anillide-compound (Tab 2.25 Sutter, 2010) alachor, metolachlor, propachlor and teflubenzuron
- tillage, cultivating, chiselling: 6.88381e-6 ha; source FAO 2002; lognormal variance with pedigree 0.05, pedigree (1,1,5,1,1)
  EcoSpold01Location=CH
  Uncertainty: FAO 2002
- metolachlor: 2.50295e-6 kg; source NASS 2004; lognormal variance with pedigree 0.0401, pedigree (1,1,5,3,1)
  EcoSpold01Location=RER
  The application of pesticides is approximated by data on sweet sorghum production in the USA. The amounts of active ingredients stem from NASS (2004). Substnaces that are not availabe in the ecoinvent database are approximated by inventories of superordinate chemical classes. The inventories were assigned according to Sutter (2010, Tab. 2.25). If no inventory for the active ingredient or the corresponding chemical class was available, the pesticide was approximated with the product “pesticide, unspecified”. --- Sources: Sutter J. (2010) Life Cycle Inventories of Pesticides. Swiss Centre for Life Cycle Inventories, St. Gallen, Switzerland.
  Uncertainty: USDA 2004
  properties: wet mass 1 kg, dry mass 1 kg, carbon content, fossil 0.633803
- tillage, currying, by weeder: 6.88381e-6 ha; source FAO 2002; lognormal variance with pedigree 0.05, pedigree (1,1,5,1,1)
  EcoSpold01Location=CH
  Uncertainty: FAO 2002
- tillage, harrowing, by spring tine harrow: 6.88381e-6 ha; source FAO 2002; lognormal variance with pedigree 0.05, pedigree (1,1,5,1,1)
  EcoSpold01Location=CH
  Uncertainty: FAO 2002
- potassium chloride, as K2O: 0.000344191 kg; source IFA 2006; lognormal variance with pedigree 0.042, pedigree (3,1,5,1,1)
  EcoSpold01Location=RER
  Uncertainty: IFA 2006
  properties: dry mass 1 kg, wet mass 1 kg
- packaging, for fertilisers: 0.00660846 kg; lognormal variance with pedigree 0.0912, pedigree (4,3,5,5,4)
  Total amount of active substance/s of fertilisers needed for the production of 'sweet sorghum stem' is calculated to be circa 4.80E+02 kg. Fertiliser/s used in this dataset is/are: 'ammonium nitrate, as N', 'lime', 'phosphate fertiliser, as P2O5', 'potassium chloride, as K2O', 'urea, as N'. The total amount of active substance/s is doubled in order to account for the packaging of the dilluted product of fertiliser/s that is/are applied. Therefore, 9.60E+02 kg of packaging for fertilisers is justified with this exchange.
  properties: carbon content, fossil 0.825301, dry mass 1 kg, wet mass 1 kg, price 0.0642 EUR2005
  note on carbon content, fossil: Considering a chemical formula (C2H4)n for polyethylene, carbon content-fossil is calculated to be 0.856286 kg of Carbon per kg of dry mass.
- irrigation: 0.0157183 m3; name water_irrigation_input; source Siebert, S. 2010; lognormal variance with pedigree 0.0427, pedigree (2,2,5,1,1)
  Calculated based on literature values (Döll, 2010) and partially modelled at ETH (Pfister, S.).
  property carbon content, non-fossil 0; name C_content_non_fossil
  property water in wet mass 999.89 kg; name WWM
  property dry mass 0.11 kg; name DM
  property carbon content, fossil 0; name C_content_fossil
  property water content 9089.91; name water_content
  property wet mass 1000 kg; name WM
- glyphosate: 1.68743e-6 kg; source NASS 2004; lognormal variance with pedigree 0.0401, pedigree (1,1,5,3,1)
  (same comment as for metolachlor)
  properties: carbon content, fossil 0.214286, dry mass 1 kg, wet mass 1 kg
- application of plant protection product, by field sprayer: 2.06514e-5 ha; source FAO 2002; lognormal variance with pedigree 0.05, pedigree (1,1,5,1,1)
  EcoSpold01Location=CH
  Uncertainty: FAO 2002
- transport, tractor and trailer, agricultural: 0.00541377 metric ton*km; lognormal variance with pedigree 0.268, pedigree (4,5,5,5,5)
  EcoSpold01Location=CH
  Field-to-farm transport of harvested maize grains and farm-to-field transport of fertilisers, pesticides and seeds; distance 15 km; masses of pesticides and fertilisers are considered for the whole product, instead of active ingredients and nutrients only (according to Nemecek et al. 2004).
  Uncertainty: Standard Distances
- tillage, ploughing: 6.88381e-6 ha; source FAO 2002; lognormal variance with pedigree 0.05, pedigree (1,1,5,1,1)
  EcoSpold01Location=CH
  Uncertainty: FAO 2002
- packaging, for pesticides: 2.60861e-5 kg; lognormal variance with pedigree 0.0912, pedigree (4,3,5,5,4)
  Total amount of active substance/s of pesticides needed for the production of sweet sorghum stem is calculated to be circa 1.89E+00 kg. Pesticide/s used in this dataset is/are: '[sulfonyl]urea-compound', 'acetamide-anillide-compound, unspecified', 'atrazine', 'benzoic-compound', 'glyphosate', 'metolachlor', 'organophosphorus-compound, unspecified', 'phenoxy-compound'. The total amount of active substance/s is doubled in order to account for the packaging of the dilluted product of pesticide/s that is/are applied. Therefore, 3.79E+00 kg of packaging for pesticides is justified with this exchange.
  properties: carbon content, fossil 0.85714, dry mass 1 kg, price 0.0642 EUR2005, wet mass 1 kg
- combine harvesting: 6.88381e-6 ha; source FAO 2002; lognormal variance with pedigree 0.05, pedigree (1,1,5,1,1)
  EcoSpold01Location=CH
  Uncertainty: FAO 2002
- lime: 0.00206514 kg; source Dauriat A. 2000; lognormal variance with pedigree 0.042, pedigree (3,1,5,1,1)
  EcoSpold01Location=CH
  Uncertainty: IFA 2006
  properties: dry mass 1 kg, wet mass 1 kg, carbon content, fossil 0.120005
- phenoxy-compound: 5.13099e-7 kg; source NASS 2004; lognormal variance with pedigree 0.0401, pedigree (1,1,5,3,1)
  (same comment as for atrazine)
  properties: carbon content, fossil 0.532559, wet mass 1 kg, dry mass 1 kg
  note on carbon content, fossil: An unweighted average of the C content in mCPA, mCPB, mecoprop, fluazifop-P-butyl, and 2,4-D. Those substances are classified as phenoxy-compounds in Tab 2.25, Sutter 2010
- benzoic-compound: 8.64194e-8 kg; source NASS 2004; lognormal variance with pedigree 0.0401, pedigree (1,1,5,3,1)
  (same comment as for atrazine)
  properties: dry mass 1 kg, wet mass 1 kg, carbon content, fossil 0.405853
  note on carbon content, fossil: C content estimated after the pesticides Dicamba (C8H6Cl2O3) and Clopyralid (C6H3Cl2NO2) (Tab 1.5, Sutter 2010), classified in ecoinvent v2.2 report 15a, Tab 10.3 as benzoic compounds
- phosphate fertiliser, as P2O5: 0.000344191 kg; source IFA 2006; lognormal variance with pedigree 0.042, pedigree (3,1,5,1,1)
  EcoSpold01Location=RER
  Uncertainty: IFA 2006
  properties: wet mass 1 kg, dry mass 1 kg
- [sulfonyl]urea-compound: 1.04159e-8 kg; source NASS 2004; lognormal variance with pedigree 0.0401, pedigree (1,1,5,3,1)
  (same comment as for metolachlor)
  properties: wet mass 1 kg, carbon content, fossil 0.540853, dry mass 1 kg
  note on carbon content, fossil: Approximated as an unweighted average of the C-content of the [sulfonyl]urea-compounds (Tab 2.25 Sutter, 2010) chlorotoluron, Diuron, Linuron and Isoproturon.
- sowing: 6.88381e-6 ha; source FAO 2002; lognormal variance with pedigree 0.05, pedigree (1,1,5,1,1)
  EcoSpold01Location=CH
  Uncertainty: FAO 2002
- organophosphorus-compound, unspecified: 2.00608e-7 kg; source NASS 2004; lognormal variance with pedigree 0.0401, pedigree (1,1,5,3,1)
  (same comment as for atrazine)
  properties: wet mass 1 kg, dry mass 1 kg, carbon content, fossil 0.260898
  note on carbon content, fossil: C content was calculated as an unweighted average of glyphosate, parathion, and fosetyl-Al. Those substances are classified as organo-phosphorous compounds in Tab 2.25, Sutter 2010

## Inputs from nature
- Energy, gross calorific value, in biomass [natural resource, biotic]: 1.88623 MJ; lognormal variance with pedigree 0.0517684, pedigree (4,3,5,1,1)
  Calculated from energy balance.
- Carbon dioxide, in air [natural resource, in air]: 0.176043 kg; lognormal variance with pedigree 0.0586, pedigree (4,3,5,1,1)
  Modelled,see chapter 'CO2 binding' in "01_crop production_direct field emissions and natural resources_v1.0.pdf" - pdf-document on the dedicated talk page of ecoinvent (www.ecoinvent.org/documentation)
  Uncertainty: calculated from the carbon balance
- Transformation, to annual crop, irrigated, intensive [natural resource, land]: 0.0688381 m2; lognormal variance with pedigree 0.1707, pedigree (1,3,5,3,1)
  Modelled, see chapter 'Land use' in "01_crop production_direct field emissions and natural resources_v1.0.pdf" - pdf-document on the dedicated talk page of ecoinvent (www.ecoinvent.org/documentation)
  Uncertainty: FAOSTAT 2006, FAO 1994
- Transformation, from annual crop [natural resource, land]: 0.0688381 m2; lognormal variance with pedigree 0.1707, pedigree (1,3,5,3,1)
  (same comment as for Transformation, to annual crop, irrigated, intensive)
- Occupation, annual crop, irrigated, intensive [natural resource, land]: 0.0401533 m2*year; lognormal variance with pedigree 0.0907, pedigree (1,3,5,3,1)
  (same comment as for Transformation, to annual crop, irrigated, intensive)

## Emissions to nature
- Metolachlor [soil, agricultural]: 2.50295e-6 kg; lognormal variance with pedigree 0.0686, pedigree (4,3,5,1,1)
  Modelled, see chapter 'Emissions of pesticides to agricultural soil' in "01_crop production_direct field emissions and natural resources_v1.0.pdf" - pdf-document on the dedicated talk page of ecoinvent (www.ecoinvent.org/documentation)
  Uncertainty: Calculated from the pesticide application
- Dicamba [soil, agricultural]: 8.64194e-8 kg; lognormal variance with pedigree 0.0686, pedigree (4,3,5,1,1)
  (same comment as for Metolachlor)
- Prosulfuron [soil, agricultural]: 9.25873e-9 kg; lognormal variance with pedigree 0.0686, pedigree (4,3,5,1,1)
  (same comment as for Metolachlor)
- Nitrate [water, ground-]: 0.000850426 kg; lognormal variance with pedigree 0.0986, pedigree (4,3,5,1,1)
  Modelled with the 'SQCB-NO3 model' described in "01_crop production_direct field emissions and natural resources_v1.0.pdf" - pdf-document on the dedicated talk page of ecoinvent (www.ecoinvent.org/documentation)
  Uncertainty: Estimation
- Nitrogen oxides [air, non-urban air or from high stacks]: 3.00685e-6 kg; = 0.21 * N2O; lognormal variance with pedigree 0.0987, pedigree (4,3,5,3,1)
  Modelled, see chapter 'Emissions of NOx to the air' in "01_crop production_direct field emissions and natural resources_v1.0.pdf" - pdf-document on the dedicated talk page of ecoinvent (www.ecoinvent.org/documentation)
  Uncertainty: Calculated with standard method
- Lead [soil, agricultural]: -2.75132e-7 kg; source Smith C.W. 2000
  Calculated as the difference between heavy metal input through fertilisers and output through the harvested product. Heavy metal contents of sorghum grains (Cu and Zn) according to Smith & Frederikson (2000). Heavy metal contents of sorghum stems according to Smith & Fredeiksen (2000) (Zn) and BIOBIB (1996) (Cd, Cu, Pb). Heavy metal contents of mineral fertilisers according to Nemecek et al. (2004). Negative values represent a net export of heavy metals. --- Sources: Nemecek T., Heil A., Huguenin O., Meier S., Erzinger S., Blaser S., Dux D. & Zimmerman A. (2004) Life Cycle Inventories of Agricultural Production Systems. Ecoinvent report no. 15. Swiss Centre for Life Cycle Inventories, Duebendorf, Switzerland. --- BIOBIB (1996): Reisinger K., Haslinger C., Herger M., Hofbauer H. (1996) BIOBIB - a Database for Biofuels. THERMIE- Conference: Renewable Energy Databases, Harwell (United Kingdom).
- Terbufos [soil, agricultural]: 1.45056e-7 kg; lognormal variance with pedigree 0.0686, pedigree (4,3,5,1,1)
  (same comment as for Metolachlor)
- Dimethenamid [soil, agricultural]: 5.23899e-7 kg; lognormal variance with pedigree 0.0686, pedigree (4,3,5,1,1)
  (same comment as for Metolachlor)
- Dinitrogen monoxide [air, non-urban air or from high stacks]: 1.43183e-5 kg; name N2O; lognormal variance with pedigree 0.0987, pedigree (4,3,5,3,1)
  Modelled, see chapter 'Emissions of N2O to the air' in "01_crop production_direct field emissions and natural resources_v1.0.pdf" - pdf-document on the dedicated talk page of ecoinvent (www.ecoinvent.org/documentation)
  Uncertainty: Calculated with standard method
- Atrazine [soil, agricultural]: 5.61705e-6 kg; lognormal variance with pedigree 0.0686, pedigree (4,3,5,1,1)
  (same comment as for Metolachlor)
- Copper [soil, agricultural]: -5.70606e-7 kg; source Smith C.W. 2000
  (same comment as for Lead)
- Metsulfuron-methyl [soil, agricultural]: 1.15738e-9 kg; lognormal variance with pedigree 0.0686, pedigree (4,3,5,1,1)
  (same comment as for Metolachlor)
- 2,4-D [soil, agricultural]: 5.13099e-7 kg; lognormal variance with pedigree 0.0686, pedigree (4,3,5,1,1)
  (same comment as for Metolachlor)
- Ammonia [air, non-urban air or from high stacks]: 5.68603e-5 kg; lognormal variance with pedigree 0.0687, pedigree (4,3,5,3,1)
  Modelled with the 'AGRAMMON model' described in "01_crop production_direct field emissions and natural resources_v1.0.pdf" - pdf-document on the dedicated talk page of ecoinvent (www.ecoinvent.org/documentation)
  Uncertainty: Calculated with standard method
- Alachlor [soil, agricultural]: 1.90117e-6 kg; lognormal variance with pedigree 0.0686, pedigree (4,3,5,1,1)
  (same comment as for Metolachlor)
- Phosphorus [water, surface water]: 6.24121e-6 kg; lognormal variance with pedigree 0.0987, pedigree (4,3,5,3,1)
  Modelled, see chapter 'Emissions of phosphorous to the water' in "01_crop production_direct field emissions and natural resources_v1.0.pdf" - pdf-document on the dedicated talk page of ecoinvent (www.ecoinvent.org/documentation)
  Uncertainty: Calculated with standard method
- Cadmium [soil, agricultural]: -1.25939e-8 kg; source Smith C.W. 2000
  (same comment as for Lead)
- Chlorpyrifos [soil, agricultural]: 5.55531e-8 kg; lognormal variance with pedigree 0.0686, pedigree (4,3,5,1,1)
  (same comment as for Metolachlor)
- Water [water, surface water]: 0.00160044 m3; name water_to_water_surface; = water_irrigation_input*(1-fraction_IW_to_air)*fraction_IW_to_surface_water; lognormal variance with pedigree 0.1286, pedigree (4,3,5,1,4)
  Calculated value. See the parameters and their comments to understand the calculation.
  property fraction, origin: salt water 0; name fraction_origin_salt_water_Wsw
  property fraction, origin: fresh water 1; name fraction_origin_fresh_water_Wsw
- Water [water, ground-]: 0.00640175 m3; name water_to_water_ground; = water_irrigation_input*(1-fraction_IW_to_air)*fraction_IW_to_ground_water; lognormal variance with pedigree 0.1286, pedigree (4,3,5,1,4)
  Calculated value. See the parameters and their comments to understand the calculation.
  property fraction, origin: fresh water 1; name fraction_origin_fresh_water_Wgw
  property fraction, origin: unspecified 0; name fraction_origin_unspecified_Wgw
  property fraction, origin: salt water 0; name fraction_origin_salt_water_Wgw
- Phosphorus [water, ground-]: 4.81867e-7 kg; lognormal variance with pedigree 0.0987, pedigree (4,3,5,3,1)
  (same comment as for Phosphorus)
- Water [air, unspecified]: 0.00771611 m3; name water_to_air_unspecified; = (water_irrigation_input*fraction_IW_to_air); lognormal variance with pedigree 0.0807, pedigree (2,2,5,1,1)
  Calculated value based on literature values and expert opinion. See comments in the parametres' comment field.
  property fraction, origin: salt water 0; name fraction_origin_salt_water
  property fraction, origin: fresh water 1; name fraction_origin_fresh_water
  property fraction, origin: unspecified 0; name fraction_origin_unspecified
- Zinc [soil, agricultural]: -6.60701e-7 kg; source Smith C.W. 2000
  (same comment as for Lead)
- Glyphosate [soil, agricultural]: 1.68743e-6 kg; lognormal variance with pedigree 0.0686, pedigree (4,3,5,1,1)
  (same comment as for Metolachlor)

## Sampling procedure
Literature data

## Extrapolations
Transports are modelled with standard distances. Data for the usage of pesticides are taken from US production. Machine usage is modelled with Chinese processings and Swiss diesel consumptions. Emissions are calculated with standard methods.

## Review by Niels Jungbluth 2006-10-17
Passed.
none
