# treatment of residue from mechanical treatment, industrial device, municipal waste incineration

Dataset: EcoSpold 2, unit process
Geography: RoW
Time period: 2006-01-01 to 2019-12-31
Technology level: current
Classification: ISIC rev.4 ecoinvent: 3821:Treatment and disposal of non-hazardous waste
Synonyms: Siedlungsabfallverbrennung; municipal waste incineration; Kehrichtverbrennung
Scenario: Business-as-Usual
System model: Allocation at the point of substitution
Share of production covered: 1.8 %
Generated by: Gabor Doka
Published in: Doka G. 2013
Database: ecoinvent
isCopyrightProtected: true
accessRestrictedTo: 1

## General comment
This dataset represents the activity of waste disposal of residue from mechanical treatment, industrial device in a municipal solid waste incinerator (MSWI) // Recommended use of this dataset: Only for incineration of shredder residues generated in the recycling (mechanical treatment) of industrial electronics // Inventoried waste contains 1.54% rubber; 37.7% Plastics from electronic consumer goods; 37.7% Plastics from electronic industrial goods; 22.4% MSWI iron scrap; 0.0742% Alu in MSW; 0.0767% Glass; 0.596% wiring copper; 0.0136% Pb in ASR inert; 0.00693% silver; . // Waste composition (wet, in ppm): upper heating value 27.76 MJ/kg; lower heating value 26.61 MJ/kg; H2O 6923; O 66293; H 57376; C 626590; S 490.55; N 10017; P 555.61; B n.a.; Cl 5261.7; Br 4142.5; F 188.3; I n.a.; Ag 69.307; As 5.6489; Ba 133.31; Cd 114.15; Co 22.202; Cr 308.3; Cu 11402; Hg 0.64022; Mn 542.24; Mo 2.2596; Ni 612.3; Pb 332.45; Sb 3658.7; Se 1.4759; Sn 302.82; V 56.507; Zn 622.94; Be 0.35141; Sc n.a.; Sr 62.199; Ti 3372; Tl 0.28113; W n.a.; Si 9434.4; Fe 183630; Ca 2399.8; Al 4830.6; K 88.123; Mg n.a.; Na 154.54; // Share of carbon in waste that is biogenic 0%. // Share of metals in waste not oxidised and bulk-recyclable (exclude very small or thin parts) Iron: 99.35%; Alu: 15.29%; Copper: 52.27%. // One kg of this waste produces 0.1652 kg of slag and 0.01708 kg of residues, which are landfilled. Additional solidification with 0.006834 kg of cement. // Net energy production: 3.35MJ/kg electric energy and 6.64MJ/kg thermal energy. // Recovery of metal scrap to recycling: 105.8g iron scrap, 0.21358g aluminium scrap, 1.8043g copper scrap.

## Included activities start
waste incineration from waste reception gate and delivery into waste bunker at incinerator plant site (without transports to the incinerator)

## Included activities end
Waste-specific short-term emissions to water from leachate. Long-term emissions from landfill to ground water.

## Geography
Specific to the technology mix encountered in Switzerland in 2010. Well applicable to modern incineration practices in Europe, North America or Japan.

## Technology
average Swiss MSWI plants in 2010 (grate incinerators) with electrostatic precipitator for fly ash (ESP), wet flue gas scrubber and 25% SNCR , 42.77% SCR-high dust , 32.68% SCR-low dust -DeNOx facilities and 0% without Denox (weighted according to mass of burnt waste, representing Swiss average). Efficiency of iron scrap separation from slag : 58%. Efficiency of non-ferrous scrap separation from slag : 31%. Gross electric efficiency technology mix 15.84% and Gross thermal efficiency technology mix 28.51%

## Time period
Waste composition as given in literature reference, theoretical data or other source. Transfer coefficients for modern MSWI.

## Reference product
- residue from mechanical treatment, industrial device: 0 kg; CPC 39: Wastes or scraps; By-product classification Waste
  Main reference product of this activity (supply of disposal service).
  production volume 0 kg
    based on estimate on MSW in WTE globally and estimate of share of WEEE residues in Swiss MSW based on unqualified estimate of industrial electronic device waste in CH and rate of this residue waste per device (from Hischier et al. 2007-V)
  property price 0 EUR2005
    Waste products are assigned a price of zero as they are assumed to require further treatment.
  property carbon content 0.640502
    carbon content on a dry matter basis (reserved; not for manual entry)
  properties: wet mass 1 kg, water content 0, water in wet mass 0 kg, carbon content, fossil 0.640502, dry mass 1 kg, carbon content, non-fossil 0, carbon allocation 0.640502 kg
- electricity, for reuse in municipal waste incineration only: 1 kWh; CPC 17100: Electrical energy; By-product classification allocatable product; pedigree (1,1,1,1,1)
  Net electricity generated from this waste and used in internal MSWI plant energy redistribution.
  Uncertainty: uncertainty is calculated from uncertainties in waste composition and uncertainties in energy efficiency and the uncertainty in internal energy demand
  production volume 1.69461e8 kWh

## By-products
- electricity, for reuse in municipal waste incineration only: 0 kWh; name E_el_prod_MSWI; CPC 17100: Electrical energy; By-product classification allocatable product; pedigree (1,1,1,1,1)
  (same comment as for electricity, for reuse in municipal waste incineration only)
  production volume 0 kWh
    calculated in proportion to reference product waste input to incinerator
  property exergy 3.6 MJ; name E_el_prod_MSWI_exergy
    This exergy property is based on the exergy content of the product.
  property true value relation 3.6; name E_el_prod_MSWI_true_value_relation
    property to calculate "true value" from
  property price 0.1 EUR2005; name E_el_prod_MSWI_price_EUR2005
    Estimated to be the same price as in case of electricity, medium voltage.
- heat, for reuse in municipal waste incineration only: 0 MJ; name E_th_prod_MSWI; CPC 17300: Steam and hot water; By-product classification allocatable product; pedigree (1,1,1,1,1)
  (same comment as for electricity, for reuse in municipal waste incineration only)
  production volume 0 MJ
    calculated in proportion to reference product waste input to incinerator
  property exergy 0.1842 MJ; name E_th_prod_MSWI_exergy
    This exergy property is based on the exergy content of the product.
  property true value relation 0.1842; name E_th_prod_MSWI_true_value_relation
    property to calculate "true value" from
  property price 0.0106 EUR2005; name E_th_prod_MSWI_price_EUR2005
    Average European district heat price from Ecoheatcool and Euroheat 2005-2006, Ecoheat Work package 1: The European heat market. Final report. 10.6 EUR/GJ i s the price of district heat. http://www.solarthermalworld.org/files/Ecoheatcool%20WP1%20Web.pdf?download
- iron scrap, sorted, pressed: 0 kg; By-product classification Recyclable; CPC 39310: Slag, dross, scalings and other waste from the manufacture of iron or steel; pedigree (1,1,1,1,1)
  Iron scrap recovered from this waste.
  Uncertainty: uncertainty calculated from uncertainty in waste composition, uncertainty of share of recyclable metal, uncertainty of transfer coefficient to bottom ash, uncertainty of the efficiency of scrap removal in MSWI plant.
  production volume 0 kg
    calculated in proportion to reference product waste input to incinerator
  property price 0.175 EUR2005
    Temporary price data. Calculated as 90% of purchasers price based on: 2005 import and export prices (total trades (USD) divided by total weight (kg) in biggest economies of the world: EU27, USA, Brasil, China, India, Japan and Russia) from UN Commodity Trade Statistics Database (http://data.un.org/Explorer.aspxDatabase [Accessed 2011.06.20]). Commodity: Waste or scrap, of cast iron
  property carbon content 0
    carbon content on a dry matter basis (reserved; not for manual entry)
  properties: carbon content, fossil 0, carbon content, non-fossil 0, wet mass 1 kg, dry mass 1 kg, water in wet mass 0 kg, water content 0, carbon allocation 0 kg
- iron scrap, unsorted: 0 kg; source European Aluminium Association 2008; CPC 39310: Slag, dross, scalings and other waste from the manufacture of iron or steel; By-product classification Recyclable; pedigree (1,1,1,1,1)
  property price 0.149 EUR2005; name ironScrapAmount_price_EUR2005
    Temporary price data. Calculated as 90% of purchasers price based on: estimated at 85% of sorted scrap
  property carbon content 0
    carbon content on a dry matter basis (reserved; not for manual entry)
  properties: water in wet mass 0 kg, water content 0, carbon content, fossil 0, carbon content, non-fossil 0, dry mass 1 kg, wet mass 1 kg, carbon allocation 0 kg
- aluminium oxide, non-metallurgical: 0 kg; source European Aluminium Association 2008; CPC 41432: Alumina (aluminium oxide), except artificial corundum; By-product classification allocatable product; CAS 1344-28-1; pedigree (1,1,1,1,1)
  property carbon content, non-fossil 0; name C_content_non_fossil
  property price 0.28 EUR2005; name Al2O3Amount_price_EUR2005
    From UN trade database. http://data.un.org/ Import data from the largest economies of the world are used (Brazil, India, USA, China, Japan and EU-27).
  property dry mass 1 kg; name DM
  property water content 0; name water_content
  property wet mass 1 kg; name WM
  property water in wet mass 0 kg; name WWM
  property carbon content, fossil 0; name C_content_fossil
  property carbon content 0
    carbon content on a dry matter basis (reserved; not for manual entry)
  properties: carbon allocation 0 kg
- aluminium, cast alloy: 0 kg; source European Aluminium Association 2008; By-product classification allocatable product; CPC 41431: Unwrought aluminium; pedigree (1,1,1,1,1)
  EcoSpold01Location=RER
  property price 1.3 EUR2005; name castAlloyAmount_price_EUR2005
    Temporary price data. Calculated as 90% of purchasers price based on: Source: London Metal Exchange, Aluminium alloy price for 2005
  property carbon content 0
    carbon content on a dry matter basis (reserved; not for manual entry)
  properties: water in wet mass 0 kg, carbon content, non-fossil 0, water content 0, dry mass 1 kg, carbon content, fossil 0, wet mass 1 kg, carbon allocation 0 kg
- aluminium, wrought alloy: 0 kg; source European Aluminium Association 2008; By-product classification allocatable product; CPC 4153: Semi-finished products of aluminium or aluminium alloys; pedigree (1,1,1,1,1)
  property price 1.44 EUR2005; name secondaryAluminiumOutput_price_EUR2005
    Estimated based on literature values and expert judgement. Aluminium ccast alloys are about 90% of the price of aluminium wrought alloys.
  property carbon content 0
    carbon content on a dry matter basis (reserved; not for manual entry)
  properties: wet mass 1 kg, water content 0, carbon content, fossil 0, water in wet mass 0 kg, carbon content, non-fossil 0, dry mass 1 kg, carbon allocation 0 kg
- copper: 0 kg; source Rentz O. 1999; By-product classification allocatable product; CPC 41413: Refined copper and copper alloys, unwrought; master alloys of copper
  Literature value. Copper uses: Before end-use copper is manufactured into semi fabricated products, such as shapes and ingots (known as 'semis'). These manufacturing processes are subdivided into hot working, cold working and, if necessary, process annealing. Few of the semis are ready for use as such. They more typically travel to first-stage manufacturers, who make metal rods, wire, and casting, and then to component manufacturers who produce such things as motors, valves, and insulated cables The components in turn are incorporated by final-stage manufacturers into a variety of finished products - automobiles, commercial buildings, residential housing, and so forth. These uses account for about 79% of the world-wide consumption of copper.
  property price 5.52 EUR2005
    Literature value (http://www.economist.com/news/business/21576714-mining-industry-has-enriched-chile-its-future-precarious-copper-solution). Average price between 20015 and 2013.
  property carbon content 0
    carbon content on a dry matter basis (reserved; not for manual entry)
  properties: dry mass 1 kg, water in wet mass 0 kg, wet mass 1 kg, carbon content, non-fossil 0, water content 0, carbon content, fossil 0, carbon allocation 0 kg
- zinc concentrate: 0 kg; CPC 14290: Other non-ferrous metal ores and concentrates (other than uranium or thorium ores and concentrates); By-product classification allocatable product
  Calculated value from the knowledge of the properties of both products.
  property price 0.38 EUR2005; name ByP_price_EUR2005
    Temporary price data. Calculated as 90% of purchasers price based on: Zinc content in concentrate 53%. Concentrate price per kg Zn 86.5% of refined Zn price (13.5% treatment charges according to CHR Metals Limited 2005: Dynamic cost curves. http://www.minecost.com/dynamic.pdf). 2004 zinc price from USGS (2007) Mineral commodity summaries 2007. <http://minerals.usgs.gov/minerals/pubs/mcs/2007/mcs2007.pdf> [Accessed 25 May 2010]
  property zinc content 0.53; name zinc_C_zinc_concentrate
    Zinc content on a dry matter basis. Value taken from teh "zinc mine operation" /GLO dataset.
  property dry mass 1 kg; name DM_zinc_concentrate
  property carbon content 0
    carbon content on a dry matter basis (reserved; not for manual entry)
  properties: wet mass 1 kg, water content 0, carbon content, non-fossil 0, carbon content, fossil 0, water in wet mass 0 kg, carbon allocation 0 kg

## Inputs from technosphere
- hydrochloric acid, without water, in 30% solution state: 0 kg; pedigree (1,1,1,1,1)
  Auxilliary inputs for the wastewater treatment stage of the incinerator plant.
  Uncertainty: uncertainty calculated from uncertainty in average HCl input, of transfer coefficients in the incinerator, and the uncertainty of the waste composition of this waste
  properties: dry mass 1 kg, wet mass 1 kg
- iron (III) chloride, without water, in 40% solution state: 0 kg; pedigree (1,1,1,1,1)
  Auxilliary inputs for the wastewater treatment stage of the incinerator plant.
  Uncertainty: uncertainty calculated from uncertainty in average FeCl3 input, of transfer coefficients in the incinerator, and the uncertainty of the waste composition of this waste
  properties: dry mass 1 kg, wet mass 1 kg
- slag landfill: 0 unit; pedigree (1,1,1,1,1)
  Landfill infrastructure required for landfilling of bottom ash.
  Uncertainty: uncertainty is calculated from uncertainties in waste composition and transfer coefficients in incinerator
- chromium oxide, flakes: 0 kg; pedigree (1,1,1,1,1)
  Input to DeNOx stage.
  Uncertainty: uncertainty calculated from uncertainty in average DeNOx input, uncertainty in the share of thermal NOx, uncertainty of nitrogen content in average municipal waste and the uncertainty in nitrogen content in *this* waste.
  properties: wet mass 1 kg, dry mass 1 kg
- heat, district or industrial, natural gas: 0, 0, 0, 0 MJ (4 entries); pedigree (1,1,1,1,1)
  Input to DeNOx stage, to heat up flue gas in low-dust SCR.
  Uncertainty: uncertainty calculated from uncertainty in average DeNOx input, uncertainty in the share of thermal NOx, uncertainty of nitrogen content in average municipal waste and the uncertainty in nitrogen content in *this* waste.
- process-specific burdens, slag landfill: 0, 0, 0 kg (3 entries); pedigree (1,1,1,1,1)
  Mass-specific expenditures required for landfilling of bottom ash.
  Uncertainty: uncertainty is calculated from uncertainties in waste composition and transfer coefficients in incinerator
- aluminium scrap, post-consumer, prepared for melting: 0 kg; pedigree (1,1,1,1,1)
  Aluminium scrap recovered from this waste.
  Uncertainty: uncertainty calculated from uncertainty in waste composition, uncertainty of share of recyclable metal, uncertainty of transfer coefficient to bottom ash, uncertainty of the efficiency of scrap removal in MSWI plant.
  production volume 0 kg
    calculated in proportion to reference product waste input to incinerator
  properties: price 0.806 EUR2005, wet mass 1 kg, dry mass 1 kg
- transport, freight, lorry, unspecified: 0, 0, 0 metric ton*km (3 entries); pedigree (1,1,1,1,1)
  Transport services to transport incineration residues to landfills.
  Uncertainty: uncertainty calculated from uncertainty of the waste composition of this waste, uncertainty of transfer coefficients and the uncertainty in generic transportation distances
- cement, unspecified: 0, 0, 0, 0, 0, 0, 0, 0, 0, 0 kg (10 entries); pedigree (1,1,1,1,1)
  Cement required for solidification of landfilled residual material.
  Uncertainty: Uncertainty calculated from uncertainty of the waste composition of this waste, of transfer coefficients in the incinerator and of the solidification recipe.
  properties: dry mass 1 kg, wet mass 1 kg
- chemical, inorganic: 0 kg; pedigree (1,1,1,1,1)
  Auxilliary inputs for the wastewater treatment stage of the incinerator plant. Proxy for Polyelectrolyte.
  Uncertainty: uncertainty calculated from uncertainty in average Polyelectrolyte input, of transfer coefficients in the incinerator, and the uncertainty of the waste composition of this waste
  properties: dry mass 1 kg, carbon content, fossil 0.003, wet mass 1 kg
- municipal waste incineration facility: 0 unit
  Demands per kilogram waste.
- process-specific burdens, residual material landfill: 0, 0, 0 kg (3 entries); pedigree (1,1,1,1,1)
  Mass-specific expenditures required for landfilling of incineration residues.
  Uncertainty: uncertainty is calculated from uncertainties in waste composition and transfer coefficients in incinerator
- water, decarbonised: 0, 0, 0, 0, 0, 0, 0, 0, 0, 0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 kg (13 entries); pedigree (1,1,1,1,1)
  Incinerator process water used in flue gas scrubber stage.
  Uncertainty: uncertainty calculated from uncertainty in average water input, and the uncertainty of the waste composition of this waste
  properties: wet mass 1 kg
- residual material landfill: 0 unit; pedigree (1,1,1,1,1)
  Landfill infrastructure required for landfilling of incineration residues.
  Uncertainty: uncertainty is calculated from uncertainties in waste composition and transfer coefficients in incinerator
- titanium dioxide: 0 kg; pedigree (1,1,1,1,1)
  Input to DeNOx stage (TiO2 catalyst carrier)
  Uncertainty: uncertainty calculated from uncertainty in average DeNOx input, uncertainty in the share of thermal NOx, uncertainty of nitrogen content in average municipal waste and the uncertainty in nitrogen content in *this* waste.
  properties: wet mass 1 kg, dry mass 1 kg
- ammonia, liquid: 0 kg; pedigree (1,1,1,1,1)
  Input to DeNOx stage (100% NH3).
  Uncertainty: uncertainty calculated from uncertainty in average DeNOx input, uncertainty in the share of thermal NOx, uncertainty of nitrogen content in average municipal waste and the uncertainty in nitrogen content in *this* waste.
  properties: dry mass 1 kg, wet mass 1 kg
- chemical, organic: 0 kg; pedigree (1,1,1,1,1)
  Auxilliary inputs for the wastewater treatment stage of the incinerator plant. Proxy for (pure) Trisodium-trimercapto-s-triazine (CAS 17766-26-6), used as 15% diluted solution, aka TMT15.
  Uncertainty: uncertainty calculated from uncertainty in average TMT15 input, of transfer coefficients in the incinerator, and the uncertainty of the waste composition of this waste
  properties: dry mass 1 kg, wet mass 1 kg, carbon content, fossil 0.628
- copper scrap, sorted, pressed: 0 kg; pedigree (1,1,1,1,1)
  Copper scrap recovered from this waste.
  Uncertainty: uncertainty calculated from uncertainty in waste composition, uncertainty of share of recyclable metal, uncertainty of transfer coefficient to bottom ash, uncertainty of the efficiency of scrap removal in MSWI plant.
  production volume 0 kg
    calculated in proportion to reference product waste input to incinerator
  properties: price 2.84 EUR2005, dry mass 1 kg, wet mass 1 kg
- waste cement, hydrated: 0 kg; pedigree (1,1,1,1,1)
  Hydrated cement output for solidification of landfilled residual material.
  Uncertainty: Uncertainty calculated from uncertainty of the waste composition of this waste and transfer coefficients in the incinerator and of the solidification recipe.
  production volume 0 kg
    calculated in proportion to reference product waste input to incinerator
  properties: wet mass 1 kg, dry mass 1 kg
- quicklime, milled, packed: 0 kg; pedigree (1,1,1,1,1)
  Auxilliary inputs for the flue gas treatment stage of the incinerator plant.
  Uncertainty: uncertainty calculated from uncertainty in average CaO input, of transfer coefficients in the incinerator, and the uncertainty of the waste composition of this waste
  properties: dry mass 0.99 kg, wet mass 1 kg, water content 0.010101
- sodium hydroxide, without water, in 50% solution state: 0 kg; pedigree (1,1,1,1,1)
  Auxilliary inputs for the flue gas treatment stage of the incinerator plant.
  Uncertainty: uncertainty calculated from uncertainty in average NaOH input, of transfer coefficients in the incinerator, and the uncertainty of the waste composition of this waste
  properties: wet mass 1 kg, dry mass 1 kg
- waste cement, hydrated: 0, 0 kg (2 entries); pedigree (1,1,1,1,1)
  (same comment as for waste cement, hydrated)
- used perfluoropentane: -0.000324001 kg; lognormal variance with pedigree 0.0186, pedigree (1,5,4,5,1)
  calculated value
  production volume 2.52e6 kg
- perfluoropentane: 0.000324001 kg; source Turboden srl 2011; lognormal variance with pedigree 0.0358, pedigree (2,5,4,5,1)
  literature value (organic fluid for the cycle turbine)
- electricity, medium voltage: 0.00226432 kWh; source Turboden srl 2011; lognormal variance with pedigree 0.164, pedigree (3,5,5,5,3)
  estimated from personal communication technician ORC turbine company (annual consumption/production)
- polyethylene, high density, granulate: 6.48069e-6 kg; source Turboden srl 2011; lognormal variance with pedigree 0.0432, pedigree (4,5,4,5,1)
  EcoSpold01Location=RER
  estimation
- electronics, for control units: 1.08012e-5 kg; source Turboden srl 2011; lognormal variance with pedigree 0.0432, pedigree (4,5,4,5,1)
  estimation
  EcoSpold01Location=RER
- stone wool: 0.000112501 kg; source Turboden srl 2011; lognormal variance with pedigree 0.0432, pedigree (4,5,4,5,1)
  EcoSpold01Location=CH
  estimation
- steel, chromium steel 18/8, hot rolled: 0.00218748 kg; source Turboden srl 2011; lognormal variance with pedigree 0.0358, pedigree (2,5,4,5,1)
  literature value
  EcoSpold01Location=RER
- copper: 1.65594e-5 kg; source Turboden srl 2011; lognormal variance with pedigree 0.0432, pedigree (4,5,4,5,1)
  estimation
  EcoSpold01Location=RER
- heat, central or small-scale, other than natural gas: 0.00366467 MJ; source Turboden srl 2011; lognormal variance with pedigree 0.156, pedigree (3,5,5,5,1)
  estimated from personal communication technician ORC turbine company (annual heating value/production)
  EcoSpold01Location=CH
- steel, low-alloyed, hot rolled: 0.0119473 kg; source Turboden srl 2011; lognormal variance with pedigree 0.0358, pedigree (2,5,4,5,1)
  literature value
  EcoSpold01Location=RER
- scrap copper: -5.25277e-6, -2.46449e-7, -1.10602e-5 kg (3 entries); lognormal variance with pedigree 0.0186, pedigree (1,5,4,5,1)
  EcoSpold01Location=CH
  calculated value
  production volume 140700 kg
- scrap steel: -0.00319723, -4.04209e-6, -0.00992928 kg (3 entries); lognormal variance with pedigree 0.0186, pedigree (1,5,4,5,1)
  EcoSpold01Location=CH
  calculated value
  production volume 1.113e8 kg
- waste mineral wool: -3.2609e-5, -3.72093e-7, -7.952e-5 kg (3 entries); lognormal variance with pedigree 0.0186, pedigree (1,5,4,5,1)
  calculated value
  production volume 861000 kg
- used industrial electronic device: -0.000428326, -0.00143396 kg (2 entries); lognormal variance with pedigree 0.0186, pedigree (1,5,4,5,1)
  EcoSpold01Location=CH
  calculated value
  production volume 63000 kg
- waste polyethylene: -6.23797e-7, -4.80911e-8, -1.98633e-8, -1.88621e-8, -7.19752e-7, -8.02456e-9, -3.63705e-9, -5.03866e-6 kg (8 entries); lognormal variance with pedigree 0.0186, pedigree (1,5,4,5,1)
  EcoSpold01Location=CH
  calculated value
  production volume 37800 kg
- building, hall: 9.94763e-5 m2; lognormal variance with pedigree 0.3701, pedigree (3,5,5,3,1)
  EcoSpold01Location=CH
  Own estimation, based on proper knowledge of Swiss recycling sites
  Uncertainty: own estimation, based on proper knowledge of Swiss recycling sites
- road, company, internal: 0.000564398 m2*year; lognormal variance with pedigree 0.3701, pedigree (3,5,5,3,1)
  Own estimation, based on proper knowledge of Swiss recycling sites
  EcoSpold01Location=CH
  Uncertainty: own estimation, based on proper knowledge of Swiss recycling sites
- building, multi-storey: 0.00016678 m3; lognormal variance with pedigree 0.3701, pedigree (3,5,5,3,1)
  Own estimation, based on proper knowledge of Swiss recycling sites
  EcoSpold01Location=RER
  Uncertainty: own estimation, based on proper knowledge of Swiss recycling sites
- machine, for treatment of waste electric and electronic equipment: 4.30188e-8 unit; lognormal variance with pedigree 0.3701, pedigree (3,5,5,3,1)
  EcoSpold01Location=GLO
  Own estimation, based on proper knowledge of Swiss recycling sites
  Uncertainty: own estimation, based on proper knowledge of Swiss recycling sites
- printed wiring board mounting facility, surface mounting line: 9.48653e-9 unit; lognormal variance with pedigree 0.3761, pedigree (4,5,5,3,1)
  EcoSpold01Location=GLO
  Estimation, based on the description of several PC motherboard mounting facilities in China, assuming a life-span of 10 years, 2.5 times are taken into account here.
  Uncertainty: estimation, based on Locascio (2000) and own plant visit
- printed wiring board mounting facility, through-hole mounting line: 7.90544e-9 unit; lognormal variance with pedigree 0.3761, pedigree (4,5,5,3,1)
  (same comment as for printed wiring board mounting facility, surface mounting line)
- clay brick: 8.16487e-5 kg; source AMD 2007; lognormal variance with pedigree 0.3507, pedigree (1,3,5,3,1)
  Estimation, based on literature.
  Uncertainty: d
- cable, data cable in infrastructure: 0.00105063 m; source AMD 2007; lognormal variance with pedigree 0.8607, pedigree (1,3,5,3,1)
  Estimation, based on literature. Life-span of 10 years is considered - i.e. 2.5 times the amounts is needed.
  Uncertainty: d
- drawing of pipe, steel: 0.00100428 kg; source AMD 2007; lognormal variance with pedigree 0.3507, pedigree (1,3,5,3,1)
  (same comment as for cable, data cable in infrastructure)
- cable, three-conductor cable: 0.000180108 m; source AMD 2007; lognormal variance with pedigree 0.3507, pedigree (1,3,5,3,1)
  (same comment as for cable, data cable in infrastructure)
- wastewater treatment facility, capacity 1.6E8l/year: 1.20072e-10 unit; source Doka G. 2007; lognormal variance with pedigree 0.448, pedigree (4,5,5,5,5)
  Literature Value.
  Uncertainty: r
- reinforcing steel: 0.00312186 kg; source AMD 2007; lognormal variance with pedigree 0.3507, pedigree (1,3,5,3,1)
  Estimation, based on literature.
  Uncertainty: d
- concrete, normal: 1.95717e-5 m3; source AMD 2007; lognormal variance with pedigree 0.3507, pedigree (1,3,5,3,1)
  Estimation, based on literature.
  Uncertainty: d
- electronic component machinery, unspecified: 6.00358e-8 unit; source Csatary P. 2002; lognormal variance with pedigree 0.3701, pedigree (4,4,5,3,1)
  Estimation, conservative estimation based on literature. For the process steps in the production chain of semiconductors and other electronic components100 units are requested with a life-span of 10 years - i.e. 2.5 times the amount estimated is needed. Hence, an input of 250 times is taken into account per Fab.
  Uncertainty: e
- concrete, medium strength: 2.43505e-5 m3; source AMD 2007; lognormal variance with pedigree 0.8607, pedigree (1,3,5,3,1)
  Estimation, based on literature.
  Uncertainty: d
- cable, unspecified: 0.000236397 kg; lognormal variance with pedigree 0.2106, pedigree (5,5,5,5,5)
  This product represents average, unspecified cable.

## Inputs from nature
- Oxygen [natural resource, in air]: 0 kg; pedigree (1,1,1,1,1)
  Oxygen from ambient air needed to combust and oxidise this waste. Net demand, i.e. without O2 leaving the plant in flue gas uncombusted.
  Uncertainty: uncertainty is calculated from uncertainties in waste composition and transfer coefficients to flue gas and soild residues in incinerator
- Transformation, to industrial area [natural resource, land]: 0.000164771 m2; lognormal variance with pedigree 0.1901, pedigree (3,5,5,3,1)
  Own estimation, based on proper knowledge of Swiss recycling sites
  Uncertainty: own estimation, based on proper knowledge of Swiss recycling sites
- Occupation, industrial area [natural resource, land]: 0.00411922 m2*year; lognormal variance with pedigree 0.1101, pedigree (3,5,5,3,1)
  (same comment as for Transformation, to industrial area)
- Occupation, construction site [natural resource, land]: 0.000373267 m2*year; lognormal variance with pedigree 0.1101, pedigree (3,5,5,3,1)
  (same comment as for Transformation, to industrial area)
- Transformation, from unspecified [natural resource, land]: 0.000164772 m2; lognormal variance with pedigree 0.1901, pedigree (3,5,5,3,1)
  (same comment as for Transformation, to industrial area)

## Emissions to nature
All rows: pedigree (1,1,1,1,1)
- Sulfate [water, ground-, long-term]: 0 kg
  Long-term emissions from landfilling of incineration residues.
  Uncertainty: uncertainty is calculated from uncertainties in waste composition and transfer coefficients in incinerator and landfills.
- Fluoride [water, surface water]: 0 kg
  Emissions to water from waste composition and transfer coefficients in incinerator and landfills.
  Uncertainty: uncertainty is calculated from uncertainties in waste composition and transfer coefficients in incinerator and landfills
- Chloride [water, ground-, long-term]: 0 kg
  (same comment as for Sulfate)
- Phenol, pentachloro- [air, urban air close to ground]: 0 kg
  Incomplete combustion product emitted to air.
  Uncertainty: uncertainty calculated from uncertainty in average operation emissions, and the uncertainty of the flue gas volume from this waste.
- Dioxins, measured as 2,3,7,8-tetrachlorodibenzo-p-dioxin [air, urban air close to ground]: 0 kg
  (same comment as for Phenol, pentachloro-)
- Barium [air, urban air close to ground]: 0 kg
  Emission to air from waste composition and transfer coefficients.
  Uncertainty: uncertainty is calculated from uncertainties in waste composition and transfer coefficients in incinerator
- Calcium [air, urban air close to ground]: 0 kg
  (same comment as for Barium)
- Bromine [water, surface water]: 0 kg
  (same comment as for Fluoride)
- DOC, Dissolved Organic Carbon [water, ground-, long-term]: 0 kg
  (same comment as for Sulfate)
- Antimony [air, urban air close to ground]: 0 kg
  (same comment as for Barium)
- Nickel [air, urban air close to ground]: 0 kg
  (same comment as for Barium)
- Tin, ion [water, surface water]: 0 kg
  (same comment as for Fluoride)
- Titanium, ion [water, surface water]: 0 kg
  (same comment as for Fluoride)
- Aluminium [air, urban air close to ground]: 0 kg
  (same comment as for Barium)
- Arsenic, ion [water, ground-, long-term]: 0 kg
  (same comment as for Sulfate)
- Nitrogen oxides [air, urban air close to ground]: 0 kg
  Sum of fuel-Nox and thermal-NOx emitted to air after DeNOx stage.
  Uncertainty: uncertainty calculated from uncertainty in average N-emissions and uncertainty in the share of thermal NOx and the uncertainty in nitrogen content in *this* waste.
- Lead [air, urban air close to ground]: 0 kg
  (same comment as for Barium)
- Selenium [air, urban air close to ground]: 0 kg
  (same comment as for Barium)
- Molybdenum [air, urban air close to ground]: 0 kg
  (same comment as for Barium)
- Mercury [air, urban air close to ground]: 0 kg
  (same comment as for Barium)
- Sodium, ion [water, surface water]: 0 kg
  (same comment as for Fluoride)
- Benzene [air, urban air close to ground]: 0 kg
  (same comment as for Phenol, pentachloro-)
- Dinitrogen monoxide [air, urban air close to ground]: 0 kg
  Nitrogen species emitted to air after DeNOx stage.
  Uncertainty: uncertainty calculated from uncertainty in average N-emissions and uncertainty in the share of thermal NOx and the uncertainty in nitrogen content in *this* waste.
- Sulfate [water, surface water]: 0 kg
  (same comment as for Fluoride)
- Cobalt [water, surface water]: 0 kg
  (same comment as for Fluoride)
- Particulates, < 2.5 um [air, urban air close to ground]: 0 kg
  (same comment as for Phenol, pentachloro-)
- Calcium, ion [water, ground-, long-term]: 0 kg
  (same comment as for Sulfate)
- Nickel, ion [water, surface water]: 0 kg
  (same comment as for Fluoride)
- Sulfur dioxide [air, urban air close to ground]: 0 kg
  (same comment as for Barium)
- Vanadium, ion [water, ground-, long-term]: 0 kg
  (same comment as for Sulfate)
- Tin, ion [water, ground-, long-term]: 0 kg
  (same comment as for Sulfate)
- Lead [water, surface water]: 0 kg
  (same comment as for Fluoride)
- Silicon [water, surface water]: 0 kg
  (same comment as for Fluoride)
- Arsenic, ion [water, surface water]: 0 kg
  (same comment as for Fluoride)
- Nitrate [water, surface water]: 0 kg
  (same comment as for Fluoride)
- Barium [water, surface water]: 0 kg
  (same comment as for Fluoride)
- Potassium [air, urban air close to ground]: 0 kg
  (same comment as for Barium)
- Vanadium, ion [water, surface water]: 0 kg
  (same comment as for Fluoride)
- Barium [water, ground-, long-term]: 0 kg
  (same comment as for Sulfate)
- Cadmium [air, urban air close to ground]: 0 kg
  (same comment as for Barium)
- Antimony [water, surface water]: 0 kg
  (same comment as for Fluoride)
- Copper, ion [water, surface water]: 0 kg
  (same comment as for Fluoride)
- Phosphate [water, surface water]: 0 kg
  (same comment as for Fluoride)
- Copper [air, urban air close to ground]: 0 kg
  (same comment as for Barium)
- Strontium [water, ground-, long-term]: 0 kg
  (same comment as for Sulfate)
- Titanium [air, urban air close to ground]: 0 kg
  (same comment as for Barium)
- Aluminium [water, surface water]: 0 kg
  (same comment as for Fluoride)
- Bromine [water, ground-, long-term]: 0 kg
  (same comment as for Sulfate)
- Beryllium [water, ground-, long-term]: 0 kg
  (same comment as for Sulfate)
- COD, Chemical Oxygen Demand [water, surface water]: 0 kg
  (same comment as for Fluoride)
- Particulates, > 2.5 um, and < 10um [air, urban air close to ground]: 0 kg
  (same comment as for Phenol, pentachloro-)
- Molybdenum [water, surface water]: 0 kg
  (same comment as for Fluoride)
- Benzene, pentachloro- [air, urban air close to ground]: 0 kg
  (same comment as for Phenol, pentachloro-)
- Selenium [water, ground-, long-term]: 0 kg
  (same comment as for Sulfate)
- Nitrate [water, ground-, long-term]: 0 kg
  (same comment as for Sulfate)
- TOC, Total Organic Carbon [water, ground-, long-term]: 0 kg
  (same comment as for Sulfate)
- Mercury [water, surface water]: 0 kg
  (same comment as for Fluoride)
- Zinc, ion [water, ground-, long-term]: 0 kg
  (same comment as for Sulfate)
- Chromium, ion [water, surface water]: 0 kg
  (same comment as for Fluoride)
- BOD5, Biological Oxygen Demand [water, ground-, long-term]: 0 kg
  (same comment as for Sulfate)
- Heat, waste [water, surface water]: 0 MJ
  Waste heat generated from heating value of this waste plus any electricity required to process it.
  Uncertainty: uncertainty is calculated from uncertainties in waste composition and uncertainties in energy efficiency and the uncertainty in internal energy demand
- Strontium [water, surface water]: 0 kg
  (same comment as for Fluoride)
- COD, Chemical Oxygen Demand [water, ground-, long-term]: 0 kg
  (same comment as for Sulfate)
- Zinc, ion [water, surface water]: 0 kg
  (same comment as for Fluoride)
- Antimony [water, ground-, long-term]: 0 kg
  (same comment as for Sulfate)
- NMVOC, non-methane volatile organic compounds, unspecified origin [air, urban air close to ground]: 0 kg
  (same comment as for Phenol, pentachloro-)
- Benzo(a)pyrene [air, urban air close to ground]: 0 kg
  (same comment as for Phenol, pentachloro-)
- Hydrogen chloride [air, urban air close to ground]: 0 kg
  (same comment as for Barium)
- Carbon monoxide, fossil [air, urban air close to ground]: 0 kg
  (same comment as for Phenol, pentachloro-)
- Vanadium [air, urban air close to ground]: 0 kg
  (same comment as for Barium)
- Selenium [water, surface water]: 0 kg
  (same comment as for Fluoride)
- Heat, waste [air, urban air close to ground]: 0 MJ
  (same comment as for Heat, waste)
- Iron, ion [water, surface water]: 0 kg
  (same comment as for Fluoride)
- Molybdenum [water, ground-, long-term]: 0 kg
  (same comment as for Sulfate)
- Bromine [air, urban air close to ground]: 0 kg
  (same comment as for Barium)
- Zinc [air, urban air close to ground]: 0 kg
  (same comment as for Barium)
- Hydrogen fluoride [air, urban air close to ground]: 0 kg
  (same comment as for Barium)
- Ammonia [air, urban air close to ground]: 0 kg
  (same comment as for Dinitrogen monoxide)
- Water [water, surface water]: 0 m3
  Process water released to surface water.
  Uncertainty: uncertainty calculated from uncertainty in process water input and the uncertainty of fraction to surface water.
- Titanium, ion [water, ground-, long-term]: 0 kg
  (same comment as for Sulfate)
- Cobalt [air, urban air close to ground]: 0 kg
  (same comment as for Barium)
- Chromium VI [water, ground-, long-term]: 0 kg
  (same comment as for Sulfate)
- Water [air, urban air close to ground]: 0 m3
  Water vapour from waste humidity, hydrogen oxidation and part of the process water.
  Uncertainty: Uncertainty calculated from uncertainty in waste composition, process water input and the uncertainty of fraction to air.
- Phosphate [water, ground-, long-term]: 0 kg
  (same comment as for Sulfate)
- Silver, ion [water, surface water]: 0 kg
  (same comment as for Fluoride)
- Manganese [air, urban air close to ground]: 0 kg
  (same comment as for Barium)
- Cyanide [air, urban air close to ground]: 0 kg
  (same comment as for Dinitrogen monoxide)
- Phosphorus [air, urban air close to ground]: 0 kg
  (same comment as for Barium)
- Silicon [water, ground-, long-term]: 0 kg
  (same comment as for Sulfate)
- Silicon [air, urban air close to ground]: 0 kg
  (same comment as for Barium)
- Fluoride [water, ground-, long-term]: 0 kg
  (same comment as for Sulfate)
- Carbon dioxide, fossil [air, urban air close to ground]: 0 kg
  (same comment as for Barium)
- Lead [water, ground-, long-term]: 0 kg
  (same comment as for Sulfate)
- BOD5, Biological Oxygen Demand [water, surface water]: 0 kg
  (same comment as for Fluoride)
- Thallium [water, surface water]: 0 kg
  (same comment as for Fluoride)
- Nickel, ion [water, ground-, long-term]: 0 kg
  (same comment as for Sulfate)
- DOC, Dissolved Organic Carbon [water, surface water]: 0 kg
  (same comment as for Fluoride)
- TOC, Total Organic Carbon [water, surface water]: 0 kg
  (same comment as for Fluoride)
- Methane, fossil [air, urban air close to ground]: 0 kg
  (same comment as for Phenol, pentachloro-)
- Iron [air, urban air close to ground]: 0 kg
  (same comment as for Barium)
- Cobalt [water, ground-, long-term]: 0 kg
  (same comment as for Sulfate)
- Mercury [water, ground-, long-term]: 0 kg
  (same comment as for Sulfate)
- Toluene [air, urban air close to ground]: 0 kg
  (same comment as for Phenol, pentachloro-)
- Beryllium [water, surface water]: 0 kg
  (same comment as for Fluoride)
- Cadmium, ion [water, ground-, long-term]: 0 kg
  (same comment as for Sulfate)
- Silver, ion [water, ground-, long-term]: 0 kg
  (same comment as for Sulfate)
- Iron, ion [water, ground-, long-term]: 0 kg
  (same comment as for Sulfate)
- Calcium, ion [water, surface water]: 0 kg
  (same comment as for Fluoride)
- Potassium, ion [water, surface water]: 0 kg
  (same comment as for Fluoride)
- Copper, ion [water, ground-, long-term]: 0 kg
  (same comment as for Sulfate)
- Tin [air, urban air close to ground]: 0 kg
  (same comment as for Barium)
- Potassium, ion [water, ground-, long-term]: 0 kg
  (same comment as for Sulfate)
- Thallium [water, ground-, long-term]: 0 kg
  (same comment as for Sulfate)
- Sodium [air, urban air close to ground]: 0 kg
  (same comment as for Barium)
- Strontium [air, urban air close to ground]: 0 kg
  (same comment as for Barium)
- Thallium [air, urban air close to ground]: 0 kg
  (same comment as for Barium)
- Chromium VI [water, surface water]: 0 kg
  (same comment as for Fluoride)
- Chloride [water, surface water]: 0 kg
  (same comment as for Fluoride)
- Arsenic [air, urban air close to ground]: 0 kg
  (same comment as for Barium)
- Benzene, hexachloro- [air, urban air close to ground]: 0 kg
  (same comment as for Phenol, pentachloro-)
- Cadmium, ion [water, surface water]: 0 kg
  (same comment as for Fluoride)
- Manganese [water, surface water]: 0 kg
  (same comment as for Fluoride)
- Sodium, ion [water, ground-, long-term]: 0 kg
  (same comment as for Sulfate)
- Manganese [water, ground-, long-term]: 0 kg
  (same comment as for Sulfate)
- Aluminium [water, ground-, long-term]: 0 kg
  (same comment as for Sulfate)
- Chromium [air, urban air close to ground]: 0 kg
  (same comment as for Barium)
