# styrene production

Dataset: EcoSpold 2, unit process
Geography: RoW
Time period: 2015-01-01 to 2020-12-31
Technology level: current
Classification: ISIC rev.4 ecoinvent: 2011:Manufacture of basic chemicals
Synonyms: Styrol; STYRENE; Vinylbenzene; Ethenylbenzene; Benzene, ethenyl-; Phenylethylene
Scenario: Business-as-Usual
System model: Allocation at the point of substitution
Generated by: Lucia Valsasina
Database: ecoinvent
isCopyrightProtected: true
accessRestrictedTo: 1

## General comment
This activity produces 1 kg of styrene. Styrene is an unsaturated aromatic monomer. Styrene is used in the production of polymers. Styrene is used in the following production processes in approximately the following shares: 60% for polystyrene production, 18% styrene – acrylonitrile copolymer (SAN) and terpolymers of acrylonitrile, butadiene, and styrene (ABS), 5% for styrene – butadiene rubber elastomers (SBR), 6% styrene – butadiene latexes, 5 % to producer unsaturated polyester resins (James and Castor 2011). Global production of styrene for the year 2008 was of 26 million tonnes (James and Castor 2011).
Reference(s):
Gendorf (2016) Umwelterklärung 2015, Werk Gendorf Industriepark, www.gendorf.de
James, D.H. and Castor, W.M. 2011. Styrene. In Ullmann's Encyclopedia of Industrial Chemistry, Electronic Release, Vol.34, pp.529-544. Wiley-VCH, Weinheim.
Welch, V.A. et al. 2005. Ethylbenzene. In Ullmann's Encyclopedia of Industrial Chemistry, Electronic Release, Vol.13, pp.451-464. Wiley-VCH, Weinheim.
For more information on the model please refer to the dedicate ecoinvent report, access it in the Report section of ecoQuery (http://www.ecoinvent.org/login-databases.html)

## Included activities start
The activity starts when the raw materials enter the process.

## Included activities end
Materials entering the process are included as well as energy uses, infrastructure and emissions.

## Geography
The inputs to the process are calculated based on stoichiometry and literature data, they are therefore considered to be valid for the chosen geography. The inputs of heat, electricity, water, factory and nitrogen are mostly taken as average of industry data. Industry data values are a 5-year average of data (2011 - 2015) published by the Gendorf factory (Gendorf, 2016, Umwelterklärung, www.gendorf.de), (Gendorf, 2015, Umwelterklärung, www.gendorf.de), (Gendorf, 2014, Umwelterklärung, www.gendorf.de). The Gendorf factory is based in Germany, it produces a wide range of chemical substances. The factory produced 1657400 tonnes of chemical substances in the year 2015 (Gendorf, 2016, Umwelterklärung, www.gendorf.de) and 740000 tonnes of intermediate products. Given the range of chemicals produced by the german site, the values are used for the GLO geography, with uncertainty adjusted accordingly.

## Technology
Styrene is mainly produced by the dehydrogenation of ethylbenzene (James and Castor 2011). Close to the entire production of ethylbenzene is produced via the alkylation of ethylene and benzene (Welch et al. 2005). This production route has been used since the mid-nineties (James and Castor 2011).
Chemical reaction:
C6H6 + C2H4 -> C8H10
C8H10 -> C8H8 + H2
The reaction from ethylbenzene to styrene is reversible. The reaction is endothermic with a heat delta of 600 degrees Celcius and 124.0 kJ/mol (James and Castor 2011). The production of styrene is mostly performed (ca. 75% of production), by running ethylbenzene (the input includes recycled ethylbenzene) through subsequent reactors / reactors beds. Steam is used to dehydrogenate the input product. Steam has been found to ensure a high yield, provide the necessary conditions for the reaction to happen and at the same time cleaning the used catalyst (James and Castor 2011).
The use of a catalyst boosts the efficiency of the reaction, otherwise low temperature and low pressure are enough to ensure the reaction but with lower yield. Usual reaction conditions are 620 degrees Celsius combined with very low pressure, this ensures a yield between 88 and 95% (James and Castor 2011). According to James and Castor (2011) one of the most used catalyst for this reaction is composed by 84.3% iron (Fe2O3), 2.4% chromium (Cr2O3), and 13.3% potassium (K2CO3) (James and Castor 2011). The average lifespan of catalysts for this reaction is assumed to be 2 years (James and Castor 2011). The catalyst in not consider significant in terms of emissions for the reaction and it is therefore not included in this dataset and it is assumed to be taken into consideration in the input of chemical factory.
This inventory representing production of a particular chemical compound is at least partially based on a generic model on the production of chemicals. The data generated by this model have been improved by compound-specific data when available.
The model on production of chemicals is using specific industry or literature data wherever possible and more generic data on chemical production processes to fill compound-specific data gaps when necessary. The basic principles of the model have been published in literature (Hischier 2005, Establishing Life Cycle Inventories of Chemicals Based on Differing Data Availability). The model has been updated and extended with newly available data from the chemical industry.
In the model, unreacted fractions are treated in a waste treatment process, and emissions reported are after a waste treatment process that is included in the scope of this dataset. For volatile reactants, a small level of evaporation is assumed. Solvents and catalysts are mostly recycled in closed-loop systems within the scope of the dataset and reported flows are for losses from this system.
The main source of information for the values for heat, electricity, water (process and cooling), nitrogen, chemical factory is industry data from Gendorf. The values are a 5-year average of data (2011 - 2015) published by the Gendorf factory (Gendorf, 2016, Umwelterklärung, www.gendorf.de), (Gendorf, 2015, Umwelterklärung, www.gendorf.de), (Gendorf, 2014, Umwelterklärung, www.gendorf.de). The Gendorf factory is based in Germany, it produces a wide range of chemical substances. The factory produced 1657400 tonnes of chemical substances in the year 2015 (Gendorf, 2016, Umwelterklärung, www.gendorf.de) and 740000 tonnes of intermediate products.
Reference(s):
Hischier, R. (2005) Establishing Life Cycle Inventories of Chemicals Based on Differing Data Availability (9 pp). The International Journal of Life Cycle Assessment, Volume 10, Issue 1, pp 59–67. 10.1065/lca2004.10.181.7
Gendorf (2016) Umwelterklärung 2015, Werk Gendorf Industriepark, www.gendorf.de
James, D.H. and Castor, W.M. 2011. Styrene. In Ullmann's Encyclopedia of Industrial Chemistry, Electronic Release, Vol.34, pp.529-544. Wiley-VCH, Weinheim.
Welch, V.A. et al. 2005. Ethylbenzene. In Ullmann's Encyclopedia of Industrial Chemistry, Electronic Release, Vol.13, pp.451-464. Wiley-VCH, Weinheim.
For more information on the model please refer to the dedicate ecoinvent report, access it in the Report section of ecoQuery (http://www.ecoinvent.org/login-databases.html)

## Time period
The activity is based on stoichiometry and literature data, it is therefore considered not to change significantly over time in terms of inputs. The inputs of heat, electricity, water, factory and nitrogen are mostly taken as average of industry data. Industry data values are a 5-year average of data (2011 - 2015) published by the Gendorf factory (Gendorf, 2016, Umwelterklärung, www.gendorf.de), (Gendorf, 2015, Umwelterklärung, www.gendorf.de), (Gendorf, 2014, Umwelterklärung, www.gendorf.de). The Gendorf factory is based in Germany, it produces a wide range of chemical substances. The factory produced 1657400 tonnes of chemical substances in the year 2015 (Gendorf, 2016, Umwelterklärung, www.gendorf.de) and 740000 tonnes of intermediate products. The time period is therefore set based on the years from Gendorf reference.

## Reference product
- styrene: 1 kg; name RP; By-product classification allocatable product; CPC 34720: Polymers of styrene, in primary forms; CAS 100-42-5
  Styrene is an unsaturated aromatic monomer. Styrene is used in the production of polymers. Styrene is used in the following production processes in approximately the following shares: 60% for polystyrene production, 18% styrene – acrylonitrile copolymer (SAN) and terpolymers of acrylonitrile, butadiene, and styrene (ABS), 5% for styrene – butadiene rubber elastomers (SBR), 6% styrene – butadiene latexes, 5 % to producer unsaturated polyester resins (James and Castor 2011). Global production of styrene for the year 2008 was of 26 million tonnes (James and Castor 2011).
  Reference(s):
  Gendorf (2016) Umwelterklärung 2015, Werk Gendorf Industriepark, www.gendorf.de
  James, D.H. and Castor, W.M. 2011. Styrene. In Ullmann's Encyclopedia of Industrial Chemistry, Electronic Release, Vol.34, pp.529-544. Wiley-VCH, Weinheim.
  Welch, V.A. et al. 2005. Ethylbenzene. In Ullmann's Encyclopedia of Industrial Chemistry, Electronic Release, Vol.13, pp.451-464. Wiley-VCH, Weinheim.
  production volume 2.2445e10 kg; name RP_PV
    Literature value. Global production of styrene for the year 2008 was of 26 million tonnes (James and Castor 2011).
    Reference(s):
    James, D.H. and Castor, W.M. 2011. Styrene. In Ullmann's Encyclopedia of Industrial Chemistry, Electronic Release, Vol.34, pp.529-544. Wiley-VCH, Weinheim.
  property price 1.29 EUR2005; name RP_price_EUR2005
    Calculated from EU prices by use of exchange rates.
  property carbon content 0.923077
    carbon content on a dry matter basis (reserved; not for manual entry)
  property true value 1.29; name RP_true_value
    allocation property applied in "true value" allocation // value calculated from revenue
  properties: water content 0, carbon content, non-fossil 0, wet mass 1 kg, water in wet mass 0 kg, dry mass 1 kg, carbon content, fossil 0.923077, carbon allocation 0.923077 kg

## By-products
- heat, for reuse in municipal waste incineration only: 0 MJ; CPC 17300: Steam and hot water; By-product classification allocatable product; pedigree (1,1,1,1,1)
  Net electricity generated from this waste and used in internal MSWI plant energy redistribution.
  Uncertainty: uncertainty is calculated from uncertainties in waste composition and uncertainties in energy efficiency and the uncertainty in internal energy demand
  production volume 3321.81 MJ
  property exergy 0.1842 MJ; name E_th_prod_MSWI_exergy
    This exergy property is based on the exergy content of the product.
  property price 0.0106 EUR2005; name E_th_prod_MSWI_price_EUR2005
    Average European district heat price from Ecoheatcool and Euroheat 2005-2006, Ecoheat Work package 1: The European heat market. Final report. 10.6 EUR/GJ i s the price of district heat. http://www.solarthermalworld.org/files/Ecoheatcool%20WP1%20Web.pdf?download
  property true value relation 0.1842; name E_th_prod_MSWI_true_value_relation
    property to calculate "true value" from
  property true value 9.76396e-10
    allocation property applied in "true value" allocation // value calculated from true value relation
- electricity, for reuse in municipal waste incineration only: 0 kWh; CPC 17100: Electrical energy; By-product classification allocatable product; pedigree (1,1,1,1,1)
  (same comment as for heat, for reuse in municipal waste incineration only)
  production volume 459.452 kWh
  property price 0.1 EUR2005; name E_el_prod_MSWI_price_EUR2005
    Estimated to be the same price as in case of electricity, medium voltage.
  property exergy 3.6 MJ; name E_el_prod_MSWI_exergy
    This exergy property is based on the exergy content of the product.
  property true value relation 3.6; name E_el_prod_MSWI_true_value_relation
    property to calculate "true value" from
  property true value 2.6394e-9
    (same comment as for heat, for reuse in municipal waste incineration only)

## Inputs from technosphere
- ethylene, average: 0 kg; pedigree (1,1,1,1,1)
  Calculated value based on stoichiometric calculations and literature data.
  28.05376g/mol is the molar mass of ethylene, average (C2H4).
  106.1674g/mol is the molar mass of styrene (C8H10).
  Styrene is mainly produced by the dehydrogenation of ethylbenzene (James and Castor 2011). Close to the entire production of ethylbenzene is produced via the alkylation of ethylene and benzene (Welch et al. 2005). This production route has been used since the mid-nineties (James and Castor 2011).
  Chemical reaction:
  C6H6 + C2H4 -> C8H10
  C8H10 -> C8H8 + H2
  properties: dry mass 1 kg, wet mass 1 kg, carbon content, fossil 0.857143
- nitrogen, liquid: 0.038 kg; lognormal variance with pedigree 0.0592, pedigree (4,4,4,4,4)
  Estimated value. Expert judgement.
  The expert judgement is made starting from Industry data (see details about Gendorf in the paragraph below) and adjusted based on the modelled activity.
  The values are a 5-year average of data (2011 - 2015) published by the Gendorf factory (Gendorf, 2016, Umwelterklärung, www.gendorf.de), (Gendorf, 2015, Umwelterklärung, www.gendorf.de), (Gendorf, 2014, Umwelterklärung, www.gendorf.de). The Gendorf factory is based in Germany, it produces a wide range of chemical substances. The factory produced 1657400 tonnes of chemical substances in the year 2015 (Gendorf, 2016, Umwelterklärung, www.gendorf.de) and 740000 tonnes of intermediate products.
  Reference(s):
  Gendorf (2016) Umwelterklärung 2015, Werk Gendorf Industriepark, www.gendorf.de
  properties: dry mass 1 kg, wet mass 1 kg
- wastewater, average: -2.7e-6 m3; name BP_wastewater_average; lognormal variance with pedigree 0.009825, pedigree (2,3,1,2,3)
  Calculated based on literature data published by the industry. This value is a 5-year average of data (2011 - 2015) published by the Gendorf factory (Gendorf, 2016, Umwelterklärung, www.gendorf.de), (Gendorf, 2015, Umwelterklärung, www.gendorf.de), (Gendorf, 2014, Umwelterklärung, www.gendorf.de). The amount of wastewater (which is later on treated in the municipal WWTP) per kg of chemical substance produced is calculated using literature data published by the Gendorf factory based in Germany, which produces a wide range of chemical substances. The factory produced 1657400 tonnes of chemical substances in the year 2015 (Gendorf, 2016, Umwelterklärung, www.gendorf.de) and 740000 tonnes of intermediate products. The amount of wastewater which is later on treated in the municipal WWTP in the year 2015 was 1200 tonnes (Gendorf, 2016, Umwelterklärung, www.gendorf.de). The resulting amount of wastewater is 2.7E-06 m3/kg of chemical product produced.
  production volume 60601.5 m3; = BP_wastewater_average*RP_PV/ABS(RP)
    Calculated from the production volume of the reference product in proportion to the respective output amounts.
  property price 0 EUR2005; name BP_wastewater_average_price_EUR2005
  properties: water content 2882.2, wet mass 1000 kg, carbon content, non-fossil 0.194039, dry mass 0.346837 kg
  note on carbon content, non-fossil: 0.0673 kg TOC/m3 (Tab A.17, ecoinvent v2.2 report 13_I). TOC was considered as Total Carbon.
- electricity, medium voltage: 0 kWh; pedigree (1,1,1,1,1)
  (same comment as for nitrogen, liquid)
- heat, from steam, in chemical industry: 0.4 MJ; lognormal variance with pedigree 0.009825, pedigree (2,3,1,2,3)
  (same comment as for nitrogen, liquid)
- chemical factory, organics: 4e-10 unit; lognormal variance with pedigree 0.309225, pedigree (2,3,1,2,3)
  Calculated based on literature data published by the industry. For this activity, no information was readily available concerning infrastructure and land-use. Therefore, the infrastructure is estimated based on data from two chemical factories, the BASF site of Ludwigshafen and the chemical factory in Gendorf (which are both located in Germany), which produce a wide range of chemical substances. Based on this data, the following assumptions are made: the built area amounts to about 4.2 ha, the plant has an average output of 50'000 t/a and a lifespan of fifty years. The estimated infrastructure amount is therefore 4.00 E-10 units per kg of produced chemical.
  References:
  Althaus H.-J., Chudacoff M., Hischier R., Jungbluth N., Osses M. and Primas A. (2007) Life Cycle Inventories of Chemicals. ecoinvent report No. 8, v2.0. EMPA Dübendorf, Swiss Centre for Life Cycle Inventories, Dübendorf, CH.
  Gendorf (2000) Umwelterklärung 2000, Werk Gendorf. Werk Gendorf, Burgkirchen.
- heat, district or industrial, natural gas: 0 MJ; pedigree (1,1,1,1,1)
  (same comment as for nitrogen, liquid)
- tap water: 0 kg; pedigree (1,1,1,1,1)
  Calculated value based on stoichiometric calculations and literature data.
  18.01528g/mol is the molar mass of tap water (H2O).
  106.1674g/mol is the molar mass of styrene (C8H10).
  Styrene is mainly produced by the dehydrogenation of ethylbenzene (James and Castor 2011). Close to the entire production of ethylbenzene is produced via the alkylation of ethylene and benzene (Welch et al. 2005). This production route has been used since the mid-nineties (James and Castor 2011).
  Chemical reaction:
  C6H6 + C2H4 -> C8H10
  C8H10 -> C8H8 + H2
  properties: water content 2962.17, wet mass 1 kg, carbon content, fossil 0.00178991, dry mass 0.000337476 kg
  note on carbon content, fossil: Bicarbonate content is 2.93 mol/m3. CO2 content is 0.1 mol/m3 (ecoinvent v2.2 report 8, Tab 93.1).
- benzene: 0.774483 kg; lognormal variance with pedigree 0.009825, pedigree (2,3,1,2,3)
  Calculated value based on stoichiometric calculations and literature data.
  78.11364g/mol is the molar mass of benzene (C6H6).
  106.1674g/mol is the molar mass of styrene (C8H10).
  Styrene is mainly produced by the dehydrogenation of ethylbenzene (James and Castor 2011). Close to the entire production of ethylbenzene is produced via the alkylation of ethylene and benzene (Welch et al. 2005). This production route has been used since the mid-nineties (James and Castor 2011).
  Chemical reaction:
  C6H6 + C2H4 -> C8H10
  C8H10 -> C8H8 + H2
  properties: dry mass 1 kg, carbon content, fossil 0.923077, wet mass 1 kg
- ethylene, average: 0.00439235, 0.273756 kg (2 entries); lognormal variance with pedigree 0.009825, pedigree (2,3,1,2,3)
  (same comment as for ethylene, average)
- electricity, medium voltage: 0.0108915, 0.00198179, 0.0336082, 0.487284, 0.0697396, 0.228495 kWh (6 entries); lognormal variance with pedigree 0.0592, pedigree (4,4,4,4,4)
  (same comment as for nitrogen, liquid)
- heat, district or industrial, natural gas: 0.074737, 4.22526 MJ (2 entries); lognormal variance with pedigree 0.0592, pedigree (4,4,4,4,4)
  (same comment as for nitrogen, liquid)
- tap water: 9.7434e-5, 0.000809433, 0.000161026, 0.00406043, 0.000105631, 0.000300466, 0.0464656 kg (7 entries); lognormal variance with pedigree 0.009825, pedigree (2,3,1,2,3)
  (same comment as for tap water)

## Inputs from nature
- Water, well, in ground [natural resource, in water]: 0.00166 m3; lognormal variance with pedigree 0.0592, pedigree (4,4,4,4,4)
  (same comment as for nitrogen, liquid)
- Water, river [natural resource, in water]: 0.00172 m3; lognormal variance with pedigree 0.0592, pedigree (4,4,4,4,4)
  (same comment as for nitrogen, liquid)
- Water, cooling, unspecified natural origin [natural resource, in water]: 0.0328 m3; lognormal variance with pedigree 0.0592, pedigree (4,4,4,4,4)
  (same comment as for nitrogen, liquid)

## Emissions to nature
- Water [water, unspecified]: 0.0334 m3; lognormal variance with pedigree 0.0592, pedigree (4,4,4,4,4)
  (same comment as for nitrogen, liquid)
- Water [air, unspecified]: 0.0028 m3; lognormal variance with pedigree 0.0592, pedigree (4,4,4,4,4)
  (same comment as for nitrogen, liquid)
- Nitrogen [air, unspecified]: 0.038 kg; lognormal variance with pedigree 0.0592, pedigree (4,4,4,4,4)
  (same comment as for nitrogen, liquid)
- BOD5, Biological Oxygen Demand [water, unspecified]: 0.00522143 kg; lognormal variance with pedigree 0.218, pedigree (4,5,5,5,5)
  Calculated value. The BOD, COD, TOC and BOD5 are calculated based on the amount and type of emissions released to water in the same activity.
- Ethylene [air, unspecified]: 0.0139074 kg; lognormal variance with pedigree 0.0104, pedigree (2,3,1,4,3)
  Calculated value. The values is based on a generic model. The basic principles of the model have been published in literature (Hischier 2005, Establishing Life Cycle Inventories of Chemicals Based on Differing Data Availability). The model has been updated and extended with newly available data from the chemical industry. Find more information in the dedicated report on the ecoinvent website.
  Reference(s):
  Hischier, R. (2005) Establishing Life Cycle Inventories of Chemicals Based on Differing Data Availability (9 pp). The International Journal of Life Cycle Assessment, Volume 10, Issue 1, pp 59–67. 10.1065/lca2004.10.181.7
- COD, Chemical Oxygen Demand [water, unspecified]: 0.00522143 kg; lognormal variance with pedigree 0.218, pedigree (4,5,5,5,5)
  (same comment as for BOD5, Biological Oxygen Demand)
- Carbon dioxide, fossil [air, unspecified]: 0.1137 kg; lognormal variance with pedigree 0.0104, pedigree (2,3,1,4,3)
  (same comment as for Ethylene)
- Benzene [water, unspecified]: 0.00177025 kg; lognormal variance with pedigree 0.0104, pedigree (2,3,1,4,3)
  (same comment as for Ethylene)
- DOC, Dissolved Organic Carbon [water, unspecified]: 0.0016317 kg; lognormal variance with pedigree 0.218, pedigree (4,5,5,5,5)
  (same comment as for BOD5, Biological Oxygen Demand)
- Benzene [air, unspecified]: 0.00331921 kg; lognormal variance with pedigree 0.0104, pedigree (2,3,1,4,3)
  (same comment as for Ethylene)
- TOC, Total Organic Carbon [water, unspecified]: 0.0016317 kg; lognormal variance with pedigree 0.218, pedigree (4,5,5,5,5)
  (same comment as for BOD5, Biological Oxygen Demand)

## Sampling procedure
Literature data and stochiometric calculation.

## Extrapolations
This dataset is extrapolated from the european dataset. The uncertainty has been adjusted accordingly.

## Review by Emilia Moreno Ruiz 2017-08-10
This dataset was additionally reviewed in a separate review process by Eric Johnson of Atlantic Consulting as well as Emilia Moreno Ruiz and Gregor Wernet of ecoinvent.
