# basalt quarry operation

Dataset: EcoSpold 2, unit process
Geography: RoW
Time period: 2003-01-01 to 2019-12-31
Technology level: current
Classification: ISIC rev.4 ecoinvent: 0810:Quarrying of stone, sand and clay
Classification: EcoSpold01Categories: construction materials/additives
Tags: ConvertedDataset
Scenario: Business-as-Usual
System model: Allocation at the point of substitution
Generated by: Mischa Classen
Published in: Althaus H.-J. 2000
Database: ecoinvent
isCopyrightProtected: true
accessRestrictedTo: 1

## General comment
The module is designed for the use as raw-material for rockwool.
[This dataset was already contained in the ecoinvent database version 2. It was not individually updated during the transfer to ecoinvent version 3. Life Cycle Impact Assessment results may still have changed, as they are affected by changes in the supply chain, i.e. in other datasets. This dataset was generated following the ecoinvent quality guidelines for version 2. It may have been subject to central changes described in the ecoinvent version 3 change report (http://www.ecoinvent.org/database/ecoinvent-version-3/reports-of-changes/), and the results of the central updates were reviewed extensively. The changes added e.g. consistent water flows and other information throughout the database. The documentation of this dataset can be found in the ecoinvent reports of version 2, which are still available via the ecoinvent website. The change report linked above covers all central changes that were made during the conversion process.]

## Included activities end
The module includes a mining step and a subsequent benefication step comprising crushing, washing and classification.

## Geography
Data for one german quarry used as proxy for whole European situation

## Technology
Basalt is exploited in open-pit quarries.

## Parameters
- fraction, process water, to air: 0.2 dimensionless; name fraction_PW_to_air; lognormal variance with pedigree 0.092025, pedigree (4,4,3,2,4)

## Reference product
- basalt: 1 kg; CPC 15130: Granite, sandstone and other monumental or building stone; By-product classification allocatable product
  EcoSpold01Location=RER
  production volume 2.67763 kg
    This is a placeholder value that does not reflect real-world production volumes. This dataset does not currently require a real-world production volume to work in the database framework, and no actual data were collected yet. This has no negative effect on the results of the ecoinvent database.
  property carbon content, non-fossil 0
    Tab 3.1, ecoinvent v2.2 report 7, part XIV for basalt composition
  property carbon content 0
    carbon content on a dry matter basis (reserved; not for manual entry)
  property true value 0.031
    allocation property applied in "true value" allocation // value calculated from revenue
  properties: water content 0, wet mass 1 kg, water in wet mass 0 kg, price 0.031 EUR2005, dry mass 1 kg, carbon content, fossil 0, carbon allocation 0 kg

## By-products
- heat, for reuse in municipal waste incineration only: 0 MJ; CPC 17300: Steam and hot water; By-product classification allocatable product; pedigree (1,1,1,1,1)
  Net electricity generated from this waste and used in internal MSWI plant energy redistribution.
  Uncertainty: uncertainty is calculated from uncertainties in waste composition and uncertainties in energy efficiency and the uncertainty in internal energy demand
  production volume 4.00924e-5 MJ
  property exergy 0.1842 MJ; name E_th_prod_MSWI_exergy
    This exergy property is based on the exergy content of the product.
  property price 0.0106 EUR2005; name E_th_prod_MSWI_price_EUR2005
    Average European district heat price from Ecoheatcool and Euroheat 2005-2006, Ecoheat Work package 1: The European heat market. Final report. 10.6 EUR/GJ i s the price of district heat. http://www.solarthermalworld.org/files/Ecoheatcool%20WP1%20Web.pdf?download
  property true value relation 0.1842; name E_th_prod_MSWI_true_value_relation
    property to calculate "true value" from
  property true value 8.8102e-8
    allocation property applied in "true value" allocation // value calculated from true value relation
- electricity, for reuse in municipal waste incineration only: 0 kWh; CPC 17100: Electrical energy; By-product classification allocatable product; pedigree (1,1,1,1,1)
  (same comment as for heat, for reuse in municipal waste incineration only)
  production volume 5.42377e-6 kWh
  property price 0.1 EUR2005; name E_el_prod_MSWI_price_EUR2005
    Estimated to be the same price as in case of electricity, medium voltage.
  property exergy 3.6 MJ; name E_el_prod_MSWI_exergy
    This exergy property is based on the exergy content of the product.
  property true value relation 3.6; name E_el_prod_MSWI_true_value_relation
    property to calculate "true value" from
  property true value 2.32923e-7
    (same comment as for heat, for reuse in municipal waste incineration only)
- iron scrap, sorted, pressed: 0 kg; By-product classification Recyclable; CPC 39310: Slag, dross, scalings and other waste from the manufacture of iron or steel; pedigree (1,1,1,1,1)
  metallic iron scrap removed from ash reamains and recycled.
  Uncertainty: uncertainty is calculated from uncertainties in waste composition and transfer coefficients to soild residues
  production volume 6.09778e-7 kg
  property price 0.175 EUR2005
    Temporary price data. Calculated as 90% of purchasers price based on: 2005 import and export prices (total trades (USD) divided by total weight (kg) in biggest economies of the world: EU27, USA, Brasil, China, India, Japan and Russia) from UN Commodity Trade Statistics Database (http://data.un.org/Explorer.aspxDatabase [Accessed 2011.06.20]). Commodity: Waste or scrap, of cast iron
  property carbon content 0
    carbon content on a dry matter basis (reserved; not for manual entry)
  property true value 3.30017e-8
    allocation property applied in "true value" allocation // value calculated from revenue
  properties: carbon content, non-fossil 0, wet mass 1 kg, dry mass 1 kg, water content 0, carbon content, fossil 0, water in wet mass 0 kg, carbon allocation 0 kg
- copper: 0 kg; source Rentz O. 1999; By-product classification allocatable product; CPC 41413: Refined copper and copper alloys, unwrought; master alloys of copper
  Literature value. Copper uses: Before end-use copper is manufactured into semi fabricated products, such as shapes and ingots (known as 'semis'). These manufacturing processes are subdivided into hot working, cold working and, if necessary, process annealing. Few of the semis are ready for use as such. They more typically travel to first-stage manufacturers, who make metal rods, wire, and casting, and then to component manufacturers who produce such things as motors, valves, and insulated cables The components in turn are incorporated by final-stage manufacturers into a variety of finished products - automobiles, commercial buildings, residential housing, and so forth. These uses account for about 79% of the world-wide consumption of copper.
  production volume 1.96491e-8 kg
  property price 5.52 EUR2005
    Literature value (http://www.economist.com/news/business/21576714-mining-industry-has-enriched-chile-its-future-precarious-copper-solution). Average price between 20015 and 2013.
  property carbon content 0
    carbon content on a dry matter basis (reserved; not for manual entry)
  property true value 3.31342e-8
    allocation property applied in "true value" allocation // value calculated from revenue
  properties: dry mass 1 kg, water in wet mass 0 kg, wet mass 1 kg, carbon content, non-fossil 0, water content 0, carbon content, fossil 0, carbon allocation 0 kg
- zinc concentrate: 0 kg; CPC 14290: Other non-ferrous metal ores and concentrates (other than uranium or thorium ores and concentrates); By-product classification allocatable product
  Calculated value from the knowledge of the properties of both products.
  production volume 1.5596e-17 kg
  property price 0.38 EUR2005; name ByP_price_EUR2005
    Temporary price data. Calculated as 90% of purchasers price based on: Zinc content in concentrate 53%. Concentrate price per kg Zn 86.5% of refined Zn price (13.5% treatment charges according to CHR Metals Limited 2005: Dynamic cost curves. http://www.minecost.com/dynamic.pdf). 2004 zinc price from USGS (2007) Mineral commodity summaries 2007. <http://minerals.usgs.gov/minerals/pubs/mcs/2007/mcs2007.pdf> [Accessed 25 May 2010]
  property zinc content 0.53; name zinc_C_zinc_concentrate
    Zinc content on a dry matter basis. Value taken from teh "zinc mine operation" /GLO dataset.
  property dry mass 1 kg; name DM_zinc_concentrate
  property carbon content 0
    carbon content on a dry matter basis (reserved; not for manual entry)
  property true value 1.81047e-18
    allocation property applied in "true value" allocation // value calculated from revenue
  properties: wet mass 1 kg, water content 0, carbon content, non-fossil 0, carbon content, fossil 0, water in wet mass 0 kg, carbon allocation 0 kg
- iron scrap, unsorted: 0 kg; source European Aluminium Association 2008; CPC 39310: Slag, dross, scalings and other waste from the manufacture of iron or steel; By-product classification Recyclable; pedigree (1,1,1,1,1)
  production volume 1.61322e-11 kg
  property price 0.149 EUR2005; name ironScrapAmount_price_EUR2005
    Temporary price data. Calculated as 90% of purchasers price based on: estimated at 85% of sorted scrap
  property carbon content 0
    carbon content on a dry matter basis (reserved; not for manual entry)
  property true value 7.99413e-13
    allocation property applied in "true value" allocation // value calculated from revenue
  properties: water in wet mass 0 kg, water content 0, carbon content, fossil 0, carbon content, non-fossil 0, dry mass 1 kg, wet mass 1 kg, carbon allocation 0 kg
- aluminium oxide, non-metallurgical: 0 kg; source European Aluminium Association 2008; CPC 41432: Alumina (aluminium oxide), except artificial corundum; By-product classification allocatable product; CAS 1344-28-1; pedigree (1,1,1,1,1)
  production volume 1.01514e-9 kg
  property carbon content, non-fossil 0; name C_content_non_fossil
  property price 0.28 EUR2005; name Al2O3Amount_price_EUR2005
    From UN trade database. http://data.un.org/ Import data from the largest economies of the world are used (Brazil, India, USA, China, Japan and EU-27).
  property dry mass 1 kg; name DM
  property water content 0; name water_content
  property wet mass 1 kg; name WM
  property water in wet mass 0 kg; name WWM
  property carbon content, fossil 0; name C_content_fossil
  property carbon content 0
    carbon content on a dry matter basis (reserved; not for manual entry)
  property true value 9.45311e-11
    allocation property applied in "true value" allocation // value calculated from revenue
  properties: carbon allocation 0 kg
- aluminium, cast alloy: 0 kg; source European Aluminium Association 2008; By-product classification allocatable product; CPC 41431: Unwrought aluminium; pedigree (1,1,1,1,1)
  EcoSpold01Location=RER
  production volume 9.48932e-9 kg
  property price 1.3 EUR2005; name castAlloyAmount_price_EUR2005
    Temporary price data. Calculated as 90% of purchasers price based on: Source: London Metal Exchange, Aluminium alloy price for 2005
  property carbon content 0
    carbon content on a dry matter basis (reserved; not for manual entry)
  property true value 4.10269e-9
    allocation property applied in "true value" allocation // value calculated from revenue
  properties: water in wet mass 0 kg, carbon content, non-fossil 0, water content 0, dry mass 1 kg, carbon content, fossil 0, wet mass 1 kg, carbon allocation 0 kg
- aluminium, wrought alloy: 0 kg; source European Aluminium Association 2008; By-product classification allocatable product; CPC 4153: Semi-finished products of aluminium or aluminium alloys; pedigree (1,1,1,1,1)
  production volume 4.15424e-9 kg
  property price 1.44 EUR2005; name secondaryAluminiumOutput_price_EUR2005
    Estimated based on literature values and expert judgement. Aluminium ccast alloys are about 90% of the price of aluminium wrought alloys.
  property carbon content 0
    carbon content on a dry matter basis (reserved; not for manual entry)
  property true value 1.9895e-9
    allocation property applied in "true value" allocation // value calculated from revenue
  properties: wet mass 1 kg, water content 0, carbon content, fossil 0, water in wet mass 0 kg, carbon content, non-fossil 0, dry mass 1 kg, carbon allocation 0 kg

## Inputs from technosphere
- alkyd paint, white, without solvent, in 60% solution state: 2.99996e-6 kg; lognormal variance with pedigree 0.062, pedigree (1,4,5,5,3)
  EcoSpold01Location=RER
  properties: wet mass 1 kg, dry mass 1 kg, carbon content, fossil 0.140367, carbon content, non-fossil 0.199629
  note on carbon content, fossil: C content was calculated as an addition of C content in the raw materials.
- electricity, medium voltage: 0 kWh; pedigree (1,1,1,1,1)
  EcoSpold01Location=UCTE
- municipal solid waste: 0 kg; pedigree (1,1,1,1,1)
  EcoSpold01Location=CH
  production volume 0 kg
    Calculated from the production volume of basalt in proportion to the respective output amounts.
  properties: wet mass 1 kg, carbon content, non-fossil 0.261655, water content 0.297017, dry mass 0.771 kg, carbon content, fossil 0.171549
  note on carbon content, non-fossil: MSW composition in tab 4.1, ecoinvent v2.2 report 13_I. C content referred to 1 kg DM
- limestone quarry infrastructure: 7.9999e-11 unit; lognormal variance with pedigree 0.432, pedigree (5,4,5,5,3)
  EcoSpold01Location=CH
- blasting: 7.7299e-5 kg; lognormal variance with pedigree 0.076, pedigree (4,5,5,5,3)
  EcoSpold01Location=RER
- wastewater, from residence: -9.59988e-8 m3; lognormal variance with pedigree 0.062, pedigree (1,4,5,5,3)
  EcoSpold01Location=CH
  production volume 2.88e-7 m3
    (same comment as for municipal solid waste)
  properties: wet mass 1000 kg, dry mass 0.337476 kg, carbon content, non-fossil 0.199421, water content 2962.17
  note on carbon content, non-fossil: 0.0673 kg TOC/m3 (Tab A.17, ecoinvent v2.2 report 13_I). TOC was considered as Total Carbon.
- waste graphical paper: 0 kg; pedigree (1,1,1,1,1)
  EcoSpold01Location=CH
  production volume 0 kg
    (same comment as for municipal solid waste)
  properties: water content 0.126126, carbon content, non-fossil 0.454955, dry mass 0.888 kg, wet mass 1 kg
- transport, passenger car: 1.07999e-5 km; lognormal variance with pedigree 0.062, pedigree (1,4,5,5,3)
  EcoSpold01Location=CH
- heat, district or industrial, other than natural gas: 0 MJ; pedigree (1,1,1,1,1)
  EcoSpold01Location=CH
- chemical, organic: 3.59995e-7 kg; lognormal variance with pedigree 0.062, pedigree (1,4,5,5,3)
  EcoSpold01Location=GLO
  properties: wet mass 1 kg, carbon content, fossil 0.628, dry mass 1 kg
  note on carbon content, fossil: This dataset is an unweighted average of 20 organic substances (listed in Tab 88.1, ecoinvent v2.2 report 8, part II), being part of the top100 chemicals included in this database. The C-content has also been calculated as an unweighted average of the C content of the substances composing this dataset.
- waste paint: -4.87994e-6 kg; lognormal variance with pedigree 0.062, pedigree (1,4,5,5,3)
  EcoSpold01Location=CH
  production volume 1.464e-5 kg
    (same comment as for municipal solid waste)
  properties: carbon content, fossil 0.65, dry mass 1 kg, wet mass 1 kg
  note on carbon content, fossil: Tab A.5, ecoinvent v2.2 report 13_I. C content has been calculated after data in the tables, and then referred to 1 kg DM
- lubricating oil: 5.39993e-5 kg; lognormal variance with pedigree 0.062, pedigree (1,4,5,5,3)
  EcoSpold01Location=RER
  properties: wet mass 1 kg, dry mass 1 kg, carbon content, fossil 0.75
  note on carbon content, fossil: Lubricating oil is produced from diesel. C-content/dry mass of fats and oils considered 75%, from: ecoinvent v2.2 report, n 15a, pg 40
- diesel, burned in building machine: 0.0413995 MJ; lognormal variance with pedigree 0.062, pedigree (1,4,5,5,3)
  EcoSpold01Location=GLO
- electricity, medium voltage: 8.12925e-5, 1.47918e-5, 0.000250847, 0.00363701, 0.000520525, 0.00170545 kWh (6 entries); lognormal variance with pedigree 0.062, pedigree (1,4,5,5,3)
  EcoSpold01Location=UCTE
- municipal solid waste: -8.66179e-8, -2.18255e-8, -3.119e-8, -6.12596e-5 kg (4 entries); lognormal variance with pedigree 0.062, pedigree (1,4,5,5,3)
  EcoSpold01Location=CH
  production volume 0.0001842 kg
- waste graphical paper: -2.54302e-8, -3.88331e-9, -3.3956e-10, -1.4032e-8, -1.36824e-9, -2.53275e-9, -4.72407e-7 kg (7 entries); lognormal variance with pedigree 0.062, pedigree (1,4,5,5,3)
  EcoSpold01Location=CH
  production volume 1.56e-6 kg
- heat, district or industrial, other than natural gas: 1.33242e-7, 0.000297213 MJ (2 entries); lognormal variance with pedigree 0.062, pedigree (1,4,5,5,3)
  EcoSpold01Location=CH

## Inputs from nature
- Water, lake [natural resource, in water]: 8.39989e-6 m3; name water_lake_input; lognormal variance with pedigree 0.062, pedigree (1,4,5,5,3)
- Occupation, mineral extraction site [natural resource, land]: 0.0079799 m2*year; lognormal variance with pedigree 0.12, pedigree (4,4,5,5,3)
- Transformation, to mineral extraction site [natural resource, land]: 0.00079799 m2; lognormal variance with pedigree 0.19, pedigree (4,4,5,5,3)
- Transformation, from mineral extraction site [natural resource, land]: 0.00079799 m2; lognormal variance with pedigree 0.19, pedigree (4,4,5,5,3)
- Basalt, in ground [natural resource, in ground]: 0.999987 kg; lognormal variance with pedigree 0.064, pedigree (3,4,5,5,3)
- Transformation, from forest, unspecified [natural resource, land]: 0.00079799 m2; lognormal variance with pedigree 0.19, pedigree (4,4,5,5,3)
- Transformation, to unspecified [natural resource, land]: 0.00079799 m2; lognormal variance with pedigree 0.19, pedigree (4,4,5,5,3)

## Emissions to nature
- Water [water, unspecified]: 6.71991e-6 m3; name water_to_water_unspecified; lognormal variance with pedigree 0.0827, pedigree (2,2,5,5,1)
  Calculated value based on literature values and expert opinion. See comments in the parametres' comment field.
  property fraction, origin: unspecified 0; name fraction_origin_unspecified_Ww
  property fraction, origin: salt water 0; name fraction_origin_salt_water_Ww
  property fraction, origin: fresh water 1; name fraction_origin_fresh_water_Ww
  property carbon content, non-fossil 0; name C_content_non_fossil
  property wet mass 1000 kg; name WM
  property dry mass 0 kg; name DM
  property carbon content, fossil 0; name C_content_fossil
  property water in wet mass 1000 kg; name WWM
- Particulates, < 2.5 um [air, non-urban air or from high stacks]: 7.9999e-6 kg; lognormal variance with pedigree 0.53, pedigree (5,5,5,5,5)
  Estimated based on proxy (limestone quarry operation).
- Particulates, > 10 um [air, non-urban air or from high stacks]: 0.000111999 kg; lognormal variance with pedigree 0.29, pedigree (5,5,5,5,5)
  Estimated based on proxy (limestone quarry operation).
- Particulates, > 2.5 um, and < 10um [air, non-urban air or from high stacks]: 3.99995e-5 kg; lognormal variance with pedigree 0.37, pedigree (5,5,5,5,5)
  Estimated based on proxy (limestone quarry operation).
- Water [air, unspecified]: 1.67998e-6 m3; name water_to_air_unspecified; lognormal variance with pedigree 0.0827, pedigree (2,2,5,5,1)
  (same comment as for Water)
  property fraction, origin: fresh water 1; name fraction_origin_fresh_water
  property fraction, origin: unspecified 0; name fraction_origin_unspecified
  property fraction, origin: salt water 0; name fraction_origin_salt_water

## Sampling procedure
Literature

## Extrapolations
see Geography and Technology This dataset has been copied from an original dataset covering the geography RER. The uncertainty has been adjusted accordingly.

## Review by Roberto Dones 2003-08-29
passed
