# window frame production, wood-metal, U=1.6 W/m2K

Dataset: EcoSpold 2, unit process
Geography: RER
Time period: 1996-01-01 to 2019-12-31
Technology level: current
Classification: ISIC rev.4 ecoinvent: 2511:Manufacture of structural metal products
Classification: EcoSpold01Categories: building components/windows
Tags: ConvertedDataset
Scenario: Business-as-Usual
System model: Allocation at the point of substitution
Generated by: Martin Lehmann
Published in: Kellenberger D. 2007
Database: ecoinvent
isCopyrightProtected: true
accessRestrictedTo: 1

## General comment
This dataset describes all the processes and material inputs needed to produce a wood-metal (steel) window frame with 1 m2 visible area. 1 m2 of visible wooden window frame weighs 83.4 kg.
[This dataset was already contained in the ecoinvent database version 2. It was not individually updated during the transfer to ecoinvent version 3. Life Cycle Impact Assessment results may still have changed, as they are affected by changes in the supply chain, i.e. in other datasets. This dataset was generated following the ecoinvent quality guidelines for version 2. It may have been subject to central changes described in the ecoinvent version 3 change report (http://www.ecoinvent.org/database/ecoinvent-version-3/reports-of-changes/), and the results of the central updates were reviewed extensively. The changes added e.g. consistent water flows and other information throughout the database. The documentation of this dataset can be found in the ecoinvent reports of version 2, which are still available via the ecoinvent website. The change report linked above covers all central changes that were made during the conversion process.]

## Included activities end
Included processes are timber sawing, varnishing (primer, solvents, paint), section bar rolling for steel fittings, joining, fitting, all the road transport at different production phases and the disposal of the paint remains.

## Geography
Window frames produced and sold in Switzerland and Germany.

## Technology
The dataset describes highly automated technology processes in window frame manufacturing.

## Parameters
- fraction, water, completely softened, to air: 0.24; name fraction_WCS_to_air; = fraction_PW_to_air; lognormal variance with pedigree 0.092025, pedigree (4,4,3,2,4)
  Calculated value. See comment in the other parametres present in this dataset. Water, completely softened is considered to be always used as process water, thus process water fractions to air are applied to all water, completely softened input flows to calculate the amount of water consumed in the processes.
- fraction, process water, to air: 0.24 dimensionless; name fraction_PW_to_air; lognormal variance with pedigree 0.092025, pedigree (4,4,3,2,4)
  Literature value (Statistics Canada, 2007 & Shaffer, K.H., 2008, Consumptive water use in the Great Lakes Basin, USGS) (Vionnet, S., Quantis Water Database - Technical Report, 2012).

## Reference product
- wood pellet, measured as dry mass: 1 kg; CPC 39281: Wood pellets; By-product classification allocatable product
  Calculated Value. Since the fuel for the furnace is included in the input, the corresponding amount inventoried with the energy module is subtracted.
  production volume 3.81636 kg; = Ref('08d46233-cacb-454c-b3af-1c8efa7089cc', 'ProductionVolume') * (Ref('79b647e5-1785-4211-9564-6a74e389b4a0') / Ref('08d46233-cacb-454c-b3af-1c8efa7089cc'))
    Calculated from production volume of reference product using the relative outputs.
  property price 0.0901 EUR2005
    Calculated value. The price of wood chips which are used for wood pellet production is 48.76 Euro/m3 (FAOSTAT database; http://faostat.fao.org/site/626/DesktopDefault.aspx?PageID=626#ancor). The density of the wood pellet is 650 kg/m3. It is estimated that processing the wood chips into a pellets will add 20% to the value of the pellets.
  property carbon content 0.494
    carbon content on a dry matter basis (reserved; not for manual entry)
  property true value 0.260029
    allocation property applied in "true value" allocation // value calculated from revenue
  properties: carbon content, fossil 0, wet mass 1.1 kg, water content 0.1, water in wet mass 0.1 kg, carbon content, non-fossil 0.494, dry mass 1 kg, carbon allocation 0.494 kg
- window frame, wood-metal, U=1.6 W/m2K: 0 m2; CPC 42120: Doors, windows and their frames and thresholds for doors, of iron, steel or aluminium; By-product classification allocatable product
  EcoSpold01Location=RER
  production volume 1.32237 m2
    This is a placeholder value that does not reflect real-world production volumes. This dataset does not currently require a real-world production volume to work in the database framework, and no actual data were collected yet. This has no negative effect on the results of the ecoinvent database. The placeholder value of this activity was scaled according to the nominal GDP of 2005 (source: United Nations, http://data.un.org/Glossary.aspx?q=GDP+%28current+US%24%29, accessed 20130726) to reflect an appropriate share of the global production volume, which is also a placeholder value.
  property carbon content, fossil 0.0530468
    Calculated as an addition of C content in the product, then referred to 1 kg DM.
  property price 224 EUR2005
    Calculated based on literature values. The price of 1 kg of wood-metal window frame is calculated to be 2.68 euro/kg. This price is calculated as a weighted average of prices calculated based on import (net trade) of this material from the world into 5 big economies; EU, Japan, China, India, USA. The net weight and the trade value is obtained from the UN Comtrade database (average of commodity no. 730830 Doors, windows, frames of iron or steel and commodity no. 441810 Windows, French-windows, frames, of wood), year 2005. The weight of the window is 83.4kg/m2 based on the description of the dataset.
  property carbon content 0.599556
    carbon content on a dry matter basis (reserved; not for manual entry)
  property true value 224
    allocation property applied in "true value" allocation // value calculated from revenue
  properties: water content 0.0526316, wet mass 83.4 kg, water in wet mass 4.17 kg, carbon content, non-fossil 0.546509, dry mass 79.23 kg, carbon allocation 47.5028 kg

## By-products
- heat, for reuse in municipal waste incineration only: 0 MJ; CPC 17300: Steam and hot water; By-product classification allocatable product; pedigree (1,1,1,1,1)
  Net electricity generated from this waste and used in internal MSWI plant energy redistribution.
  production volume 2.81876 MJ
  property true value relation 0.1842; name E_th_prod_MSWI_true_value_relation
    property to calculate 'true value' from
  property exergy 0.1842 MJ; name E_th_prod_MSWI_exergy
    This exergy property is based on the exergy content of the product.
  property price 0.0106 EUR2005; name E_th_prod_MSWI_price_EUR2005
    Average European district heat price from Ecoheatcool and Euroheat 2005-2006, Ecoheat Work package 1: The European heat market. Final report. 10.6 EUR/GJ i s the price of district heat. http://www.solarthermalworld.org/files/Ecoheatcool%20WP1%20Web.pdf?download
  property true value 0.0149554
    allocation property applied in "true value" allocation // value calculated from true value relation
- electricity, for reuse in municipal waste incineration only: 0 kWh; CPC 17100: Electrical energy; By-product classification allocatable product; pedigree (1,1,1,1,1)
  (same comment as for heat, for reuse in municipal waste incineration only)
  production volume 0.37909 kWh
  property price 0.1 EUR2005; name E_el_prod_MSWI_price_EUR2005
    Estimated to be the same price as in case of electricity, medium voltage.
  property exergy 3.6 MJ; name E_el_prod_MSWI_exergy
    This exergy property is based on the exergy content of the product.
  property true value relation 3.6; name E_el_prod_MSWI_true_value_relation
    property to calculate 'true value' from
  property true value 0.0392853
    (same comment as for heat, for reuse in municipal waste incineration only)
- zinc concentrate: 0 kg; CPC 14290: Other non-ferrous metal ores and concentrates (other than uranium or thorium ores and concentrates); By-product classification allocatable product
  Calculated value from the knowledge of the properties of both products.
  production volume 7.85905e-5 kg
  property price 0.38 EUR2005; name ByP_price_EUR2005
    Temporary price data. Calculated as 90% of purchasers price based on: Zinc content in concentrate 53%. Concentrate price per kg Zn 86.5% of refined Zn price (13.5% treatment charges according to CHR Metals Limited 2005: Dynamic cost curves. http://www.minecost.com/dynamic.pdf). 2004 zinc price from USGS (2007) Mineral commodity summaries 2007. <http://minerals.usgs.gov/minerals/pubs/mcs/2007/mcs2007.pdf> [Accessed 25 May 2010]
  property zinc content 0.53; name zinc_C_zinc_concentrate
    Zinc content on a dry matter basis. Value taken from teh "zinc mine operation" /GLO dataset.
  property dry mass 1 kg; name DM_zinc_concentrate
  property carbon content 0
    carbon content on a dry matter basis (reserved; not for manual entry)
  property true value 6.92707e-8
    allocation property applied in "true value" allocation // value calculated from revenue
  properties: wet mass 1 kg, water content 0, carbon content, non-fossil 0, carbon content, fossil 0, water in wet mass 0 kg, carbon allocation 0 kg

## Inputs from technosphere
- methyl ethyl ketone: 7.5112e-8 kg; lognormal variance with pedigree 0.0507, pedigree (1,3,5,3,1)
  EcoSpold01Location=RER
  properties: wet mass 1 kg, dry mass 1 kg, carbon content, fossil 0.666667
- polyvinylchloride, emulsion polymerised: 6.97367e-6 kg; lognormal variance with pedigree 0.0507, pedigree (1,3,5,3,1)
  EcoSpold01Location=RER
  properties: carbon content, fossil 0.387097, dry mass 1 kg, wet mass 1 kg
  note on carbon content, fossil: Monomer is vynyl chloride, C2H3Cl (ecoinvent v2.2 report 11_II). MW=62 g/mol
- zinc coat, pieces: 0.000196014 m2; lognormal variance with pedigree 0.05, pedigree (1,1,5,1,1)
  EcoSpold01Location=RER
  composite
- melamine formaldehyde resin: 2.94423e-5 kg; lognormal variance with pedigree 0.0507, pedigree (1,3,5,3,1)
  EcoSpold01Location=RER
  properties: wet mass 1 kg, carbon content, fossil 0.311708, dry mass 1 kg
  note on carbon content, fossil: Chemical formula of the melamine formaldehide monomer was assumed to be C4H6N6O
- sawnwood, softwood, dried (u=10%), planed: 7.83254e-5 m3; lognormal variance with pedigree 0.0507, pedigree (1,3,5,3,1)
  EcoSpold01Location=RER
  properties: water content 0.1, carbon content, non-fossil 0.494, wet mass 495 kg, dry mass 450 kg
  note on carbon content, non-fossil: C content of dry mass is 0.494 kgC/kg dry wood (ecoinvent v2.2 report 9)
- anodising, aluminium sheet: 0.00136567 m2; lognormal variance with pedigree 0.0507, pedigree (1,3,5,3,1)
  activityLink introduced to establish a direct link to the corresponding regional supply of this product
  EcoSpold01Location=RER
- titanium dioxide: 1.87981e-7 kg; lognormal variance with pedigree 0.0507, pedigree (1,3,5,3,1)
  EcoSpold01Location=RER
  properties: wet mass 1 kg, dry mass 1 kg
- benzimidazole-compound: 3.47042e-6 kg; lognormal variance with pedigree 0.0507, pedigree (1,3,5,3,1)
  EcoSpold01Location=RER
  properties: carbon content, fossil 0.529668, dry mass 1 kg, wet mass 1 kg
  note on carbon content, fossil: C content estimated as an average of that of the pesticides Carbendazim, prochloraz and ethofumesate (Sutter 2010)
- synthetic rubber: 0.00116886 kg; lognormal variance with pedigree 0.0507, pedigree (1,3,5,3,1)
  EcoSpold01Location=RER
  properties: carbon content, fossil 0.871949, wet mass 1 kg, dry mass 1 kg
  note on carbon content, fossil: EPDM (Ethylene-propene-diene terpolymer) rubber is a terpolymer of ethylene, propene, and a diene with the residual unsaturated portion of the diene in the side chain (ecoinvent v2.2 report 7-part XX & Ullmann). Chemical formula (deduced from Evidences of Solvent-Induced Miscibility in Polychloroprene-co-Ethylene-Propene Diene Terpolymer Blends, Dubey et al., Journal of Applied Polymer Science, 2009, 111:1884–1891): C20H35
- white spirit: 2.21319e-6 kg; lognormal variance with pedigree 0.0507, pedigree (1,3,5,3,1)
  EcoSpold01Location=RER
  properties: dry mass 1 kg, carbon content, fossil 0.863404, wet mass 1 kg
  note on carbon content, fossil: The most common variety of white spirit is a mixture of saturated aliphatic and alicyclic C7-C12 hydrocarbons with a content of 15-20% (by weight) of aromatic C7-C12 hydrocarbons (ecoinvent v2.2 report 8-part 94). The average composition was assumed as being 82.5% C9.5 saturated aliphatic and alicyclic hydrocarbons (average formula C9.5H20), and 17.5% C9.5 aromatic hydrocarbons (average formula C9.5H9.5).
- section bar rolling, steel: 0.00205654 kg; lognormal variance with pedigree 0.05, pedigree (1,1,5,1,1)
  EcoSpold01Location=RER
  composite
- polypropylene, granulate: 9.35888e-6 kg; lognormal variance with pedigree 0.0507, pedigree (1,3,5,3,1)
  EcoSpold01Location=RER
  properties: wet mass 1 kg, dry mass 1 kg, carbon content, fossil 0.857143
  note on carbon content, fossil: Polypropylene is formed by the polymerisation of propylene, C3H6 (ecoinvent v2.2 report 11_II)
- propylene glycol, liquid: 7.5112e-8 kg; lognormal variance with pedigree 0.0507, pedigree (1,3,5,3,1)
  EcoSpold01Location=RER
  properties: dry mass 1 kg, wet mass 1 kg, carbon content, fossil 0.473684
- acetone, liquid: 5.46269e-6 kg; lognormal variance with pedigree 0.05, pedigree (1,1,5,1,1)
  EcoSpold01Location=RER
  composite
  properties: dry mass 1 kg, carbon content, fossil 0.62069, wet mass 1 kg
- isopropanol: 1.50626e-7 kg; lognormal variance with pedigree 0.0507, pedigree (1,3,5,3,1)
  EcoSpold01Location=RER
  properties: dry mass 1 kg, wet mass 1 kg, carbon content, fossil 0.6
- section bar extrusion, aluminium: 0.00490036 kg; lognormal variance with pedigree 0.0507, pedigree (1,3,5,3,1)
  (same comment as for anodising, aluminium sheet)
- nylon 6-6, glass-filled: 0.000437819 kg; lognormal variance with pedigree 0.0507, pedigree (1,3,5,3,1)
  EcoSpold01Location=RER
  properties: wet mass 1 kg, dry mass 1 kg, carbon content, fossil 0.446018
  note on carbon content, fossil: Nylon 66 is derived from hexamethylene diamine and adipic acid and has the following structure: -(HN-(CH2)6-NH-CO-(CH2)4-CO)n- (ecoinvent v2.2 report 11_II), C12H22N2O2. MW=226 g/mol. Here Nylon 66 is – mainly for improved stiffness and stability – modified with glass fibres. The glass fibre content in the product is assumed of 30%. (ecoinvent v2.2 report 11_II)
- polyvinylchloride, suspension polymerised: 4.76533e-5 kg; lognormal variance with pedigree 0.0507, pedigree (1,3,5,3,1)
  EcoSpold01Location=RER
  properties: wet mass 1 kg, dry mass 1 kg, carbon content, fossil 0.387097
- waste paint: 0 kg; pedigree (1,1,1,1,1)
  composite
  EcoSpold01Location=CH
  production volume 0 kg
    Calculated from the production volume of window frame, wood-metal, U=1.6 W/m2K in proportion to the respective output amounts.
  properties: wet mass 1 kg, dry mass 1 kg, carbon content, fossil 0.65
  note on carbon content, fossil: Tab A.5, ecoinvent v2.2 report 13_I. C content has been calculated after data in the tables, and then referred to 1 kg DM
- electricity, medium voltage: 0.0250641 kWh; lognormal variance with pedigree 0.05, pedigree (1,1,5,1,1)
  composite
  EcoSpold01Location=UCTE
- steel, low-alloyed, hot rolled: 0.00205654 kg; lognormal variance with pedigree 0.05, pedigree (1,1,5,1,1)
  EcoSpold01Location=RER
  composite
  properties: wet mass 1 kg, dry mass 1 kg, carbon content, fossil 0.005
  note on carbon content, fossil: Low alloyed steel composition given in Tab. 3.2 ecoinvent v2.2 report 10_partII. Steel assumed to have a C content of 0.5%
- toluene, liquid: 9.84088e-6 kg; lognormal variance with pedigree 0.05, pedigree (1,1,5,1,1)
  composite
  EcoSpold01Location=RER
  properties: wet mass 1 kg, carbon content, fossil 0.913043, dry mass 1 kg
- polyethylene, low density, granulate: 9.35888e-6 kg; lognormal variance with pedigree 0.0507, pedigree (1,3,5,3,1)
  EcoSpold01Location=RER
  properties: wet mass 1 kg, carbon content, fossil 0.857143, dry mass 1 kg
  note on carbon content, fossil: Polyethylene is formed out of a huge amount of ethylene monomers (C2H4) (ecoinvent v2.2 report 11_II). MW=28 g/mol
- copper: 2.5024e-6 kg; lognormal variance with pedigree 0.0507, pedigree (1,3,5,3,1)
  EcoSpold01Location=RER
  properties: wet mass 1 kg, dry mass 1 kg
- heat, central or small-scale, other than natural gas: 0.0184366 MJ; lognormal variance with pedigree 0.0507, pedigree (1,3,5,3,1)
  EcoSpold01Location=CH
- zinc: 0.000116484 kg; lognormal variance with pedigree 0.0507, pedigree (1,3,5,3,1)
  EcoSpold01Location=RER
  properties: dry mass 1 kg, wet mass 1 kg
- aluminium, wrought alloy: 0.00490036 kg; lognormal variance with pedigree 0.0507, pedigree (1,3,5,3,1)
  EcoSpold01Location=RER
  properties: wet mass 1 kg, dry mass 1 kg
- aluminium, cast alloy: 6.26603e-6 kg; lognormal variance with pedigree 0.0507, pedigree (1,3,5,3,1)
  EcoSpold01Location=RER
  properties: dry mass 1 kg, wet mass 1 kg
- metal working factory: 1.53036e-11 unit; lognormal variance with pedigree 0.3527, pedigree (2,4,5,3,1)
  (same comment as for anodising, aluminium sheet)
- alkyd paint, white, without water, in 60% solution state: 0.00203244 kg; lognormal variance with pedigree 0.0507, pedigree (1,3,5,3,1)
  EcoSpold01Location=RER
  properties: carbon content, non-fossil 0.161654, carbon content, fossil 0.414587, dry mass 1 kg, wet mass 1 kg
  note on carbon content, non-fossil: C content was calculated as an addition of C content in the raw materials.
- sawnwood, hardwood, dried (u=10%), planed: 6.86853e-7 m3; lognormal variance with pedigree 0.0507, pedigree (1,3,5,3,1)
  EcoSpold01Location=RER
  properties: water content 0.1, carbon content, non-fossil 0.494, dry mass 650 kg, wet mass 715 kg
- alkyd resin, long oil, without solvent, in 70% white spirit solution state: 9.80071e-6 kg; lognormal variance with pedigree 0.0507, pedigree (1,3,5,3,1)
  EcoSpold01Location=RER
  properties: wet mass 1 kg, carbon content, non-fossil 0.412906, dry mass 1 kg, carbon content, fossil 0.268755
- water, completely softened: 0.000330573 kg; name water_softened_input; lognormal variance with pedigree 0.0507, pedigree (1,3,5,3,1)
  EcoSpold01Location=RER
  properties: wet mass 1 kg
- 1-butanol: 1.68701e-5 kg; lognormal variance with pedigree 0.05, pedigree (1,1,5,1,1)
  EcoSpold01Location=RER
  composite
  properties: dry mass 1 kg, carbon content, fossil 0.648649, wet mass 1 kg
- waste paint: -0.0013064, -3.03726e-6 kg (2 entries); lognormal variance with pedigree 0.05, pedigree (1,1,5,1,1)
  composite
  EcoSpold01Location=CH
  production volume 3.26 kg

## Emissions to nature
- Water [air, unspecified]: 7.93376e-8 m3; name water_to_air_unspecified; = (water_softened_input/1000*fraction_WCS_to_air); lognormal variance with pedigree 0.0807, pedigree (2,2,5,1,1)
  Calculated value based on literature values and expert opinion. See comments in the parametres' comment field.
  property fraction, origin: salt water 0; name fraction_origin_salt_water
  property fraction, origin: unspecified 0; name fraction_origin_unspecified
  property fraction, origin: fresh water 1; name fraction_origin_fresh_water
- Water [water, unspecified]: 2.51236e-7 m3; name water_to_water_unspecified; = (water_softened_input/1000)*(1-fraction_WCS_to_air); lognormal variance with pedigree 0.0807, pedigree (2,2,5,1,1)
  (same comment as for Water)
  property fraction, origin: salt water 0; name fraction_origin_salt_water_Ww
  property fraction, origin: fresh water 1; name fraction_origin_fresh_water_Ww
  property fraction, origin: unspecified 0; name fraction_origin_unspecified_Ww
  property wet mass 1000 kg; name WM
  property dry mass 0 kg; name DM
  property carbon content, non-fossil 0; name C_content_non_fossil
  property carbon content, fossil 0; name C_content_fossil
  property water in wet mass 1000 kg; name WWM

## Sampling procedure
Company documentation, measurements

## Extrapolations
see Geography

## Review by Rolf Frischknecht 2010-03-21
passed
