# tofu production

Dataset: EcoSpold 2, unit process
Geography: CA-QC
Time period: 2010-01-01 to 2019-12-31
Technology level: current
Classification: ISIC rev.4 ecoinvent: 1030:Processing and preserving of fruit and vegetables
Scenario: Business-as-Usual
System model: Allocation at the point of substitution
Generated by: Pierre-Olivier Roy
Database: ecoinvent
isCopyrightProtected: true
accessRestrictedTo: 1

## General comment
This dataset represents the soybase production and the following tofu production.
Organic soybeans received at the facility by truck or rail are sampled and analyzed for moisture content, foreign matter, and damaged seeds. The soybeans which are not up to specifications are eliminated. Soybeans are not dehulled. They are first soaked and remain there for a certain period of time (approximately 24 hours). The soaking water is continuously removed as fresh water enters the vessels. The soybeans are then grounded under airless condition. The resulting slurry is then centrifuged to obtain a soy base at 5% protein, separated from a moist solid co-product, the okara, which is valorized as animal feed. A coagulant is then added to the soy base for protein coagulation and, although there is a number of useable coagulant, calcium sulfate is typically used. This step results in whey and curds. The curd is pressed to remove the whey, submitted to heat for pasteurization (around 80°C), cooled and then cut into blocks. Note that different methods exist where the soy base is first heated before coagulation and pressing or where heat treatment is applied on packaged tofu blocks. In any case, a refrigerated storage is necessary afterwards. A more advanced sterilization process using UHT and aseptic packaging allows room temperature storage but is not common yet in Canada. Moizuddin et al. (1999) evaluated that nearly 70% (on a volume basis) of the input soy base will generate whey at an optimal calcium sulfate concentration.

Moizuddin, S.; Johnson, L. D.; Wilson, L. A., Rapid Method for Determining Optimum Coagulant Concentration in Tofu Manufacture. Journal of food science 1999, 64, (4).

## Included activities start
Starts with the arrival of the organic soybeans at plant

## Included activities end
This activity ends with the tofu production and storage
The dataset includes the production of soy base at a protein content of 5%, the coagulation process, heating, pressing, pasturisation, cutting and storage. The dataset doesn't include infrastructures and cleaning processes.

## Geography
Collected data for Quebec industries

## Technology
Current technology in US consisting of the addition of coagulant followed by pressing of the curds, heat for pasteurization (around 80°C), cooling, cutting into blocks and refrigeration.

## Time period
Collected data for Quebec industries in 2012-13 period while soybean production and characterisation was taken from 2010 data

## Parameters
- fraction, tap water, to air: 0.18; name fraction_TW_to_air; = fraction_PW_to_air; lognormal variance with pedigree 0.092025, pedigree (4,4,3,2,4)
  Calculated value. See comment in the other parametres present in this dataset. Tap water is considered to be always used as process water, thus process water fractions to air are applied to all tap water input flows to calculate the amount of water consumed in the processes.
- tofu whey: 3.325 kg; name whey; = soybean+steam+coagulant+water_coa+water-wastewater-tofu-okara-m_discarded; lognormal variance with pedigree 0.0021, pedigree (2,3,2,3,1)
  from mass balance calculations
- enthalpy: 2675.43 kJ/kg
  kJ/kg; for evaluating the heat loss
- energy heat: 8.141 MJ; name heat; lognormal variance with pedigree 0.0021, pedigree (2,3,2,3,1)
  MJ/kg soybean; for the tofu production
- mass okara: 1.75 kg; name okara; lognormal variance with pedigree 0.0021, pedigree (2,3,2,3,1)
  kg/kg soybean; okara is a by-product of soybase production
- mass soybean: 1 kg; name soybean; lognormal variance with pedigree 0.0021, pedigree (2,3,2,3,1)
- electricity input: 0.47 kWh; name electricity; = 0.1+0.37; lognormal variance with pedigree 0.0021, pedigree (2,3,2,3,1)
  electricity from soybase production + tofu production; from ProSoya and Plate (2013)
  Pro Soya, VS 1000/2000/4000 specifications.www.prosoya.com <http://www.prosoya.com> (March 16, 2013),
  Plate, T. Tofu's carbon footprint. http://tofuscarbonfootprint.weebly.com/the-tofu-factory.html (March 16, 2013),
- mass steam: 1.25 kg; name steam; lognormal variance with pedigree 0.0021, pedigree (2,3,2,3,1)
  kg/kg soybeansteam from soybase production
- mass coagulant: 2.5e-6 kg; name coagulant; = 0.0025/1000; lognormal variance with pedigree 0.0021, pedigree (2,3,2,3,1)
  kg/kg soybean; coagualant is CaSO4. Data was given in g. Unit conversion from g to kg is 1/1000
- fraction, process water, to air: 0.18 dimensionless; name fraction_PW_to_air; lognormal variance with pedigree 0.092025, pedigree (4,4,3,2,4)
  Calculated value based on knowledge of the amount of tapwater entering the activity and the amount of wastewater leaving the activity.
- mass water (coagulant): 0.125 kg; name water_coa; lognormal variance with pedigree 0.0021, pedigree (2,3,2,3,1)
  kg/kg soybean; from the coagulation
- mass water (process): 7.5 kg; name water; lognormal variance with pedigree 0.0021, pedigree (2,3,2,3,1)
  kg/kg soybean; for the soy base production
- mass tofu: 1.8 kg; name tofu; lognormal variance with pedigree 0.0021, pedigree (2,3,2,3,1)
  kg/kg soybean
- soy base: 5 kg; name soybase; lognormal variance with pedigree 0.0021, pedigree (2,3,2,3,1)
  L/kg soybeay; @ 5% protein; assumption on soy base density = water density
- mass discarded soybeans: 0.02 kg; name m_discarded; lognormal variance with pedigree 0.0101, pedigree (2,3,2,3,3)
  kg/kg soybean
- mass wastewater: 2.98 kg; name wastewater; = soybean+water+steam-m_discarded-okara-soybase; lognormal variance with pedigree 0.0021, pedigree (2,3,2,3,1)
  from mass balance calculations

## Reference product
- whey: 1 kg; = whey/tofu; source Moizudding, S.,  1999; CPC 22130: Whey; By-product classification allocatable product; pedigree (1,1,1,1,1)
  The quantity of discarded (trashed) whey related to1 kg of organic soybean. The mathematical relationship is to put the value in regards to a reference flow of 1kg of tofu
  Uncertainty: Calculated variable. Uncertainty will be determined from propagation of uncertainty factors of underlying variables. Uncertainty of actual relation between variables not accounted at this time, although this could be included in a future update
  production volume 8.00993e6 kg; = Ref('2c31df9a-be95-4190-ae3f-c0990ae8c6ea', 'ProductionVolume') * (Ref('3c4c3db3-706c-441b-9ad9-9122671aebc1') / Ref('2c31df9a-be95-4190-ae3f-c0990ae8c6ea'))
    Calculated from production volume of reference product using the relative outputs.
  property price 0.0354 EUR2005
    Temporary price data. Calculated as 90% of purchasers price based on: 2005 import prices (total trades (USD) divided by total weight (kg) in biggest economies of the world: EU27, USA, Brasil, China, India, Japan and Russia) from UN Commodity Trade Statistics Database (http://data.un.org/Explorer.aspxDatabase [Accessed 2011.06.23]). Commodity: Whey. The calculated price is 0.553 EUR/kg of dry mass of whey. The dry mass content is 0.064 kg/kg of wet mass of whey. Thus the price is (0.553*0.064=) 0.035 EUR/ kg of wet mass of whey. Cross-reference: the price of wet whey on the Swiss market is 0.02 CHF/kg (0.022 EUR/kg). Source: http://www.esu-services.ch/fileadmin/download/kopf-2015-agrarforschung-molke.pdf, accessed 20150917.
  property carbon content 0.845325
    carbon content on a dry matter basis (reserved; not for manual entry)
  property true value 0.0653917
    allocation property applied in "true value" allocation // value calculated from revenue
  properties: carbon content, fossil 0, water in wet mass 0.927 kg, wet mass 1 kg, carbon content, non-fossil 0.845325, dry mass 0.073 kg, carbon allocation 0.0617087 kg
- tofu: 0 kg; = tofu/tofu; source Plate, T.,  2013; CPC 23999: Other food products n.e.c.; By-product classification allocatable product
  the quantity of tofu (1.8 kg) produced for 1 kg of organic soybean. The mathematical relationship is to put the reference flow of tofu to 1 kg
  production volume 4.3362e6 kg; name ref_pv; = 6.6*1000*tofu*365
    The production volume has been calculated as approximately 6.6 ton of soybeans/day, 365 days per yr. The value of 6.6 ton of soybeans/day was estimated from Canada's organic soybean production (extrapolated as 1% of Canada's total soybean production based on personal communication with a Soy 20/20 representative). It is assumed that the 4 tofu producers in Canada contribute equally to this Production Volume
  property price 0.289 EUR2005
    Calculated based on literature values and estimates. The price of soybeans in 2005 was 0.23 Euro/kg. Import Quantity worldwide; 66869432 tonnes, Import Value; 18967764000 USD (FAOSTAT). Including the price of all the other inputs from technosphare. Resulting value multiplied by 1.5 to account for the treatment of wastewater and other expences which should be included in the basic price.
  property carbon content 0.735418
    carbon content on a dry matter basis (reserved; not for manual entry)
  property true value 0.289
    allocation property applied in "true value" allocation // value calculated from revenue
  properties: oil/fat content 0.045, dry mass 0.155 kg, wet mass 1 kg, carbon content, fossil 0, protein content 0.112, carbon content, non-fossil 0.735418, digestable energy content 3.18 MJ/kg, water in wet mass 0.845 kg, carbon allocation 0.11399 kg

## By-products
- protein feed, 100% crude: 0 kg; = okara/tofu*0.032; source Pro Soya 2013; By-product classification allocatable product; CPC 23319: Preparations used in animal feeding n.e.c.; pedigree (1,1,1,1,1)
  The quantity of okara produced related to1 kg of organic soybean. The mathematical relationship is to put the value in regards to a reference flow of 1kg of tofu. The protein feed represents a proxy for okara which is used as a protein source for animal feeds.
  3.2% is the amount of crude protein in okara.
  Uncertainty: Calculated variable. Uncertainty will be determined from propagation of uncertainty factors of underlying variables. Uncertainty of actual relation between variables not accounted at this time, although this could be included in a future update
  production volume 134904 kg; = Ref('2c31df9a-be95-4190-ae3f-c0990ae8c6ea', 'ProductionVolume') * (Ref('6bbe2ead-cb50-4f00-8b27-97d71e0c1f7f') / Ref('2c31df9a-be95-4190-ae3f-c0990ae8c6ea'))
    Calculated from production volume of reference product using the relative outputs.
  property price 0.424 EUR2005
    Based on protein content and energy feed, gross content in soybean meal and prices per kg of soybean meal. Assumed soybean meal is the most used feed. Soybean meal 2004 prices for World import/export data (tonnes and US$) from FaoStat statistics (http://faostat.fao.org/site/535/default.aspx#ancor, TRADE)- [Accessed 24 May 2010]. See calculations for protein /energy content
  property carbon content 0.0978
    carbon content on a dry matter basis (reserved; not for manual entry)
  property true value 0.0131911
    allocation property applied in "true value" allocation // value calculated from revenue
  properties: wet mass 1 kg, dry mass 0.184 kg, digestable energy content 3.22 MJ/kg, oil/fat content 0, carbon content, non-fossil 0.0978, water in wet mass 0.816 kg, carbon content, fossil 0, protein content 1, carbon allocation 0.0179952 kg
- heat, for reuse in municipal waste incineration only: 0 MJ; CPC 17300: Steam and hot water; By-product classification allocatable product; pedigree (1,1,1,1,1)
  Net electricity generated from this waste and used in internal MSWI plant energy redistribution.
  Uncertainty: uncertainty is calculated from uncertainties in waste composition and uncertainties in energy efficiency and the uncertainty in internal energy demand
  production volume 16346.7 MJ
  property price 0.0106 EUR2005; name E_th_prod_MSWI_price_EUR2005
    Average European district heat price from Ecoheatcool and Euroheat 2005-2006, Ecoheat Work package 1: The European heat market. Final report. 10.6 EUR/GJ i s the price of district heat. http://www.solarthermalworld.org/files/Ecoheatcool%20WP1%20Web.pdf?download
  property exergy 0.1842 MJ; name E_th_prod_MSWI_exergy
    This exergy property is based on the exergy content of the product.
  property true value relation 0.1842; name E_th_prod_MSWI_true_value_relation
    property to calculate "true value" from
  property true value 2.56935e-5
    allocation property applied in "true value" allocation // value calculated from true value relation
- electricity, for reuse in municipal waste incineration only: 0 kWh; CPC 17100: Electrical energy; By-product classification allocatable product; pedigree (1,1,1,1,1)
  (same comment as for heat, for reuse in municipal waste incineration only)
  production volume 1863.11 kWh
  property true value relation 3.6; name E_el_prod_MSWI_true_value_relation
    property to calculate "true value" from
  property exergy 3.6 MJ; name E_el_prod_MSWI_exergy
    This exergy property is based on the exergy content of the product.
  property price 0.1 EUR2005; name E_el_prod_MSWI_price_EUR2005
    Estimated to be the same price as in case of electricity, medium voltage.
  property true value 5.72328e-5
    (same comment as for heat, for reuse in municipal waste incineration only)
- biogas: 0 m3; source Raboni, Massimo 2014; By-product classification allocatable product; CPC 17200: Coal gas, water gas, producer gas and similar gases, other than petroleum gases and other gaseous hydrocarbons; pedigree (1,1,1,1,1)
  An average yield of 100 litres of biogas per kg biowaste is assumed
  production volume 117.073 m3
  property price 0.109 EUR2005; name biogas_yield_price_EUR2005
    Temporary price data. Calculated as 90% of purchasers price based on: Same prices per energy output as natural gas, based on the proportional lower heating value (2/3 that of natural gas)
  property carbon content, non-fossil 0.449939
    Total C content in kg/Nm3 (Tab 12.8, ecoinvent v2.2 report n17), referred to 1kg DM
  property carbon content 0.449939
    carbon content on a dry matter basis (reserved; not for manual entry)
  property true value 2.94288e-6
    allocation property applied in "true value" allocation // value calculated from revenue
  properties: water in wet mass 0 kg, wet mass 1.15 kg, carbon content, fossil 0, lower heating value 0 MJ/Nm3, water content 0, dry mass 1.15 kg, carbon allocation 0.51743 kg
- zinc concentrate: 0 kg; CPC 14290: Other non-ferrous metal ores and concentrates (other than uranium or thorium ores and concentrates); By-product classification allocatable product
  Calculated value from the knowledge of the properties of both products.
  production volume 0.0046209 kg
  property price 0.38 EUR2005; name ByP_price_EUR2005
    Temporary price data. Calculated as 90% of purchasers price based on: Zinc content in concentrate 53%. Concentrate price per kg Zn 86.5% of refined Zn price (13.5% treatment charges according to CHR Metals Limited 2005: Dynamic cost curves. http://www.minecost.com/dynamic.pdf). 2004 zinc price from USGS (2007) Mineral commodity summaries 2007. <http://minerals.usgs.gov/minerals/pubs/mcs/2007/mcs2007.pdf> [Accessed 25 May 2010]
  property zinc content 0.53; name zinc_C_zinc_concentrate
    Zinc content on a dry matter basis. Value taken from teh "zinc mine operation" /GLO dataset.
  property dry mass 1 kg; name DM_zinc_concentrate
  property carbon content 0
    carbon content on a dry matter basis (reserved; not for manual entry)
  property true value 4.0495e-10
    allocation property applied in "true value" allocation // value calculated from revenue
  properties: wet mass 1 kg, water content 0, carbon content, non-fossil 0, carbon content, fossil 0, water in wet mass 0 kg, carbon allocation 0 kg
- compost: 0 kg; CPC 391: Wastes from food and tobacco industry; By-product classification allocatable product; pedigree (1,1,1,1,1)
  EcoSpold01Location=CH
  Biowaste is reduced in mass by a factor of 2 during composting
  production volume 9326.22 kg
  property water in wet mass 0.472 kg; name Water_in_wet_mass_compost; = 1- DM_compost
  property price 0.03 EUR2005
    Temporary price data. Calculated as 90% of purchasers price based on: Estimation done using the following sources: <http://www.wmaa.asn.au/uploads/documents/MarkWinser_1May2007.pdf>; <http://www.swlf.ait.ac.th/UpdData/International/Composting%20and%20anaerobic%20digestion_%20comparions%20for%20Europe%20and%20Asia.pdf>; <http://www.epa.gov/osw/conserve/rrr/composting/basic.htm>, accessed 2011.06.16
  property carbon content, non-fossil 0.1165
    calculation: dry matter 50%, organic matter 40% of dry matter, C content calculated from organic matter divided by 1.72. Relative to dry matter; relative to fresh matter: divided by 2 => 0.1156
  property dry mass 0.528 kg; name DM_compost
  property water content 0.893939; name Water_content_compost; = Water_in_wet_mass_compost/DM_compost
  property concentration, cadmium 0 kg/kg; name Mass_compost_concentration_Cd; = Mass_biowaste_concentration_Cd*2
    Biowaste mass is reduced by a factor of two during composting, therefore concentration is doubled
  property humus equivalent 0.061 kg
    Humus building fraction expressed in kg per kg product on a FM basis. Humus denotes the converted, primary biomass from plants or animals in the ground. More information can be found in the documentation of the composting itself: "treatment of biowaste, industrial composting".
  property concentration, copper 0 kg/kg; name Mass_compost_concentration_Cu; = Mass_biowaste_concentration_Cu*2
    (same comment as for compost)
  property concentration, calcium 0 kg/kg; name Mass_compost_Ca_concentration; = Mass_biowaste_concentration_Ca*2
    (same comment as for compost)
  property concentration, magnesium 0 kg/kg; name Mass_compost_Mg_concentration; = Mass_biowaste_concentration_Mg*2
    (same comment as for compost)
  property concentration, mercury 0 kg/kg; name Mass_compost_Hg_concentration; = Mass_biowaste_concentration_Hg*2
    (same comment as for compost)
  property concentration, lead 0 kg/kg; name Mass_compost_concentration_Pb; = Mass_biowaste_concentration_Pb*2
    (same comment as for compost)
  property concentration, nickel 0 kg/kg; name Mass_compost_Ni_concentration; = Mass_biowaste_concentration_Ni*2
    (same comment as for compost)
  property concentration, phosphorus 0 kg/kg; name Mass_compost_P_concentration; = Mass_biowaste_concentration_P*2
    (same comment as for compost)
  property concentration, sulfur 0 kg/kg; name Mass_compost_concentration_S; = Mass_biowaste_concentration_S*2
    (same comment as for compost)
  property concentration, potassium 0 kg/kg; name Mass_compost_K_concentration; = Mass_biowaste_concentration_K*2
    (same comment as for compost)
  property nickel content 1.60606e-5; name Mass_compost_Ni_content; = Mass_biowaste_Ni_content/0.5*( DM_biowaste / DM_compost)
    nickel content on a dry matter basis
  property concentration, nitrogen 0 kg/kg; = Mass_biowaste_concentration_N*2
    (same comment as for compost)
  property concentration, zinc 0 kg/kg; name Mass_compost_concentration_Zn; = Mass_biowaste_concentration_Zn*2
    (same comment as for compost)
  property lead content 2.66667e-5; name Mass_compost_Pb_content; = Mass_biowaste_Pb_content/0.5*( DM_biowaste / DM_compost)
    lead content on a dry matter basis
  property copper content 3.81818e-5; name Mass_compost_Cu_content; = Mass_biowaste_Cu_content/0.5*( DM_biowaste / DM_compost)
    copper content on a dry matter basis
  property cadmium content 2.89394e-7; name Mass_compost_Cd_content; = Mass_biowaste_Cd_content/0.5*( DM_biowaste / DM_compost)
    cadmium content on a dry matter basis
  property nitrogen content 0.0136364; name Mass_compost_N_content; = Mass_biowaste_N_content/0.5*( DM_biowaste / DM_compost)
    nitrogen content on a dry matter basis
  property magnesium content 0.00525758; name Mass_compost_Mg_content; = Mass_biowaste_Mg_content/0.5*( DM_biowaste / DM_compost)
    magnesium content on a dry matter basis
  property zinc content 0.000120303; name Mass_compost_Zn_content; = Mass_biowaste_Zn_content/0.5*( DM_biowaste / DM_compost)
    zinc content on a dry matter basis
  property potassium content 0.0099697; name Mass_compost_K_content; = Mass_biowaste_K_content/0.5*( DM_biowaste / DM_compost)
    potassium content on a dry matter basis
  property sulfur content 0.00190909; name Mass_compost_S_content; = Mass_biowaste_S_content/0.5*( DM_biowaste / DM_compost)
    sulfur content on a dry matter basis
  property calcium content 0.0504545; name Mass_compost_Ca_content; = Mass_biowaste_Ca_content/0.5*( DM_biowaste / DM_compost)
    calcium content on a dry matter basis
  property mercury content 1e-7; name Mass_compost_Hg_content; = Mass_biowaste_Hg_content/0.5*( DM_biowaste / DM_compost)
    mercury content on a dry matter basis
  property phosphorus content 0.00275758; name Mass_compost_P_content; = Mass_biowaste_P_content/0.5*( DM_biowaste / DM_compost)
    phosphorus content on a dry matter basis
  property carbon content 0.1165
    carbon content on a dry matter basis (reserved; not for manual entry)
  property true value 6.45234e-5
    allocation property applied in "true value" allocation // value calculated from revenue
  properties: carbon content, fossil 0, wet mass 1 kg, carbon allocation 0.061512 kg
- iron scrap, sorted, pressed: 0 kg; By-product classification Recyclable; CPC 39310: Slag, dross, scalings and other waste from the manufacture of iron or steel; pedigree (1,1,1,1,1)
  metallic iron scrap removed from ash reamains and recycled.
  Uncertainty: uncertainty is calculated from uncertainties in waste composition and transfer coefficients to soild residues
  production volume 0.000980138 kg
  property price 0.175 EUR2005
    Temporary price data. Calculated as 90% of purchasers price based on: 2005 import and export prices (total trades (USD) divided by total weight (kg) in biggest economies of the world: EU27, USA, Brasil, China, India, Japan and Russia) from UN Commodity Trade Statistics Database (http://data.un.org/Explorer.aspxDatabase [Accessed 2011.06.20]). Commodity: Waste or scrap, of cast iron
  property carbon content 0
    carbon content on a dry matter basis (reserved; not for manual entry)
  property true value 3.95563e-11
    allocation property applied in "true value" allocation // value calculated from revenue
  properties: carbon content, non-fossil 0, wet mass 1 kg, dry mass 1 kg, water content 0, carbon content, fossil 0, water in wet mass 0 kg, carbon allocation 0 kg
- copper: 0 kg; source Rentz O. 1999; By-product classification allocatable product; CPC 41413: Refined copper and copper alloys, unwrought; master alloys of copper
  Literature value. Copper uses: Before end-use copper is manufactured into semi fabricated products, such as shapes and ingots (known as 'semis'). These manufacturing processes are subdivided into hot working, cold working and, if necessary, process annealing. Few of the semis are ready for use as such. They more typically travel to first-stage manufacturers, who make metal rods, wire, and casting, and then to component manufacturers who produce such things as motors, valves, and insulated cables The components in turn are incorporated by final-stage manufacturers into a variety of finished products - automobiles, commercial buildings, residential housing, and so forth. These uses account for about 79% of the world-wide consumption of copper.
  production volume 3.1198e-5 kg
  property price 5.52 EUR2005
    Literature value (http://www.economist.com/news/business/21576714-mining-industry-has-enriched-chile-its-future-precarious-copper-solution). Average price between 20015 and 2013.
  property carbon content 0
    carbon content on a dry matter basis (reserved; not for manual entry)
  property true value 3.97151e-11
    allocation property applied in "true value" allocation // value calculated from revenue
  properties: dry mass 1 kg, water in wet mass 0 kg, wet mass 1 kg, carbon content, non-fossil 0, water content 0, carbon content, fossil 0, carbon allocation 0 kg
- iron scrap, unsorted: 0 kg; source European Aluminium Association 2008; CPC 39310: Slag, dross, scalings and other waste from the manufacture of iron or steel; By-product classification Recyclable; pedigree (1,1,1,1,1)
  production volume 2.78852e-8 kg
  property price 0.149 EUR2005; name ironScrapAmount_price_EUR2005
    Temporary price data. Calculated as 90% of purchasers price based on: estimated at 85% of sorted scrap
  property carbon content 0
    carbon content on a dry matter basis (reserved; not for manual entry)
  property true value 9.58189e-16
    allocation property applied in "true value" allocation // value calculated from revenue
  properties: water in wet mass 0 kg, water content 0, carbon content, fossil 0, carbon content, non-fossil 0, dry mass 1 kg, wet mass 1 kg, carbon allocation 0 kg
- aluminium oxide, non-metallurgical: 0 kg; source European Aluminium Association 2008; CPC 41432: Alumina (aluminium oxide), except artificial corundum; By-product classification allocatable product; CAS 1344-28-1; pedigree (1,1,1,1,1)
  production volume 1.75471e-6 kg
  property carbon content, non-fossil 0; name C_content_non_fossil
  property price 0.28 EUR2005; name Al2O3Amount_price_EUR2005
    From UN trade database. http://data.un.org/ Import data from the largest economies of the world are used (Brazil, India, USA, China, Japan and EU-27).
  property dry mass 1 kg; name DM
  property water content 0; name water_content
  property wet mass 1 kg; name WM
  property water in wet mass 0 kg; name WWM
  property carbon content, fossil 0; name C_content_fossil
  property carbon content 0
    carbon content on a dry matter basis (reserved; not for manual entry)
  property true value 1.13306e-13
    allocation property applied in "true value" allocation // value calculated from revenue
  properties: carbon allocation 0 kg
- aluminium, cast alloy: 0 kg; source European Aluminium Association 2008; By-product classification allocatable product; CPC 41431: Unwrought aluminium; pedigree (1,1,1,1,1)
  EcoSpold01Location=RER
  production volume 1.64027e-5 kg
  property price 1.3 EUR2005; name castAlloyAmount_price_EUR2005
    Temporary price data. Calculated as 90% of purchasers price based on: Source: London Metal Exchange, Aluminium alloy price for 2005
  property carbon content 0
    carbon content on a dry matter basis (reserved; not for manual entry)
  property true value 4.91755e-12
    allocation property applied in "true value" allocation // value calculated from revenue
  properties: water in wet mass 0 kg, carbon content, non-fossil 0, water content 0, dry mass 1 kg, carbon content, fossil 0, wet mass 1 kg, carbon allocation 0 kg
- aluminium, wrought alloy: 0 kg; source European Aluminium Association 2008; By-product classification allocatable product; CPC 4153: Semi-finished products of aluminium or aluminium alloys; pedigree (1,1,1,1,1)
  production volume 7.18077e-6 kg
  property price 1.44 EUR2005; name secondaryAluminiumOutput_price_EUR2005
    Estimated based on literature values and expert judgement. Aluminium ccast alloys are about 90% of the price of aluminium wrought alloys.
  property carbon content 0
    carbon content on a dry matter basis (reserved; not for manual entry)
  property true value 2.38465e-12
    allocation property applied in "true value" allocation // value calculated from revenue
  properties: wet mass 1 kg, water content 0, carbon content, fossil 0, water in wet mass 0 kg, carbon content, non-fossil 0, dry mass 1 kg, carbon allocation 0 kg

## Inputs from technosphere
- biowaste: -0.00106962 kg; = (m_discarded/tofu)*-1; source Dalgaard, R. 2008; lognormal variance with pedigree 0.002, pedigree (1,1,3,1,1)
  The quantity of discarded (trashed) soybeans related to1 kg of organic soybean. The mathematical relationship is to put the value in regards to a reference flow of 1kg of tofu
  Uncertainty: Calculated variable. Uncertainty will be determined from propagation of uncertainty factors of underlying variables. Uncertainty of actual relation between variables not accounted at this time, although this could be included in a future update
  production volume 48180 kg; = ref_pv * (Ref('742c91d5-a9ef-4292-92ff-4712757f4e72')*-1) / Ref('2c31df9a-be95-4190-ae3f-c0990ae8c6ea')
    Calculated from production volume of reference product using the relative outputs.
  properties: dry mass 0.4 kg, wet mass 1 kg, water content 1.5, carbon content, non-fossil 0.1624
- tap water: 0.407791 kg; name tap_water_input; = (water+ water_coa)/tofu; source Pro Soya 2013; lognormal variance with pedigree 0.002, pedigree (1,1,3,1,1)
  The quantity of water related to1 kg of organic soybean. The mathematical relationship is to put the value in regards to a reference flow of 1kg of tofu.
  Uncertainty: Calculated variable. Uncertainty will be determined from propagation of uncertainty factors of underlying variables. Uncertainty of actual relation between variables not accounted at this time, although this could be included in a future update
  properties: dry mass 0.000337476 kg, wet mass 1 kg
- heat, from steam, in chemical industry: 0.435387 MJ; = heat/tofu; source Plate, T.,  2013; lognormal variance with pedigree 0.002, pedigree (1,1,3,1,1)
  The quantity of heat related to1 kg of organic soybean. The mathematical relationship is to put the value in regards to a reference flow of 1kg of tofu.
  Uncertainty: Calculated variable. Uncertainty will be determined from propagation of uncertainty factors of underlying variables. Uncertainty of actual relation between variables not accounted at this time, although this could be included in a future update
- wastewater, average: -0.000159373 m3; = ((wastewater/tofu)/1000)*-1; source Pro Soya 2013; lognormal variance with pedigree 0.002, pedigree (1,1,3,1,1)
  The quantity of wastewater related to1 kg of organic soybean. The mathematical relationship is to put the value in regards to a reference flow of 1kg of tofu
  Uncertainty: Calculated variable. Uncertainty will be determined from propagation of uncertainty factors of underlying variables. Uncertainty of actual relation between variables not accounted at this time, although this could be included in a future update
  production volume 7178.82 m3; = Ref('2c31df9a-be95-4190-ae3f-c0990ae8c6ea', 'ProductionVolume') * ((Ref('b0164c8c-6c59-4535-9627-04b67fe7d90f')*-1) / Ref('2c31df9a-be95-4190-ae3f-c0990ae8c6ea'))
    Calculated from production volume of reference product using the relative outputs.
  properties: carbon content, non-fossil 0.000194039, dry mass 0.000346837 kg, wet mass 1 kg
  note on carbon content, non-fossil: 0.0673 kg TOC/m3 (Tab A.17, ecoinvent v2.2 report 13_I). TOC was considered as Total Carbon.
- steam, in chemical industry: 0.066851 kg; = steam/tofu; source Pro Soya 2013; lognormal variance with pedigree 0.002, pedigree (1,1,3,1,1)
  The quantity of steam related to1 kg of organic soybean. The mathematical relationship is to put the value in regards to a reference flow of 1kg of tofu.
  Uncertainty: Calculated variable. Uncertainty will be determined from propagation of uncertainty factors of underlying variables. Uncertainty of actual relation between variables not accounted at this time, although this could be included in a future update
  properties: wet mass 1 kg
- anhydrite rock: 1.33702e-7 kg; = coagulant/tofu; source Moizudding, S.,  1999; lognormal variance with pedigree 0.122, pedigree (1,1,3,1,5)
  the quantity of calcium sulfate related to1 kg of organic soybean. The mathematical relationship is to put the value in regards to a reference flow of 1kg of tofu. Anhydrite rock used as a proxy for calcium sulphate
  Uncertainty: Calculated variable. Uncertainty will be determined from propagation of uncertainty factors of underlying variables. Uncertainty of actual relation between variables not accounted at this time, although this could be included in a future update
  properties: wet mass 1 kg, dry mass 1 kg
- soybean, organic: 0.0534808 kg; = soybean/tofu; source Plate, T.,  2013; lognormal variance with pedigree 0.002, pedigree (1,1,3,1,1)
  The mathematical relationship is to put the value in regards to a reference flow of 1kg of tofu.
  Uncertainty: Calculated variable. Uncertainty will be determined from propagation of uncertainty factors of underlying variables. Uncertainty of actual relation between variables not accounted at this time, although this could be included in a future update
  properties: oil/fat content 0.215, wet mass 1 kg, dry mass 0.86 kg, protein content 0.4, carbon content, non-fossil 0.52451
- electricity, medium voltage: 0.025136 kWh; = electricity/tofu; source Pro Soya 2013; lognormal variance with pedigree 0.002, pedigree (1,1,3,1,1)
  The quantity of electricity related to1 kg of organic soybean. The mathematical relationship is to put the value in regards to a reference flow of 1kg of tofu.
  Uncertainty: Calculated variable. Uncertainty will be determined from propagation of uncertainty factors of underlying variables. Uncertainty of actual relation between variables not accounted at this time, although this could be included in a future update

## Emissions to nature
- Water [air, unspecified]: 7.34024e-5 m3; name water_to_air_unspecified; = (tap_water_input/1000)* fraction_TW_to_air
  Calculated value based on literature values and expert opinion. See comments in the parametres' comment field.
- Heat, waste [air, unspecified]: 0.178855 MJ; = steam*enthalpy/tofu/1000; lognormal variance with pedigree 0.002, pedigree (1,1,3,1,1)
  the heat loss from the steam application; the heat loss is evaluated as the specific enthalpie of steam at 1 bar(http://www.engineeringtoolbox.com/saturated-steam-properties-d_457.html)

## Sampling procedure
Collected data for Quebec industries for soybean

## Extrapolations
soybase data are from Quebec technologies, tofu production data came from US data; uncertainty has been adjusted accordingly

## Review by Guillaume Bourgault 2015-07-03
This revision aimed at correcting a unit conversion mistake in the wastewater, average byproduct.

## Review by Christian Bauer 2013-11-01
passed
