# composting facility construction, open

Dataset: EcoSpold 2, unit process
Geography: RoW
Time period: 1999-01-01 to 2019-12-31
Technology level: current
Classification: ISIC rev.4 ecoinvent: 4290:Construction of other civil engineering projects
Classification: EcoSpold01Categories: agricultural means of production/buildings
Tags: ConvertedDataset
Scenario: Business-as-Usual
System model: Allocation at the point of substitution
Generated by: Angelika Heil
Published in: Nemecek, T. 2007
Database: ecoinvent
isCopyrightProtected: true
accessRestrictedTo: 1

## General comment
The inventory refers to a compost plant over the lifetime of 25 years. The compost plant is constructed for a treating capactiy of 10‘000 tons biogenic waste per year. The total turnover of the plant over the entire lifetime of 25 years amounts thus 250‘000 tons biogenic waste.
[This dataset was already contained in the ecoinvent database version 2. It was not individually updated during the transfer to ecoinvent version 3. Life Cycle Impact Assessment results may still have changed, as they are affected by changes in the supply chain, i.e. in other datasets. This dataset was generated following the ecoinvent quality guidelines for version 2. It may have been subject to central changes described in the ecoinvent version 3 change report (http://www.ecoinvent.org/database/ecoinvent-version-3/reports-of-changes/), and the results of the central updates were reviewed extensively. The changes added e.g. consistent water flows and other information throughout the database. The documentation of this dataset can be found in the ecoinvent reports of version 2, which are still available via the ecoinvent website. The change report linked above covers all central changes that were made during the conversion process.]

## Included activities end
Building materials required for a compost plant and its construction as well as the disposal of these materials were included. Land use during construction and use is considered. The lifetime of the plant was assumed as 25 years. Transport of the building materials to the construction site were included.

## Geography
Values refer to the situtation in Switzerland.

## Technology
Refer to open plant composting.

## Time period
Year when reference used for this inventory was published.

## Reference product
- composting facility, open: 1 unit; By-product classification allocatable product; CPC 53290: Other civil engineering works
  production volume 3.96633 unit
    This is a placeholder value that does not reflect real-world production volumes. This dataset does not currently require a real-world production volume to work in the database framework, and no actual data were collected yet. This has no negative effect on the results of the ecoinvent database.
  property price 4.33458e6 EUR2005
    Convert from EU 27 price to the world by currency exchange rate.
  property true value 4.33458e6
    allocation property applied in "true value" allocation // value calculated from revenue

## By-products
- electricity, for reuse in municipal waste incineration only: 0 kWh; CPC 17100: Electrical energy; By-product classification allocatable product; pedigree (1,1,1,1,1)
  Net electricity generated from this waste and used in internal MSWI plant energy redistribution.
  Uncertainty: uncertainty is calculated from uncertainties in waste composition and uncertainties in energy efficiency and the uncertainty in internal energy demand
  production volume 180998 kWh
  property exergy 3.6 MJ; name E_el_prod_MSWI_exergy
    This exergy property is based on the exergy content of the product.
  property true value relation 3.6; name E_el_prod_MSWI_true_value_relation
    property to calculate "true value" from
  property price 0.1 EUR2005; name E_el_prod_MSWI_price_EUR2005
    Estimated to be the same price as in case of electricity, medium voltage.
  property true value 7780.09
    allocation property applied in "true value" allocation // value calculated from true value relation
- heat, for reuse in municipal waste incineration only: 0 MJ; CPC 17300: Steam and hot water; By-product classification allocatable product; pedigree (1,1,1,1,1)
  (same comment as for electricity, for reuse in municipal waste incineration only)
  production volume 1.3095e6 MJ
  property price 0.0106 EUR2005; name E_th_prod_MSWI_price_EUR2005
    Average European district heat price from Ecoheatcool and Euroheat 2005-2006, Ecoheat Work package 1: The European heat market. Final report. 10.6 EUR/GJ i s the price of district heat. http://www.solarthermalworld.org/files/Ecoheatcool%20WP1%20Web.pdf?download
  property true value relation 0.1842; name E_th_prod_MSWI_true_value_relation
    property to calculate "true value" from
  property exergy 0.1842 MJ; name E_th_prod_MSWI_exergy
    This exergy property is based on the exergy content of the product.
  property true value 2880.08
    (same comment as for electricity, for reuse in municipal waste incineration only)
- iron scrap, sorted, pressed: 0 kg; By-product classification Recyclable; CPC 39310: Slag, dross, scalings and other waste from the manufacture of iron or steel; pedigree (1,1,1,1,1)
  Iron scrap recovered from this waste.
  production volume 18.6727 kg
  property price 0.175 EUR2005
    Temporary price data. Calculated as 90% of purchasers price based on: 2005 import and export prices (total trades (USD) divided by total weight (kg) in biggest economies of the world: EU27, USA, Brasil, China, India, Japan and Russia) from UN Commodity Trade Statistics Database (http://data.un.org/Explorer.aspxDatabase [Accessed 2011.06.20]). Commodity: Waste or scrap, of cast iron
  property carbon content 0
    carbon content on a dry matter basis (reserved; not for manual entry)
  property true value 1.08924
    allocation property applied in "true value" allocation // value calculated from revenue
  properties: water content 0, water in wet mass 0 kg, carbon content, fossil 0, dry mass 1 kg, carbon content, non-fossil 0, wet mass 1 kg, carbon allocation 0 kg

## Inputs from technosphere
- copper: 374.08 kg; lognormal variance with pedigree 0.0532, pedigree (2,3,5,5,1)
  properties: wet mass 1 kg, dry mass 1 kg
- glued laminated timber, for outdoor use: 277.318 m3; lognormal variance with pedigree 0.0532, pedigree (2,3,5,5,1)
  properties: carbon content, non-fossil 0.478422, carbon content, fossil 0.00982967, dry mass 380.531 kg, wet mass 430 kg, water content 0.13
  note on carbon content, non-fossil: The laminated timber is composed of wood and glue. The weight of the wood is assumed to be the DM minus 12 kg glue. C content of wood is 0.494 kgC/kg dry wood (ecoinvent v2.2 report 9)
  note on carbon content, fossil: C content of 12 kg Melamine formaldehyde resin (C4H6N6O) used for glueing
- pitch: 0 kg; pedigree (1,1,1,1,1)
  properties: wet mass 1 kg, dry mass 1 kg, carbon content, fossil 0.83
- reinforcing steel: 21148 kg; lognormal variance with pedigree 0.0532, pedigree (2,3,5,5,1)
  properties: wet mass 1 kg, carbon content, fossil 0.004, dry mass 1 kg
- waste concrete, not reinforced: 0 kg; pedigree (1,1,1,1,1)
  production volume 0 kg
    Calculated from the production volume of composting facility, open in proportion to the respective output amounts.
  properties: wet mass 1 kg, dry mass 1 kg
- steel, low-alloyed, hot rolled: 37408 kg; lognormal variance with pedigree 0.0532, pedigree (2,3,5,5,1)
  properties: dry mass 1 kg, wet mass 1 kg, carbon content, fossil 0.005
  note on carbon content, fossil: Low alloyed steel composition given in Tab. 3.2 ecoinvent v2.2 report 10_partII. Steel assumed to have a C content of 0.5%
- waste building wood, chrome preserved: -124693 kg; lognormal variance with pedigree 0.0532, pedigree (2,3,5,5,1)
  production volume 375000 kg
    (same comment as for waste concrete, not reinforced)
  properties: carbon content, non-fossil 0.484262, wet mass 1 kg, dry mass 0.8 kg, water content 0.25
  note on carbon content, non-fossil: C content per kg DM was calculated using information in Tab A.4, ecoinvent v2.2 report 13_I
- concrete, normal: 0 m3; pedigree (1,1,1,1,1)
  properties: dry mass 2190 kg, water content 0.086758, wet mass 2380 kg
- waste reinforcement steel: -21148 kg; lognormal variance with pedigree 0.0532, pedigree (2,3,5,5,1)
  production volume 63600 kg
    (same comment as for waste concrete, not reinforced)
  properties: wet mass 1 kg, dry mass 1 kg
- cast iron: 49877.3 kg; lognormal variance with pedigree 0.0532, pedigree (2,3,5,5,1)
  properties: wet mass 1 kg, carbon content, fossil 0.04, dry mass 1 kg
  note on carbon content, fossil: Cast iron is made by remelting pig iron in small furnaces (e.g. cupola furnaces or electric arc furnaces) and poured into moulds to make castings. It usually contains 2% to 6% carbon (ecoinvent v2.2 report 10_partII). An average content of 4% was considered
- gravel, crushed: 0 kg; pedigree (1,1,1,1,1)
  properties: dry mass 1 kg, wet mass 1 kg
- inert waste, for final disposal: -2.1547e7 kg; lognormal variance with pedigree 0.0532, pedigree (2,3,5,5,1)
  production volume 6.48e7 kg
    (same comment as for waste concrete, not reinforced)
  properties: water content 0.00502513, dry mass 0.995 kg, wet mass 1 kg
- sand: 0 kg; pedigree (1,1,1,1,1)
  properties: wet mass 1 kg, dry mass 1 kg
- pitch: 5579.35, 317.977, 18488.7, 14391.6, 645.09, 920.927, 81357.1 kg (7 entries); lognormal variance with pedigree 0.0532, pedigree (2,3,5,5,1)
- waste concrete, not reinforced: -52713, -752307 kg (2 entries); lognormal variance with pedigree 0.0532, pedigree (2,3,5,5,1)
  production volume 2.421e6 kg
- concrete, normal: 8.40565, 0.875858, 7.09068, 3.98851, 16.8902, 0.569697, 328.279 m3 (7 entries); lognormal variance with pedigree 0.0532, pedigree (2,3,5,5,1)
- gravel, crushed: 4.24421e6, 927094, 84875.3, 1.62908e7 kg (4 entries); lognormal variance with pedigree 0.0532, pedigree (2,3,5,5,1)
- sand: 91.6934, 17662.1, 1.14938e6 kg (3 entries); lognormal variance with pedigree 0.0532, pedigree (2,3,5,5,1)

## Inputs from nature
- Transformation, to industrial area [natural resource, land]: 748.16 m2; lognormal variance with pedigree 0.1732, pedigree (2,3,5,5,1)
- Transformation, from unspecified [natural resource, land]: 748.16 m2; lognormal variance with pedigree 0.1732, pedigree (2,3,5,5,1)
- Occupation, industrial area [natural resource, land]: 18753.9 m2*year; lognormal variance with pedigree 0.0932, pedigree (2,3,5,5,1)
- Occupation, construction site [natural resource, land]: 748.16 m2*year; lognormal variance with pedigree 0.0932, pedigree (2,3,5,5,1)

## Sampling procedure
Data come from one compost plant in Switzerland.

## Extrapolations
none This dataset has been copied from an original dataset covering the geography CH. The uncertainty has been adjusted accordingly.

## Review by Maggie Osses 2003-09-12
Passed.
