# ascorbic acid production

Dataset: EcoSpold 2, unit process
Geography: RER
Time period: 2015-01-01 to 2020-12-31
Technology level: current
Classification: ISIC rev.4 ecoinvent: 2100:Manufacture of pharmaceuticals, medicinal chemical and botanical products
Synonyms: L(+)-Ascorbic acid; Ascorbic acid; L-ascorbic acid; 50-81-7; Vitamin C; Ascorbate
Scenario: Business-as-Usual
System model: Allocation at the point of substitution
Generated by: Lucia Valsasina
Database: ecoinvent
isCopyrightProtected: true
accessRestrictedTo: 1

## General comment
This activity produces 1 kg of ascorbic acid, vitamin C. This product is mainly used in the production of aliments. In this industry it can be used to improve the nutritional value, as an antioxidant and as a preservative. The second most common use of vitamin C, approximately 30%, is in the pharmaceutical industry. The global demand of vitamin C in the year 1995 was of 60 thousand tonnes sold at a price of 10 euros per kg (Oster and Fechtel 2011). The global consumption of ascorbic acid in the year 2015 was estimated to be 150.2 thousand tonnes (Zion Research 2016).
Reference(s):
Gendorf (2016) Umwelterklärung 2015, Werk Gendorf Industriepark, www.gendorf.de
Oster, B. and Fechtel, U. 2011. Vitamins, 7. Vitamin C (L-Ascorbic Acid). In Ullmann's Encyclopedia of Industrial Chemistry, Electronic Release, Vol.38, pp.283-298. Wiley-VCH, Weinheim.
Zion Research, 2016. Ascorbic Acid Market for Pharmaceutical, Food & Beverages, Personal Care and Other End-user Industries: global Industry Perspective, Comprehensive Analysis, Size, Share, Growth, Segment, Trends and Forecast, 2015 – 2021. Market Research Store. Retrieved from: http://www.marketresearchstore.com/news/global-ascorbic-acid-market-264, accessed 2 March 2017
For more information on the model please refer to the dedicate ecoinvent report, access it in the Report section of ecoQuery (http://www.ecoinvent.org/login-databases.html)

## Included activities start
The activity starts when the raw materials enter the process.

## Included activities end
Materials entering the process are included as well as energy uses, infrastructure and emissions.

## Geography
The inputs to the process are calculated based on stoichiometry and literature data, they are therefore considered to be valid for the chosen geography. The inputs of heat, electricity, water, factory and nitrogen are mostly taken as average of industry data. Industry data values are a 5-year average of data (2011 - 2015) published by the Gendorf factory (Gendorf, 2016, Umwelterklärung, www.gendorf.de), (Gendorf, 2015, Umwelterklärung, www.gendorf.de), (Gendorf, 2014, Umwelterklärung, www.gendorf.de). The Gendorf factory is based in Germany, it produces a wide range of chemical substances. The factory produced 1657400 tonnes of chemical substances in the year 2015 (Gendorf, 2016, Umwelterklärung, www.gendorf.de) and 740000 tonnes of intermediate products. As, according to Cefic Report of the chemical industry (Cefic 2016. Facts and figures 2016 of the European chemical industry. Accessible at: http://www.cefic.org/Facts-and-Figures/Chemicals-Industry-Profile/, accessed 30/06/2017), Germany covers 28.5% of EU chemical generated sales in 2015, we assumed these values to be representative of the RER geography.

## Technology
Ascorbic acid is produced through the Reichstein synthesis, starting from the hydrogenation of glucose over a nickel catalyst. Bacteria are then added followed by oxygenation over a platinum catalyst. According to Oster and Fechtel (2011) the economics of the production of vitamin C is linked to the environmental costs. The following considerations are made by Oster and Fechtel (2011):
- COD emissions are approximately equal to the amount of reference product
- Being a derivate of sugars, the losses of these products are not problematic as easily biodegradable. The ketalized sugars on the other hand require hydrolyzation.
- The loss of the catalyst is negligible. The losses are recovered by resins. For this reason, in this dataset no losses for catalysts are taken into account as they are considered to be 100% recovered.
- Water scrubbers and activated carbon take care of exhaust gases.
- The remaining solids are incinerated.
This inventory representing production of a particular chemical compound is at least partially based on a generic model on the production of chemicals. The data generated by this model have been improved by compound-specific data when available.
The model on production of chemicals is using specific industry or literature data wherever possible and more generic data on chemical production processes to fill compound-specific data gaps when necessary. The basic principles of the model have been published in literature (Hischier 2005, Establishing Life Cycle Inventories of Chemicals Based on Differing Data Availability). The model has been updated and extended with newly available data from the chemical industry.
In the model, unreacted fractions are treated in a waste treatment process, and emissions reported are after a waste treatment process that is included in the scope of this dataset. For volatile reactants, a small level of evaporation is assumed. Solvents and catalysts are mostly recycled in closed-loop systems within the scope of the dataset and reported flows are for losses from this system.
The main source of information for the values for heat, electricity, water (process and cooling), nitrogen, chemical factory is industry data from Gendorf. The values are a 5-year average of data (2011 - 2015) published by the Gendorf factory (Gendorf, 2016, Umwelterklärung, www.gendorf.de), (Gendorf, 2015, Umwelterklärung, www.gendorf.de), (Gendorf, 2014, Umwelterklärung, www.gendorf.de). The Gendorf factory is based in Germany, it produces a wide range of chemical substances. The factory produced 1657400 tonnes of chemical substances in the year 2015 (Gendorf, 2016, Umwelterklärung, www.gendorf.de) and 740000 tonnes of intermediate products.
Reference(s):
Hischier, R. (2005) Establishing Life Cycle Inventories of Chemicals Based on Differing Data Availability (9 pp). The International Journal of Life Cycle Assessment, Volume 10, Issue 1, pp 59–67. 10.1065/lca2004.10.181.7
Gendorf (2016) Umwelterklärung 2015, Werk Gendorf Industriepark, www.gendorf.de
Oster, B. and Fechtel, U. 2011. Vitamins, 7. Vitamin C (L-Ascorbic Acid). In Ullmann's Encyclopedia of Industrial Chemistry, Electronic Release, Vol.38, pp.283-298. Wiley-VCH, Weinheim.
Zion Research, 2016. Ascorbic Acid Market for Pharmaceutical, Food & Beverages, Personal Care and Other End-user Industries: global Industry Perspective, Comprehensive Analysis, Size, Share, Growth, Segment, Trends and Forecast, 2015 – 2021. Market Research Store. Retrieved from: http://www.marketresearchstore.com/news/global-ascorbic-acid-market-264, accessed 2 March 2017
For more information on the model please refer to the dedicate ecoinvent report, access it in the Report section of ecoQuery (http://www.ecoinvent.org/login-databases.html)

## Time period
The activity is based on stoichiometry and literature data, it is therefore considered not to change significantly over time in terms of inputs. The inputs of heat, electricity, water, factory and nitrogen are mostly taken as average of industry data. Industry data values are a 5-year average of data (2011 - 2015) published by the Gendorf factory (Gendorf, 2016, Umwelterklärung, www.gendorf.de), (Gendorf, 2015, Umwelterklärung, www.gendorf.de), (Gendorf, 2014, Umwelterklärung, www.gendorf.de). The Gendorf factory is based in Germany, it produces a wide range of chemical substances. The factory produced 1657400 tonnes of chemical substances in the year 2015 (Gendorf, 2016, Umwelterklärung, www.gendorf.de) and 740000 tonnes of intermediate products. The time period is therefore set based on the years from Gendorf reference.

## Reference product
- ascorbic acid: 1 kg; name RP; By-product classification allocatable product; CPC 35250: Provitamins, vitamins and hormones; glycosides and vegetable alkaloids and their salts, ethers, esters and oth[…]
  vitamin C. This product is mainly used in the production of aliments. In this industry it can be used to improve the nutritional value, as an antioxidant and as a preservative. The second most common use of vitamin C, approximately 30%, is in the pharmaceutical industry(Oster and Fechtel 2011).
  Reference(s):
  Oster, B. and Fechtel, U. 2011. Vitamins, 7. Vitamin C (L-Ascorbic Acid). In Ullmann's Encyclopedia of Industrial Chemistry, Electronic Release, Vol.38, pp.283-298. Wiley-VCH, Weinheim.
  Zion Research, 2016. Ascorbic Acid Market for Pharmaceutical, Food & Beverages, Personal Care and Other End-user Industries: global Industry Perspective, Comprehensive Analysis, Size, Share, Growth, Segment, Trends and Forecast, 2015 – 2021. Market Research Store. Retrieved from: http://www.marketresearchstore.com/news/global-ascorbic-acid-market-264, accessed 2 March 2017
  production volume 2.61348e7 kg; name RP_PV
    Literature value. The global consumption of ascorbic acid in the year 2015 was estimated to be 150.2 thousand tonnes (Zion Research 2016).
    The EU production volume is estiamated from the global produciton volume
    Zion Research, 2016. Ascorbic Acid Market for Pharmaceutical, Food & Beverages, Personal Care and Other End-user Industries: global Industry Perspective, Comprehensive Analysis, Size, Share, Growth, Segment, Trends and Forecast, 2015 – 2021. Market Research Store. Retrieved from: http://www.marketresearchstore.com/news/global-ascorbic-acid-market-264, accessed 2 March 2017
  property price 1.1475 EUR2005; name RP_price_EUR2005
    Calculated based on inputs: The price of the product has been calculated as a sum of the values of the material and energy inputs for this product. This value is therefore a rough estimation. It may underestimate the real price since there are additional expenses when producing any product. These expences can include for example labour costs, treatment of waste materials and profit for the producer. Please consider carefully whether this level of data quality is acceptable for your application.
  property carbon content 0.409173
    carbon content on a dry matter basis (reserved; not for manual entry)
  property true value 1.1475; name RP_true_value
    allocation property applied in "true value" allocation // value calculated from revenue
  properties: water in wet mass 0 kg, water content 0, carbon content, fossil 0, carbon content, non-fossil 0.409173, dry mass 1 kg, wet mass 1 kg, carbon allocation 0.409173 kg

## By-products
- heat, for reuse in municipal waste incineration only: 0 MJ; CPC 17300: Steam and hot water; By-product classification allocatable product; pedigree (1,1,1,1,1)
  Net electricity generated from this waste and used in internal MSWI plant energy redistribution.
  Uncertainty: uncertainty is calculated from uncertainties in waste composition and uncertainties in energy efficiency and the uncertainty in internal energy demand
  production volume 15.9437 MJ
  property exergy 0.1842 MJ; name E_th_prod_MSWI_exergy
    This exergy property is based on the exergy content of the product.
  property price 0.0106 EUR2005; name E_th_prod_MSWI_price_EUR2005
    Average European district heat price from Ecoheatcool and Euroheat 2005-2006, Ecoheat Work package 1: The European heat market. Final report. 10.6 EUR/GJ i s the price of district heat. http://www.solarthermalworld.org/files/Ecoheatcool%20WP1%20Web.pdf?download
  property true value relation 0.1842; name E_th_prod_MSWI_true_value_relation
    property to calculate "true value" from
  property true value 1.16811e-9
    allocation property applied in "true value" allocation // value calculated from true value relation
- electricity, for reuse in municipal waste incineration only: 0 kWh; CPC 17100: Electrical energy; By-product classification allocatable product; pedigree (1,1,1,1,1)
  (same comment as for heat, for reuse in municipal waste incineration only)
  production volume 2.2418 kWh
  property true value relation 3.6; name E_el_prod_MSWI_true_value_relation
    property to calculate "true value" from
  property price 0.1 EUR2005; name E_el_prod_MSWI_price_EUR2005
    Estimated to be the same price as in case of electricity, medium voltage.
  property exergy 3.6 MJ; name E_el_prod_MSWI_exergy
    This exergy property is based on the exergy content of the product.
  property true value 3.17451e-9
    (same comment as for heat, for reuse in municipal waste incineration only)
- zinc concentrate: 0 kg; CPC 14290: Other non-ferrous metal ores and concentrates (other than uranium or thorium ores and concentrates); By-product classification allocatable product
  Calculated value from the knowledge of the properties of both products.
  production volume 0.000303288 kg
  property price 0.38 EUR2005; name ByP_price_EUR2005
    Temporary price data. Calculated as 90% of purchasers price based on: Zinc content in concentrate 53%. Concentrate price per kg Zn 86.5% of refined Zn price (13.5% treatment charges according to CHR Metals Limited 2005: Dynamic cost curves. http://www.minecost.com/dynamic.pdf). 2004 zinc price from USGS (2007) Mineral commodity summaries 2007. <http://minerals.usgs.gov/minerals/pubs/mcs/2007/mcs2007.pdf> [Accessed 25 May 2010]
  property zinc content 0.53; name zinc_C_zinc_concentrate
    Zinc content on a dry matter basis. Value taken from teh "zinc mine operation" /GLO dataset.
  property dry mass 1 kg; name DM_zinc_concentrate
  property carbon content 0
    carbon content on a dry matter basis (reserved; not for manual entry)
  property true value 4.30488e-13
    allocation property applied in "true value" allocation // value calculated from revenue
  properties: wet mass 1 kg, water content 0, carbon content, non-fossil 0, carbon content, fossil 0, water in wet mass 0 kg, carbon allocation 0 kg

## Inputs from technosphere
- hydrogen, liquid: 0.0120481 kg; lognormal variance with pedigree 0.009825, pedigree (2,3,1,2,3)
  Calculated value based on stoichiometric calculations and literature data.
  2.01588g/mol is the molar mass of hydrogen, liquid (H2).
  176.12592g/mol is the molar mass of ascorbic acid (C6H8O6).
  Ascorbic acid is produced through the Reichstein synthesis, starting from the hydrogenation of glucose over a nickel catalyst. Bacteria are then added followed by oxygenation over a platinum catalyst. According to Oster and Fechtel (2011) the economics of the production of vitamin C is linked to the environmental costs. The following considerations are made by Oster and Fechtel (2011):
  - COD emissions are approximately equal to the amount of reference product
  - Being a derivate of sugars, the losses of these products are not problematic as easily biodegradable. The ketalized sugars on the other hand require hydrolyzation.
  - The loss of the catalyst is negligible. The losses are recovered by resins. For this reason, in this dataset no losses for catalysts are taken into account as they are considered to be 100% recovered.
  - Water scrubbers and activated carbon take care of exhaust gases.
  - The remaining solids are incinerated.
  properties: dry mass 1 kg, wet mass 1 kg
- heat, from steam, in chemical industry: 0.8 MJ; lognormal variance with pedigree 0.009825, pedigree (2,3,1,2,3)
  Estimated value. Expert judgement.
  The expert judgement is made starting from Industry data (see details about Gendorf in the paragraph below) and adjusted based on the modelled activity.
  This value is a 5-year average of data (2011 - 2015) published by the Gendorf factory (Gendorf, 2016, Umwelterklärung, www.gendorf.de), (Gendorf, 2015, Umwelterklärung, www.gendorf.de), (Gendorf, 2014, Umwelterklärung, www.gendorf.de). The amount of water for cooling extracted per kg of chemical substance produced is calculated using literature data published by the Gendorf factory based in Germany, which produces a wide range of chemical substances. The factory produced 1657400 tonnes of chemical substances in the year 2015 (Gendorf, 2016, Umwelterklärung, www.gendorf.de) and 740000 tonnes of intermediate products. The reported amounts of water extracted as groundwater and surface water (river) are assumed to be used entirely for cooling purposes.
- heat, district or industrial, natural gas: 8.6 MJ; lognormal variance with pedigree 0.009825, pedigree (2,3,1,2,3)
  (same comment as for heat, from steam, in chemical industry)
- tap water: 0.104 kg; lognormal variance with pedigree 0.009825, pedigree (2,3,1,2,3)
  Calculated value based on stoichiometric calculations and literature data.
  18.01528g/mol is the molar mass of tap water (H2O).
  176.12592g/mol is the molar mass of ascorbic acid (C6H8O6).
  Ascorbic acid is produced through the Reichstein synthesis, starting from the hydrogenation of glucose over a nickel catalyst. Bacteria are then added followed by oxygenation over a platinum catalyst. According to Oster and Fechtel (2011) the economics of the production of vitamin C is linked to the environmental costs. The following considerations are made by Oster and Fechtel (2011):
  - COD emissions are approximately equal to the amount of reference product
  - Being a derivate of sugars, the losses of these products are not problematic as easily biodegradable. The ketalized sugars on the other hand require hydrolyzation.
  - The loss of the catalyst is negligible. The losses are recovered by resins. For this reason, in this dataset no losses for catalysts are taken into account as they are considered to be 100% recovered.
  - Water scrubbers and activated carbon take care of exhaust gases.
  - The remaining solids are incinerated.
  properties: water content 2962.17, dry mass 0.000337476 kg, carbon content, fossil 0.00178991, wet mass 1 kg
  note on carbon content, fossil: Bicarbonate content is 2.93 mol/m3. CO2 content is 0.1 mol/m3 (ecoinvent v2.2 report 8, Tab 93.1).
- glucose: 1.07673 kg; lognormal variance with pedigree 0.009825, pedigree (2,3,1,2,3)
  Calculated value based on stoichiometric calculations and literature data.
  180.15768g/mol is the molar mass of glucose (C6H12O6).
  176.12592g/mol is the molar mass of ascorbic acid (C6H8O6).
  Ascorbic acid is produced through the Reichstein synthesis, starting from the hydrogenation of glucose over a nickel catalyst. Bacteria are then added followed by oxygenation over a platinum catalyst. According to Oster and Fechtel (2011) the economics of the production of vitamin C is linked to the environmental costs. The following considerations are made by Oster and Fechtel (2011):
  - COD emissions are approximately equal to the amount of reference product
  - Being a derivate of sugars, the losses of these products are not problematic as easily biodegradable. The ketalized sugars on the other hand require hydrolyzation.
  - The loss of the catalyst is negligible. The losses are recovered by resins. For this reason, in this dataset no losses for catalysts are taken into account as they are considered to be 100% recovered.
  - Water scrubbers and activated carbon take care of exhaust gases.
  - The remaining solids are incinerated.
  properties: dry mass 1 kg, wet mass 1 kg, carbon content, non-fossil 0.400016
- platinum: 1.10762e-6 kg; lognormal variance with pedigree 0.009825, pedigree (2,3,1,2,3)
  Estimated value. Expert judgement. Ascorbic acid is produced through the Reichstein synthesis, starting from the hydrogenation of glucose over a nickel catalyst. Bacteria are then added followed by oxygenation over a platinum catalyst.
  properties: dry mass 1 kg, wet mass 1 kg
- electricity, medium voltage: 1.664 kWh; lognormal variance with pedigree 0.009825, pedigree (2,3,1,2,3)
  (same comment as for heat, from steam, in chemical industry)
- oxygen, liquid: 0.0956218 kg; lognormal variance with pedigree 0.009825, pedigree (2,3,1,2,3)
  Calculated value based on stoichiometric calculations and literature data.
  31.9988g/mol is the molar mass of oxygen, liquid (O2).
  176.12592g/mol is the molar mass of ascorbic acid (C6H8O6).
  Ascorbic acid is produced through the Reichstein synthesis, starting from the hydrogenation of glucose over a nickel catalyst. Bacteria are then added followed by oxygenation over a platinum catalyst. According to Oster and Fechtel (2011) the economics of the production of vitamin C is linked to the environmental costs. The following considerations are made by Oster and Fechtel (2011):
  - COD emissions are approximately equal to the amount of reference product
  - Being a derivate of sugars, the losses of these products are not problematic as easily biodegradable. The ketalized sugars on the other hand require hydrolyzation.
  - The loss of the catalyst is negligible. The losses are recovered by resins. For this reason, in this dataset no losses for catalysts are taken into account as they are considered to be 100% recovered.
  - Water scrubbers and activated carbon take care of exhaust gases.
  - The remaining solids are incinerated.
  properties: wet mass 1 kg, dry mass 1 kg
- chemical factory, organics: 4e-10 unit; lognormal variance with pedigree 0.309225, pedigree (2,3,1,2,3)
  Calculated based on literature data published by the industry. For this activity, no information was readily available concerning infrastructure and land-use. Therefore, the infrastructure is estimated based on data from two chemical factories, the BASF site of Ludwigshafen and the chemical factory in Gendorf (which are both located in Germany), which produce a wide range of chemical substances. Based on this data, the following assumptions are made: the built area amounts to about 4.2 ha, the plant has an average output of 50'000 t/a and a lifespan of fifty years. The estimated infrastructure amount is therefore 4.00 E-10 units per kg of produced chemical.
  References:
  Althaus H.-J., Chudacoff M., Hischier R., Jungbluth N., Osses M. and Primas A. (2007) Life Cycle Inventories of Chemicals. ecoinvent report No. 8, v2.0. EMPA Dübendorf, Swiss Centre for Life Cycle Inventories, Dübendorf, CH.
  Gendorf (2000) Umwelterklärung 2000, Werk Gendorf. Werk Gendorf, Burgkirchen.
- nitrogen, liquid: 0.076 kg; lognormal variance with pedigree 0.009825, pedigree (2,3,1,2,3)
  (same comment as for heat, from steam, in chemical industry)
  properties: wet mass 1 kg, dry mass 1 kg
- wastewater, average: 0 m3; name BP_wastewater_average; pedigree (1,1,1,1,1)
  Calculated based on literature data published by the industry. This value is a 5-year average of data (2011 - 2015) published by the Gendorf factory (Gendorf, 2016, Umwelterklärung, www.gendorf.de), (Gendorf, 2015, Umwelterklärung, www.gendorf.de), (Gendorf, 2014, Umwelterklärung, www.gendorf.de). The amount of wastewater (which is later on treated in the municipal WWTP) per kg of chemical substance produced is calculated using literature data published by the Gendorf factory based in Germany, which produces a wide range of chemical substances. The factory produced 1657400 tonnes of chemical substances in the year 2015 (Gendorf, 2016, Umwelterklärung, www.gendorf.de) and 740000 tonnes of intermediate products. The amount of wastewater which is later on treated in the municipal WWTP in the year 2015 was 1200 tonnes (Gendorf, 2016, Umwelterklärung, www.gendorf.de). The resulting amount of wastewater is 2.7E-06 m3/kg of chemical product produced.
  production volume 0 m3
    Calculated from the production volume of the reference product in proportion to the respective output amounts.
  property price 0 EUR2005; name BP_wastewater_average_price_EUR2005
  properties: carbon content, non-fossil 0.194039, water content 2882.2, wet mass 1000 kg, dry mass 0.346837 kg
  note on carbon content, non-fossil: 0.0673 kg TOC/m3 (Tab A.17, ecoinvent v2.2 report 13_I). TOC was considered as Total Carbon.
- nickel, 99.5%: 3.33227e-5 kg; lognormal variance with pedigree 0.009825, pedigree (2,3,1,2,3)
  (same comment as for platinum)
  properties: wet mass 1 kg, dry mass 1 kg
- wastewater, average: -2.43642e-6, -2.63575e-7 m3 (2 entries); lognormal variance with pedigree 0.009825, pedigree (2,3,1,2,3)
  (same comment as for wastewater, average)
  production volume 70.564 m3

## Inputs from nature
- Water, well, in ground [natural resource, in water]: 0.00332 m3; lognormal variance with pedigree 0.009825, pedigree (2,3,1,2,3)
  (same comment as for heat, from steam, in chemical industry)
- Water, river [natural resource, in water]: 0.00344 m3; lognormal variance with pedigree 0.009825, pedigree (2,3,1,2,3)
  (same comment as for heat, from steam, in chemical industry)
- Water, cooling, unspecified natural origin [natural resource, in water]: 0.0656 m3; lognormal variance with pedigree 0.009825, pedigree (2,3,1,2,3)
  (same comment as for heat, from steam, in chemical industry)

## Emissions to nature
- Hydrogen [air, unspecified]: 0.000602404 kg; lognormal variance with pedigree 0.0104, pedigree (2,3,1,4,3)
  Calculated value. The values is based on a generic model. The basic principles of the model have been published in literature (Hischier 2005, Establishing Life Cycle Inventories of Chemicals Based on Differing Data Availability). The model has been updated and extended with newly available data from the chemical industry. Find more information in the dedicated report on the ecoinvent website.
  Reference(s):
  Hischier, R. (2005) Establishing Life Cycle Inventories of Chemicals Based on Differing Data Availability (9 pp). The International Journal of Life Cycle Assessment, Volume 10, Issue 1, pp 59–67. 10.1065/lca2004.10.181.7
- Water [air, unspecified]: 0.0056 m3; lognormal variance with pedigree 0.0104, pedigree (2,3,1,4,3)
  (same comment as for Hydrogen)
- Glucose [water, unspecified]: 0.00269182 kg; lognormal variance with pedigree 0.0104, pedigree (2,3,1,4,3)
  (same comment as for Hydrogen)
- Oxygen [water, unspecified]: 0.000239054 kg; lognormal variance with pedigree 0.0104, pedigree (2,3,1,4,3)
  (same comment as for Hydrogen)
- Carbon dioxide, fossil [air, unspecified]: 0.0749631 kg; lognormal variance with pedigree 0.0104, pedigree (2,3,1,4,3)
  (same comment as for Hydrogen)
- Nitrogen [air, unspecified]: 0.076 kg; lognormal variance with pedigree 0.009825, pedigree (2,3,1,2,3)
  (same comment as for heat, from steam, in chemical industry)
- Water [water, unspecified]: 0.0668 m3; lognormal variance with pedigree 0.0104, pedigree (2,3,1,4,3)
  (same comment as for Hydrogen)

## Sampling procedure
Literature data.

## Review by Emilia Moreno Ruiz 2017-08-10
This dataset was additionally reviewed in a separate review process by Eric Johnson of Atlantic Consulting as well as Emilia Moreno Ruiz and Gregor Wernet of ecoinvent.
