# mounting, through-hole technology, Pb-containing solder

Dataset: EcoSpold 2, unit process
Geography: GLO
Time period: 2005-01-01 to 2019-12-31
Technology level: current
Classification: ISIC rev.4 ecoinvent: 2610:Manufacture of electronic components and boards
Classification: EcoSpold01Categories: electronics/module
Tags: ConvertedDataset
Scenario: Business-as-Usual
System model: Allocation at the point of substitution
Generated by: Roland Hischier
Published in: Hischier R. 2007
Database: ecoinvent
isCopyrightProtected: true
accessRestrictedTo: 1

## General comment
This dataset represents the soldering material input and production efforts for 1 m2 of mounted PWB. It is based on through-hole mounting components on a PWB in average conditions out of five different laboratory scale trials in two European electronic devices producing companies. Main data are taken from literature (report from a European research project in the field of lead-free soldering). Infrastructure and transportation efforts are based on own assumptions.
[This dataset was already contained in the ecoinvent database version 2. It was not individually updated during the transfer to ecoinvent version 3. Life Cycle Impact Assessment results may still have changed, as they are affected by changes in the supply chain, i.e. in other datasets. This dataset was generated following the ecoinvent quality guidelines for version 2. It may have been subject to central changes described in the ecoinvent version 3 change report (http://www.ecoinvent.org/database/ecoinvent-version-3/reports-of-changes/), and the results of the central updates were reviewed extensively. The changes added e.g. consistent water flows and other information throughout the database. The documentation of this dataset can be found in the ecoinvent reports of version 2, which are still available via the ecoinvent website. The change report linked above covers all central changes that were made during the conversion process.]

## Included activities start
From reception of solder bar and unmounted PWB at the factory gate.

## Included activities end
This dataset includes soldering material input, energy consumption and waste, as well as an estimation of emissions to air, the efforts for transportation and of the infrastructure for the mounting process of through-hole components. Input of PWB and components are not included in this dataset.

## Geography
Data from a European study- representing global valuable values for the mounting activities in the electronics industry.

## Technology
Information from two global electronics producing companies in the framework of a European study, using the so-called wave soldering technique.

## Reference product
- mounting, through-hole technology, Pb-containing solder: 1 m2; source Geibig J. R. 2005; CPC 88741: Electronic component and board manufacturing services; By-product classification allocatable product
  The process of solder application differs for paste and bar solders, as paste solder is used for surface mount technology in a so-called reflow process, while bar solder is used in a so-called wave soldering process for through-hole mounting.
  EcoSpold01Location=GLO
  production volume 1 m2
    Dummy value to be replaced by measured, estimated or calculated value
  property price 24.9754 EUR2005
    Calculated based on inputs: The price of the product has been calculated as a sum of the values of the material and energy inputs for this product. This value is therefore a rough estimation. It may underestimate the real price since there are additional expenses when producing any product. These expences can include for example labour costs, treatment of waste materials and profit for the producer. Please consider carefully whether this level of data quality is acceptable for your application.
  property true value 24.9754
    allocation property applied in "true value" allocation // value calculated from revenue

## By-products
- iron scrap, sorted, pressed: 0 kg; By-product classification Recyclable; CPC 39310: Slag, dross, scalings and other waste from the manufacture of iron or steel; pedigree (1,1,1,1,1)
  Iron scrap recovered from this waste.
  Uncertainty: uncertainty calculated from uncertainty in waste composition, uncertainty of share of recyclable metal, uncertainty of transfer coefficient to bottom ash, uncertainty of the efficiency of scrap removal in MSWI plant.
  production volume 0.141374 kg
  property price 0.175 EUR2005
    Temporary price data. Calculated as 90% of purchasers price based on: 2005 import and export prices (total trades (USD) divided by total weight (kg) in biggest economies of the world: EU27, USA, Brasil, China, India, Japan and Russia) from UN Commodity Trade Statistics Database (http://data.un.org/Explorer.aspxDatabase [Accessed 2011.06.20]). Commodity: Waste or scrap, of cast iron
  property carbon content 0
    carbon content on a dry matter basis (reserved; not for manual entry)
  property true value 0.0123703
    allocation property applied in "true value" allocation // value calculated from revenue
  properties: water in wet mass 0 kg, dry mass 1 kg, carbon content, fossil 0, carbon content, non-fossil 0, wet mass 1 kg, water content 0, carbon allocation 0 kg
- zinc concentrate: 0 kg; CPC 14290: Other non-ferrous metal ores and concentrates (other than uranium or thorium ores and concentrates); By-product classification allocatable product
  Calculated value from the knowledge of the properties of both products.
  production volume 6.6668e-8 kg
  property price 0.38 EUR2005; name ByP_price_EUR2005
    Temporary price data. Calculated as 90% of purchasers price based on: Zinc content in concentrate 53%. Concentrate price per kg Zn 86.5% of refined Zn price (13.5% treatment charges according to CHR Metals Limited 2005: Dynamic cost curves. http://www.minecost.com/dynamic.pdf). 2004 zinc price from USGS (2007) Mineral commodity summaries 2007. <http://minerals.usgs.gov/minerals/pubs/mcs/2007/mcs2007.pdf> [Accessed 25 May 2010]
  property zinc content 0.53; name zinc_C_zinc_concentrate
    Zinc content on a dry matter basis. Value taken from teh "zinc mine operation" /GLO dataset.
  property dry mass 1 kg; name DM_zinc_concentrate
  property carbon content 0
    carbon content on a dry matter basis (reserved; not for manual entry)
  property true value 3.77034e-10
    allocation property applied in "true value" allocation // value calculated from revenue
  properties: wet mass 1 kg, water content 0, carbon content, non-fossil 0, carbon content, fossil 0, water in wet mass 0 kg, carbon allocation 0 kg
- electricity, for reuse in municipal waste incineration only: 0 kWh; CPC 17100: Electrical energy; By-product classification allocatable product; pedigree (1,1,1,1,1)
  Net electricity generated from this waste and used in internal MSWI plant energy redistribution.
  Uncertainty: uncertainty is calculated from uncertainties in waste composition and uncertainties in energy efficiency and the uncertainty in internal energy demand
  production volume 9.59996e-12 kWh
  property exergy 3.6 MJ; name E_el_prod_MSWI_exergy
    This exergy property is based on the exergy content of the product.
  property true value relation 3.6; name E_el_prod_MSWI_true_value_relation
    property to calculate "true value" from
  property price 0.1 EUR2005; name E_el_prod_MSWI_price_EUR2005
    Estimated to be the same price as in case of electricity, medium voltage.
  property true value 1.83565e-14
    allocation property applied in "true value" allocation // value calculated from true value relation
- heat, for reuse in municipal waste incineration only: 0 MJ; CPC 17300: Steam and hot water; By-product classification allocatable product; pedigree (1,1,1,1,1)
  Net useful heat generated from this waste and used in internal MSWI plant energy redistribution.
  Uncertainty: uncertainty is calculated from uncertainties in waste composition and uncertainties in energy efficiency and the uncertainty in internal energy demand
  production volume 6.7914e-11 MJ
  property exergy 0.1842 MJ; name E_th_prod_MSWI_exergy
    This exergy property is based on the exergy content of the product.
  property true value relation 0.1842; name E_th_prod_MSWI_true_value_relation
    property to calculate "true value" from
  property price 0.0106 EUR2005; name E_th_prod_MSWI_price_EUR2005
    Average European district heat price from Ecoheatcool and Euroheat 2005-2006, Ecoheat Work package 1: The European heat market. Final report. 10.6 EUR/GJ i s the price of district heat. http://www.solarthermalworld.org/files/Ecoheatcool%20WP1%20Web.pdf?download
  property true value 6.64457e-15
    (same comment as for electricity, for reuse in municipal waste incineration only)

## Inputs from technosphere
- scrap tin sheet: 0 kg; source Alvarado Ascencio C. 2005; pedigree (1,1,1,1,1)
  Estimation, based on literature reporting values from several different PWB mounting trials on laboratory scale.
  EcoSpold01Location=CH
  Uncertainty: data from literature
  production volume 0 kg
    Calculated from the production volume of mounting, through-hole technology, Pb-containing solder in proportion to the respective output amounts.
  properties: dry mass 1 kg, wet mass 1 kg
- electricity, medium voltage: 3.94035 kWh; source Alvarado Ascencio C. 2005; lognormal variance with pedigree 0.0513, pedigree (2,3,5,3,1)
  Literature Value.
  EcoSpold01Location=UCTE
  Uncertainty: data from literature
- nitrogen, liquid: 0 kg; source Theriault M. 2002; pedigree (1,1,1,1,1)
  Literature Value.
  EcoSpold01Location=RER
  Uncertainty: data from literature
  properties: dry mass 1 kg, wet mass 1 kg
- solder, bar, Sn63Pb37, for electronics industry: 0.422331 kg; source Alvarado Ascencio C. 2005; lognormal variance with pedigree 0.0513, pedigree (2,3,5,3,1)
  EcoSpold01Location=GLO
  Estimation, based on literature reporting values from several different PWB mounting trials on laboratory scale.
  Uncertainty: data from literature
  properties: wet mass 1 kg, dry mass 1 kg
- flux, for wave soldering: 0.219791 kg; source Geibig J. R. 2005; lognormal variance with pedigree 0.0513, pedigree (2,3,5,3,1)
  EcoSpold01Location=GLO
  Literature Value.
  Uncertainty: data from literature
  properties: carbon content, fossil 0.606886, dry mass 1 kg, wet mass 1 kg
  note on carbon content, fossil: Calculated after the C content of ingredients (polyols, isopropapnol, and organic chemicals) of the wave soldering flux
- printed wiring board mounting facility: 2.07897e-7 unit; lognormal variance with pedigree 0.5761, pedigree (4,5,5,3,5)
  Estimation, assuming an output of ca. 9’200 m2 or 37’000 kg per year over a time span of 25 years.
  EcoSpold01Location=GLO
  Uncertainty: rough estimation of infrastructure
- scrap tin sheet: -0.00182281, -0.120657 kg (2 entries); source Alvarado Ascencio C. 2005; lognormal variance with pedigree 0.1713, pedigree (2,3,5,3,1)
  (same comment as for scrap tin sheet)
  production volume 0.12254 kg
- nitrogen, liquid: 36.0057, 131.171 kg (2 entries); source Theriault M. 2002; lognormal variance with pedigree 0.0513, pedigree (2,3,5,3,1)
  Literature Value.
  EcoSpold01Location=RER
  Uncertainty: data from literature

## Emissions to nature
- 2-Propanol [air, urban air close to ground]: 0.219791 kg; lognormal variance with pedigree 0.1787, pedigree (4,3,5,3,1)
  Estimation, based on the assumption that 100% of the non-metal parts of the solder paste are emitted during the reflow heating as emissions to air.
  Uncertainty: calculated from input of flux material

## Sampling procedure
own estimation

## Review by Rolf Frischknecht 2007-11-08
passed.
