# heat production, hard coal briquette, stove 5-15kW

Dataset: EcoSpold 2, unit process
Geography: Europe without Switzerland
Time period: 1988-01-01 to 2019-12-31
Technology level: current
Classification: ISIC rev.4 ecoinvent: 3530:Steam and air conditioning supply
Classification: EcoSpold01Categories: hard coal/heating systems
Tags: ConvertedDataset
Scenario: Business-as-Usual
System model: Allocation at the point of substitution
Generated by: Christian Bauer
Published in: Röder, A. 2004
Database: ecoinvent
isCopyrightProtected: true
accessRestrictedTo: 1

## General comment
This dataset represents the production of heat from a 5-15 kW coal stove filled with 1 MJ of hard coal briquettes. The lifetime of the coal stove is 30 years, which corresponds to 1600 fully load hours per year. The heating value is 31.4 MJ/kg and the efficiency factor is 70%.
[This dataset was already contained in the ecoinvent database version 2. It was not individually updated during the transfer to ecoinvent version 3. Life Cycle Impact Assessment results may still have changed, as they are affected by changes in the supply chain, i.e. in other datasets. This dataset was generated following the ecoinvent quality guidelines for version 2. It may have been subject to central changes described in the ecoinvent version 3 change report (http://www.ecoinvent.org/database/ecoinvent-version-3/reports-of-changes/), and the results of the central updates were reviewed extensively. The changes added e.g. consistent water flows and other information throughout the database. The documentation of this dataset can be found in the ecoinvent reports of version 2, which are still available via the ecoinvent website. The change report linked above covers all central changes that were made during the conversion process.]

## Included activities start
From reception of hard coal briquettes.

## Included activities end
This activity ends with produced heat at the coal stove filled with 1 MJ of hard coal briquettes. The dataset includes transport and all emissions to air as well as the ash disposal. The dataset doesn’t include emissions to water as it is assumed that the coal is stored in a covered storage area.

## Technology
Average technology installed in early 1990s. The efficiency factor of a coal stove is between 50% and 70%. Since the coal stove is installed in the room to be heated, losses occur especially through the large amounts of flue gas and through incomplete combustion. An efficiency factor of 70% is assumed. Since neither ventilators nor air supply pumps are required for hot water circulation, no auxiliary energy is needed.
Reference:
Braun H., Angrüner B., Ecker P., Gschaider R., Sorger A., Wurst F., Ellinger R. (1991) Emissionen bei der Verbennung. Wien.
DGMK-Arbeitskreis (1992) Ansatzpunkte und Potentiale zur Minderung des Treibhauseffektes aus Sicht der fossilen Energieträger. Hamburg.
Fritsche U., Rausch L., Simon K.-H. (1989) Umweltwirkungsanalyse von Energiesystemen: Gesamt-Emissions-Modell Integrierter Systeme (GEMIS). Darmstadt/Kassel, Deutschland.
Jensch W. (1988) Vergleich von Energiesystemen unterschiedlicher Zentralisierung. IfE-Schriftenreihe Heft 22, München.
Menke C., Leithner R. (1990) Auswirkung der Energieversorgung auf die Luftqualität in der Region Braunschweig. In: BWK, Band 42, Nr.7/8, s.446-456.

## Parameters
- scaling factor: 1.43 dimensionless; name scaling_factor

## Reference product
- heat, central or small-scale, other than natural gas: 1 MJ; = 0.699300699300699 * scaling_factor; By-product classification allocatable product; CPC 17300: Steam and hot water
  Amount was scaled to 1.
  EcoSpold01Location=RER
  production volume 6.09824e10 MJ; name heat_apv
    Assumption. This production volume does not represent a realistic value, but reflects the share of heat from coal sources on the market for heat, central or small-scale, other than natural gas according to http://www.iea.org/statistics/statisticssearch/report/?country=EU28&product=electricityandheat&year=2012.
    See talk pages for further discussion.
    //Original comment //:
    IEA coal and Peat statistics for 2007 (http://www.iea.org/stats/coaldata.asp?COUNTRY_CODE=23 and =25), residential, commercial and agriculture. All patent fuel in kg converted to MJ heat out by by multiplying with 0.67 (conversion efficiency on a gross heating value basis) and dividing by 0.0323 (kg/MJ gross heating value)
  property price 0.0106 EUR2005
    Average European district heat price from Ecoheatcool and Euroheat 2005-2006, Ecoheat Work package 1: The European heat market. Final report. 10.6 EUR/GJ i s the price of district heat. http://www.solarthermalworld.org/files/Ecoheatcool%20WP1%20Web.pdf?download
  property true value 0.0106
    allocation property applied in "true value" allocation // value calculated from revenue
  properties: Corresponding fuel use 1.43 MJ

## By-products
- heat, for reuse in municipal waste incineration only: 0 MJ; CPC 17300: Steam and hot water; By-product classification allocatable product; pedigree (1,1,1,1,1)
  Net electricity generated from this waste and used in internal MSWI plant energy redistribution.
  Uncertainty: uncertainty is calculated from uncertainties in waste composition and uncertainties in energy efficiency and the uncertainty in internal energy demand
  production volume 74.3744 MJ
  property exergy 0.1842 MJ; name E_th_prod_MSWI_exergy
    This exergy property is based on the exergy content of the product.
  property price 0.0106 EUR2005; name E_th_prod_MSWI_price_EUR2005
    (same comment as for heat, central or small-scale, other than natural gas)
  property true value relation 0.1842; name E_th_prod_MSWI_true_value_relation
    property to calculate "true value" from
  property true value 8.02243e-12
    allocation property applied in "true value" allocation // value calculated from true value relation
- electricity, for reuse in municipal waste incineration only: 0 kWh; CPC 17100: Electrical energy; By-product classification allocatable product; pedigree (1,1,1,1,1)
  (same comment as for heat, for reuse in municipal waste incineration only)
  production volume 10.4747 kWh
  property true value relation 3.6; name E_el_prod_MSWI_true_value_relation
    property to calculate "true value" from
  property price 0.1 EUR2005; name E_el_prod_MSWI_price_EUR2005
    Estimated to be the same price as in case of electricity, medium voltage.
  property exergy 3.6 MJ; name E_el_prod_MSWI_exergy
    This exergy property is based on the exergy content of the product.
  property true value 2.2082e-11
    (same comment as for heat, for reuse in municipal waste incineration only)

## Inputs from technosphere
- hard coal ash: -0.004433 kg; name hard_coal_ash; = (0.0031 * scaling_factor)*-1; source Ruhrkohle 1987; lognormal variance with pedigree 0.1101, pedigree (5,1,5,3,1)
  EcoSpold01Location=PL
  Estimation. It is assumed that 100% of the ash is disposed. The ash content is 18.5%. The density of dry ash is 400 to 650 kg/m3.
  Amount was scaled to the amount of reference product.
  Uncertainty: assumption: no reuse
  production volume 2.70335e8 kg; = heat_apv*hard_coal_ash
    Calculated from the production volume of hard coal briquette, burned in stove 5-15kW in proportion to the respective output amounts.
  property price 0 EUR2005; name hard_coal_ash_price_EUR2005
  properties: wet mass 1 kg, dry mass 1 kg
- hard coal briquettes: 1.43 MJ; = 1 * scaling_factor; source Fritsche U. 1992; lognormal variance with pedigree 0.0582, pedigree (4,2,5,3,1)
  Estimation. From a small selection of analysis an arithmetic value is derived to calculate the composition of hard coal briquettes. The caloric value is 31.4 MJ/kg, the bulk density is 740-820 kg/m3, the water content is 4% and the ash content is 18.5%. Further values are 80% of carbonates, 0.5% of nitrogen, 1% of sulfur, 0.08% of chlorine, 0.005% of flour.
  Further references:
  Ratajczak E.-A. (1987) Emissionsmessungen an kohlegefeuerten Hausbrandfeuerstätten, insbesondere im Hinblick auf gesundheitsgefährdende Abgasbestandteile. Band 1-3. Im Auftrag des UBA Berlin, Essen.
  Ruhrkohlen Handbuch (1987) Verlag Glückauf GmbH, 7. Auflage. Essen.
  Amount was scaled to the amount of reference product.
  EcoSpold01Location=RER
  Uncertainty: fuel input
  properties: dry mass 0.0305732 kg, wet mass 0.0318471 kg, water content 0.0416667, carbon content, fossil 0.833333
  note on carbon content, fossil: 80% C and 4% water in wet mass (ecoinvent v2.1 report 6_VI Table 7.1)
- coal stove, 5-15kW: 8.2797e-7 unit; = 5.79E-07 * scaling_factor; lognormal variance with pedigree 0.3513, pedigree (2,3,5,3,1)
  EcoSpold01Location=RER
  Amount was scaled to the amount of reference product.
  Uncertainty: infrastructure

## Emissions to nature
- Radon-222 [air, urban air close to ground]: 5.72e-6 kBq; = 4E-06 * scaling_factor; lognormal variance with pedigree 0.7261, pedigree (4,5,5,3,1)
  Modeled, based on “heat production, coal, emissions to air” - pdf-document on the dedicated talk page of ecoinvent (www.ecoinvent.org/documentation). From radioactivity of the elements.
  Amount was scaled to the amount of reference product.
  Uncertainty: from radioactivity of the elements; see report for details
- Particulates, > 10 um [air, urban air close to ground]: 0.0002002 kg; = 0.00014 * scaling_factor; lognormal variance with pedigree 0.1161, pedigree (4,5,5,3,1)
  Modeled, based on “heat production, coal, emissions to air” - pdf-document on the dedicated talk page of ecoinvent (www.ecoinvent.org/documentation). Size distribution of particles has been estimated on the basis of recent information from U.S. Environmental Protection Agency (EPA).
  Amount was scaled to the amount of reference product.
  Uncertainty: total PM and profile estimates
- Copper [air, urban air close to ground]: 8.8803e-8 kg; = 6.21E-08 * scaling_factor; lognormal variance with pedigree 0.7261, pedigree (4,5,5,3,1)
  Modeled, based on “heat production, coal, emissions to air” - pdf-document on the dedicated talk page of ecoinvent (www.ecoinvent.org/documentation). Emissions of trace elements were calculated using the ash content in the coal and average transfer coefficients for coal power plants with ash retention of 98 %.
  Amount was scaled to the amount of reference product.
  Uncertainty: from trace element balance; see report for details
- Ethyne [air, urban air close to ground]: 7.15e-6 kg; = 5E-06 * scaling_factor; lognormal variance with pedigree 0.0913, pedigree (2,3,5,3,1)
  Modeled, based on “heat production, coal, emissions to air” - pdf-document on the dedicated talk page of ecoinvent (www.ecoinvent.org/documentation). The emission data are taken from the literature reporting measurements performed at the end of the 1980s in Germany and are based on the composition of the coal.
  Amount was scaled to the amount of reference product.
  Uncertainty: total NMVOC and profile estimate
- Cobalt [air, urban air close to ground]: 2.574e-8 kg; = 1.8E-08 * scaling_factor; lognormal variance with pedigree 0.7261, pedigree (4,5,5,3,1)
  (same comment as for Copper)
- Antimony [air, urban air close to ground]: 1.0296e-8 kg; = 7.2E-09 * scaling_factor; lognormal variance with pedigree 0.7261, pedigree (4,5,5,3,1)
  (same comment as for Copper)
- Dioxins, measured as 2,3,7,8-tetrachlorodibenzo-p-dioxin [air, urban air close to ground]: 2.86e-13 kg; = 2E-13 * scaling_factor; lognormal variance with pedigree 0.3513, pedigree (2,3,5,3,1)
  Modeled, based on “heat production, coal, emissions to air” - pdf-document on the dedicated talk page of ecoinvent (www.ecoinvent.org/documentation). The emission data are taken from the literature reporting measurements performed at the end of the 1980s in Germany and are based on the composition of the coal.
  Amount was scaled to the amount of reference product.
- Thorium-232 [air, urban air close to ground]: 2.002e-5 kBq; = 1.4E-05 * scaling_factor; lognormal variance with pedigree 0.7261, pedigree (4,5,5,3,1)
  (same comment as for Radon-222)
- Potassium [air, urban air close to ground]: 7.2072e-6 kg; = 5.04E-06 * scaling_factor; lognormal variance with pedigree 0.7261, pedigree (4,5,5,3,1)
  (same comment as for Copper)
- Barium [air, urban air close to ground]: 5.148e-7 kg; = 3.6E-07 * scaling_factor; lognormal variance with pedigree 0.7261, pedigree (4,5,5,3,1)
  (same comment as for Copper)
- Xylene [air, urban air close to ground]: 1.43e-6 kg; = 1E-06 * scaling_factor; lognormal variance with pedigree 0.0913, pedigree (2,3,5,3,1)
  (same comment as for Ethyne)
- Carbon monoxide, fossil [air, urban air close to ground]: 0.00715 kg; = 0.005 * scaling_factor; lognormal variance with pedigree 0.6913, pedigree (2,3,5,3,1)
  Modeled, based on “heat production, coal, emissions to air” - pdf-document on the dedicated talk page of ecoinvent (www.ecoinvent.org/documentation). The emission data are taken from the literature reporting measurements performed at the end of the 1980s in Germany and are based on the composition of the coal.
  Amount was scaled to the amount of reference product.
  Uncertainty: typical value
- Sodium [air, urban air close to ground]: 3.6179e-6 kg; = 2.53E-06 * scaling_factor; lognormal variance with pedigree 0.7261, pedigree (4,5,5,3,1)
  (same comment as for Copper)
- Hydrogen sulfide [air, urban air close to ground]: 1.43e-6 kg; = 1E-06 * scaling_factor; lognormal variance with pedigree 0.0913, pedigree (2,3,5,3,1)
  (same comment as for Carbon monoxide, fossil)
- Boron [air, urban air close to ground]: 6.3778e-7 kg; = 4.46E-07 * scaling_factor; lognormal variance with pedigree 0.7261, pedigree (4,5,5,3,1)
  (same comment as for Copper)
- Phosphorus [air, urban air close to ground]: 3.6179e-7 kg; = 2.53E-07 * scaling_factor; lognormal variance with pedigree 0.7261, pedigree (4,5,5,3,1)
  (same comment as for Copper)
- Beryllium [air, urban air close to ground]: 7.2072e-9 kg; = 5.04E-09 * scaling_factor; lognormal variance with pedigree 0.7261, pedigree (4,5,5,3,1)
  (same comment as for Copper)
- Hydrogen chloride [air, urban air close to ground]: 3.4606e-5 kg; = 2.42E-05 * scaling_factor; lognormal variance with pedigree 0.1161, pedigree (4,5,5,3,1)
  (same comment as for Copper)
- Vanadium [air, urban air close to ground]: 2.0592e-7 kg; = 1.44E-07 * scaling_factor; lognormal variance with pedigree 0.7261, pedigree (4,5,5,3,1)
  (same comment as for Copper)
- Titanium [air, urban air close to ground]: 2.1736e-6 kg; = 1.52E-06 * scaling_factor; lognormal variance with pedigree 0.7261, pedigree (4,5,5,3,1)
  (same comment as for Copper)
- Dinitrogen monoxide [air, urban air close to ground]: 2.145e-6 kg; = 1.5E-06 * scaling_factor; lognormal variance with pedigree 0.0913, pedigree (2,3,5,3,1)
  (same comment as for Carbon monoxide, fossil)
- Polonium-210 [air, urban air close to ground]: 0.0004862 kBq; = 0.00034 * scaling_factor; lognormal variance with pedigree 0.7261, pedigree (4,5,5,3,1)
  (same comment as for Radon-222)
- Methane, fossil [air, urban air close to ground]: 0.000429 kg; = 0.0003 * scaling_factor; lognormal variance with pedigree 0.0913, pedigree (2,3,5,3,1)
  (same comment as for Carbon monoxide, fossil)
- Propene [air, urban air close to ground]: 7.15e-6 kg; = 5E-06 * scaling_factor; lognormal variance with pedigree 0.0913, pedigree (2,3,5,3,1)
  (same comment as for Ethyne)
- Scandium [air, urban air close to ground]: 7.2072e-9 kg; = 5.04E-09 * scaling_factor; lognormal variance with pedigree 0.7261, pedigree (4,5,5,3,1)
  (same comment as for Copper)
- Hydrocarbons, aliphatic, alkanes, unspecified [air, urban air close to ground]: 7.15e-6 kg; = 5E-06 * scaling_factor; lognormal variance with pedigree 0.0913, pedigree (2,3,5,3,1)
  (same comment as for Ethyne)
- Radium-228 [air, urban air close to ground]: 0.0003718 kBq; = 0.00026 * scaling_factor; lognormal variance with pedigree 0.7261, pedigree (4,5,5,3,1)
  (same comment as for Radon-222)
- Radium-226 [air, urban air close to ground]: 6.864e-5 kBq; = 4.8E-05 * scaling_factor; lognormal variance with pedigree 0.7261, pedigree (4,5,5,3,1)
  (same comment as for Radon-222)
- Benzo(a)pyrene [air, urban air close to ground]: 5.72e-8 kg; = 4E-08 * scaling_factor; lognormal variance with pedigree 0.0913, pedigree (2,3,5,3,1)
  (same comment as for Ethyne)
- Nitrogen oxides [air, urban air close to ground]: 7.15e-5 kg; = 5E-05 * scaling_factor; lognormal variance with pedigree 0.0913, pedigree (2,3,5,3,1)
  (same comment as for Carbon monoxide, fossil)
- NMVOC, non-methane volatile organic compounds, unspecified origin [air, urban air close to ground]: 2.5454e-5 kg; = 1.78E-05 * scaling_factor; lognormal variance with pedigree 0.0913, pedigree (2,3,5,3,1)
  (same comment as for Ethyne)
- Selenium [air, urban air close to ground]: 2.574e-8 kg; = 1.8E-08 * scaling_factor; lognormal variance with pedigree 0.7261, pedigree (4,5,5,3,1)
  (same comment as for Copper)
- Potassium-40 [air, urban air close to ground]: 7.722e-5 kBq; = 5.4E-05 * scaling_factor; lognormal variance with pedigree 0.7261, pedigree (4,5,5,3,1)
  (same comment as for Radon-222)
- Calcium [air, urban air close to ground]: 7.2072e-6 kg; = 5.04E-06 * scaling_factor; lognormal variance with pedigree 0.7261, pedigree (4,5,5,3,1)
  (same comment as for Copper)
- Nickel [air, urban air close to ground]: 1.7017e-7 kg; = 1.19E-07 * scaling_factor; lognormal variance with pedigree 0.7261, pedigree (4,5,5,3,1)
  (same comment as for Copper)
- Zinc [air, urban air close to ground]: 9.009e-7 kg; = 6.3E-07 * scaling_factor; lognormal variance with pedigree 0.7261, pedigree (4,5,5,3,1)
  (same comment as for Copper)
- Chromium [air, urban air close to ground]: 5.0908e-8 kg; = 3.56E-08 * scaling_factor; lognormal variance with pedigree 0.7261, pedigree (4,5,5,3,1)
  (same comment as for Copper)
- Thorium [air, urban air close to ground]: 8.2368e-9 kg; = 5.76E-09 * scaling_factor; lognormal variance with pedigree 0.7261, pedigree (4,5,5,3,1)
  (same comment as for Copper)
- Toluene [air, urban air close to ground]: 1.43e-6 kg; = 1E-06 * scaling_factor; lognormal variance with pedigree 0.0913, pedigree (2,3,5,3,1)
  (same comment as for Ethyne)
- Silicon [air, urban air close to ground]: 9.0376e-5 kg; = 6.32E-05 * scaling_factor; lognormal variance with pedigree 0.7261, pedigree (4,5,5,3,1)
  (same comment as for Copper)
- Mercury [air, urban air close to ground]: 3.8181e-9 kg; = 2.67E-09 * scaling_factor; lognormal variance with pedigree 0.7261, pedigree (4,5,5,3,1)
  (same comment as for Copper)
- Molybdenum [air, urban air close to ground]: 1.5444e-8 kg; = 1.08E-08 * scaling_factor; lognormal variance with pedigree 0.7261, pedigree (4,5,5,3,1)
  (same comment as for Copper)
- Carbon dioxide, fossil [air, urban air close to ground]: 0.117975 kg; = 0.0825 * scaling_factor; lognormal variance with pedigree 0.0408, pedigree (2,2,5,3,1)
  Modeled, based on “heat production, coal, emissions to air” - pdf-document on the dedicated talk page of ecoinvent (www.ecoinvent.org/documentation). The emission data are taken from the literature reporting measurements performed at the end of the 1980s in Germany and are based on the composition of the coal.
  Amount was scaled to the amount of reference product.
  Uncertainty: from carbon balance
- Cadmium [air, urban air close to ground]: 9.009e-9 kg; = 6.3E-09 * scaling_factor; lognormal variance with pedigree 0.7261, pedigree (4,5,5,3,1)
  (same comment as for Copper)
- Sulfur dioxide [air, urban air close to ground]: 0.0006435 kg; = 0.00045 * scaling_factor; lognormal variance with pedigree 0.0761, pedigree (4,5,5,3,1)
  Modeled, based on “heat production, coal, emissions to air” - pdf-document on the dedicated talk page of ecoinvent (www.ecoinvent.org/documentation). The emission data are taken from the literature reporting measurements performed at the end of the 1980s in Germany and are based on the composition of the coal.
  Amount was scaled to the amount of reference product.
  Uncertainty: from S-balance
- Radon-220 [air, urban air close to ground]: 5.72e-6 kBq; = 4E-06 * scaling_factor; lognormal variance with pedigree 0.7261, pedigree (4,5,5,3,1)
  (same comment as for Radon-222)
- Lead-210 [air, urban air close to ground]: 0.00026598 kBq; = 0.000186 * scaling_factor; lognormal variance with pedigree 0.7261, pedigree (4,5,5,3,1)
  (same comment as for Radon-222)
- Chromium VI [air, urban air close to ground]: 5.148e-10 kg; = 3.6E-10 * scaling_factor; lognormal variance with pedigree 0.52, pedigree (1,1,5,1,1)
  (same comment as for Dioxins, measured as 2,3,7,8-tetrachlorodibenzo-p-dioxin)
- Uranium-238 [air, urban air close to ground]: 5.72e-5 kBq; = 4E-05 * scaling_factor; lognormal variance with pedigree 0.7261, pedigree (4,5,5,3,1)
  (same comment as for Radon-222)
- Iron [air, urban air close to ground]: 2.5311e-5 kg; = 1.77E-05 * scaling_factor; lognormal variance with pedigree 0.7261, pedigree (4,5,5,3,1)
  (same comment as for Copper)
- Aluminium [air, urban air close to ground]: 6.1204e-5 kg; = 4.28E-05 * scaling_factor; lognormal variance with pedigree 0.7261, pedigree (4,5,5,3,1)
  (same comment as for Copper)
- Formaldehyde [air, urban air close to ground]: 1.43e-7 kg; = 1E-07 * scaling_factor; lognormal variance with pedigree 0.0913, pedigree (2,3,5,3,1)
  (same comment as for Ethyne)
- Iodine [air, urban air close to ground]: 6.5065e-8 kg; = 4.55E-08 * scaling_factor; lognormal variance with pedigree 0.7261, pedigree (4,5,5,3,1)
  (same comment as for Copper)
- Benzene [air, urban air close to ground]: 7.15e-6 kg; = 5E-06 * scaling_factor; lognormal variance with pedigree 0.0913, pedigree (2,3,5,3,1)
  (same comment as for Ethyne)
- Manganese [air, urban air close to ground]: 1.8018e-7 kg; = 1.26E-07 * scaling_factor; lognormal variance with pedigree 0.7261, pedigree (4,5,5,3,1)
  (same comment as for Copper)
- Strontium [air, urban air close to ground]: 7.722e-7 kg; = 5.4E-07 * scaling_factor; lognormal variance with pedigree 0.7261, pedigree (4,5,5,3,1)
  (same comment as for Copper)
- Ethene [air, urban air close to ground]: 4.29e-5 kg; = 3E-05 * scaling_factor; lognormal variance with pedigree 0.0913, pedigree (2,3,5,3,1)
  (same comment as for Ethyne)
- Particulates, < 2.5 um [air, urban air close to ground]: 2.86e-5 kg; = 2E-05 * scaling_factor; lognormal variance with pedigree 0.3761, pedigree (4,5,5,3,1)
  (same comment as for Particulates, > 10 um)
- Particulates, > 2.5 um, and < 10um [air, urban air close to ground]: 5.72e-5 kg; = 4E-05 * scaling_factor; lognormal variance with pedigree 0.1961, pedigree (4,5,5,3,1)
  (same comment as for Particulates, > 10 um)
- Tin [air, urban air close to ground]: 3.6179e-9 kg; = 2.53E-09 * scaling_factor; lognormal variance with pedigree 0.7261, pedigree (4,5,5,3,1)
  (same comment as for Copper)
- Hydrocarbons, aliphatic, unsaturated [air, urban air close to ground]: 7.15e-6 kg; = 5E-06 * scaling_factor; lognormal variance with pedigree 0.0913, pedigree (2,3,5,3,1)
  (same comment as for Ethyne)
- Thorium-228 [air, urban air close to ground]: 3.146e-5 kBq; = 2.2E-05 * scaling_factor; lognormal variance with pedigree 0.7261, pedigree (4,5,5,3,1)
  (same comment as for Radon-222)
- Uranium [air, urban air close to ground]: 1.0296e-8 kg; = 7.2E-09 * scaling_factor; lognormal variance with pedigree 0.7261, pedigree (4,5,5,3,1)
  (same comment as for Copper)
- Hydrogen fluoride [air, urban air close to ground]: 2.0306e-6 kg; = 1.42E-06 * scaling_factor; lognormal variance with pedigree 0.1161, pedigree (4,5,5,3,1)
  (same comment as for Copper)
- Bromine [air, urban air close to ground]: 5.4197e-8 kg; = 3.79E-08 * scaling_factor; lognormal variance with pedigree 0.7261, pedigree (4,5,5,3,1)
  (same comment as for Copper)
- Propane [air, urban air close to ground]: 1.43e-5 kg; = 1E-05 * scaling_factor; lognormal variance with pedigree 0.0913, pedigree (2,3,5,3,1)
  (same comment as for Ethyne)
- Phenol [air, urban air close to ground]: 7.15e-8 kg; = 5E-08 * scaling_factor; lognormal variance with pedigree 0.0913, pedigree (2,3,5,3,1)
  (same comment as for Ethyne)
- Lead [air, urban air close to ground]: 6.1776e-7 kg; = 4.32E-07 * scaling_factor; lognormal variance with pedigree 0.7261, pedigree (4,5,5,3,1)
  (same comment as for Copper)
- Arsenic [air, urban air close to ground]: 1.43e-7 kg; = 1E-07 * scaling_factor; lognormal variance with pedigree 0.7261, pedigree (4,5,5,3,1)
  (same comment as for Copper)
- Magnesium [air, urban air close to ground]: 2.1736e-5 kg; = 1.52E-05 * scaling_factor; lognormal variance with pedigree 0.7261, pedigree (4,5,5,3,1)
  (same comment as for Copper)
- Thallium [air, urban air close to ground]: 9.0376e-9 kg; = 6.32E-09 * scaling_factor; lognormal variance with pedigree 0.7261, pedigree (4,5,5,3,1)
  (same comment as for Copper)
- Ethane [air, urban air close to ground]: 2.145e-5 kg; = 1.5E-05 * scaling_factor; lognormal variance with pedigree 0.0913, pedigree (2,3,5,3,1)
  (same comment as for Ethyne)

## Sampling procedure
Based on literature data.

## Review by Hans-Jörg Althaus 2005-07-19
passed

## Review by Roland Hischier 2011-09-23
Tansfer of documentation done.
