# trimesoyl chloride production, for membrane filtration production

Dataset: EcoSpold 2, unit process
Geography: GLO
Time period: 2012-01-01 to 2019-12-31
Technology level: current
Classification: EcoSpold01Categories: chemicals/organics
Classification: ISIC rev.4 ecoinvent: 2011:Manufacture of basic chemicals
Scenario: Business-as-Usual
System model: Allocation at the point of substitution
Generated by: Marylène Dussault
Published in: US patent 3364259 1968
Database: ecoinvent
isCopyrightProtected: true
accessRestrictedTo: 1

## General comment
This dataset represents the production of trimesoyl chloride intended to be used for membrane filtration module production. This is a rough estimate of the production efforts of trimesoyl chloride based on literature (patent). Production of trimesoyl chloride is achieved by catalytic reaction of trimesic acid and thionyl chloride. FeCl3 acts as a catalyst. The reaction is:
C9H6O6 + 3SOCl2 ---(FeCl3) →C9H3Cl3O3+3SO2+3HCl

## Included activities start
With trimesic acid and thionyl chloride.

## Included activities end
With production of trimesoyl chloride production. The dataset includes main raw materials and emissions to air of substance released by reaction. Approximation for processes have been used when substance required was not available. Energy and waste associated with this production is excluded due to lack of data.

## Time period
Arbitrary time period chosen for the proxy.

## Reference product
- trimesoyl chloride: 1 kg; By-product classification allocatable product; CPC 342: Basic inorganic chemicals n.e.c.; CAS 4422-95-1
  production volume 4 kg
    This is a placeholder value that does not reflect real-world production volumes. This dataset does not currenlty require a real-world production volume to work in the database framework and no actual data were collected yet. This has no negative effect on the results of the ecoinvent database.
  property price 990 EUR2005
    Estimated based on purchaser prices available publically. 760 EUR/kg is the purchaser price per 1kg of trimesoyl chloride from company based in India (http://www.ottokemi.com/products-details/4422-95-1iss-98.aspx). 1220 EUR/kg is the purchaser price per 1kg of trimesoyl chloride from company based in Germany (http://www.sigmaaldrich.com/catalog/product/aldrich/147532?lang=de&region=DE).
  property carbon content 0.41
    carbon content on a dry matter basis (reserved; not for manual entry)
  property true value 990
    allocation property applied in "true value" allocation // value calculated from revenue
  properties: carbon content, non-fossil 0, carbon content, fossil 0.41, wet mass 1 kg, dry mass 1 kg, water in wet mass 0 kg, water content 0, carbon allocation 0.41 kg

## By-products
- heat, for reuse in municipal waste incineration only: 0 MJ; CPC 17300: Steam and hot water; By-product classification allocatable product; pedigree (1,1,1,1,1)
  Net electricity generated from this waste and used in internal MSWI plant energy redistribution.
  Uncertainty: uncertainty is calculated from uncertainties in waste composition and uncertainties in energy efficiency and the uncertainty in internal energy demand
  production volume 0.0138099 MJ
  property exergy 0.1842 MJ; name E_th_prod_MSWI_exergy
    This exergy property is based on the exergy content of the product.
  property price 0.0106 EUR2005; name E_th_prod_MSWI_price_EUR2005
    Average European district heat price from Ecoheatcool and Euroheat 2005-2006, Ecoheat Work package 1: The European heat market. Final report. 10.6 EUR/GJ i s the price of district heat. http://www.solarthermalworld.org/files/Ecoheatcool%20WP1%20Web.pdf?download
  property true value relation 0.1842; name E_th_prod_MSWI_true_value_relation
    property to calculate "true value" from
  property true value 4.74923e-6
    allocation property applied in "true value" allocation // value calculated from true value relation
- electricity, for reuse in municipal waste incineration only: 0 kWh; CPC 17100: Electrical energy; By-product classification allocatable product; pedigree (1,1,1,1,1)
  (same comment as for heat, for reuse in municipal waste incineration only)
  production volume 0.00193559 kWh
  property true value relation 3.6; name E_el_prod_MSWI_true_value_relation
    property to calculate "true value" from
  property price 0.1 EUR2005; name E_el_prod_MSWI_price_EUR2005
    Estimated to be the same price as in case of electricity, medium voltage.
  property exergy 3.6 MJ; name E_el_prod_MSWI_exergy
    This exergy property is based on the exergy content of the product.
  property true value 1.28647e-5
    (same comment as for heat, for reuse in municipal waste incineration only)
- zinc concentrate: 0 kg; CPC 14290: Other non-ferrous metal ores and concentrates (other than uranium or thorium ores and concentrates); By-product classification allocatable product
  Calculated value from the knowledge of the properties of both products.
  production volume 2.11411e-7 kg
  property price 0.38 EUR2005; name ByP_price_EUR2005
    Temporary price data. Calculated as 90% of purchasers price based on: Zinc content in concentrate 53%. Concentrate price per kg Zn 86.5% of refined Zn price (13.5% treatment charges according to CHR Metals Limited 2005: Dynamic cost curves. http://www.minecost.com/dynamic.pdf). 2004 zinc price from USGS (2007) Mineral commodity summaries 2007. <http://minerals.usgs.gov/minerals/pubs/mcs/2007/mcs2007.pdf> [Accessed 25 May 2010]
  property zinc content 0.53; name zinc_C_zinc_concentrate
    Zinc content on a dry matter basis. Value taken from teh "zinc mine operation" /GLO dataset.
  property dry mass 1 kg; name DM_zinc_concentrate
  property carbon content 0
    carbon content on a dry matter basis (reserved; not for manual entry)
  property true value 6.78889e-10
    allocation property applied in "true value" allocation // value calculated from revenue
  properties: wet mass 1 kg, water content 0, carbon content, non-fossil 0, carbon content, fossil 0, water in wet mass 0 kg, carbon allocation 0 kg

## Inputs from technosphere
- chemical factory, organics: 4e-10 unit; lognormal variance with pedigree 0.3047, pedigree (2,2,3,5,1)
  Approximated value. Infrastructure of a typical plant.
  Uncertainty: infrastructure of a typical plant
- thionyl chloride: 0 kg; name thionyl; source Scigliano, J. I. 1968; pedigree (1,1,1,1,1)
  Stochiometric value. Represents thionyl chloide regent which is an important substance in the production of trimesoyl chloride. Value based on chemical equation for production of 1 kg of trimesoyl chloride and a 6% mole excess which also serves as a solvent for the reaction (US Patent 3364259). A efficiency of 95% is assumed based on Hischier et al. (2005) estimation for chemical production inventory.
  properties: dry mass 1 kg, wet mass 1 kg
- water, deionised: 0 kg; name WaterChem; source Scigliano, J. I. 1968; pedigree (1,1,1,1,1)
  Calculated value. Based on mass of active FeCl3 in the reaction to produce trimesoyl chloride.
  properties: wet mass 1 kg
- wastewater, average: 0 m3; pedigree (1,1,1,1,1)
  Approximated value. Taken directly from ecoinvent V.3.0 bisphenol A dataset. In original dataset water output is released to the environnement. To estimate the water outputs from trimesoyl chloride production (mainly used for cooling and scrubbers), it is assumed that water use is send to treatment of wasterwater and includes trace of solvent organic substances implicated in the reaction.
  production volume 0 m3
    Calculated from production volume of reference product using the relative outputs.
  properties: wet mass 1000 kg, carbon content, non-fossil 0.194039, water content 2882.2, dry mass 0.346837 kg
  note on carbon content, non-fossil: 0.0673 kg TOC/m3 (Tab A.17, ecoinvent v2.2 report 13_I). TOC was considered as Total Carbon.
- heat, from steam, in chemical industry: 0 MJ; pedigree (1,1,1,1,1)
  Approximated value. Taken directly from ecoinvent V.3.0 bisphenol A dataset to estimate the energy requirement for polysulphone production. This is a typical value for chemical production.
- iron (III) chloride, without water, in 40% solution state: 0.007 kg; name FeCl3; source Scigliano, J. I. 1968; lognormal variance with pedigree 0.0546, pedigree (3,4,5,5,3)
  Stochiometric value. Represents FeCl3 solution that acts as a catalysis in reaction for the production of trimesoyl chloride. Value based on chemical equation for production of 1 kg of trimesoyl chloride (US Patent 3364259). A efficiency of 95% is assumed based on Hischier et al. (2005) estimation for chemical production inventory.
  properties: wet mass 1 kg, dry mass 1 kg
- dichloromethane: 0 kg; pedigree (1,1,1,1,1)
  Calculated value. Value based on reported 3.2/1 weight ratio to amount of HCl after neutralisation of unconverted trimesic acid (Scigliano, 1968) assuming 95% conversion and 0.02% of HCl mass to be emitted to air (Hischier, 2005). This substance is used to dissolved remaining HCl co-product of the reaction.
  Hischier, R., Hellweg, S., Capello, C., Primas, A. 2005. Establishing Life Cycle Inventories of Chemicals Based on Differing Data Availability.The International Journal of Life Cycle Assessment.10 (1), 59-67.
  US patent 3364259, 1968. Preparation of trimesoyl chloride. United states patent office.
  properties: wet mass 1 kg, dry mass 1 kg, carbon content, fossil 0.142857
- electricity, medium voltage: 0.333 kWh; lognormal variance with pedigree 0.2106, pedigree (5,5,5,5,5)
  (same comment as for heat, from steam, in chemical industry)
- benzoic acid: 0 kg; source Scigliano, J. I. 1968; pedigree (1,1,1,1,1)
  Approximated processes. This is used to represent trimesic acid which is an important substance in the production of trimesoyl chloride. Value based on chemical equation for production of 1 kg of trimesoyl chloride (US Patent 3364259). A efficiency of 95% is assumed based on Hischier et al. (2005) estimation for chemical production inventory.
  properties: wet mass 1 kg, carbon content, fossil 0.688459, dry mass 1 kg
- sodium hydroxide, without water, in 50% solution state: 0.0226006 kg; name NaOH; lognormal variance with pedigree 0.0546, pedigree (3,4,5,5,3)
  Calculated value. Represents amount of sodium hydroxide used to neutralisation of unconverted trimesic acid (Scigliano, 1968) assuming 95% conversion (Hischier, 2005).
  Hischier, R., Hellweg, S., Capello, C., Primas, A. 2005. Establishing Life Cycle Inventories of Chemicals Based on Differing Data Availability.The International Journal of Life Cycle Assessment.10 (1), 59-67.
  US patent 3364259, 1968. Preparation of trimesoyl chloride. United states patent office.
  properties: wet mass 1 kg, dry mass 1 kg
- thionyl chloride: 0.5, 1 kg (2 entries); source Scigliano, J. I. 1968; lognormal variance with pedigree 0.0546, pedigree (3,4,5,5,3)
  (same comment as for thionyl chloride)
- water, deionised: 0.0133809, 4.8168e-5, 0.0434387 kg (3 entries); source Scigliano, J. I. 1968; lognormal variance with pedigree 0.002, pedigree (1,1,3,1,1)
  (same comment as for water, deionised)
- wastewater, average: -0.0038423, -0.000415664, -0.00803891 m3 (3 entries); lognormal variance with pedigree 0.218, pedigree (4,5,5,5,5)
  (same comment as for wastewater, average)
  production volume 0.0491875 m3
- heat, from steam, in chemical industry: 0.299772, 1.70023 MJ (2 entries); lognormal variance with pedigree 0.2106, pedigree (5,5,5,5,5)
  (same comment as for heat, from steam, in chemical industry)
- dichloromethane: 0.427145, 0.864914 kg (2 entries); lognormal variance with pedigree 0.0546, pedigree (3,4,5,5,3)
  (same comment as for dichloromethane)
- benzoic acid: 0.14442, 0.68558 kg (2 entries); source Scigliano, J. I. 1968; lognormal variance with pedigree 0.0546, pedigree (3,4,5,5,3)
  (same comment as for benzoic acid)

## Inputs from nature
- Water, cooling, unspecified natural origin [natural resource, in water]: 0.024 m3; name water; lognormal variance with pedigree 0.218, pedigree (4,5,5,5,5)
  Approximated value. Taken directly from ecoinvent V.3.0 bisphenol A dataset to estimate the water requirements for polysulphone production.

## Emissions to nature
- Chlorosulfonic acid [air, unspecified]: 0.03 kg; = thionyl*0.02; source Hischier, R. 2005; lognormal variance with pedigree 0.218, pedigree (4,5,5,5,5)
  Approximated process. Represents air emisions from thionyl chloride regent. Value estimated based on mass input and assumption for chemical production published by Hischier et al. (2005).
- Chloride [water, unspecified]: 0.392583 kg; lognormal variance with pedigree 0.106, pedigree (4,5,5,5,3)
  Calculated value. Represents chloride emissions to water from neutralised chloridric acid. Value was calculated based on chloride input minus estimation of air emissions,
- Sodium, ion [water, unspecified]: 0.0129897 kg; lognormal variance with pedigree 0.106, pedigree (4,5,5,5,3)
  Calculated value. Represents sodium emissions to water from neutralisation of chloridric acid. Value was calculated based on chloride input minus estimation of air emissions,
- Water [air, unspecified]: 0.01176 m3; name vapor; lognormal variance with pedigree 0.218, pedigree (4,5,5,5,5)
  (same comment as for Water, cooling, unspecified natural origin)
- Hydrogen chloride [air, non-urban air or from high stacks]: 0.00824017 kg; lognormal variance with pedigree 0.106, pedigree (4,5,5,5,3)
  Calculated value. Represents chloridric acid emissions to air assuming that 0.2% of HCl generated by the reaction is emitted to air (Hischier et al., 2005). Equation is : C9H6O6 + 3SOCl2 ---(FeCl3) →C9H3Cl3O3+3SO2+3HCl

## Sampling procedure
see technology

## Extrapolations
This dataset is based on reported data from literature (US patent 3364259, 1968) and have been used Bonton. A (2012) publication titled "Comparative life cycle assessment of water treatment plants".
