# heat and power co-generation, wood chips, 2000 kW

Dataset: EcoSpold 2, unit process
Geography: CH
Time period: 2000-01-01 to 2019-12-31
Technology level: current
Classification: ISIC rev.4 ecoinvent: 3530:Steam and air conditioning supply
Classification: EcoSpold01Categories: wood energy/cogeneration
Tags: with true value; wood power
Scenario: Business-as-Usual
System model: Allocation at the point of substitution
Generated by: Christian Bauer
Published in: Bauer, C. 2007
Database: ecoinvent
isCopyrightProtected: true
accessRestrictedTo: 1

## General comment
This dataset represents the production of heat and electricity with wood chips in a co-generation plant with a capacity of 2000 kW (referring to fuel input) in Switzerland. Net capacities (referring to energy output): 1000 kW thermal and 200 kW electric. The technology corresponds to the average installed in 2014 in Switzerland. It is assumed that the plant is operated mainly producing heat, i.e. following the heat demand. Heat is considered as the main product and therefore the reference product, whereas electricity is a by-product. Electricity is produced with an organic rankine cycle (ORC) steam generator. Emission data in this dataset are taken from measurements and literature as well as from communication with experts.

CO2 emissions were calculated out of the carbon content of the wood used as combustible. Carbon emitted in carbon monoxide was subtracted from the result.
Key emissions factors for CO, NOx, CH4, NMVOC and particles were updated according to latest data.

All other emission factors (per MJ fuel input) correspond to the 1000 kW boiler fuelled with wood chips from forest. Other exchanges correspond to the LCI data for the 1400 kW co-generation unit in ecoinvent v2.2.

Wood chips from forest are used as fuel; these are assumed to be stored before combustion for a proper period in a silo in order to achieve an appropriate level of humidity for combustion. No external heat input for drying required.
[This dataset was already contained in the ecoinvent database version 2. It was not individually updated during the transfer to ecoinvent version 3. Life Cycle Impact Assessment results may still have changed, as they are affected by changes in the supply chain, i.e. in other datasets. This dataset was generated following the ecoinvent quality guidelines for version 2. It may have been subject to central changes described in the ecoinvent version 3 change report (http://www.ecoinvent.org/database/ecoinvent-version-3/reports-of-changes/), and the results of the central updates were reviewed extensively. The changes added e.g. consistent water flows and other information throughout the database. The documentation of this dataset can be found in the ecoinvent reports of version 2, which are still available via the ecoinvent website. The change report linked above covers all central changes that were made during the conversion process.]

## Included activities start
From wood chips ready to be burned in cogeneration unit (for heat and power production).

## Included activities end
This activity ends with heat and electricity produced.

This dataset includes the infrastructure, the wood input, the emissions to air and the disposal of the ashes. Also included are substances needed for operation: lubricating oil, organic chemicals, sodium chloride, chlorine and decarbonized water.

## Technology
Electric efficiency: 0.1; Thermal efficiency: 0.50;
Total efficiency: 0.6

## Parameters
- electrical efficiency: 0.1 dimensionless; name efficiency_electrical
  Electric efficiency of the cogeration system, corresponding to annual operation including warm-up and cool-down
- thermal efficiency: 0.5 dimensionless; name efficiency_thermal
  Thermal efficiency of the cogeration system, corresponding to annual operation including warm-up and cool-down

## Reference product
- heat, district or industrial, other than natural gas: 1 MJ; name heat_out; = 1*efficiency_thermal; source Thomas Nussbaumer 2014; CPC 17300: Steam and hot water; By-product classification allocatable product
  Thermal efficiency referring to the LHV of the fuel input
  EcoSpold01Location=CH
  production volume 0 MJ; name apv_heat
    The heat and electricity supply from wooden biomass is supplied to the markets by the activity "heat and power co-generation, wood chips, 6667 kW". This activity is available in case a smaller boiler size is of interest.
  property price 0.0106 EUR2005
    Average European district heat price from Ecoheatcool and Euroheat 2005-2006, Ecoheat Work package 1: The European heat market. Final report. 10.6 EUR/GJ i s the price of district heat. http://www.solarthermalworld.org/files/Ecoheatcool%20WP1%20Web.pdf?download
  property Corresponding fuel use 0.638217 MJ; name fuel_use; = 5.8061E-5*8442/0.768
    Lower heating value of the fuel input related to the heat/electricity output
  property true value relation 0.169678; name heat_true_value_relation
    property to calculate "true value" from
  property exergy 0.169678 MJ; name heat_exergy
    allocation factor for electricity (=1) vs. heat, where heat is calculated as the termodynamic mean temperature Tm = (Tfeed-Treturn)/ln(Tfeed/Treturn), relative to the application temperature (Tu, typically = 293 K), i.e. (Tm-Tu)/Tm
  property true value 0.00367826; name heat_out_true_value
    allocation property applied in "true value" allocation // value calculated from true value relation

## By-products
- electricity, high voltage: 0 kWh; name electricity_out; = 1*efficiency_electrical/3.6; source Thomas Nussbaumer 2014; CPC 17100: Electrical energy; By-product classification allocatable product; pedigree (1,1,1,1,1)
  EcoSpold01Location=CH
  Electricl efficiency referring to the LHV of the fuel input
  production volume 0 kWh; name apv_electricity
    (same comment as for heat, district or industrial, other than natural gas)
  property price 0.0977 EUR2005; name electricity_price_EUR2005
    Temporary price data. Calculated as 90% of purchasers price based on: 94% of the average price (to account for a 6% loss in transformation and transmission) for electricity for industrial consumersin 2005 (excluded taxes). From IEA.
  property exergy 3.6 MJ; name electricity_exergy
    (same comment as for heat, district or industrial, other than natural gas)
  property true value relation 3.6; name electricity_true_value_relation
    property to calculate "true value" from
  property true value 0.00433559; name electricity_out_true_value
    (same comment as for heat, district or industrial, other than natural gas)
- electricity, for reuse in municipal waste incineration only: 0 kWh; CPC 17100: Electrical energy; By-product classification allocatable product; pedigree (1,1,1,1,1)
  Net electricity generated from this waste and used in internal MSWI plant energy redistribution.
  Uncertainty: uncertainty is calculated from uncertainties in waste composition and uncertainties in energy efficiency and the uncertainty in internal energy demand
  property exergy 3.6 MJ; name E_el_prod_MSWI_exergy
    This exergy property is based on the exergy content of the product.
  property true value relation 3.6; name E_el_prod_MSWI_true_value_relation
    property to calculate "true value" from
  property price 0.1 EUR2005; name E_el_prod_MSWI_price_EUR2005
    Estimated to be the same price as in case of electricity, medium voltage.
  property true value 1.99666e-7
    (same comment as for heat, district or industrial, other than natural gas)
- heat, for reuse in municipal waste incineration only: 0 MJ; CPC 17300: Steam and hot water; By-product classification allocatable product; pedigree (1,1,1,1,1)
  Net useful heat generated from this waste and used in internal MSWI plant energy redistribution.
  Uncertainty: uncertainty is calculated from uncertainties in waste composition and uncertainties in energy efficiency and the uncertainty in internal energy demand
  property true value relation 0.1842; name E_th_prod_MSWI_true_value_relation
    property to calculate "true value" from
  property exergy 0.1842 MJ; name E_th_prod_MSWI_exergy
    This exergy property is based on the exergy content of the product.
  property price 0.0106 EUR2005; name E_th_prod_MSWI_price_EUR2005
    (same comment as for heat, district or industrial, other than natural gas)
  property true value 7.51764e-8
    (same comment as for heat, district or industrial, other than natural gas)
- zinc concentrate: 0 kg; CPC 14290: Other non-ferrous metal ores and concentrates (other than uranium or thorium ores and concentrates); By-product classification allocatable product
  Calculated value from the knowledge of the properties of both products.
  property price 0.38 EUR2005; name ByP_price_EUR2005
    Temporary price data. Calculated as 90% of purchasers price based on: Zinc content in concentrate 53%. Concentrate price per kg Zn 86.5% of refined Zn price (13.5% treatment charges according to CHR Metals Limited 2005: Dynamic cost curves. http://www.minecost.com/dynamic.pdf). 2004 zinc price from USGS (2007) Mineral commodity summaries 2007. <http://minerals.usgs.gov/minerals/pubs/mcs/2007/mcs2007.pdf> [Accessed 25 May 2010]
  property zinc content 0.53; name zinc_C_zinc_concentrate
    Zinc content on a dry matter basis. Value taken from teh "zinc mine operation" /GLO dataset.
  property dry mass 1 kg; name DM_zinc_concentrate
  property carbon content 0
    carbon content on a dry matter basis (reserved; not for manual entry)
  property true value 2.95923e-10
    allocation property applied in "true value" allocation // value calculated from revenue
  properties: wet mass 1 kg, water content 0, carbon content, non-fossil 0, carbon content, fossil 0, water in wet mass 0 kg, carbon allocation 0 kg
- iron scrap, sorted, pressed: 0 kg; By-product classification Recyclable; CPC 39310: Slag, dross, scalings and other waste from the manufacture of iron or steel; pedigree (1,1,1,1,1)
  Iron scrap recovered from this waste.
  Uncertainty: uncertainty calculated from uncertainty in waste composition, uncertainty of share of recyclable metal, uncertainty of transfer coefficient to bottom ash, uncertainty of the efficiency of scrap removal in MSWI plant.
  property price 0.175 EUR2005
    Temporary price data. Calculated as 90% of purchasers price based on: 2005 import and export prices (total trades (USD) divided by total weight (kg) in biggest economies of the world: EU27, USA, Brasil, China, India, Japan and Russia) from UN Commodity Trade Statistics Database (http://data.un.org/Explorer.aspxDatabase [Accessed 2011.06.20]). Commodity: Waste or scrap, of cast iron
  property carbon content 0
    carbon content on a dry matter basis (reserved; not for manual entry)
  property true value 5.56894e-9
    allocation property applied in "true value" allocation // value calculated from revenue
  properties: carbon content, fossil 0, dry mass 1 kg, carbon content, non-fossil 0, water in wet mass 0 kg, wet mass 1 kg, water content 0, carbon allocation 0 kg
- iron scrap, unsorted: 0 kg; source European Aluminium Association 2008; CPC 39310: Slag, dross, scalings and other waste from the manufacture of iron or steel; By-product classification Recyclable; pedigree (1,1,1,1,1)
  property price 0.149 EUR2005; name ironScrapAmount_price_EUR2005
    Temporary price data. Calculated as 90% of purchasers price based on: estimated at 85% of sorted scrap
  property carbon content 0
    carbon content on a dry matter basis (reserved; not for manual entry)
  property true value 6.6884e-13
    allocation property applied in "true value" allocation // value calculated from revenue
  properties: water in wet mass 0 kg, water content 0, carbon content, fossil 0, carbon content, non-fossil 0, dry mass 1 kg, wet mass 1 kg, carbon allocation 0 kg
- aluminium oxide, non-metallurgical: 0 kg; source European Aluminium Association 2008; CPC 41432: Alumina (aluminium oxide), except artificial corundum; By-product classification allocatable product; CAS 1344-28-1; pedigree (1,1,1,1,1)
  property carbon content, non-fossil 0; name C_content_non_fossil
  property price 0.28 EUR2005; name Al2O3Amount_price_EUR2005
    From UN trade database. http://data.un.org/ Import data from the largest economies of the world are used (Brazil, India, USA, China, Japan and EU-27).
  property dry mass 1 kg; name DM
  property water content 0; name water_content
  property wet mass 1 kg; name WM
  property water in wet mass 0 kg; name WWM
  property carbon content, fossil 0; name C_content_fossil
  property carbon content 0
    carbon content on a dry matter basis (reserved; not for manual entry)
  property true value 7.90908e-11
    allocation property applied in "true value" allocation // value calculated from revenue
  properties: carbon allocation 0 kg
- aluminium, cast alloy: 0 kg; source European Aluminium Association 2008; By-product classification allocatable product; CPC 41431: Unwrought aluminium; pedigree (1,1,1,1,1)
  EcoSpold01Location=RER
  property price 1.3 EUR2005; name castAlloyAmount_price_EUR2005
    Temporary price data. Calculated as 90% of purchasers price based on: Source: London Metal Exchange, Aluminium alloy price for 2005
  property carbon content 0
    carbon content on a dry matter basis (reserved; not for manual entry)
  property true value 3.43257e-9
    allocation property applied in "true value" allocation // value calculated from revenue
  properties: water in wet mass 0 kg, carbon content, non-fossil 0, water content 0, dry mass 1 kg, carbon content, fossil 0, wet mass 1 kg, carbon allocation 0 kg
- aluminium, wrought alloy: 0 kg; source European Aluminium Association 2008; By-product classification allocatable product; CPC 4153: Semi-finished products of aluminium or aluminium alloys; pedigree (1,1,1,1,1)
  property price 1.44 EUR2005; name secondaryAluminiumOutput_price_EUR2005
    Estimated based on literature values and expert judgement. Aluminium ccast alloys are about 90% of the price of aluminium wrought alloys.
  property carbon content 0
    carbon content on a dry matter basis (reserved; not for manual entry)
  property true value 1.66455e-9
    allocation property applied in "true value" allocation // value calculated from revenue
  properties: wet mass 1 kg, water content 0, carbon content, fossil 0, water in wet mass 0 kg, carbon content, non-fossil 0, dry mass 1 kg, carbon allocation 0 kg
- copper: 0 kg; source Rentz O. 1999; By-product classification allocatable product; CPC 41413: Refined copper and copper alloys, unwrought; master alloys of copper
  Literature value. Copper uses: Before end-use copper is manufactured into semi fabricated products, such as shapes and ingots (known as 'semis'). These manufacturing processes are subdivided into hot working, cold working and, if necessary, process annealing. Few of the semis are ready for use as such. They more typically travel to first-stage manufacturers, who make metal rods, wire, and casting, and then to component manufacturers who produce such things as motors, valves, and insulated cables The components in turn are incorporated by final-stage manufacturers into a variety of finished products - automobiles, commercial buildings, residential housing, and so forth. These uses account for about 79% of the world-wide consumption of copper.
  property price 5.52 EUR2005
    Literature value (http://www.economist.com/news/business/21576714-mining-industry-has-enriched-chile-its-future-precarious-copper-solution). Average price between 20015 and 2013.
  property carbon content 0
    carbon content on a dry matter basis (reserved; not for manual entry)
  property true value 1.6917e-9
    allocation property applied in "true value" allocation // value calculated from revenue
  properties: dry mass 1 kg, water in wet mass 0 kg, wet mass 1 kg, carbon content, non-fossil 0, water content 0, carbon content, fossil 0, carbon allocation 0 kg

## Inputs from technosphere
- furnace, wood chips, with silo, 1000kW: 1.59365e-9 unit; = 1/(4000*2000*20*3.6); lognormal variance with pedigree 0.0547, pedigree (3,2,3,1,2)
  calculated value, assuming 4000h/a operation time, 20a lifetime, 2000kW (fuel input) capacity
- lubricating oil: 3.479e-6 kg; name lubricating_oil; source Bauer, C. 2007; lognormal variance with pedigree 0.0187, pedigree (3,2,4,1,2)
  literature
  properties: carbon content, fossil 0.75, wet mass 1 kg, dry mass 1 kg
  note on carbon content, fossil: Lubricating oil is produced from diesel. C-content/dry mass of fats and oils considered 75%, from: ecoinvent v2.2 report, n 15a, pg 40
- water, decarbonised: 0.000836246 kg; name water_decarbonised; source Bauer, C. 2007; lognormal variance with pedigree 0.0187, pedigree (3,2,4,1,2)
  literature
  properties: wet mass 1 kg
- sodium chloride, powder: 4.35105e-6 kg; source Bauer, C. 2007; lognormal variance with pedigree 0.0187, pedigree (3,2,4,1,2)
  literature
  properties: wet mass 1 kg, dry mass 1 kg
- chemical, organic: 6.09514e-6 kg; source Bauer, C. 2007; lognormal variance with pedigree 0.0187, pedigree (3,2,4,1,2)
  literature
  properties: dry mass 1 kg, wet mass 1 kg, carbon content, fossil 0.628
  note on carbon content, fossil: This dataset is an unweighted average of 20 organic substances (listed in Tab 88.1, ecoinvent v2.2 report 8, part II), being part of the top100 chemicals included in this database. The C-content has also been calculated as an unweighted average of the C content of the substances composing this dataset.
- chlorine, liquid: 3.479e-7 kg; source Bauer, C. 2007; lognormal variance with pedigree 0.0187, pedigree (3,2,4,1,2)
  EcoSpold01Location=RER
  literature
  properties: dry mass 1 kg, wet mass 1 kg
- wood chips, wet, measured as dry mass: 0.0485684 kg; = 1/18.9; lognormal variance with pedigree 0.0227, pedigree (2,2,3,1,1)
  Calculated value.
  LHV of wood chips: 18.9 MJ/kg (dry mass)
  properties: wet mass 2.1 kg, water content 1.1, dry mass 1 kg, carbon content, non-fossil 0.494
- wastewater, average: -8.36246e-7 m3; name sewage; = ((water_decarbonised/1000) )*-1; source Bauer, C. 2007; lognormal variance with pedigree 0.0187, pedigree (3,2,4,1,2)
  literature
  production volume 0 m3; = apv_heat*sewage
    Calculated from the production volume of heat, district or industrial, other than natural gas in proportion to the respective output amounts.
  property price 0 EUR2005; name sewage_price_EUR2005
  properties: carbon content, non-fossil 0.194039, water content 2882.2, wet mass 1000 kg, dry mass 0.346837 kg
  note on carbon content, non-fossil: 0.0673 kg TOC/m3 (Tab A.17, ecoinvent v2.2 report 13_I). TOC was considered as Total Carbon.
- heat and power co-generation unit, organic Rankine cycle, 200kW electrical: 1.59365e-9 unit; = 1/(4000*2000*20*3.6); lognormal variance with pedigree 0.0547, pedigree (3,2,3,1,2)
  (same comment as for furnace, wood chips, with silo, 1000kW)
- waste mineral oil: -3.479e-6 kg; name waste_oil; = ((lubricating_oil) )*-1; source Bauer, C. 2007; lognormal variance with pedigree 0.0187, pedigree (3,2,4,1,2)
  literature
  production volume 0 kg; = apv_heat*waste_oil
    Calculated from production volume of reference product using the relative outputs.
  property price 0 EUR2005; name waste_oil_price_EUR2005
  properties: carbon content, fossil 0.864444, water content 0.111111, wet mass 1 kg, dry mass 0.9 kg
  note on carbon content, fossil: Tab A.6, ecoinvent v2.2 report 13_I. C content has been calculated after data in the tables, and then referred to 1 kg DM
- municipal solid waste: -3.01085e-6 kg; name municipal_waste; source Bauer, C. 2007; lognormal variance with pedigree 0.0187, pedigree (3,2,4,1,2)
  literature
  production volume 0 kg; = apv_heat*municipal_waste
    (same comment as for wastewater, average)
  property price 0 EUR2005; name municipal_waste_price_EUR2005
  properties: carbon content, fossil 0.171549, water content 0.297017, wet mass 1 kg, dry mass 0.771 kg, carbon content, non-fossil 0.261655
  note on carbon content, fossil: MSW composition in tab 4.1, ecoinvent v2.2 report 13_I. C content referred to 1 kg DM
- wood ash mixture, pure: -0.000485592 kg; name wood_ash; source Bauer, C. 2007; lognormal variance with pedigree 0.0187, pedigree (3,2,4,1,2)
  literature
  production volume 0 kg; = apv_heat*wood_ash
    (same comment as for wastewater, average)
  property price 0 EUR2005; name wood_ash_price_EUR2005
  properties: dry mass 1 kg, carbon content, non-fossil 0.012, wet mass 1 kg
- ammonia, liquid: 8.72046e-9 kg; source Bauer, C. 2007; lognormal variance with pedigree 0.0187, pedigree (3,2,4,1,2)
  literature
  EcoSpold01Location=CH
  properties: dry mass 1 kg, wet mass 1 kg

## Emissions to nature
- Hydrocarbons, aliphatic, unsaturated [air, urban air close to ground]: 2.84562e-6 kg; source Bauer, C. 2007; lognormal variance with pedigree 0.0187, pedigree (3,2,4,1,2)
  literature
- Magnesium [air, urban air close to ground]: 3.30459e-7 kg; source Bauer, C. 2007; lognormal variance with pedigree 0.0187, pedigree (3,2,4,1,2)
  literature
- Manganese [air, urban air close to ground]: 1.5605e-7 kg; source Bauer, C. 2007; lognormal variance with pedigree 0.0187, pedigree (3,2,4,1,2)
  literature
- Nickel [air, urban air close to ground]: 5.50766e-9 kg; source Bauer, C. 2007; lognormal variance with pedigree 0.0187, pedigree (3,2,4,1,2)
  literature
- Chromium [air, urban air close to ground]: 3.63505e-9 kg; source Bauer, C. 2007; lognormal variance with pedigree 0.0187, pedigree (3,2,4,1,2)
  literature
- Mercury [air, urban air close to ground]: 2.75383e-10 kg; source Bauer, C. 2007; lognormal variance with pedigree 0.0187, pedigree (3,2,4,1,2)
  literature
- Zinc [air, urban air close to ground]: 2.75383e-7 kg; source Bauer, C. 2007; lognormal variance with pedigree 0.0187, pedigree (3,2,4,1,2)
  literature
- Chlorine [air, urban air close to ground]: 1.6523e-7 kg; source Bauer, C. 2007; lognormal variance with pedigree 0.0187, pedigree (3,2,4,1,2)
  literature
- Toluene [air, urban air close to ground]: 2.75383e-7 kg; source Bauer, C. 2007; lognormal variance with pedigree 0.0187, pedigree (3,2,4,1,2)
  literature
- Nitrogen oxides [air, urban air close to ground]: 0.000137691 kg; source Thomas Nussbaumer 2014; lognormal variance with pedigree 0.0113, pedigree (2,2,3,1,2)
  expert estimation (see source)
- Phenol, pentachloro- [air, urban air close to ground]: 7.43534e-12 kg; source Bauer, C. 2007; lognormal variance with pedigree 0.0187, pedigree (3,2,4,1,2)
  literature
- Cadmium [air, urban air close to ground]: 6.4256e-10 kg; source Bauer, C. 2007; lognormal variance with pedigree 0.0187, pedigree (3,2,4,1,2)
  literature
- Particulates, > 2.5 um, and < 10um [air, urban air close to ground]: 2.29486e-6 kg; source Thomas Nussbaumer 2014; lognormal variance with pedigree 0.0113, pedigree (2,2,3,1,2)
  expert estimation (see source)
- Formaldehyde [air, urban air close to ground]: 1.19333e-7 kg; source Bauer, C. 2007; lognormal variance with pedigree 0.0187, pedigree (3,2,4,1,2)
  literature
- Water [air, urban air close to ground]: 5.33325e-5 m3; lognormal variance with pedigree 0.0352, pedigree (3,3,3,1,2)
  Estimation to ensure a correct water balance; the quantity of this exchange includes also water released during natural drying of the wood fuel prior to combustion.
- Copper [air, urban air close to ground]: 2.01947e-8 kg; source Bauer, C. 2007; lognormal variance with pedigree 0.0187, pedigree (3,2,4,1,2)
  literature
- Dioxins, measured as 2,3,7,8-tetrachlorodibenzo-p-dioxin [air, urban air close to ground]: 2.84562e-14 kg; source Bauer, C. 2007; lognormal variance with pedigree 0.0187, pedigree (3,2,4,1,2)
  literature
- Carbon monoxide, non-fossil [air, urban air close to ground]: 0.000275383 kg; source Thomas Nussbaumer 2014; lognormal variance with pedigree 0.0113, pedigree (2,2,3,1,2)
  expert estimation (see source)
- Lead [air, urban air close to ground]: 2.29486e-8 kg; source Bauer, C. 2007; lognormal variance with pedigree 0.0187, pedigree (3,2,4,1,2)
  literature
- Benzo(a)pyrene [air, urban air close to ground]: 4.58971e-10 kg; source Bauer, C. 2007; lognormal variance with pedigree 0.0187, pedigree (3,2,4,1,2)
  literature
- Benzene, ethyl- [air, urban air close to ground]: 2.75383e-8 kg; source Bauer, C. 2007; lognormal variance with pedigree 0.0187, pedigree (3,2,4,1,2)
  literature
- Acetaldehyde [air, urban air close to ground]: 5.59945e-8 kg; source Bauer, C. 2007; lognormal variance with pedigree 0.0187, pedigree (3,2,4,1,2)
  literature
- Calcium [air, urban air close to ground]: 5.36997e-6 kg; source Bauer, C. 2007; lognormal variance with pedigree 0.0187, pedigree (3,2,4,1,2)
  literature
- Methane, non-fossil [air, urban air close to ground]: 2.75383e-6 kg; source Thomas Nussbaumer 2014; lognormal variance with pedigree 0.0113, pedigree (2,2,3,1,2)
  expert estimation (see source)
- Ammonia [air, urban air close to ground]: 1.59722e-6 kg; source Bauer, C. 2007; lognormal variance with pedigree 0.0187, pedigree (3,2,4,1,2)
  literature
- Sodium [air, urban air close to ground]: 1.19333e-6 kg; source Bauer, C. 2007; lognormal variance with pedigree 0.0187, pedigree (3,2,4,1,2)
  literature
- Phosphorus [air, urban air close to ground]: 2.75383e-7 kg; source Bauer, C. 2007; lognormal variance with pedigree 0.0187, pedigree (3,2,4,1,2)
  literature
- Arsenic [air, urban air close to ground]: 9.17943e-10 kg; source Bauer, C. 2007; lognormal variance with pedigree 0.0187, pedigree (3,2,4,1,2)
  literature
- Benzene, hexachloro- [air, urban air close to ground]: 6.60919e-15 kg; source Bauer, C. 2007; lognormal variance with pedigree 0.0187, pedigree (3,2,4,1,2)
  literature
- m-Xylene [air, urban air close to ground]: 1.10153e-7 kg; source Bauer, C. 2007; lognormal variance with pedigree 0.0187, pedigree (3,2,4,1,2)
  literature
- Fluorine [air, urban air close to ground]: 4.58971e-8 kg; source Bauer, C. 2007; lognormal variance with pedigree 0.0187, pedigree (3,2,4,1,2)
  literature
- Benzene [air, urban air close to ground]: 8.35328e-7 kg; source Bauer, C. 2007; lognormal variance with pedigree 0.0187, pedigree (3,2,4,1,2)
  literature
- Potassium [air, urban air close to ground]: 2.14799e-5 kg; source Bauer, C. 2007; lognormal variance with pedigree 0.0187, pedigree (3,2,4,1,2)
  literature
- NMVOC, non-methane volatile organic compounds, unspecified origin [air, urban air close to ground]: 6.4256e-6 kg; source Thomas Nussbaumer 2014; lognormal variance with pedigree 0.0113, pedigree (2,2,3,1,2)
  expert estimation (see source)
- Particulates, < 2.5 um [air, urban air close to ground]: 4.13074e-5 kg; source Thomas Nussbaumer 2014; lognormal variance with pedigree 0.0113, pedigree (2,2,3,1,2)
  expert estimation (see source)
- Sulfur dioxide [air, urban air close to ground]: 2.29486e-6 kg; source Bauer, C. 2007; lognormal variance with pedigree 0.0187, pedigree (3,2,4,1,2)
  literature
- Dinitrogen monoxide [air, urban air close to ground]: 2.11127e-6 kg; source Bauer, C. 2007; lognormal variance with pedigree 0.0187, pedigree (3,2,4,1,2)
  literature
- Bromine [air, urban air close to ground]: 5.50766e-8 kg; source Bauer, C. 2007; lognormal variance with pedigree 0.0187, pedigree (3,2,4,1,2)
  literature
- Carbon dioxide, non-fossil [air, urban air close to ground]: 0.0881225 kg; source Bauer, C. 2007; lognormal variance with pedigree 0.0187, pedigree (3,2,4,1,2)
  literature
- PAH, polycyclic aromatic hydrocarbons [air, urban air close to ground]: 1.01892e-8 kg; source Bauer, C. 2007; lognormal variance with pedigree 0.0187, pedigree (3,2,4,1,2)
  literature
- Chromium VI [air, urban air close to ground]: 3.67177e-11 kg; source Bauer, C. 2007; lognormal variance with pedigree 0.0187, pedigree (3,2,4,1,2)
  literature
- Hydrocarbons, aliphatic, alkanes, unspecified [air, urban air close to ground]: 8.35328e-7 kg; source Bauer, C. 2007; lognormal variance with pedigree 0.0187, pedigree (3,2,4,1,2)
  literature

## Sampling procedure
literature, expert judgement

## Review by Carl Vadenbo 2015-05-21
The update of the whole electricity sector for the ecoinvent v3.2 database consist of hundreds of datasets. All these datasets have passed through a streamlined review processes where the underlying modelling of production volumes, technology shares and efficiencies was reviewed in detail prior to the datasets being submitted to the database.
