# treatment of lignite ash, opencast refill

Dataset: EcoSpold 2, unit process
Geography: PL
Time period: 1996-01-01 to 2019-12-31
Technology level: current
Classification: EcoSpold01Categories: waste management/others
Classification: ISIC rev.4 ecoinvent: 3822:Treatment and disposal of hazardous waste
Synonyms: ashes form lignite incineration disposed as backfill in opencast lignite mines
Tags: Treatment; ConvertedDataset
Scenario: Business-as-Usual
System model: Allocation at the point of substitution
Generated by: Gabor Doka (obsolete)
Published in: Doka G. 2008
Database: ecoinvent
isCopyrightProtected: true
accessRestrictedTo: 1

## General comment
backfilled waste composition is (in ppm): H2O n.a.; O n.a.; H n.a.; C n.a.; S 35283; N n.a.; P 184.74; B 65.333; Cl 2.4141; Br 9.2851; F 23.213; I 0.92851; Ag n.a.; As 17.496; Ba 657.46; Cd 4.5668; Co 11.512; Cr 147.74; Cu 171.93; Hg 1.0183; Mn 539.44; Mo 36.947; Ni 153.31; Pb 16.371; Sb 4.1131; Se 10.696; Sn 7.428; V 87.75; Zn 132.93; Be 4.6425; Sc 9.2851; Sr 694.57; Ti 464.25; Tl 0.091886; W 4.6425; Si 222840; Fe 32602; Ca 41783; Al 41783; K 3992.6; Mg 9285.1; Na 9285.1;
[This dataset was already contained in the ecoinvent database version 2. It was not individually updated during the transfer to ecoinvent version 3. Life Cycle Impact Assessment results may still have changed, as they are affected by changes in the supply chain, i.e. in other datasets. This dataset was generated following the ecoinvent quality guidelines for version 2. It may have been subject to central changes described in the ecoinvent version 3 change report (http://www.ecoinvent.org/database/ecoinvent-version-3/reports-of-changes/), and the results of the central updates were reviewed extensively. The changes added e.g. consistent water flows and other information throughout the database. The documentation of this dataset can be found in the ecoinvent reports of version 2, which are still available via the ecoinvent website. The change report linked above covers all central changes that were made during the conversion process.]

## Included activities end
This module contains only direct emissions from lignite ash used as backfill in opencast lignite mines: short-term emissions (0-100a) and long-term emissions (>100a) both to ground water. E.g. land-use and energy consumption is *not* included.

## Geography
Ash composition calculated from country-specific coal composition (PL) and technology-specific transfer coefficients in power plant.

## Technology
Lignite ash as backfill in lignite opencast mine (together with tailings)

## Reference product
- lignite ash: -1 kg; By-product classification Waste; CPC 39: Wastes or scraps
  EcoSpold01Location=PL
  production volume 6.05076e8 kg
    Estimated. Electricity and synthetic natural gas production are responsible for more than 90% of lignite use (https://www.lignite.com/about-lignite/lignite-uses/, accessed 20151008) . The production volume is calculated as the sum of lignite ashes resulting from electricity and heat and power co-generation production from lignite, in the respective country.
  property price 0 EUR2005
    Waste products are assigned a price of zero as they are assumed to require further treatment.
  property carbon content 0
    carbon content on a dry matter basis (reserved; not for manual entry)
  properties: wet mass 1 kg, water in wet mass 0 kg, water content 0, dry mass 1 kg, carbon content, fossil 0, carbon content, non-fossil 0, carbon allocation 0 kg

## Emissions to nature
- Cadmium, ion [water, ground-, long-term]: 4.5666e-6 kg; lognormal variance with pedigree 1.41, pedigree (1,1,5,1,1)
  Long-term emission from lignite ash backfill. Uncertainty derived from uncertainty in ash composition and uncertainty in transfer coefficients.
- Strontium [water, ground-]: 1.0533e-6 kg; lognormal variance with pedigree 1.34, pedigree (1,1,5,1,1)
  Short-term emission from lignite ash backfill. Uncertainty derived from uncertainty in ash composition and uncertainty in transfer coefficients.
- Phosphate [water, ground-]: 5.3006e-7 kg; lognormal variance with pedigree 1.58, pedigree (1,1,5,1,1)
  (same comment as for Strontium)
- Tin, ion [water, ground-, long-term]: 7.4275e-6 kg; lognormal variance with pedigree 1.35, pedigree (1,1,5,1,1)
  (same comment as for Cadmium, ion)
- Barium [water, ground-]: 2.2748e-8 kg; lognormal variance with pedigree 1.85, pedigree (1,1,5,1,1)
  (same comment as for Strontium)
- Silicon [water, ground-]: 0.0012574 kg; lognormal variance with pedigree 0.53, pedigree (1,1,5,1,1)
  (same comment as for Strontium)
- Cadmium, ion [water, ground-]: 1.2986e-10 kg; lognormal variance with pedigree 2.53, pedigree (1,1,5,1,1)
  (same comment as for Strontium)
- Antimony [water, ground-]: 1.5863e-6 kg; lognormal variance with pedigree 1.45, pedigree (1,1,5,1,1)
  (same comment as for Strontium)
- Copper, ion [water, ground-, long-term]: 0.0001719 kg; lognormal variance with pedigree 0.93, pedigree (1,1,5,1,1)
  (same comment as for Cadmium, ion)
- Sodium, ion [water, ground-]: 0.0064329 kg; lognormal variance with pedigree 0.42, pedigree (1,1,5,1,1)
  (same comment as for Strontium)
- Calcium, ion [water, ground-, long-term]: 0.041767 kg; lognormal variance with pedigree 0.25, pedigree (1,1,5,1,1)
  (same comment as for Cadmium, ion)
- Magnesium [water, ground-, long-term]: 0.0092806 kg; lognormal variance with pedigree 0.42, pedigree (1,1,5,1,1)
  (same comment as for Cadmium, ion)
- Arsenic, ion [water, ground-, long-term]: 1.7496e-14 kg; lognormal variance with pedigree 1.26, pedigree (1,1,5,1,1)
  (same comment as for Cadmium, ion)
- Iodide [water, ground-, long-term]: 9.2851e-14 kg; lognormal variance with pedigree 1.64, pedigree (1,1,5,1,1)
  (same comment as for Cadmium, ion)
- Tin, ion [water, ground-]: 5.8957e-10 kg; lognormal variance with pedigree 2.33, pedigree (1,1,5,1,1)
  (same comment as for Strontium)
- Tungsten [water, ground-, long-term]: 2.8521e-6 kg; lognormal variance with pedigree 1.42, pedigree (1,1,5,1,1)
  (same comment as for Cadmium, ion)
- Titanium, ion [water, ground-]: 5.7725e-7 kg; lognormal variance with pedigree 1.42, pedigree (1,1,5,1,1)
  (same comment as for Strontium)
- Bromine [water, ground-, long-term]: 1.5702e-7 kg; lognormal variance with pedigree 1.34, pedigree (1,1,5,1,1)
  (same comment as for Cadmium, ion)
- Lead [water, ground-, long-term]: 1.637e-5 kg; lognormal variance with pedigree 1.24, pedigree (1,1,5,1,1)
  (same comment as for Cadmium, ion)
- Manganese [water, ground-, long-term]: 0.00053942 kg; lognormal variance with pedigree 0.78, pedigree (1,1,5,1,1)
  (same comment as for Cadmium, ion)
- Strontium [water, ground-, long-term]: 0.00069352 kg; lognormal variance with pedigree 0.74, pedigree (1,1,5,1,1)
  (same comment as for Cadmium, ion)
- Zinc, ion [water, ground-]: 6.8242e-9 kg; lognormal variance with pedigree 2.01, pedigree (1,1,5,1,1)
  (same comment as for Strontium)
- Thallium [water, ground-]: 1.3934e-10 kg; lognormal variance with pedigree 2.51, pedigree (1,1,5,1,1)
  (same comment as for Strontium)
- Tungsten [water, ground-]: 1.7904e-6 kg; lognormal variance with pedigree 1.43, pedigree (1,1,5,1,1)
  (same comment as for Strontium)
- Titanium, ion [water, ground-, long-term]: 0.00046368 kg; lognormal variance with pedigree 0.8, pedigree (1,1,5,1,1)
  (same comment as for Cadmium, ion)
- Fluoride [water, ground-]: 3.0283e-6 kg; lognormal variance with pedigree 1.29, pedigree (1,1,5,1,1)
  (same comment as for Strontium)
- Sodium, ion [water, ground-, long-term]: 0.0028521 kg; lognormal variance with pedigree 0.43, pedigree (1,1,5,1,1)
  (same comment as for Cadmium, ion)
- Sulfate [water, ground-, long-term]: 0.077357 kg; lognormal variance with pedigree 0.27, pedigree (1,1,5,1,1)
  (same comment as for Cadmium, ion)
- Molybdenum [water, ground-]: 3.6947e-5 kg; lognormal variance with pedigree 1.13, pedigree (1,1,5,1,1)
  (same comment as for Strontium)
- Boron [water, ground-, long-term]: 4.0833e-5 kg; lognormal variance with pedigree 1.11, pedigree (1,1,5,1,1)
  (same comment as for Cadmium, ion)
- Chromium VI [water, ground-]: 2.2282e-5 kg; lognormal variance with pedigree 1.04, pedigree (1,1,5,1,1)
  (same comment as for Strontium)
- Copper, ion [water, ground-]: 2.7721e-8 kg; lognormal variance with pedigree 1.82, pedigree (1,1,5,1,1)
  (same comment as for Strontium)
- Sulfate [water, ground-]: 0.028493 kg; lognormal variance with pedigree 0.31, pedigree (1,1,5,1,1)
  (same comment as for Strontium)
- Chloride [water, ground-, long-term]: 1.0368e-6 kg; lognormal variance with pedigree 1.51, pedigree (1,1,5,1,1)
  (same comment as for Cadmium, ion)
- Beryllium [water, ground-, long-term]: 4.6355e-6 kg; lognormal variance with pedigree 1.41, pedigree (1,1,5,1,1)
  (same comment as for Cadmium, ion)
- Mercury [water, ground-, long-term]: 1.0181e-6 kg; lognormal variance with pedigree 1.61, pedigree (1,1,5,1,1)
  (same comment as for Cadmium, ion)
- Calcium, ion [water, ground-]: 1.5814e-5 kg; lognormal variance with pedigree 1.03, pedigree (1,1,5,1,1)
  (same comment as for Strontium)
- Selenium [water, ground-, long-term]: 6.5708e-6 kg; lognormal variance with pedigree 1.3, pedigree (1,1,5,1,1)
  (same comment as for Cadmium, ion)
- Barium [water, ground-, long-term]: 0.00065744 kg; lognormal variance with pedigree 0.75, pedigree (1,1,5,1,1)
  (same comment as for Cadmium, ion)
- Potassium, ion [water, ground-]: 0.002253 kg; lognormal variance with pedigree 0.53, pedigree (1,1,5,1,1)
  (same comment as for Strontium)
- Cobalt [water, ground-]: 8.2438e-9 kg; lognormal variance with pedigree 1.99, pedigree (1,1,5,1,1)
  (same comment as for Strontium)
- Thallium [water, ground-, long-term]: 9.1746e-8 kg; lognormal variance with pedigree 1.91, pedigree (1,1,5,1,1)
  (same comment as for Cadmium, ion)
- Antimony [water, ground-, long-term]: 2.5269e-6 kg; lognormal variance with pedigree 1.43, pedigree (1,1,5,1,1)
  (same comment as for Cadmium, ion)
- Vanadium, ion [water, ground-, long-term]: 4.7197e-5 kg; lognormal variance with pedigree 1.11, pedigree (1,1,5,1,1)
  (same comment as for Cadmium, ion)
- Arsenic, ion [water, ground-]: 1.7496e-5 kg; lognormal variance with pedigree 1.23, pedigree (1,1,5,1,1)
  (same comment as for Strontium)
- Silicon [water, ground-, long-term]: 0.1589 kg; lognormal variance with pedigree 0.13, pedigree (1,1,5,1,1)
  (same comment as for Cadmium, ion)
- Scandium [water, ground-]: 2.6241e-6 kg; lognormal variance with pedigree 1.36, pedigree (1,1,5,1,1)
  (same comment as for Strontium)
- Nickel, ion [water, ground-, long-term]: 0.00015308 kg; lognormal variance with pedigree 0.94, pedigree (1,1,5,1,1)
  (same comment as for Cadmium, ion)
- Bromine [water, ground-]: 9.128e-6 kg; lognormal variance with pedigree 1.32, pedigree (1,1,5,1,1)
  (same comment as for Strontium)
- Phosphate [water, ground-, long-term]: 0.0003175 kg; lognormal variance with pedigree 1, pedigree (1,1,5,1,1)
  (same comment as for Cadmium, ion)
- Aluminium [water, ground-, long-term]: 0.041731 kg; lognormal variance with pedigree 0.25, pedigree (1,1,5,1,1)
  (same comment as for Cadmium, ion)
- Chromium VI [water, ground-, long-term]: 1.4653e-5 kg; lognormal variance with pedigree 1.02, pedigree (1,1,5,1,1)
  (same comment as for Cadmium, ion)
- Boron [water, ground-]: 5.1189e-7 kg; lognormal variance with pedigree 1.45, pedigree (1,1,5,1,1)
  (same comment as for Strontium)
- Cobalt [water, ground-, long-term]: 1.1504e-5 kg; lognormal variance with pedigree 1.29, pedigree (1,1,5,1,1)
  (same comment as for Cadmium, ion)
- Mercury [water, ground-]: 2.0133e-10 kg; lognormal variance with pedigree 2.47, pedigree (1,1,5,1,1)
  (same comment as for Strontium)
- Molybdenum [water, ground-, long-term]: 5.0277e-11 kg; lognormal variance with pedigree 1.16, pedigree (1,1,5,1,1)
  (same comment as for Cadmium, ion)
- Scandium [water, ground-, long-term]: 6.661e-6 kg; lognormal variance with pedigree 1.32, pedigree (1,1,5,1,1)
  (same comment as for Cadmium, ion)
- Manganese [water, ground-]: 1.8664e-8 kg; lognormal variance with pedigree 1.87, pedigree (1,1,5,1,1)
  (same comment as for Strontium)
- Zinc, ion [water, ground-, long-term]: 0.00013293 kg; lognormal variance with pedigree 0.96, pedigree (1,1,5,1,1)
  (same comment as for Cadmium, ion)
- Chloride [water, ground-]: 1.3774e-6 kg; lognormal variance with pedigree 1.5, pedigree (1,1,5,1,1)
  (same comment as for Strontium)
- Beryllium [water, ground-]: 7.0401e-9 kg; lognormal variance with pedigree 2.01, pedigree (1,1,5,1,1)
  (same comment as for Strontium)
- Lead [water, ground-]: 3.5568e-10 kg; lognormal variance with pedigree 2.4, pedigree (1,1,5,1,1)
  (same comment as for Strontium)
- Nickel, ion [water, ground-]: 2.3249e-7 kg; lognormal variance with pedigree 1.54, pedigree (1,1,5,1,1)
  (same comment as for Strontium)
- Fluoride [water, ground-, long-term]: 2.0184e-5 kg; lognormal variance with pedigree 1.2, pedigree (1,1,5,1,1)
  (same comment as for Cadmium, ion)
- Vanadium, ion [water, ground-]: 5.3932e-7 kg; lognormal variance with pedigree 1.44, pedigree (1,1,5,1,1)
  (same comment as for Strontium)
- Magnesium [water, ground-]: 4.419e-6 kg; lognormal variance with pedigree 1.17, pedigree (1,1,5,1,1)
  (same comment as for Strontium)
- Iodide [water, ground-]: 9.2851e-7 kg; lognormal variance with pedigree 1.62, pedigree (1,1,5,1,1)
  (same comment as for Strontium)
- Iron, ion [water, ground-, long-term]: 0.021787 kg; lognormal variance with pedigree 0.31, pedigree (1,1,5,1,1)
  (same comment as for Cadmium, ion)
- Iron, ion [water, ground-]: 2.7278e-7 kg; lognormal variance with pedigree 1.56, pedigree (1,1,5,1,1)
  (same comment as for Strontium)
- Selenium [water, ground-]: 4.1248e-6 kg; lognormal variance with pedigree 1.32, pedigree (1,1,5,1,1)
  (same comment as for Strontium)
- Aluminium [water, ground-]: 5.1953e-5 kg; lognormal variance with pedigree 0.87, pedigree (1,1,5,1,1)
  (same comment as for Strontium)
- Potassium, ion [water, ground-, long-term]: 0.0017396 kg; lognormal variance with pedigree 0.53, pedigree (1,1,5,1,1)
  (same comment as for Cadmium, ion)

## Sampling procedure
country-specific calculation based on literature data

## Extrapolations
This dataset has been extrapolated from year 2000 to the year of the calculation (2019). The uncertainty has been adjusted accordingly.

## Review by Niels Jungbluth 2009-01-22
passed.
