# heat and power co-generation unit construction, organic Rankine cycle, 200kW electrical

Dataset: EcoSpold 2, unit process
Geography: GLO
Time period: 2011-01-01 to 2019-12-31
Technology level: modern
Classification: EcoSpold01Categories: oil/cogeneration
Classification: ISIC rev.4 ecoinvent: 2710:Manufacture of electric motors, generators, transformers and electricity di
Synonyms: components for electricity production; ORC turbine; cogeneration turbine; CHP unit; organic rankine cycle
Tags: biomass power
Scenario: Business-as-Usual
System model: Allocation at the point of substitution
Generated by: Christian Bauer
Database: ecoinvent
isCopyrightProtected: true
accessRestrictedTo: 1

## General comment
This dataset represent the production and the disposal of an organic rankine cycle unit. It is dimensioned to be connected to a biomass burning boiler (with capacity 1000kWth), producing about 200 kWel.

## Included activities start
From reception of unit components at the factory gate

## Included activities end
This activity ends with the disposal of the device in the end of its lifetime.The dataset includes the most important materials used for the fabrication of a cogeneration heat and power unit with organic rankine cycle (ORC) technology: steel, chromium steel, copper, electronic components, plastics, insulation, organic fluid. The dataset also includes energy required for the construction and the disposal of the device. The unit includes an electricity generator, a compressor, a condenser, tubes and pipes for thermal oil distribution within the cycle. The dataset doesnt include the basement in concrete for the installation and emission from manufacture.

## Technology
Organic rankine cycle unit of modern technology (2011). Data are taken from producers and technical information available. Model choosen: brand Turboden, Pratt&Whitney Power System Company, CHP Split (devices which are sold worldwide). This module describes a specific ORC Generation Unit for the production of heat and electricity from biomass fuel, dimensioned to be connected to a furnace with about 1000 kWth capacity.
Source of image: http://www.turboden.eu/en/public/downloads/Scheda%20Biomassa%20CHP%20Split%20-%20ING.pdf

## Reference product
- heat and power co-generation unit, organic Rankine cycle, 200kW electrical: 1 unit; By-product classification allocatable product; CPC 53262: Power plants
  EcoSpold01Location=GLO
  production volume 5500 unit
    Extrapolated with proportion (population) from the Swiss annual production (which derives from estimatimations from annually installed CHP plants; source Holzenergiestatistik). High uncertainty.
  property capacity [MW] 0.2 MW; name capacity_MW
  property lifetime capacity [kWh] 3.504e7 kWh; name lifetime_capacity_kWh; = (lifetime*8760)*capacity_MW*1000
    calculated value. The capacity utilisation rate is 60% (about 5500 hours in a total of 8760 hours/year)
  property lifetime 20 year; name lifetime
  property price 98181 EUR2005
    Assumed same prices as common cogen unit with 200kW capacity, electric components only. Value calculated by 2.o. Estimated from CHP installation and maintenance costs in http://www.northeastchp.org/nac/businesses/pubs.htm. No year specified. For the installations costs, shares for common components, components for el only and component for heat only are 39%, 25.5% and 35.5% based on prices of gas motor, generator and heat exchanger, respectively. All maintenance costs are inlcuded only for common compenents because it's only part including maintenance of cogen unit in 'Existing ecoinvent documentation from ecoinvent v.2.2. From information in the dataset cogen unit 200kWe, components for electricity only'. Assume annual hours equivalent full load operation as 5585 hours a year (http://www.cibse.org/pdfs/GPG176.pdf) and a life time of 50 years for the plant.
  property true value 98181
    allocation property applied in "true value" allocation // value calculated from revenue

## By-products
- heat, for reuse in municipal waste incineration only: 0 MJ; CPC 17300: Steam and hot water; By-product classification allocatable product; pedigree (1,1,1,1,1)
  Net electricity generated from this waste and used in internal MSWI plant energy redistribution.
  Uncertainty: uncertainty is calculated from uncertainties in waste composition and uncertainties in energy efficiency and the uncertainty in internal energy demand
  production volume 359851 MJ
  property exergy 0.1842 MJ; name E_th_prod_MSWI_exergy
    This exergy property is based on the exergy content of the product.
  property true value relation 0.1842; name E_th_prod_MSWI_true_value_relation
    property to calculate "true value" from
  property price 0.0106 EUR2005; name E_th_prod_MSWI_price_EUR2005
    Average European district heat price from Ecoheatcool and Euroheat 2005-2006, Ecoheat Work package 1: The European heat market. Final report. 10.6 EUR/GJ i s the price of district heat. http://www.solarthermalworld.org/files/Ecoheatcool%20WP1%20Web.pdf?download
  property true value 0.251646
    allocation property applied in "true value" allocation // value calculated from true value relation
- electricity, for reuse in municipal waste incineration only: 0 kWh; CPC 17100: Electrical energy; By-product classification allocatable product; pedigree (1,1,1,1,1)
  (same comment as for heat, for reuse in municipal waste incineration only)
  production volume 51281.3 kWh
  property exergy 3.6 MJ; name E_el_prod_MSWI_exergy
    This exergy property is based on the exergy content of the product.
  property true value relation 3.6; name E_el_prod_MSWI_true_value_relation
    property to calculate "true value" from
  property price 0.1 EUR2005; name E_el_prod_MSWI_price_EUR2005
    Estimated to be the same price as in case of electricity, medium voltage.
  property true value 0.699555
    (same comment as for heat, for reuse in municipal waste incineration only)
- iron scrap, sorted, pressed: 0 kg; By-product classification Recyclable; CPC 39310: Slag, dross, scalings and other waste from the manufacture of iron or steel; pedigree (1,1,1,1,1)
  Iron scrap recovered from this waste.
  production volume 1.23151e7 kg
  property price 0.175 EUR2005
    Temporary price data. Calculated as 90% of purchasers price based on: 2005 import and export prices (total trades (USD) divided by total weight (kg) in biggest economies of the world: EU27, USA, Brasil, China, India, Japan and Russia) from UN Commodity Trade Statistics Database (http://data.un.org/Explorer.aspxDatabase [Accessed 2011.06.20]). Commodity: Waste or scrap, of cast iron
  property carbon content 0
    carbon content on a dry matter basis (reserved; not for manual entry)
  property true value 5.87786
    allocation property applied in "true value" allocation // value calculated from revenue
  properties: water content 0, water in wet mass 0 kg, carbon content, fossil 0, dry mass 1 kg, carbon content, non-fossil 0, wet mass 1 kg, carbon allocation 0 kg
- zinc concentrate: 0 kg; CPC 14290: Other non-ferrous metal ores and concentrates (other than uranium or thorium ores and concentrates); By-product classification allocatable product
  Calculated value from the knowledge of the properties of both products.
  production volume 2.79183 kg
  property price 0.38 EUR2005; name ByP_price_EUR2005
    Temporary price data. Calculated as 90% of purchasers price based on: Zinc content in concentrate 53%. Concentrate price per kg Zn 86.5% of refined Zn price (13.5% treatment charges according to CHR Metals Limited 2005: Dynamic cost curves. http://www.minecost.com/dynamic.pdf). 2004 zinc price from USGS (2007) Mineral commodity summaries 2007. <http://minerals.usgs.gov/minerals/pubs/mcs/2007/mcs2007.pdf> [Accessed 25 May 2010]
  property zinc content 0.53; name zinc_C_zinc_concentrate
    Zinc content on a dry matter basis. Value taken from teh "zinc mine operation" /GLO dataset.
  property dry mass 1 kg; name DM_zinc_concentrate
  property carbon content 0
    carbon content on a dry matter basis (reserved; not for manual entry)
  property true value 4.6164e-5
    allocation property applied in "true value" allocation // value calculated from revenue
  properties: wet mass 1 kg, water content 0, carbon content, non-fossil 0, carbon content, fossil 0, water in wet mass 0 kg, carbon allocation 0 kg
- copper: 0 kg; By-product classification allocatable product; CPC 41413: Refined copper and copper alloys, unwrought; master alloys of copper
  production volume 101278 kg
  properties: water in wet mass 0 kg, water content 0, carbon content, non-fossil 0, dry mass 1 kg, carbon content, fossil 0, price 5.52 EUR2005, wet mass 1 kg, carbon content 0, carbon allocation 0 kg, true value 34.3374
- lead: 0 kg; CPC 41441: Lead, unwrought; By-product classification allocatable product
  EcoSpold01Location=SE
  production volume 186.803 kg
  property price 0.744 EUR2005
    Temporary price data. Calculated as 90% of purchasers price based on: Source: ecoinvent v2 report 10-part IX, Tab 5.10 & 2.5
  property carbon content 0
    carbon content on a dry matter basis (reserved; not for manual entry)
  property true value 0.0132854
    allocation property applied in "true value" allocation // value calculated from revenue
  properties: wet mass 1 kg, water content 0, carbon content, non-fossil 0, carbon content, fossil 0, dry mass 1 kg, water in wet mass 0 kg, carbon allocation 0 kg
- nickel, 99.5%: 0 kg; CPC 41422: Unwrought nickel; By-product classification allocatable product
  EcoSpold01Location=SE
  production volume 389.946 kg
  property price 10.4 EUR2005
    Temporary price data. Calculated as 90% of purchasers price based on: 2004 nickel price from USGS (2007) Mineral commodity summaries 2007. <http://minerals.usgs.gov/minerals/pubs/mcs/2007/mcs2007.pdf> [Accessed 25 May 2010]
  property carbon content 0
    carbon content on a dry matter basis (reserved; not for manual entry)
  property true value 0.387665
    allocation property applied in "true value" allocation // value calculated from revenue
  properties: water in wet mass 0 kg, wet mass 1 kg, carbon content, non-fossil 0, dry mass 1 kg, water content 0, carbon content, fossil 0, carbon allocation 0 kg
- silver: 0 kg; CPC 41310: Silver (including silver plated with gold or platinum), unwrought or in semi-manufactured forms, or in powder […]; By-product classification allocatable product; CAS 7440-22-4
  EcoSpold01Location=SE
  production volume 64.3957 kg
  property price 178 EUR2005
    (same comment as for lead)
  property carbon content 0
    carbon content on a dry matter basis (reserved; not for manual entry)
  property true value 1.09571
    allocation property applied in "true value" allocation // value calculated from revenue
  properties: wet mass 1 kg, carbon content, non-fossil 0, dry mass 1 kg, water content 0, carbon content, fossil 0, water in wet mass 0 kg, carbon allocation 0 kg
- palladium: 0 kg; CPC 4160: Other non-ferrous metals and articles thereof (including waste and scrap of some metals); cermets and articles […]; By-product classification allocatable product
  EcoSpold01Location=SE
  production volume 3.56472 kg
  property price 5640 EUR2005
    Temporary price data. Calculated as 90% of purchasers price based on: 2004 price from USGS (2007) Mineral commodity summaries 2007. <http://minerals.usgs.gov/minerals/pubs/mcs/2007/mcs2007.pdf> [Accessed 25 May 2010]
  property carbon content 0
    carbon content on a dry matter basis (reserved; not for manual entry)
  property true value 1.92187
    allocation property applied in "true value" allocation // value calculated from revenue
  properties: wet mass 1 kg, carbon content, fossil 0, water in wet mass 0 kg, water content 0, carbon content, non-fossil 0, dry mass 1 kg, carbon allocation 0 kg
- gold: 0 kg; CPC 41320: Gold (including gold plated with platinum), unwrought or in semi-manufactured forms, or in powder form; By-product classification allocatable product; CAS 7440-57-5
  EcoSpold01Location=SE
  production volume 1.95488 kg
  property price 10600 EUR2005
    Temporary price data. Calculated as 90% of purchasers price based on: Source: ecoinvent v2 report 10-part IX, Tab 2.5
  property carbon content 0
    carbon content on a dry matter basis (reserved; not for manual entry)
  property true value 1.98082
    allocation property applied in "true value" allocation // value calculated from revenue
  properties: wet mass 1 kg, carbon content, fossil 0, dry mass 1 kg, carbon content, non-fossil 0, water content 0, water in wet mass 0 kg, carbon allocation 0 kg
- iron scrap, unsorted: 0 kg; source European Aluminium Association 2008; CPC 39310: Slag, dross, scalings and other waste from the manufacture of iron or steel; By-product classification Recyclable; pedigree (1,1,1,1,1)
  production volume 1.8203 kg
  property price 0.149 EUR2005; name ironScrapAmount_price_EUR2005
    Temporary price data. Calculated as 90% of purchasers price based on: estimated at 85% of sorted scrap
  property carbon content 0
    carbon content on a dry matter basis (reserved; not for manual entry)
  property true value 3.79714e-5
    allocation property applied in "true value" allocation // value calculated from revenue
  properties: water in wet mass 0 kg, water content 0, carbon content, fossil 0, carbon content, non-fossil 0, dry mass 1 kg, wet mass 1 kg, carbon allocation 0 kg
- aluminium oxide, non-metallurgical: 0 kg; source European Aluminium Association 2008; CPC 41432: Alumina (aluminium oxide), except artificial corundum; By-product classification allocatable product; CAS 1344-28-1; pedigree (1,1,1,1,1)
  production volume 114.544 kg
  property carbon content, non-fossil 0; name C_content_non_fossil
  property price 0.28 EUR2005; name Al2O3Amount_price_EUR2005
    From UN trade database. http://data.un.org/ Import data from the largest economies of the world are used (Brazil, India, USA, China, Japan and EU-27).
  property dry mass 1 kg; name DM
  property water content 0; name water_content
  property wet mass 1 kg; name WM
  property water in wet mass 0 kg; name WWM
  property carbon content, fossil 0; name C_content_fossil
  property carbon content 0
    carbon content on a dry matter basis (reserved; not for manual entry)
  property true value 0.00449014
    allocation property applied in "true value" allocation // value calculated from revenue
  properties: carbon allocation 0 kg
- aluminium, cast alloy: 0 kg; source European Aluminium Association 2008; By-product classification allocatable product; CPC 41431: Unwrought aluminium; pedigree (1,1,1,1,1)
  EcoSpold01Location=RER
  production volume 1070.74 kg
  property price 1.3 EUR2005; name castAlloyAmount_price_EUR2005
    Temporary price data. Calculated as 90% of purchasers price based on: Source: London Metal Exchange, Aluminium alloy price for 2005
  property carbon content 0
    carbon content on a dry matter basis (reserved; not for manual entry)
  property true value 0.194874
    allocation property applied in "true value" allocation // value calculated from revenue
  properties: water in wet mass 0 kg, carbon content, non-fossil 0, water content 0, dry mass 1 kg, carbon content, fossil 0, wet mass 1 kg, carbon allocation 0 kg
- aluminium, wrought alloy: 0 kg; source European Aluminium Association 2008; By-product classification allocatable product; CPC 4153: Semi-finished products of aluminium or aluminium alloys; pedigree (1,1,1,1,1)
  production volume 468.747 kg
  property price 1.44 EUR2005; name secondaryAluminiumOutput_price_EUR2005
    Estimated based on literature values and expert judgement. Aluminium ccast alloys are about 90% of the price of aluminium wrought alloys.
  property carbon content 0
    carbon content on a dry matter basis (reserved; not for manual entry)
  property true value 0.0944995
    allocation property applied in "true value" allocation // value calculated from revenue
  properties: wet mass 1 kg, water content 0, carbon content, fossil 0, water in wet mass 0 kg, carbon content, non-fossil 0, dry mass 1 kg, carbon allocation 0 kg

## Inputs from technosphere
- waste polyethylene: 0 kg; pedigree (1,1,1,1,1)
  calculated value
  EcoSpold01Location=CH
  production volume 0 kg
    Calculated from production volume of reference product using the relative outputs.
  properties: carbon content, fossil 0.825301, dry mass 0.996 kg, wet mass 1 kg, water content 0.00401606, lifetime 20 year
  note on carbon content, fossil: C content in 1 kg DM was calculated using data in Tab A.1, ecoinvent v2.2 report 13_I
- stone wool: 214.897 kg; name rock_wool; source Turboden srl 2011; lognormal variance with pedigree 0.0372, pedigree (4,4,4,5,1)
  EcoSpold01Location=CH
  estimation
  properties: dry mass 1 kg, wet mass 1 kg, carbon content, fossil 0.015401
  note on carbon content, fossil: The chemical composition of the glass fibres used in the rock wool production is similar to the composition of naturally cooled volcano basalt and has a composition listed in Tab. 3.1 and 3.2 in ecoinvent v2.2 report 16, part XIV. Rock wool contains: a minimum of 96% mineral fibres,between 0.5 and 3.0 weight percent of phenolic resin depending on the specific product characteristics, and about 0.2 percent mineral oil (ecoinvent v2.2 report 16, part XIV). An average composition of 1.8% phenolic resin, 0.2% mineral oil, and 98% mineral fibres has been assumed and used to calculate C content of the rock wool
- copper: 24.9881 kg; source Turboden srl 2011; lognormal variance with pedigree 0.0372, pedigree (4,4,4,5,1)
  estimation
  EcoSpold01Location=RER
  properties: dry mass 1 kg, wet mass 1 kg
- scrap steel: 0 kg; pedigree (1,1,1,1,1)
  calculated value
  EcoSpold01Location=CH
  production volume 0 kg
    Calculated from production volume of reference product using the relative outputs.
  properties: dry mass 1 kg, lifetime 20 year, wet mass 1 kg
- heat, central or small-scale, other than natural gas: 5497.38 MJ; source Turboden srl 2011; lognormal variance with pedigree 0.244, pedigree (5,4,5,5,4)
  EcoSpold01Location=CH
  estimated from personal communication technician ORC turbine company (annual heating value/production)
- electronics, for control units: 29.9857 kg; name electronics; source Turboden srl 2011; lognormal variance with pedigree 0.0372, pedigree (4,4,4,5,1)
  EcoSpold01Location=RER
  estimation
  properties: wet mass 1 kg, dry mass 1 kg, carbon content, non-fossil 0.00013442, carbon content, fossil 0.337146
  note on carbon content, non-fossil: The control unit has a composition of 46% steel (housing), 32% plastics, 14% printed wiring boards and 8% cables (various types).;
- perfluoropentane: 599.714 kg; source Turboden srl 2011; lognormal variance with pedigree 0.0298, pedigree (2,4,4,5,1)
  literature value (organic fluid for the cycle turbine)
  properties: carbon content, fossil 0.0953262, wet mass 1 kg, dry mass 1 kg
- electricity, medium voltage: 3398.38 kWh; source Turboden srl 2011; lognormal variance with pedigree 0.158, pedigree (3,4,5,5,3)
  estimated from personal communication technician ORC turbine company
- waste mineral wool: 0 kg; pedigree (1,1,1,1,1)
  calculated value
  production volume 0 kg
    Calculated from production volume of reference product using the relative outputs.
  properties: dry mass 1 kg, wet mass 1 kg
- steel, chromium steel 18/8, hot rolled: 1249.4 kg; name chromium_steel; source Turboden srl 2011; lognormal variance with pedigree 0.0298, pedigree (2,4,4,5,1)
  EcoSpold01Location=RER
  literature value
  properties: dry mass 1 kg, carbon content, fossil 0.0008, wet mass 1 kg
  note on carbon content, fossil: Stainless steel model is the grade 304 steel (18/8 stainless, 18% chromium 8% nickel; max. 0.08% C)
- polyethylene, high density, granulate: 17.9914 kg; name polyethylene; source Turboden srl 2011; lognormal variance with pedigree 0.0372, pedigree (4,4,4,5,1)
  EcoSpold01Location=RER
  estimation
  properties: carbon content, fossil 0.857143, wet mass 1 kg, dry mass 1 kg
  note on carbon content, fossil: Polyethylene is formed out of a huge amount of ethylene monomers (C2H4) (ecoinvent v2.2 report 11_II). MW=28 g/mol
- used industrial electronic device: 0 kg; pedigree (1,1,1,1,1)
  EcoSpold01Location=CH
  calculated value
  production volume 0 kg
    Calculated from production volume of reference product using the relative outputs.
  properties: wet mass 1 kg, carbon content, fossil 0.0818694, carbon content, non-fossil 3.07246e-5, lifetime 20 year, dry mass 1 kg
  note on carbon content, fossil: The composition of an average industrial device was extracted from Tab 4.38 (ecoinvent v2.2 report 18_V). 88% steel, that was considered to have a C content of 0.012 (C content was calculated out of emission factors published in Commission Decision of 18 July 2007 establishing guidelines for the monitoring and reporting of greenhouse gas emissions pursuant to Directive 2003/87/EC of the European Parliament and of the Council (notified under document number C(2007) 3416)); 8% plastics (plastics C content was calculated using data in Tab A.2, ecoinvent v2.2 report 13_I); 3.2% PWB & plugs (C content calculated using PWB composition)
- used perfluoropentane: -599.714 kg; = (perfluoropentane)*-1; lognormal variance with pedigree 0.0186, pedigree (1,5,4,5,1)
  calculated value
  production volume 3.3e6 kg; = Ref('ba468772-b8fc-4d30-90a6-af0fa0e8e025', 'ProductionVolume') * ((Ref('ccc6dcd8-454f-4810-9f9a-59b90669aaf3')*-1) / Ref('ba468772-b8fc-4d30-90a6-af0fa0e8e025'))
    Calculated from production volume of reference product using the relative outputs.
  properties: carbon content, fossil 0.0953262, dry mass 1 kg, wet mass 1 kg
- steel, low-alloyed, hot rolled: 18691.1 kg; name steel_low_alloyed; source Turboden srl 2011; lognormal variance with pedigree 0.0298, pedigree (2,4,4,5,1)
  literature value
  EcoSpold01Location=RER
  properties: carbon content, fossil 0.005, wet mass 1 kg, dry mass 1 kg
  note on carbon content, fossil: Low alloyed steel composition given in Tab. 3.2 ecoinvent v2.2 report 10_partII. Steel assumed to have a C content of 0.5%
- scrap copper: 0 kg; pedigree (1,1,1,1,1)
  EcoSpold01Location=CH
  calculated value
  production volume 0 kg
    Calculated from production volume of reference product using the relative outputs.
  properties: dry mass 1 kg, wet mass 1 kg, lifetime 20 year
- waste polyethylene: -1.73176, -0.133508, -0.0551437, -0.0523641, -1.99814, -0.0222774, -0.010097, -13.9881 kg (8 entries); lognormal variance with pedigree 0.0186, pedigree (1,5,4,5,1)
  calculated value
  EcoSpold01Location=CH
  production volume 99000 kg
- scrap steel: -4855.42, -6.13846, -15078.9 kg (3 entries); lognormal variance with pedigree 0.0186, pedigree (1,5,4,5,1)
  calculated value
  EcoSpold01Location=CH
  production volume 1.09725e8 kg
- waste mineral wool: -62.2891, -0.710766, -151.898 kg (3 entries); lognormal variance with pedigree 0.0186, pedigree (1,5,4,5,1)
  calculated value
  production volume 1.1825e6 kg
- used industrial electronic device: -6.89671, -23.089 kg (2 entries); lognormal variance with pedigree 0.0186, pedigree (1,5,4,5,1)
  EcoSpold01Location=CH
  calculated value
  production volume 165000 kg
- scrap copper: -7.92641, -0.37189, -16.6898 kg (3 entries); lognormal variance with pedigree 0.0186, pedigree (1,5,4,5,1)
  EcoSpold01Location=CH
  calculated value
  production volume 137500 kg

## Sampling procedure
literature, technical data available, personal communications from technicians and specialized producer company

## Extrapolations
extrapolated from Italian data

## Review by Bo Weidema 2012-04-15
Intended to replaces previous dataset: "cogen unit production, organic Rankine cycle 1400kWth, wood burning, components for electricity only"

## Review by Bo Weidema 2012-04-15
Replaces the previous "cogen unit production, organic Rankine cycle 1400kWth, wood burning, components for electricity only"
