# electricity, high voltage, import from MRO, US only

Dataset: EcoSpold 2, unit process
Geography: CA-MB
Time period: 2012-01-01 to 2019-12-31
Technology level: current
Classification: ISIC rev.4 ecoinvent: 3510:Electric power generation, transmission and distribution
Tags: Canada
Scenario: Business-as-Usual
System model: Allocation at the point of substitution
Generated by: Karin Treyer
Database: ecoinvent
isCopyrightProtected: true
accessRestrictedTo: 1

## General comment
This dataset represents the amount of imported electricity from MRO, US only to Manitoba (Canada). The import value is valid for 2013 and includes all electricity imports, independently whether used within the importing country, or re-exported. For a discussion of different ways of modeling electricity trade in LCI, please refer to (Itten & Frischknecht 2012).

## Included activities start
This activity represents the point of 'handing over' the electricity from one country to the other at the border.

## Included activities end
This dataset doesn't include any electricity losses or transmission infrastructure as these are accounted for in the market datasets.

## Reference product
- electricity, high voltage: 1 kWh; CPC 17100: Electrical energy; By-product classification allocatable product
  production volume 3.35e8 kWh
    Literature value.
    StatCan, 2014
    http://www5.statcan.gc.ca/cansim/a34?lang=eng&id=1270007&searchTypeByValue=1&mode=tableSummary&p2=35
    http://www5.statcan.gc.ca/cansim/a34?lang=eng&id=1270006&searchTypeByValue=1&mode=tableSummary&p2=35
    http://www5.statcan.gc.ca/cansim/a34?lang=eng&id=1270004&searchTypeByValue=1&mode=tableSummary&p2=35
  properties: price 0.0977 EUR2005

## Inputs from technosphere
- electricity, high voltage: 1 kWh
  activityLink added to better reflect the reality of the supply chain

## Sampling procedure
Literature

## Extrapolations
This dataset has been extrapolated from year 2012 to the year of the calculation (2019). The uncertainty has been adjusted accordingly.

## Review by Christian Bauer 2012-09-17
Review passed
