# natural gas, high pressure, import from NO

Dataset: EcoSpold 2, unit process
Geography: CH
Time period: 2012-01-01 to 2019-12-31
Technology level: current
Classification: ISIC rev.4 ecoinvent: 3520:Manufacture of gas; distribution of gaseous fuels through mains
Scenario: Business-as-Usual
System model: Allocation at the point of substitution
Share of production covered: 100 %
Generated by: Mireille Faist Emmenegger
Published in: Faist Emmenegger, Mireille 2015
Database: ecoinvent
isCopyrightProtected: true
accessRestrictedTo: 1

## General comment
This dataset describes the transport needed for the export of Norwegian natural gas (expressed in tkm) to Switzerland. Gas losses and emissions during seasonal storage are included. An average distance of 2100 km is estimated for the export, of which are 650 km offshore pipeline.
Characteristics are based on the ecoinvent report v2 'Erdgas' from 2007: HV; 44.21 MJ/m-3; density, 0.84 kg/m-3, 0.719 kg CH4/m-3, 0.013 kg CO2/m-3

## Included activities start
'exit gate' of natural gas production field

## Included activities end
'entry gate' of natural gas national market

## Geography
The average weighted export distance is based on the trade movements 2012.

## Technology
The distance to the different countries is based on rough estimates using maps of natural gas pipeline infrastructure.

## Reference product
- natural gas, high pressure: 1 m3; CPC 12020: Natural gas, liquefied or in the gaseous state; By-product classification allocatable product
  production volume 8.34988e8 m3
    m3 imported in 2012 from NO to CH. from BP Statistical Review of World Energy, June 2014 and VSG (Verband der Schweizerischen Gasindustrie (VSG)) statistics for the year 2012 (VSG Statistik 2013).Scaled to LHV of ecoinvent v3 (39MJ/m3). Refrence(s): BP (2014). Statistical Review of World Energy, June 2014. Retrieved online from http://www.bp.com/content/dam/bp-country/de_de/PDFs/brochures/BP-statistical-review-of-world-energy-2014-full-report.pdf, 30 August, 2017. VSG (2015). Erdgas in der Schweiz. Ausgabe 2015. VSG-Jahresstatistik. Retrieved online from file:///C:/Users/FlorentineBrunner/Downloads/VSG-Jahresstatistik_2015.pdf, 30 August, 2017.
  properties: price 0.166 EUR2005, carbon content, fossil 0.602381, heating value, gross 0 MJ, water content 0, wet mass 0.84 kg, carbon content, non-fossil 0, water in wet mass 0 kg, dry mass 0.84 kg, carbon content 0.602381, carbon allocation 0.506 kg

## Inputs from technosphere
- transport, pipeline, onshore, long distance, natural gas: 1.218 metric ton*km; = (2100-650)*.84/1000; lognormal variance with pedigree 0.1226, pedigree (2,1,3,1,1)
  Average distance multiplied by density of the natural gas.
  Uncertainty: A
- natural gas, burned in gas motor, for storage: 0.0612 MJ; source Faist Emmenegger, M. 2007; lognormal variance with pedigree 0.0281, pedigree (4,1,3,3,3)
  Data from german industrial expert for 2001, standard technology
  Uncertainty: D
- transport, pipeline, offshore, long distance, natural gas: 0.546 metric ton*km; = 650*0.84/1000; lognormal variance with pedigree 0.1226, pedigree (2,1,3,1,1)
  Average distance multiplied by density of the natural gas.
  Uncertainty: A
- natural gas, high pressure: 0 m3; source Faist Emmenegger, M. 2007; pedigree (1,1,1,1,1)
  average losses of storage included (0.01%)
  Uncertainty: a
  properties: dry mass 0.84 kg, carbon content, fossil 0.602381, wet mass 0.84 kg
  note on carbon content, fossil: An average C content of 0.506 kg C/ m3 has been assumed (this average has been calculated using data in Tab 3.5, ecoinvent v2.2 report 6_V
- natural gas, high pressure: 1.0001 m3; source Faist Emmenegger, M. 2007; lognormal variance with pedigree 0.0201, pedigree (4,1,3,3,1)
  average losses of storage included (0.01%)
  Uncertainty: a

## Emissions to nature
All rows: source Faist Emmenegger, M. 2007
- Mercury [air, non-urban air or from high stacks]: 1e-12 kg; lognormal variance with pedigree 0.0426, pedigree (2,1,3,1,1)
  calculated based on average losses and norwegian gas composition
  Uncertainty: c
- Carbon dioxide, fossil [air, non-urban air or from high stacks]: 1.3e-6 kg; lognormal variance with pedigree 0.0026, pedigree (2,1,3,1,1)
  calculated based on average losses and norwegian gas composition
  Uncertainty: c
- Methane, fossil [air, non-urban air or from high stacks]: 7.19e-5 kg; lognormal variance with pedigree 0.1226, pedigree (2,1,3,1,1)
  calculated based on average losses and norwegian gas composition
  Uncertainty: c
- Butane [air, non-urban air or from high stacks]: 6e-7 kg; lognormal variance with pedigree 0.1226, pedigree (2,1,3,1,1)
  calculated based on average losses and norwegian gas composition
  Uncertainty: c
- Ethane [air, non-urban air or from high stacks]: 7.4e-6 kg; lognormal variance with pedigree 0.1226, pedigree (2,1,3,1,1)
  calculated based on average losses and norwegian gas composition
  Uncertainty: c
- NMVOC, non-methane volatile organic compounds, unspecified origin [air, non-urban air or from high stacks]: 2e-7 kg; lognormal variance with pedigree 0.1226, pedigree (2,1,3,1,1)
  calculated based on average losses and norwegian gas composition
  Uncertainty: c
- Propane [air, non-urban air or from high stacks]: 1.9e-6 kg; lognormal variance with pedigree 0.1226, pedigree (2,1,3,1,1)
  calculated based on average losses and norwegian gas composition
  Uncertainty: c

## Sampling procedure
statistics

## Extrapolations
This dataset has been extrapolated from year 2012 to the year of the calculation (2019). The uncertainty has been adjusted accordingly.
