# treatment of scrap tin sheet, municipal incineration with fly ash extraction

Dataset: EcoSpold 2, unit process
Geography: CH
Time period: 2006-01-01 to 2019-12-31
Technology level: current
Classification: ISIC rev.4 ecoinvent: 3821:Treatment and disposal of non-hazardous waste
Synonyms: municipal waste incineration
Scenario: Business-as-Usual
System model: Allocation at the point of substitution
Share of production covered: 1.8 %
Generated by: Gabor Doka
Published in: Doka G. 2015
Database: ecoinvent
isCopyrightProtected: true
accessRestrictedTo: 1

## General comment
This dataset represents the activity of waste disposal of scrap tin sheet in a municipal solid waste incinerator (MSWI) // Recommended use of this dataset: For disposal of tin sheet packaging (tin cans, paint buckets) but without paper parts (please inventory any paper separately), which go to disposal as part of communal waste. Larger amounts of separated tin sheet will not be disposed in incinerators or landfills, but rather go to recycling. // Inventoried waste contains 99.8% tin sheet inert; 0.195% tin volatile; . // Waste composition (wet, in ppm): H2O n.a.; O n.a.; H n.a.; C n.a.; S n.a.; N n.a.; P n.a.; B n.a.; Cl 750; Br n.a.; F n.a.; I n.a.; Ag n.a.; As n.a.; Ba n.a.; Cd 30; Co n.a.; Cr n.a.; Cu 199; Hg n.a.; Mn n.a.; Mo n.a.; Ni n.a.; Pb 380; Sb n.a.; Se n.a.; Sn 3900; V n.a.; Zn 202; Be n.a.; Sc n.a.; Sr n.a.; Ti n.a.; Tl n.a.; W n.a.; Si n.a.; Fe 994570; Ca n.a.; Al n.a.; K n.a.; Mg n.a.; Na n.a.; // Share of carbon in waste that is biogenic 60.4%. // Share of metals in waste not oxidised and bulk-recyclable (exclude very small or thin parts) Iron: 100%; Alu: 0%; Copper: 0%. // Recovery of metal scrap from bottom ash to recycling: 576.85g iron scrap, 0g aluminium scrap, 0g copper scrap. From this waste, the FLUWA process in the technology mix recovers 0.00000218kg (DM) of a hydroxide sludge to be recycled in zinc furnaces. // Ultimately one kg of this waste produces 0.6268 kg of bottom ash (can include some washed ash) and 0.000835 kg of residues, which are landfilled (technology mix). Additional solidification of residues with 0.000334 kg of cement.Net energy production: 0MJ/kg electric energy and 0MJ/kg thermal energy. //

## Included activities start
waste incineration from waste reception gate and delivery into waste bunker at incinerator plant site (without transports to the incinerator)

## Included activities end
Waste-specific short-term emissions to water from leachate. Long-term emissions from landfill to ground water.

## Geography
Specific to the technology mix encountered in Switzerland in 2012.

## Technology
average Swiss MSWI plants in 2010 (grate incinerators) with electrostatic precipitator for fly ash (ESP), wet flue gas scrubber and 25% SNCR , 42.77% SCR-high dust , 32.68% SCR-low dust -DeNOx facilities and 0% without Denox (weighted according to mass of burnt waste, representing Swiss average). Efficiency of iron scrap separation from slag : 58%. Efficiency of non-ferrous scrap separation from slag : 31%. The technology mix for this dataset includes a filter ash treatment (FLUWA) of a share of 46.22%. Gross electric efficiency technology mix 15.84% and Gross thermal efficiency technology mix 28.51%

## Time period
Waste composition as given in literature reference, theoretical data or other source. Transfer coefficients for modern MSWI.

## Reference product
- scrap tin sheet: 0 kg; By-product classification Waste; CPC 39366: Waste and scrap of tin
  Main reference product of this activity (supply of disposal service).
  production volume 0 kg
    based on corresponding global production volume of MSW fraction in conventional MSWI (wo fly ash extraction) and scaled down to annual Swiss incinerated MSW mass of 3.02 mio. tonnes.
  property price 0 EUR2005
    Waste products are assigned a price of zero as they are assumed to require further treatment.
  properties: iron content 0.99454, copper content 0.00019899, chlorine content 0.00074998, tin content 0.0038999, cadmium content 2.9999e-5, zinc content 0.00020199, dry mass 1 kg, lead content 0.00037999, wet mass 1 kg
- iron scrap, sorted, pressed: 1 kg; By-product classification Recyclable; CPC 39310: Slag, dross, scalings and other waste from the manufacture of iron or steel; pedigree (1,1,1,1,1)
  Iron scrap recovered from this waste.
  Uncertainty: uncertainty calculated from uncertainty in waste composition, uncertainty of share of recyclable metal, uncertainty of transfer coefficient to bottom ash, uncertainty of the efficiency of scrap removal in MSWI plant.
  production volume 2.231e7 kg

## By-products
- iron scrap, sorted, pressed: 0 kg; By-product classification Recyclable; CPC 39310: Slag, dross, scalings and other waste from the manufacture of iron or steel; pedigree (1,1,1,1,1)
  (same comment as for iron scrap, sorted, pressed)
  production volume 0 kg
    calculated in proportion to reference product waste input to incinerator
  property price 0.175 EUR2005
    Temporary price data. Calculated as 90% of purchasers price based on: 2005 import and export prices (total trades (USD) divided by total weight (kg) in biggest economies of the world: EU27, USA, Brasil, China, India, Japan and Russia) from UN Commodity Trade Statistics Database (http://data.un.org/Explorer.aspxDatabase [Accessed 2011.06.20]). Commodity: Waste or scrap, of cast iron
  property carbon content 0
    carbon content on a dry matter basis (reserved; not for manual entry)
  properties: water in wet mass 0 kg, dry mass 1 kg, carbon content, fossil 0, carbon content, non-fossil 0, wet mass 1 kg, water content 0, carbon allocation 0 kg
- zinc concentrate: 0 kg; CPC 14290: Other non-ferrous metal ores and concentrates (other than uranium or thorium ores and concentrates); By-product classification allocatable product
  Calculated value from the knowledge of the properties of both products.
  property price 0.38 EUR2005; name ByP_price_EUR2005
    Temporary price data. Calculated as 90% of purchasers price based on: Zinc content in concentrate 53%. Concentrate price per kg Zn 86.5% of refined Zn price (13.5% treatment charges according to CHR Metals Limited 2005: Dynamic cost curves. http://www.minecost.com/dynamic.pdf). 2004 zinc price from USGS (2007) Mineral commodity summaries 2007. <http://minerals.usgs.gov/minerals/pubs/mcs/2007/mcs2007.pdf> [Accessed 25 May 2010]
  property zinc content 0.53; name zinc_C_zinc_concentrate
    Zinc content on a dry matter basis. Value taken from teh "zinc mine operation" /GLO dataset.
  property dry mass 1 kg; name DM_zinc_concentrate
  property carbon content 0
    carbon content on a dry matter basis (reserved; not for manual entry)
  properties: wet mass 1 kg, water content 0, carbon content, non-fossil 0, carbon content, fossil 0, water in wet mass 0 kg, carbon allocation 0 kg

## Inputs from technosphere
- water, decarbonised: 0 kg; pedigree (1,1,1,1,1)
  Incinerator process water used in flue gas scrubber stage.
  Uncertainty: uncertainty calculated from uncertainty in average water input, and the uncertainty of the waste composition of this waste
  properties: wet mass 1 kg
- waste cement, hydrated: 0 kg; pedigree (1,1,1,1,1)
  Hydrated cement output for solidification of landfilled residual material.
  Uncertainty: Uncertainty calculated from uncertainty of the waste composition of this waste and transfer coefficients in the incinerator and of the solidification recipe.
  production volume 0 kg
    calculated in proportion to reference product waste input to incinerator
  properties: wet mass 1 kg, dry mass 1 kg
- electricity, for reuse in municipal waste incineration only: 0 kWh; name E_el_prod_MSWI; pedigree (1,1,1,1,1)
  Net electricity required to incinerate this waste (subsidiesed from high-calorific waste fractions).
  Uncertainty: uncertainty is calculated from uncertainties in waste composition and uncertainties in energy efficiency and the uncertainty in internal energy demand
- cement, unspecified: 0 kg; pedigree (1,1,1,1,1)
  Cement required for solidification of landfilled residual material.
  Uncertainty: Uncertainty calculated from uncertainty of the waste composition of this waste, of transfer coefficients in the incinerator and of the solidification recipe.
  properties: wet mass 1 kg, dry mass 1 kg
- hydrogen peroxide, without water, in 50% solution state: 0 kg; pedigree (1,1,1,1,1)
  Auxilliary oxidising agent for filter ash treatment (FLUWA).
  Uncertainty: uncertainty calculated from uncertainty in of transfer coefficients in the incinerator, and the uncertainty of the waste composition of this waste
  properties: wet mass 1 kg, dry mass 1 kg
- slag landfill: 0 unit; pedigree (1,1,1,1,1)
  Landfill infrastructure required for landfilling of bottom ash.
  Uncertainty: uncertainty is calculated from uncertainties in waste composition and transfer coefficients in incinerator
- chemical, inorganic: 0 kg; pedigree (1,1,1,1,1)
  Auxilliary inputs for the wastewater treatment stage of the incinerator plant. Proxy for Polyelectrolyte.
  Uncertainty: uncertainty calculated from uncertainty in average Polyelectrolyte input, of transfer coefficients in the incinerator, and the uncertainty of the waste composition of this waste
  properties: carbon content, fossil 0.003, dry mass 1 kg, wet mass 1 kg
- chromium oxide, flakes: 0 kg; pedigree (1,1,1,1,1)
  Input to DeNOx stage. Active component in SCR catalyst (vanadium pentoxide, V2O5), here approximated with the available chromium trioxide.
  Uncertainty: uncertainty calculated from uncertainty in average DeNOx input, uncertainty in the share of thermal NOx, uncertainty of nitrogen content in average municipal waste and the uncertainty in nitrogen content in *this* waste.
  properties: wet mass 1 kg, dry mass 1 kg
- process-specific burdens, residual material landfill: 0 kg; pedigree (1,1,1,1,1)
  Mass-specific expenditures required for landfilling of incineration residues.;activityLink introduced to establish a direct link to the corresponding regional supply of this product
  Uncertainty: uncertainty is calculated from uncertainties in waste composition and transfer coefficients in incinerator
- municipal waste incineration facility: 0 unit
  Demands per kilogram waste.
- iron (III) chloride, without water, in 40% solution state: 0 kg; pedigree (1,1,1,1,1)
  Auxilliary inputs for the wastewater treatment stage of the incinerator plant.
  Uncertainty: uncertainty calculated from uncertainty in average FeCl3 input, of transfer coefficients in the incinerator, and the uncertainty of the waste composition of this waste
  properties: wet mass 1 kg, dry mass 1 kg
- titanium dioxide: 0 kg; pedigree (1,1,1,1,1)
  Input to DeNOx stage (TiO2 catalyst carrier)
  Uncertainty: uncertainty calculated from uncertainty in average DeNOx input, uncertainty in the share of thermal NOx, uncertainty of nitrogen content in average municipal waste and the uncertainty in nitrogen content in *this* waste.
  properties: wet mass 1 kg, dry mass 1 kg
- hydrochloric acid, without water, in 30% solution state: 0 kg; pedigree (1,1,1,1,1)
  Auxilliary inputs for the wastewater treatment stage of the incinerator plant.
  Uncertainty: uncertainty calculated from uncertainty in average HCl input, of transfer coefficients in the incinerator, and the uncertainty of the waste composition of this waste
  properties: dry mass 1 kg, wet mass 1 kg
- heat, district or industrial, natural gas: 0 MJ; pedigree (1,1,1,1,1)
  Input to DeNOx stage, to heat up flue gas in low-dust SCR.
  Uncertainty: uncertainty calculated from uncertainty in average DeNOx input, uncertainty in the share of thermal NOx, uncertainty of nitrogen content in average municipal waste and the uncertainty in nitrogen content in *this* waste.
- process-specific burdens, slag landfill: 0 kg; pedigree (1,1,1,1,1)
  Mass-specific expenditures required for landfilling of bottom ash.;activityLink introduced to establish a direct link to the corresponding regional supply of this product
  Uncertainty: uncertainty is calculated from uncertainties in waste composition and transfer coefficients in incinerator
- sodium hydroxide, without water, in 50% solution state: 0 kg; pedigree (1,1,1,1,1)
  Auxilliary inputs for the flue gas treatment stage of the incinerator plant, and partially in the filter ash treatment (FLUWA).
  Uncertainty: uncertainty calculated from uncertainty in average NaOH input, of transfer coefficients in the incinerator, and the uncertainty of the waste composition of this waste
  properties: wet mass 1 kg, dry mass 1 kg
- ammonia, liquid: 0 kg; pedigree (1,1,1,1,1)
  Input to DeNOx stage (100% NH3).
  Uncertainty: uncertainty calculated from uncertainty in average DeNOx input, uncertainty in the share of thermal NOx, uncertainty of nitrogen content in average municipal waste and the uncertainty in nitrogen content in *this* waste.
  properties: wet mass 1 kg, dry mass 1 kg
- heat, for reuse in municipal waste incineration only: 0 MJ; name E_th_prod_MSWI; pedigree (1,1,1,1,1)
  Net heat required to incinerate this waste (subsidiesed from high-calorific waste fractions).
  Uncertainty: uncertainty is calculated from uncertainties in waste composition and uncertainties in energy efficiency and the uncertainty in internal energy demand
- metalliferous hydroxide sludge: 0 kg; pedigree (1,1,1,1,1)
  Metalliferous hydroxide sludge from filter ash leaching (FLUWA).
  Uncertainty: uncertainty is calculated from uncertainties in waste composition and transfer coefficients to filter ash in incinerator and the uncertainty of the transfer coefficients of the FLUWA process.
  production volume 0 kg
    calculated in proportion to reference product waste input to incinerator
  properties: water content 3, dry mass 0.25 kg, wet mass 1 kg, tin content 0.78764, oxygen content 0.21236, price 0.0042 EUR2005
- transport, freight, lorry, unspecified: 0 metric ton*km; pedigree (1,1,1,1,1)
  Transport services to transport incineration residues to landfills and filter ash to external treatments (FLUWA).
  Uncertainty: uncertainty calculated from uncertainty of the waste composition of this waste, uncertainty of transfer coefficients and the uncertainty in generic transportation distances
- residual material landfill: 0 unit; pedigree (1,1,1,1,1)
  Landfill infrastructure required for landfilling of incineration residues.
  Uncertainty: uncertainty is calculated from uncertainties in waste composition and transfer coefficients in incinerator
- integrated circuit, logic type: 8.10698e-7 kg
  Value from literature: Ramroth, L. 2008. Comparison of Life-Cycle Analyses of Compact Fluorescent and Incandescent Lamps Based on Rated Life of Compact Fluorescent Lamp. Retrieved from: http://infohouse.p2ric.org/ref/47/46011.pdf, accessed 20180614
- waste electric and electronic equipment: -4.00782e-6 kg
  The amount is set equal to the input amount for the inputs of electronics, i.e. integrated circuit, printed wiring board and electrode.
  production volume 20358 kg
- tin: 2.74039e-6 kg; lognormal variance with pedigree 0.0118, pedigree (1,4,4,4,2)
  (same comment as for integrated circuit, logic type)
- mercury: 2.85457e-9 kg; lognormal variance with pedigree 0.0118, pedigree (1,4,4,4,2)
  (same comment as for integrated circuit, logic type)
- acrylonitrile-butadiene-styrene copolymer: 8.10698e-7 kg
  (same comment as for integrated circuit, logic type)
- cast iron: 3.57963e-6 kg
  (same comment as for integrated circuit, logic type)
- aluminium, cast alloy: 0.00265548 kg
  (same comment as for integrated circuit, logic type)
- electricity, high voltage: 1.27885e-7 kWh; lognormal variance with pedigree 0.0118, pedigree (1,4,4,4,2)
  (same comment as for integrated circuit, logic type)
- foam glass: 1.71274e-6 kg
  (same comment as for integrated circuit, logic type)
- polypropylene, granulate: 2.42639e-6 kg
  (same comment as for integrated circuit, logic type)
- flat glass factory: 2.57943e-14 unit; lognormal variance with pedigree 0.3112, pedigree (1,4,4,4,2)
  (same comment as for integrated circuit, logic type)
- electrode, negative, Ni: 9.13463e-7 kg
  (same comment as for integrated circuit, logic type)
- printed wiring board, surface mounted, unspecified, Pb containing: 2.28366e-6 kg
  (same comment as for integrated circuit, logic type)
- copper: 3.51112e-6 kg; lognormal variance with pedigree 0.0118, pedigree (1,4,4,4,2)
  (same comment as for integrated circuit, logic type)
- lead: 2.05529e-8 kg
  (same comment as for integrated circuit, logic type)
- polyvinylchloride, bulk polymerised: 9.59136e-6 kg
  (same comment as for integrated circuit, logic type)
- waste polypropylene: -3.11584e-7, -2.40213e-8, -9.92167e-9, -9.42155e-9, -3.59514e-7, -4.00824e-9, -1.81669e-9, -2.5168e-6 kg (8 suppliers, which the file names only by identifier); sum of these -3.23708e-6 kg
  The amount is set equal to the input amount of polypropylene and ABS.
  production volume 16443 kg
- scrap aluminium: -0.0025339, -0.000118885, -2.70355e-6 kg (3 suppliers, which the file names only by identifier); sum of these -0.00265548 kg
  The amount is set equal to the input amount for the respective material.
  production volume 20561 kg
- waste polyvinylchloride: -9.23213e-7, -7.11743e-8, -2.93975e-8, -2.79157e-8, -1.06523e-6, -1.18763e-8, -5.3828e-9, -7.45717e-6 kg (8 suppliers, which the file names only by identifier); sum of these -9.59136e-6 kg
  The amount is set equal to the input amount for the respective material.
  production volume 48720 kg
- waste glass: -3.61545e-6, -1.75427e-7, -1.63671e-8, -7.32367e-8, -1.90334e-6, -2.48543e-8, -3.97985e-9, -1.79374e-5 kg (8 suppliers, which the file names only by identifier); sum of these -2.375e-5 kg; lognormal variance with pedigree 0.0118, pedigree (1,4,4,4,2)
  Includes waste from regular glass and black glass.
  production volume 120640 kg
- scrap copper: -1.11376e-6, -5.2255e-8, -2.34511e-6 kg (3 suppliers, which the file names only by identifier); sum of these -3.51112e-6 kg; lognormal variance with pedigree 0.0118, pedigree (1,4,4,4,2)
  The amount is set equal to the input amount for the respective material.
  production volume 17835 kg
- flat glass, uncoated: 3.76313e-6, 1.82742e-5 kg (2 suppliers, which the file names only by identifier); sum of these 2.20373e-5 kg; lognormal variance with pedigree 0.0118, pedigree (1,4,4,4,2)
  (same comment as for integrated circuit, logic type)
- scrap tin sheet: -0.0696414, -5.34888e-5 kg (2 suppliers, which the file names only by identifier); sum of these -0.0696949 kg; lognormal variance with pedigree 0.0118, pedigree (1,4,4,4,2)
  The amount is set equal to the input amount for the respective material.
  production volume 13920 kg
- printed wiring board mounting facility: 4.43413e-11 unit; lognormal variance with pedigree 0.5761, pedigree (4,5,5,3,5)
  Estimation, assuming an output of ca. 60’000 m2 or 192’000 kg per year during 25 years.
  EcoSpold01Location=GLO
  Uncertainty: rough estimation of infrastructure
- solder, paste, Sn63Pb37, for electronics industry: 6.12149e-6 kg; source Alvarado Ascencio C. 2005; lognormal variance with pedigree 0.0513, pedigree (2,3,5,3,1)
  Estimation, based on literature reporting values from several different PWB mounting trials on laboratory scale.
  EcoSpold01Location=GLO
  Uncertainty: data from literature
- electricity, medium voltage: 0.00792101 kWh; source Alvarado Ascencio C. 2005; lognormal variance with pedigree 0.0513, pedigree (2,3,5,3,1)
  Estimation, based on literature reporting values from several different PWB mounting trials on laboratory scale.
  EcoSpold01Location=UCTE
  Uncertainty: data from literature
- solder, paste, Sn95.5Ag3.9Cu0.6, for electronics industry: 5.56501e-6 kg; source Alvarado Ascencio C. 2005; lognormal variance with pedigree 0.0513, pedigree (2,3,5,3,1)
  (same comment as for solder, paste, Sn63Pb37, for electronics industry)
- solder, bar, Sn63Pb37, for electronics industry: 0.000172264 kg; source Alvarado Ascencio C. 2005; lognormal variance with pedigree 0.0513, pedigree (2,3,5,3,1)
  EcoSpold01Location=GLO
  Estimation, based on literature reporting values from several different PWB mounting trials on laboratory scale.
  Uncertainty: data from literature
- flux, for wave soldering: 1.61095e-5 kg; source Geibig J. R. 2005; lognormal variance with pedigree 0.0513, pedigree (2,3,5,3,1)
  EcoSpold01Location=GLO
  Literature Value.
  Uncertainty: data from literature
- nitrogen, liquid: 0.00182765, 0.00662436 kg (2 suppliers, which the file names only by identifier); sum of these 0.00845201 kg; source Theriault M. 2002; lognormal variance with pedigree 0.0513, pedigree (2,3,5,3,1)
  Literature Value.
  EcoSpold01Location=RER
  Uncertainty: data from literature
- solder, bar, Sn95.5Ag3.9Cu0.6, for electronics industry: 6.18236e-5 kg; source Alvarado Ascencio C. 2005; lognormal variance with pedigree 0.0513, pedigree (2,3,5,3,1)
  EcoSpold01Location=GLO
  Estimation, assuming an output of ca. 9’200 m2 or 37’000 kg per year over a time span of 25 years.
  Uncertainty: data from literature
- monoethanolamine: 6.17315e-7 kg; source Alvarado Ascencio C. 2005; lognormal variance with pedigree 0.0513, pedigree (2,3,5,3,1)
  EcoSpold01Location=RER
  Proxy with Estimation, to represent amines monoethanolamine is used, based on literature.
  Further references:
  Geibig J. R. and Socolof M. L. (2005) Solders in Electronics: A Life-Cycle Assessment. US EPA, Cincinnati (OH, USA)
  Uncertainty: data from literature
- heat, district or industrial, natural gas: 0.0112043 MJ; source Alvarado Ascencio C. 2005; lognormal variance with pedigree 0.0513, pedigree (2,3,5,3,1)
  EcoSpold01Location=RER
  Literature Value.
  Uncertainty: data from literature
- rosin size, for paper production: 3.13821e-6, 6.56542e-6 kg (2 suppliers, which the file names only by identifier); sum of these 9.70363e-6 kg; source Alvarado Ascencio C. 2005; lognormal variance with pedigree 0.0513, pedigree (2,3,5,3,1)
  Estimation, based on literature.
  Further references:
  Geibig J. R. and Socolof M. L. (2005) Solders in Electronics: A Life-Cycle Assessment. US EPA, Cincinnati (OH, USA)
  EcoSpold01Location=RER
  Uncertainty: data from literature
- isopropanol: 1.68843e-6, 8.0152e-6 kg (2 suppliers, which the file names only by identifier); sum of these 9.70363e-6 kg; source Alvarado Ascencio C. 2005; lognormal variance with pedigree 0.0513, pedigree (2,3,5,3,1)
  EcoSpold01Location=RER
  Proxy with Estimation, to represent solvents, isopropanol is used, based on literature.
  Further references:
  Geibig J. R. and Socolof M. L. (2005) Solders in Electronics: A Life-Cycle Assessment. US EPA, Cincinnati (OH, USA)
  Uncertainty: data from literature
- formic acid: 6.25458e-7, 4.034e-7 kg (2 suppliers, which the file names only by identifier); sum of these 1.02886e-6 kg; source Alvarado Ascencio C. 2005; lognormal variance with pedigree 0.0513, pedigree (2,3,5,3,1)
  Proxy with Estimation, to represent carboxylic acid, formic acid is used, based on literature.
  Further references:
  Geibig J. R. and Socolof M. L. (2005) Solders in Electronics: A Life-Cycle Assessment. US EPA, Cincinnati (OH, USA)
  EcoSpold01Location=RER
  Uncertainty: data from literature
- waste, from silicon wafer production, inorganic: -3.16574e-7 kg; source CPM 2006; lognormal variance with pedigree 0.0527, pedigree (2,4,5,3,1)
  EcoSpold01Location=CH
  Estimation, an average of 4.8 kg of non-used raw materials per kg of transistors is taken from literature. The split has been done based on literature and own assumption.
  Further references:
  exact (1998) Simplified LCA für Elektronikbauteile. International Exchange of Electronic Component Technology and Test Data, IG exact Schweiz, Arbeitsgruppe Umweltfragen
  Uncertainty: estimation, based on total waste amount from 1 literature source
  production volume 0.01 kg
- electronic component factory: 6.33147e-13 unit; lognormal variance with pedigree 0.5761, pedigree (4,5,5,3,5)
  EcoSpold01Location=GLO
  Proxy. Due to a lack of more specific information, the infrastructure module representing an electronic component production plant, was used.
  Uncertainty: rough assumption
- chemical, organic: 1.20298e-5 kg; source CPM 2006; lognormal variance with pedigree 0.0527, pedigree (2,4,5,3,1)
  EcoSpold01Location=GLO
  Estimation, average input based on literature.
  Further references:
  exact (1998) Simplified LCA für Elektronikbauteile. International Exchange of Electronic Component Technology and Test Data, IG exact Schweiz, Arbeitsgruppe Umweltfragen
  Uncertainty: value from 1 literature source
- wastewater, average: -5.77676e-8, -6.24937e-9, -1.20862e-7 m3 (3 suppliers, which the file names only by identifier); sum of these -1.84879e-7 m3; lognormal variance with pedigree 0.0527, pedigree (2,4,5,3,1)
  Estimation, due to a lack of respective emission information.
  EcoSpold01Location=CH
  Uncertainty: estimation, based on total waste amount from 1 literature source
  production volume 0.00584 m3
- waste plastic, mixture: -7.37415e-6, -5.68504e-7, -2.34812e-7, -2.22976e-7, -8.50848e-6, -9.48615e-8, -4.2995e-8, -5.95641e-5 kg (8 suppliers, which the file names only by identifier); sum of these -7.66108e-5 kg; source CPM 2006; lognormal variance with pedigree 0.0527, pedigree (2,4,5,3,1)
  Estimation, an average of 4.8 kg of non-used raw materials per kg of transistors is taken from literature. The waste amount split was based on literature and own assumption.
  Further references:
  exact (1998) Simplified LCA für Elektronikbauteile. International Exchange of Electronic Component Technology and Test Data, IG exact Schweiz, Arbeitsgruppe Umweltfragen
  EcoSpold01Location=CH
  Uncertainty: calculated from input of auxillaries
  production volume 2.42 kg
- polyethylene, low density, granulate: 0.000934428 kg; source Angel Avadí 2015; triangular min 0.000934428, mostLikely 0.000934428, max 0.000934428, pedigree (2,3,3,5,1)
  Plastic film
  Uncertainty: Data from 1 plant, assumptions for larger plants
- metal working, average for chromium steel product manufacturing: 0.00446414 kg; source Angel Avadí 2015
  Tinplate can
- fish canning plant: 8.83789e-10 unit; source Angel Avadí 2015
  One unit of plant represents the installed capacity required to process 1 t of raw material
- vegetable oil, refined: 0.0762392 kg; source Angel Avadí 2015; triangular min 0.0762392, mostLikely 0.0762392, max 0.0762392, pedigree (2,3,3,5,1)
  Oil for canned fish
  Uncertainty: Data from 1 plant, assumptions for larger plants
- carton board box production, with offset printing: 0.00514545 kg; source Angel Avadí 2015; triangular min 0.00514545, mostLikely 0.00514545, max 0.00514545, pedigree (2,3,3,5,1)
  Cardboard boxes
  Uncertainty: Data from 1 plant, assumptions for larger plants
- tin plated chromium steel sheet, 2 mm: 0.00446414 m2; source Angel Avadí 2015; triangular min 0.00446414, mostLikely 0.00446414, max 0.00446414, pedigree (2,3,3,5,1)
  Tinplate can
  Uncertainty: Data from 1 plant, assumptions for larger plants
- extrusion of plastic sheets and thermoforming, inline: 2.28653e-5 kg; source Angel Avadí 2015
  Plastic boxes
- extrusion, plastic film: 0.000966325 kg; source Angel Avadí 2015
  Plastic film
- polyethylene, high density, granulate: 5.47623e-5 kg; source Angel Avadí 2015; triangular min 5.47623e-5, mostLikely 5.47623e-5, max 5.47623e-5, pedigree (2,3,3,5,1)
  Plastic boxes
  Uncertainty: Data from 1 plant, assumptions for larger plants
- wastewater from vegetable oil refinery: -0.0098039 m3; source Avadí, A. 2018
  Proxy for wastewater from fish processing plant. Asumed 40% of the water is either incorporated into the product or lost
  production volume 3.32551e8 m3
- sodium chloride, powder: 0.089728 kg; source Angel Avadí 2015; triangular min 0.089728, mostLikely 0.089728, max 0.089728, pedigree (2,3,3,5,1)
  Salt for brine
  Uncertainty: Data from 1 plant, assumptions for larger plants
- electricity, medium voltage: 0.000553301 kWh; source Angel Avadí 2015; triangular min 0.000553301, mostLikely 0.000553301, max 0.000553301, pedigree (2,3,3,5,1)
  Electricity use for all production phases from reception/cold storage to final product
  Uncertainty: Data from 1 plant, assumptions for larger plants
- electricity, medium voltage: 0.000274222 kWh; source Angel Avadí 2015; triangular min 0.000274222, mostLikely 0.000274222, max 0.000274222, pedigree (2,3,3,5,1)
  (same comment as for electricity, medium voltage)
- electricity, medium voltage: 4.62061e-5 kWh; source Angel Avadí 2015; triangular min 4.62061e-5, mostLikely 4.62061e-5, max 4.62061e-5, pedigree (2,3,3,5,1)
  (same comment as for electricity, medium voltage)
- electricity, medium voltage: 0.00259625 kWh; source Angel Avadí 2015; triangular min 0.00259625, mostLikely 0.00259625, max 0.00259625, pedigree (2,3,3,5,1)
  (same comment as for electricity, medium voltage)
- electricity, medium voltage: 0.000927607 kWh; source Angel Avadí 2015; triangular min 0.000927607, mostLikely 0.000927607, max 0.000927607, pedigree (2,3,3,5,1)
  (same comment as for electricity, medium voltage)
- electricity, medium voltage: 3.49816e-5 kWh; source Angel Avadí 2015; triangular min 3.49816e-5, mostLikely 3.49816e-5, max 3.49816e-5, pedigree (2,3,3,5,1)
  (same comment as for electricity, medium voltage)
- electricity, medium voltage: 0.000287161 kWh; source Angel Avadí 2015; triangular min 0.000287161, mostLikely 0.000287161, max 0.000287161, pedigree (2,3,3,5,1)
  (same comment as for electricity, medium voltage)
- electricity, medium voltage: 4.38549e-5 kWh; source Angel Avadí 2015; triangular min 4.38549e-5, mostLikely 4.38549e-5, max 4.38549e-5, pedigree (2,3,3,5,1)
  (same comment as for electricity, medium voltage)
- electricity, medium voltage: 7.27283e-5 kWh; source Angel Avadí 2015; triangular min 7.27283e-5, mostLikely 7.27283e-5, max 7.27283e-5, pedigree (2,3,3,5,1)
  (same comment as for electricity, medium voltage)
- electricity, medium voltage: 1.46096e-6 kWh; source Angel Avadí 2015; triangular min 1.46096e-6, mostLikely 1.46096e-6, max 1.46096e-6, pedigree (2,3,3,5,1)
  (same comment as for electricity, medium voltage)
- electricity, medium voltage: 5.93014e-5 kWh; source Angel Avadí 2015; triangular min 5.93014e-5, mostLikely 5.93014e-5, max 5.93014e-5, pedigree (2,3,3,5,1)
  (same comment as for electricity, medium voltage)
- electricity, medium voltage: 4.16166e-5 kWh; source Angel Avadí 2015; triangular min 4.16166e-5, mostLikely 4.16166e-5, max 4.16166e-5, pedigree (2,3,3,5,1)
  (same comment as for electricity, medium voltage)
- electricity, medium voltage: 2.82326e-5 kWh; source Angel Avadí 2015; triangular min 2.82326e-5, mostLikely 2.82326e-5, max 2.82326e-5, pedigree (2,3,3,5,1)
  (same comment as for electricity, medium voltage)
- electricity, medium voltage: 2.54173e-6 kWh; source Angel Avadí 2015; triangular min 2.54173e-6, mostLikely 2.54173e-6, max 2.54173e-6, pedigree (2,3,3,5,1)
  (same comment as for electricity, medium voltage)
- electricity, medium voltage: 8.57053e-6 kWh; source Angel Avadí 2015; triangular min 8.57053e-6, mostLikely 8.57053e-6, max 8.57053e-6, pedigree (2,3,3,5,1)
  (same comment as for electricity, medium voltage)
- electricity, medium voltage: 0.00104603 kWh; source Angel Avadí 2015; triangular min 0.00104603, mostLikely 0.00104603, max 0.00104603, pedigree (2,3,3,5,1)
  (same comment as for electricity, medium voltage)
- electricity, medium voltage: 1.53488e-5 kWh; source Angel Avadí 2015; triangular min 1.53488e-5, mostLikely 1.53488e-5, max 1.53488e-5, pedigree (2,3,3,5,1)
  (same comment as for electricity, medium voltage)
- electricity, medium voltage: 0.000168785 kWh; source Angel Avadí 2015; triangular min 0.000168785, mostLikely 0.000168785, max 0.000168785, pedigree (2,3,3,5,1)
  (same comment as for electricity, medium voltage)
- electricity, medium voltage: 4.06439e-5 kWh; source Angel Avadí 2015; triangular min 4.06439e-5, mostLikely 4.06439e-5, max 4.06439e-5, pedigree (2,3,3,5,1)
  (same comment as for electricity, medium voltage)
- electricity, medium voltage: 5.577e-5 kWh; source Angel Avadí 2015; triangular min 5.577e-5, mostLikely 5.577e-5, max 5.577e-5, pedigree (2,3,3,5,1)
  (same comment as for electricity, medium voltage)
- electricity, medium voltage: 0.00389606 kWh; source Angel Avadí 2015; triangular min 0.00389606, mostLikely 0.00389606, max 0.00389606, pedigree (2,3,3,5,1)
  (same comment as for electricity, medium voltage)
- electricity, medium voltage: 2.40989e-5 kWh; source Angel Avadí 2015; triangular min 2.40989e-5, mostLikely 2.40989e-5, max 2.40989e-5, pedigree (2,3,3,5,1)
  (same comment as for electricity, medium voltage)
- electricity, medium voltage: 4.25487e-5 kWh; source Angel Avadí 2015; triangular min 4.25487e-5, mostLikely 4.25487e-5, max 4.25487e-5, pedigree (2,3,3,5,1)
  (same comment as for electricity, medium voltage)
- electricity, medium voltage: 4.28892e-5 kWh; source Angel Avadí 2015; triangular min 4.28892e-5, mostLikely 4.28892e-5, max 4.28892e-5, pedigree (2,3,3,5,1)
  (same comment as for electricity, medium voltage)
- electricity, medium voltage: 0.000387816 kWh; source Angel Avadí 2015; triangular min 0.000387816, mostLikely 0.000387816, max 0.000387816, pedigree (2,3,3,5,1)
  (same comment as for electricity, medium voltage)
- electricity, medium voltage: 0.00286234 kWh; source Angel Avadí 2015; triangular min 0.00286234, mostLikely 0.00286234, max 0.00286234, pedigree (2,3,3,5,1)
  (same comment as for electricity, medium voltage)
- electricity, medium voltage: 0.041501 kWh; source Angel Avadí 2015; triangular min 0.041501, mostLikely 0.041501, max 0.041501, pedigree (2,3,3,5,1)
  (same comment as for electricity, medium voltage)
- electricity, medium voltage: 0.0134755 kWh; source Angel Avadí 2015; triangular min 0.0134755, mostLikely 0.0134755, max 0.0134755, pedigree (2,3,3,5,1)
  (same comment as for electricity, medium voltage)
- electricity, medium voltage: 0.0194605 kWh; source Angel Avadí 2015; triangular min 0.0194605, mostLikely 0.0194605, max 0.0194605, pedigree (2,3,3,5,1)
  (same comment as for electricity, medium voltage)
- water, completely softened: 6.78687 kg; source Angel Avadí 2015; triangular min 6.78687, mostLikely 6.78687, max 6.78687, pedigree (2,3,3,5,1)
  Soft water for process
  Uncertainty: Data from 1 plant, assumptions for larger plants
- water, completely softened: 9.44257 kg; source Angel Avadí 2015; triangular min 9.44257, mostLikely 9.44257, max 9.44257, pedigree (2,3,3,5,1)
  Soft water for process
  Uncertainty: Data from 1 plant, assumptions for larger plants
- waste polyethylene, for recycling, unsorted: -4.45272e-6, -0.00147953, -0.000448491 kg (3 suppliers, which the file names only by identifier); sum of these -0.00193248 kg; source Avadí, A. 2018
  Waste PET from crates and packaging
  production volume 3.629e7 kg
- heat, district or industrial, other than natural gas: 0.0126621 MJ; source Angel Avadí 2015; triangular min 0.0126621, mostLikely 0.0126621, max 0.0126621, pedigree (2,3,3,5,1)
  Industrial heat for cooking/sterilisation
  Uncertainty: Data from 1 plant, assumptions for larger plants
- heat, district or industrial, other than natural gas: 0.758943 MJ; source Angel Avadí 2015; triangular min 0.758943, mostLikely 0.758943, max 0.758943, pedigree (2,3,3,5,1)
  (same comment as for heat, district or industrial, other than natural gas)
- operation, reefer, freezing: 0.25553 kg*day; source Angel Avadí 2014; triangular min 0.25553, mostLikely 0.25553, max 0.25553, pedigree (2,3,3,5,1)
  Proxy for ice use
  Uncertainty: Data from 1 plant, assumptions for larger plants
- electricity, medium voltage: 6.45295e-5 kWh; source Angel Avadí 2014; triangular min 6.45295e-5, mostLikely 6.45295e-5, max 6.45295e-5, pedigree (2,3,3,5,1)
  (same comment as for electricity, medium voltage)
- polyethylene terephthalate, granulate, amorphous: 0.000943287 kg; source Angel Avadí 2014; triangular min 0.000943287, mostLikely 0.000943287, max 0.000943287, pedigree (2,3,3,5,1)
  Plastic barrels
  Uncertainty: Data from 1 plant, assumptions for larger plants
- sheet rolling, aluminium: 0.00265144 kg; source Angel Avadí 2014
  Aluminium cans
- thermoforming of plastic sheets: 0.000943287 kg; source Angel Avadí 2014
  Plastic barrels
- packaging film, low density polyethylene: 0.000143869 kg; source Angel Avadí 2014; triangular min 0.000143869, mostLikely 0.000143869, max 0.000143869, pedigree (2,3,3,5,1)
  Plastic bags
  Uncertainty: Data from 1 plant, assumptions for larger plants
- waste packaging glass, unsorted: -0.00697746 kg; source Avadí, A. 2018
  Waste packaging glass
  production volume 4.48743e7 kg
- packaging glass, white: 0.00697746 kg; source Angel Avadí 2014; triangular min 0.00697746, mostLikely 0.00697746, max 0.00697746, pedigree (2,3,3,5,1)
  Glass containers
  Uncertainty: Data from 1 plant, assumptions for larger plants
- fish curing plant: 1.81301e-9 unit; source Angel Avadí 2014
  (same comment as for fish canning plant)
- heat, district or industrial, natural gas: 0.00150189 MJ; source Angel Avadí 2014; triangular min 0.00150189, mostLikely 0.00150189, max 0.00150189, pedigree (2,3,3,5,1)
  Industrial heat, for sterilisation
  Uncertainty: Data from 1 plant, assumptions for larger plants
- heat, district or industrial, natural gas: 0.0342493 MJ; source Angel Avadí 2014; triangular min 0.0342493, mostLikely 0.0342493, max 0.0342493, pedigree (2,3,3,5,1)
  (same comment as for heat, district or industrial, natural gas)

## Inputs from nature
- Oxygen [natural resource, in air]: 0 kg; pedigree (1,1,1,1,1)
  Oxygen from ambient air needed to combust and oxidise this waste. Net demand, i.e. without O2 leaving the plant in flue gas uncombusted.
  Uncertainty: uncertainty is calculated from uncertainties in waste composition and transfer coefficients to flue gas and soild residues in incinerator
- Water, cooling, unspecified natural origin [natural resource, in water]: 4.62198e-8 m3; source CPM 2006; lognormal variance with pedigree 0.0527, pedigree (2,4,5,3,1)
  Estimation. an average water consumption of 7.3 kg per kg of transistors is considered. 20% is assumed to be used as cooling water.
  Further references:
  exact (1998) Simplified LCA für Elektronikbauteile. International Exchange of Electronic Component Technology and Test Data, IG exact Schweiz, Arbeitsgruppe Umweltfragen
  Estimation. an average water consumption of 7.3 kg per kg of transistors is considered. 20% is assumed to be used as cooling water.
  Further references:
  exact (1998) Simplified LCA für Elektronikbauteile. International Exchange of Electronic Component Technology and Test Data, IG exact Schweiz, Arbeitsgruppe Umweltfragen
  Uncertainty: estimation, based on total water amount from 1 literature source
- Water, unspecified natural origin [natural resource, in water]: 1.84879e-7 m3; source CPM 2006; lognormal variance with pedigree 0.0527, pedigree (2,4,5,3,1)
  Estimation. an average water consumption of 7.3 kg per kg of transistors is considered. 80% is assumed to be used as process water.
  Further references:
  exact (1998) Simplified LCA für Elektronikbauteile. International Exchange of Electronic Component Technology and Test Data, IG exact Schweiz, Arbeitsgruppe Umweltfragen
  Estimation. an average water consumption of 7.3 kg per kg of transistors is considered. 80% is assumed to be used as process water.
  Further references:
  exact (1998) Simplified LCA für Elektronikbauteile. International Exchange of Electronic Component Technology and Test Data, IG exact Schweiz, Arbeitsgruppe Umweltfragen
  Uncertainty: estimation, based on total water amount from 1 literature source

## Emissions to nature
- Heat, waste [air, urban air close to ground]: 0 MJ; pedigree (1,1,1,1,1)
  Waste heat generated from heating value of this waste plus any electricity required to process it.
  Uncertainty: uncertainty is calculated from uncertainties in waste composition and uncertainties in energy efficiency and the uncertainty in internal energy demand
- Aluminium [water, ground-, long-term]: 0 kg; pedigree (1,1,1,1,1)
  Long-term emissions from landfilling of incineration residues.
  Uncertainty: uncertainty is calculated from uncertainties in waste composition and transfer coefficients in incinerator and landfills.
- Chloride [water, ground-, long-term]: 0 kg; pedigree (1,1,1,1,1)
  (same comment as for Aluminium)
- Arsenic, ion [water, surface water]: 0 kg
  Emissions to water from waste composition and transfer coefficients in incinerator and landfills.
- Chloride [water, surface water]: 0 kg; pedigree (1,1,1,1,1)
  Emissions to water from waste composition and transfer coefficients in incinerator and landfills.
  Uncertainty: uncertainty is calculated from uncertainties in waste composition and transfer coefficients in incinerator and landfills
- Calcium, ion [water, ground-, long-term]: 0 kg; pedigree (1,1,1,1,1)
  (same comment as for Aluminium)
- Aluminium [water, surface water]: 0 kg; pedigree (1,1,1,1,1)
  (same comment as for Chloride)
- Tin [air, urban air close to ground]: 6.11142e-8 kg; lognormal variance with pedigree 0.56663, pedigree (1,1,3,1,1)
  Emission to air from waste composition and transfer coefficients.
  Uncertainty: uncertainty is calculated from uncertainties in waste composition and transfer coefficients in incinerator
- Iron, ion [water, ground-, long-term]: 0 kg; pedigree (1,1,1,1,1)
  (same comment as for Aluminium)
- Calcium, ion [water, surface water]: 0 kg; pedigree (1,1,1,1,1)
  (same comment as for Chloride)
- Benzo(a)pyrene [air, urban air close to ground]: 0 kg; pedigree (1,1,1,1,1)
  Incomplete combustion product emitted to air.
  Uncertainty: uncertainty calculated from uncertainty in average operation emissions, and the uncertainty of the flue gas volume from this waste.
- Ammonia [air, urban air close to ground]: 0 kg; pedigree (1,1,1,1,1)
  Nitrogen species emitted to air after DeNOx stage.
  Uncertainty: uncertainty calculated from uncertainty in average N-emissions and uncertainty in the share of thermal NOx and the uncertainty in nitrogen content in *this* waste.
- Silicon [water, ground-, long-term]: 0 kg; pedigree (1,1,1,1,1)
  (same comment as for Aluminium)
- Iron, ion [water, surface water]: 0 kg; pedigree (1,1,1,1,1)
  (same comment as for Chloride)
- Heat, waste [water, surface water]: 0 MJ; pedigree (1,1,1,1,1)
  (same comment as for Heat, waste)
- Nitrogen oxides [air, urban air close to ground]: 0 kg; pedigree (1,1,1,1,1)
  Sum of fuel-Nox and thermal-NOx emitted to air after DeNOx stage.
  Uncertainty: uncertainty calculated from uncertainty in average N-emissions and uncertainty in the share of thermal NOx and the uncertainty in nitrogen content in *this* waste.
- Thallium [water, ground-, long-term]: 0 kg; pedigree (1,1,1,1,1)
  (same comment as for Aluminium)
- Silicon [water, surface water]: 0 kg; pedigree (1,1,1,1,1)
  (same comment as for Chloride)
- Methane, fossil [air, urban air close to ground]: 0 kg; pedigree (1,1,1,1,1)
  (same comment as for Benzo(a)pyrene)
- Zinc, ion [water, ground-, long-term]: 0 kg; pedigree (1,1,1,1,1)
  (same comment as for Aluminium)
- Thallium [water, surface water]: 0 kg; pedigree (1,1,1,1,1)
  (same comment as for Chloride)
- Water [water, surface water]: 0 m3
  Process water released to surface water.
- Methane, non-fossil [air, urban air close to ground]: 0 kg; pedigree (1,1,1,1,1)
  (same comment as for Benzo(a)pyrene)
- Vanadium, ion [water, ground-, long-term]: 0 kg; pedigree (1,1,1,1,1)
  (same comment as for Aluminium)
- Zinc, ion [water, surface water]: 0 kg; pedigree (1,1,1,1,1)
  (same comment as for Chloride)
- Carbon monoxide, fossil [air, urban air close to ground]: 0 kg; pedigree (1,1,1,1,1)
  (same comment as for Benzo(a)pyrene)
- Tin, ion [water, ground-, long-term]: 0 kg; pedigree (1,1,1,1,1)
  (same comment as for Aluminium)
- Vanadium, ion [water, surface water]: 0 kg; pedigree (1,1,1,1,1)
  (same comment as for Chloride)
- Carbon monoxide, non-fossil [air, urban air close to ground]: 0 kg; pedigree (1,1,1,1,1)
  (same comment as for Benzo(a)pyrene)
- Antimony [water, ground-, long-term]: 0 kg; pedigree (1,1,1,1,1)
  (same comment as for Aluminium)
- Tin, ion [water, surface water]: 0 kg; pedigree (1,1,1,1,1)
  (same comment as for Chloride)
- Phenol, pentachloro- [air, urban air close to ground]: 0 kg; pedigree (1,1,1,1,1)
  (same comment as for Benzo(a)pyrene)
- Lead [water, ground-, long-term]: 0 kg; pedigree (1,1,1,1,1)
  (same comment as for Aluminium)
- Antimony [water, surface water]: 0 kg; pedigree (1,1,1,1,1)
  (same comment as for Chloride)
- Benzene, hexachloro- [air, urban air close to ground]: 0 kg; pedigree (1,1,1,1,1)
  (same comment as for Benzo(a)pyrene)
- Nickel, ion [water, ground-, long-term]: 0 kg; pedigree (1,1,1,1,1)
  (same comment as for Aluminium)
- Lead [water, surface water]: 0 kg; pedigree (1,1,1,1,1)
  (same comment as for Chloride)
- Benzene, pentachloro- [air, urban air close to ground]: 0 kg; pedigree (1,1,1,1,1)
  (same comment as for Benzo(a)pyrene)
- Manganese [water, ground-, long-term]: 0 kg; pedigree (1,1,1,1,1)
  (same comment as for Aluminium)
- Nickel, ion [water, surface water]: 0 kg; pedigree (1,1,1,1,1)
  (same comment as for Chloride)
- Toluene [air, urban air close to ground]: 0 kg; pedigree (1,1,1,1,1)
  (same comment as for Benzo(a)pyrene)
- Mercury [water, ground-, long-term]: 0 kg; pedigree (1,1,1,1,1)
  (same comment as for Aluminium)
- Manganese [water, surface water]: 0 kg; pedigree (1,1,1,1,1)
  (same comment as for Chloride)
- Benzene [air, urban air close to ground]: 0 kg; pedigree (1,1,1,1,1)
  (same comment as for Benzo(a)pyrene)
- Copper, ion [water, ground-, long-term]: 0 kg; pedigree (1,1,1,1,1)
  (same comment as for Aluminium)
- Mercury [water, surface water]: 0 kg; pedigree (1,1,1,1,1)
  (same comment as for Chloride)
- Water [air, urban air close to ground]: 0 m3
  Water vapour from waste humidity, hydrogen oxidation and part of the process water.
- Dioxins, measured as 2,3,7,8-tetrachlorodibenzo-p-dioxin [air, urban air close to ground]: 0 kg; pedigree (1,1,1,1,1)
  (same comment as for Benzo(a)pyrene)
- Chromium VI [water, ground-, long-term]: 0 kg; pedigree (1,1,1,1,1)
  (same comment as for Aluminium)
- Copper, ion [water, surface water]: 0 kg; pedigree (1,1,1,1,1)
  (same comment as for Chloride)
- Particulates, > 2.5 um, and < 10um [air, urban air close to ground]: 1.47322e-7 kg; lognormal variance with pedigree 0.67603, pedigree (1,1,3,1,1)
  (same comment as for Benzo(a)pyrene)
- Cobalt [water, ground-, long-term]: 0 kg; pedigree (1,1,1,1,1)
  (same comment as for Aluminium)
- Chromium VI [water, surface water]: 0 kg; pedigree (1,1,1,1,1)
  (same comment as for Chloride)
- Particulates, < 2.5 um [air, urban air close to ground]: 1.14584e-7 kg; lognormal variance with pedigree 1.05, pedigree (1,1,3,1,1)
  (same comment as for Benzo(a)pyrene)
- Cadmium, ion [water, ground-, long-term]: 0 kg; pedigree (1,1,1,1,1)
  (same comment as for Aluminium)
- Cobalt [water, surface water]: 0 kg; pedigree (1,1,1,1,1)
  (same comment as for Chloride)
- NMVOC, non-methane volatile organic compounds, unspecified origin [air, urban air close to ground]: 1.20298e-5 kg; lognormal variance with pedigree 0.46053, pedigree (1,1,3,1,1)
  (same comment as for Benzo(a)pyrene)
- Arsenic, ion [water, ground-, long-term]: 0 kg; pedigree (1,1,1,1,1)
  (same comment as for Aluminium)
- Cadmium, ion [water, surface water]: 0 kg; pedigree (1,1,1,1,1)
  (same comment as for Chloride)
- Arsenic, ion [water, unspecified]: 4.10487e-9 kg
  (same comment as for integrated circuit, logic type)
- Arsenic [air, unspecified]: 2.89453e-10 kg
  (same comment as for integrated circuit, logic type)
- Lead [air, unspecified]: 8.16407e-10 kg
  (same comment as for integrated circuit, logic type)
- Lead [soil, unspecified]: 6.85097e-12 kg
  (same comment as for integrated circuit, logic type)
- Arsenic [soil, unspecified]: 1.14183e-12 kg
  (same comment as for integrated circuit, logic type)
- Lead [water, unspecified]: 1.97536e-8 kg
  (same comment as for integrated circuit, logic type)
- Mercury [air, urban air close to ground]: 2.85457e-9 kg; lognormal variance with pedigree 0.0512, pedigree (1,4,4,4,2)
  (same comment as for integrated circuit, logic type)
- Formaldehyde [air, urban air close to ground]: 5.25827e-7 kg; lognormal variance with pedigree 0.1787, pedigree (4,3,5,3,1)
  Estimation, based on the assumption that 100% of the non-metal parts of the solder paste are emitted during the reflow heating as emissions to air.
  Uncertainty: calculated from input of flux material
- 2-Propanol [air, urban air close to ground]: 1.66353e-5 kg; lognormal variance with pedigree 0.1787, pedigree (4,3,5,3,1)
  (same comment as for Formaldehyde)
- Formic acid [air, urban air close to ground]: 5.43423e-8 kg; lognormal variance with pedigree 0.1787, pedigree (4,3,5,3,1)
  (same comment as for Formaldehyde)
- Monoethanolamine [air, urban air close to ground]: 3.26054e-8 kg; lognormal variance with pedigree 0.1787, pedigree (4,3,5,3,1)
  (same comment as for Formaldehyde)
- Lead [air, urban air close to ground]: 5.8197e-8 kg; source Alvarado Ascencio C. 2005; lognormal variance with pedigree 0.0913, pedigree (2,3,5,3,1)
  Literature Value.
  Uncertainty: data from literature
- Particulates, > 10 um [air, urban air close to ground]: 6.54765e-8 kg; source Alvarado Ascencio C. 2005; lognormal variance with pedigree 0.3513, pedigree (2,3,5,3,1)
  Literature Value.
  Uncertainty: data from literature
- Water [air, unspecified]: 2.91878e-8 m3; lognormal variance with pedigree 0.0807, pedigree (2,2,5,1,1)
  Calculated value based on literature values and expert opinion. See comments in the parametres' comment field.
- Water [water, unspecified]: 1.7032e-8 m3; lognormal variance with pedigree 0.0807, pedigree (2,2,5,1,1)
  (same comment as for Water)
- BOD5, Biological Oxygen Demand [water, unspecified]: 5.94497e-6 kg; source Angel Avadí 2015; triangular min 5.94497e-6, mostLikely 5.94497e-6, max 5.94497e-6, pedigree (2,3,3,5,1)
  Emissions to water from process waters
  Uncertainty: Data from 1 plant, assumptions for larger plants
- TOC, Total Organic Carbon [water, unspecified]: 9.45098e-6 kg; source Angel Avadí 2015; triangular min 9.45098e-6, mostLikely 9.45098e-6, max 9.45098e-6, pedigree (2,3,3,5,1)
  (same comment as for BOD5, Biological Oxygen Demand)
- COD, Chemical Oxygen Demand [water, unspecified]: 3.70418e-5 kg; source Angel Avadí 2015; triangular min 3.70418e-5, mostLikely 3.70418e-5, max 3.70418e-5, pedigree (2,3,3,5,1)
  (same comment as for BOD5, Biological Oxygen Demand)
- DOC, Dissolved Organic Carbon [water, unspecified]: 9.45098e-6 kg; source Angel Avadí 2015
  Emissions to water from process waters
- Phosphorus [water, unspecified]: 0.000141255 kg; source Angel Avadí 2014; triangular min 0.000141255, mostLikely 0.000141255, max 0.000141255, pedigree (2,3,3,5,1)
  Uncertainty: Data from 1 plant, assumptions for larger plants
- Nitrogen [water, unspecified]: 0.000682506 kg; source Angel Avadí 2014; triangular min 0.000682506, mostLikely 0.000682506, max 0.000682506, pedigree (2,3,3,5,1)
  Uncertainty: Data from 1 plant, assumptions for larger plants
