# printer production, laser, black/white

Dataset: EcoSpold 2, unit process
Geography: GLO
Time period: 2001-01-01 to 2019-12-31
Technology level: current
Classification: EcoSpold01Categories: electronics/devices
Classification: ISIC rev.4 ecoinvent: 2620:Manufacture of computers and peripheral equipment
Scenario: Business-as-Usual
System model: Allocation at the point of substitution
Generated by: Martin Lehmann
Published in: Hischier R. 2007
Database: ecoinvent
isCopyrightProtected: false
accessRestrictedTo: 1

## General comment
This dataset represents the production of 1 laser black/white jet printer. It is based on a typical laser black/white jet printer in the last 3 years before the reference year 2005, used at home or in small offices, with a total weight of 4.61 kg. The total weight of the packaging is 1.6 kg, mainly cardboard, some polystyrene and polyethylene foil. The information is based on an Environmental Product Declaration data sheet describing an Electrophotographic and Inkjet printer of a leading producer. The integrated toner module (b/w) is represented by an ecoinvent dataset.
Reccomended printing volume for this kind of printer is 20,000 pages/months (http://www.epson.de/de/en/viewcon/corporatesite/products/mainunits/specs/9538).

## Included activities start
From reception of raw materials and auxiliares at the factory gate.

## Included activities end
This dataset includes materials (mainly metals and plastics) with their respective manufacturing processes (e.g. sheet rolling, die-casting). Further inventoried is the infrastructure (factory), the consumption of ground water, the electricity for the assembly of the laser printer, the water consumption and industrial waste water, the packaging, plus the disposal of the laser printer.

## Geography
The data is based on information by Ecoleaf Jemai (Japan Environmental Management Association for Industry) describing a typical printer produced by a leading international printer manufacturer. Such a printer may be assembled anywhere in the world. Therefore a global dataset is justifiable.

## Technology
The production of a laser printer includes the metal processing steps sheet rolling (steel, copper), section bar extrusion (aluminium) and die-casting (magnesium). Plastic parts are blow moulded or injection moulded into required shapes.

## Parameters
- fraction, tap water, to air: 0.061; name fraction_TW_to_air; = fraction_PW_to_air; lognormal variance with pedigree 0.092025, pedigree (4,4,3,2,4)
  Calculated value. See comment in the other parametres present in this dataset. Tap water is considered to be always used as process water, thus process water fractions to air are applied to all tap water input flows to calculate the amount of water consumed in the processes.
- fraction, process water, to air: 0.061 dimensionless; name fraction_PW_to_air; lognormal variance with pedigree 0.092025, pedigree (4,4,3,2,4)
  Literature value (Statistics Canada, 2007 & Shaffer, K.H., 2008, Consumptive water use in the Great Lakes Basin, USGS) (Vionnet, S., Quantis Water Database - Technical Report, 2012).

## Reference product
- printer, laser, black/white: 1 unit; name printer_laser_BW; CPC 45264: Laser printers used with data processing machines; By-product classification allocatable product
  EcoSpold01Location=GLO
  A laser jet printer works after the technology of a photocopier, as they employ a xerographic printing process. Still, they differ from analogue photocopiers in that the image is produced by the direct scanning of a laser beam across the printer’s photoreceptor.
  Unlike impact printers, laser printers can mix text and graphics, including varied fonts and character sizes, and halftone images. Laser printers use toner, a black or coloured powder, rather than liquid ink.
  The internal components of a laser jet printer vary in shape and size depending on the brand looked at. Still, the major functional parts are the same in most of the printers with the same technology.
  production volume 1.56804e7 unit; name printer_laser_BW_PV
    Literature value and estimate. From UN data. Commodity: 'Printers'. 50% is assumed to be black-white and 50% colour.
  property price 46.6 EUR2005; name printer_laser_BW_price_EUR2005
    EU price used
  property carbon content, fossil 0.571055
    Calculated as the addition of C contents in the product composition, then referred to 1 kg DM
  property carbon content 0.571055
    carbon content on a dry matter basis (reserved; not for manual entry)
  property true value 46.6; name printer_laser_BW_true_value
    allocation property applied in "true value" allocation // value calculated from revenue
  properties: water content 0, dry mass 6 kg, wet mass 6 kg, carbon content, non-fossil 0, water in wet mass 0 kg, carbon allocation 3.42633 kg

## By-products
- iron scrap, sorted, pressed: 0 kg; By-product classification Recyclable; CPC 39310: Slag, dross, scalings and other waste from the manufacture of iron or steel; pedigree (1,1,1,1,1)
  replaces the original flow "Fe fraction of used printer, laser, from mechanical treatment"
  production volume 9.03895e6 kg
  property wet mass 1 kg; name WM
  property carbon content, non-fossil 0; name C_content_non_fossil
  property carbon content, fossil 0; name C_content_fossil
  property dry mass 1 kg; name DM
  property water in wet mass 0 kg; name WWM
  property price 0.175 EUR2005
    Temporary price data. Calculated as 90% of purchasers price based on: 2005 import and export prices (total trades (USD) divided by total weight (kg) in biggest economies of the world: EU27, USA, Brasil, China, India, Japan and Russia) from UN Commodity Trade Statistics Database (http://data.un.org/Explorer.aspxDatabase [Accessed 2011.06.20]). Commodity: Waste or scrap, of cast iron
  property water content 0; name water_content
  property carbon content 0
    carbon content on a dry matter basis (reserved; not for manual entry)
  property true value 0.100878
    allocation property applied in "true value" allocation // value calculated from revenue
  properties: carbon allocation 0 kg
- lead: 0 kg; CPC 41441: Lead, unwrought; By-product classification allocatable product
  EcoSpold01Location=SE
  production volume 87091 kg
  property price 0.744 EUR2005
    Temporary price data. Calculated as 90% of purchasers price based on: Source: ecoinvent v2 report 10-part IX, Tab 5.10 & 2.5
  property carbon content 0
    carbon content on a dry matter basis (reserved; not for manual entry)
  property true value 0.00413226
    allocation property applied in "true value" allocation // value calculated from revenue
  properties: wet mass 1 kg, water content 0, carbon content, non-fossil 0, carbon content, fossil 0, dry mass 1 kg, water in wet mass 0 kg, carbon allocation 0 kg
- copper: 0 kg; By-product classification allocatable product; CPC 41413: Refined copper and copper alloys, unwrought; master alloys of copper
  EcoSpold01Location=SE
  production volume 2.60024e6 kg
  properties: water content 0, water in wet mass 0 kg, carbon content, fossil 0, carbon content, non-fossil 0, dry mass 1 kg, wet mass 1 kg, price 5.52 EUR2005, carbon content 0, carbon allocation 0 kg, true value 0.915366
- nickel, 99.5%: 0 kg; CPC 41422: Unwrought nickel; By-product classification allocatable product
  EcoSpold01Location=SE
  production volume 181800 kg
  property price 10.4 EUR2005
    Temporary price data. Calculated as 90% of purchasers price based on: 2004 nickel price from USGS (2007) Mineral commodity summaries 2007. <http://minerals.usgs.gov/minerals/pubs/mcs/2007/mcs2007.pdf> [Accessed 25 May 2010]
  property carbon content 0
    carbon content on a dry matter basis (reserved; not for manual entry)
  property true value 0.120578
    allocation property applied in "true value" allocation // value calculated from revenue
  properties: water in wet mass 0 kg, wet mass 1 kg, carbon content, non-fossil 0, dry mass 1 kg, water content 0, carbon content, fossil 0, carbon allocation 0 kg
- silver: 0 kg; CPC 41310: Silver (including silver plated with gold or platinum), unwrought or in semi-manufactured forms, or in powder […]; By-product classification allocatable product; CAS 7440-22-4
  EcoSpold01Location=SE
  production volume 30022.5 kg
  property price 178 EUR2005
    (same comment as for lead)
  property carbon content 0
    carbon content on a dry matter basis (reserved; not for manual entry)
  property true value 0.340807
    allocation property applied in "true value" allocation // value calculated from revenue
  properties: wet mass 1 kg, carbon content, non-fossil 0, dry mass 1 kg, water content 0, carbon content, fossil 0, water in wet mass 0 kg, carbon allocation 0 kg
- palladium: 0 kg; CPC 4160: Other non-ferrous metals and articles thereof (including waste and scrap of some metals); cermets and articles […]; By-product classification allocatable product
  EcoSpold01Location=SE
  production volume 1661.94 kg
  property price 5640 EUR2005
    Temporary price data. Calculated as 90% of purchasers price based on: 2004 price from USGS (2007) Mineral commodity summaries 2007. <http://minerals.usgs.gov/minerals/pubs/mcs/2007/mcs2007.pdf> [Accessed 25 May 2010]
  property carbon content 0
    carbon content on a dry matter basis (reserved; not for manual entry)
  property true value 0.597773
    allocation property applied in "true value" allocation // value calculated from revenue
  properties: wet mass 1 kg, carbon content, fossil 0, water in wet mass 0 kg, water content 0, carbon content, non-fossil 0, dry mass 1 kg, carbon allocation 0 kg
- gold: 0 kg; CPC 41320: Gold (including gold plated with platinum), unwrought or in semi-manufactured forms, or in powder form; By-product classification allocatable product; CAS 7440-57-5
  EcoSpold01Location=SE
  production volume 911.402 kg
  property price 10600 EUR2005
    Temporary price data. Calculated as 90% of purchasers price based on: Source: ecoinvent v2 report 10-part IX, Tab 2.5
  property carbon content 0
    carbon content on a dry matter basis (reserved; not for manual entry)
  property true value 0.616109
    allocation property applied in "true value" allocation // value calculated from revenue
  properties: wet mass 1 kg, carbon content, fossil 0, dry mass 1 kg, carbon content, non-fossil 0, water content 0, water in wet mass 0 kg, carbon allocation 0 kg
- electricity, for reuse in municipal waste incineration only: 0 kWh; CPC 17100: Electrical energy; By-product classification allocatable product; pedigree (1,1,1,1,1)
  Net electricity generated from this waste and used in internal MSWI plant energy redistribution.
  Uncertainty: uncertainty is calculated from uncertainties in waste composition and uncertainties in energy efficiency and the uncertainty in internal energy demand
  production volume 6.02361e7 kWh
  property price 0.1 EUR2005; name E_el_prod_MSWI_price_EUR2005
    Estimated to be the same price as in case of electricity, medium voltage.
  property exergy 3.6 MJ; name E_el_prod_MSWI_exergy
    This exergy property is based on the exergy content of the product.
  property true value relation 3.6; name E_el_prod_MSWI_true_value_relation
    property to calculate "true value" from
  property true value 0.490831
    allocation property applied in "true value" allocation // value calculated from true value relation
- heat, for reuse in municipal waste incineration only: 0 MJ; CPC 17300: Steam and hot water; By-product classification allocatable product; pedigree (1,1,1,1,1)
  Net useful heat generated from this waste and used in internal MSWI plant energy redistribution.
  Uncertainty: uncertainty is calculated from uncertainties in waste composition and uncertainties in energy efficiency and the uncertainty in internal energy demand
  production volume 4.20702e8 MJ
  property true value relation 0.1842; name E_th_prod_MSWI_true_value_relation
    property to calculate "true value" from
  property exergy 0.1842 MJ; name E_th_prod_MSWI_exergy
    This exergy property is based on the exergy content of the product.
  property price 0.0106 EUR2005; name E_th_prod_MSWI_price_EUR2005
    Average European district heat price from Ecoheatcool and Euroheat 2005-2006, Ecoheat Work package 1: The European heat market. Final report. 10.6 EUR/GJ i s the price of district heat. http://www.solarthermalworld.org/files/Ecoheatcool%20WP1%20Web.pdf?download
  property true value 0.175406
    (same comment as for electricity, for reuse in municipal waste incineration only)
- zinc concentrate: 0 kg; CPC 14290: Other non-ferrous metal ores and concentrates (other than uranium or thorium ores and concentrates); By-product classification allocatable product
  Calculated value from the knowledge of the properties of both products.
  production volume 169.99 kg
  property price 0.38 EUR2005; name ByP_price_EUR2005
    Temporary price data. Calculated as 90% of purchasers price based on: Zinc content in concentrate 53%. Concentrate price per kg Zn 86.5% of refined Zn price (13.5% treatment charges according to CHR Metals Limited 2005: Dynamic cost curves. http://www.minecost.com/dynamic.pdf). 2004 zinc price from USGS (2007) Mineral commodity summaries 2007. <http://minerals.usgs.gov/minerals/pubs/mcs/2007/mcs2007.pdf> [Accessed 25 May 2010]
  property zinc content 0.53; name zinc_C_zinc_concentrate
    Zinc content on a dry matter basis. Value taken from teh "zinc mine operation" /GLO dataset.
  property dry mass 1 kg; name DM_zinc_concentrate
  property carbon content 0
    carbon content on a dry matter basis (reserved; not for manual entry)
  property true value 4.04273e-6
    allocation property applied in "true value" allocation // value calculated from revenue
  properties: wet mass 1 kg, water content 0, carbon content, non-fossil 0, carbon content, fossil 0, water in wet mass 0 kg, carbon allocation 0 kg
- iron scrap, unsorted: 0 kg; source European Aluminium Association 2008; CPC 39310: Slag, dross, scalings and other waste from the manufacture of iron or steel; By-product classification Recyclable; pedigree (1,1,1,1,1)
  production volume 620.577 kg
  property price 0.149 EUR2005; name ironScrapAmount_price_EUR2005
    Temporary price data. Calculated as 90% of purchasers price based on: estimated at 85% of sorted scrap
  property carbon content 0
    carbon content on a dry matter basis (reserved; not for manual entry)
  property true value 5.8969e-6
    allocation property applied in "true value" allocation // value calculated from revenue
  properties: water in wet mass 0 kg, water content 0, carbon content, fossil 0, carbon content, non-fossil 0, dry mass 1 kg, wet mass 1 kg, carbon allocation 0 kg
- aluminium oxide, non-metallurgical: 0 kg; source European Aluminium Association 2008; CPC 41432: Alumina (aluminium oxide), except artificial corundum; By-product classification allocatable product; CAS 1344-28-1; pedigree (1,1,1,1,1)
  production volume 39050.6 kg
  property carbon content, non-fossil 0; name C_content_non_fossil
  property price 0.28 EUR2005; name Al2O3Amount_price_EUR2005
    From UN trade database. http://data.un.org/ Import data from the largest economies of the world are used (Brazil, India, USA, China, Japan and EU-27).
  property dry mass 1 kg; name DM
  property water content 0; name water_content
  property wet mass 1 kg; name WM
  property water in wet mass 0 kg; name WWM
  property carbon content, fossil 0; name C_content_fossil
  property carbon content 0
    carbon content on a dry matter basis (reserved; not for manual entry)
  property true value 0.000697312
    allocation property applied in "true value" allocation // value calculated from revenue
  properties: carbon allocation 0 kg
- aluminium, cast alloy: 0 kg; source European Aluminium Association 2008; By-product classification allocatable product; CPC 41431: Unwrought aluminium; pedigree (1,1,1,1,1)
  EcoSpold01Location=RER
  production volume 365036 kg
  property price 1.3 EUR2005; name castAlloyAmount_price_EUR2005
  properties: water in wet mass 0 kg, carbon content, non-fossil 0, water content 0, dry mass 1 kg, carbon content, fossil 0, wet mass 1 kg, carbon content 0, carbon allocation 0 kg, true value 0.0302636
- aluminium, wrought alloy: 0 kg; source European Aluminium Association 2008; By-product classification allocatable product; CPC 4153: Semi-finished products of aluminium or aluminium alloys; pedigree (1,1,1,1,1)
  production volume 159806 kg
  property price 1.44 EUR2005; name secondaryAluminiumOutput_price_EUR2005
  properties: wet mass 1 kg, water content 0, carbon content, fossil 0, water in wet mass 0 kg, carbon content, non-fossil 0, dry mass 1 kg, carbon content 0, carbon allocation 0 kg, true value 0.0146756
- heat, district or industrial, other than natural gas: 0 MJ; CPC 17300: Steam and hot water; By-product classification allocatable product; pedigree (1,1,1,1,1)
  net production of heat from landfill gas utilisation.
  Uncertainty: U
  production volume 0.00233984 MJ
  property price 0.0106 EUR2005
    (same comment as for heat, for reuse in municipal waste incineration only)
  property carbon content 0
    carbon content on a dry matter basis (reserved; not for manual entry)
  property true value 9.78931e-13
    (same comment as for electricity, for reuse in municipal waste incineration only)
  properties: wet mass 1 kg, water content 0, water in wet mass 0 kg, true value relation 0.1842, dry mass 1 kg, carbon content, non-fossil 0, carbon content, fossil 0, carbon allocation 0 kg
- electricity, medium voltage: 0 kWh; By-product classification allocatable product; CPC 17100: Electrical energy; pedigree (1,1,1,1,1)
  net production of electricity from landfill gas utilisation (minus electricity demand for landfill gas pumping).
  Uncertainty: U
  production volume 0.00129737 kWh
  properties: price 0.1 EUR2005, true value relation 3.6, true value 1.06082e-11

## Inputs from technosphere
- photovoltaic cell factory: 1.24245e-8 unit; lognormal variance with pedigree 0.3701, pedigree (1,4,5,3,3)
  EcoSpold01Location=DE
  Proxy with calculated value. Photovoltaic cell factory is used assuming a 25 years life-time and a production volume of 3’000’000 pieces per year.
- waste polystyrene: 0 kg; source Jemai 2005; pedigree (1,1,1,1,1)
  EcoSpold01Location=CH
  Estimation, based on literature.
  Further references:
  Hewlett Packard (2001) Environmental Profile - HP LaserJet 1200 Series Printers. Download of 07.02.14 from <http://www.hp.com/hpinfo/globalcitizenship/environment/productdata/pdf/eds_laserj_c7044a_v1.pdf>.
  production volume 0 kg
    Calculated from the production volume of printer, laser, black/white in proportion to the respective output amounts.
  properties: dry mass 0.998 kg, carbon content, fossil 0.922579, water content 0.00200401, wet mass 1 kg
- copper: 0.19392 kg; source Jemai 2005; lognormal variance with pedigree 0.0521, pedigree (1,4,5,3,1)
  Estimation, based on literature.
  EcoSpold01Location=RER
  properties: dry mass 1 kg, wet mass 1 kg
- synthetic rubber: 0.0159348 kg; source Jemai 2005; lognormal variance with pedigree 0.0701, pedigree (1,4,5,3,3)
  Literature Value.
  EcoSpold01Location=RER
  properties: carbon content, fossil 0.871949, wet mass 1 kg, dry mass 1 kg
  note on carbon content, fossil: EPDM (Ethylene-propene-diene terpolymer) rubber is a terpolymer of ethylene, propene, and a diene with the residual unsaturated portion of the diene in the side chain (ecoinvent v2.2 report 7-part XX & Ullmann). Chemical formula (deduced from Evidences of Solvent-Induced Miscibility in Polychloroprene-co-Ethylene-Propene Diene Terpolymer Blends, Dubey et al., Journal of Applied Polymer Science, 2009, 111:1884–1891): C20H35
- plug, inlet and outlet, for computer cable: 0.93186 unit; lognormal variance with pedigree 0.0521, pedigree (1,4,5,3,1)
  Measured Value.
  EcoSpold01Location=GLO
  properties: dry mass 0.0585 kg, wet mass 0.0585 kg, carbon content, fossil 0.3397
  note on carbon content, fossil: Calculated as the addition of C contents in the product composition
- polyethylene, high density, granulate: 0.0583344 kg; source Jemai 2005; lognormal variance with pedigree 0.0701, pedigree (1,4,5,3,3)
  Literature Value.
  EcoSpold01Location=RER
  properties: carbon content, fossil 0.857143, wet mass 1 kg, dry mass 1 kg
  note on carbon content, fossil: Polyethylene is formed out of a huge amount of ethylene monomers (C2H4) (ecoinvent v2.2 report 11_II). MW=28 g/mol
- wastewater, unpolluted: 0 m3; source Jemai 2005; pedigree (1,1,1,1,1)
  (same comment as for waste polystyrene)
  production volume 0 m3
    (same comment as for waste polystyrene)
  properties: water content 2962.17, carbon content, fossil 0.00178991, carbon content, non-fossil 0.00178991, wet mass 1000 kg, dry mass 0.337476 kg
  note on carbon content, fossil: Assumed to be like in tap water. Bicarbonate content is 2.93 mol/m3. CO2 content is 0.1 mol/m3 (ecoinvent v2.2 report 8, Tab 93.1).
- aluminium, wrought alloy: 0.0126099 kg; = 0.0199*0.68; lognormal variance with pedigree 0.0701, pedigree (1,4,5,3,3)
  Literature Value.
  properties: dry mass 1 kg, wet mass 1 kg
- cable, printer cable, without plugs: 1.67735 m; lognormal variance with pedigree 0.0521, pedigree (1,4,5,3,1)
  EcoSpold01Location=GLO
  Measured Value.
  properties: carbon content, fossil 0.282258, dry mass 0.072 kg, wet mass 0.072 kg
  note on carbon content, fossil: Calculated as the addition of C contents in the product composition. Then referred to 1 kg DM
- epoxy resin, liquid: 0 kg; source Jemai 2005; pedigree (1,1,1,1,1)
  Literature Value.
  EcoSpold01Location=RER
  properties: dry mass 1 kg, carbon content, fossil 0.42325, wet mass 1 kg
- magnesium: 0.0721259 kg; source Jemai 2005; lognormal variance with pedigree 0.0701, pedigree (1,4,5,3,3)
  EcoSpold01Location=RER
  Estimation, based on literature.
  properties: dry mass 1 kg, wet mass 1 kg
- waste polyethylene: 0 kg; source Jemai 2005; pedigree (1,1,1,1,1)
  Estimation, based on literature.
  Further references:
  Hewlett Packard (2001) Environmental Profile - HP LaserJet 1200 Series Printers. Download of 07.02.14 from <http://www.hp.com/hpinfo/globalcitizenship/environment/productdata/pdf/eds_laserj_c7044a_v1.pdf>.
  EcoSpold01Location=CH
  production volume 0 kg
    (same comment as for waste polystyrene)
  properties: dry mass 0.996 kg, water content 0.00401606, carbon content, fossil 0.825301, wet mass 1 kg
  note on carbon content, fossil: C content in 1 kg DM was calculated using data in Tab A.1, ecoinvent v2.2 report 13_I
- sheet rolling, copper: 0.048084 kg; source Jemai 2005; lognormal variance with pedigree 0.0701, pedigree (1,4,5,3,3)
  Estimation, based on literature.
  EcoSpold01Location=RER
- sheet rolling, steel: 0.11173 kg; source Jemai 2005; lognormal variance with pedigree 0.0701, pedigree (1,4,5,3,3)
  EcoSpold01Location=RER
  Literature Value.
- steel, low-alloyed, hot rolled: 0.0875016 kg; source Jemai 2005; lognormal variance with pedigree 0.0701, pedigree (1,4,5,3,3)
  Literature Value.
  EcoSpold01Location=RER
  properties: carbon content, fossil 0.005, wet mass 1 kg, dry mass 1 kg
  note on carbon content, fossil: Low alloyed steel composition given in Tab. 3.2 ecoinvent v2.2 report 10_partII. Steel assumed to have a C content of 0.5%
- section bar extrusion, aluminium: 0.018544 kg; source Jemai 2005; lognormal variance with pedigree 0.0701, pedigree (1,4,5,3,3)
  Literature Value.
  EcoSpold01Location=RER
- corrugated board box: 0 kg; source Jemai 2005; pedigree (1,1,1,1,1)
  Estimation, based on literature.
  Further references:
  Hewlett Packard (2001) Environmental Profile - HP LaserJet 1200 Series Printers. Download of 07.02.14 from <http://www.hp.com/hpinfo/globalcitizenship/environment/productdata/pdf/eds_laserj_c7044a_v1.pdf>.
  EcoSpold01Location=RER
  properties: carbon content, fossil 0.000486772, water content 0.0582011, carbon content, non-fossil 0.433862, wet mass 1 kg, dry mass 0.945 kg
  note on carbon content, fossil: Fossil C content was calculated after fossil C contents of chemicals used in the production of board (Tab 10-15 & 10.16 ecoinvent v2.2 report 11_III, part 10)
  note on carbon content, non-fossil: Biogenic C content was calculated after biogenic C contents of chemicals used in the production of board (Tab 10.15 & 10.16, ecoinvent v2.2 report 11_III, part 10).
- aluminium, cast alloy: 0.00593408 kg; = 0.0199*0.32; lognormal variance with pedigree 0.0701, pedigree (1,4,5,3,3)
  Literature Value.
  properties: dry mass 1 kg, wet mass 1 kg
- toner module, laser printer, black/white: 0.93186 unit; lognormal variance with pedigree 0.0521, pedigree (1,4,5,3,1)
  Measured Value.
  EcoSpold01Location=GLO
  properties: carbon content, fossil 0.510352, dry mass 1.14 kg, wet mass 1.14 kg
  note on carbon content, fossil: C content was calculated as the addition of C content in the components
- polystyrene foam slab: 0.243029 kg; source Jemai 2005; lognormal variance with pedigree 0.0521, pedigree (1,4,5,3,1)
  EcoSpold01Location=RER
  Estimation, based on literature.
  Further references:
  Hewlett Packard (2001) Environmental Profile - HP LaserJet 1200 Series Printers. Download of 07.02.14 from <http://www.hp.com/hpinfo/globalcitizenship/environment/productdata/pdf/eds_laserj_c7044a_v1.pdf>.
  properties: carbon content, fossil 0.859091, wet mass 1 kg, dry mass 1 kg
  note on carbon content, fossil: XPS consists in 91% of polystyrene, 7% of blowing agent and the re-maining 2% are flame retardants (bromine compounds) and other additives (ecoinvent v2.2 report 7, part XIV, pg69). The chemical formula of polystyrene is (C8H8)n. Here, the blowing agent is CO2.
- electricity, medium voltage: 1.55313 kWh; source Jemai 2005; lognormal variance with pedigree 0.0707, pedigree (2,4,5,3,3)
  Estimation, based on literature.
  EcoSpold01Location=UCTE
- cable, connector for computer, without plugs: 1.67735 m; source Jemai 2005; lognormal variance with pedigree 0.0521, pedigree (1,4,5,3,1)
  Measured Value.
  EcoSpold01Location=GLO
  properties: wet mass 0.065 kg, dry mass 0.065 kg, carbon content, fossil 0.359823
- stretch blow moulding: 0.0583344 kg; source Jemai 2005; lognormal variance with pedigree 0.0701, pedigree (1,4,5,3,3)
  EcoSpold01Location=RER
  Literature Value.
- packaging film, low density polyethylene: 0.0328015 kg; source Jemai 2005; lognormal variance with pedigree 0.0521, pedigree (1,4,5,3,1)
  (same comment as for corrugated board box)
  properties: carbon content, fossil 0.857143, dry mass 1 kg, wet mass 1 kg
- steel, chromium steel 18/8, hot rolled: 1.19837 kg; source Jemai 2005; lognormal variance with pedigree 0.0521, pedigree (1,4,5,3,1)
  Literature Value.
  EcoSpold01Location=RER
  properties: wet mass 1 kg, carbon content, fossil 0.0008, dry mass 1 kg
  note on carbon content, fossil: Stainless steel model is the grade 304 steel (18/8 stainless, 18% chromium 8% nickel; max. 0.08% C)
- magnesium-alloy, AZ91, diecast: 0.0721259 kg; source Jemai 2005; lognormal variance with pedigree 0.0701, pedigree (1,4,5,3,3)
  Estimation, based on literature.
  EcoSpold01Location=RER
  properties: wet mass 1 kg, dry mass 1 kg
- plug, inlet and outlet, for printer cable: 0.93186 unit; source Jemai 2005; lognormal variance with pedigree 0.0521, pedigree (1,4,5,3,1)
  Measured Value.
  EcoSpold01Location=GLO
  properties: carbon content, fossil 0.615093, wet mass 0.0895 kg, dry mass 0.0895 kg
- injection moulding: 2.67192 kg; source Jemai 2005; lognormal variance with pedigree 0.0701, pedigree (1,4,5,3,3)
  EcoSpold01Location=RER
  Literature Value.
- polystyrene, high impact: 2.63716 kg; source Jemai 2005; lognormal variance with pedigree 0.0701, pedigree (1,4,5,3,3)
  EcoSpold01Location=RER
  Literature Value.
  properties: dry mass 1 kg, carbon content, fossil 0.923077, wet mass 1 kg
  note on carbon content, fossil: Chemical formula of polystyrene is (C8H8)n (ecoinvent v2.2 report 11_II)
- used printer, laser: -5.47002 kg; lognormal variance with pedigree 0.0701, pedigree (1,4,5,3,3)
  Literature Value.
  production volume 9.20442e7 kg; = printer_laser_BW_PV * ((Ref('e757160a-d716-4603-a302-6ce8b33326d3')*-1) / printer_laser_BW)
    Calculated from production volume of reference product using the relative outputs.
  properties: wet mass 1 kg, carbon content, fossil 0.583701, dry mass 1 kg
  note on carbon content, fossil: Composition data from laser jet printer, divided by its weight 5.87 kg (Tab 4.12, ecoinvent v2.2 report 18_V)
- wire drawing, copper: 0.145836 kg; source Jemai 2005; lognormal variance with pedigree 0.0701, pedigree (1,4,5,3,3)
  Literature Value.
  EcoSpold01Location=RER
- flat glass, uncoated: 0 kg; source Jemai 2005; pedigree (1,1,1,1,1)
  Literature Value.
  EcoSpold01Location=RER
  properties: dry mass 1 kg, wet mass 1 kg
- tap water: 23.1101 kg; name tap_water_input; source Jemai 2005; lognormal variance with pedigree 0.0701, pedigree (1,4,5,3,3)
  EcoSpold01Location=RER
  Literature Value.
  properties: water content 2962.17, wet mass 1 kg, dry mass 0.000337476 kg, carbon content, fossil 0.00178991
  note on carbon content, fossil: Bicarbonate content is 2.93 mol/m3. CO2 content is 0.1 mol/m3 (ecoinvent v2.2 report 8, Tab 93.1).
- waste polystyrene: -0.0233927, -0.00180344, -0.000744885, -0.000707338, -0.0269911, -0.000300925, -0.000136391, -0.188952 kg (8 entries); source Jemai 2005; lognormal variance with pedigree 0.0521, pedigree (1,4,5,3,1)
  (same comment as for waste polystyrene)
  production volume 4.08946e6 kg
- wastewater, unpolluted: -0.000353361, -0.0438168 m3 (2 entries); source Jemai 2005; lognormal variance with pedigree 0.0701, pedigree (1,4,5,3,3)
  (same comment as for waste polystyrene)
  production volume 743253 m3
- epoxy resin, liquid: 0.0032753, 0.0155483 kg (2 entries); source Jemai 2005; lognormal variance with pedigree 0.0701, pedigree (1,4,5,3,3)
  Literature Value.
  EcoSpold01Location=RER
- waste polyethylene: -0.00315729, -0.000243409, -0.000100537, -9.54689e-5, -0.00364296, -4.06156e-5, -1.84086e-5, -0.0255028 kg (8 entries); source Jemai 2005; lognormal variance with pedigree 0.0521, pedigree (1,4,5,3,1)
  (same comment as for waste polyethylene)
  production volume 551952 kg
- corrugated board box: 0.250905, 0.0112182, 0.953022 kg (3 entries); source Jemai 2005; lognormal variance with pedigree 0.0521, pedigree (1,4,5,3,1)
  (same comment as for corrugated board box)
- flat glass, uncoated: 0.00022755, 0.00110501 kg (2 entries); source Jemai 2005; lognormal variance with pedigree 0.0701, pedigree (1,4,5,3,3)
  Literature Value.
  EcoSpold01Location=RER

## Inputs from nature
- Water, well, in ground [natural resource, in water]: 0.0211532 m3; name water_well_in_ground_input; source Jemai 2005; lognormal variance with pedigree 0.0701, pedigree (1,4,5,3,3)
  Literature Value.

## Emissions to nature
- Water [air, unspecified]: 0.00270006 m3; name water_to_air_unspecified; = (tap_water_input/1000*fraction_TW_to_air)+(water_well_in_ground_input*fraction_PW_to_air); lognormal variance with pedigree 0.0807, pedigree (2,2,5,1,1)
  Calculated value based on literature values and expert opinion. See comments in the parametres' comment field.
  property fraction, origin: salt water 0; name fraction_origin_salt_water
  property fraction, origin: unspecified 0; name fraction_origin_unspecified
  property fraction, origin: fresh water 1; name fraction_origin_fresh_water

## Sampling procedure
Producer information (EPD) and own assumptions for processing and electricity consumption calculations.

## Review by Jürgen Sutter 2007-11-08
passed.
-

## Review by Roland Hischier 2011-09-22
Transfer of documentation done.
