# silicone factory construction

Dataset: EcoSpold 2, unit process
Geography: RER
Time period: 1999-01-01 to 2019-12-31
Technology level: current
Classification: ISIC rev.4 ecoinvent: 4290:Construction of other civil engineering projects
Classification: EcoSpold01Categories: chemicals/inorganics
Scenario: Business-as-Usual
System model: Allocation at the point of substitution
Generated by: Niels Jungbluth
Published in: Althaus H.-J. 2004
Database: ecoinvent
isCopyrightProtected: true
accessRestrictedTo: 1

## General comment
Average of two plants. Chemical production since more than 100 years. Life time estimated to be 100a. Annual production 1 Mio. tonnes.

## Included activities end
Inventory for the production plant including land use, machinery and buildings.

## Geography
Production plant in DE.

## Technology
Chemical production facility.

## Time period
Reporting time of environmental reports.

## Reference product
- silicone factory: 1 unit; CPC 53269: Other constructions for manufacturing; By-product classification allocatable product
  EcoSpold01Location=RER
  production volume 1.32237 unit
    This is a placeholder value that does not reflect real-world production volumes. This dataset does not currently require a real-world production volume to work in the database framework, and no actual data were collected yet. This has no negative effect on the results of the ecoinvent database. The placeholder value of this activity was scaled according to the nominal GDP of 2005 (source: United Nations, http://data.un.org/Glossary.aspx?q=GDP+%28current+US%24%29, accessed 20130726) to reflect an appropriate share of the global production volume, which is also a placeholder value.
  property price 4.22764e9 EUR2005
    Convert from EU 27 price to the world by currency exchange rate.
  property true value 4.22764e9
    allocation property applied in "true value" allocation // value calculated from revenue

## By-products
- electricity, for reuse in municipal waste incineration only: 0 kWh; CPC 17100: Electrical energy; By-product classification allocatable product; pedigree (1,1,1,1,1)
  Net electricity generated from this waste and used in internal MSWI plant energy redistribution.
  Uncertainty: uncertainty is calculated from uncertainties in waste composition and uncertainties in energy efficiency and the uncertainty in internal energy demand
  production volume 580269 kWh
  property true value relation 3.6; name E_el_prod_MSWI_true_value_relation
    property to calculate "true value" from
  property exergy 3.6 MJ; name E_el_prod_MSWI_exergy
    This exergy property is based on the exergy content of the product.
  property price 0.1 EUR2005; name E_el_prod_MSWI_price_EUR2005
    Estimated to be the same price as in case of electricity, medium voltage.
  property true value 74445.6
    allocation property applied in "true value" allocation // value calculated from true value relation
- heat, for reuse in municipal waste incineration only: 0 MJ; CPC 17300: Steam and hot water; By-product classification allocatable product; pedigree (1,1,1,1,1)
  Net useful heat generated from this waste and used in internal MSWI plant energy redistribution.
  Uncertainty: uncertainty is calculated from uncertainties in waste composition and uncertainties in energy efficiency and the uncertainty in internal energy demand
  production volume 4.06847e6 MJ
  property true value relation 0.1842; name E_th_prod_MSWI_true_value_relation
    property to calculate "true value" from
  property exergy 0.1842 MJ; name E_th_prod_MSWI_exergy
    This exergy property is based on the exergy content of the product.
  property price 0.0106 EUR2005; name E_th_prod_MSWI_price_EUR2005
    Average European district heat price from Ecoheatcool and Euroheat 2005-2006, Ecoheat Work package 1: The European heat market. Final report. 10.6 EUR/GJ i s the price of district heat. http://www.solarthermalworld.org/files/Ecoheatcool%20WP1%20Web.pdf?download
  property true value 26707.1
    (same comment as for electricity, for reuse in municipal waste incineration only)
- zinc concentrate: 0 kg; CPC 14290: Other non-ferrous metal ores and concentrates (other than uranium or thorium ores and concentrates); By-product classification allocatable product
  Calculated value from the knowledge of the properties of both products.
  production volume 32.0274 kg
  property price 0.38 EUR2005; name ByP_price_EUR2005
    Temporary price data. Calculated as 90% of purchasers price based on: Zinc content in concentrate 53%. Concentrate price per kg Zn 86.5% of refined Zn price (13.5% treatment charges according to CHR Metals Limited 2005: Dynamic cost curves. http://www.minecost.com/dynamic.pdf). 2004 zinc price from USGS (2007) Mineral commodity summaries 2007. <http://minerals.usgs.gov/minerals/pubs/mcs/2007/mcs2007.pdf> [Accessed 25 May 2010]
  property zinc content 0.53; name zinc_C_zinc_concentrate
    Zinc content on a dry matter basis. Value taken from teh "zinc mine operation" /GLO dataset.
  property dry mass 1 kg; name DM_zinc_concentrate
  property carbon content 0
    carbon content on a dry matter basis (reserved; not for manual entry)
  property true value 12.1704
    allocation property applied in "true value" allocation // value calculated from revenue
  properties: wet mass 1 kg, water content 0, carbon content, non-fossil 0, carbon content, fossil 0, water in wet mass 0 kg, carbon allocation 0 kg
- copper: 0 kg; By-product classification allocatable product; CPC 41413: Refined copper and copper alloys, unwrought; master alloys of copper
  production volume 118319 kg
  property price 5.52 EUR2005
    Literature value (http://www.economist.com/news/business/21576714-mining-industry-has-enriched-chile-its-future-precarious-copper-solution). Average price between 20015 and 2013.
  property carbon content 0
    carbon content on a dry matter basis (reserved; not for manual entry)
  property true value 653123
    allocation property applied in "true value" allocation // value calculated from revenue
  properties: water in wet mass 0 kg, water content 0, carbon content, non-fossil 0, dry mass 1 kg, carbon content, fossil 0, wet mass 1 kg, carbon allocation 0 kg
- lead: 0 kg; CPC 41441: Lead, unwrought; By-product classification allocatable product
  EcoSpold01Location=SE
  production volume 3082.71 kg
  property price 0.744 EUR2005
    Temporary price data. Calculated as 90% of purchasers price based on: Source: ecoinvent v2 report 10-part IX, Tab 5.10 & 2.5
  property carbon content 0
    carbon content on a dry matter basis (reserved; not for manual entry)
  property true value 2293.53
    allocation property applied in "true value" allocation // value calculated from revenue
  properties: wet mass 1 kg, water content 0, carbon content, non-fossil 0, carbon content, fossil 0, dry mass 1 kg, water in wet mass 0 kg, carbon allocation 0 kg
- nickel, 99.5%: 0 kg; CPC 41422: Unwrought nickel; By-product classification allocatable product
  EcoSpold01Location=SE
  production volume 6435.07 kg
  property price 10.4 EUR2005
    Temporary price data. Calculated as 90% of purchasers price based on: 2004 nickel price from USGS (2007) Mineral commodity summaries 2007. <http://minerals.usgs.gov/minerals/pubs/mcs/2007/mcs2007.pdf> [Accessed 25 May 2010]
  property carbon content 0
    carbon content on a dry matter basis (reserved; not for manual entry)
  property true value 66924.7
    allocation property applied in "true value" allocation // value calculated from revenue
  properties: water in wet mass 0 kg, wet mass 1 kg, carbon content, non-fossil 0, dry mass 1 kg, water content 0, carbon content, fossil 0, carbon allocation 0 kg
- silver: 0 kg; CPC 41310: Silver (including silver plated with gold or platinum), unwrought or in semi-manufactured forms, or in powder […]; By-product classification allocatable product; CAS 7440-22-4
  EcoSpold01Location=SE
  production volume 1062.69 kg
  property price 178 EUR2005
    (same comment as for lead)
  property carbon content 0
    carbon content on a dry matter basis (reserved; not for manual entry)
  property true value 189158
    allocation property applied in "true value" allocation // value calculated from revenue
  properties: wet mass 1 kg, carbon content, non-fossil 0, dry mass 1 kg, water content 0, carbon content, fossil 0, water in wet mass 0 kg, carbon allocation 0 kg
- palladium: 0 kg; CPC 4160: Other non-ferrous metals and articles thereof (including waste and scrap of some metals); cermets and articles […]; By-product classification allocatable product
  EcoSpold01Location=SE
  production volume 58.8267 kg
  property price 5640 EUR2005
    Temporary price data. Calculated as 90% of purchasers price based on: 2004 price from USGS (2007) Mineral commodity summaries 2007. <http://minerals.usgs.gov/minerals/pubs/mcs/2007/mcs2007.pdf> [Accessed 25 May 2010]
  property carbon content 0
    carbon content on a dry matter basis (reserved; not for manual entry)
  property true value 331782
    allocation property applied in "true value" allocation // value calculated from revenue
  properties: wet mass 1 kg, carbon content, fossil 0, water in wet mass 0 kg, water content 0, carbon content, non-fossil 0, dry mass 1 kg, carbon allocation 0 kg
- gold: 0 kg; CPC 41320: Gold (including gold plated with platinum), unwrought or in semi-manufactured forms, or in powder form; By-product classification allocatable product; CAS 7440-57-5
  EcoSpold01Location=SE
  production volume 32.2603 kg
  property price 10600 EUR2005
    Temporary price data. Calculated as 90% of purchasers price based on: Source: ecoinvent v2 report 10-part IX, Tab 2.5
  property carbon content 0
    carbon content on a dry matter basis (reserved; not for manual entry)
  property true value 341959
    allocation property applied in "true value" allocation // value calculated from revenue
  properties: wet mass 1 kg, carbon content, fossil 0, dry mass 1 kg, carbon content, non-fossil 0, water content 0, water in wet mass 0 kg, carbon allocation 0 kg
- iron scrap, sorted, pressed: 0 kg; By-product classification Recyclable; CPC 39310: Slag, dross, scalings and other waste from the manufacture of iron or steel; pedigree (1,1,1,1,1)
  Iron scrap recovered from this waste.
  production volume 15204.8 kg
  property price 0.175 EUR2005
    Temporary price data. Calculated as 90% of purchasers price based on: 2005 import and export prices (total trades (USD) divided by total weight (kg) in biggest economies of the world: EU27, USA, Brasil, China, India, Japan and Russia) from UN Commodity Trade Statistics Database (http://data.un.org/Explorer.aspxDatabase [Accessed 2011.06.20]). Commodity: Waste or scrap, of cast iron
  property carbon content 0
    carbon content on a dry matter basis (reserved; not for manual entry)
  property true value 2660.83
    allocation property applied in "true value" allocation // value calculated from revenue
  properties: water content 0, water in wet mass 0 kg, carbon content, fossil 0, dry mass 1 kg, carbon content, non-fossil 0, wet mass 1 kg, carbon allocation 0 kg

## Inputs from technosphere
- pipeline, petroleum: 253.759 km; lognormal variance with pedigree 0.3401, pedigree (1,2,5,1,1)
  Calculation for 100a, approx. 150 factories
  EcoSpold01Location=RER
  Uncertainty: Calculation for 100a, approx. 150 factories
- railway track: 62877.9 m*year; lognormal variance with pedigree 0.3401, pedigree (1,2,5,1,1)
  Calculation for 100a, approx. 150 factories
  EcoSpold01Location=CH
  Uncertainty: Calculation for 100a, approx. 150 factories
- chemical factory: 3.19872e7 kg; lognormal variance with pedigree 0.628, pedigree (5,5,5,1,5)
  EcoSpold01Location=RER
  Rough estimation, doubled inventory for life time of 100a.
  Uncertainty: Rough estimation, doubled inventory for life time of 100a.
- building, hall: 2.27999e6 m2; lognormal variance with pedigree 0.3401, pedigree (1,2,5,1,1)
  EcoSpold01Location=CH
  Calculation for 100a, approx. 150 factories
  Uncertainty: Calculation for 100a, approx. 150 factories
- decommissioned chemical production facilities: -3.19872e7 kg; lognormal variance with pedigree 0.628, pedigree (5,5,5,1,5)
  Rough estimation
  EcoSpold01Location=RER
  Uncertainty: Rough estimation
  production volume 3.2e7 kg
    Calculated from the production volume of silicone factory in proportion to the respective output amounts.
  properties: dry mass 1 kg, carbon content, non-fossil 5.78006e-6, wet mass 1 kg, carbon content, fossil 0.0169382
  note on carbon content, non-fossil: Calculated from C content in input materials in the infrastructure
- pipeline, natural gas, low pressure distribution network: 161.685 km; lognormal variance with pedigree 0.3401, pedigree (1,2,5,1,1)
  (same comment as for railway track)

## Inputs from nature
- Occupation, industrial area [natural resource, land]: 2.7425e8 m2*year; lognormal variance with pedigree 0.0801, pedigree (1,2,5,1,1)
  100a occupation
  Uncertainty: 100a occupation
- Occupation, dump site [natural resource, land]: 2.15094e7 m2*year; lognormal variance with pedigree 0.0801, pedigree (1,2,5,1,1)
  100a occupation
  Uncertainty: 100a occupation
- Transformation, to industrial area [natural resource, land]: 2.7425e6 m2; lognormal variance with pedigree 0.1601, pedigree (1,2,5,1,1)
  Environmental report
  Uncertainty: Environmental report
- Transformation, from unspecified [natural resource, land]: 3.46302e6 m2; lognormal variance with pedigree 0.1601, pedigree (1,2,5,1,1)
  Environmental report
  Uncertainty: Environmental report
- Occupation, traffic area, road network [natural resource, land]: 5.05478e7 m2*year; lognormal variance with pedigree 0.0801, pedigree (1,2,5,1,1)
  100a occupation
  Uncertainty: 100a occupation
- Transformation, to traffic area, road network [natural resource, land]: 505478 m2; lognormal variance with pedigree 0.1601, pedigree (1,2,5,1,1)
  Environmental report
  Uncertainty: Environmental report
- Transformation, to dump site, residual material landfill [natural resource, land]: 215094 m2; lognormal variance with pedigree 0.1601, pedigree (1,2,5,1,1)
  Environmental report
  Uncertainty: Environmental report

## Sampling procedure
Environmental reports and webpage.

## Review by Carl Vadenbo 2012-06-28
In preparation for the release of ecoinvent v3.0, the inputs of railway decommissioning was removed from the dataset 'silicone plant, RER' and added to railway construction instead. Furthermore, the dataset was renamed to 'silicon factory construction, RER 1999-2001'. The removal of aforementioned exchanges was reviewed and the dataset was accepted for inclusion into the ecoinvent database on 2012.07.06. It is nevertheless recommended that the dataset is revised and that the meta-data is improved prior to subsequent releases of the database.

## Review by Roland Hischier 2006-09-27
Passed.
none
