# transmission network construction, electricity, medium voltage

Dataset: EcoSpold 2, unit process
Geography: CA-QC
Time period: 2008-01-01 to 2019-12-31
Technology level: current
Classification: ISIC rev.4 ecoinvent: 4220a: Construction of utility projects for electricity production, except for liquid fuels
Classification: EcoSpold01Categories: electricity/distribution
Scenario: Business-as-Usual
System model: Allocation at the point of substitution
Share of production covered: 100 %
Generated by: Pablo Tirado
Database: ecoinvent
isCopyrightProtected: true
accessRestrictedTo: 1

## General comment
This dataset represents the construction of the infrastructure (poles, cables, transforming substations etc.) of the electricity medium voltage transmission network in Quebec. This dataset is based on study on the production, transport and distribution of electricity in Quebec. It represents the total of all the infrastrucutres that belong to Hydro-Quebec, which is the only transporter and distributor of electricity in the region. The inventory is based on distribution lines and substation to transform high voltage to medium lines and substations of the company. In 2012, the distribution network, that includes the medium and low voltage, counts 114649 km of lines and about 2.7 million of poles (mostly wooden poles treated to CCA and PCP). As most data were no differentiatied in the data collection, low voltage and medium voltage were split based on the amount of energy delivered at each voltage.
[This dataset was already contained in the ecoinvent database version 2. It was not individually updated during the transfer to ecoinvent version 3. Life Cycle Impact Assessment results may still have changed, as they are affected by changes in the supply chain, i.e. in other datasets. This dataset was generated following the ecoinvent quality guidelines for version 2. It may have been subject to central changes described in the ecoinvent version 3 change report (http://www.ecoinvent.org/database/ecoinvent-version-3/reports-of-changes/), and the results of the central updates were reviewed extensively. The changes added e.g. consistent water flows and other information throughout the database. The documentation of this dataset can be found in the ecoinvent reports of version 2, which are still available via the ecoinvent website. The change report linked above covers all central changes that were made during the conversion process.]

## Included activities start
From reception of materials and construction operations.

## Included activities end
The activity ends with the operation of the transmission network.
It includes:
-Land use associated to lines and substations ;
- main materials used for substation (building, transformers, breakers, etc.), poles and cable construction;
- direct emissions to air (SF6) and to soil (leakage of treating substances from poles);
- waste treatment of materials
It doesn't include:
- minor activities, materials and wastes.

## Geography
The calculations are based on Swiss data

## Technology
The distribution network includes the current tecnology on poles, cables and transformers.It includes the medium and the low voltages.
Definition of the voltage levels (according to Hydro-Quebec):
- High voltage level above 35 kV (large scale industry)
- Medium voltage level nominal voltage between phases is 750 V- 34.5 kV (medium to small scale industry, service sector
- Low voltage level below 750 V (Households)

## Time period
Operation data were collected for the 2008-2013 period.

## Parameters
- fraction: 0.170542 dimensionless; = 18386/(18386+89423); lognormal variance with pedigree 0.04, pedigree (5,1,1,1,1)
  Calculated/Estimated value. This parameter is used to split the common flows between the medium and the low voltage networks, as Hydro-Quebec data collection was made as a whole (the same division manages both networks).
  The split is based on the consumed energy at each voltage. This amounts have been estimated based on the consumption per electricity rate.
  LV MV HV TOTAL
  Consumed Electricity (GWh) 89 423 18 386 62 632 170 440
  Source: http://www.regie-energie.qc.ca/audiences/3541-04/RepHqdDDR/HQD-14_doc09_3541_01nov04.pdf Table R-28.4
- number of poles: 2.7e6 unit; name qty_poles; lognormal variance with pedigree 0.0012, pedigree (2,1,1,1,1)
  Measured data. Number of poles in the medium/low voltage network
- net electricity production in 2008: 1.26378e11 kWh; name net_electricity_2008; = 199649970000*(1-36.7%); lognormal variance with pedigree 0.0006, pedigree (1,1,1,1,1)
  Calculated value. Sum of produced and imported energy in 2008 minus losses and used at higher voltages.
  LV MV HV TOTAL
  Consumed Electricity (GWh) 89 423 18 386 62 632 170 440
  % of total consumed 52.5% 10.8% 36.7%
  The total consumed per voltage includes the losses and the consumption at each level.
  Source: http://www.regie-energie.qc.ca/audiences/3541-04/RepHqdDDR/HQD-14_doc09_3541_01nov04.pdf

## Reference product
- transmission network, electricity, medium voltage: 1 km; name amount_RP; CPC 53252: Local cables and related works; By-product classification allocatable product
  EcoSpold01Location=CH
  production volume 391.05 km; name apv_RP; = fraction*total_length_network/lifetime
    Calculated value. Total amount of kilometres divided by lifetime
  property lifetime 50 year; name lifetime
    LIterature value. Based on expert estimations from Hydro-Quebec
  property price 929713 EUR2005
    The production volume of this product is small compared to other products supplied by the activities within the same ISIC 3 category. Calculated from Aluminium consumption. According to activity '_80 Infrastructure, excluding buildings, EU27' in the EU & DK IO database (Simapro, (0.0000404 (Al, after first processing) + 0.000615 (Al basic, virgin)) kg Al per EURO.. Ecoinvent: 614 kg Al per km (dataset 'transmission network construction, electricity, medium voltage').
  property total length of network 114649 km; name total_length_network
    LIterature value.
  property true value 929713; name amount_RP_true_value
    allocation property applied in "true value" allocation // value calculated from revenue

## By-products
- heat, for reuse in municipal waste incineration only: 0 MJ; CPC 17300: Steam and hot water; By-product classification allocatable product; pedigree (1,1,1,1,1)
  Net electricity generated from this waste and used in internal MSWI plant energy redistribution.
  Uncertainty: uncertainty is calculated from uncertainties in waste composition and uncertainties in energy efficiency and the uncertainty in internal energy demand
  production volume 2.38251e6 MJ
  property price 0.0106 EUR2005; name E_th_prod_MSWI_price_EUR2005
    Average European district heat price from Ecoheatcool and Euroheat 2005-2006, Ecoheat Work package 1: The European heat market. Final report. 10.6 EUR/GJ i s the price of district heat. http://www.solarthermalworld.org/files/Ecoheatcool%20WP1%20Web.pdf?download
  property exergy 0.1842 MJ; name E_th_prod_MSWI_exergy
    This exergy property is based on the exergy content of the product.
  property true value relation 0.1842; name E_th_prod_MSWI_true_value_relation
    property to calculate "true value" from
  property true value 40.1989
    allocation property applied in "true value" allocation // value calculated from true value relation
- electricity, for reuse in municipal waste incineration only: 0 kWh; CPC 17100: Electrical energy; By-product classification allocatable product; pedigree (1,1,1,1,1)
  (same comment as for heat, for reuse in municipal waste incineration only)
  production volume 329346 kWh
  property exergy 3.6 MJ; name E_el_prod_MSWI_exergy
    This exergy property is based on the exergy content of the product.
  property true value relation 3.6; name E_el_prod_MSWI_true_value_relation
    property to calculate "true value" from
  property price 0.1 EUR2005; name E_el_prod_MSWI_price_EUR2005
    Estimated to be the same price as in case of electricity, medium voltage.
  property true value 108.603
    (same comment as for heat, for reuse in municipal waste incineration only)
- copper: 0 kg; source Rentz O. 1999; By-product classification allocatable product; CPC 41413: Refined copper and copper alloys, unwrought; master alloys of copper
  Literature value. Copper uses: Before end-use copper is manufactured into semi fabricated products, such as shapes and ingots (known as 'semis'). These manufacturing processes are subdivided into hot working, cold working and, if necessary, process annealing. Few of the semis are ready for use as such. They more typically travel to first-stage manufacturers, who make metal rods, wire, and casting, and then to component manufacturers who produce such things as motors, valves, and insulated cables The components in turn are incorporated by final-stage manufacturers into a variety of finished products - automobiles, commercial buildings, residential housing, and so forth. These uses account for about 79% of the world-wide consumption of copper.
  production volume 21947.1 kg
  properties: dry mass 1 kg, water in wet mass 0 kg, wet mass 1 kg, carbon content, non-fossil 0, water content 0, price 5.52 EUR2005, carbon content, fossil 0, carbon content 0, carbon allocation 0 kg, true value 76.9461
- zinc concentrate: 0 kg; CPC 14290: Other non-ferrous metal ores and concentrates (other than uranium or thorium ores and concentrates); By-product classification allocatable product
  Calculated value from the knowledge of the properties of both products.
  production volume 1.742e-5 kg
  property price 0.38 EUR2005; name ByP_price_EUR2005
    Temporary price data. Calculated as 90% of purchasers price based on: Zinc content in concentrate 53%. Concentrate price per kg Zn 86.5% of refined Zn price (13.5% treatment charges according to CHR Metals Limited 2005: Dynamic cost curves. http://www.minecost.com/dynamic.pdf). 2004 zinc price from USGS (2007) Mineral commodity summaries 2007. <http://minerals.usgs.gov/minerals/pubs/mcs/2007/mcs2007.pdf> [Accessed 25 May 2010]
  property zinc content 0.53; name zinc_C_zinc_concentrate
    Zinc content on a dry matter basis. Value taken from teh "zinc mine operation" /GLO dataset.
  property dry mass 1 kg; name DM_zinc_concentrate
  property carbon content 0
    carbon content on a dry matter basis (reserved; not for manual entry)
  property true value 4.20438e-9
    allocation property applied in "true value" allocation // value calculated from revenue
  properties: wet mass 1 kg, water content 0, carbon content, non-fossil 0, carbon content, fossil 0, water in wet mass 0 kg, carbon allocation 0 kg
- iron scrap, unsorted: 0 kg; source European Aluminium Association 2008; CPC 39310: Slag, dross, scalings and other waste from the manufacture of iron or steel; By-product classification Recyclable; pedigree (1,1,1,1,1)
  production volume 35.081 kg
  property price 0.149 EUR2005; name ironScrapAmount_price_EUR2005
    Temporary price data. Calculated as 90% of purchasers price based on: estimated at 85% of sorted scrap
  property carbon content 0
    carbon content on a dry matter basis (reserved; not for manual entry)
  property true value 0.0133668
    allocation property applied in "true value" allocation // value calculated from revenue
  properties: water in wet mass 0 kg, water content 0, carbon content, fossil 0, carbon content, non-fossil 0, dry mass 1 kg, wet mass 1 kg, carbon allocation 0 kg
- aluminium oxide, non-metallurgical: 0 kg; source European Aluminium Association 2008; CPC 41432: Alumina (aluminium oxide), except artificial corundum; By-product classification allocatable product; CAS 1344-28-1; pedigree (1,1,1,1,1)
  production volume 2207.52 kg
  property carbon content, non-fossil 0; name C_content_non_fossil
  property price 0.28 EUR2005; name Al2O3Amount_price_EUR2005
    From UN trade database. http://data.un.org/ Import data from the largest economies of the world are used (Brazil, India, USA, China, Japan and EU-27).
  property dry mass 1 kg; name DM
  property water content 0; name water_content
  property wet mass 1 kg; name WM
  property water in wet mass 0 kg; name WWM
  property carbon content, fossil 0; name C_content_fossil
  property carbon content 0
    carbon content on a dry matter basis (reserved; not for manual entry)
  property true value 1.58063
    allocation property applied in "true value" allocation // value calculated from revenue
  properties: carbon allocation 0 kg
- aluminium, cast alloy: 0 kg; source European Aluminium Association 2008; By-product classification allocatable product; CPC 41431: Unwrought aluminium; pedigree (1,1,1,1,1)
  EcoSpold01Location=RER
  production volume 20635.4 kg
  property price 1.3 EUR2005; name castAlloyAmount_price_EUR2005
    Temporary price data. Calculated as 90% of purchasers price based on: Source: London Metal Exchange, Aluminium alloy price for 2005
  property carbon content 0
    carbon content on a dry matter basis (reserved; not for manual entry)
  property true value 68.5999
    allocation property applied in "true value" allocation // value calculated from revenue
  properties: water in wet mass 0 kg, carbon content, non-fossil 0, water content 0, dry mass 1 kg, carbon content, fossil 0, wet mass 1 kg, carbon allocation 0 kg
- aluminium, wrought alloy: 0 kg; source European Aluminium Association 2008; By-product classification allocatable product; CPC 4153: Semi-finished products of aluminium or aluminium alloys; pedigree (1,1,1,1,1)
  production volume 9033.78 kg
  property price 1.44 EUR2005; name secondaryAluminiumOutput_price_EUR2005
  properties: wet mass 1 kg, water content 0, carbon content, fossil 0, water in wet mass 0 kg, carbon content, non-fossil 0, dry mass 1 kg, carbon content 0, carbon allocation 0 kg, true value 33.2659

## Inputs from technosphere
- inert waste, for final disposal: -7876.99 kg; name inert_waste; = (ceramic+ gravel)*-1; lognormal variance with pedigree 0.44, pedigree (5,5,5,5,1)
  Estimated value. It is assumed that the same quantity that enter is produced as a waste
  Uncertainty: estimates
  production volume 3.08139e6 kg; = apv_RP * inert_waste / amount_RP
    Calculated from production volume of reference product using the relative outputs.
  property price 0 EUR2005; name inert_waste_price_EUR2005
  properties: dry mass 0.995 kg, wet mass 1 kg, water content 0.00502513
- sanitary ceramics: 7.83885 kg; name ceramic; = fraction* ceramic_amount/(total_length_network); lognormal variance with pedigree 0.002, pedigree (1,1,3,1,1)
  Calculated value. Total amount divided by the total number of kilometres in the network
  Uncertainty: Calculated variable. Uncertainty will be determined from propagation of uncertainty factors of underlying variables. Uncertainty of actual relation between variables not accounted at this time, although this could be included in a future update.
  property amount 1 of flow in kg 5.27162e6 kg; name ceramic_amount
  properties: wet mass 1 kg, dry mass 1 kg
  note on amount 1 of flow in kg: Measured value. Total amount of ceramics in the network. Used in isolating switch and fuse cut-out
- sawlog and veneer log, softwood, debarked, measured as solid wood: 2.27422 m3; name wood; = fraction* lifetime/wood_lifetime* wood_amount1/(total_length_network*wood_WM); lognormal variance with pedigree 0.002, pedigree (1,1,3,1,1)
  EcoSpold01Location=RER
  Calculated value. Total amount divided by the total number of kilometres in the network. Lifetime of wood has been taken into account in the calculation
  Uncertainty: Calculated variable. Uncertainty will be determined from propagation of uncertainty factors of underlying variables. Uncertainty of actual relation between variables not accounted at this time, although this could be included in a future update.
  property wet mass 765 kg; name wood_WM
  property amount 1 of flow in kg 1.053e9 kg; name wood_amount1; = 390*qty_poles
  property lifetime 45 year; name wood_lifetime
  properties: water content 0.7, dry mass 450 kg, carbon content, non-fossil 0.494
  note on amount 1 of flow in kg: Measured value. Total amount of wood in the network. Amount used in wooden poles. It is assumed an average pole (11m, 390kg)
  note on lifetime: Estimated value. Wood poles lifetime is estimated at 40 years
  note on carbon content, non-fossil: C content of dry mass is 0.494 kgC/kg dry wood (ecoinvent v2.2 report 9)
- wood preservation, vaccum pressure method, inorganic salt, containing Cr, outdoor use, ground contact: 40.5187 kg; = fraction* wood_preservCCA_amount1_1* lifetime/wood_lifetime* wood_amount1/(total_length_network*wood_WM); lognormal variance with pedigree 0.002, pedigree (1,1,3,1,1)
  Calculated value. Total amount divided by the total number of kilometres in the network. Lifetime of wood has been taken into account in the calculation
  Uncertainty: Calculated variable. Uncertainty will be determined from propagation of uncertainty factors of underlying variables. Uncertainty of actual relation between variables not accounted at this time, although this could be included in a future update.
  property amount 1 of flow in kg 17.8165 kg; name wood_preservCCA_amount1_1
  note on amount 1 of flow in kg: Literature value. Quantity (kg) per m3 of wood. Source: ecoinvent
- wood preservation, vacuum pressure method, organic salts, Cr-free, outdoor use, ground contact: 10.5183 kg; = fraction* wood_preservPCP_amount1* lifetime/wood_lifetime* wood_amount1/(total_length_network*wood_WM); lognormal variance with pedigree 0.002, pedigree (1,1,3,1,1)
  (same comment as for wood preservation, vaccum pressure method, inorganic salt, containing )
  property amount 1 of flow in kg 4.625 kg; name wood_preservPCP_amount1
  note on amount 1 of flow in kg: Literature value. Quantity per m3 of wood. Source: C.A. Bolin, S.T. Smith / Renewable and Sustainable Energy Reviews 15 (2011) 2475-2486
- steel, unalloyed: 237.083 kg; name steel; = fraction* steel_amount1/(total_length_network); lognormal variance with pedigree 0.002, pedigree (1,1,3,1,1)
  EcoSpold01Location=RER
  Calculated value. Total amount divided by the total number of kilometres in the network
  Uncertainty: Calculated variable. Uncertainty will be determined from propagation of uncertainty factors of underlying variables. Uncertainty of actual relation between variables not accounted at this time, although this could be included in a future update.
  property amount 1 of flow in kg 1.59438e8 kg; name steel_amount1
  properties: wet mass 1 kg, dry mass 1 kg, carbon content, fossil 0.0025
  note on carbon content, fossil: Unalloyed steels or carbon steels are those in which the level of an individual element in no case reaches or exceeds the limiting concentration given in Tab. 3.1 ecoinvent v2.2 report 10_partII. Assumed to have a C content of 0.25%
  note on amount 1 of flow in kg: Measured value. Total amount of steel in the network. Used in transformers, regulators, switches, breakers and fuse cut-out
- scrap steel: -237.083 kg; name scrap_steel; = (steel)*-1; lognormal variance with pedigree 0.44, pedigree (5,5,5,5,1)
  (same comment as for inert waste, for final disposal)
  production volume 23035.1 kg; = scrap_copper* apv_RP/ amount_RP
    Calculated from production volume of reference product using the relative outputs.
  property price 0 EUR2005; name scrap_steel_price_EUR2005
  properties: wet mass 1 kg, dry mass 1 kg
- aluminium, wrought alloy: 255.762 kg; name aluminium; = fraction* aluminium_amount1/(total_length_network); lognormal variance with pedigree 0.002, pedigree (1,1,3,1,1)
  (same comment as for steel, unalloyed)
  property amount 1 of flow in kg 1.72e8 kg; name aluminium_amount1
  properties: dry mass 1 kg, wet mass 1 kg
  note on amount 1 of flow in kg: Measured value. Total amount of aluminium in the network. Used for cables
- waste wood pole, chrome preserved: -1739.78 kg; name waste_wood; = (+wood*wood_WM)*-1; lognormal variance with pedigree 0.44, pedigree (5,5,5,5,1)
  Estimated value. It is assumed that the same quantity that enter is produced as a waste
  EcoSpold01Location=CH
  Uncertainty: estimates
  production volume 680582 kg; = waste_wood* apv_RP/ amount_RP
    Calculated from the production volume of transmission network, electricity, medium voltage in proportion to the respective output amounts.
  property price 0 EUR2005; name waste_wood_price_EUR2005
  properties: dry mass 0.8 kg, wet mass 1 kg, carbon content, non-fossil 0.483676, water content 0.25
  note on carbon content, non-fossil: Tab A.4, ecoinvent v2.2 report 13_I. C content has been referred to 1 kg DM,
- scrap copper: -58.8848 kg; name scrap_copper; = (copper)*-1; lognormal variance with pedigree 0.44, pedigree (5,5,5,5,1)
  (same comment as for inert waste, for final disposal)
  production volume 92744.3 kg; = (scrap_steel*-1)* apv_RP/ amount_RP
    Calculated from production volume of reference product using the relative outputs.
  property price 0 EUR2005; name scrap_copper_price_EUR2005
  properties: wet mass 1 kg, dry mass 1 kg
- copper: 58.8848 kg; = fraction* copper_amount1/(total_length_network); lognormal variance with pedigree 0.002, pedigree (1,1,3,1,1)
  (same comment as for steel, unalloyed)
  property amount 1 of flow in kg 3.96e7 kg; name copper_amount1
  properties: wet mass 1 kg, dry mass 1 kg
  note on amount 1 of flow in kg: Measured value. Total amount of copper in the network. Used in transformers and cables
- gravel, crushed: 7869.15 kg; name gravel; = fraction*gravel_amount1/(total_length_network); lognormal variance with pedigree 0.002, pedigree (1,1,3,1,1)
  (same comment as for sanitary ceramics)
  property amount 1 of flow in kg 5.292e9 kg; name gravel_amount1; = 1.96e3*qty_poles
  properties: wet mass 1 kg, dry mass 1 kg
  note on amount 1 of flow in kg: Estimated/calculated value. Gravel calculated considering the volume excavated per pole. 1.96tonnes/pole
- scrap aluminium: -255.762 kg; name scrap_alu; = (aluminium)*-1; lognormal variance with pedigree 0.44, pedigree (5,5,5,5,1)
  (same comment as for inert waste, for final disposal)
  production volume 100051 kg; = scrap_alu* apv_RP/ amount_RP
    Calculated from production volume of reference product using the relative outputs.
  property price 0 EUR2005; name scrap_alu_price_EUR2005
  properties: wet mass 1 kg, dry mass 1 kg
- waste mineral oil: -239.894 kg; name waste_oil; = (oil)*-1; lognormal variance with pedigree 0.44, pedigree (5,5,5,5,1)
  (same comment as for waste wood pole, chrome preserved)
  production volume 93844 kg; = waste_oil* apv_RP/ amount_RP
    (same comment as for waste wood pole, chrome preserved)
  property price 0 EUR2005; name waste_oil_price_EUR2005
  properties: dry mass 0.9 kg, water content 0.111111, carbon content, fossil 0.864444, wet mass 1 kg
  note on carbon content, fossil: Tab A.6, ecoinvent v2.2 report 13_I. C content has been calculated after data in the tables, and then referred to 1 kg DM
- building, multi-storey: 2.16923 m3; lognormal variance with pedigree 0.148, pedigree (5,5,5,5,3)
  Estimated value. Extrapolated from ecoinvent GLO dataset
  Uncertainty: estimates
- excavation, hydraulic digger: 9.75615 m3; = fraction*excavation/(total_length_network); lognormal variance with pedigree 0.002, pedigree (1,1,3,1,1)
  Calculated value. Total amount divided by the total number of kilometres in the network
  EcoSpold01Location=RER
  Uncertainty: Calculated variable. Uncertainty will be determined from propagation of uncertainty factors of underlying variables. Uncertainty of actual relation between variables not accounted at this time, although this could be included in a future update.
  property amount 1 of flow in kg 6.561e6 kg; name excavation; = 2.43*qty_poles
  note on amount 1 of flow in kg: Estimated/calculated value. Excavation calculated considering the volume excavated per pole. 2.43m3/pole
- light fuel oil: 239.894 kg; name oil; = fraction* oil_amount/(total_length_network); lognormal variance with pedigree 0.002, pedigree (1,1,3,1,1)
  (same comment as for sanitary ceramics)
  property amount 1 of flow in kg 1.61329e8 kg; name oil_amount
  properties: dry mass 1 kg, carbon content, fossil 0.862, wet mass 1 kg
  note on amount 1 of flow in kg: Measured value. Total amount of oil in the network. Used in transformers, circuit breakers and regulators. It is also included here the amount of oil used to treat the PCP poles (30 kg/pole)
- diesel, burned in building machine: 11.9427 MJ; = fraction* diesel_amount*diesel_HHV/(total_length_network*1000); lognormal variance with pedigree 0.002, pedigree (1,1,3,1,1)
  (same comment as for sanitary ceramics)
  property fuel input in physical units, kg 1.76904e8 kg; name diesel_amount; = 210600000*density_diesel
  property heating value, gross 45.4 MJ; name diesel_HHV
  property density 0.84 kg/l; name density_diesel
  note on fuel input in physical units, kg: Literature value. Total amount of diesel in the network. Source: Ecoinvent
- building, hall, steel construction: 0.157944 m2; lognormal variance with pedigree 0.148, pedigree (5,5,5,5,3)
  Estimated value. Extrapolated from ecoinvent GLO dataset
  EcoSpold01Location=CH
  Uncertainty: estimates

## Inputs from nature
- Transformation, from forest, unspecified [natural resource, land]: 1.95931 m2; name LUT_forest; lognormal variance with pedigree 0.002, pedigree (1,1,3,1,1)
  Estimated value. Extrapolated from ecoinvent GLO dataset
  Uncertainty: Calculated variable. Uncertainty will be determined from propagation of uncertainty factors of underlying variables. Uncertainty of actual relation between variables not accounted at this time, although this could be included in a future update.
- Transformation, to industrial area [natural resource, land]: 4.41844 m2; = LUT_crop+LUT_forest; lognormal variance with pedigree 0.002, pedigree (1,1,3,1,1)
  (same comment as for Transformation, from forest, unspecified)
- Transformation, from annual crop [natural resource, land]: 2.45913 m2; name LUT_crop; lognormal variance with pedigree 0.002, pedigree (1,1,3,1,1)
  (same comment as for Transformation, from forest, unspecified)
- Occupation, industrial area [natural resource, land]: 133.053 m2*year; lognormal variance with pedigree 0.002, pedigree (1,1,3,1,1)
  (same comment as for Transformation, from forest, unspecified)

## Emissions to nature
All rows: lognormal variance with pedigree 0.002, pedigree (1,1,3,1,1)
- Phenol, pentachloro- [soil, unspecified]: 0.00511897 kg; = fraction* PCP_soil_emission/ ( total_length_network)
  Calculated value. Total quantity per year divided by total transported energy
  Uncertainty: Calculated variable. Uncertainty will be determined from propagation of uncertainty factors of underlying variables. Uncertainty of actual relation between variables not accounted at this time, although this could be included in a future update.
  property amount 1 of flow in kg 3442.5 kg; name PCP_soil_emission; = 1.5e-3*qty_poles*85%
- Arsenic [soil, unspecified]: 0.0120446 kg; = fraction* As_emission/ ( total_length_network)
  (same comment as for Phenol, pentachloro-)
  property amount 1 of flow in kg 8100 kg; name As_emission; = 20e-3* qty_poles*15%
- Chromium VI [soil, unspecified]: 0.00301116 kg; = fraction* Cr_emission/ ( total_length_network)
  (same comment as for Phenol, pentachloro-)
  property amount 1 of flow in kg 2025 kg; name Cr_emission; = 5e-3* qty_poles*15%
- Copper [soil, unspecified]: 0.00481785 kg; = fraction* Cu_emission/ ( total_length_network)
  (same comment as for Phenol, pentachloro-)
  property amount 1 of flow in kg 3240 kg; name Cu_emission; = 8e-3* qty_poles*15%
- NMVOC, non-methane volatile organic compounds, unspecified origin [air, unspecified]: 30.3725 kg; = fraction* NMVOC_emission/ ( total_length_network)
  (same comment as for Phenol, pentachloro-)
  property amount 1 of flow in kg 2.04255e7 kg; name NMVOC_emission; = 8.9* qty_poles*85%
- Hydrocarbons, unspecified [soil, unspecified]: 4.7777 kg; = fraction* hydrocarb_emission/ ( total_length_network)
  (same comment as for Phenol, pentachloro-)
  property amount 1 of flow in kg 3.213e6 kg; name hydrocarb_emission; = 1.4* qty_poles*85%
- Phenol, pentachloro- [air, unspecified]: 0.153569 kg; = fraction* PCP_air_emission/ ( total_length_network)
  (same comment as for Phenol, pentachloro-)
  property amount 1 of flow in kg 103275 kg; name PCP_air_emission; = 45e-3*qty_poles*85%

## Sampling procedure
Data collection from the company including all its activities

## Extrapolations
Some data are extrapolated from GLO dataset. Uncertainty has been adjusted accordingly
