# irrigation, sprinkler

Dataset: EcoSpold 2, unit process
Geography: FR
Time period: 2015-01-01 to 2019-12-31
Technology level: current
Classification: ISIC rev.4 ecoinvent: 0161:Support activities for crop production
Scenario: Business-as-Usual
System model: Allocation at the point of substitution
Generated by: Simon Gmünder
Published in: Gmünder S. 2017
Database: ecoinvent
isCopyrightProtected: true
accessRestrictedTo: 1

## General comment
This dataset represents the sprinkler irrigation in France with a 75% irrigation efficieny. The inventory includes the water pumping of ground water and surface water, as well as the infrastructure. The water supplied to the plants (1m3) and the water evaporated or infiltrated shall be included in the crop production datasets.

## Included activities start
This dataset starts with pumping water from wells and water bodies.

## Included activities end
This dataset ends with delivering water to the plant and includes the water pumping, energy use, infrastructure, but not the water emissions of irrigation (shall be included in the crop production dataset).

## Geography
This dataset contains French specific data and general, technology specific information.

## Technology
Sprinkler irrigation is a method of applying irrigation water similar to natural rainfall. Water is distributed through a system of pipes usually by pumping. It is then sprayed into the air through sprinklers so that it breaks up into small water drops which fall to the ground. The pump supply system, sprinklers and operating conditions must be designed to enable a uniform application of water.
This method is suited for most row, field and tree crops and water can be sprayed over or under the crop. Sprinklers are best suited to sandy soils with high infiltration rates although they are adaptable to most soils, nevertheless, are not suitable for soils which easily form a crust.
A good clean supply of water, free of suspended sediments, is require to avoid problems of sprinkler nozzle blockage and spoiling the crop by coating it with sediment (FAO, 1985b)

## Time period
The data was collected for the given time range.

## Parameters
- fraction drip irrigation: 0.180328; name fraction_drip; lognormal variance with pedigree 0.0193, pedigree (4,5,3,3,2)
  Literature value. Share of drip irrigation technology per country. The AQUASTAT database reports water statistics at country level (FAO, 2016). For European countries the agri-environmental indicator “irrigation methods” of the Eurostat database is used (Eurostat, 2017). For Canada, specific statistics are available in the report “Irrigation methods and conservation practices on Canadian farms” (Statistics Canada, 2012). The information for US irrigation data is based on the irrigation farm survey from 2013 (USDA, 2014). The irrigation efficiency is used to convert the share of irrigation technologies per area (ha) to the amount of water used for irrigation (m3). fraction_drip + fraction_sprinkler_irrigation + fraction_surface_irrigation =1
- elevation head ground water: 30; name head_GW; lognormal variance with pedigree 0.0193, pedigree (4,5,3,3,2)
  Approximation. We approximate the average ground water table for each country by overlaying data on the areas with irrigation with information on the average ground water table. (Gmuender et al, 2017)
- fraction non-conventional water: 0 dimensionless; name fraction_NC
  Literature value. The share of water used for irrigation from non-conventional water sources, The Global Map of Irrigation Areas (GMIA) version 5 includes sub-national irrigation statistics for most countries for the base year 2005 (Siebert et al., 2013). GMIA specifies between areas equipped for irrigation with ground water, surface water and non-conventional water sources. Non-conventional water is water from which the water source is not known or from waste water (mainly tap water). The surface water is considered as “water from river” and the ground water withdrawal as “water from well in ground”. fraction_SW + fraction_GW + fraction_NC = 1
- fraction ground water: 0.446022 dimensionless; name fraction_GW; = 1-fraction_NC-fraction_SW; lognormal variance with pedigree 0.0193, pedigree (4,5,3,3,2)
  Literature value. The share of water used for irrigation from ground water sources. The Global Map of Irrigation Areas (GMIA) version 5 includes sub-national irrigation statistics for most countries for the base year 2005 (Siebert et al., 2013). GMIA specifies between areas equipped for irrigation with ground water, surface water and non-conventional water sources. Non-conventional water is water from which the water source is not known or from waste water. The surface water is considered as “water from river” and the ground water withdrawal as “water from well in ground”. fraction_SW + fraction_GW + fraction_NC = 1
- fraction sprinkler irrigation: 0.688525; name fraction_sprinkler_irrigation; lognormal variance with pedigree 0.0193, pedigree (4,5,3,3,2)
  Literature value. Share of sprinkler irrigation technology per country. The AQUASTAT database reports water statistics at country level (FAO, 2016). For European countries the agri-environmental indicator “irrigation methods” of the Eurostat database is used (Eurostat, 2017). For Canada, specific statistics are available in the report “Irrigation methods and conservation practices on Canadian farms” (Statistics Canada, 2012). The information for US irrigation data is based on the irrigation farm survey from 2013 (USDA, 2014). The irrigation efficiency is used to convert the share of irrigation technologies per area (ha) to the amount of water used for irrigation (m3). fraction_drip + fraction_sprinkler_irrigation + fraction_surface_irrigation =1'
- pump efficiency: 0.7; name pump_efficiency; lognormal variance with pedigree 0.0193, pedigree (4,5,3,3,2)
  Estimated value. The water pump efficiency is defined as the water power divided by the power input at the pump shaft and the efficiency losses are cause for example due to friction losses or leakages. The efficiency typically ranges between 50% and 80%. For this study we assume an efficiency of 70%.
- fraction of diesel pumps: 0.3; name fraction_diesel; lognormal variance with pedigree 0.0193, pedigree (4,5,3,3,2)
  Estimated value. Diesel or electrical energy are most commonly used through pumping systems to lift water for irrigation on farms. We use different literature source to estimate the split between electric and diesel water pumps.
- water withdrawal for irrigation: 2.71148e9; name WW_irrigation; lognormal variance with pedigree 0.012625, pedigree (3,1,3,2,3)
  Literature value. Derived from FAO. (2016). AQUASTAT website. Food and Agriculture Organization of the United Nations (FAO).
- elevation head surface water: 7; name head_SW; lognormal variance with pedigree 0.0193, pedigree (4,5,3,3,2)
  Approximation. Surface water irrigation systems can be based purely on gravity or use water pumps to lift water. Since no country specific surface for lift data is available, we assume a 7m lift for surface water for pressurized systems and for gravity systems based on US irrigation survey on lift from surface water irrigation (USDA, 2014).
- engine efficiency, electricity: 0.8; name Engine_efficiency_electricity; lognormal variance with pedigree 0.0193, pedigree (4,5,3,3,2)
  Estimated value. The drive or motor efficiency is mainly dependent on the type of motor and the load. The efficiency typically ranges between 70% and 90% for electric motors and between 50% and 75% for diesel engines. For this study we use an efficiency of 80% for electric motors and 60% for diesel motors.
- engine eficiency, diesel: 0.6; name engine_efficiency_diesel; lognormal variance with pedigree 0.0193, pedigree (4,5,3,3,2)
  (same comment as for engine efficiency, electricity)
- fraction surface water: 0.553978; name fraction_SW; lognormal variance with pedigree 0.0193, pedigree (4,5,3,3,2)
  Literature value. The share of water used for irrigation from surface water sources, The Global Map of Irrigation Areas (GMIA) version 5 includes sub-national irrigation statistics for most countries for the base year 2005 (Siebert et al., 2013). GMIA specifies between areas equipped for irrigation with ground water, surface water and non-conventional water sources. Non-conventional water is water from which the water source is not known or from waste water. The surface water is considered as “water from river” and the ground water withdrawal as “water from well in ground”. fraction_SW + fraction_GW + fraction_NC = 1
- fraction of electricity pumps: 0.7; name fraction_el; = 1- fraction_diesel; lognormal variance with pedigree 0.0193, pedigree (4,5,3,3,2)
  (same comment as for fraction of diesel pumps)
- fraction surface irrigation: 0.131148; name fraction_surface_irrigation; = 1- fraction_drip- fraction_sprinkler_irrigation; lognormal variance with pedigree 0.0193, pedigree (4,5,3,3,2)
  Literature value. Share of surface irrigation technology per country. The AQUASTAT database reports water statistics at country level (FAO, 2016). For European countries the agri-environmental indicator “irrigation methods” of the Eurostat database is used (Eurostat, 2017). For Canada, specific statistics are available in the report “Irrigation methods and conservation practices on Canadian farms” (Statistics Canada, 2012). The information for US irrigation data is based on the irrigation farm survey from 2013 (USDA, 2014). The irrigation efficiency is used to convert the share of irrigation technologies per area (ha) to the amount of water used for irrigation (m3). fraction_drip + fraction_sprinkler_irrigation + fraction_surface_irrigation =1
- dynamic pressure head: 37.7; name head_DP; lognormal variance with pedigree 0.0193, pedigree (4,5,3,3,2)
  Approximation. The friction head and pressure head for drip irrigation is assumed to be 2.65 bar or 27m and 3.7 bar or 37.7m for sprinkler systems (FAO 2007). Traditional surface gravity methods do not need external energy for operation.
- irrigation water: 19710 m3/ha/year; name irrigation_water; lognormal variance with pedigree 0.0119, pedigree (4,3,3,3,2)
  Literature value. FAO. (2007). Handbook of pressurized irrigation techniques. Rome, Italy
- diesel consumption for installation: 3.78; name diesel_consumption; lognormal variance with pedigree 0.0193, pedigree (4,5,3,3,2)
  Calculated value. Based on measurements. (Gmuender et al, 2017)

## Reference product
- irrigation: 1 m3; CPC 86119: Other support services to crop production; By-product classification allocatable product
  production volume 1.86692e9 m3; name PV_sprinkler_irrigation; = WW_irrigation*fraction_sprinkler_irrigation
    Calculated value. Based on the amount of irrigated water (FAO. 2016) and the share of sprinkler irrigation technology per country.
  property price 0.127 EUR2005; name irrigation_price_EUR2005
    Calculated relative to 'Irrigating' ids 6978. Ecoinvent report 15, top page 65: 1/1200
  property carbon content 0
    carbon content on a dry matter basis (reserved; not for manual entry)
  property true value 0.127; name irrigation_true_value
    allocation property applied in "true value" allocation // value calculated from revenue
  properties: wet mass 1000 kg, carbon content, fossil 0, water content 9089.91, carbon content, non-fossil 0, water in wet mass 999.89 kg, dry mass 0.11 kg, carbon allocation 0 kg

## By-products
- electricity, for reuse in municipal waste incineration only: 0 kWh; CPC 17100: Electrical energy; By-product classification allocatable product; pedigree (1,1,1,1,1)
  Net electricity generated from this waste and used in internal MSWI plant energy redistribution.
  Uncertainty: uncertainty is calculated from uncertainties in waste composition and uncertainties in energy efficiency and the uncertainty in internal energy demand
  production volume 2.09405e6 kWh
  property price 0.1 EUR2005; name E_el_prod_MSWI_price_EUR2005
    Estimated to be the same price as in case of electricity, medium voltage.
  property exergy 3.6 MJ; name E_el_prod_MSWI_exergy
    This exergy property is based on the exergy content of the product.
  property true value relation 3.6; name E_el_prod_MSWI_true_value_relation
    property to calculate "true value" from
  property true value 0.000145088
    allocation property applied in "true value" allocation // value calculated from true value relation
- heat, for reuse in municipal waste incineration only: 0 MJ; CPC 17300: Steam and hot water; By-product classification allocatable product; pedigree (1,1,1,1,1)
  (same comment as for electricity, for reuse in municipal waste incineration only)
  production volume 1.54369e7 MJ
  property exergy 0.1842 MJ; name E_th_prod_MSWI_exergy
    This exergy property is based on the exergy content of the product.
  property true value relation 0.1842; name E_th_prod_MSWI_true_value_relation
    property to calculate "true value" from
  property price 0.0106 EUR2005; name E_th_prod_MSWI_price_EUR2005
    Average European district heat price from Ecoheatcool and Euroheat 2005-2006, Ecoheat Work package 1: The European heat market. Final report. 10.6 EUR/GJ i s the price of district heat. http://www.solarthermalworld.org/files/Ecoheatcool%20WP1%20Web.pdf?download
  property true value 5.47258e-5
    (same comment as for electricity, for reuse in municipal waste incineration only)

## Inputs from technosphere
- bronze: 2.28965e-5 kg; lognormal variance with pedigree 0.0133, pedigree (3,4,4,3,2)
  Calculated value based on literature values. The material input are based on the FAO example of hose-move sprinkler irrigation design for cotton (FAO, 2007). The weight per m3 of water is calculated based on the lifespan of the equipment and the amount of water irrigated per ha and year. The lifespan for the distribution network is assumed to be ten years and the head control unit 20 years. The irrigation system is assumed to be functional during 7h per shift with 6 shifts (sprinkler positions) and an irrigation interval of 2 weeks. The total irrigation time per year is 1095 hours and the system discharge is 36 m3 of water per hour (FAO, 2007). FAO. (2007). Handbook of pressurized irrigation techniques. Rome, Italy
  properties: dry mass 1 kg, wet mass 1 kg
- waste polypropylene: -5.89073e-5 kg; name Waste_PP; = (PP)*-1; lognormal variance with pedigree 0.0258, pedigree (4,5,4,4,2)
  Calculated value.
  production volume 110148 kg; = PV_sprinkler_irrigation*Waste_PP/irrigation
    Calculated from production volume of reference product using the relative outputs.
  property price 0 EUR2005; name Waste_PP_price_EUR2005
  properties: dry mass 0.841 kg, carbon content, fossil 0.825208, wet mass 1 kg, water content 0.189061
- polypropylene, granulate: 5.89073e-5 kg; name PP; lognormal variance with pedigree 0.0133, pedigree (3,4,4,3,2)
  (same comment as for bronze)
  properties: dry mass 1 kg, wet mass 1 kg, carbon content, fossil 0.857143
- water pump operation, electric: 0.672184 MJ; = fraction_el*(9.8*(fraction_GW*head_GW+fraction_SW*head_SW+head_DP)*1000)/((3.6*1000000)*pump_efficiency* Engine_efficiency_electricity)*3.6; lognormal variance with pedigree 0.0133, pedigree (3,4,4,3,2)
  calculated value. The energy required to lift water for irrigation is a function of the lift or total head (Ht), the efficiencies of pumps used for extraction (e1), the driving efficiency (e2) and flow rates (FAO, 2007).
  properties: price 0.109 EUR2005
- waste polyethylene: -0.000858649 kg; name Waste_PE; = (HDPE+LDPE)*-1; lognormal variance with pedigree 0.0258, pedigree (4,5,4,4,2)
  Calculated value.
  production volume 1.60555e6 kg; = PV_sprinkler_irrigation*Waste_PE/irrigation
    Calculated from production volume of reference product using the relative outputs.
  property price 0 EUR2005; name Waste_PE_price_EUR2005
  properties: dry mass 0.996 kg, carbon content, fossil 0.825301, water content 0.00401606, wet mass 1 kg
  note on carbon content, fossil: C content in 1 kg DM was calculated using data in Tab A.1, ecoinvent v2.2 report 13_I
- diesel, burned in agricultural machinery: 9.57398e-6 MJ; = diesel_consumption/irrigation_water/20; lognormal variance with pedigree 0.0267, pedigree (3,5,4,3,3)
  Calculated value. A tractor is assumed to install the sprinkler irrigation system, with an average diesel consumption of 3.78kg/ha (4 times*0.25ha*4.5l/ha*0.83 kg/l), based on ecoinvent (Nemecek & Kägi, 2007). The energy consumption of levelling the field is assumed to be included in the energy use for field preparation, included in the crop production dataset.
- waste bulk iron, excluding reinforcement: -0.000157951 kg; name Waste_iron; = (Iron+Brass+Steel)*-1; lognormal variance with pedigree 0.0258, pedigree (4,5,4,4,2)
  Calculated value.
  production volume 295347 kg; = PV_sprinkler_irrigation*Waste_iron/irrigation
    Calculated from production volume of reference product using the relative outputs.
  property price 0 EUR2005; name Waste_iron_price_EUR2005
  properties: wet mass 1 kg, dry mass 1 kg
- polyethylene, low density, granulate: 0.000369419 kg; name LDPE; lognormal variance with pedigree 0.0133, pedigree (3,4,4,3,2)
  (same comment as for bronze)
  properties: carbon content, fossil 0.857143, wet mass 1 kg, dry mass 1 kg
- extrusion, plastic pipes: 0.000858649 kg; = HDPE+LDPE; lognormal variance with pedigree 0.0133, pedigree (3,4,4,3,2)
  Calculated value.;activityLink introduced to establish a direct link to the corresponding regional supply of this product
- waste polyvinylchloride: -0.0006989 kg; name Waste_PVC; = (PVC)*-1; lognormal variance with pedigree 0.0258, pedigree (4,5,4,4,2)
  Calculated value.
  production volume 1.30684e6 kg; = PV_sprinkler_irrigation*Waste_PVC/irrigation
    Calculated from production volume of reference product using the relative outputs.
  property price 0 EUR2005; name Waste_PVC_price_EUR2005
  properties: wet mass 1 kg, dry mass 0.998 kg, carbon content, fossil 0.440882, water content 0.00200401
- injection moulding: 0.000757808 kg; = PP+PVC; lognormal variance with pedigree 0.0133, pedigree (3,4,4,3,2)
  Calculated value. ;activityLink introduced to establish a direct link to the corresponding regional supply of this product
- brass: 2.59592e-5 kg; name Brass; lognormal variance with pedigree 0.0133, pedigree (3,4,4,3,2)
  (same comment as for bronze)
  properties: dry mass 1 kg, wet mass 1 kg
- steel, low-alloyed: 0.000129796 kg; name Steel; lognormal variance with pedigree 0.0133, pedigree (3,4,4,3,2)
  (same comment as for bronze)
  properties: wet mass 1 kg, dry mass 1 kg, carbon content, fossil 0.005
- inert waste, for final disposal: -3.79403e-7 kg; name waste_inert; = (nylon)*-1; lognormal variance with pedigree 0.0258, pedigree (4,5,4,4,2)
  Calculated value.
  production volume 709.43 kg; = PV_sprinkler_irrigation*waste_inert/irrigation
    Calculated from production volume of reference product using the relative outputs.
  property price 0 EUR2005; name waste_inert_price_EUR2005
  properties: dry mass 0.995 kg, wet mass 1 kg, water content 0.00502513
- cast iron: 2.19654e-6 kg; name Iron; lognormal variance with pedigree 0.0133, pedigree (3,4,4,3,2)
  (same comment as for bronze)
  properties: dry mass 1 kg, carbon content, fossil 0.04, wet mass 1 kg
  note on carbon content, fossil: Cast iron is made by remelting pig iron in small furnaces (e.g. cupola furnaces or electric arc furnaces) and poured into moulds to make castings. It usually contains 2% to 6% carbon (ecoinvent v2.2 report 10_partII). An average content of 4% was considered
- polyvinylchloride, bulk polymerised: 0.0006989 kg; name PVC; lognormal variance with pedigree 0.0133, pedigree (3,4,4,3,2)
  (same comment as for bronze)
  properties: carbon content, fossil 0.387097, dry mass 1 kg, wet mass 1 kg
  note on carbon content, fossil: Monomer is vynyl chloride, C2H3Cl (ecoinvent v2.2 report 11_II). MW=62 g/mol
- tap water: 0 kg; = irrigation*fraction_NC*1000
  calculated value
  properties: dry mass 0.000337476 kg, carbon content, fossil 0.00178991, wet mass 1 kg, water content 2962.17
  note on carbon content, fossil: Bicarbonate content is 2.93 mol/m3. CO2 content is 0.1 mol/m3 (ecoinvent v2.2 report 8, Tab 93.1).
- bronze scrap, post-consumer: 0 kg; name BS_BP; = (bronze)*-1; pedigree (1,1,1,1,1)
  Calculated value.
  production volume 42813.2 kg; = PV_sprinkler_irrigation*BS_BP/irrigation
    Calculated from production volume of reference product using the relative outputs.
  property price 0 EUR2005; name BS_BP_price_EUR2005
  properties: dry mass 1 kg, wet mass 1 kg
- nylon 6-6: 3.79403e-7 kg; name nylon; lognormal variance with pedigree 0.0133, pedigree (3,4,4,3,2)
  (same comment as for bronze)
  properties: carbon content, fossil 0.637168, dry mass 1 kg, wet mass 1 kg
- water pump operation, diesel: 0.384105 MJ; = fraction_diesel*(9.8*(fraction_GW*head_GW+fraction_SW*head_SW+head_DP)*1000)/((3.6*1000000)*pump_efficiency*engine_efficiency_diesel)*3.6; lognormal variance with pedigree 0.0133, pedigree (3,4,4,3,2)
  (same comment as for water pump operation, electric)
  properties: price 0.07 EUR2005
- polyethylene, high density, granulate: 0.00048923 kg; name HDPE; lognormal variance with pedigree 0.0133, pedigree (3,4,4,3,2)
  (same comment as for bronze)
  properties: dry mass 1 kg, wet mass 1 kg, carbon content, fossil 0.857143
  note on carbon content, fossil: Polyethylene is formed out of a huge amount of ethylene monomers (C2H4) (ecoinvent v2.2 report 11_II). MW=28 g/mol
- metal working, average for steel product manufacturing: 0.000157951 kg; = Iron+Steel+Brass; lognormal variance with pedigree 0.0133, pedigree (3,4,4,3,2)
  Calculated value based on literature values. The material input are based on the FAO example of hose-move sprinkler irrigation design for cotton (FAO, 2007). The weight per m3 of water is calculated based on the lifespan of the equipment and the amount of water irrigated per ha and year. The lifespan for the distribution network is assumed to be ten years and the head control unit 20 years. The irrigation system is assumed to be functional during 7h per shift with 6 shifts (sprinkler positions) and an irrigation interval of 2 weeks. The total irrigation time per year is 1095 hours and the system discharge is 36 m3 of water per hour (FAO, 2007). FAO. (2007). Handbook of pressurized irrigation techniques. Rome, Italy;activityLink introduced to establish a direct link to the corresponding regional supply of this product

## Inputs from nature
- Water, well, in ground [natural resource, in water]: 0.445322 m3; = irrigation*fraction_GW; lognormal variance with pedigree 0.0046, pedigree (3,1,3,1,1)
  Literatue value.
- Water, river [natural resource, in water]: 0.553108 m3; = irrigation*fraction_SW; lognormal variance with pedigree 0.0046, pedigree (3,1,3,1,1)
  Literature value.

## Sampling procedure
Literature values and estimations.

## Extrapolations
The material input are based on the FAO example of hose-move sprinkler irrigation design for cotton (FAO, 2007). The data on water sources, irrigation efficiency and energy demand is compiled based on different data sources, incluiding the Global Map of Irrigation Areas (GMIA), FAO-AQUASTAT libary, national census reports and other internacional organizations or statistical services.
