# paper production, woodfree, uncoated, at integrated mill

Dataset: EcoSpold 2, unit process
Geography: CA-QC
Time period: 2011-07-01 to 2019-06-30
Technology level: current
Classification: EcoSpold01Categories: paper & cardboard/graphic paper
Classification: ISIC rev.4 ecoinvent: 1701:Manufacture of pulp, paper and paperboard
Tags: single enterprise data
Scenario: Business-as-Usual
System model: Allocation at the point of substitution
Share of production covered: 100 %
Generated by: Hugues Imbeault-Tétreault
Database: ecoinvent
isCopyrightProtected: true
accessRestrictedTo: 1

## General comment
This dataset represents the production of uncoated woodfree paper (office paper) in an integrated paper mill.

## Included activities start
The activity starts at the reception of pulpwood.

## Included activities end
The activity ends with packaged paper sheets ready for shipping.
The dataset includes wood handling, chemical (kraft) pulping and bleaching, paper production, on-site energy production, recovery cycles of chemicals, internal waste water treatment, packaging energy consumption and industrial landfill.
The dataset doesn't include packaging materials and on-site pick-up truck operation, which uses petrol (negligible).

## Allocation
The data originate from a paper mill which produces different types of woodfree papers and kraft pulp. The allocation of most materials and energy inputs between the different coproducts was avoided by subdividing the process of paper making into many subprocesses and collecting data specifically for those subprocesses. However, it was inevitable to make allocation for some general inputs, e.g. diesel burned in on-site vehicles. In those cases, the allocation was done with the dry mass content of the coproducts.

## Geography
Data from an important fine paper producer in the province of Quebec, Canada.

## Technology
Kraft process with elementary chlorine free bleach.

## Reference product
- paper, woodfree, uncoated: 1 kg; name graphicalPaper0recycledAmount; CPC 32113: Mechanical wood pulp; semi-chemical wood pulp; pulps of fibrous cellulosic material other than wood; By-product classification allocatable product
  production volume 6.18473e8 kg; name graphicalPaper0recycledProductionVolume
    Estimation with production capacities.
  property price 0.756 EUR2005; name graphicalPaper0recycledAmount_price_EUR2
    Export prices for the World+ according to: http://faostat.fao.org/site/626/DesktopDefault.aspx?PageID=626#ancor downloaded 6 May 2009; calculated as export value divided by export volume.
  property carbon content 0.306355
    carbon content on a dry matter basis (reserved; not for manual entry)
  property true value 0.756; name graphicalPaper0recycledAmou_true_value_0
    allocation property applied in "true value" allocation // value calculated from revenue
  properties: carbon content, non-fossil 0.281215, dry mass 0.945 kg, carbon content, fossil 0.0251406, water in wet mass 0.055 kg, water content 0.0582011, wet mass 1 kg, carbon allocation 0.289506 kg

## By-products
All rows: By-product classification allocatable product; pedigree (1,1,1,1,1)
- heat, for reuse in municipal waste incineration only: 0 MJ; CPC 17300: Steam and hot water
  Net electricity generated from this waste and used in internal MSWI plant energy redistribution.
  Uncertainty: uncertainty is calculated from uncertainties in waste composition and uncertainties in energy efficiency and the uncertainty in internal energy demand
  production volume 107619 MJ
  property true value relation 0.1842; name E_th_prod_MSWI_true_value_relation
    property to calculate "true value" from
  property exergy 0.1842 MJ; name E_th_prod_MSWI_exergy
    This exergy property is based on the exergy content of the product.
  property price 0.0106 EUR2005; name E_th_prod_MSWI_price_EUR2005
    Average European district heat price from Ecoheatcool and Euroheat 2005-2006, Ecoheat Work package 1: The European heat market. Final report. 10.6 EUR/GJ i s the price of district heat. http://www.solarthermalworld.org/files/Ecoheatcool%20WP1%20Web.pdf?download
  property true value 1.14857e-6
    allocation property applied in "true value" allocation // value calculated from true value relation
- electricity, for reuse in municipal waste incineration only: 0 kWh; CPC 17100: Electrical energy
  (same comment as for heat, for reuse in municipal waste incineration only)
  production volume 14839.4 kWh
  property exergy 3.6 MJ; name E_el_prod_MSWI_exergy
    This exergy property is based on the exergy content of the product.
  property true value relation 3.6; name E_el_prod_MSWI_true_value_relation
    property to calculate "true value" from
  property price 0.1 EUR2005; name E_el_prod_MSWI_price_EUR2005
    Estimated to be the same price as in case of electricity, medium voltage.
  property true value 3.09526e-6
    (same comment as for heat, for reuse in municipal waste incineration only)
- potassium fertiliser, as K2O: 0 kg; source CRAAQ 2010; CPC 3463: Mineral or chemical fertilizers, potassic
  This is the potassium (as K2O) output (organic and mineral forms of potassium contained) from organic origin. In practice, only a part of this total amount is available to the plants and the available amount has to be calculated considering efficiency of organic potassium (to replace mineral potassium ), which also depends on many factors, such as climate, soil, crop, timing and technique of application, etc. Since this dataset includes field emissions from the application of sludge, potassium availability has been accounted for in the calculation of direct field emissions.
  Uncertainty: The uncertainty of calculated values is determined from propagation of uncertainty factors of underlying variables.
  production volume 9928.52 kg
  property price 0.188 EUR2005; name K2O_fertiliser_price_EUR2005
    Temporary price data. Calculated as 90% of purchasers price based on: 2004 import price calulated from FAOSTAT (http://faostat.fao.org/site/575/DesktopDefault.aspx?PageID=575#ancor [accessed 2011.01.27] Potash Fertilizers (K20 total nutrients) in kUSD/Mg
  property carbon content 0
    carbon content on a dry matter basis (reserved; not for manual entry)
  property true value 3.01802e-6
    allocation property applied in "true value" allocation // value calculated from revenue
  properties: carbon content, fossil 0, dry mass 1 kg, water in wet mass 0 kg, water content 0, wet mass 1 kg, carbon content, non-fossil 0, carbon allocation 0 kg
- nitrogen fertiliser, as N: 0 kg; source CRAAQ 2010; CPC 3461: Mineral or chemical fertilizers, nitrogenous
  This is the total nitrogen (as N) output (organic and mineral forms of nitrogen contained) from organic origin. In practice, only a part of this total amount is available to the plants and the available amount has to be calculated considering nitrogen efficiency (to replace mineral nitrogen), which also depends on many factors, such as climate, soil, crop, timing and technique of application, etc. Since this dataset includes field emissions from the application of sludge, nitrogen availability has been accounted for in the calculation of direct field emissions.
  Uncertainty: The uncertainty of calculated values is determined from propagation of uncertainty factors of underlying variables.
  production volume 61403 kg
  property price 0.473 EUR2005; name N_fertiliser_price_EUR2005
    Temporary price data. Calculated as 90% of purchasers price based on: 2004 prices are calculated on basis of Import/Export data (tonnes and US$) from UN Trade Statistics Database (http://data.un.org/Browse.aspx?d=ComTrade, accessed 7/7-2010). N, P2O5, or K2O content (http://www.fertilizer.org/ifa/Home-Page/STATISTICS/Conversions-factors)
  property carbon content 0
    carbon content on a dry matter basis (reserved; not for manual entry)
  property true value 4.69602e-5
    allocation property applied in "true value" allocation // value calculated from revenue
  properties: water content 0, wet mass 1 kg, dry mass 1 kg, carbon content, non-fossil 0, water in wet mass 0 kg, carbon content, fossil 0, carbon allocation 0 kg
- phosphate fertiliser, as P2O5: 0 kg; source CRAAQ 2010; CPC 3462: Mineral or chemical fertilizers, phosphatic
  This is the total phosphate (as P2O5) output (organic and mineral forms of phosphate contained) from organic origin. In practice, only a part of this total amount is available to the plants and the available amount has to be calculated considering efficiency of organic phosphate (to replace mineral phosphate), which also depends on many factors, such as climate, soil, crop, timing and technique of application, etc. Since this dataset includes field emissions from the application of sludge, phosphate availability has been accounted for in the calculation of direct field emissions.
  Uncertainty: The uncertainty of calculated values is determined from propagation of uncertainty factors of underlying variables.
  production volume 41098.9 kg
  property price 0.241 EUR2005; name P2O5_fertiliser_price_EUR2005
    (same comment as for nitrogen fertiliser, as N)
  property carbon content 0
    carbon content on a dry matter basis (reserved; not for manual entry)
  property true value 1.6015e-5
    allocation property applied in "true value" allocation // value calculated from revenue
  properties: dry mass 1 kg, water content 0, carbon content, fossil 0, wet mass 1 kg, carbon content, non-fossil 0, water in wet mass 0 kg, carbon allocation 0 kg
- soil pH raising agent, as CaCO3: 0 kg; source Marianne Lemieux 2013; CPC 34659: Fertilizers n.e.c.
  Calculated value of the amount of CaCO3 that can be substituted considered the liming efficiency of the sludge.
  Uncertainty: The uncertainty of calculated values is determined from propagation of uncertainty factors of underlying variables.
  production volume 1.14468e6 kg
  property carbon content, fossil 0.12; name soil_pH_raising_agent_C_content_fossil_0; = 12/(40+12+3*16)
    Stoichiometric calculation. Fossil carbon content on a dry matter basis.
  property carbon content, non-fossil 0; name soil_pH_raising_a_C_content_non_fossil_0
    biogene carbon content on a dry matter basis
  property price 0.117 EUR2005; name soil_pH_raising_agent_as_CaCO3_price_EUR
    The price is estimated to be the same as for lime.
  property carbon content 0.12
    carbon content on a dry matter basis (reserved; not for manual entry)
  property true value 0.000216546
    allocation property applied in "true value" allocation // value calculated from revenue
  properties: wet mass 1 kg, water in wet mass 0 kg, water content 0, dry mass 1 kg, carbon allocation 0.12 kg

## Inputs from technosphere
- retention aid, for paper production: 0.000268756 kg; lognormal variance with pedigree 0.0032, pedigree (2,1,3,1,1)
  properties: wet mass 1 kg, dry mass 1 kg, carbon content, fossil 0.5
- natural gas, high pressure: 0.061988 m3; lognormal variance with pedigree 0.0026, pedigree (1,1,3,1,1)
  EcoSpold01Location=RER
  In Nm3.
  properties: wet mass 0.84 kg, heating value, gross 39 MJ, dry mass 0.84 kg, carbon content, fossil 0.602381
  note on carbon content, fossil: An average C content of 0.506 kg C/ m3 has been assumed (this average has been calculated using data in Tab 3.5, ecoinvent v2.2 report 6_V
- wood chips, from post-consumer wood, measured as dry mass: 0.0119642 kg; lognormal variance with pedigree 0.0026, pedigree (1,1,3,1,1)
  Reported as "Construction and demolition materials" in dry mass. For cogeneration. 25% water on a wet mass basis.
  properties: carbon content, non-fossil 0.494, water content 0.4, wet mass 1.4 kg, dry mass 1 kg
- fatty alcohol: 0.000766897 kg; lognormal variance with pedigree 0.0032, pedigree (2,1,3,1,1)
  Proxy for ''antifoaming agent''. Some assumptions have been done on water content.
  properties: wet mass 1 kg, carbon content, fossil 0.0408973, carbon content, non-fossil 0.743434, dry mass 1 kg
- diesel, burned in building machine: 0.0365121 MJ; = diesel_fuel_input_in_liter * diesel_density * diesel_Net_Heat_Value; lognormal variance with pedigree 0.002, pedigree (1,1,3,1,1)
  Uncertainty: Calculated variable. Uncertainty will be determined from propagation of uncertainty factors of underlying variables.
  property density 0.84 kg/l; name diesel_density
  property literFuel_Input 0.00101596 l; name diesel_fuel_input_in_liter
  property heating value, net 42.8 MJ; name diesel_Net_Heat_Value
- hydrochloric acid, without water, in 30% solution state: 2.85297e-5 kg; lognormal variance with pedigree 0.0032, pedigree (2,1,3,1,1)
  Amount reported without concentration, assumed to be for the solution with water. A concentration of 30% was used.
  properties: dry mass 1 kg, wet mass 1 kg
- propane, burned in building machine: 0.0136802 MJ; name propane; = propane_fuel_input_in_liter * propane_density * propane_Net_Heat_Value; lognormal variance with pedigree 0.002, pedigree (1,1,3,1,1)
  (same comment as for diesel, burned in building machine)
  property heating value, net 46 MJ; name propane_Net_Heat_Value
  property density 0.515 kg/l; name propane_density
  property literFuel_Input 0.000577685 l; name propane_fuel_input_in_liter
- chemical, inorganic: 0.0105388 kg; lognormal variance with pedigree 0.0032, pedigree (2,1,3,1,1)
  Proxy. Quantity assumed to be for the active substance.
  properties: dry mass 1 kg, carbon content, fossil 0.003, wet mass 1 kg
  note on carbon content, fossil: This dataset is an unweighted average of 20 inorganic substances (listed in Tab 88.1, ecoinvent v2.2 report 8, part II), being part of the top100 chemicals included in this database. The C-content has also been calculated as an unweighted average of the C content of the substances composing this dataset.
- sulfate pulp, bleached: 0.0349867 kg; lognormal variance with pedigree 0.0072, pedigree (2,4,3,5,1)
  Estimation. Value from the global dataset.
  Uncertainty: Pedigree values from "paper production, woodfree, uncoated, at integrated mill, RER", except for the geographical correlation.
  properties: dry mass 0.9 kg, wet mass 1 kg, water content 0.111111
- malusil: 0.00378818 kg; lognormal variance with pedigree 0.0032, pedigree (2,1,3,1,1)
  Reported as ''talc''.
  properties: dry mass 1 kg, wet mass 1 kg
- pulpwood, softwood, measured as solid wood under bark: 6.30991e-5 m3; lognormal variance with pedigree 0.0026, pedigree (1,1,3,1,1)
  Reported as dry mass including bark. A density of 450 kg/m3 and a bark volume fraction of 10% were assumed. The species composing the total pulpwood input (excluding wood chips) are (mass %):
  Hardwoods (97%):
  Maple 37%
  Beech 7%
  Yellow birch 16%
  White birch 11%
  Aspen 13%
  Other hardwoods 13%
  Softwoods (3%):
  Eastern hemlock 0.6%
  Larch 0.45%
  Spruce (White) 0.855%
  Balsam Fir 1.05%
  White and red pine 0.045%
  properties: wet mass 1080 kg, carbon content, non-fossil 0.494, dry mass 450 kg, water content 1.4
- bark chips, wet, measured as dry mass: 0.0401427 kg; lognormal variance with pedigree 0.0026, pedigree (1,1,3,1,1)
  Reported in dry mass. For cogeneration. 50% water on a wet mass basis.
  properties: water content 1, carbon content, non-fossil 0.494, wet mass 2 kg, dry mass 1 kg
- wood chips, wet, measured as dry mass: 0.345318 kg; = 0.0172724539021613 + 0.328176624141064; lognormal variance with pedigree 0.0026, pedigree (1,1,3,1,1)
  Reported in dry mass. The total wood chip input includes:
  85% from sawmills
  10% from collection sites (waste wood)
  5% from forest
  Wood chips from sawmills were chosen to approximate the whole wood chip input.
  properties: carbon content, non-fossil 0.494, wet mass 2.1 kg, water content 1.1, dry mass 1 kg
- hazardous waste, for incineration: -1.09787e-6 kg; name dieselAmount; lognormal variance with pedigree 0.0026, pedigree (1,1,3,1,1)
  Proxy. Reported as ''diesel, methanol, labpack, biocide sent to incineration''.
  production volume 679.261 kg; = graphicalPaper0recycledProductionVolume*dieselAmount/graphicalPaper0recycledAmount
    Calculated from production volume of reference product using the relative outputs.
  property price 0 EUR2005; name dieselAmount_price_EUR2005
  properties: dry mass 0.75 kg, water content 0.333333, carbon content, fossil 0.554667, wet mass 1 kg
  note on carbon content, fossil: Tab A.6, ecoinvent v2.2 report 13_I. C content has been calculated after data in the tables, and then referred to 1 kg DM
- light fuel oil: 0.000239893 kg; lognormal variance with pedigree 0.0026, pedigree (1,1,3,1,1)
  Reported in liters. A density of 0.86 kg/l was assumed.
  properties: wet mass 1 kg, carbon content, fossil 0.862, dry mass 1 kg
- spent antifreezer liquid: -1.94305e-6 kg; name antifreezerFluidsAmount; lognormal variance with pedigree 0.0026, pedigree (1,1,3,1,1)
  Reported as ''antifreezer, fluids (glycol) sent to incineration''
  .
  production volume 1202.18 kg; = graphicalPaper0recycledProductionVolume*antifreezerFluidsAmount/graphicalPaper0recycledAmount
    Calculated from production volume of reference product using the relative outputs.
  property price 0 EUR2005; name antifreezerFluidsAmount_price_EUR2005
  properties: dry mass 0.482 kg, water content 1.07469, carbon content, fossil 0.431328, wet mass 1 kg
- tap water: 0.000129951 kg; lognormal variance with pedigree 0.0026, pedigree (1,1,3,1,1)
  Water consumption for sanitary installations calculated with a monthly average.
  properties: dry mass 0.000337476 kg, carbon content, fossil 0.00178991, water content 2962.17, wet mass 1 kg
  note on carbon content, fossil: Bicarbonate content is 2.93 mol/m3. CO2 content is 0.1 mol/m3 (ecoinvent v2.2 report 8, Tab 93.1).
- spent solvent mixture: -1.42174e-6 kg; name spentSolventAmount; lognormal variance with pedigree 0.0026, pedigree (1,1,3,1,1)
  Reported as "solvents and flammable liquids sent to incineration".
  production volume 879.644 kg; = graphicalPaper0recycledProductionVolume*spentSolventAmount/graphicalPaper0recycledAmount
    Calculated from production volume of reference product using the relative outputs.
  property price 0 EUR2005; name spentSolventAmount_price_EUR2005
  properties: water content 0.197605, wet mass 1 kg, dry mass 0.835 kg, carbon content, fossil 0.571257
  note on carbon content, fossil: Tab A.7, ecoinvent v2.2 report 13_I. C content has been calculated after data in the tables, and then referred to 1 kg DM
- ethylene glycol: 6.56829e-6 kg; lognormal variance with pedigree 0.0032, pedigree (2,1,3,1,1)
  Reported as "glycol".
  properties: carbon content, fossil 0.387097, wet mass 1 kg, dry mass 1 kg
- waste textile, soiled: -4.91215e-5 kg; name oilyClothAmount; lognormal variance with pedigree 0.0026, pedigree (1,1,3,1,1)
  Reported as ''oily cloth sent to landfill''.
  production volume 30391.8 kg; = graphicalPaper0recycledProductionVolume*oilyClothAmount/graphicalPaper0recycledAmount
    Calculated from production volume of reference product using the relative outputs.
  property price 0 EUR2005; name oilyClothAmount_price_EUR2005
  properties: water content 0.333333, carbon content, non-fossil 0.570519, wet mass 1 kg, dry mass 0.75 kg
- aluminium sulfate, powder: 0.00439653 kg; lognormal variance with pedigree 0.0032, pedigree (2,1,3,1,1)
  Proxy for polyaluminum silicate sulfate and aluminum sulfate.
  properties: wet mass 1 kg, dry mass 1 kg
- oxygen, liquid: 0.0030328 kg; lognormal variance with pedigree 0.0032, pedigree (2,1,3,1,1)
  EcoSpold01Location=RER
  properties: wet mass 1 kg, dry mass 1 kg
- manganese: 6.15961e-5 kg; lognormal variance with pedigree 0.0032, pedigree (2,1,3,1,1)
  Proxy for ''manganese based additive''.
  properties: wet mass 1 kg, dry mass 1 kg
- waste mineral oil: -9.13293e-5 kg; name oilGreaseWasteAmount; lognormal variance with pedigree 0.0026, pedigree (1,1,3,1,1)
  Reported as ''oil and grease waste sent to incineration''.
  production volume 56506.1 kg; = graphicalPaper0recycledProductionVolume*oilGreaseWasteAmount/graphicalPaper0recycledAmount
    Calculated from production volume of reference product using the relative outputs.
  property price 0 EUR2005; name oilGreaseWasteAmount_price_EUR2005
  properties: water content 0.111111, dry mass 0.9 kg, carbon content, fossil 0.864444, wet mass 1 kg
- lubricating oil: 0.000241017 kg; lognormal variance with pedigree 0.0026, pedigree (1,1,3,1,1)
  All types. Reported in litres. Density of 0.85 kg/l assumed.
  properties: carbon content, fossil 0.75, dry mass 1 kg, wet mass 1 kg
  note on carbon content, fossil: Lubricating oil is produced from diesel. C-content/dry mass of fats and oils considered 75%, from: ecoinvent v2.2 report, n 15a, pg 40
- hydrogen peroxide, without water, in 50% solution state: 0.00104101 kg; lognormal variance with pedigree 0.0032, pedigree (2,1,3,1,1)
  EcoSpold01Location=RER
  properties: wet mass 1 kg, dry mass 1 kg
- quicklime, milled, loose: 0.0109058 kg; lognormal variance with pedigree 0.0032, pedigree (2,1,3,1,1)
  EcoSpold01Location=CH
  properties: water content 0.010101, wet mass 1 kg, dry mass 0.99 kg
- sodium hypochlorite, without water, in 15% solution state: 0.00108457 kg; lognormal variance with pedigree 0.0032, pedigree (2,1,3,1,1)
  Amount reported without concentration, assumed to be for the solution with water. A concentration of 15% was used.
  properties: dry mass 1 kg, wet mass 1 kg
- methanol: 0.0031893 kg; lognormal variance with pedigree 0.0032, pedigree (2,1,3,1,1)
  EcoSpold01Location=GLO
  properties: dry mass 1 kg, carbon content, fossil 0.375, wet mass 1 kg
  note on carbon content, fossil: Fossil C content was calculated after fossil C contents of chemicals used in the production of the paper (in Tab 8.54 & 8.55 ecoinvent v2.2 report 11_III, part 8). CH3OH
- sodium chlorate, powder: 0.034874 kg; lognormal variance with pedigree 0.0026, pedigree (1,1,3,1,1)
  EcoSpold01Location=RER
  properties: wet mass 1 kg, dry mass 1 kg
- adipic acid: 3.35936e-6 kg; lognormal variance with pedigree 0.0032, pedigree (2,1,3,1,1)
  Concentration between 1 to 5%, assumed at 3% to calculate this amount.
  properties: dry mass 1 kg, wet mass 1 kg, carbon content, fossil 0.493151
- paper mill, integrated: 5.43794e-11 unit; lognormal variance with pedigree 0.478, pedigree (4,5,5,5,5)
  Default value (lifetime of 50 years and a annual production of 400 kt).
  EcoSpold01Location=RER
  Uncertainty: own assumption
- pulpwood, hardwood, measured as solid wood under bark: 0.00138101 m3; lognormal variance with pedigree 0.0026, pedigree (1,1,3,1,1)
  EcoSpold01Location=RER
  Reported as dry mass including bark. A density of 650 kg/m3 and a bark volume fraction of 12% were assumed. The species composing the total pulpwood input (excluding wood chips) are (mass %):
  Hardwoods (97%):
  Maple 37%
  Beech 7%
  Yellow birch 16%
  White birch 11%
  Aspen 13%
  Other hardwoods 13%
  Softwoods (3%):
  Eastern hemlock 0.6%
  Larch 0.45%
  Spruce (White) 0.855%
  Balsam Fir 1.05%
  White and red pine 0.045%
  The estimated wood density of hardwoods calculated with the above percentages and generic densities specific to each species is very close to 650 kg/m3 (645 kg/m3), including aspen, which has a low density.
  properties: wet mass 1170 kg, water content 0.8, carbon content, non-fossil 0.494, dry mass 650 kg
  note on carbon content, non-fossil: Biogenic C content was calculated after biogenic C contents of chemicals used in the production of the paper (in Tab 8.54 & 8.55 ecoinvent v2.2 report 11_III, part 8). The cellulose content in 1 kg of paper (on a wet mas basis) was estimated as (1-chemical content), C content of cellulose was considered 0.44 kgC/kg dry mass (ecoinvent v2.2 report, n 15a, pg 40) C content of dry mass is 0.494 kgC/kg dry wood (ecoinvent v2.2 report 9)
- maize starch: 0.0379856 kg; lognormal variance with pedigree 0.0072, pedigree (2,4,3,5,1)
  Estimation. Value of potato starch from the global dataset.
  Uncertainty: Pedigree values from "paper production, woodfree, uncoated, at integrated mill, RER", except for the geographical correlation.
  properties: carbon content, non-fossil 0.46, water content 0.162791, wet mass 1 kg, dry mass 0.86 kg
  note on carbon content, non-fossil: C-content of starch is considered 46% on dry mass basis (from "Evolutionary and Biochemical Aspects", A.D. Kay and T. Vrede (in Global Ecology, 2010, Elsevier B.V., S.E. Jørgensen Ed.)).
- sulfuric acid: 0.0114571 kg; lognormal variance with pedigree 0.0032, pedigree (2,1,3,1,1)
  EcoSpold01Location=RER
  1.1% of this amount accounts for the active compound in cleaning agents as a proxy.
  properties: dry mass 1 kg, wet mass 1 kg
- sodium hydroxide, without water, in 50% solution state: 0.0231675 kg; lognormal variance with pedigree 0.0026, pedigree (1,1,3,1,1)
  EcoSpold01Location=RER
  properties: wet mass 1 kg, dry mass 1 kg
- lime: 0.118955 kg; lognormal variance with pedigree 0.0072, pedigree (2,4,3,5,1)
  (same comment as for sulfate pulp, bleached)
  properties: dry mass 1 kg, wet mass 1 kg, carbon content, fossil 0.120005
- sludge from pulp and paper production: -0.0173293 kg; name primarySecondarySludgeAmount; lognormal variance with pedigree 0.0026, pedigree (1,1,3,1,1)
  Proxy. Reported as ''primary and secondary sludge sent to landfarming''.
  EcoSpold01Location=CH
  production volume 1.07218e7 kg; = graphicalPaper0recycledProductionVolume*primarySecondarySludgeAmount/graphicalPaper0recycledAmount
    Calculated from the production volume of paper, woodfree, uncoated in proportion to the respective output amounts.
  property price 0 EUR2005; name primarySecondarySludgeAmou_price_EUR2005
  properties: wet mass 1 kg, water content 2.87597, carbon content, non-fossil 0.21, dry mass 0.258 kg
  note on carbon content, non-fossil: Biogenic C content was calculated after biogenic C contents of chemicals used in the production of the paper (in Tab 8.54 & 8.55 ecoinvent v2.2 report 11_III, part 8). The cellulose content in 1 kg of paper (on a wet mas basis) was estimated as (1-chemical content), C content of cellulose was considered 0.44 kgC/kg dry mass (ecoinvent v2.2 report, n 15a, pg 40) Tab 6.21, ecoinvent v2.2 report 11_III & Tab A.9, ecoinvent v2.2 report 13_I. Sludge from pulp and paper contains 15.75% carbon
- municipal solid waste: -0.00033843 kg; name municipalSolidWasteAmount; lognormal variance with pedigree 0.0026, pedigree (1,1,3,1,1)
  EcoSpold01Location=CH
  production volume 209389 kg; = graphicalPaper0recycledProductionVolume*municipalSolidWasteAmount/graphicalPaper0recycledAmount
    (same comment as for sludge from pulp and paper production)
  properties: water content 0.297017, carbon content, fossil 0.171549, wet mass 1 kg, carbon content, non-fossil 0.261655, dry mass 0.771 kg
  note on carbon content, fossil: Fossil C content was calculated after fossil C contents of chemicals used in the production of the paper (in Tab 8.54 & 8.55 ecoinvent v2.2 report 11_III, part 8). MSW composition in tab 4.1, ecoinvent v2.2 report 13_I. C content referred to 1 kg DM
  note on carbon content, non-fossil: Biogenic C content was calculated after biogenic C contents of chemicals used in the production of the paper (in Tab 8.54 & 8.55 ecoinvent v2.2 report 11_III, part 8). The cellulose content in 1 kg of paper (on a wet mas basis) was estimated as (1-chemical content), C content of cellulose was considered 0.44 kgC/kg dry mass (ecoinvent v2.2 report, n 15a, pg 40) MSW composition in tab 4.1, ecoinvent v2.2 report 13_I. C content referred to 1 kg DM
- solvent, organic: 0.0128648 kg; lognormal variance with pedigree 0.0032, pedigree (2,1,3,1,1)
  Proxy for ''polymer/flocculant", "solvent" and "cleaning agent''. Some assumptions have been done on water content.
  properties: wet mass 1 kg, carbon content, fossil 0.63072, dry mass 1 kg
- alkylketene dimer sizing agent, for paper production: 0.00199924 kg; lognormal variance with pedigree 0.0072, pedigree (2,4,3,5,1)
  Estimation. Value from the global dataset.
  EcoSpold01Location=RER
  Uncertainty: Pedigree values from "paper production, woodfree, uncoated, at integrated mill, RER", except for the geographical correlation.
  properties: carbon content, non-fossil 0.538229, dry mass 1 kg, wet mass 1 kg
  note on carbon content, non-fossil: Biogenic C content was calculated after biogenic C contents of chemicals used in the production of the paper (in Tab 8.54 & 8.55 ecoinvent v2.2 report 11_III, part 8). The cellulose content in 1 kg of paper (on a wet mas basis) was estimated as (1-chemical content), C content of cellulose was considered 0.44 kgC/kg dry mass (ecoinvent v2.2 report, n 15a, pg 40) Chemical formula of alkyl ketene dimer was considered as C38H72O20, and the molecular weight 848g/mol. It is produced from Fatty acids, from vegetarian oil
- sodium chloride, powder: 0.000229913 kg; lognormal variance with pedigree 0.0072, pedigree (2,4,3,5,1)
  EcoSpold01Location=RER
  Estimation. Value from the global dataset.
  Uncertainty: Pedigree values from "paper production, woodfree, uncoated, at integrated mill, RER", except for the geographical correlation.
  properties: wet mass 1 kg, dry mass 1 kg

## Inputs from nature
- Water, unspecified natural origin [natural resource, in water]: 0.0424752 m3; lognormal variance with pedigree 0.0026, pedigree (1,1,3,1,1)

## Emissions to nature
- Nitrogen [water, surface water]: 2.04199e-5 kg; lognormal variance with pedigree 0.042, pedigree (1,1,3,1,1)
- Magnesium [air, non-urban air or from high stacks]: 5.76858e-6 kg; lognormal variance with pedigree 0.1306, pedigree (2,5,5,5,4)
  Calculated value. Calculation based on values from ecoinvent v3 heat production technologies, inputs of fuels and burned biomass generated on-site.
- BOD5, Biological Oxygen Demand [water, surface water]: 0.00107152 kg; lognormal variance with pedigree 0.042, pedigree (1,1,3,1,1)
- Manganese [air, non-urban air or from high stacks]: 2.72408e-6 kg; lognormal variance with pedigree 0.1306, pedigree (2,5,5,5,4)
  (same comment as for Magnesium)
- Suspended solids, unspecified [water, surface water]: 0.00530094 kg; lognormal variance with pedigree 0.042, pedigree (1,1,3,1,1)
- Hydrogen fluoride [air, non-urban air or from high stacks]: 7.7438e-11 kg; lognormal variance with pedigree 0.1306, pedigree (2,5,5,5,4)
  (same comment as for Magnesium)
- Hydrogen chloride [air, non-urban air or from high stacks]: 3.63398e-5 kg; lognormal variance with pedigree 0.0426, pedigree (2,1,3,1,1)
  Calculated value. Calculation based on emission factors from the data provider.
- COD, Chemical Oxygen Demand [water, surface water]: 0.0235902 kg; name CODAmount; lognormal variance with pedigree 0.042, pedigree (1,1,3,1,1)
- Lead [air, non-urban air or from high stacks]: 2.16651e-7 kg; lognormal variance with pedigree 0.6526, pedigree (2,1,3,1,1)
  Calculated value. Calculation based on emission factors from the data provider.
- AOX, Adsorbable Organic Halogen as Cl [water, surface water]: 0.000172221 kg; lognormal variance with pedigree 0.042, pedigree (1,1,3,1,1)
- Hydrocarbons, aromatic [air, non-urban air or from high stacks]: 2.5812e-10 kg; lognormal variance with pedigree 0.1306, pedigree (2,5,5,5,4)
  (same comment as for Magnesium)
- Copper [air, urban air close to ground]: 3.58551e-7 kg; lognormal variance with pedigree 0.7406, pedigree (2,5,5,5,4)
  (same comment as for Magnesium)
- Fluorine [air, non-urban air or from high stacks]: 8.01178e-7 kg; lognormal variance with pedigree 0.1306, pedigree (2,5,5,5,4)
  (same comment as for Magnesium)
- Water [air, unspecified]: 0.0047557 m3; lognormal variance with pedigree 0.0026, pedigree (1,1,3,1,1)
  Calculated value with water balance.
- Hydrocarbons, aliphatic, unsaturated [air, non-urban air or from high stacks]: 4.96741e-5 kg; lognormal variance with pedigree 0.1306, pedigree (2,5,5,5,4)
  (same comment as for Magnesium)
- Carbon monoxide, non-fossil [air, non-urban air or from high stacks]: 0.000656957 kg; lognormal variance with pedigree 0.7406, pedigree (2,5,5,5,4)
  (same comment as for Magnesium)
- Formaldehyde [air, non-urban air or from high stacks]: 8.17998e-6 kg; lognormal variance with pedigree 0.0426, pedigree (2,1,3,1,1)
  Calculated value. Calculation based on emission factors from the data provider.
- Methane, non-fossil [air, non-urban air or from high stacks]: 7.81735e-5 kg; lognormal variance with pedigree 0.0426, pedigree (2,1,3,1,1)
  Calculated value. Calculation based on emission factors from the data provider.
- Chromium VI [air, non-urban air or from high stacks]: 1.28232e-8 kg; lognormal variance with pedigree 0.6526, pedigree (2,1,3,1,1)
  Calculated value. Calculation based on emission factors from the data provider.
- Toluene [air, non-urban air or from high stacks]: 5.29096e-6 kg; lognormal variance with pedigree 0.1306, pedigree (2,5,5,5,4)
  (same comment as for Magnesium)
- Dinitrogen monoxide [air, non-urban air or from high stacks]: 5.71831e-5 kg; lognormal variance with pedigree 0.0426, pedigree (2,1,3,1,1)
  Calculated value. Calculation based on emission factors from the data provider.
- Carbon dioxide, non-fossil [air, non-urban air or from high stacks]: 1.77785 kg; lognormal variance with pedigree 0.0032, pedigree (2,1,3,1,1)
  Calculated value. Calculation based on emission factors from the data provider.
- Hydrocarbons, aliphatic, alkanes, unspecified [air, non-urban air or from high stacks]: 1.45858e-5 kg; lognormal variance with pedigree 0.1306, pedigree (2,5,5,5,4)
  (same comment as for Magnesium)
- Zinc [air, non-urban air or from high stacks]: 1.91868e-7 kg; lognormal variance with pedigree 0.6526, pedigree (2,1,3,1,1)
  Calculated value. Calculation based on emission factors from the data provider.
- Dioxins, measured as 2,3,7,8-tetrachlorodibenzo-p-dioxin [air, non-urban air or from high stacks]: 0 kg; pedigree (1,1,1,1,1)
  Calculated value. Calculation based on emission factors from the data provider.
- Selenium [air, non-urban air or from high stacks]: 1.41535e-8 kg; lognormal variance with pedigree 0.6526, pedigree (2,1,3,1,1)
  Calculated value. Calculation based on emission factors from the data provider.
- Chlorine [air, non-urban air or from high stacks]: 2.88429e-6 kg; lognormal variance with pedigree 0.1306, pedigree (2,5,5,5,4)
  (same comment as for Magnesium)
- Propanal [air, non-urban air or from high stacks]: 9.51027e-6 kg; lognormal variance with pedigree 0.0426, pedigree (2,1,3,1,1)
  Calculated value. Calculation based on emission factors from the data provider.
- Chromium [air, non-urban air or from high stacks]: 3.77341e-7 kg; lognormal variance with pedigree 0.6526, pedigree (2,1,3,1,1)
  Calculated value. Calculation based on emission factors from the data provider.
- Propane [air, non-urban air or from high stacks]: 4.83687e-7 kg; lognormal variance with pedigree 0.1306, pedigree (2,5,5,5,4)
  (same comment as for Magnesium)
- Bromine [air, non-urban air or from high stacks]: 9.61452e-7 kg; lognormal variance with pedigree 0.1306, pedigree (2,5,5,5,4)
  (same comment as for Magnesium)
- Sodium [air, non-urban air or from high stacks]: 2.08311e-5 kg; lognormal variance with pedigree 0.1306, pedigree (2,5,5,5,4)
  (same comment as for Magnesium)
- Cadmium [air, non-urban air or from high stacks]: 1.109e-8 kg; lognormal variance with pedigree 0.6526, pedigree (2,1,3,1,1)
  Calculated value. Calculation based on emission factors from the data provider.
- Potassium [air, non-urban air or from high stacks]: 0.000374962 kg; lognormal variance with pedigree 0.1306, pedigree (2,5,5,5,4)
  (same comment as for Magnesium)
- Calcium [air, non-urban air or from high stacks]: 9.37404e-5 kg; lognormal variance with pedigree 0.1306, pedigree (2,5,5,5,4)
  (same comment as for Magnesium)
- Propionic acid [air, non-urban air or from high stacks]: 4.83514e-8 kg; lognormal variance with pedigree 0.1306, pedigree (2,5,5,5,4)
  (same comment as for Magnesium)
- Butane [air, non-urban air or from high stacks]: 1.69496e-6 kg; lognormal variance with pedigree 0.1306, pedigree (2,5,5,5,4)
  (same comment as for Magnesium)
- Phosphorus [air, non-urban air or from high stacks]: 4.8072e-6 kg; lognormal variance with pedigree 0.1306, pedigree (2,5,5,5,4)
  (same comment as for Magnesium)
- Benzene, hexachloro- [air, non-urban air or from high stacks]: 1.1537e-13 kg; lognormal variance with pedigree 0.1306, pedigree (2,5,5,5,4)
  Calculated value. Calculation based on values from ecoinvent v3 heat production technologies, inputs of fuels and burned biomass generated on-site.
  Uncertainty: =
- Phenol, pentachloro- [air, non-urban air or from high stacks]: 1.29792e-10 kg; lognormal variance with pedigree 0.1306, pedigree (2,5,5,5,4)
  (same comment as for Magnesium)
- Benzo(a)pyrene [air, non-urban air or from high stacks]: 8.03608e-9 kg; lognormal variance with pedigree 0.1306, pedigree (2,5,5,5,4)
  (same comment as for Magnesium)
- Phenol [air, non-urban air or from high stacks]: 1.49401e-5 kg; lognormal variance with pedigree 0.0426, pedigree (2,1,3,1,1)
  Calculated value. Calculation based on emission factors from the data provider.
- Benzene, ethyl- [air, non-urban air or from high stacks]: 4.8072e-7 kg; lognormal variance with pedigree 0.1306, pedigree (2,5,5,5,4)
  (same comment as for Magnesium)
- Benzene [air, non-urban air or from high stacks]: 1.5549e-5 kg; lognormal variance with pedigree 0.1306, pedigree (2,5,5,5,4)
  (same comment as for Magnesium)
- Ammonia [air, non-urban air or from high stacks]: 9.27427e-5 kg; lognormal variance with pedigree 0.0426, pedigree (2,1,3,1,1)
  Calculated value. Calculation based on emission factors from the data provider.
- Arsenic [air, non-urban air or from high stacks]: 1.01051e-9 kg; lognormal variance with pedigree 0.6526, pedigree (2,1,3,1,1)
  Calculated value. Calculation based on emission factors from the data provider.
- Acetaldehyde [air, non-urban air or from high stacks]: 1.70891e-5 kg; lognormal variance with pedigree 0.0426, pedigree (2,1,3,1,1)
  Calculated value. Calculation based on emission factors from the data provider.
- Carbon monoxide, fossil [air, non-urban air or from high stacks]: 0.00341609 kg; lognormal variance with pedigree 0.6526, pedigree (2,1,3,1,1)
  Calculated value. Calculation based on emission factors from the data provider.
- Acrolein [air, non-urban air or from high stacks]: 8.71721e-6 kg; lognormal variance with pedigree 0.0426, pedigree (2,1,3,1,1)
  Calculated value. Calculation based on emission factors from the data provider.
- Acetic acid [air, non-urban air or from high stacks]: 3.62637e-7 kg; lognormal variance with pedigree 0.1306, pedigree (2,5,5,5,4)
  (same comment as for Magnesium)
- Particulates, > 2.5 um, and < 10um [air, non-urban air or from high stacks]: 0.000346022 kg; lognormal variance with pedigree 0.1226, pedigree (2,1,3,1,1)
  Calculated value. Calculation based on emission factors from the data provider.
- Particulates, > 10 um [air, non-urban air or from high stacks]: 0.000225637 kg; lognormal variance with pedigree 0.0426, pedigree (2,1,3,1,1)
  Calculated value. Calculation based on emission factors from the data provider.
- Sulfur dioxide [air, non-urban air or from high stacks]: 0.00011688 kg; lognormal variance with pedigree 0.0032, pedigree (2,1,3,1,1)
  Calculated value. Calculation based on emission factors from the data provider.
- Pentane [air, non-urban air or from high stacks]: 2.90297e-6 kg; lognormal variance with pedigree 0.1306, pedigree (2,5,5,5,4)
  (same comment as for Magnesium)
- Water [water, surface water]: 0.0386081 m3; lognormal variance with pedigree 0.042, pedigree (1,1,3,1,1)
- PAH, polycyclic aromatic hydrocarbons [air, non-urban air or from high stacks]: 2.0434e-7 kg; lognormal variance with pedigree 0.3906, pedigree (2,5,5,5,4)
  (same comment as for Magnesium)
- Particulates, < 2.5 um [air, non-urban air or from high stacks]: 0.00015801 kg; lognormal variance with pedigree 0.3026, pedigree (2,1,3,1,1)
  Calculated value. Calculation based on emission factors from the data provider.
- Nickel [air, non-urban air or from high stacks]: 5.69209e-6 kg; lognormal variance with pedigree 0.6526, pedigree (2,1,3,1,1)
  Calculated value. Calculation based on emission factors from the data provider.
- DOC, Dissolved Organic Carbon [water, surface water]: 0.00873711 kg; = TOCAmount; lognormal variance with pedigree 0.044, pedigree (3,1,3,1,1)
  Calculated as equal to TOC, according to Ecoinvent Data Quality Guidelines.
- m-Xylene [air, non-urban air or from high stacks]: 1.92284e-6 kg; lognormal variance with pedigree 0.1306, pedigree (2,5,5,5,4)
  (same comment as for Magnesium)
- Nitrogen oxides [air, non-urban air or from high stacks]: 0.00195921 kg; lognormal variance with pedigree 0.0426, pedigree (2,1,3,1,1)
  Calculated value. Calculation based on emission factors from the data provider.
- Methane, fossil [air, non-urban air or from high stacks]: 3.83737e-6 kg; lognormal variance with pedigree 0.0426, pedigree (2,1,3,1,1)
  Calculated value. Calculation based on emission factors from the data provider.
- Carbon dioxide, fossil [air, non-urban air or from high stacks]: 0.117873 kg; lognormal variance with pedigree 0.0032, pedigree (2,1,3,1,1)
  Calculated value. Calculation based on emission factors from the data provider.
- Methanol [air, non-urban air or from high stacks]: 0.000600618 kg; lognormal variance with pedigree 0.0426, pedigree (2,1,3,1,1)
  Calculated value. Calculation based on emission factors from the data provider.
- Phosphorus [water, surface water]: 2.46461e-6 kg; lognormal variance with pedigree 0.042, pedigree (1,1,3,1,1)
- NMVOC, non-methane volatile organic compounds, unspecified origin [air, non-urban air or from high stacks]: 0.00038829 kg; lognormal variance with pedigree 0.0426, pedigree (2,1,3,1,1)
  Calculated value. Calculation based on emission factors from the data provider.
- TOC, Total Organic Carbon [water, surface water]: 0.00873711 kg; name TOCAmount; = CODAmount/2.7; lognormal variance with pedigree 0.044, pedigree (3,1,3,1,1)
  Calculated by default as TOC (gC) = COD/2.7 (COD measured in g O2), according to Ecoinvent Data Quality Guidelines. Should more correctly be calculated from the carbon content of the specified emissions to water.
- Mercury [air, non-urban air or from high stacks]: 1.57972e-9 kg; lognormal variance with pedigree 0.6526, pedigree (2,1,3,1,1)
  Calculated value. Calculation based on emission factors from the data provider.

## Sampling procedure
Data collected from internal reports of the paper mill.

## Review by Emilia Moreno Ruiz 2015-09-28
activity links added
