# diesel-electric generating set production 18.5kW

Dataset: EcoSpold 2, unit process
Geography: GLO
Time period: 2010-01-01 to 2019-12-31
Technology level: current
Classification: ISIC rev.4 ecoinvent: 2710a: Manufacture of electric motors, generators, for liquid fuels
Classification: EcoSpold01Categories: oil/production
Synonyms: genset
Scenario: Business-as-Usual
System model: Allocation at the point of substitution
Generated by: Tereza Levova
Database: ecoinvent
isCopyrightProtected: true
accessRestrictedTo: 1

## General comment
This dataset represents rough estimation of the production of diesel-electric generating set which can be attached to a reefer (refrigerated intermodal shipping container) and supply the power needed for maintaining the atmosphere inside the reefer.
This type of generator set (called often genset) is produced by many differnt producers. This dataset is build based on technical information available on following two types of genset; Carrier RG15 and Thermo King SGCO-3000.
Generator Set Unit for reefer, technical description (Carrier, 2014, Operation and service for 69RG15 generator set units, http://dms.hvacpartners.com//docs/2000/Public/04/T-361.pdf, accessed 20141218).
Generator Set Unit clipped on a reefer (http://www.mouzaliotis.com/portal/index.php/containers/reefer-containers, accessed 20141218).

## Included activities start
The activity starts when all the individual parts are brought to the production site for assembling.

## Included activities end
The activity ends when the generator set unit is assembled.

## Reference product
- diesel-electric generating set, 18.5kW: 1 unit; name genset_RP; CPC 46: Electrical machinery and apparatus; By-product classification allocatable product
  production volume 50000 unit; = (1.6*1000000*0.0625)/2
    Estimated value.
    It is estimated that the same amount of units of this diesel-electric generating set, 18.5kW is produced yearly as is the amount of reefers (refrigerated intermodal container) produced yearly.
    1.6 million TEU (Twenty-foot Equivalent unit) is newly added to the total capacity of shipping containers in the world (World Shipping Council, http://www.worldshipping.org/about-the-industry/containers/global-container-fleet, accessed 20141014).
    Out of that 6.25% are reefers (refrigerated containers).
    One 40-food, high-cube container has a capacity of 2 TEU.
  property weight 817 kg; name weight_RP
    Literature value.
    The weight of Carrier RG15 Genset (http://www.carrier.com/container-refrigeration/en/worldwide/products/generator-sets/RG15-Tier-4/, accessed 20141218).
  property price 10000 EUR2005; name genset_RP_price_EUR2005
    Estimated price based on prices offered online (alibaba and ebay). The price calculated based on the amount of the materials entering the production is 1780 Euro. The price of 1780 EURO is assumed to be heavily underestimated, since not all the products entering the production of the container have price in the database.
  property lifetime capacity [MJ] 946080 MJ; = 3*24*3.6*365*genset_RP_lifetime
    Estimated.
    It is estimated, that the genset is on average supplying 3kW of electricity which makes 72kWh/day.
  property lifetime 10 year; name genset_RP_lifetime
    Estimated to be the same as the lifetime of a reefer (refrigerated container).
  property true value 10000; name genset_RP_true_value
    allocation property applied in "true value" allocation // value calculated from revenue

## By-products
- cobalt: 0 kg; CPC 41601: Tungsten, molybdenum, tantalum, magnesium, cobalt, cadmium, titanium, zirconium, beryllium, gallium, hafnium, […]; By-product classification allocatable product
  EcoSpold01Location=GLO
  production volume 380380 kg
  property price 39.7 EUR2005
    Temporary price data. Calculated as 90% of purchasers price based on: Cobalt in USGS (2007) Mineral commodity summaries 2007. <http://minerals.usgs.gov/minerals/pubs/mcs/2007/mcs2007.pdf>
  property carbon content 0
    carbon content on a dry matter basis (reserved; not for manual entry)
  property true value 302.022
    allocation property applied in "true value" allocation // value calculated from revenue
  properties: dry mass 1 kg, water content 0, water in wet mass 0 kg, carbon content, non-fossil 0, wet mass 1 kg, carbon content, fossil 0, carbon allocation 0 kg
- iron scrap, unsorted: 0 kg; CPC 39310: Slag, dross, scalings and other waste from the manufacture of iron or steel; By-product classification Recyclable
  This flow substitutes the original byproduct "iron and steel, from used Li-ion battery pyrometallurgical process". Following an update in the production process of Li-battery, the byproduct of steel corresponds to reinforcing steel.
  production volume 316588 kg
  property price 0.149 EUR2005
    Temporary price data. Calculated as 90% of purchasers price based on: estimated at 85% of sorted scrap
  property carbon content 0
    carbon content on a dry matter basis (reserved; not for manual entry)
  property true value 0.943433
    allocation property applied in "true value" allocation // value calculated from revenue
  properties: carbon content, fossil 0, wet mass 1 kg, water in wet mass 0 kg, carbon content, non-fossil 0, water content 0, dry mass 1 kg, carbon allocation 0 kg
- lithium carbonate: 0 kg; CPC 34240: Phosphates of triammonium; salts and peroxysalts of inorganic acids and metals n.e.c.; By-product classification allocatable product; CAS 554-13-2
  EcoSpold01Location=GLO
  production volume 141570 kg
  property price 6.75 EUR2005
    For lithium, there is no exchange trading, no terminal storage market and only an extremely limited spot market (Reuters, 2016). The lithium price is negotiated bilateral and based on customer specifications with price information rarely publicly documented (European Lithium, 2017). Roskill Information Services estimate the price for technical grade lithium carbonate in 2017 between 6900 and 7800 USD per tonne, with a price premium of 500 USD for battery grade lithium (European Lithium, 2017). USGS estimates the price for lithium carbonate, battery grade, to be 7400USD in 2016 (USGS, 2017). Here an average price of 7500 USD per tonne lithium carbonate is assumed, average exchange rate 1 USD = 0.9 EUR in 2017 (Oanda, 2017). Resulting in a price for lithium carbonate of 6.75EUR/kg.
    Reference(s):
    European Lithium. 2017. Lithium Market. Online source: http://europeanlithium.com/lithium/lithium-market/, accessed 10 October 2017.
    Reuters. 2016. What price lithium, the metal of the future? Andy Home. Online source: https://www.reuters.com/article/us-lithium-batteries-ahome/what-price-lithium-the-metal-of-the-future-andy-home-idUSKCN0YS19D, accessed 10 October 2017.
    Oanda. 2017. https://www.oanda.com/lang/de/currency/average, accessed 10 October 2017.
    USGS. 2017. Lithium. Commodity Overview. Online https://minerals.usgs.gov/minerals/pubs/commodity/lithium/mcs-2017-lithi.pdf, accessed 10 October, 2017.
  property carbon content 0.16255
    carbon content on a dry matter basis (reserved; not for manual entry)
  property true value 19.112
    allocation property applied in "true value" allocation // value calculated from revenue
  properties: dry mass 1 kg, carbon content, non-fossil 0, water in wet mass 0 kg, carbon content, fossil 0.16255, water content 0, wet mass 1 kg, carbon allocation 0.16255 kg
- sulfuric acid: 0 kg; source Althaus H.-J. 2004; CPC 34231: Chemical elements n.e.c.; inorganic acids except phosphoric, nitric and sulphonitric; inorganic oxygen compoun[…]; By-product classification allocatable product; pedigree (1,1,1,1,1)
  production volume 182325 kg
  property price 0.031 EUR2005
    Temporary price data. Calculated as 90% of purchasers price based on: 2004 Import/Export data (total trades (USD) divided by total weight (kg) in EU27, USA, China, Japan and India) from UN Commodity Trade Statistics Database (http://data.un.org/Explorer.aspxDatabase [Accessed 2 July 2010]). Commodity: 'Sulphuric acid, oleum'
  property carbon content 0
    carbon content on a dry matter basis (reserved; not for manual entry)
  property true value 0.113042
    allocation property applied in "true value" allocation // value calculated from revenue
  properties: carbon content, non-fossil 0, dry mass 1 kg, carbon content, fossil 0, wet mass 1 kg, water content 0, water in wet mass 0 kg, carbon allocation 0 kg
- copper: 0 kg; By-product classification allocatable product; CPC 41413: Refined copper and copper alloys, unwrought; master alloys of copper; pedigree (1,1,1,1,1)
  Calculated value. Based on Li-ioin battery composition and hydrometallurgical treatment process outputs. The efficiency of Cu, Al and Manganese recovery is estimated 70% based on the estimations of the original process for Cu recovery.
  production volume 348150 kg
  property price 5.52 EUR2005; name copper_bp_price_EUR2005
  properties: carbon content, non-fossil 0, water in wet mass 0 kg, wet mass 1 kg, water content 0, dry mass 1 kg, carbon content, fossil 0, carbon content 0, carbon allocation 0 kg, true value 38.4358
- manganese: 0 kg; CPC 41603: Bismuth, antimony, manganese, chromium and articles thereof; including waste and scrap of bismuth or manganese; By-product classification allocatable product; pedigree (1,1,1,1,1)
  (same comment as for copper)
  production volume 9309.3 kg
  property price 1.24 EUR2005; name manganese_bp_price_EUR2005
    Literature value (USGS,http://minerals.usgs.gov/minerals/pubs/commodity/manganese/myb1-2009-manga.pdf, accessed 20160222). The price for manganese ore (48% manganese) is reported to be 6.61 USD/metric ton unit (MTU) = 10kg. The resulting price is (1/0.48*0.661=) 1.38 USD. Cross reference; in 2005 manganese was traded on the markets for 1.5 USD/kg (http://www.infomine.com/investment/metal-prices/manganese/all/, accessed 20160704).
  property carbon content 0
    carbon content on a dry matter basis (reserved; not for manual entry)
  property true value 0.230871
    allocation property applied in "true value" allocation // value calculated from revenue
  properties: dry mass 1 kg, water in wet mass 0 kg, carbon content, fossil 0, wet mass 1 kg, carbon content, non-fossil 0, water content 0, carbon allocation 0 kg
- aluminium oxide, non-metallurgical: 0 kg; source European Aluminium Association 2008; CPC 41432: Alumina (aluminium oxide), except artificial corundum; By-product classification allocatable product; CAS 1344-28-1; pedigree (1,1,1,1,1)
  production volume 331576 kg
  property carbon content, non-fossil 0; name C_content_non_fossil
  property price 0.28 EUR2005; name Al2O3Amount_price_EUR2005
    From UN trade database. http://data.un.org/ Import data from the largest economies of the world are used (Brazil, India, USA, China, Japan and EU-27).
  property dry mass 1 kg; name DM
  property water content 0; name water_content
  property wet mass 1 kg; name WM
  property water in wet mass 0 kg; name WWM
  property carbon content, fossil 0; name C_content_fossil
  property carbon content 0
    carbon content on a dry matter basis (reserved; not for manual entry)
  property true value 1.85683
    allocation property applied in "true value" allocation // value calculated from revenue
  properties: carbon allocation 0 kg
- aluminium, cast alloy: 0 kg; source European Aluminium Association 2008; By-product classification allocatable product; CPC 41431: Unwrought aluminium; pedigree (1,1,1,1,1)
  EcoSpold01Location=RER
  production volume 3.0995e6 kg
  property price 1.3 EUR2005; name castAlloyAmount_price_EUR2005
    Temporary price data. Calculated as 90% of purchasers price based on: Source: London Metal Exchange, Aluminium alloy price for 2005
  property carbon content 0
    carbon content on a dry matter basis (reserved; not for manual entry)
  property true value 80.5871
    allocation property applied in "true value" allocation // value calculated from revenue
  properties: water in wet mass 0 kg, carbon content, non-fossil 0, water content 0, dry mass 1 kg, carbon content, fossil 0, wet mass 1 kg, carbon allocation 0 kg
- heat, for reuse in municipal waste incineration only: 0 MJ; CPC 17300: Steam and hot water; By-product classification allocatable product; pedigree (1,1,1,1,1)
  Net electricity generated from this waste and used in internal MSWI plant energy redistribution.
  Uncertainty: uncertainty is calculated from uncertainties in waste composition and uncertainties in energy efficiency and the uncertainty in internal energy demand
  production volume 969417 MJ
  property exergy 0.1842 MJ; name E_th_prod_MSWI_exergy
    This exergy property is based on the exergy content of the product.
  property true value relation 0.1842; name E_th_prod_MSWI_true_value_relation
    property to calculate "true value" from
  property price 0.0106 EUR2005; name E_th_prod_MSWI_price_EUR2005
    Average European district heat price from Ecoheatcool and Euroheat 2005-2006, Ecoheat Work package 1: The European heat market. Final report. 10.6 EUR/GJ i s the price of district heat. http://www.solarthermalworld.org/files/Ecoheatcool%20WP1%20Web.pdf?download
  property true value 0.127104
    allocation property applied in "true value" allocation // value calculated from true value relation
- electricity, for reuse in municipal waste incineration only: 0 kWh; CPC 17100: Electrical energy; By-product classification allocatable product; pedigree (1,1,1,1,1)
  (same comment as for heat, for reuse in municipal waste incineration only)
  production volume 139403 kWh
  property exergy 3.6 MJ; name E_el_prod_MSWI_exergy
    This exergy property is based on the exergy content of the product.
  property true value relation 3.6; name E_el_prod_MSWI_true_value_relation
    property to calculate "true value" from
  property price 0.1 EUR2005; name E_el_prod_MSWI_price_EUR2005
    Estimated to be the same price as in case of electricity, medium voltage.
  property true value 0.357218
    (same comment as for heat, for reuse in municipal waste incineration only)
- aluminium, wrought alloy: 0 kg; source European Aluminium Association 2008; By-product classification allocatable product; CPC 4153: Semi-finished products of aluminium or aluminium alloys; pedigree (1,1,1,1,1)
  production volume 1.3569e6 kg
  property price 1.44 EUR2005; name secondaryAluminiumOutput_price_EUR2005
  properties: wet mass 1 kg, water content 0, carbon content, fossil 0, water in wet mass 0 kg, carbon content, non-fossil 0, dry mass 1 kg, carbon content 0, carbon allocation 0 kg, true value 39.0788
- zinc concentrate: 0 kg; CPC 14290: Other non-ferrous metal ores and concentrates (other than uranium or thorium ores and concentrates); By-product classification allocatable product
  Calculated value from the knowledge of the properties of both products.
  production volume 0.00528618 kg
  property price 0.38 EUR2005; name ByP_price_EUR2005
    Temporary price data. Calculated as 90% of purchasers price based on: Zinc content in concentrate 53%. Concentrate price per kg Zn 86.5% of refined Zn price (13.5% treatment charges according to CHR Metals Limited 2005: Dynamic cost curves. http://www.minecost.com/dynamic.pdf). 2004 zinc price from USGS (2007) Mineral commodity summaries 2007. <http://minerals.usgs.gov/minerals/pubs/mcs/2007/mcs2007.pdf> [Accessed 25 May 2010]
  property zinc content 0.53; name zinc_C_zinc_concentrate
    Zinc content on a dry matter basis. Value taken from teh "zinc mine operation" /GLO dataset.
  property dry mass 1 kg; name DM_zinc_concentrate
  property carbon content 0
    carbon content on a dry matter basis (reserved; not for manual entry)
  property true value 4.0175e-8
    allocation property applied in "true value" allocation // value calculated from revenue
  properties: wet mass 1 kg, water content 0, carbon content, non-fossil 0, carbon content, fossil 0, water in wet mass 0 kg, carbon allocation 0 kg
- iron scrap, sorted, pressed: 0 kg; By-product classification Recyclable; CPC 39310: Slag, dross, scalings and other waste from the manufacture of iron or steel; pedigree (1,1,1,1,1)
  metallic iron scrap removed from ash reamains and recycled.
  Uncertainty: uncertainty is calculated from uncertainties in waste composition and transfer coefficients to soild residues
  production volume 17356.5 kg
  property price 0.175 EUR2005
    Temporary price data. Calculated as 90% of purchasers price based on: 2005 import and export prices (total trades (USD) divided by total weight (kg) in biggest economies of the world: EU27, USA, Brasil, China, India, Japan and Russia) from UN Commodity Trade Statistics Database (http://data.un.org/Explorer.aspxDatabase [Accessed 2011.06.20]). Commodity: Waste or scrap, of cast iron
  property carbon content 0
    carbon content on a dry matter basis (reserved; not for manual entry)
  property true value 0.0607476
    allocation property applied in "true value" allocation // value calculated from revenue
  properties: carbon content, non-fossil 0, wet mass 1 kg, dry mass 1 kg, water content 0, carbon content, fossil 0, water in wet mass 0 kg, carbon allocation 0 kg
- manganese dioxide: 0 kg; CPC 34220: Zinc oxide; zinc peroxide; chromium oxides and hydroxides; manganese oxides; iron oxides and hydroxides; earth[…]; By-product classification allocatable product
  EcoSpold01Location=GLO
  production volume 7150 kg
  property price 1.04 EUR2005
    Calculated value based on data from United Nations Commodity Trade Statistics Database (comtrade.un.org). UN comtrade category: 282010 Managanese dioxide. Prices from the year 2005. Using exchange rate of 1EURO = 1.209 USD. Average of price of import into 5 main markets (EU, US, JP, IN and CN).
  property carbon content 0
    carbon content on a dry matter basis (reserved; not for manual entry)
  property true value 0.14872
    allocation property applied in "true value" allocation // value calculated from revenue
  properties: water in wet mass 0 kg, wet mass 1 kg, dry mass 1 kg, carbon content, fossil 0, water content 0, carbon content, non-fossil 0, carbon allocation 0 kg
- lead: 0 kg; CPC 41441: Lead, unwrought; By-product classification allocatable product
  EcoSpold01Location=SE
  production volume 12001.8 kg
  property price 0.744 EUR2005
    Temporary price data. Calculated as 90% of purchasers price based on: Source: ecoinvent v2 report 10-part IX, Tab 5.10 & 2.5
  property carbon content 0
    carbon content on a dry matter basis (reserved; not for manual entry)
  property true value 0.178587
    allocation property applied in "true value" allocation // value calculated from revenue
  properties: wet mass 1 kg, water content 0, carbon content, non-fossil 0, carbon content, fossil 0, dry mass 1 kg, water in wet mass 0 kg, carbon allocation 0 kg
- nickel, 99.5%: 0 kg; CPC 41422: Unwrought nickel; By-product classification allocatable product
  EcoSpold01Location=SE
  production volume 25053.5 kg
  property price 10.4 EUR2005
    Temporary price data. Calculated as 90% of purchasers price based on: 2004 nickel price from USGS (2007) Mineral commodity summaries 2007. <http://minerals.usgs.gov/minerals/pubs/mcs/2007/mcs2007.pdf> [Accessed 25 May 2010]
  property carbon content 0
    carbon content on a dry matter basis (reserved; not for manual entry)
  property true value 5.21112
    allocation property applied in "true value" allocation // value calculated from revenue
  properties: water in wet mass 0 kg, wet mass 1 kg, carbon content, non-fossil 0, dry mass 1 kg, water content 0, carbon content, fossil 0, carbon allocation 0 kg
- silver: 0 kg; CPC 41310: Silver (including silver plated with gold or platinum), unwrought or in semi-manufactured forms, or in powder […]; By-product classification allocatable product; CAS 7440-22-4
  EcoSpold01Location=SE
  production volume 4137.33 kg
  property price 178 EUR2005
    (same comment as for lead)
  property carbon content 0
    carbon content on a dry matter basis (reserved; not for manual entry)
  property true value 14.7289
    allocation property applied in "true value" allocation // value calculated from revenue
  properties: wet mass 1 kg, carbon content, non-fossil 0, dry mass 1 kg, water content 0, carbon content, fossil 0, water in wet mass 0 kg, carbon allocation 0 kg
- palladium: 0 kg; CPC 4160: Other non-ferrous metals and articles thereof (including waste and scrap of some metals); cermets and articles […]; By-product classification allocatable product
  EcoSpold01Location=SE
  production volume 229.028 kg
  property price 5640 EUR2005
    Temporary price data. Calculated as 90% of purchasers price based on: 2004 price from USGS (2007) Mineral commodity summaries 2007. <http://minerals.usgs.gov/minerals/pubs/mcs/2007/mcs2007.pdf> [Accessed 25 May 2010]
  property carbon content 0
    carbon content on a dry matter basis (reserved; not for manual entry)
  property true value 25.8344
    allocation property applied in "true value" allocation // value calculated from revenue
  properties: wet mass 1 kg, carbon content, fossil 0, water in wet mass 0 kg, water content 0, carbon content, non-fossil 0, dry mass 1 kg, carbon allocation 0 kg
- gold: 0 kg; CPC 41320: Gold (including gold plated with platinum), unwrought or in semi-manufactured forms, or in powder form; By-product classification allocatable product; CAS 7440-57-5
  EcoSpold01Location=SE
  production volume 125.598 kg
  property price 10600 EUR2005
    Temporary price data. Calculated as 90% of purchasers price based on: Source: ecoinvent v2 report 10-part IX, Tab 2.5
  property carbon content 0
    carbon content on a dry matter basis (reserved; not for manual entry)
  property true value 26.6268
    allocation property applied in "true value" allocation // value calculated from revenue
  properties: wet mass 1 kg, carbon content, fossil 0, dry mass 1 kg, carbon content, non-fossil 0, water content 0, water in wet mass 0 kg, carbon allocation 0 kg

## Inputs from technosphere
- metal working, average for steel product manufacturing: 439.006 kg; = steel_in; lognormal variance with pedigree 0.0186, pedigree (4,5,3,1,1)
  Calculated.
- battery, Li-ion, rechargeable, prismatic: 27.0945 kg; name battery_in; source Carrier 2014; lognormal variance with pedigree 0.0186, pedigree (4,5,3,1,1)
  Literature value (Carrier, 2014, Operation and service for 69RG15 generator set units, http://dms.hvacpartners.com//docs/2000/Public/04/T-361.pdf, accessed 20141218).
  properties: carbon content, fossil 0.328011, dry mass 1 kg, wet mass 1 kg
- aluminium, wrought alloy: 284.208 kg; name aluminium_in; lognormal variance with pedigree 0.0186, pedigree (4,5,3,1,1)
  Estimated.
  properties: dry mass 1 kg, wet mass 1 kg
- zinc coat, pieces: 5.87363 m2; = (2.4*1*2)+(0.7*1*2); lognormal variance with pedigree 0.0186, pedigree (4,5,3,1,1)
  Calculated value based on estimates.
  The dimentions of the genset are approximatelly 2.4*1*0.7m.
- copper: 9.4736 kg; name copper_in; lognormal variance with pedigree 0.0186, pedigree (4,5,3,1,1)
  Estimated.
  properties: dry mass 1 kg, wet mass 1 kg
- steel, low-alloyed, hot rolled: 439.006 kg; name steel_in; = weight_RP-( aluminium_in+ battery_in+ copper_in+ electronics_in); lognormal variance with pedigree 0.0186, pedigree (4,5,3,1,1)
  Calculated value.
  properties: dry mass 1 kg, wet mass 1 kg, carbon content, fossil 0.005
  note on carbon content, fossil: Low alloyed steel composition given in Tab. 3.2 ecoinvent v2.2 report 10_partII. Steel assumed to have a C content of 0.5%
- used diesel-electric generating set, 18.5kW: -0.94736 unit; = (genset_RP)*-1
  production volume 50000 unit; = Ref('15c6a142-d94c-4ac7-8271-f3d7110461ff', 'ProductionVolume') * ((Ref('fa92780f-0d30-4c39-bc33-0daeec7740ae')*-1) / Ref('15c6a142-d94c-4ac7-8271-f3d7110461ff'))
    Calculated from production volume of reference product using the relative outputs.
  properties: dry mass 817 kg, carbon content, non-fossil 0.002016, carbon content, fossil 16.7, wet mass 817 kg
  note on carbon content, non-fossil: Calculated based on amount of materials and their carbon content entering the generation set production.
- metal working, average for aluminium product manufacturing: 284.208 kg; = aluminium_in; lognormal variance with pedigree 0.0186, pedigree (4,5,3,1,1)
  Calculated.
- welding, arc, steel: 9.4736 m; lognormal variance with pedigree 0.0186, pedigree (4,5,3,1,1)
  Estimated.
- electronics, for control units: 14.2104 kg; name electronics_in; source Carrier 2014; lognormal variance with pedigree 0.0186, pedigree (4,5,3,1,1)
  Estimated based on literature.
  properties: wet mass 1 kg, carbon content, non-fossil 0.00013442, carbon content, fossil 0.337146, dry mass 1 kg
  note on carbon content, non-fossil: The control unit has a composition of 46% steel (housing), 32% plastics, 14% printed wiring boards and 8% cables (various types).;
