# maintenance, reefer, intermodal shipping container, 40-foot, high-cube

Dataset: EcoSpold 2, unit process
Geography: GLO
Time period: 2010-01-01 to 2019-12-31
Technology level: current
Classification: EcoSpold01Categories: transport systems/train
Classification: ISIC rev.4 ecoinvent: 3315:Repair of transport equipment, except motor vehicles
Scenario: Business-as-Usual
System model: Allocation at the point of substitution
Generated by: Tereza Levova
Database: ecoinvent
isCopyrightProtected: true
accessRestrictedTo: 1

## General comment
This dataset describe materials needed for the maintenance of reefer (refrigerated container) during its lifetime.
The data on reefer maintenance are scarce and vary a lot. The data in this dataset are calculated based on estimates or estimated, thus the uncertainty is rather high.
The amount of maintenance might vary depending on what kind of cargo is being transported and how often is the container being used.

## Included activities start
The activity starts with different materials needed for the maintenance of the container enter the activity.

## Parameters
- density: 7800 kg/m3; name density_corrugated_steel_wall; lognormal variance with pedigree 0.0032, pedigree (3,3,1,1,1)
  Estimated. The density of steel, low-alloyed used for the corrugated steel walls of the container.
- lifetime: 10 year; name lifetime_container; lognormal variance with pedigree 0.0006, pedigree (1,1,1,1,1)
  Industrial data.
- fraction, process water, to air: 0.15 dimensionless; name fraction_PW_to_air; lognormal variance with pedigree 0.0166, pedigree (4,5,1,1,1)
  Estimated.
- thickness of metal sheet_01: 1.4 mm; name thickness_walls; lognormal variance with pedigree 0.0026, pedigree (1,4,1,1,1)
  Industrial data.

## Reference product
- maintenance, reefer, intermodal shipping container, 40-foot, high-cube: 1 unit; CPC 87149: Maintenance and repair services of other transport equipment; By-product classification allocatable product
  production volume 339281 unit; = (32.9*1000000*0.33*0.0625)/2
    Calculated value.
    Each reefer container need one refrigeration machine.
    32.9 million TEU (Twenty-foot Equivalent unit) is the capacity of shipping containers in the world (World Shipping Council, http://www.worldshipping.org/about-the-industry/containers/global-container-fleet, accessed 20141014).
    Out of that 33% is 40-food, high-cube containers (Containerization International Market Analysis, World Container Census 2008, http://people.hofstra.edu/geotrans/eng/ch3en/conc3en/containerfleet.html, accessed 20141014).
    Out of that 6.25% are reefers (refrigerated containers) and 89% are traditional dry carbo containers.
    One 40-food, high-cube container has a capacity of 2 TEU.
  property price 98.1004 EUR2005
    Calculated based on inputs: The price of the product has been calculated as a sum of the values of the material and energy inputs for this product. This value is therefore a rough estimation. It may underestimate the real price since there are additional expenses when producing any product. These expences can include for example labour costs, treatment of waste materials and profit for the producer. Please consider carefully whether this level of data quality is acceptable for your application.
  property true value 98.1004
    allocation property applied in "true value" allocation // value calculated from revenue

## By-products
- heat, for reuse in municipal waste incineration only: 0 MJ; CPC 17300: Steam and hot water; By-product classification allocatable product; pedigree (1,1,1,1,1)
  Net electricity generated from this waste and used in internal MSWI plant energy redistribution.
  production volume 4.04128e7 MJ
  property true value relation 0.1842; name E_th_prod_MSWI_true_value_relation
    property to calculate 'true value' from
  property exergy 0.1842 MJ; name E_th_prod_MSWI_exergy
    This exergy property is based on the exergy content of the product.
  property price 0.0106 EUR2005; name E_th_prod_MSWI_price_EUR2005
    Average European district heat price from Ecoheatcool and Euroheat 2005-2006, Ecoheat Work package 1: The European heat market. Final report. 10.6 EUR/GJ i s the price of district heat. http://www.solarthermalworld.org/files/Ecoheatcool%20WP1%20Web.pdf?download
  property true value 0.258206
    allocation property applied in "true value" allocation // value calculated from true value relation
- electricity, for reuse in municipal waste incineration only: 0 kWh; CPC 17100: Electrical energy; By-product classification allocatable product; pedigree (1,1,1,1,1)
  (same comment as for heat, for reuse in municipal waste incineration only)
  production volume 5.73252e6 kWh
  property price 0.1 EUR2005; name E_el_prod_MSWI_price_EUR2005
    Estimated to be the same price as in case of electricity, medium voltage.
  property true value relation 3.6; name E_el_prod_MSWI_true_value_relation
    property to calculate 'true value' from
  property exergy 3.6 MJ; name E_el_prod_MSWI_exergy
    This exergy property is based on the exergy content of the product.
  property true value 0.714508
    (same comment as for heat, for reuse in municipal waste incineration only)
- zinc concentrate: 0 kg; CPC 14290: Other non-ferrous metal ores and concentrates (other than uranium or thorium ores and concentrates); By-product classification allocatable product
  Calculated value from the knowledge of the properties of both products.
  production volume 2491.38 kg
  property price 0.38 EUR2005; name ByP_price_EUR2005
    Temporary price data. Calculated as 90% of purchasers price based on: Zinc content in concentrate 53%. Concentrate price per kg Zn 86.5% of refined Zn price (13.5% treatment charges according to CHR Metals Limited 2005: Dynamic cost curves. http://www.minecost.com/dynamic.pdf). 2004 zinc price from USGS (2007) Mineral commodity summaries 2007. <http://minerals.usgs.gov/minerals/pubs/mcs/2007/mcs2007.pdf> [Accessed 25 May 2010]
  property zinc content 0.53; name zinc_C_zinc_concentrate
    Zinc content on a dry matter basis. Value taken from teh "zinc mine operation" /GLO dataset.
  property dry mass 1 kg; name DM_zinc_concentrate
  property carbon content 0
    carbon content on a dry matter basis (reserved; not for manual entry)
  property true value 5.6738e-5
    allocation property applied in "true value" allocation // value calculated from revenue
  properties: wet mass 1 kg, water content 0, carbon content, non-fossil 0, carbon content, fossil 0, water in wet mass 0 kg, carbon allocation 0 kg
- iron scrap, sorted, pressed: 0 kg; By-product classification Recyclable; CPC 39310: Slag, dross, scalings and other waste from the manufacture of iron or steel; pedigree (1,1,1,1,1)
  Iron scrap recovered from this waste.
  production volume 822663 kg
  property price 0.175 EUR2005
    Temporary price data. Calculated as 90% of purchasers price based on: 2005 import and export prices (total trades (USD) divided by total weight (kg) in biggest economies of the world: EU27, USA, Brasil, China, India, Japan and Russia) from UN Commodity Trade Statistics Database (http://data.un.org/Explorer.aspxDatabase [Accessed 2011.06.20]). Commodity: Waste or scrap, of cast iron
  property carbon content 0
    carbon content on a dry matter basis (reserved; not for manual entry)
  property true value 0.00286302
    allocation property applied in "true value" allocation // value calculated from revenue
  properties: water content 0, water in wet mass 0 kg, carbon content, fossil 0, dry mass 1 kg, carbon content, non-fossil 0, wet mass 1 kg, carbon allocation 0 kg

## Inputs from technosphere
- tap water: 35645.5 kg; name tap_water_in; = 2*12*150* lifetime_container; lognormal variance with pedigree 0.0186, pedigree (4,5,3,1,1)
  Estimated value.
  It is estimated, that the container is being cleaned 2 times a months using 150 litres of water.
  properties: wet mass 1 kg, water content 2962.17, carbon content, fossil 0.00178991, dry mass 0.000337476 kg
  note on carbon content, fossil: Bicarbonate content is 2.93 mol/m3. CO2 content is 0.1 mol/m3 (ecoinvent v2.2 report 8, Tab 93.1).
- waste mineral oil: 0 kg; name oil_out
  production volume 0 kg
    Calculated from production volume of reference product using the relative outputs.
  property price 0 EUR2005; name oil_out_price_EUR2005
  properties: wet mass 1 kg, carbon content, fossil 0.864444, dry mass 0.9 kg, water content 0.111111
  note on carbon content, fossil: Tab A.6, ecoinvent v2.2 report 13_I. C content has been calculated after data in the tables, and then referred to 1 kg DM
- waste rubber, unspecified: 0 kg; pedigree (1,1,1,1,1)
  Calculated value.
  production volume 0 kg
    Calculated from production volume of reference product using the relative outputs.
  properties: dry mass 1 kg, wet mass 1 kg, carbon content, fossil 0.853
- building, hall: 0.00322536 m2; = 1/(( lifetime_building*365)/(12.192*2.438*2)); lognormal variance with pedigree 0.318, pedigree (4,5,3,1,1)
  Calculated value based on estimates.
  1m2 of hall is available every day for 50 years
  1 container occupies the area of its based for the period of 2 days once a year for maintenance
  property lifetime 50 year; name lifetime_building
- steel, low-alloyed, hot rolled: 21.6249 kg; name steel_in; = 3*(10/15)*(thickness_walls/1000)*density_corrugated_steel_wall; lognormal variance with pedigree 0.0186, pedigree (4,5,3,1,1)
  Estimated value.
  It is estimated, that approximately 2m2 of corrugated steel with a thickness of 1.4mm is being used during the lifetime of a container to fix small cracks.
  properties: dry mass 1 kg, wet mass 1 kg, carbon content, fossil 0.005
  note on carbon content, fossil: Low alloyed steel composition given in Tab. 3.2 ecoinvent v2.2 report 10_partII. Steel assumed to have a C content of 0.5%
- synthetic rubber: 5.82881 kg; name rubber_in; lognormal variance with pedigree 0.0186, pedigree (4,5,3,1,1)
  Estimated value.
  It is estimated, that the rubber used for the seal gasket is exchanged at least once during the lifetime of the container.
  properties: wet mass 1 kg, dry mass 1 kg, carbon content, fossil 0.871949
  note on carbon content, fossil: EPDM (Ethylene-propene-diene terpolymer) rubber is a terpolymer of ethylene, propene, and a diene with the residual unsaturated portion of the diene in the side chain (ecoinvent v2.2 report 7-part XX & Ullmann). Chemical formula (deduced from Evidences of Solvent-Induced Miscibility in Polychloroprene-co-Ethylene-Propene Diene Terpolymer Blends, Dubey et al., Journal of Applied Polymer Science, 2009, 111:1884–1891): C20H35
- metal working, average for steel product manufacturing: 21.6249 kg; = steel_in; lognormal variance with pedigree 0.0186, pedigree (4,5,3,1,1)
  Calculated value.
- wastewater, unpolluted: 0 m3; pedigree (1,1,1,1,1)
  Calculated value.
  production volume 0 m3
    Calculated from production volume of reference product using the relative outputs.
  properties: water content 2962.17, dry mass 0.337476 kg, carbon content, non-fossil 0.00178991, wet mass 1000 kg, carbon content, fossil 0.00178991
  note on carbon content, fossil: Assumed to be like in tap water. Bicarbonate content is 2.93 mol/m3. CO2 content is 0.1 mol/m3 (ecoinvent v2.2 report 8, Tab 93.1).
- lubricating oil: 0 kg; name oil_in; pedigree (1,1,1,1,1)
  Estimated value.
  It is estimated, that the hinges of the container are being treated with oil (1kg) twice a year.
  properties: dry mass 1 kg, wet mass 1 kg, carbon content, fossil 0.75
  note on carbon content, fossil: Lubricating oil is produced from diesel. C-content/dry mass of fats and oils considered 75%, from: ecoinvent v2.2 report, n 15a, pg 40
- scrap steel: 0 kg; name steel_out; pedigree (1,1,1,1,1)
  Calculated value.
  production volume 0 kg
    Calculated from production volume of reference product using the relative outputs.
  property price 0 EUR2005; name steel_out_price_EUR2005
  properties: dry mass 1 kg, wet mass 1 kg
- waste mineral oil: -4.45748, -0.103141, -13.2621 kg (3 entries)
  production volume 6.10706e6 kg
- waste rubber, unspecified: -2.85449, -0.119831, -2.85449 kg (3 entries); lognormal variance with pedigree 0.0186, pedigree (4,5,3,1,1)
  Calculated value.
  production volume 1.99727e6 kg
- wastewater, unpolluted: -0.242389, -30.0563 m3 (2 entries); lognormal variance with pedigree 0.0186, pedigree (4,5,3,1,1)
  Calculated value.
  production volume 1.0382e7 m3
- lubricating oil: 3.44567, 16.3574 kg (2 entries); lognormal variance with pedigree 0.0186, pedigree (4,5,3,1,1)
  (same comment as for lubricating oil)
- scrap steel: -5.26557, -0.00665699, -16.3527 kg (3 entries); lognormal variance with pedigree 0.0186, pedigree (4,5,3,1,1)
  Calculated value.
  production volume 7.4099e6 kg

## Emissions to nature
- Oils, unspecified [soil, unspecified]: 1.98031 kg; name oil_into_soil; = oil_in*0.1; lognormal variance with pedigree 0.0186, pedigree (4,5,3,1,1)
  Estimated value.
- Water [air, unspecified]: 5.34682 m3; name water_to_air; = (tap_water_in* fraction_PW_to_air)/1000; lognormal variance with pedigree 0.0186, pedigree (4,5,3,1,1)
  Calculated value.
