# distribution network construction, electricity, low voltage

Dataset: EcoSpold 2, unit process
Geography: CH
Time period: 1988-01-01 to 2019-12-31
Technology level: current
Classification: EcoSpold01Categories: electricity/distribution
Classification: ISIC rev.4 ecoinvent: 4220a: Construction of utility projects for electricity production, except for liquid fuels
Tags: ConvertedDataset
Scenario: Business-as-Usual
System model: Allocation at the point of substitution
Share of production covered: 100 %
Generated by: Mireille Faist Emmenegger (obsolete)
Published in: Dones R. 2007
Database: ecoinvent
isCopyrightProtected: true
accessRestrictedTo: 1

## General comment
This dataset describes the infrastructure (poles, cables etc.) of the electricity distribution network. It includes the medium-to-low voltage switching stations.
[This dataset was already contained in the ecoinvent database version 2. It was not individually updated during the transfer to ecoinvent version 3. Life Cycle Impact Assessment results may still have changed, as they are affected by changes in the supply chain, i.e. in other datasets. This dataset was generated following the ecoinvent quality guidelines for version 2. It may have been subject to central changes described in the ecoinvent version 3 change report (http://www.ecoinvent.org/database/ecoinvent-version-3/reports-of-changes/), and the results of the central updates were reviewed extensively. The changes added e.g. consistent water flows and other information throughout the database. The documentation of this dataset can be found in the ecoinvent reports of version 2, which are still available via the ecoinvent website. The change report linked above covers all central changes that were made during the conversion process.]

## Geography
The calculations are based on Swiss data

## Technology
Switching stations use SF6.

## Reference product
- distribution network, electricity, low voltage: 1 km; CPC 532: Civil engineering works; By-product classification allocatable product
  production volume 0.0336675 km
    This is a placeholder value that does not reflect real-world production volumes. This dataset does not currently require a real-world production volume to work in the database framework, and no actual data were collected yet. This has no negative effect on the results of the ecoinvent database. The placeholder value of this activity was scaled according to the nominal GDP of 2005 (source: United Nations, http://data.un.org/Glossary.aspx?q=GDP+%28current+US%24%29, accessed 20130726) to reflect an appropriate share of the global production volume, which is also a placeholder value.
  property price 929713 EUR2005
    Assumed to be eqaul to 'transmission network, electricity, medium voltage'.
  property true value 929713
    allocation property applied in "true value" allocation // value calculated from revenue

## By-products
- electricity, for reuse in municipal waste incineration only: 0 kWh; CPC 17100: Electrical energy; By-product classification allocatable product; pedigree (1,1,1,1,1)
  Net electricity generated from this waste and used in internal MSWI plant energy redistribution.
  Uncertainty: uncertainty is calculated from uncertainties in waste composition and uncertainties in energy efficiency and the uncertainty in internal energy demand
  production volume 1030.03 kWh
  property price 0.1 EUR2005; name E_el_prod_MSWI_price_EUR2005
    Estimated to be the same price as in case of electricity, medium voltage.
  property exergy 3.6 MJ; name E_el_prod_MSWI_exergy
    This exergy property is based on the exergy content of the product.
  property true value relation 3.6; name E_el_prod_MSWI_true_value_relation
    property to calculate "true value" from
  property true value 133.586
    allocation property applied in "true value" allocation // value calculated from true value relation
- heat, for reuse in municipal waste incineration only: 0 MJ; CPC 17300: Steam and hot water; By-product classification allocatable product; pedigree (1,1,1,1,1)
  Net useful heat generated from this waste and used in internal MSWI plant energy redistribution.
  Uncertainty: uncertainty is calculated from uncertainties in waste composition and uncertainties in energy efficiency and the uncertainty in internal energy demand
  production volume 7715.18 MJ
  property exergy 0.1842 MJ; name E_th_prod_MSWI_exergy
    This exergy property is based on the exergy content of the product.
  property true value relation 0.1842; name E_th_prod_MSWI_true_value_relation
    property to calculate "true value" from
  property price 0.0106 EUR2005; name E_th_prod_MSWI_price_EUR2005
    Average European district heat price from Ecoheatcool and Euroheat 2005-2006, Ecoheat Work package 1: The European heat market. Final report. 10.6 EUR/GJ i s the price of district heat. http://www.solarthermalworld.org/files/Ecoheatcool%20WP1%20Web.pdf?download
  property true value 51.1973
    (same comment as for electricity, for reuse in municipal waste incineration only)
- zinc concentrate: 0 kg; CPC 14290: Other non-ferrous metal ores and concentrates (other than uranium or thorium ores and concentrates); By-product classification allocatable product
  Calculated value from the knowledge of the properties of both products.
  production volume 2.6188 kg
  property price 0.38 EUR2005; name ByP_price_EUR2005
    Temporary price data. Calculated as 90% of purchasers price based on: Zinc content in concentrate 53%. Concentrate price per kg Zn 86.5% of refined Zn price (13.5% treatment charges according to CHR Metals Limited 2005: Dynamic cost curves. http://www.minecost.com/dynamic.pdf). 2004 zinc price from USGS (2007) Mineral commodity summaries 2007. <http://minerals.usgs.gov/minerals/pubs/mcs/2007/mcs2007.pdf> [Accessed 25 May 2010]
  property zinc content 0.53; name zinc_C_zinc_concentrate
    Zinc content on a dry matter basis. Value taken from teh "zinc mine operation" /GLO dataset.
  property dry mass 1 kg; name DM_zinc_concentrate
  property carbon content 0
    carbon content on a dry matter basis (reserved; not for manual entry)
  property true value 0.995144
    allocation property applied in "true value" allocation // value calculated from revenue
  properties: wet mass 1 kg, water content 0, carbon content, non-fossil 0, carbon content, fossil 0, water in wet mass 0 kg, carbon allocation 0 kg

## Inputs from technosphere
- concrete, normal: 1.4797 m3; lognormal variance with pedigree 0.0601, pedigree (3,2,5,1,3)
  Literature and estimations
  Literature and estimations
  properties: wet mass 2380 kg, dry mass 2190 kg, water content 0.086758
- waste polyvinylchloride: -616.877 kg; lognormal variance with pedigree 0.438, pedigree (5,5,5,1,1)
  Estimates
  Estimates
  production volume 617 kg
    Calculated from the production volume of distribution network, electricity, low voltage in proportion to the respective output amounts.
  properties: water content 0.00200401, carbon content, fossil 0.440882, wet mass 1 kg, dry mass 0.998 kg
  note on carbon content, fossil: C content in 1 kg DM was calculated using data in Tab A.1, ecoinvent v2.2 report 13_I
- packaging film, low density polyethylene: 74.6851 kg; lognormal variance with pedigree 0.0601, pedigree (3,2,5,1,3)
  Literature and estimations
  Literature and estimations
  properties: carbon content, fossil 0.857143, wet mass 1 kg, dry mass 1 kg
  note on carbon content, fossil: Polyethylene is formed out of a huge amount of ethylene monomers (C2H4) (ecoinvent v2.2 report 11_II). MW=28 g/mol
- steel, unalloyed: 2299.54 kg; lognormal variance with pedigree 0.0601, pedigree (3,2,5,1,3)
  Literature and estimations
  Literature and estimations
  properties: dry mass 1 kg, carbon content, fossil 0.0025, wet mass 1 kg
  note on carbon content, fossil: Unalloyed steels or carbon steels are those in which the level of an individual element in no case reaches or exceeds the limiting concentration given in Tab. 3.1 ecoinvent v2.2 report 10_partII. Assumed to have a C content of 0.25%
- waste concrete: -3259.35 kg; lognormal variance with pedigree 0.438, pedigree (5,5,5,1,1)
  Estimates
  Estimates
  production volume 3260 kg
    (same comment as for waste polyvinylchloride)
  properties: dry mass 0.5 kg, wet mass 1 kg, water content 1
- building, multi-storey: 2.16957 m3; lognormal variance with pedigree 0.138, pedigree (5,5,5,1,1)
  Estimates
  Estimates
- excavation, hydraulic digger: 40.3919 m3; lognormal variance with pedigree 0.0761, pedigree (4,2,5,1,3)
  Estimates
  Estimates
- sulfur hexafluoride, liquid: 0.0867827 kg; lognormal variance with pedigree 0.0601, pedigree (3,2,5,1,3)
  Literature and estimations
  Literature and estimations
  properties: wet mass 1 kg, dry mass 1 kg
- sawlog and veneer log, softwood, debarked, measured as solid wood: 1.91962 m3; lognormal variance with pedigree 0.0601, pedigree (3,2,5,1,3)
  Literature and estimations
  Literature and estimations
  properties: wet mass 765 kg, water content 0.7, dry mass 450 kg, carbon content, non-fossil 0.494
  note on carbon content, non-fossil: C content of dry mass is 0.494 kgC/kg dry wood (ecoinvent v2.2 report 9)
- building, hall, steel construction: 0.0556889 m2; lognormal variance with pedigree 0.138, pedigree (5,5,5,1,1)
  Estimates
  This exchange has an activity link directly to the producing activity because the product is primarily consumed in the same geographical area where it is produced.
- copper: 1879.62 kg; lognormal variance with pedigree 0.0601, pedigree (3,2,5,1,3)
  Literature and estimations
  Literature and estimations
  properties: dry mass 1 kg, wet mass 1 kg
- lead: 223.955 kg; lognormal variance with pedigree 0.0601, pedigree (3,2,5,1,3)
  Literature and estimations
  Literature and estimations
  properties: dry mass 1 kg, wet mass 1 kg
- wood preservation, oscillating pressure method, inorganic salt, containing Cr, outdoor use, ground contact: 34.1932 kg
  Literature and estimations
- waste polyethylene: -74.6851 kg; lognormal variance with pedigree 0.438, pedigree (5,5,5,1,1)
  Estimates
  Estimates
  production volume 74.7 kg
    (same comment as for waste polyvinylchloride)
  properties: carbon content, fossil 0.825301, water content 0.00401606, wet mass 1 kg, dry mass 0.996 kg
- polyvinylchloride, suspension polymerised: 538.126 kg; lognormal variance with pedigree 0.0601, pedigree (3,2,5,1,3)
  Literature and estimations
  Literature and estimations
  properties: carbon content, fossil 0.387097, dry mass 1 kg, wet mass 1 kg
  note on carbon content, fossil: Monomer is vynyl chloride, C2H3Cl (ecoinvent v2.2 report 11_II). MW=62 g/mol
- waste mineral oil: -236.953 kg; lognormal variance with pedigree 0.438, pedigree (5,5,5,1,1)
  Estimates
  Estimates
  production volume 237 kg
    (same comment as for waste polyvinylchloride)
  properties: water content 0.111111, dry mass 0.9 kg, carbon content, fossil 0.864444, wet mass 1 kg
  note on carbon content, fossil: Tab A.6, ecoinvent v2.2 report 13_I. C content has been calculated after data in the tables, and then referred to 1 kg DM
- light fuel oil: 236.953 kg; lognormal variance with pedigree 0.0601, pedigree (3,2,5,1,3)
  Literature and estimations
  Literature and estimations
  properties: dry mass 1 kg, carbon content, fossil 0.862, wet mass 1 kg
- polyvinylchloride, emulsion polymerised: 78.7505 kg; lognormal variance with pedigree 0.0601, pedigree (3,2,5,1,3)
  Literature and estimations
  Literature and estimations
  properties: carbon content, fossil 0.387097, dry mass 1 kg, wet mass 1 kg
- waste wood pole, chrome preserved: -1039.79 kg; lognormal variance with pedigree 0.438, pedigree (5,5,5,1,1)
  Estimates
  Estimates
  production volume 1040 kg
    (same comment as for waste polyvinylchloride)
  properties: dry mass 0.8 kg, wet mass 1 kg, carbon content, non-fossil 0.483676, water content 0.25
  note on carbon content, non-fossil: Tab A.4, ecoinvent v2.2 report 13_I. C content has been referred to 1 kg DM,

## Inputs from nature
- Transformation, from forest, unspecified [natural resource, land]: 0.658868 m2; lognormal variance with pedigree 0.138, pedigree (5,5,5,1,1)
  Estimates
- Transformation, from annual crop [natural resource, land]: 0.825835 m2; lognormal variance with pedigree 0.178, pedigree (5,5,5,1,1)
  Estimates
- Transformation, to industrial area [natural resource, land]: 1.4897 m2; lognormal variance with pedigree 0.138, pedigree (5,5,5,1,1)
  Estimates
- Occupation, industrial area [natural resource, land]: 44.5911 m2*year; lognormal variance with pedigree 0.258, pedigree (5,5,5,1,1)
  Estimates

## Emissions to nature
- Fluoride [soil, unspecified]: 2.72945 kg; lognormal variance with pedigree 0.0926, pedigree (3,3,5,1,1)
  Information from LCA on wooden poles
- Boron [soil, unspecified]: 0.713857 kg; lognormal variance with pedigree 0.0926, pedigree (3,3,5,1,1)
  Information from LCA on wooden poles
- Chromium VI [soil, unspecified]: 4.03919 kg; lognormal variance with pedigree 0.0926, pedigree (3,3,5,1,1)
  Information from LCA on wooden poles
- Sulfur hexafluoride [air, unspecified]: 0.00169966 kg; lognormal variance with pedigree 0.08, pedigree (1,1,5,1,1)
  Statistics
- Copper [soil, unspecified]: 2.5195 kg; lognormal variance with pedigree 0.0926, pedigree (3,3,5,1,1)
  Information from LCA on wooden poles

## Sampling procedure
statistics

## Extrapolations
Infrastructure is extrapolated to the entire Swiss territory on the basis of statistics available for smaller areas and of data representativeness

## Review by Gerald Rebitzer (obsolete) 2003-08-10
passed

## Review by Emilia Moreno Ruiz 2014-05-26
updated to fit to the new wood preservation data
