# resistor production, surface-mounted

Dataset: EcoSpold 2, unit process
Geography: GLO
Time period: 1994-01-01 to 2019-12-31
Technology level: current
Classification: EcoSpold01Categories: electronics/component
Classification: ISIC rev.4 ecoinvent: 2610:Manufacture of electronic components and boards
Scenario: Business-as-Usual
System model: Allocation at the point of substitution
Generated by: Roland Hischier
Published in: Hischier R. 2007
Database: ecoinvent
isCopyrightProtected: true
accessRestrictedTo: 1

## General comment
This dataset represents the production of 1 kg of SMD type resistors for the surface mounting technology. It is based on the assumption that a typical SMD type resistor electronic module has an average weight of 9.8 milligrams.The data represent a typical SMD resistor for surface mounting, used in the information and communication technology. Material data are taken from datasheets of producers of such resistors and from the literature. Infrastructure and production efforts are based on own assumptions.The production efforts represent not a specific resistor type and have thus, accordingly higher uncertainties.
[This dataset was already contained in the ecoinvent database version 2. It was not individually updated during the transfer to ecoinvent version 3. Life Cycle Impact Assessment results may still have changed, as they are affected by changes in the supply chain, i.e. in other datasets. This dataset was generated following the ecoinvent quality guidelines for version 2. It may have been subject to central changes described in the ecoinvent version 3 change report (http://www.ecoinvent.org/database/ecoinvent-version-3/reports-of-changes/), and the results of the central updates were reviewed extensively. The changes added e.g. consistent water flows and other information throughout the database. The documentation of this dataset can be found in the ecoinvent reports of version 2, which are still available via the ecoinvent website. The change report linked above covers all central changes that were made during the conversion process.]

## Included activities start
From reception of metals, plastics at the factory gate.

## Included activities end
This dataset includes raw material input and production efforts for the production of currently used SMD resistors for surface mounting technology.

## Geography
Data represent a global valuable composition of SMD resistors

## Technology
Average technology for the production of resistors and potentiometers - comprising terminmation printing; resistive body printing; glass coat printing; laser trimming; substrate stripping (SMT) resp. ceramic rods; deposition processes; ageing; capping (THT) resp. printing; curing; punching; revetting; molding (ptoentiom.)

## Reference product
- resistor, surface-mounted: 1 kg; source Hobbs L. 2007; CPC 47120: Electrical resistors (except heating resistors); By-product classification allocatable product
  EcoSpold01Location=GLO
  SMD type resistor is generally associated to chip or resistors that are mounted by solder reflow techniques. This consists of a resistive element of a flat ceramic substrate (or a cylindrical ceramic core) with a solder pad on each end.
  production volume 1 kg
    Dummy value to be replaced by measured, estimated or calculated value
  property price 99.1014 EUR2005
    Calculated based on inputs: The price of the product has been calculated as a sum of the values of the material and energy inputs for this product. This value is therefore a rough estimation. It may underestimate the real price since there are additional expenses when producing any product. These expences can include for example labour costs, treatment of waste materials and profit for the producer. Please consider carefully whether this level of data quality is acceptable for your application.
  property carbon content, fossil 0.00893558
    Calculated as the addition of C contents in the product composition, and referred to 1 kg DM resistor.
  property carbon content, non-fossil 0
    (same comment as for resistor, surface-mounted)
  property carbon content 0.00893558
    carbon content on a dry matter basis (reserved; not for manual entry)
  properties: water content 0, dry mass 1 kg, wet mass 1 kg, water in wet mass 0 kg, carbon allocation 0.00893558 kg

## Inputs from technosphere
- tin: 0.014391 kg; source Behrendt S 1998; lognormal variance with pedigree 0.042, pedigree (1,4,5,1,1)
  Calculated Value. The production of 1 kg of resistors lead to a waste amount of 0.23 kg unused raw materials. Hence, this dataset here has an input of 1.23 kg of raw materials per kg of resistor. The split to the different raw materials (metals, plastics, etc.) is based on the reported material specifications.
  Further references:
  ZVEI (2006) Umbrella Specs. Download of December 21 from <http://www.zvei.org/index.php?id=1158>.
  EcoSpold01Location=RER
  Uncertainty: average from literature & company information
  properties: dry mass 1 kg, wet mass 1 kg
- glass tube, borosilicate: 0.008118 kg; source Behrendt S 1998; lognormal variance with pedigree 0.042, pedigree (1,4,5,1,1)
  EcoSpold01Location=DE
  Calculated Value. The production of 1 kg of resistors lead to a waste amount of 0.23 kg unused raw materials. Hence, this dataset here has an input of 1.23 kg of raw materials per kg of resistor. The split to the different raw materials (metals, plastics, etc.) is based on the reported material specifications.
  Further references:
  ZVEI (2006) Umbrella Specs. Download of December 21 from <http://www.zvei.org/index.php?id=1158>.
  Uncertainty: average from literature & company information
  properties: wet mass 1 kg, dry mass 1 kg
- resistor, auxilliaries and energy use: 1 kg; lognormal variance with pedigree 0.134, pedigree (3,4,5,1,4)
  Estimation - details see this other activity dataset
  EcoSpold01Location=GLO
  Uncertainty: rough estimation
- nickel, 99.5%: 0.020295 kg; source Behrendt S 1998; lognormal variance with pedigree 0.042, pedigree (1,4,5,1,1)
  EcoSpold01Location=GLO
  Calculated Value. The production of 1 kg of resistors lead to a waste amount of 0.23 kg unused raw materials. Hence, this dataset here has an input of 1.23 kg of raw materials per kg of resistor. The split to the different raw materials (metals, plastics, etc.) is based on the reported material specifications.
  Further references:
  ZVEI (2006) Umbrella Specs. Download of December 21 from <http://www.zvei.org/index.php?id=1158>.
  Uncertainty: average from literature & company information
  properties: wet mass 1 kg, dry mass 1 kg
- pig iron: 0.028905 kg; source Behrendt S 1998; lognormal variance with pedigree 0.042, pedigree (1,4,5,1,1)
  Calculated Value. The production of 1 kg of resistors lead to a waste amount of 0.23 kg unused raw materials. Hence, this dataset here has an input of 1.23 kg of raw materials per kg of resistor. The split to the different raw materials (metals, plastics, etc.) is based on the reported material specifications.
  Further references:
  ZVEI (2006) Umbrella Specs. Download of December 21 from <http://www.zvei.org/index.php?id=1158>.
  EcoSpold01Location=GLO
  Uncertainty: average from literature & company information
  properties: wet mass 1 kg, carbon content, fossil 0.045, dry mass 1 kg
  note on carbon content, fossil: Pig iron is the iron produced in the blast furnace. It is an alloy of 94% Fe and more than 2% C (world average 4.5%). (ecoinvent v2.2 report 10_partII)
- lime, packed: 0 kg; source Behrendt S 1998; pedigree (1,1,1,1,1)
  Calculated Value. The production of 1 kg of resistors lead to a waste amount of 0.23 kg unused raw materials. Hence, this dataset here has an input of 1.23 kg of raw materials per kg of resistor. The split to the different raw materials (metals, plastics, etc.) is based on the reported material specifications.
  Further references:
  ZVEI (2006) Umbrella Specs. Download of December 21 from <http://www.zvei.org/index.php?id=1158>.
  EcoSpold01Location=CH
  Uncertainty: average from literature & company information
  properties: dry mass 0.998 kg, wet mass 1 kg, water content 0.00200401, carbon content, fossil 0.117492
  note on carbon content, fossil: Table 3.1, ecoinvent v2.2 report 7, part VII, pg 3. MW CaCO3=100, MW MgCO3=84
- gold: 0.006273 kg; source Behrendt S 1998; lognormal variance with pedigree 0.042, pedigree (1,4,5,1,1)
  (same comment as for tin)
  properties: dry mass 1 kg, wet mass 1 kg
- silver: 0.0123 kg; source Behrendt S 1998; lognormal variance with pedigree 0.042, pedigree (1,4,5,1,1)
  EcoSpold01Location=RER
  Calculated Value. The production of 1 kg of resistors lead to a waste amount of 0.23 kg unused raw materials. Hence, this dataset here has an input of 1.23 kg of raw materials per kg of resistor. The split to the different raw materials (metals, plastics, etc.) is based on the reported material specifications.
  Further references:
  ZVEI (2006) Umbrella Specs. Download of December 21 from <http://www.zvei.org/index.php?id=1158>.
  Uncertainty: average from literature & company information
  properties: dry mass 1 kg, wet mass 1 kg
- polymethyl methacrylate, beads: 0.007872 kg; source Behrendt S 1998; lognormal variance with pedigree 0.042, pedigree (1,4,5,1,1)
  (same comment as for tin)
  properties: wet mass 1 kg, carbon content, fossil 0.6, dry mass 1 kg
  note on carbon content, fossil: Monomer is methyl methacrylate (MMA; CH2-C(CH3)COOCH3) is also called a-methylacrylic acid or 2-methylpropenoic acid (ecoinvent v2.2 report 11_II). MW=100 g/mol
- aluminium oxide, non-metallurgical: 0 kg; source Behrendt S 1998; pedigree (1,1,1,1,1)
  (same comment as for silver)
  properties: dry mass 1 kg, wet mass 1 kg
- silicon, metallurgical grade: 0.000123 kg; source Behrendt S 1998; lognormal variance with pedigree 0.042, pedigree (1,4,5,1,1)
  Calculated Value. The production of 1 kg of resistors lead to a waste amount of 0.23 kg unused raw materials. Hence, this dataset here has an input of 1.23 kg of raw materials per kg of resistor. The split to the different raw materials (metals, plastics, etc.) is based on the reported material specifications.
  Further references:
  ZVEI (2006) Umbrella Specs. Download of December 21 from <http://www.zvei.org/index.php?id=1158>.
  EcoSpold01Location=NO
  Uncertainty: average from literature & company information
  properties: dry mass 1 kg, wet mass 1 kg
- palladium: 0.001722 kg; source Behrendt S 1998; lognormal variance with pedigree 0.042, pedigree (1,4,5,1,1)
  (same comment as for tin)
  properties: wet mass 1 kg, dry mass 1 kg
- chromium: 0.001107 kg; source Behrendt S 1998; lognormal variance with pedigree 0.042, pedigree (1,4,5,1,1)
  (same comment as for tin)
  properties: wet mass 1 kg, dry mass 1 kg
- lead: 0.005412 kg; source Behrendt S 1998; lognormal variance with pedigree 0.042, pedigree (1,4,5,1,1)
  (same comment as for tin)
  properties: dry mass 1 kg, wet mass 1 kg
- epoxy resin, liquid: 0 kg; source Behrendt S 1998; pedigree (1,1,1,1,1)
  (same comment as for silver)
  properties: dry mass 1 kg, carbon content, fossil 0.42325, wet mass 1 kg
- copper: 0.004551 kg; source Behrendt S 1998; lognormal variance with pedigree 0.042, pedigree (1,4,5,1,1)
  (same comment as for tin)
  properties: wet mass 1 kg, dry mass 1 kg
- silica sand: 0.24625 kg; source Behrendt S 1998; lognormal variance with pedigree 0.042, pedigree (1,4,5,1,1)
  Calculated Value. The production of 1 kg of resistors lead to a waste amount of 0.23 kg unused raw materials. Hence, this dataset here has an input of 1.23 kg of raw materials per kg of resistor. The split to the different raw materials (metals, plastics, etc.) is based on the reported material specifications.
  Further references:
  ZVEI (2006) Umbrella Specs. Download of December 21 from <http://www.zvei.org/index.php?id=1158>.
  EcoSpold01Location=DE
  Uncertainty: average from literature & company information
  properties: water content 0.010101, dry mass 0.99 kg, wet mass 1 kg
- lime, packed: 0.000203314, 5.17638e-6, 0.000406509 kg (3 entries); source Behrendt S 1998; lognormal variance with pedigree 0.042, pedigree (1,4,5,1,1)
  (same comment as for lime, packed)
- aluminium oxide, non-metallurgical: 0.735808, 0.124572 kg (2 entries); source Behrendt S 1998; lognormal variance with pedigree 0.042, pedigree (1,4,5,1,1)
  (same comment as for silver)
- epoxy resin, liquid: 0.00201179, 0.00955021 kg (2 entries); source Behrendt S 1998; lognormal variance with pedigree 0.042, pedigree (1,4,5,1,1)
  (same comment as for silver)

## Sampling procedure
literature

## Extrapolations
This dataset has been extrapolated from year 2007 to the year of the calculation (2019). The uncertainty has been adjusted accordingly.

## Review by Rolf Frischknecht 2007-09-14
passed
