# electric arc furnace converter construction

Dataset: EcoSpold 2, unit process
Geography: RoW
Time period: 2002-01-01 to 2019-12-31
Technology level: current
Classification: ISIC rev.4 ecoinvent: 4100a: Construction of factory buildings for the metal industry
Classification: EcoSpold01Categories: metals/extraction
Tags: ConvertedDataset
Scenario: Business-as-Usual
System model: Allocation at the point of substitution
Generated by: Hans-Jörg Althaus
Published in: Classen M. 2009
Database: ecoinvent
isCopyrightProtected: true
accessRestrictedTo: 1

## General comment
Assumptions for medium sized plant. Output: 500'000 t/a, life time: 50 years.
[This dataset was already contained in the ecoinvent database version 2. It was not individually updated during the transfer to ecoinvent version 3. Life Cycle Impact Assessment results may still have changed, as they are affected by changes in the supply chain, i.e. in other datasets. This dataset was generated following the ecoinvent quality guidelines for version 2. It may have been subject to central changes described in the ecoinvent version 3 change report (http://www.ecoinvent.org/database/ecoinvent-version-3/reports-of-changes/), and the results of the central updates were reviewed extensively. The changes added e.g. consistent water flows and other information throughout the database. The documentation of this dataset can be found in the ecoinvent reports of version 2, which are still available via the ecoinvent website. The change report linked above covers all central changes that were made during the conversion process.]

## Included activities end
Infrastructure for input material unloading and storage, for EAF processes and casting and for administrative buildings

## Geography
Some Swiss datasets are used for European processes.

## Technology
Assumed technology of medium sized plant.

## Reference product
- electric arc furnace converter: 1 unit; By-product classification allocatable product; CPC 53269: Other constructions for manufacturing
  production volume 2.67763 unit
    This is a placeholder value that does not reflect real-world production volumes. This dataset does not currently require a real-world production volume to work in the database framework, and no actual data were collected yet. This has no negative effect on the results of the ecoinvent database.
  property price 4.30322e8 EUR2005
    Convert from EU 27 price to the world by currency exchange rate.
  property true value 4.30322e8
    allocation property applied in "true value" allocation // value calculated from revenue

## By-products
- heat, for reuse in municipal waste incineration only: 0 MJ; CPC 17300: Steam and hot water; By-product classification allocatable product; pedigree (1,1,1,1,1)
  Net electricity generated from this waste and used in internal MSWI plant energy redistribution.
  Uncertainty: uncertainty is calculated from uncertainties in waste composition and uncertainties in energy efficiency and the uncertainty in internal energy demand
  production volume 28.3611 MJ
  property exergy 0.1842 MJ; name E_th_prod_MSWI_exergy
    This exergy property is based on the exergy content of the product.
  property price 0.0106 EUR2005; name E_th_prod_MSWI_price_EUR2005
    Average European district heat price from Ecoheatcool and Euroheat 2005-2006, Ecoheat Work package 1: The European heat market. Final report. 10.6 EUR/GJ i s the price of district heat. http://www.solarthermalworld.org/files/Ecoheatcool%20WP1%20Web.pdf?download
  property true value relation 0.1842; name E_th_prod_MSWI_true_value_relation
    property to calculate "true value" from
  property true value 0.0621862
    allocation property applied in "true value" allocation // value calculated from true value relation
- electricity, for reuse in municipal waste incineration only: 0 kWh; CPC 17100: Electrical energy; By-product classification allocatable product; pedigree (1,1,1,1,1)
  (same comment as for heat, for reuse in municipal waste incineration only)
  production volume 3.994 kWh
  property true value relation 3.6; name E_el_prod_MSWI_true_value_relation
    property to calculate "true value" from
  property price 0.1 EUR2005; name E_el_prod_MSWI_price_EUR2005
    Estimated to be the same price as in case of electricity, medium voltage.
  property exergy 3.6 MJ; name E_el_prod_MSWI_exergy
    This exergy property is based on the exergy content of the product.
  property true value 0.171156
    (same comment as for heat, for reuse in municipal waste incineration only)

## Inputs from technosphere
- industrial machine, heavy, unspecified: 1.1e7 kg; lognormal variance with pedigree 0.8, pedigree (5,5,5,5,5)
  Rough estimation
  Uncertainty: r
- building, hall: 250000 m2; lognormal variance with pedigree 0.8, pedigree (5,5,5,5,5)
  Rough estimation
  Uncertainty: r
- concrete, normal: 0 m3; pedigree (1,1,1,1,1)
  Rough estimation
  Uncertainty: r
  properties: water content 0.086758, wet mass 2380 kg, dry mass 2190 kg
- waste brick: -5000 kg; lognormal variance with pedigree 0.8, pedigree (5,5,5,5,5)
  Rough estimation
  Uncertainty: r
  production volume 15000 kg
    Calculated from the production volume of electric arc furnace converter in proportion to the respective output amounts.
  properties: dry mass 1 kg, wet mass 1 kg
- building, multi-storey: 2000 m3; lognormal variance with pedigree 0.8, pedigree (5,5,5,5,5)
  Rough estimation
  Uncertainty: r
- waste concrete, not reinforced: -1.1e7 kg; lognormal variance with pedigree 0.8, pedigree (5,5,5,5,5)
  Rough estimation
  Uncertainty: r
  production volume 3.3e7 kg
    (same comment as for waste brick)
  properties: dry mass 1 kg, wet mass 1 kg
- refractory, basic, packed: 100000 kg; lognormal variance with pedigree 0.8, pedigree (5,5,5,5,5)
  Rough estimation
  Uncertainty: r
  properties: dry mass 1 kg, wet mass 1 kg
- concrete, normal: 114.8, 11.962, 96.8409, 54.473, 230.678, 7.78063, 4483.47 m3 (7 entries); lognormal variance with pedigree 0.8, pedigree (5,5,5,5,5)
  Rough estimation
  Uncertainty: r

## Inputs from nature
- Transformation, from unspecified [natural resource, land]: 500000 m2; lognormal variance with pedigree 0.8, pedigree (5,5,5,5,5)
  Rough estimation
  Uncertainty: r
- Occupation, industrial area [natural resource, land]: 2.5e7 m2*year; lognormal variance with pedigree 0.8, pedigree (5,5,5,5,5)
  Rough estimation
  Uncertainty: r
- Transformation, to industrial area [natural resource, land]: 500000 m2; lognormal variance with pedigree 0.8, pedigree (5,5,5,5,5)
  Rough estimation
  Uncertainty: r

## Sampling procedure
Internet search

## Extrapolations
see Geography This dataset has been copied from an original dataset covering the geography RER. The uncertainty has been adjusted accordingly.

## Review by Roland Hischier 2007-08-13
passed
