# heat production, natural gas, at industrial furnace >100kW

Dataset: EcoSpold 2, unit process
Geography: CA-QC
Time period: 2000-01-01 to 2019-12-31
Technology level: current
Classification: ISIC rev.4 ecoinvent: 3530:Steam and air conditioning supply
Classification: EcoSpold01Categories: natural gas/heating systems
Tags: Recontextualization
Scenario: Business-as-Usual
System model: Allocation at the point of substitution
Generated by: Pablo Tirado
Published in: Faist Emmenegger, M. 2007
Database: ecoinvent
isCopyrightProtected: true
accessRestrictedTo: 1

## General comment
This dataset represents the production of heat from natural gas at industrial furnace >100kW in Quebec.This is an adaptation for Quebec from the corresponding global dataset. Only time period, annual production volume and heating value have been modified. Uncertainties have been adjusted accordingly.
NOx and CO emissions derived from measurements under controlled conditions; no adjustment to real operation made due to lack of information. Other emission data from different references.

## Included activities start
Activity starts with the combustion of the fuel.

## Included activities end
This activity ends with 1MJ of heat produced by the furnace.
This dataset includes:

-fuel inputs;
-emissions due to combustion of fuel;
-inputs needed for combustion (electricity);
-by-products of combustion
-infrastructures

## Geography
Quebec dataset based on Global dataset, which was itself based on european and swiss conditions. Uncertainty has been modified accordingly

## Technology
Models on european market. Uncertainty has been modified accordingly

## Time period
Based on GLO dataset from 2000. It is considered valid until 2015. Uncertainty has been modified accordingly.

## Parameters
- annual fuel consumption in m3: 6.2105e8 m3; name annualFuelConsumptionm3; = (2.51E+09-2.58E+07)/4; lognormal variance with pedigree 0.0012, pedigree (2,1,1,1,1)
  Data on fuel consumption of industrial sectors provided by the MDDEP (Quebec Ministry of Sustainable Development, Environment, Wildlife and Parks).
  Average of the period 2005-2009
  Heat provided by cogen units contributing to the market has been substracted (2.58E+07 MJ)
  The total has been split equally for the four natural gas technologies.
  Uncertainty: Variance from default value table.
  DQP based on the quality of the data (primary data from Quebec gouvernment)

## Reference product
- heat, district or industrial, natural gas: 1 MJ; CPC 17300: Steam and hot water; By-product classification allocatable product
  EcoSpold01Location=RER
  production volume 2.30099e10 MJ; = annualFuelConsumptionm3/ natGasIn
    Literature/­calculated value. Annual fuel consumption (from Quebec statistics) divided by the amount of fuel needed to produce 1MJ (this amounts includes the efficiency of the process)
  property price 0.0106 EUR2005
    Average European district heat price from Ecoheatcool and Euroheat 2005-2006, Ecoheat Work package 1: The European heat market. Final report. 10.6 EUR/GJ i s the price of district heat. http://www.solarthermalworld.org/files/Ecoheatcool%20WP1%20Web.pdf?download
  property Corresponding fuel use 1.05263 MJ
    This property represents the inverse of the efficiency of the boiler. It is calculated by dividing the lower heating value of the fuel input by the heat/electricity output.

## Inputs from technosphere
- electricity, low voltage: 0.00116842 kWh; source Faist Emmenegger, M. 2007; lognormal variance with pedigree 0.138, pedigree (1,1,4,5,3)
  EcoSpold01Location=UCTE
  range of electricity for pumps etc., different literature
  Uncertainty: Completeness, temporal, geographical and technological indicators adapted considering differences with original dataset.
- industrial furnace, natural gas: 2.94737e-9 unit; source Faist Emmenegger, M. 2007; lognormal variance with pedigree 0.058, pedigree (1,1,4,5,3)
  uncertainty of life time and extrapolation to range of capacity
  EcoSpold01Location=RER
  Uncertainty: Completeness, temporal, geographical and technological indicators adapted considering differences with original dataset.
- natural gas, high pressure: 0.0269906 m3; name natGasIn; source Faist Emmenegger, M. 2007; lognormal variance with pedigree 0.018, pedigree (1,1,4,5,3)
  EcoSpold01Location=RER
  Uncertainty: Completeness, temporal, geographical and technological indicators adapted considering differences with original dataset.
  properties: wet mass 0.84 kg, dry mass 0.84 kg, carbon content, fossil 0.602381, heating value, gross 39 MJ
  note on carbon content, fossil: An average C content of 0.506 kg C/ m3 has been assumed (this average has been calculated using data in Tab 3.5, ecoinvent v2.2 report 6_V

## Emissions to nature
All rows: source Faist Emmenegger, M. 2007
- Benzo(a)pyrene [air, urban air close to ground]: 1.05263e-11 kg; lognormal variance with pedigree 1.098, pedigree (1,1,4,5,3)
  rough estimate, high uncertainty
  Uncertainty: Completeness, temporal, geographical and technological indicators adapted considering differences with original dataset.
- Sulfur dioxide [air, urban air close to ground]: 5.78947e-7 kg; lognormal variance with pedigree 0.018, pedigree (1,1,4,5,3)
  composition of natural gas
  Uncertainty: Completeness, temporal, geographical and technological indicators adapted considering differences with original dataset.
- Benzene [air, urban air close to ground]: 4.21053e-7 kg; lognormal variance with pedigree 1.098, pedigree (1,1,4,5,3)
  (same comment as for Benzo(a)pyrene)
- Dioxins, measured as 2,3,7,8-tetrachlorodibenzo-p-dioxin [air, urban air close to ground]: 0 kg; pedigree (1,1,1,1,1)
  (same comment as for Benzo(a)pyrene)
- Particulates, < 2.5 um [air, urban air close to ground]: 2.10526e-7 kg; lognormal variance with pedigree 0.138, pedigree (1,1,4,5,3)
  literature
  Uncertainty: Completeness, temporal, geographical and technological indicators adapted considering differences with original dataset.
- Acetic acid [air, urban air close to ground]: 1.57895e-7 kg; lognormal variance with pedigree 1.098, pedigree (1,1,4,5,3)
  (same comment as for Benzo(a)pyrene)
- Carbon dioxide, fossil [air, urban air close to ground]: 0.0589474 kg; lognormal variance with pedigree 0.018, pedigree (1,1,4,5,3)
  (same comment as for Sulfur dioxide)
- Carbon monoxide, fossil [air, urban air close to ground]: 2.21053e-6 kg; lognormal variance with pedigree 1.138, pedigree (1,1,4,5,3)
  calculated based on (SVGW 2002)
  Uncertainty: Completeness, temporal, geographical and technological indicators adapted considering differences with original dataset.
- Propionic acid [air, urban air close to ground]: 2.10526e-8 kg; lognormal variance with pedigree 1.098, pedigree (1,1,4,5,3)
  (same comment as for Benzo(a)pyrene)
- Methane, fossil [air, urban air close to ground]: 2.10526e-6 kg; lognormal variance with pedigree 1.098, pedigree (1,1,4,5,3)
  (same comment as for Benzo(a)pyrene)
- Toluene [air, urban air close to ground]: 2.10526e-7 kg; lognormal variance with pedigree 1.098, pedigree (1,1,4,5,3)
  (same comment as for Benzo(a)pyrene)
- Acetaldehyde [air, urban air close to ground]: 1.05263e-9 kg; lognormal variance with pedigree 1.098, pedigree (1,1,4,5,3)
  (same comment as for Benzo(a)pyrene)
- Dinitrogen monoxide [air, urban air close to ground]: 1.05263e-7 kg; lognormal variance with pedigree 1.098, pedigree (1,1,4,5,3)
  (same comment as for Benzo(a)pyrene)
- Propane [air, urban air close to ground]: 2.10526e-7 kg; lognormal variance with pedigree 1.098, pedigree (1,1,4,5,3)
  (same comment as for Benzo(a)pyrene)
- Butane [air, urban air close to ground]: 7.36842e-7 kg; lognormal variance with pedigree 1.098, pedigree (1,1,4,5,3)
  (same comment as for Benzo(a)pyrene)
- Mercury [air, urban air close to ground]: 3.15789e-11 kg; lognormal variance with pedigree 0.668, pedigree (1,1,4,5,3)
  trace element in natural gas
  Uncertainty: Completeness, temporal, geographical and technological indicators adapted considering differences with original dataset.
- Pentane [air, urban air close to ground]: 1.26316e-6 kg; lognormal variance with pedigree 1.098, pedigree (1,1,4,5,3)
  (same comment as for Benzo(a)pyrene)
- Formaldehyde [air, urban air close to ground]: 1.05263e-7 kg; lognormal variance with pedigree 1.098, pedigree (1,1,4,5,3)
  (same comment as for Benzo(a)pyrene)
- Nitrogen oxides [air, urban air close to ground]: 1.88421e-5 kg; lognormal variance with pedigree 0.048, pedigree (1,1,4,5,3)
  (same comment as for Carbon monoxide, fossil)
- PAH, polycyclic aromatic hydrocarbons [air, urban air close to ground]: 1.05263e-8 kg; lognormal variance with pedigree 1.098, pedigree (1,1,4,5,3)
  (same comment as for Benzo(a)pyrene)

## Sampling procedure
Literature, manufacturers; CO and NOx emissions from (SVGW 2002), sample size (number of selected devices for which emission values are given in SVGW list): CO 133 , NOx 181 .

## Extrapolations
This dataset has been extrapolated from year 2015 to the year of the calculation (2019). The uncertainty has been adjusted accordingly.

## Review by Christian Bauer 2013-10-11
passed
