# electricity, high voltage, production mix

Dataset: EcoSpold 2, unit process, production mix
Geography: CN-SH
Time period: 2019-01-01 to 2019-12-31
Scenario: Business-as-Usual
System model: Allocation at the point of substitution
Generated by: [System]
Database: ecoinvent
isCopyrightProtected: false
accessRestrictedTo: 1

## Reference product
- electricity, high voltage: 1 kWh; CPC 17100: Electrical energy; By-product classification allocatable product
  production volume 2.08174e11 kWh

## Inputs from technosphere
- electricity, high voltage: 0, 0 kWh (2 suppliers, which the file names only by identifier)
  properties: price 0.0977 EUR2005
- electricity, high voltage: 0.00544828 kWh
  production volume 1.13419e9 kWh
- electricity, high voltage: 0.0133125 kWh
  production volume 2.77131e9 kWh
- electricity, high voltage: 0.00565363 kWh
  production volume 1.17694e9 kWh
- electricity, high voltage: 0.0158038 kWh
  production volume 3.28993e9 kWh
- electricity, high voltage: 0.821671 kWh
  production volume 1.7105e11 kWh
- electricity, high voltage: 0.00167991 kWh
  production volume 3.49714e8 kWh
- electricity, high voltage: 0.116648 kWh
  production volume 2.42831e10 kWh
- electricity, high voltage: 0.000896527 kWh
  production volume 1.86633e8 kWh
- electricity, high voltage: 4.80368e-12 kWh
  production volume 1 kWh
  properties: exergy 3.6 MJ, price 0.0977 EUR2005
  note on exergy: allocation factor for electricity (=1) vs. heat, where heat is calculated as the termodynamic mean temperature Tm = (Tfeed-Treturn)/ln(Tfeed/Treturn), relative to the application temperature (Tu, typically = 293 K), i.e. (Tm-Tu)/Tm
- electricity, high voltage: 0.0178867 kWh
  production volume 3.72355e9 kWh
- electricity, high voltage: 0.000999165 kWh
  production volume 2.08e8 kWh
