# ethanol production from wood

Dataset: EcoSpold 2, unit process
Geography: CH
Time period: 1999-01-01 to 2019-12-31
Technology level: current
Classification: ISIC rev.4 ecoinvent: 19a: Liquid and gaseous fuels from biomass
Classification: EcoSpold01Categories: biomass/fuels
Tags: ConvertedDataset
Scenario: Business-as-Usual
System model: Allocation at the point of substitution
Share of production covered: 0 %
Generated by: Edgard Gnansounou
Published in: Jungbluth N. 2007
Database: ecoinvent
isCopyrightProtected: true
accessRestrictedTo: 1

## General comment
Inventory refers to the production of 1 kg hydrated ethanol 95% (dry basis, i.e. 1.05 kg hydrated ethanol 95% wet basis), respectively 1 kWh of electricity from wood (u=80%, i.e. 55% dry matter). The multioutput-process 'wood, in distillery' delivers the co-products 'ethanol, 95% in H2O, from wood, at distillery' and 'electricity, from wood, at distillery'. Economic allocation with allocation factor for common stages of 99.7% to ethanol. Allocation is done according to carbon balance for CO2 emissions.
[This dataset was already contained in the ecoinvent database version 2. It was not individually updated during the transfer to ecoinvent version 3. Life Cycle Impact Assessment results may still have changed, as they are affected by changes in the supply chain, i.e. in other datasets. This dataset was generated following the ecoinvent quality guidelines for version 2. It may have been subject to central changes described in the ecoinvent version 3 change report (http://www.ecoinvent.org/database/ecoinvent-version-3/reports-of-changes/), and the results of the central updates were reviewed extensively. The changes added e.g. consistent water flows and other information throughout the database. The documentation of this dataset can be found in the ecoinvent reports of version 2, which are still available via the ecoinvent website. The change report linked above covers all central changes that were made during the conversion process.]

## Included activities end
This dataset includes the transport of wood from the forest to the distillery, and the processing of wood (u=80%) to hydrated ethanol (95%) and electricity. System boundary is at the distillery. Dehydration to anhydrous ethanol is not included. Process heat and power supply is ensured by the combustion of unconverted solids.

## Geography
Data is adapted to Swiss conditions from NREL ethanol process design from yellow poplar (1999)

## Technology
Ethanol is produced by dilute acid pre-hydrolysis and simultaneous saccharification and co-fermentation (SSCF) of lignocellulosic biomass. Process heat and power supply is ensured by the combustion of unconverted solids. Excess electricity is exported to the power grid.

## Time period
Data from 1999 to 2006, pilot scale, near-future technology

## Parameters
- fraction, cooling water, once-through system, to air: 0.004; name fraction_CW_OT_to_air; lognormal variance with pedigree 0.0413, pedigree (2,3,1,3,1)
  Calculated based on literature value (Scown, C.D., 2011, Water Footprint of U.S. Transportation Fuels and supplying information of the article) (Vionnet, S., Quantis Water Database - Technical Report, 2012).
- fraction, cooling water, to air: 0.64; name fraction_CW_to_air; lognormal variance with pedigree 0.092025, pedigree (4,4,3,2,4)
  Calculated value based on literature value (Schonoor, 2008) (Vionnet, S., Quantis Water Database - Technical Report, 2012).
- fraction, tap water, to air: 0.930167; name fraction_TW_to_air; = fraction_PW_to_air; lognormal variance with pedigree 0.092025, pedigree (4,4,3,2,4)
  Calculated value. See comment in the other parametres present in this dataset. Tap water is considered to be always used as process water, thus process water fractions to air are applied to all tap water input flows to calculate the amount of water consumed in the processes.
- fraction, cooling water, cooling pond system, to air: 0.032; name fraction_CW_CP_to_air; lognormal variance with pedigree 0.0413, pedigree (2,3,1,3,1)
  (same comment as for fraction, cooling water, once-through system, to air)
- fraction, cooling water, recirculating system, to air: 0.771; name fraction_CW_R_to_air; lognormal variance with pedigree 0.0413, pedigree (2,3,1,3,1)
  (same comment as for fraction, cooling water, once-through system, to air)
- fraction, water, decarbonised, to air: 0.64; name fraction_WDC_to_air; = fraction_CW_to_air; lognormal variance with pedigree 0.092025, pedigree (4,4,3,2,4)
  Calculated value. See comments in the other parametres present in this dataset. Decarbonised water is considered to be always used as cooling water, thus cooling water fractions to air are applied to all carbonised water input flows to calculate the amount of water consumed in the processes.
- fraction, process water, to air: 0.930167 dimensionless; name fraction_PW_to_air; lognormal variance with pedigree 0.092025, pedigree (4,4,3,2,4)
  Calculated value based on data from literature (Vionnet, S., Quantis Water Database - Technical Report, 2012).

## Reference product
- electricity, high voltage: 1 kWh; CPC 17100: Electrical energy; By-product classification allocatable product
  production volume 50000 kWh
    Production volume of ethanol for use as a fuel was 1-1.5 Ml in 2005 in CH
    Calculated relative to ethanol output
  property price 0.0977 EUR2005
    Temporary price data. Calculated as 90% of purchasers price based on: 94% of the average price (to account for a 6% loss in transformation and transmission) for electricity for industrial consumersin 2005 (excluded taxes). From IEA.
  property true value 0.000633594
    allocation property applied in "true value" allocation // value calculated from revenue
- ethanol, without water, in 95% solution state, from fermentation: 0 kg; CPC 35491: Biodiesel; By-product classification allocatable product; CAS 64-17-5
  production volume 1.185e6 kg
    Production volume of ethanol for use as a fuel was 1-1.5 Ml in 2005 in CH
    1500000 litres at 0.79 kg/l Source: ecoinvent v2 report 17
  property price 0.324 EUR2005
    Temporary price data. Calculated as 90% of purchasers price based on: 2005 prices from FAPRI2007, 2009. Agricultural outlook. (http://www.fapri.missouri.edu/outreach/publications/ag_outlook.asp?current_page=outreach; accessed 22/06/10). Unit conversion from US gallon to kg - 1 gallon = 3.7856 liter * 0.789 kg/liter (ethanol density) = 2.9868 kg
  property carbon content 0.521739
    carbon content on a dry matter basis (reserved; not for manual entry)
  property true value 0.0466852
    allocation property applied in "true value" allocation // value calculated from revenue
  properties: carbon content, non-fossil 0.521739, carbon content, fossil 0, dry mass 1 kg, water content 0, water in wet mass 0 kg, wet mass 1 kg, carbon allocation 0.521739 kg

## By-products
- electricity, for reuse in municipal waste incineration only: 0 kWh; CPC 17100: Electrical energy; By-product classification allocatable product; pedigree (1,1,1,1,1)
  Net electricity generated from this waste and used in internal MSWI plant energy redistribution.
  Uncertainty: uncertainty is calculated from uncertainties in waste composition and uncertainties in energy efficiency and the uncertainty in internal energy demand
  production volume 29.2065 kWh
  property exergy 3.6 MJ; name E_el_prod_MSWI_exergy
    This exergy property is based on the exergy content of the product.
  property true value relation 3.6; name E_el_prod_MSWI_true_value_relation
    property to calculate "true value" from
  property price 0.1 EUR2005; name E_el_prod_MSWI_price_EUR2005
    Estimated to be the same price as in case of electricity, medium voltage.
  property true value 4.59008e-7
    allocation property applied in "true value" allocation // value calculated from true value relation
- iron scrap, sorted, pressed: 0 kg; By-product classification Recyclable; CPC 39310: Slag, dross, scalings and other waste from the manufacture of iron or steel; pedigree (1,1,1,1,1)
  Iron scrap recovered from this waste.
  Uncertainty: uncertainty calculated from uncertainty in waste composition, uncertainty of share of recyclable metal, uncertainty of transfer coefficient to bottom ash, uncertainty of the efficiency of scrap removal in MSWI plant.
  production volume 0.669784 kg
  property price 0.175 EUR2005
    Temporary price data. Calculated as 90% of purchasers price based on: 2005 import and export prices (total trades (USD) divided by total weight (kg) in biggest economies of the world: EU27, USA, Brasil, China, India, Japan and Russia) from UN Commodity Trade Statistics Database (http://data.un.org/Explorer.aspxDatabase [Accessed 2011.06.20]). Commodity: Waste or scrap, of cast iron
  property carbon content 0
    carbon content on a dry matter basis (reserved; not for manual entry)
  property true value 1.42524e-8
    allocation property applied in "true value" allocation // value calculated from revenue
  properties: carbon content, fossil 0, dry mass 1 kg, carbon content, non-fossil 0, water in wet mass 0 kg, wet mass 1 kg, water content 0, carbon allocation 0 kg
- heat, for reuse in municipal waste incineration only: 0 MJ; CPC 17300: Steam and hot water; By-product classification allocatable product; pedigree (1,1,1,1,1)
  Net useful heat generated from this waste and used in internal MSWI plant energy redistribution.
  Uncertainty: uncertainty is calculated from uncertainties in waste composition and uncertainties in energy efficiency and the uncertainty in internal energy demand
  production volume 214.268 MJ
  property exergy 0.1842 MJ; name E_th_prod_MSWI_exergy
    This exergy property is based on the exergy content of the product.
  property true value relation 0.1842; name E_th_prod_MSWI_true_value_relation
    property to calculate "true value" from
  property price 0.0106 EUR2005; name E_th_prod_MSWI_price_EUR2005
    Average European district heat price from Ecoheatcool and Euroheat 2005-2006, Ecoheat Work package 1: The European heat market. Final report. 10.6 EUR/GJ i s the price of district heat. http://www.solarthermalworld.org/files/Ecoheatcool%20WP1%20Web.pdf?download
  property true value 1.723e-7
    (same comment as for electricity, for reuse in municipal waste incineration only)
- iron scrap, unsorted: 0 kg; source European Aluminium Association 2008; CPC 39310: Slag, dross, scalings and other waste from the manufacture of iron or steel; By-product classification Recyclable; pedigree (1,1,1,1,1)
  production volume 9.44793e-5 kg
  property price 0.149 EUR2005; name ironScrapAmount_price_EUR2005
    Temporary price data. Calculated as 90% of purchasers price based on: estimated at 85% of sorted scrap
  property carbon content 0
    carbon content on a dry matter basis (reserved; not for manual entry)
  property true value 1.71174e-12
    allocation property applied in "true value" allocation // value calculated from revenue
  properties: water in wet mass 0 kg, water content 0, carbon content, fossil 0, carbon content, non-fossil 0, dry mass 1 kg, wet mass 1 kg, carbon allocation 0 kg
- aluminium oxide, non-metallurgical: 0 kg; source European Aluminium Association 2008; CPC 41432: Alumina (aluminium oxide), except artificial corundum; By-product classification allocatable product; CAS 1344-28-1; pedigree (1,1,1,1,1)
  production volume 0.00594522 kg
  property carbon content, non-fossil 0; name C_content_non_fossil
  property price 0.28 EUR2005; name Al2O3Amount_price_EUR2005
    From UN trade database. http://data.un.org/ Import data from the largest economies of the world are used (Brazil, India, USA, China, Japan and EU-27).
  property dry mass 1 kg; name DM
  property water content 0; name water_content
  property wet mass 1 kg; name WM
  property water in wet mass 0 kg; name WWM
  property carbon content, fossil 0; name C_content_fossil
  property carbon content 0
    carbon content on a dry matter basis (reserved; not for manual entry)
  property true value 2.02415e-10
    allocation property applied in "true value" allocation // value calculated from revenue
  properties: carbon allocation 0 kg
- aluminium, cast alloy: 0 kg; source European Aluminium Association 2008; By-product classification allocatable product; CPC 41431: Unwrought aluminium; pedigree (1,1,1,1,1)
  EcoSpold01Location=RER
  production volume 0.0555747 kg
  property price 1.3 EUR2005; name castAlloyAmount_price_EUR2005
    Temporary price data. Calculated as 90% of purchasers price based on: Source: London Metal Exchange, Aluminium alloy price for 2005
  property carbon content 0
    carbon content on a dry matter basis (reserved; not for manual entry)
  property true value 8.78488e-9
    allocation property applied in "true value" allocation // value calculated from revenue
  properties: water in wet mass 0 kg, carbon content, non-fossil 0, water content 0, dry mass 1 kg, carbon content, fossil 0, wet mass 1 kg, carbon allocation 0 kg
- aluminium, wrought alloy: 0 kg; source European Aluminium Association 2008; By-product classification allocatable product; CPC 4153: Semi-finished products of aluminium or aluminium alloys; pedigree (1,1,1,1,1)
  production volume 0.0243295 kg
  property price 1.44 EUR2005; name secondaryAluminiumOutput_price_EUR2005
    Estimated based on literature values and expert judgement. Aluminium ccast alloys are about 90% of the price of aluminium wrought alloys.
  property carbon content 0
    carbon content on a dry matter basis (reserved; not for manual entry)
  property true value 4.26002e-9
    allocation property applied in "true value" allocation // value calculated from revenue
  properties: wet mass 1 kg, water content 0, carbon content, fossil 0, water in wet mass 0 kg, carbon content, non-fossil 0, dry mass 1 kg, carbon allocation 0 kg
- copper: 0 kg; source Rentz O. 1999; By-product classification allocatable product; CPC 41413: Refined copper and copper alloys, unwrought; master alloys of copper
  Literature value. Copper uses: Before end-use copper is manufactured into semi fabricated products, such as shapes and ingots (known as 'semis'). These manufacturing processes are subdivided into hot working, cold working and, if necessary, process annealing. Few of the semis are ready for use as such. They more typically travel to first-stage manufacturers, who make metal rods, wire, and casting, and then to component manufacturers who produce such things as motors, valves, and insulated cables The components in turn are incorporated by final-stage manufacturers into a variety of finished products - automobiles, commercial buildings, residential housing, and so forth. These uses account for about 79% of the world-wide consumption of copper.
  production volume 0.00645035 kg
  property price 5.52 EUR2005
    Literature value (http://www.economist.com/news/business/21576714-mining-industry-has-enriched-chile-its-future-precarious-copper-solution). Average price between 20015 and 2013.
  property carbon content 0
    carbon content on a dry matter basis (reserved; not for manual entry)
  property true value 4.3295e-9
    allocation property applied in "true value" allocation // value calculated from revenue
  properties: dry mass 1 kg, water in wet mass 0 kg, wet mass 1 kg, carbon content, non-fossil 0, water content 0, carbon content, fossil 0, carbon allocation 0 kg
- zinc concentrate: 0 kg; CPC 14290: Other non-ferrous metal ores and concentrates (other than uranium or thorium ores and concentrates); By-product classification allocatable product
  Calculated value from the knowledge of the properties of both products.
  production volume 0.0169678 kg
  property price 0.38 EUR2005; name ByP_price_EUR2005
    Temporary price data. Calculated as 90% of purchasers price based on: Zinc content in concentrate 53%. Concentrate price per kg Zn 86.5% of refined Zn price (13.5% treatment charges according to CHR Metals Limited 2005: Dynamic cost curves. http://www.minecost.com/dynamic.pdf). 2004 zinc price from USGS (2007) Mineral commodity summaries 2007. <http://minerals.usgs.gov/minerals/pubs/mcs/2007/mcs2007.pdf> [Accessed 25 May 2010]
  property zinc content 0.53; name zinc_C_zinc_concentrate
    Zinc content on a dry matter basis. Value taken from teh "zinc mine operation" /GLO dataset.
  property dry mass 1 kg; name DM_zinc_concentrate
  property carbon content 0
    carbon content on a dry matter basis (reserved; not for manual entry)
  property true value 7.84018e-10
    allocation property applied in "true value" allocation // value calculated from revenue
  properties: wet mass 1 kg, water content 0, carbon content, non-fossil 0, carbon content, fossil 0, water in wet mass 0 kg, carbon allocation 0 kg

## Inputs from technosphere
- chemical, organic: 7.12236e-5 kg; lognormal variance with pedigree 0.051225, pedigree (2,3,5,2,1)
  Etha+ project Alcosuisse, SSCF technology from NREL
  Etha+ project Alcosuisse, SSCF technology from NREL
  properties: carbon content, fossil 0.628, dry mass 1 kg, wet mass 1 kg
  note on carbon content, fossil: This dataset is an unweighted average of 20 organic substances (listed in Tab 88.1, ecoinvent v2.2 report 8, part II), being part of the top100 chemicals included in this database. The C-content has also been calculated as an unweighted average of the C content of the substances composing this dataset.
- lubricating oil: 1.73318e-5 kg; lognormal variance with pedigree 0.07, pedigree (4,4,5,1,1)
  Adapted from the dataset 'wood chips, in cogen 6400kWth, wood, emission control', according to actual water, carbon and energy content of the fuel (unconverted solids, mainly lignin)
  Adapted from the dataset 'wood chips, in cogen 6400kWth, wood, emission control', according to actual water, carbon and energy content of the fuel (unconverted solids, mainly lignin)
  properties: wet mass 1 kg, carbon content, fossil 0.75, dry mass 1 kg
  note on carbon content, fossil: Lubricating oil is produced from diesel. C-content/dry mass of fats and oils considered 75%, from: ecoinvent v2.2 report, n 15a, pg 40
- urea, as N: 0.000141613 kg; lognormal variance with pedigree 0.07, pedigree (4,4,5,1,1)
  (same comment as for lubricating oil)
  properties: dry mass 1 kg, carbon content, fossil 0.2, wet mass 1 kg
- heat and power co-generation unit, 6400kW thermal, common components for heat+electricity: 5.11507e-9 unit; lognormal variance with pedigree 0.37, pedigree (4,4,5,1,1)
  Adapted from the dataset 'wood chips, in cogen 6400kWth, wood, emission control', according to actual water, carbon and energy content of the fuel (unconverted solids, mainly lignin)
  This exchange has an activity link directly to the producing activity because the product is primarily consumed in the same geographical area where it is produced.
- transport, tractor and trailer, agricultural: 0.0103235 metric ton*km; lognormal variance with pedigree 0.171225, pedigree (2,3,5,2,1)
  (same comment as for chemical, organic)
- nitrogen fertiliser, as N: 0.000497095 kg; lognormal variance with pedigree 0.051225, pedigree (2,3,5,2,1)
  (same comment as for chemical, organic)
  properties: dry mass 1 kg, wet mass 1 kg
- ethanol fermentation plant: 1.23087e-10 unit; lognormal variance with pedigree 0.351225, pedigree (2,3,5,2,1)
  Etha+ project Alcosuisse, SSCF technology from NREL
  This exchange has an activity link directly to the producing activity because the product is primarily consumed in the same geographical area where it is produced.
- sodium chloride, powder: 2.16648e-5 kg; lognormal variance with pedigree 0.07, pedigree (4,4,5,1,1)
  (same comment as for lubricating oil)
  properties: wet mass 1 kg, dry mass 1 kg
- magnesium sulfate: 0.000162072 kg; lognormal variance with pedigree 0.051225, pedigree (2,3,5,2,1)
  (same comment as for chemical, organic)
  properties: dry mass 1 kg, wet mass 1 kg
- ammonia, liquid: 0.0196606 kg; lognormal variance with pedigree 0.051225, pedigree (2,3,5,2,1)
  (same comment as for chemical, organic)
  properties: wet mass 1 kg, dry mass 1 kg
- ammonium sulfate, as N: 0.000352381 kg; lognormal variance with pedigree 0.051225, pedigree (2,3,5,2,1)
  (same comment as for chemical, organic)
  properties: dry mass 1 kg, wet mass 1 kg
- quicklime, in pieces, loose: 0.0095715 kg; lognormal variance with pedigree 0.051225, pedigree (2,3,5,2,1)
  (same comment as for chemical, organic)
  properties: water content 0.010101, dry mass 0.99 kg, wet mass 1 kg
- municipal solid waste: -1.73318e-5 kg; lognormal variance with pedigree 0.07, pedigree (4,4,5,1,1)
  (same comment as for lubricating oil)
  production volume 69.0358 kg
    Calculated from the production volume of ethanol, without water, in 95% solution state, from fermentation in proportion to the respective output amounts.
  properties: dry mass 0.771 kg, carbon content, non-fossil 0.261655, wet mass 1 kg, carbon content, fossil 0.171549, water content 0.297017
  note on carbon content, non-fossil: MSW composition in tab 4.1, ecoinvent v2.2 report 13_I. C content referred to 1 kg DM
- calcium chloride: 0.000357605 kg; lognormal variance with pedigree 0.051225, pedigree (2,3,5,2,1)
  (same comment as for chemical, organic)
  properties: wet mass 1 kg, dry mass 1 kg
- wood ash mixture, pure: -0.00279528 kg; lognormal variance with pedigree 0.07, pedigree (4,4,5,1,1)
  (same comment as for lubricating oil)
  production volume 11134.1 kg
    (same comment as for municipal solid waste)
  properties: dry mass 1 kg, carbon content, non-fossil 0.012, wet mass 1 kg
- sulfuric acid: 0.0246483 kg; lognormal variance with pedigree 0.051225, pedigree (2,3,5,2,1)
  (same comment as for chemical, organic)
  properties: wet mass 1 kg, dry mass 1 kg
- waste mineral oil: -1.73318e-5 kg; lognormal variance with pedigree 0.07, pedigree (4,4,5,1,1)
  (same comment as for lubricating oil)
  production volume 69.0358 kg
    (same comment as for municipal solid waste)
  properties: dry mass 0.9 kg, wet mass 1 kg, carbon content, fossil 0.864444, water content 0.111111
  note on carbon content, fossil: Tab A.6, ecoinvent v2.2 report 13_I. C content has been calculated after data in the tables, and then referred to 1 kg DM
- chlorine, liquid: 1.73318e-6 kg; lognormal variance with pedigree 0.07, pedigree (4,4,5,1,1)
  (same comment as for lubricating oil)
  properties: wet mass 1 kg, dry mass 1 kg
- wastewater, average: -4.1585e-6 m3; lognormal variance with pedigree 0.07, pedigree (4,4,5,1,1)
  (same comment as for lubricating oil)
  production volume 16.564 m3
    (same comment as for municipal solid waste)
  properties: water content 2882.2, dry mass 0.346837 kg, wet mass 1000 kg, carbon content, non-fossil 0.194039
  note on carbon content, non-fossil: 0.0673 kg TOC/m3 (Tab A.17, ecoinvent v2.2 report 13_I). TOC was considered as Total Carbon.
- wood chips, wet, measured as dry mass: 1.14705 kg; lognormal variance with pedigree 0.051225, pedigree (2,3,5,2,1)
  (same comment as for chemical, organic)
  properties: water content 0.8, carbon content, non-fossil 0.494, dry mass 1 kg, wet mass 1.8 kg
  note on carbon content, non-fossil: C content of dry mass is 0.494 kgC/kg dry wood (ecoinvent v2.2 report 9).
- waste gypsum: -0.0323847 kg; lognormal variance with pedigree 0.051225, pedigree (2,3,5,2,1)
  (same comment as for chemical, organic)
  production volume 128994 kg
    (same comment as for municipal solid waste)
  properties: wet mass 1 kg, dry mass 0.806 kg, water content 0.240695
- heat and power co-generation unit, 6400kW thermal, building: 1.27875e-9 unit; lognormal variance with pedigree 0.37, pedigree (4,4,5,1,1)
  (same comment as for heat and power co-generation unit, 6400kW thermal, common components f)
- heat and power co-generation unit, 6400kW thermal, components for electricity only: 5.11507e-9 unit; lognormal variance with pedigree 0.37, pedigree (4,4,5,1,1)
  (same comment as for heat and power co-generation unit, 6400kW thermal, common components f)
- maize starch: 0.00787432 kg; lognormal variance with pedigree 0.051225, pedigree (2,3,5,2,1)
  (same comment as for chemical, organic)
  properties: wet mass 1 kg, carbon content, non-fossil 0.46, water content 0.162791, dry mass 0.86 kg
  note on carbon content, non-fossil: C-content of starch is considered 46% on dry mass basis (from 'Evolutionary and Biochemical Aspects', A.D. Kay and T. Vrede (in Global Ecology, 2010, Elsevier B.V., S.E. Jørgensen Ed.)).
- water, decarbonised: 0.0041585 kg; name water_decarbonised_input; lognormal variance with pedigree 0.07, pedigree (4,4,5,1,1)
  (same comment as for lubricating oil)
  properties: wet mass 1 kg
- tap water: 2.39525 kg; name tap_water_input; lognormal variance with pedigree 0.051225, pedigree (2,3,5,2,1)
  (same comment as for chemical, organic)
  properties: wet mass 1 kg, water content 2962.17, dry mass 0.000337476 kg, carbon content, fossil 0.00178991
  note on carbon content, fossil: Bicarbonate content is 2.93 mol/m3. CO2 content is 0.1 mol/m3 (ecoinvent v2.2 report 8, Tab 93.1).

## Emissions to nature
- Particulates, < 2.5 um [air, urban air close to ground]: 2.86125e-5 kg; lognormal variance with pedigree 0.37, pedigree (4,4,5,1,1)
  Adapted from the dataset 'wood chips, in cogen 6400kWth, wood, emission control', according to actual water, carbon and energy content of the fuel (unconverted solids, mainly lignin)
- Potassium [air, urban air close to ground]: 0.000123648 kg; lognormal variance with pedigree 0.71, pedigree (4,4,5,1,1)
  (same comment as for Particulates, < 2.5 um)
- Water [water, unspecified]: 0.000168765 m3; name water_to_water_unspecified; = (tap_water_input/1000)*(1-fraction_TW_to_air)+(water_decarbonised_input/1000)*(1-fraction_WDC_to_air); lognormal variance with pedigree 0.0807, pedigree (2,2,5,1,1)
  Calculated value based on literature values and expert opinion. See comments in the parametres' comment field.
  property carbon content, non-fossil 0; name C_content_non_fossil
  property wet mass 1000 kg; name WM
  property dry mass 0 kg; name DM
  property fraction, origin: unspecified 0; name fraction_origin_unspecified_Ww
  property fraction, origin: fresh water 1; name fraction_origin_fresh_water_Ww
  property carbon content, fossil 0; name C_content_fossil
  property water in wet mass 1000 kg; name WWM
  property fraction, origin: salt water 0; name fraction_origin_salt_water_Ww
- PAH, polycyclic aromatic hydrocarbons [air, urban air close to ground]: 6.29483e-8 kg; lognormal variance with pedigree 0.37, pedigree (4,4,5,1,1)
  (same comment as for Particulates, < 2.5 um)
- Arsenic [air, urban air close to ground]: 5.28416e-9 kg; lognormal variance with pedigree 0.71, pedigree (4,4,5,1,1)
  (same comment as for Particulates, < 2.5 um)
- Methane, non-fossil [air, urban air close to ground]: 2.48362e-6 kg; lognormal variance with pedigree 0.11, pedigree (4,4,5,1,1)
  (same comment as for Particulates, < 2.5 um)
- Acetaldehyde [air, urban air close to ground]: 3.2234e-7 kg; lognormal variance with pedigree 0.11, pedigree (4,4,5,1,1)
  (same comment as for Particulates, < 2.5 um)
- Benzene, ethyl- [air, urban air close to ground]: 1.71679e-7 kg; lognormal variance with pedigree 0.11, pedigree (4,4,5,1,1)
  (same comment as for Particulates, < 2.5 um)
- Nitrogen oxides [air, urban air close to ground]: 0.000232505 kg; lognormal variance with pedigree 0.11, pedigree (4,4,5,1,1)
  (same comment as for Particulates, < 2.5 um)
- Manganese [air, urban air close to ground]: 9.03571e-7 kg; lognormal variance with pedigree 0.71, pedigree (4,4,5,1,1)
  (same comment as for Particulates, < 2.5 um)
- Sulfur dioxide [air, urban air close to ground]: 1.31575e-5 kg; lognormal variance with pedigree 0.07, pedigree (4,4,5,1,1)
  (same comment as for Particulates, < 2.5 um)
- Hydrocarbons, aliphatic, alkanes, unspecified [air, urban air close to ground]: 5.20756e-6 kg; lognormal variance with pedigree 0.11, pedigree (4,4,5,1,1)
  (same comment as for Particulates, < 2.5 um)
- Formaldehyde [air, urban air close to ground]: 7.4395e-7 kg; lognormal variance with pedigree 0.11, pedigree (4,4,5,1,1)
  (same comment as for Particulates, < 2.5 um)
- Chromium VI [air, urban air close to ground]: 2.11362e-10 kg; lognormal variance with pedigree 0.71, pedigree (4,4,5,1,1)
  (same comment as for Particulates, < 2.5 um)
- Benzo(a)pyrene [air, urban air close to ground]: 2.86125e-9 kg; lognormal variance with pedigree 0.37, pedigree (4,4,5,1,1)
  (same comment as for Particulates, < 2.5 um)
- Phosphorus [air, urban air close to ground]: 1.58523e-6 kg; lognormal variance with pedigree 0.11, pedigree (4,4,5,1,1)
  (same comment as for Particulates, < 2.5 um)
- Hydrocarbons, aliphatic, unsaturated [air, urban air close to ground]: 1.77402e-5 kg; lognormal variance with pedigree 0.11, pedigree (4,4,5,1,1)
  (same comment as for Particulates, < 2.5 um)
- Benzene [air, urban air close to ground]: 5.20756e-6 kg; lognormal variance with pedigree 0.11, pedigree (4,4,5,1,1)
  (same comment as for Particulates, < 2.5 um)
- Water [air, unspecified]: 0.00223064 m3; name water_to_air_unspecified; = (tap_water_input/1000*fraction_TW_to_air)+(water_decarbonised_input/1000*fraction_WDC_to_air); lognormal variance with pedigree 0.0807, pedigree (2,2,5,1,1)
  (same comment as for Water)
  property fraction, origin: unspecified 0; name fraction_origin_unspecified
  property fraction, origin: fresh water 1; name fraction_origin_fresh_water
  property fraction, origin: salt water 0; name fraction_origin_salt_water
- Mercury [air, urban air close to ground]: 1.58523e-9 kg; lognormal variance with pedigree 0.71, pedigree (4,4,5,1,1)
  (same comment as for Particulates, < 2.5 um)
- Lead [air, urban air close to ground]: 1.31575e-7 kg; lognormal variance with pedigree 0.71, pedigree (4,4,5,1,1)
  (same comment as for Particulates, < 2.5 um)
- Zinc [air, urban air close to ground]: 1.58523e-6 kg; lognormal variance with pedigree 0.71, pedigree (4,4,5,1,1)
  (same comment as for Particulates, < 2.5 um)
- Nickel [air, urban air close to ground]: 3.17054e-8 kg; lognormal variance with pedigree 0.71, pedigree (4,4,5,1,1)
  (same comment as for Particulates, < 2.5 um)
- Sodium [air, urban air close to ground]: 6.86923e-6 kg; lognormal variance with pedigree 0.71, pedigree (4,4,5,1,1)
  (same comment as for Particulates, < 2.5 um)
- Toluene [air, urban air close to ground]: 1.71679e-6 kg; lognormal variance with pedigree 0.11, pedigree (4,4,5,1,1)
  (same comment as for Particulates, < 2.5 um)
- Chlorine [air, urban air close to ground]: 9.51141e-7 kg; lognormal variance with pedigree 0.11, pedigree (4,4,5,1,1)
  (same comment as for Particulates, < 2.5 um)
- Phenol, pentachloro- [air, urban air close to ground]: 4.63544e-11 kg; lognormal variance with pedigree 0.11, pedigree (4,4,5,1,1)
  (same comment as for Particulates, < 2.5 um)
- Carbon monoxide, non-fossil [air, urban air close to ground]: 4.00591e-5 kg; lognormal variance with pedigree 0.71, pedigree (4,4,5,1,1)
  (same comment as for Particulates, < 2.5 um)
- Dioxins, measured as 2,3,7,8-tetrachlorodibenzo-p-dioxin [air, urban air close to ground]: 1.77402e-13 kg; lognormal variance with pedigree 0.37, pedigree (4,4,5,1,1)
  (same comment as for Particulates, < 2.5 um)
- Cadmium [air, urban air close to ground]: 3.69889e-9 kg; lognormal variance with pedigree 0.71, pedigree (4,4,5,1,1)
  (same comment as for Particulates, < 2.5 um)
- Copper [air, urban air close to ground]: 1.1625e-7 kg; lognormal variance with pedigree 0.71, pedigree (4,4,5,1,1)
  (same comment as for Particulates, < 2.5 um)
- Bromine [air, urban air close to ground]: 3.17054e-7 kg; lognormal variance with pedigree 0.71, pedigree (4,4,5,1,1)
  (same comment as for Particulates, < 2.5 um)
- Dinitrogen monoxide [air, urban air close to ground]: 0.00011625 kg; lognormal variance with pedigree 0.11, pedigree (4,4,5,1,1)
  (same comment as for Particulates, < 2.5 um)
- m-Xylene [air, urban air close to ground]: 6.86716e-7 kg; lognormal variance with pedigree 0.11, pedigree (4,4,5,1,1)
  (same comment as for Particulates, < 2.5 um)
- Carbon dioxide, non-fossil [air, urban air close to ground]: 1.53314 kg; lognormal variance with pedigree 0.04, pedigree (1,1,5,1,1)
  Calculation, to close carbon balance
- Benzene, hexachloro- [air, urban air close to ground]: 4.1203e-14 kg; lognormal variance with pedigree 0.37, pedigree (4,4,5,1,1)
  (same comment as for Particulates, < 2.5 um)
- Fluorine [air, urban air close to ground]: 2.64198e-7 kg; lognormal variance with pedigree 0.11, pedigree (4,4,5,1,1)
  (same comment as for Particulates, < 2.5 um)
- Calcium [air, urban air close to ground]: 3.09126e-5 kg; lognormal variance with pedigree 0.71, pedigree (4,4,5,1,1)
  (same comment as for Particulates, < 2.5 um)
- Magnesium [air, urban air close to ground]: 1.90757e-6 kg; lognormal variance with pedigree 0.71, pedigree (4,4,5,1,1)
  (same comment as for Particulates, < 2.5 um)
- Chromium [air, urban air close to ground]: 2.09256e-8 kg; lognormal variance with pedigree 0.71, pedigree (4,4,5,1,1)
  (same comment as for Particulates, < 2.5 um)
- Ammonia [air, urban air close to ground]: 8.98306e-5 kg; lognormal variance with pedigree 0.07, pedigree (4,4,5,1,1)
  (same comment as for Particulates, < 2.5 um)
- NMVOC, non-methane volatile organic compounds, unspecified origin [air, urban air close to ground]: 3.49077e-6 kg; lognormal variance with pedigree 0.11, pedigree (4,4,5,1,1)
  (same comment as for Particulates, < 2.5 um)

## Sampling procedure
Data is adapted to Swiss conditions from NREL ethanol process design from yellow poplar, modelling by ENERS (CH)

## Extrapolations
Direct emissions (resulting from the combustion of unconverted solids, incl. lignin) are based on the the combustion of wood chips (with emission control), according to the corresponding dry matter content, carbon content and energy content.

## Review by Niels Jungbluth 2006-08-15
Passed.
none
