# treatment of decommissioned road

Dataset: EcoSpold 2, unit process
Geography: RER
Time period: 1985-01-01 to 2019-12-31
Technology level: current
Classification: EcoSpold01Categories: transport systems/road
Classification: ISIC rev.4 ecoinvent: 3830:Materials recovery
Tags: Treatment; ConvertedDataset
Scenario: Business-as-Usual
System model: Allocation at the point of substitution
Generated by: Michael Spielmann (obsolete)
Published in: Spielmann M. 2007
Database: ecoinvent
isCopyrightProtected: true
accessRestrictedTo: 1

## General comment
The dataset represents the treatment of one decommissioned road.
[This dataset was already contained in the ecoinvent database version 2. It was not individually updated during the transfer to ecoinvent version 3. Life Cycle Impact Assessment results may still have changed, as they are affected by changes in the supply chain, i.e. in other datasets. This dataset was generated following the ecoinvent quality guidelines for version 2. It may have been subject to central changes described in the ecoinvent version 3 change report (http://www.ecoinvent.org/database/ecoinvent-version-3/reports-of-changes/), and the results of the central updates were reviewed extensively. The changes added e.g. consistent water flows and other information throughout the database. The documentation of this dataset can be found in the ecoinvent reports of version 2, which are still available via the ecoinvent website. The change report linked above covers all central changes that were made during the conversion process.]

## Included activities start
The dataset starts with the treatment of one decommissioned road.

## Included activities end
This dataset only includes the excavation with a skid-steer loader. Is assumed a complete reuse and recycling of road materials and this is not accounted.

## Geography
Data referrs to Swiss conditions

## Technology
In Switzerland, approximately 1.5 Mio tonnes of asphalt and 1.3 Mio tonnes result from yearly road excavation Bundesamt für Konjunkturfragen (1991). 20% of the asphalt are recycled and reused. The remaining amount of asphalt is used as recycling gravel in subgrade layers, and only a small amount is disposed. Road excavation is used as a substitute for gravel for various applications Stolz (2001). Thus, as a first estimate we assume a complete reuse and recycling of road materials and merely account for excavation with a skid-steer loader (assuming a density of 1.5t /m3) and a transport over a distance of 20 kilometres of 80% of the excavation to recycling plants.
References:
Bundesamt für Konjunkturfragen (1991) Verwertung und Behandlung von Bauabfällen. 1991, Bern
Stolz J. (2001) Luftschadstoff-Emissionen von Strassenbaustellen. Teil I: PAH und VOC. Nr. 126. Bundesamt für Umwelt, Wald und Landschaft (BUWAL), Bern

## Reference product
- decommissioned road: -1 m*year; By-product classification Waste; CPC 39990: Other wastes n.e.c.
  EcoSpold01Location=RER
  production volume 1.32237 m*year
    This is a placeholder value that does not reflect real-world production volumes. This dataset does not currently require a real-world production volume to work in the database framework, and no actual data were collected yet. This has no negative effect on the results of the ecoinvent database. The placeholder value of this activity was scaled according to the nominal GDP of 2005 (source: United Nations, http://data.un.org/Glossary.aspx?q=GDP+%28current+US%24%29, accessed 20130726) to reflect an appropriate share of the global production volume, which is also a placeholder value.
  property price 0 EUR2005
    Waste products are assigned a price of zero as they are assumed to require further treatment.
  property carbon content, fossil 0.0220896
    Calculated from C content in input materials in the infrastructure
  property carbon content, non-fossil 0
    Calculated from C content in input materials in the infrastructure
  property carbon content 0.0220896
    carbon content on a dry matter basis (reserved; not for manual entry)
  properties: water content 0, wet mass 122 kg, water in wet mass 0 kg, dry mass 122 kg, carbon allocation 2.69493 kg

## Inputs from technosphere
- excavation, skid-steer loader: 0.062 m3; source Stolz J. 2001; lognormal variance with pedigree 0.1826, pedigree (3,3,5,1,1)
  Calculated value. . Road excavation is used as a substitute for gravel for various applications Stolz (2001). Thus, as a first estimate we assume a complete reuse and recycling of road materials and merely account for excavation with a skid-steer loader (assuming a density of 1.5t /m3).;activityLink introduced to establish a direct link to the corresponding regional supply of this product
  EcoSpold01Location=RER
  Uncertainty: literature studies and own calculations

## Sampling procedure
own calculations and literature

## Extrapolations
This dataset has been extrapolated from year 2000 to the year of the calculation (2019). The uncertainty has been adjusted accordingly.

## Review by Emilia Moreno Ruiz 2012-03-20
trainee DS, ok, Liliane Klemann

## Review by Niels Jungbluth 2003-08-29
passed
