# liquid storage tank production, chemicals, organics

Dataset: EcoSpold 2, unit process
Geography: RoW
Time period: 1996-01-01 to 2019-12-31
Technology level: current
Classification: ISIC rev.4 ecoinvent: 2512:Manufacture of tanks, reservoirs and containers of metal
Classification: EcoSpold01Categories: chemicals/organics
Tags: ConvertedDataset
Scenario: Business-as-Usual
System model: Allocation at the point of substitution
Generated by: Alex Primas
Published in: Althaus H.-J. 2007
Database: ecoinvent
isCopyrightProtected: true
accessRestrictedTo: 1

## General comment
The infrastructure module includes 4 tanks with storage capacitiy of 4000 m3 each, totalling to a storage capacitiy of 16000 m3. The life time of the tanks was assumed to be 50 years. This infrastructure module has a high uncertainty and should only be seen as an approximation of the infrastructure for regional storage of liquid chemical.
[This dataset was already contained in the ecoinvent database version 2. It was not individually updated during the transfer to ecoinvent version 3. Life Cycle Impact Assessment results may still have changed, as they are affected by changes in the supply chain, i.e. in other datasets. This dataset was generated following the ecoinvent quality guidelines for version 2. It may have been subject to central changes described in the ecoinvent version 3 change report (http://www.ecoinvent.org/database/ecoinvent-version-3/reports-of-changes/), and the results of the central updates were reviewed extensively. The changes added e.g. consistent water flows and other information throughout the database. The documentation of this dataset can be found in the ecoinvent reports of version 2, which are still available via the ecoinvent website. The change report linked above covers all central changes that were made during the conversion process.]

## Included activities end
Material for construction, transport of material to construction site, no energy use for construction included, dismantling and disposal processes, no contamination assumed for disposal, land use included.

## Geography
Based on weak data valid for Switzerland

## Technology
Most data origins from the storage of fuels, there is high uncertainty in the technological correlation. This may also affect the materials used for the tank wall. Uncertainties occur for the disposal processes for the tanks after use because of approximations with processes for residential buildings.

## Reference product
- liquid storage tank, chemicals, organics: 1 unit; CPC 42210: Reservoirs, tanks, vats and similar containers (other than for compressed or liquefied gas), of iron, steel or[…]; By-product classification allocatable product
  Uncertainty not applicable for output
  production volume 3.96633 unit
    This is a placeholder value that does not reflect real-world production volumes. This dataset does not currently require a real-world production volume to work in the database framework, and no actual data were collected yet. This has no negative effect on the results of the ecoinvent database.
  property price 382636 EUR2005
    Calculated based on inputs: The price of the product has been calculated as a sum of the values of the material and energy inputs for this product. This value is therefore a rough estimation. It may underestimate the real price since there are additional expenses when producing any product. These expences can include for example labour costs, treatment of waste materials and profit for the producer. Please consider carefully whether this level of data quality is acceptable for your application.
  property true value 382636
    allocation property applied in "true value" allocation // value calculated from revenue

## By-products
- heat, for reuse in municipal waste incineration only: 0 MJ; CPC 17300: Steam and hot water; By-product classification allocatable product; pedigree (1,1,1,1,1)
  Net electricity generated from this waste and used in internal MSWI plant energy redistribution.
  Uncertainty: uncertainty is calculated from uncertainties in waste composition and uncertainties in energy efficiency and the uncertainty in internal energy demand
  production volume 2.48689e6 MJ
  property exergy 0.1842 MJ; name E_th_prod_MSWI_exergy
    This exergy property is based on the exergy content of the product.
  property price 0.0106 EUR2005; name E_th_prod_MSWI_price_EUR2005
    Average European district heat price from Ecoheatcool and Euroheat 2005-2006, Ecoheat Work package 1: The European heat market. Final report. 10.6 EUR/GJ i s the price of district heat. http://www.solarthermalworld.org/files/Ecoheatcool%20WP1%20Web.pdf?download
  property true value relation 0.1842; name E_th_prod_MSWI_true_value_relation
    property to calculate "true value" from
  property true value 5439.82
    allocation property applied in "true value" allocation // value calculated from true value relation
- electricity, for reuse in municipal waste incineration only: 0 kWh; CPC 17100: Electrical energy; By-product classification allocatable product; pedigree (1,1,1,1,1)
  (same comment as for heat, for reuse in municipal waste incineration only)
  production volume 355436 kWh
  property exergy 3.6 MJ; name E_el_prod_MSWI_exergy
    This exergy property is based on the exergy content of the product.
  property true value relation 3.6; name E_el_prod_MSWI_true_value_relation
    property to calculate "true value" from
  property price 0.1 EUR2005; name E_el_prod_MSWI_price_EUR2005
    Estimated to be the same price as in case of electricity, medium voltage.
  property true value 15195
    (same comment as for heat, for reuse in municipal waste incineration only)
- iron scrap, sorted, pressed: 0 kg; By-product classification Recyclable; CPC 39310: Slag, dross, scalings and other waste from the manufacture of iron or steel; pedigree (1,1,1,1,1)
  Iron scrap recovered from this waste.
  production volume 40.1518 kg
  property price 0.175 EUR2005
    Temporary price data. Calculated as 90% of purchasers price based on: 2005 import and export prices (total trades (USD) divided by total weight (kg) in biggest economies of the world: EU27, USA, Brasil, China, India, Japan and Russia) from UN Commodity Trade Statistics Database (http://data.un.org/Explorer.aspxDatabase [Accessed 2011.06.20]). Commodity: Waste or scrap, of cast iron
  property carbon content 0
    carbon content on a dry matter basis (reserved; not for manual entry)
  property true value 0.153368
    allocation property applied in "true value" allocation // value calculated from revenue
  properties: water content 0, water in wet mass 0 kg, carbon content, fossil 0, dry mass 1 kg, carbon content, non-fossil 0, wet mass 1 kg, carbon allocation 0 kg

## Inputs from technosphere
- steel, low-alloyed, hot rolled: 394714 kg; lognormal variance with pedigree 0.08, pedigree (3,5,5,5,3)
  Based on data for fuel storage
  Uncertainty: B
  properties: dry mass 1 kg, wet mass 1 kg, carbon content, fossil 0.005
  note on carbon content, fossil: Low alloyed steel composition given in Tab. 3.2 ecoinvent v2.2 report 10_partII. Steel assumed to have a C content of 0.5%
- reinforcing steel: 24669.6 kg; lognormal variance with pedigree 0.142, pedigree (1,1,5,5,1)
  5,5,2,1,4,5; Estimation based on theoretical calculation
  properties: wet mass 1 kg, dry mass 1 kg, carbon content, fossil 0.004
- waste bulk iron, excluding reinforcement: 0 kg; pedigree (1,1,1,1,1)
  Same amount as for material imput
  Uncertainty: S
  production volume 0 kg
    Calculated from the production volume of liquid storage tank, chemicals, organics in proportion to the respective output amounts.
  properties: wet mass 1 kg, dry mass 1 kg
- pitch: 0 kg; pedigree (1,1,1,1,1)
  Estimation based on data for fuel storage
  Uncertainty: E
  properties: carbon content, fossil 0.83, dry mass 1 kg, wet mass 1 kg
- concrete, normal: 0 m3; pedigree (1,1,1,1,1)
  Estimation based on theoretical calculation
  Uncertainty: E
  properties: wet mass 2380 kg, water content 0.086758, dry mass 2190 kg
- waste bitumen sheet: -104371 kg; lognormal variance with pedigree 0.148, pedigree (4,5,5,5,4)
  Same amount as for material imput
  Uncertainty: S
  production volume 330000 kg
    (same comment as for waste bulk iron, excluding reinforcement)
  properties: carbon content, fossil 0.643207, water content 0.0152284, dry mass 0.985 kg, wet mass 1 kg
  note on carbon content, fossil: The bitumen sheet is made of 63% bitumen, 24% surface spread and filler (assumed to be pure SiO2), 6% carrier fleece (assumed to be PE) and 7% elastomer (assumed to be PS) (ecoinvent v2.2 report 13_I, pg 40). C content of bitumen, PE and PS from Tab A.6 and A.1 (ecoinvent v2.2 report 13_I, pg 40), respectively. C content of waste also given in the dataset
- waste paint on metal: -3795.32 kg; lognormal variance with pedigree 0.148, pedigree (4,5,5,5,4)
  Same amount as for material imput
  Uncertainty: S
  production volume 12000 kg
    (same comment as for waste bulk iron, excluding reinforcement)
  properties: carbon content, fossil 0.65, wet mass 1 kg, dry mass 1 kg
- alkyd paint, white, without solvent, in 60% solution state: 3795.32 kg; lognormal variance with pedigree 0.148, pedigree (4,5,5,5,4)
  Estimation based on data for fuel storage
  Uncertainty: E
  properties: dry mass 1 kg, wet mass 1 kg, carbon content, non-fossil 0.199629, carbon content, fossil 0.140367
  note on carbon content, non-fossil: C content was calculated as an addition of C content in the raw materials.
- waste reinforced concrete: 0 kg; pedigree (1,1,1,1,1)
  Same amount as for material imput
  Uncertainty: S
  production volume 0 kg
    (same comment as for waste bulk iron, excluding reinforcement)
  properties: water content 0.00585407, dry mass 0.99418 kg, wet mass 1 kg
- waste concrete, not reinforced: 0 kg; pedigree (1,1,1,1,1)
  Same amount as for material imput
  Uncertainty: S
  production volume 0 kg
    (same comment as for waste bulk iron, excluding reinforcement)
  properties: dry mass 1 kg, wet mass 1 kg
- waste bulk iron, excluding reinforcement: -128177, -266537 kg (2 entries); lognormal variance with pedigree 0.148, pedigree (4,5,5,5,4)
  Same amount as for material imput
  Uncertainty: S
  production volume 1.248e6 kg
- pitch: 4784.89, 272.7, 15856, 12342.3, 553.234, 789.794, 69772.4 kg (7 entries); lognormal variance with pedigree 0.148, pedigree (4,5,5,5,4)
  Estimation based on data for fuel storage
  Uncertainty: E
- concrete, normal: 18.6263, 1.94084, 15.7124, 8.83825, 37.4275, 1.26241, 727.443 m3 (7 entries); lognormal variance with pedigree 0.21, pedigree (5,5,5,5,4)
  Estimation based on theoretical calculation
  Uncertainty: E
- waste reinforced concrete: -32369.6, -461971 kg (2 entries); lognormal variance with pedigree 0.148, pedigree (4,5,5,5,4)
  Same amount as for material imput
  Uncertainty: S
  production volume 1.563e6 kg
- waste concrete, not reinforced: -90088.3, -1.28572e6 kg (2 entries); lognormal variance with pedigree 0.148, pedigree (4,5,5,5,4)
  Same amount as for material imput
  Uncertainty: S
  production volume 4.35e6 kg

## Inputs from nature
- Transformation, to industrial area [natural resource, land]: 2087.43 m2; lognormal variance with pedigree 0.188, pedigree (4,5,5,5,4)
  Based on data for fuel storage
  Uncertainty: B
- Occupation, construction site [natural resource, land]: 4174.86 m2*year; lognormal variance with pedigree 0.268, pedigree (4,5,5,5,4)
  Based on data for fuel storage and estimates
  Uncertainty: B
- Occupation, industrial area [natural resource, land]: 104371 m2*year; lognormal variance with pedigree 0.268, pedigree (4,5,5,5,4)
  Based on data for fuel storage and estimates
  Uncertainty: B
- Transformation, from unspecified [natural resource, land]: 2087.43 m2; lognormal variance with pedigree 0.188, pedigree (4,5,5,5,4)
  Based on data for fuel storage
  Uncertainty: B

## Emissions to nature
- NMVOC, non-methane volatile organic compounds, unspecified origin [air, non-urban air or from high stacks]: 2561.84 kg; lognormal variance with pedigree 0.408, pedigree (4,5,5,5,5)
  Estimated from data for fuel storage tanks
  Uncertainty: E

## Sampling procedure
Estimation from literature and from pictures and maps of 3 sites for fuel storage

## Extrapolations
No This dataset has been copied from an original dataset covering the geography CH. The uncertainty has been adjusted accordingly.

## Review by Roland Hischier 2003-08-26
Passed.
