# potassium hydroxide production

Dataset: EcoSpold 2, unit process
Geography: RER
Time period: 1998-01-01 to 2019-12-31
Technology level: current
Classification: ISIC rev.4 ecoinvent: 2011:Manufacture of basic chemicals
Synonyms: Hydroxyde de potassium; 1310-58-3; Potash lye; Caustic potash; Potassium hydrate
Scenario: Business-as-Usual
System model: Allocation at the point of substitution
Generated by: Beatriz González Domínguez
Published in: Jungbluth N. 2007
Database: ecoinvent
isCopyrightProtected: true
accessRestrictedTo: 1

## General comment
This dataset represents the production of 1 kg of pure potassium hydroxide (KOH), which is commercialized in the form of a 85.6% aqueous solution. Potassium hydroxide forms solid flakes at room temperature and is used primarily for the production of potassium phosphates, as well as potassium soaps and detergents. It is manufactured by the electrolysis of potassium chloride brine in electrolytical cells.
This dataset is based on industrial as well as literature data. The original data is published in the ecoinvent report No. 17 (pg 702), that describes the production of 1 kg of 85.6% (~90%) pure KOH. The data in this report was scaled up to represent the product of interest.
References:
Jungbluth, N., Chudacoff, M., Dauriat, A., Dinkel, F., Doka, G., Faist Emmenegger, M., Gnansounou, E., Kljun, N., Schleiss, K., Spielmann, M., Stettler, C., Sutter, J. 2007: Life Cycle Inventories of Bioenergy. ecoinvent report No. 17, Swiss Centre for Life Cycle Inventories, Dübendorf, CH.

## Included activities start
The activity starts when the raw materials enter the process.

## Included activities end
This activity ends with the production of potassium hydroxide. The dataset includes all precursors, ancillary materials, emissions and estimated infrastructure.

## Technology
Potassium hydroxide is manufactured by the electrolysis of potassium chloride brine in electrolytical cells. Hydrogen and chlorine are withdrawn from the cell. The rest of the reaction mixture contains KOH, water, and unreacted potassium chloride. This reaction mixture is then concentrated in an evaporator. Most of the potassium chloride crystallizes by evaporation, and is recycled. After evaporation, the potassium hydroxide is precipitated. Potassium hydroxide, chlorine and hydrogen are obtained from potassium chloride brine according to the following reaction:
2 KCl + 2 H2O -> 2 KOH + Cl2 + H2
Reference:
Jungbluth, N., Chudacoff, M., Dauriat, A., Dinkel, F., Doka, G., Faist Emmenegger, M., Gnansounou, E., Kljun, N., Schleiss, K., Spielmann, M., Stettler, C., Sutter, J. 2007: Life Cycle Inventories of Bioenergy. ecoinvent report No. 17, Swiss Centre for Life Cycle Inventories, Dübendorf, CH.

## Reference product
- potassium hydroxide: 0 kg; name RP; CPC 34231: Chemical elements n.e.c.; inorganic acids except phosphoric, nitric and sulphonitric; inorganic oxygen compoun[…]; By-product classification allocatable product; CAS 1310-58-3
  Potassium hydroxide (KOH) forms solid flakes at room temperature and is used primarily for the production of potassium phosphates, as well as potassium soaps and detergents. It is manufactured by the electrolysis of potassium chloride brine in electrolytical cells.
  production volume 1.305e8 kg; name RP_PV
    Estimated value. The European production volume is extrapolated from the global production volume based on reports from Cefic (European Chemical Industry Council), and the American Chemistry Council.
    According to Cefic (2016) the Global sales of chemicals in the year 2015 was 3 534 billion euros. The reported share of sales per regions are: EU28 14.7%; Other Europe (Switzerland, Norway, Turkey, Russia and Ukraine) 2.7%; NAFTA (US, Canada and Mexico) 16.5%; Latin America 3.8%; China 39.9%; Japan 3.9%; Republic of Korea 3.2%; India 2.2%; Rest of Asia 11.9%; Rest of the World 1.3%. Cefic also reports the US total sales, 518.7 billion euros of the global 3 534 billion euros (14.7%). The same share is reported from the American Chemistry Council (2016), according to this source the USA sales account for 15% of global sales for the year 2016.
    According to Ullmann's Encyclopedia of Industrial Chemistry the world production was estimated 700 000 - 800 000 tonnes. For the sake of simplicity it is assumed here that the global annual production is circa 750 000 tonnes. . Since no data were found for the European production this value was scaled accordingly.
    Reference(s):
    Cefic 2016. Facts and figures 2016 of the European chemical industry. Accessible at: http://www.cefic.org/Facts-and-Figures/Chemicals-Industry-Profile/
    American Chemistry Council 2016. Outlook: U.S. Chemical Industry Continues to Outpace Industrial Output; Accounts for More Than One-Half of Construction Spending by Manufacturing Sector. Accessible at: https://www.americanchemistry.com/Media/PressReleasesTranscripts/ACC-news-releases/US-Chemical-Industry-Continues-to-Outpace-Industrial-Output.html
    Eckert, M., Fleischmann, G., Jira, R., Bolt, H. M. and Golka, K. 2006. Acetaldehyde. Ullmann's Encyclopedia of Industrial Chemistry., Schultz, H., Bauer, G., Schachl, E., Hagedorn, F. and Schmittinger, P. 2000. Potassium Compounds. Ullmann's Encyclopedia of Industrial Chemistry.
  property price 1.51869 EUR2005; = 1.3/0.856
    Estimated based on expert judgement and knowledge of the market for chemicals.
  property carbon content 0
    carbon content on a dry matter basis (reserved; not for manual entry)
  property true value 1.51869; name RP_true_value
    allocation property applied in "true value" allocation // value calculated from revenue
  properties: dry mass 1 kg, carbon content, non-fossil 0, water in wet mass 0 kg, water content 0, wet mass 1 kg, carbon content, fossil 0, carbon allocation 0 kg
- chlorine, gaseous: 1 kg; name Cl_g; CPC 34231: Chemical elements n.e.c.; inorganic acids except phosphoric, nitric and sulphonitric; inorganic oxygen compoun[…]; By-product classification allocatable product; CAS 7782-50-5; pedigree (1,1,1,1,1)
  Calculated based on stoichiometry. The stoichiometric reaction is given in the technology comment.
  production volume 8.48604e7 kg; = RP_PV * (Cl_g / RP)
    Calculated from production volume of reference product using the relative outputs.
  property price 0.141 EUR2005; name Cl_g_price_EUR2005
    Global average price for gaseous chlorine derived from the global average price of liquid chlorine by substracting the cost of inputs (0.07 KWh of electricity, medium voltage) needed for the liquefaction (0.007EUR/kg of liquid chlorine at an electricity price of 0.1EUR/kWh). The price for liquid chlorine (0.148 EUR/kg) was calculated as weighted average of the European (238Eur/tonne), US (223EUR/tonne) and the Chinese (84EUR/tonne) (Tecnon OrbiCHem, 2016) price according to the region's market shares (Europe 15%, US 20%, China 45%) scaled to 100% (ruschlor.ru, 2014).
    Reference(s):
    Tecnon OrbiCHem. 2016. Chem-Netfacts, Chemical insight an foresight - on a single page, Chlorine, 1 April 2016, document requested at http://www.orbichem.com/Chem-Netfacts.aspx?P_ID=208, 6 October 2017;
    ruschlor.ru. 2014. International Outlook for the Future of the Chinese Chlor-Alkali Industry retrieved from http://ruschlor.ru/english/images/stories/Pekin%20/Otchet_Engl/_.doc, 6 October 2017
  property carbon content 0
    carbon content on a dry matter basis (reserved; not for manual entry)
  property true value 0.0916883; name Cl_g_true_value
    allocation property applied in "true value" allocation // value calculated from revenue
  properties: wet mass 1 kg, carbon content, fossil 0, dry mass 1 kg, carbon content, non-fossil 0, water in wet mass 0 kg, water content 0, carbon allocation 0 kg

## By-products
- hydrogen, liquid: 0 kg; name H_l; CPC 34210: Hydrogen, nitrogen, oxygen, carbon dioxide and rare gases; inorganic oxygen compounds of non-metals n.e.c.; By-product classification allocatable product; CAS 1333-74-0; pedigree (1,1,1,1,1)
  (same comment as for chlorine, gaseous)
  production volume 2.39381e6 kg; = RP_PV * (H_l / RP)
    Calculated from production volume of reference product using the relative outputs.
  property price 2.68 EUR2005; name H_l_price_EUR2005
    Calculated value based on data from United Nations Commodity Trade Statistics Database (comtrade.un.org). UN comtrade category: 280410 Hydrogen. Year 2005. Using exchange rate of 1EURO = 1.209 USD. Average of price of import into 5 main markets (EU, US, JP, IN and CN). Cross reference; Literature (http://www.ttcorp.com/pdf/marketReport.pdf). The price of hydrogen, liquid is 5-10 USD/kg.
  property carbon content 0
    carbon content on a dry matter basis (reserved; not for manual entry)
  property true value 0.0491602; name H_l_true_value
    allocation property applied in "true value" allocation // value calculated from revenue
  properties: dry mass 1 kg, water in wet mass 0 kg, carbon content, non-fossil 0, water content 0, carbon content, fossil 0, wet mass 1 kg, carbon allocation 0 kg
- heat, for reuse in municipal waste incineration only: 0 MJ; CPC 17300: Steam and hot water; By-product classification allocatable product; pedigree (1,1,1,1,1)
  Net electricity generated from this waste and used in internal MSWI plant energy redistribution.
  Uncertainty: uncertainty is calculated from uncertainties in waste composition and uncertainties in energy efficiency and the uncertainty in internal energy demand
  production volume 8852.69 MJ
  property exergy 0.1842 MJ; name E_th_prod_MSWI_exergy
    This exergy property is based on the exergy content of the product.
  property price 0.0106 EUR2005; name E_th_prod_MSWI_price_EUR2005
    Average European district heat price from Ecoheatcool and Euroheat 2005-2006, Ecoheat Work package 1: The European heat market. Final report. 10.6 EUR/GJ i s the price of district heat. http://www.solarthermalworld.org/files/Ecoheatcool%20WP1%20Web.pdf?download
  property true value relation 0.1842; name E_th_prod_MSWI_true_value_relation
    property to calculate "true value" from
  property true value 1.29892e-7
    allocation property applied in "true value" allocation // value calculated from true value relation
- electricity, for reuse in municipal waste incineration only: 0 kWh; CPC 17100: Electrical energy; By-product classification allocatable product; pedigree (1,1,1,1,1)
  (same comment as for heat, for reuse in municipal waste incineration only)
  production volume 1244.75 kWh
  property true value relation 3.6; name E_el_prod_MSWI_true_value_relation
    property to calculate "true value" from
  property price 0.1 EUR2005; name E_el_prod_MSWI_price_EUR2005
    Estimated to be the same price as in case of electricity, medium voltage.
  property exergy 3.6 MJ; name E_el_prod_MSWI_exergy
    This exergy property is based on the exergy content of the product.
  property true value 3.52998e-7
    (same comment as for heat, for reuse in municipal waste incineration only)
- zinc concentrate: 0 kg; CPC 14290: Other non-ferrous metal ores and concentrates (other than uranium or thorium ores and concentrates); By-product classification allocatable product
  Calculated value from the knowledge of the properties of both products.
  production volume 0.1684 kg
  property price 0.38 EUR2005; name ByP_price_EUR2005
    Temporary price data. Calculated as 90% of purchasers price based on: Zinc content in concentrate 53%. Concentrate price per kg Zn 86.5% of refined Zn price (13.5% treatment charges according to CHR Metals Limited 2005: Dynamic cost curves. http://www.minecost.com/dynamic.pdf). 2004 zinc price from USGS (2007) Mineral commodity summaries 2007. <http://minerals.usgs.gov/minerals/pubs/mcs/2007/mcs2007.pdf> [Accessed 25 May 2010]
  property zinc content 0.53; name zinc_C_zinc_concentrate
    Zinc content on a dry matter basis. Value taken from teh "zinc mine operation" /GLO dataset.
  property dry mass 1 kg; name DM_zinc_concentrate
  property carbon content 0
    carbon content on a dry matter basis (reserved; not for manual entry)
  property true value 4.78692e-11
    allocation property applied in "true value" allocation // value calculated from revenue
  properties: wet mass 1 kg, water content 0, carbon content, non-fossil 0, carbon content, fossil 0, water in wet mass 0 kg, carbon allocation 0 kg

## Inputs from technosphere
- potassium chloride, as K2O: 0.0816878 kg; = 0.823/0.856; lognormal variance with pedigree 0.0433, pedigree (2,2,5,5,1)
  Represents 1.5253 kg of KCl. Pure potassium chloride, recorded as potassium oxide (K2O) equivalents. Potassium-containing fertilizers are expressed as the amount of K2O needed to acquire the amount of potassium present in the fertilizer.
  Uncertainty: l
  properties: wet mass 1 kg, dry mass 1 kg
- wastewater, average: 0 m3; name BP_wastewater_average; pedigree (1,1,1,1,1)
  Value published in the ecoinvent report No. 17 (pg 703), which is scaled up for 1 kg of pure KOH.
  Uncertainty: a
  production volume 0 m3
    Calculated from the production volume of potassium hydroxide in proportion to the respective output amounts.
  property water in wet mass 920 kg; name WWMww; = WMww-DMww
  property wet mass 1000 kg; name WMww
  property price 0 EUR2005; name BP_wastewater_average_price_EUR2005
  property dry mass 80 kg; name DMww
  properties: water content 11.5
- salt tailing from potash mine: -0.00228289 kg; name BP_salt_tailing_from_potash_mine; = (0.023/0.856)*-1; lognormal variance with pedigree 0.0601, pedigree (4,2,5,5,1)
  (same comment as for wastewater, average)
  production volume 3.50643e6 kg; = RP_PV*BP_salt_tailing_from_potash_mine/ABS(RP)
    (same comment as for wastewater, average)
  property price 0 EUR2005; name BP_salt_tailing_from_potas_price_EUR2005
  properties: dry mass 1 kg, wet mass 1 kg
- water, completely softened: 0.203574 kg; name water_softened_input; = (2.195 - (1 - 0.856))/0.856; lognormal variance with pedigree 0.0433, pedigree (2,2,5,5,1)
  Value given in the ecoinvent report No. 17 (pg 703), from which the water that is used for the final dilution is subtracted. The amount is also scaled up, in order to have a final product that is 100% pure while maintaining the water balance in the dataset.
  Uncertainty: l
  properties: wet mass 1 kg
- chemical factory, organics: 5.67084e-11 unit; = (RP + H_l + Cl_g)*4E-10; lognormal variance with pedigree 0.3498, pedigree (2,3,5,4,3)
  Calculated based on literature data published by the industry. For this activity, no information was readily available concerning infrastructure and land-use. Therefore, the infrastructure is estimated based on data from two chemical factories, the BASF site of Ludwigshafen and the chemical factory in Gendorf (which are both located in Germany), which produce a wide range of chemical substances. Based on this data, the following assumptions are made: the built area amounts to about 4.2 ha, the plant has an average output of 50'000 t/a and a lifespan of fifty years. The estimated infrastructure amount is therefore 4.00 E-10 units per kg of produced chemical.
  References:
  Althaus H.-J., Chudacoff M., Hischier R., Jungbluth N., Osses M. and Primas A. (2007) Life Cycle Inventories of Chemicals. ecoinvent report No. 8, v2.0. EMPA Dübendorf, Swiss Centre for Life Cycle Inventories, Dübendorf, CH.
  Gendorf (2000) Umwelterklärung 2000, Werk Gendorf. Werk Gendorf, Burgkirchen.
- electricity, medium voltage: 0.184626 kWh; = 1.860096/0.856; lognormal variance with pedigree 0.0433, pedigree (2,2,5,5,1)
  Based on the amount in the previous version of this dataset. It is scaled up to represent the product of interest.
  Uncertainty: l
- heat, district or industrial, natural gas: 0.467695 MJ; = 4.712/0.856; lognormal variance with pedigree 0.0433, pedigree (2,2,5,5,1)
  Based on the amount in the previous version of this dataset. It is scaled up to represent the product of interest.
  Uncertainty: i
- heat, district or industrial, other than natural gas: 0.261048 MJ; = 2.63004/0.856; lognormal variance with pedigree 0.0433, pedigree (2,2,5,5,1)
  (same comment as for heat, district or industrial, natural gas)
- wastewater, average: -2.30186e-5, -2.49019e-6 m3 (2 entries); lognormal variance with pedigree 0.0601, pedigree (4,2,5,5,1)
  (same comment as for wastewater, average)
  production volume 39180.5 m3
  properties: wet mass 1000 kg, water content 11.5, dry mass 80 kg

## Emissions to nature
- Potassium, ion [water, surface water]: 0.00742511 kg; lognormal variance with pedigree 0.0601, pedigree (4,2,5,5,1)
  This emission is due to an excess of KCl in the reaction. The value has been back-calculated based on stoichiometry to match the input value of KCl given in ecoinvent report No. 17: 0.823 kg of KCl as K2O / 0.856 to produce 1 kg of 100% pure KOH.
  Uncertainty: c
- Chloride [water, surface water]: 0.00597959 kg; lognormal variance with pedigree 0.0601, pedigree (4,2,5,5,1)
  (same comment as for Potassium, ion)
- Water [air, unspecified]: 0.000151998 m3; = (1.814 - 0.28263)/1000/0.856; lognormal variance with pedigree 0.0827, pedigree (2,2,5,5,1)
  The original data is published in the ecoinvent report No. 17 (pg 703) that describes the production of 1 kg of 85.6% (~90%) pure KOH. The data in the report was first decreased based on stoichiometry to take into account the amount of water that is incorporated into the products during the reaction. The amount is then scaled up to represent the product of interest.
  property fraction, origin: unspecified 0.654523; name fraction_origin_unspecified
  property fraction, origin: salt water 0; name fraction_origin_salt_water
  property fraction, origin: fresh water 0.345477; name fraction_origin_fresh_water

## Sampling procedure
This dataset is based on industry data in the US.
