# uranium fuel element production, enriched 3.0%, for light water reactor

Dataset: EcoSpold 2, unit process
Geography: RoW
Time period: 1980-01-01 to 2019-12-31
Technology level: current
Classification: EcoSpold01Categories: nuclear power/production
Classification: ISIC rev.4 ecoinvent: 2011:Manufacture of basic chemicals
Tags: ConvertedDataset
Scenario: Business-as-Usual
System model: Allocation at the point of substitution
Generated by: Roberto Dones
Published in: Dones, R. 2007
Database: ecoinvent
isCopyrightProtected: true
accessRestrictedTo: 1

## General comment
Dataset is identical to datasets with similar name for European nuclear energy chains, with teh notable difference of using the US electricity mix. Modeled is the operation of a plant fabricating UO2 fuel for light water nuclear reactors (PWR and BWR), with only fresh uranium, although US plants may use HEU (highly enriched uranium from warheads) from Russia. Data for the operation of a nuclear fuel fabrication facility are relatively old but emissions to water are complete for a US plant. Radioactive emissions to air and water have been taken or derived from two commercial German facilities: both (one operational, the other closed) exhibit emissions per unit of product fuel much lower than data published in the 1980s. An average value of the two plants is used. Zirconium for cladding is modelled as chromium, for lack of complete information on its metallurgical process; the uncertainty value reflects only the amount. This module is linked with one enrichment module with specific characteristics for the mix or enrichment processes and electricity supply mix; hence, before using the cumulated results of this module the conditions for enrichment should be verified.
[This dataset was already contained in the ecoinvent database version 2. It was not individually updated during the transfer to ecoinvent version 3. Life Cycle Impact Assessment results may still have changed, as they are affected by changes in the supply chain, i.e. in other datasets. This dataset was generated following the ecoinvent quality guidelines for version 2. It may have been subject to central changes described in the ecoinvent version 3 change report (http://www.ecoinvent.org/database/ecoinvent-version-3/reports-of-changes/), and the results of the central updates were reviewed extensively. The changes added e.g. consistent water flows and other information throughout the database. The documentation of this dataset can be found in the ecoinvent reports of version 2, which are still available via the ecoinvent website. The change report linked above covers all central changes that were made during the conversion process.]

## Included activities end
The module includes: input of enriched uranium given in terms of separative work units per kg enriched uranium; electricity and light fuel oil used for operation; zirconium requirements for the cladding; water use and wastewater treatment; cement assumed to be used for conditioning of contaminated scrap from decommissioning; transport requirements of operation materials, industrial wastes, and contaminated waste from decommissioning. Radioactive and non-radioactive emissions to air and to water from the operation are also included. The infrastructure requirements are accounted for, though construction and operation data partially refer to different plants rather than to one single unit.

## Geography
North American and European conditions

## Technology
Information regards facilities operating in the 1980s, with few more recent data.

## Parameters
- fraction, cooling water, once-through system, to air: 0.004; name fraction_CW_OT_to_air; lognormal variance with pedigree 0.0413, pedigree (2,3,1,3,1)
  Calculated based on literature value (Scown, C.D., 2011, Water Footprint of U.S. Transportation Fuels and supplying information of the article) (Vionnet, S., Quantis Water Database - Technical Report, 2012).
- fraction, water, decarbonised, to air: 0.3875; name fraction_WDC_to_air; lognormal variance with pedigree 0.092025, pedigree (4,4,3,2,4)
- fraction, cooling water, to air: 0.3875; name fraction_CW_to_air; = (0.5*fraction_CW_OT_to_air)+(0.5*fraction_CW_R_to_air); lognormal variance with pedigree 0.092025, pedigree (4,4,3,2,4)
  Calculated value based on literature value (see comments of the other parametres present in this dataset) and expert opinion. In the case when no industry/literature data are available about the type of cooling or directly fraction, cooling water, to air specific for the process a default assumption is applied. It is assumed that the once-through cooling system is used in 50% of all cases and recirculating system is used in another 50% of all cases.
- fraction, cooling water, recirculating system, to air: 0.771; name fraction_CW_R_to_air; lognormal variance with pedigree 0.0413, pedigree (2,3,1,3,1)
  (same comment as for fraction, cooling water, once-through system, to air)
- fraction, cooling water, cooling pond system, to air: 0.032; name fraction_CW_CP_to_air; lognormal variance with pedigree 0.0413, pedigree (2,3,1,3,1)
  (same comment as for fraction, cooling water, once-through system, to air)

## Reference product
- uranium, enriched 3.0%, in fuel element for light water reactor: 1 kg; CPC 33620: Uranium enriched in U235 and its compounds; plutonium and its compounds; alloys, dispersions, ceramic products[…]; By-product classification allocatable product
  EcoSpold01Location=US
  production volume 2.28954e6 kg
    3.73 SWU per kg 3% enriched U. Total capacity: 54 million SWU (http://www.wise-uranium.org/efac.html#ENR). The total production is here assumed to be split evenly over the 5 grades 3.0%, 3.8%, 3.9%, 4.2% and 4.0%
  property price 586 EUR2005
    UN Data. Commodity: Uranium (enriched 235), plutonium compounds, alloys. Average import price (trade/quantity) Germany-France.
  property carbon content 0
    carbon content on a dry matter basis (reserved; not for manual entry)
  property true value 586
    allocation property applied in "true value" allocation // value calculated from revenue
  properties: water content 0, dry mass 1 kg, carbon content, non-fossil 0, carbon content, fossil 0, water in wet mass 0 kg, wet mass 1 kg, carbon allocation 0 kg

## By-products
- electricity, for reuse in municipal waste incineration only: 0 kWh; CPC 17100: Electrical energy; By-product classification allocatable product; pedigree (1,1,1,1,1)
  Net electricity generated from this waste and used in internal MSWI plant energy redistribution.
  Uncertainty: uncertainty is calculated from uncertainties in waste composition and uncertainties in energy efficiency and the uncertainty in internal energy demand
  production volume 7505.54 kWh
  property exergy 3.6 MJ; name E_el_prod_MSWI_exergy
    This exergy property is based on the exergy content of the product.
  property true value relation 3.6; name E_el_prod_MSWI_true_value_relation
    property to calculate "true value" from
  property price 0.1 EUR2005; name E_el_prod_MSWI_price_EUR2005
    Estimated to be the same price as in case of electricity, medium voltage.
  property true value 0.000421191
    allocation property applied in "true value" allocation // value calculated from true value relation
- heat, for reuse in municipal waste incineration only: 0 MJ; CPC 17300: Steam and hot water; By-product classification allocatable product; pedigree (1,1,1,1,1)
  Net useful heat generated from this waste and used in internal MSWI plant energy redistribution.
  Uncertainty: uncertainty is calculated from uncertainties in waste composition and uncertainties in energy efficiency and the uncertainty in internal energy demand
  production volume 53100.7 MJ
  property true value relation 0.1842; name E_th_prod_MSWI_true_value_relation
    property to calculate "true value" from
  property exergy 0.1842 MJ; name E_th_prod_MSWI_exergy
    This exergy property is based on the exergy content of the product.
  property price 0.0106 EUR2005; name E_th_prod_MSWI_price_EUR2005
    Average European district heat price from Ecoheatcool and Euroheat 2005-2006, Ecoheat Work package 1: The European heat market. Final report. 10.6 EUR/GJ i s the price of district heat. http://www.solarthermalworld.org/files/Ecoheatcool%20WP1%20Web.pdf?download
  property true value 0.00015247
    (same comment as for electricity, for reuse in municipal waste incineration only)
- zinc concentrate: 0 kg; CPC 14290: Other non-ferrous metal ores and concentrates (other than uranium or thorium ores and concentrates); By-product classification allocatable product
  Calculated value from the knowledge of the properties of both products.
  production volume 1.32848 kg
  property price 0.38 EUR2005; name ByP_price_EUR2005
    Temporary price data. Calculated as 90% of purchasers price based on: Zinc content in concentrate 53%. Concentrate price per kg Zn 86.5% of refined Zn price (13.5% treatment charges according to CHR Metals Limited 2005: Dynamic cost curves. http://www.minecost.com/dynamic.pdf). 2004 zinc price from USGS (2007) Mineral commodity summaries 2007. <http://minerals.usgs.gov/minerals/pubs/mcs/2007/mcs2007.pdf> [Accessed 25 May 2010]
  property zinc content 0.53; name zinc_C_zinc_concentrate
    Zinc content on a dry matter basis. Value taken from teh "zinc mine operation" /GLO dataset.
  property dry mass 1 kg; name DM_zinc_concentrate
  property carbon content 0
    carbon content on a dry matter basis (reserved; not for manual entry)
  property true value 2.2049e-7
    allocation property applied in "true value" allocation // value calculated from revenue
  properties: wet mass 1 kg, water content 0, carbon content, non-fossil 0, carbon content, fossil 0, water in wet mass 0 kg, carbon allocation 0 kg

## Inputs from technosphere
- electricity, medium voltage: 0 kWh; pedigree (1,1,1,1,1)
  EcoSpold01Location=US
  old reference & own assumption
- heat, district or industrial, other than natural gas: 0 MJ; pedigree (1,1,1,1,1)
  old reference & own assumption
  EcoSpold01Location=CH
- inert waste, for final disposal: -0.799999 kg; lognormal variance with pedigree 0.042, pedigree (1,1,5,5,1)
  own assumption
  EcoSpold01Location=CH
  production volume 1.83164e6 kg
    Calculated from the production volume of uranium, enriched 3.0%, in fuel element for light water reactor in proportion to the respective output amounts.
  properties: dry mass 0.995 kg, water content 0.00502513, wet mass 1 kg
- low level radioactive waste: -0.000333 m3; lognormal variance with pedigree 0.342, pedigree (1,1,5,5,1)
  own assumption
  EcoSpold01Location=CH
  production volume 762.418 m3
    (same comment as for inert waste, for final disposal)
  properties: wet mass 2500 kg, dry mass 2500 kg
- nuclear fuel factory: 3.7e-8 unit; lognormal variance with pedigree 0.082, pedigree (1,1,5,5,1)
  own estimation
  EcoSpold01Location=GLO
- uranium, enriched 3.0%, per separative work unit: 3.73 unit; lognormal variance with pedigree 0.042, pedigree (1,1,5,5,1)
  calculated
  EcoSpold01Location=US
  properties: wet mass 1 kg, dry mass 1 kg
- water, decarbonised: 0 kg; name water_decarbonised_input; pedigree (1,1,1,1,1)
  EcoSpold01Location=RER
  old reference
  properties: wet mass 1 kg
- chromium: 0.599999 kg; lognormal variance with pedigree 0.042, pedigree (1,1,5,5,1)
  EcoSpold01Location=RER
  estimation on number, not on module substituting Zr
  properties: wet mass 1 kg, dry mass 1 kg
- wastewater, unpolluted: -0.135 m3; lognormal variance with pedigree 0.162, pedigree (1,1,5,5,1)
  EcoSpold01Location=CH
  old reference
  production volume 309088 m3
    (same comment as for inert waste, for final disposal)
  properties: water content 2962.17, carbon content, non-fossil 0.00178991, dry mass 0.337476 kg, wet mass 1000 kg, carbon content, fossil 0.00178991
  note on carbon content, fossil: Assumed to be like in tap water. Bicarbonate content is 2.93 mol/m3. CO2 content is 0.1 mol/m3 (ecoinvent v2.2 report 8, Tab 93.1).
- cement, unspecified: 0 kg; pedigree (1,1,1,1,1)
  own assumption
  EcoSpold01Location=CH
  properties: dry mass 1 kg, wet mass 1 kg
- electricity, medium voltage: 0.485581, 0.0883552, 2.03949, 1.49837, 21.7248, 7.05413, 3.10923 kWh (7 entries); lognormal variance with pedigree 0.162, pedigree (1,1,5,5,1)
  EcoSpold01Location=US
  old reference & own assumption
- heat, district or industrial, other than natural gas: 0.498867, 29.9011 MJ (2 entries); lognormal variance with pedigree 0.162, pedigree (1,1,5,5,1)
  old reference & own assumption
  EcoSpold01Location=CH
- water, decarbonised: 7.47707, 19.4553, 0.0121669, 78.4678, 19.1614, 3.86285, 12.7018, 0.701214, 9.99215, 23.2758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 kg (12 entries); lognormal variance with pedigree 0.162, pedigree (1,1,5,5,1)
  EcoSpold01Location=RER
  old reference
- cement, unspecified: 0.000204141, 1.49519e-5, 1.69222e-5, 4.26179e-5, 0.000981117, 0.000963818, 2.8368e-5, 3.76958e-5, 0.00421036 kg (9 entries); lognormal variance with pedigree 0.162, pedigree (1,1,5,5,1)
  own assumption
  EcoSpold01Location=CH

## Emissions to nature
- Molybdenum [water, surface water]: 2.75e-5 kg; lognormal variance with pedigree 0.162, pedigree (1,1,5,5,1)
  old reference
- Silver, ion [water, surface water]: 2.17e-5 kg; lognormal variance with pedigree 0.162, pedigree (1,1,5,5,1)
  old reference
- Oils, unspecified [water, surface water]: 0.00128 kg; lognormal variance with pedigree 0.162, pedigree (1,1,5,5,1)
  old reference
- Sulfite [water, surface water]: 0.000185 kg; lognormal variance with pedigree 0.162, pedigree (1,1,5,5,1)
  old reference
- VOC, volatile organic compounds, unspecified origin [water, surface water]: 0.0893999 kg; lognormal variance with pedigree 0.162, pedigree (1,1,5,5,1)
  old reference
- Fluoride [water, surface water]: 0.0358 kg; lognormal variance with pedigree 0.162, pedigree (1,1,5,5,1)
  old reference
- Iron, ion [water, surface water]: 0.000153 kg; lognormal variance with pedigree 0.162, pedigree (1,1,5,5,1)
  old reference
- Boron [water, surface water]: 6.38999e-5 kg; lognormal variance with pedigree 0.162, pedigree (1,1,5,5,1)
  old reference
- NMVOC, non-methane volatile organic compounds, unspecified origin [air, non-urban air or from high stacks]: 0.0033 kg; lognormal variance with pedigree 0.162, pedigree (1,1,5,5,1)
  old reference
- Calcium, ion [water, surface water]: 0.0829999 kg; lognormal variance with pedigree 0.162, pedigree (1,1,5,5,1)
  old reference
- Water [water, unspecified]: 0.04875 m3; name water_to_water_unspecified; = (water_decarbonised_input/1000)*(1-fraction_WDC_to_air)-0.135; lognormal variance with pedigree 0.0827, pedigree (2,2,5,5,1)
  Calculated value based on literature values and expert opinion. See comments in the parametres' comment field.
  property carbon content, non-fossil 0; name C_content_non_fossil
  property carbon content, fossil 0; name C_content_fossil
  property dry mass 0 kg; name DM
  property fraction, origin: salt water 0; name fraction_origin_salt_water_Ww
  property fraction, origin: unspecified 0; name fraction_origin_unspecified_Ww
  property fraction, origin: fresh water 1; name fraction_origin_fresh_water_Ww
  property water in wet mass 1000 kg; name WWM
  property wet mass 1000 kg; name WM
- Suspended solids, unspecified [water, surface water]: 0.0023 kg; lognormal variance with pedigree 0.162, pedigree (1,1,5,5,1)
  old reference
- Water [air, unspecified]: 0.11625 m3; name water_to_air_unspecified; lognormal variance with pedigree 0.0827, pedigree (2,2,5,5,1)
  (same comment as for Water)
  property fraction, origin: salt water 0; name fraction_origin_salt_water
  property fraction, origin: unspecified 0; name fraction_origin_unspecified
  property fraction, origin: fresh water 1; name fraction_origin_fresh_water
- Nitrogen [water, surface water]: 0.0702999 kg; lognormal variance with pedigree 0.162, pedigree (1,1,5,5,1)
  old reference
- TOC, Total Organic Carbon [water, surface water]: 0.00614814 kg; lognormal variance with pedigree 0.162, pedigree (1,1,5,5,1)
  Calculated by default as TOC (gC) = COD/2.7 (COD measured in g O2). Should more correctly be calculated from the carbon content of the specified emissions to water.
- Phosphorus [water, surface water]: 0.000217 kg; lognormal variance with pedigree 0.162, pedigree (1,1,5,5,1)
  old reference
- Magnesium [water, surface water]: 0.000402 kg; lognormal variance with pedigree 0.162, pedigree (1,1,5,5,1)
  old reference
- Chloride [water, surface water]: 0.00702999 kg; lognormal variance with pedigree 0.162, pedigree (1,1,5,5,1)
  old reference
- Sulfate [water, surface water]: 0.0121 kg; lognormal variance with pedigree 0.162, pedigree (1,1,5,5,1)
  old reference
- DOC, Dissolved Organic Carbon [water, surface water]: 0.00614814 kg; lognormal variance with pedigree 0.162, pedigree (1,1,5,5,1)
  Calculated as equal to TOC.
- Nickel, ion [water, surface water]: 0.000147 kg; lognormal variance with pedigree 0.162, pedigree (1,1,5,5,1)
  old reference
- Sodium, ion [water, surface water]: 0.00893999 kg; lognormal variance with pedigree 0.162, pedigree (1,1,5,5,1)
  old reference
- COD, Chemical Oxygen Demand [water, surface water]: 0.0166 kg; lognormal variance with pedigree 0.162, pedigree (1,1,5,5,1)
  old reference
- Nitrogen oxides [air, non-urban air or from high stacks]: 0.03 kg; lognormal variance with pedigree 0.162, pedigree (1,1,5,5,1)
  old reference
- Uranium alpha [air, non-urban air or from high stacks]: 9.99999e-5 kBq; lognormal variance with pedigree 0.342, pedigree (1,1,5,5,1)
  few recent data, or too old data
- Manganese [water, surface water]: 1.02e-5 kg; lognormal variance with pedigree 0.162, pedigree (1,1,5,5,1)
  old reference
- Uranium alpha [water, surface water]: 0.799999 kBq; lognormal variance with pedigree 0.342, pedigree (1,1,5,5,1)
  few recent data, or too old data
- Ammonium, ion [water, surface water]: 0.0580999 kg; lognormal variance with pedigree 0.162, pedigree (1,1,5,5,1)
  old reference
- BOD5, Biological Oxygen Demand [water, surface water]: 0.00313 kg; lognormal variance with pedigree 0.162, pedigree (1,1,5,5,1)
  old reference

## Sampling procedure
Literature

## Extrapolations
none This dataset has been copied from an original dataset covering the geography US. The uncertainty has been adjusted accordingly.

## Review by Thomas Nemecek 2007-08-24
Passed.
