# geothermal power plant construction, Hot-Dry-Rock

Dataset: EcoSpold 2, unit process
Geography: GLO
Time period: 2008-01-01 to 2019-12-31
Technology level: current
Classification: ISIC rev.4 ecoinvent: 4220a: Construction of utility projects for electricity production, except for liquid fuels
Synonyms: Hot fractured Rock; Hot Wet Rock; Deep Heat Mining; Engineered Geothermal System
Tags: Geothermal power; Infrastructure
Scenario: Business-as-Usual
System model: Allocation at the point of substitution
Generated by: Christian Bauer
Database: ecoinvent
isCopyrightProtected: true
accessRestrictedTo: 1

## General comment
Enhanced geothermal systems (EGS), also known as Hot-Dry-Rock (HDR) systems, enable the exploration of the Earth’s interior heat outside known geothermal provinces. EGS are exploited with artificial stimulation of tight rock formations by hydraulic fracturing in order to create an underground heat exchanger. Fluid is circulated in a closed circle during operation, whereby reservoir pressures and fluid throughputs are managed by balanced production and injection rates in multiple well array.It is assumed for this dataset that HDR power plants represent all binary cycle geothermal power plants existing. According to (Ruggero, B. 2010. Geothermal Power Generation in the World. 2005-2010 Update Report. Proceedings World Geothermal Congress 2010; Bali, Indonesia, 25-29 April 2010), the binary cycle type represents 9% of capacity installed worldwide.

The plant modelled in this dataset consists out of three deep boreholes with depths between 5000 m and 6000 m. One of them is used as the injection well for the cold fluid leaving the generation unit, the other two as production wells, which provide the hot fluid, heated up within the hot rock formation. One test drilling of 2000m depth for exploration (rock, temperature gradient, aquifers, etc.) is conducted. Then, the injection and the production wells are drilled. The injection well is used for the stimulation of the rock (fracturing): A mixture of water and sand is pressed down with high pressure in order to enlarge the present fractures in the rock and to make it more permeable. During the operation of the power plant, water will pass through this permeable (hot) rock, be heated and pumped through the production well to the ORC unit.

A temperature gradient of 35-40°C per kilometer depth can be assumed. An Organic Rankine Cycle unit with binary cycle and a capacity of 3MWel is used for electricity generation. Further key components of the plant are the underground chromium steel pipes between the injection wells and the generation unit and for water supply. A lifetime of 20 years is assumed for the power plant.

Source of the image: Geothermal Explorers Ltd. 2011. Project Deep Heat Mining Basel. http://www.geothermal.ch; visited January 2011.

## Included activities start
Construction of a geothermal Hot-Dry-Rock plant.

## Included activities end
This activity ends with the geothermal power plant constructed and ready for electricity production.

Energy use for pumping is directly taken from the energy produced at the ORC unit.

This dataset doesn't include most of the dismantling activities. It does not include motor vehicles for internal transport and minor maintenance items. It does not include further buildings for administration or maintenance. The chromium steel pipes usually remain in the ground after use. No outputs to the environment (leaching) has been considered.

## Technology
- Rock temperature in a depth of 5500m: ca. 230°C.
- ORC unit: 3MWel, 30MWth, binary cycle. No use of the thermal capacity.
- Flow rate: 224 m3/h
- Land required: 7500m2

## Parameters
- percentage: 0.09 dimensionless; lognormal variance with pedigree 0.043325, pedigree (3,2,5,2,2)
  Percentage of energy produced in binary cycle geothermal power plants worldwide: 9%. [Ruggero, B. 2010. Geothermal Power Generation in the World. 2005-2010 Update Report. Proceedings World Geothermal Congress 2010; Bali, Indonesia, 25-29 April 2010]
  Uncertainty: Uncertainty slightly raised because the year the data are valid is not known for sure. However, it is sure that the value has been gathered in the latest in the beginning of 2010.
- Production of electricity, new installed: 3.23148e9 kWh/year; name electricity_new; lognormal variance with pedigree 0.030325, pedigree (3,2,2,2,3)
  Estimated value/calculated value. Data sources: Ruggero, B. 2010. Geothermal Power Generation in the World. 2005-2010 Update Report. Proceedings World Geothermal Congress 2010; Bali, Indonesia, 25-29 April 2010
  Wikipedia. 2011. Geothermal electricity. Wikipedia, The Free Encyclopedia. Last visit on 12.12.2011
- fraction, process water, to air: 0.15 dimensionless; name fraction_PW_to_air; lognormal variance with pedigree 0.092025, pedigree (4,4,3,2,4)
  Literature value. In case when no industry/process specific data are available, default evaporation fraction value is used. This value is 15% and is based on literature (Statistics Canada, 2007 & Shaffer, K.H., 2008, Consumptive water use in the Great Lakes Basin, USGS & Shiklomanov, 2003, World Water Resources at the Beginning of the 21st Century) and has been approved by an expert.
- Operation time: 7000 hour/year; name operation_time; lognormal variance with pedigree 0.0124, pedigree (3,2,2,3,3)
  Estimation

## Reference product
- geothermal power plant, Hot-Dry-Rock: 1 unit; CPC 53262: Power plants; By-product classification allocatable product
  production volume 13.8492 unit; = ( electricity_new* percentage)/( operation_time* capacity_MW*1000)
    Calculated value
  property capacity [MW] 3 MW; name capacity_MW
    Electrical capacity of the geothermal power plant [MWel].
  property lifetime 20 year; name lifetime
  property price 2.12725e7 EUR2005
    Calculated based on inputs: The price of the product has been calculated as a sum of the values of the material and energy inputs for this product. This value is therefore a rough estimation. It may underestimate the real price since there are additional expenses when producing any product. These expences can include for example labour costs, treatment of waste materials and profit for the producer. Please consider carefully whether this level of data quality is acceptable for your application.

## Inputs from technosphere
- deep well closure: 19000 m; = deep_well; source Häring M. 2002; lognormal variance with pedigree 0.0986, pedigree (4,4,5,4,4)
  Estimated value. The plant modelled in this dataset consists out of three deep boreholes with depths of about 5500 m and, as the holes are not totally straight, a total length of about 6000m. One of them is used as the injection well for the cold fluid leaving the generation unit, the other two as production wells, which provide the hot fluid, heated up within the hot rock formation. One test drilling of 2000m depth is assumed, but with a smaller diameter than for the production and injection wells, therefore operating expenses should be smaller. A reduction of 50% is arbitrarily assumed.
- excavation, hydraulic digger: 3000 m3; source Rogge S. 2004, p. p.93; lognormal variance with pedigree 0.0647, pedigree (4,3,5,3,3)
  Literature value. The chromium steel pipes will be piped in this trench.
- steel, low-alloyed: 14600 kg; = 7300*2; source Rogge S. 2004, p. p.93; lognormal variance with pedigree 0.0986, pedigree (4,4,5,4,4)
  Literature value/estimated value. Used for rising pipes in the production well and the pump.
  Rogge (2004) assumes 7.3t of steel for these elements per production well.
  properties: carbon content, fossil 0.005, dry mass 1 kg, wet mass 1 kg
  note on carbon content, fossil: Low alloyed steel composition given in Tab. 3.2 ecoinvent v2.2 report 10_partII. Steel assumed to have a C content of 0.5%
- chromium steel pipe: 37800 kg; source Rogge S. 2004, p. p.93; lognormal variance with pedigree 0.0967, pedigree (4,3,5,3,4)
  Literature value. These are the fluid pipes for the connection of the production wells with the ORC unit and back into the injection well again. Data from (Rogge 2004) for an installed capacity of 1 MWel and a length of pipes of 1600 m are directly used for the modelled plant. The pipes are piped underground.
  If the working temperature of the water is lower than 90°C, there could also be used plastic pipes.
  properties: wet mass 1 kg, dry mass 1 kg, carbon content, fossil 0.0008
  note on carbon content, fossil: Stainless steel model is the grade 304 steel (18/8 stainless, 18% chromium 8% nickel; max. 0.08% C)
- sand: 0 kg; source Rogge S. 2004, p. p.93; pedigree (1,1,1,1,1)
  Literature value. Used for stimulation as fracture propping agent (proppant). After drilling of the boreholes, the injection well is used for the stimulation of the rock (fracturing): A mixture of water and sand is pressed down with high pressure in order to enlarge the present fractures in the rock and to make it more permeable. During the operation of the power plant, water will pass through this permeable (hot) rock, be heated and pumped to the ORC unit in the production well.
  Rogge (2004) assumes 60t of sand per well.
  properties: dry mass 1 kg, wet mass 1 kg
- deep well, for geothermal power, onshore, 6000m: 19000 m; name deep_well; = 3*6000+2000/2; source Häring M. 2002; lognormal variance with pedigree 0.0986, pedigree (4,4,5,4,4)
  (same comment as for deep well closure)
- diesel, burned in building machine: 1.82e6 MJ; source Rogge S. 2004; lognormal variance with pedigree 0.0986, pedigree (4,4,5,4,4)
  Literature value. Used for stimulation (fracturing). After drilling of the boreholes, the injection well is used for the stimulation of the rock (fracturing): A mixture of water and sand is pressed down with high pressure in order to enlarge the present fractures in the rock and to make it more permeable. During the operation of the power plant, water will pass through this permeable (hot) rock, be heated and pumped to the ORC unit in the production well.
- heat and power co-generation unit, organic Rankine cycle, 3MW electrical: 1 unit; source Häring M. 2002; lognormal variance with pedigree 0.008, pedigree (1,1,4,1,1)
- sand: 14.1388, 2723.43, 32.6083, 177230 kg (4 entries); source Rogge S. 2004, p. p.93; lognormal variance with pedigree 0.0986, pedigree (4,4,5,4,4)
  (same comment as for sand)

## Inputs from nature
- Water, unspecified natural origin [natural resource, in water]: 750 m3; name water_UNO_input; = 3*250; source Rogge S. 2004, p. p.93; lognormal variance with pedigree 0.0967, pedigree (4,3,5,3,4)
  Literature value. Used for stimulation. After drilling of the boreholes, the injection well is used for the stimulation of the rock (fracturing): A mixture of water and sand is pressed down with high pressure in order to enlarge the present fractures in the rock and to make it more permeable. During the operation of the power plant, water will pass through this permeable (hot) rock, be heated and pumped to the ORC unit in the production well.
  Rogge (2004) assumes 250 m3 water per well.
  Literature value. Used for stimulation. After drilling of the boreholes, the injection well is used for the stimulation of the rock (fracturing): A mixture of water and sand is pressed down with high pressure in order to enlarge the present fractures in the rock and to make it more permeable. During the operation of the power plant, water will pass through this permeable (hot) rock, be heated and pumped to the ORC unit in the production well.
  Rogge (2004) assumes 250 m3 water per well.
- Transformation, from pasture, man made [natural resource, land]: 7500 m2; name land_use; source Häring M. 2002; lognormal variance with pedigree 0.0371, pedigree (3,4,4,3,3)
  Estimated value/measured value. This value is taken from a projected geothermal plant in Switzerland. It includes land use of the well and of the whole power plant area, including buildings etc. It is estimated that the drillings are made greenfield.
- Occupation, industrial area [natural resource, land]: 150000 m2*year; = land_use*lifetime; lognormal variance with pedigree 0.0371, pedigree (3,4,4,3,3)
  Calculated value
- Transformation, to industrial area [natural resource, land]: 7500 m2; = land_use; source Häring M. 2002; lognormal variance with pedigree 0.0371, pedigree (3,4,4,3,3)
  (same comment as for Transformation, from pasture, man made)

## Emissions to nature
- Water [water, unspecified]: 637.5 m3; name water_to_water_unspecified; = water_UNO_input*(1-fraction_PW_to_air); lognormal variance with pedigree 0.130025, pedigree (4,4,5,2,4)
  Calculated value based on literature values and expert opinion. See comments in the parametres' comment field.
  property fraction, origin: fresh water 0; name fraction_origin_fresh_water_Ww
  property fraction, origin: salt water 0; name fraction_origin_salt_water_Ww
  property fraction, origin: unspecified 1; name fraction_origin_unspecified_Ww
- Water [air, unspecified]: 112.5 m3; name water_to_air_unspecified; = water_UNO_input*fraction_PW_to_air; lognormal variance with pedigree 0.130025, pedigree (4,4,5,2,4)
  (same comment as for Water)
  property fraction, origin: unspecified 1; name fraction_origin_unspecified
  property fraction, origin: fresh water 0; name fraction_origin_fresh_water
  property fraction, origin: salt water 0; name fraction_origin_salt_water

## Sampling procedure
Literature

## Extrapolations
This dataset has been extrapolated from year 2008 to the year of the calculation (2019). The uncertainty has been adjusted accordingly.

## Review by Bo Weidema 2012-01-12
As an exception, this dataset was only reviewed by one reviewer.

## Review by Bo Weidema 2012-01-12
Passed
Reviewed for relevance of daatset structure, exchanges and quality of documentation and readability
