# scrap preparation facility construction

Dataset: EcoSpold 2, unit process
Geography: RoW
Time period: 2002-01-01 to 2019-12-31
Technology level: current
Classification: EcoSpold01Categories: metals/extraction
Classification: ISIC rev.4 ecoinvent: 4290:Construction of other civil engineering projects
Tags: ConvertedDataset
Scenario: Business-as-Usual
System model: Allocation at the point of substitution
Generated by: Hans-Jörg Althaus
Published in: Althaus H.-J. 2000
Database: ecoinvent
isCopyrightProtected: true
accessRestrictedTo: 1

## General comment
Medium sized plant. Output: 10'000 t/a, life time: 50 years. Assumption is based on data for casting plant.
[This dataset was already contained in the ecoinvent database version 2. It was not individually updated during the transfer to ecoinvent version 3. Life Cycle Impact Assessment results may still have changed, as they are affected by changes in the supply chain, i.e. in other datasets. This dataset was generated following the ecoinvent quality guidelines for version 2. It may have been subject to central changes described in the ecoinvent version 3 change report (http://www.ecoinvent.org/database/ecoinvent-version-3/reports-of-changes/), and the results of the central updates were reviewed extensively. The changes added e.g. consistent water flows and other information throughout the database. The documentation of this dataset can be found in the ecoinvent reports of version 2, which are still available via the ecoinvent website. The change report linked above covers all central changes that were made during the conversion process.]

## Included activities end
Production hall, machinery and administrative buildings (including disposal)

## Geography
Some Swiss datasets are used for European processes.

## Technology
Assumed technology

## Reference product
- scrap preparation facility: 1 unit; By-product classification allocatable product; CPC 53290: Other civil engineering works
  production volume 2.67763 unit
    This is a placeholder value that does not reflect real-world production volumes. This dataset does not currently require a real-world production volume to work in the database framework, and no actual data were collected yet. This has no negative effect on the results of the ecoinvent database.
  property price 2.23222e7 EUR2005
    Upscale from EU 27 to the world by PPP (0.8458 in 2003 and 0,8426 in 2004)
  property lifetime capacity [kg] 5e8 kg; name lifetime_capacity_kg; = 10000000*50
    Rough guess. Based on assumed output of 1e7 kg/a and 50 year lifetime.
  property true value 2.23222e7
    allocation property applied in "true value" allocation // value calculated from revenue

## By-products
- heat, for reuse in municipal waste incineration only: 0 MJ; CPC 17300: Steam and hot water; By-product classification allocatable product; pedigree (1,1,1,1,1)
  Net electricity generated from this waste and used in internal MSWI plant energy redistribution.
  Uncertainty: uncertainty is calculated from uncertainties in waste composition and uncertainties in energy efficiency and the uncertainty in internal energy demand
  production volume 0.535094 MJ
  property exergy 0.1842 MJ; name E_th_prod_MSWI_exergy
    This exergy property is based on the exergy content of the product.
  property price 0.0106 EUR2005; name E_th_prod_MSWI_price_EUR2005
    Average European district heat price from Ecoheatcool and Euroheat 2005-2006, Ecoheat Work package 1: The European heat market. Final report. 10.6 EUR/GJ i s the price of district heat. http://www.solarthermalworld.org/files/Ecoheatcool%20WP1%20Web.pdf?download
  property true value relation 0.1842; name E_th_prod_MSWI_true_value_relation
    property to calculate "true value" from
  property true value 0.00117328
    allocation property applied in "true value" allocation // value calculated from true value relation
- electricity, for reuse in municipal waste incineration only: 0 kWh; CPC 17100: Electrical energy; By-product classification allocatable product; pedigree (1,1,1,1,1)
  (same comment as for heat, for reuse in municipal waste incineration only)
  production volume 0.0753558 kWh
  property true value relation 3.6; name E_el_prod_MSWI_true_value_relation
    property to calculate "true value" from
  property price 0.1 EUR2005; name E_el_prod_MSWI_price_EUR2005
    Estimated to be the same price as in case of electricity, medium voltage.
  property exergy 3.6 MJ; name E_el_prod_MSWI_exergy
    This exergy property is based on the exergy content of the product.
  property true value 0.00322924
    (same comment as for heat, for reuse in municipal waste incineration only)

## Inputs from technosphere
- waste reinforced concrete: -55300 kg; lognormal variance with pedigree 0.5, pedigree (5,5,5,5,5)
  production volume 165900 kg
    Calculated from the production volume of scrap preparation facility in proportion to the respective output amounts.
  properties: dry mass 0.99418 kg, water content 0.00585407, wet mass 1 kg
- industrial machine, heavy, unspecified: 154000 kg; lognormal variance with pedigree 0.5, pedigree (5,5,5,5,5)
- building, hall: 1670 m2; lognormal variance with pedigree 0.5, pedigree (5,5,5,5,5)
- waste concrete, not reinforced: -154000 kg; lognormal variance with pedigree 0.5, pedigree (5,5,5,5,5)
  production volume 462000 kg
    (same comment as for waste reinforced concrete)
  properties: dry mass 1 kg, wet mass 1 kg
- building, multi-storey: 25000 m3; lognormal variance with pedigree 0.5, pedigree (5,5,5,5,5)
- conveyor belt: 200 m; lognormal variance with pedigree 0.5, pedigree (5,5,5,5,5)
- concrete, normal: 0 m3; pedigree (1,1,1,1,1)
  properties: water content 0.086758, dry mass 2190 kg, wet mass 2380 kg
- reinforcing steel: 13200 kg; lognormal variance with pedigree 0.5, pedigree (5,5,5,5,5)
  properties: carbon content, fossil 0.004, dry mass 1 kg, wet mass 1 kg
- concrete, normal: 1.97686, 0.205986, 1.6676, 0.938025, 3.97227, 0.133982, 77.2053 m3 (7 entries); lognormal variance with pedigree 0.5, pedigree (5,5,5,5,5)

## Inputs from nature
- Transformation, to industrial area [natural resource, land]: 37510 m2; lognormal variance with pedigree 0.32, pedigree (5,5,5,5,5)
- Occupation, industrial area [natural resource, land]: 1.875e6 m2*year; lognormal variance with pedigree 0.24, pedigree (5,5,5,5,5)
- Transformation, from unspecified [natural resource, land]: 37500 m2; lognormal variance with pedigree 0.32, pedigree (5,5,5,5,5)

## Sampling procedure
Internet search

## Extrapolations
see Geography This dataset has been copied from an original dataset covering the geography RER. The uncertainty has been adjusted accordingly.

## Review by Bo Weidema 2012-07-06
Passed
Internal review comments available in terminated submission

## Review by Roland Hischier 2003-08-20
Passed.
