# methanol production, from synthetic gas

Dataset: EcoSpold 2, unit process
Geography: CH
Time period: 1995-01-01 to 2019-12-31
Technology level: current
Classification: EcoSpold01Categories: biomass/fuels
Classification: ISIC rev.4 ecoinvent: 19a: Liquid and gaseous fuels from biomass
Synonyms: methyl hydroxide; methyl alcohol; monohydroxymethane
Tags: ConvertedDataset
Scenario: Business-as-Usual
System model: Allocation at the point of substitution
Share of production covered: 0 %
Generated by: Edgard Gnansounou
Published in: Jungbluth N. 2007
Database: ecoinvent
isCopyrightProtected: true
accessRestrictedTo: 1

## General comment
The process describes the production of methanol derived from syngas and refers to a full-methanol steam reforming process to obtain a 2.2:1 H2:CO ratio of the syngas for the sole production of methanol. No CO2 use, no Hydrogen production (assumed to be burned in the furnace).
[This dataset was already contained in the ecoinvent database version 2. It was not individually updated during the transfer to ecoinvent version 3. Life Cycle Impact Assessment results may still have changed, as they are affected by changes in the supply chain, i.e. in other datasets. This dataset was generated following the ecoinvent quality guidelines for version 2. It may have been subject to central changes described in the ecoinvent version 3 change report (http://www.ecoinvent.org/database/ecoinvent-version-3/reports-of-changes/), and the results of the central updates were reviewed extensively. The changes added e.g. consistent water flows and other information throughout the database. The documentation of this dataset can be found in the ecoinvent reports of version 2, which are still available via the ecoinvent website. The change report linked above covers all central changes that were made during the conversion process.]

## Included activities end
Raw materials including syngas, processing energy, estimate on catalyst use based on 'methanol from natural gas', emissions to air and water from process, plant infrastructure.

## Geography
Data from few literature sources, largely based on methanol from natural gas.

## Technology
Data refers to full-methanol steam reforming (as opposed to autothermal reforming) of syngas derived from biomass gasification.

## Time period
Data from 1995 to 2004, pilot scale, future technology

## Parameters
- fraction, cooling water, to air: 0.3875; name fraction_CW_to_air; = (0.5*fraction_CW_OT_to_air)+(0.5*fraction_CW_R_to_air); lognormal variance with pedigree 0.092025, pedigree (4,4,3,2,4)
  Calculated value based on literature value (see comments of the other parametres present in this dataset) and expert opinion. In the case when no industry/literature data are available about the type of cooling or directly fraction, cooling water, to air specific for the process a default assumption is applied. It is assumed that the once-through cooling system is used in 50% of all cases and recirculating system is used in another 50% of all cases.
- fraction, cooling water, cooling pond system, to air: 0.032; name fraction_CW_CP_to_air; lognormal variance with pedigree 0.0413, pedigree (2,3,1,3,1)
  Calculated based on literature value (Scown, C.D., 2011, Water Footprint of U.S. Transportation Fuels and supplying information of the article) (Vionnet, S., Quantis Water Database - Technical Report, 2012).
- fraction, cooling water, once-through system, to air: 0.004; name fraction_CW_OT_to_air; lognormal variance with pedigree 0.0413, pedigree (2,3,1,3,1)
  (same comment as for fraction, cooling water, cooling pond system, to air)
- fraction, cooling water, recirculating system, to air: 0.771; name fraction_CW_R_to_air; lognormal variance with pedigree 0.0413, pedigree (2,3,1,3,1)
  (same comment as for fraction, cooling water, cooling pond system, to air)
- fraction, process water, to air: 0.15 dimensionless; name fraction_PW_to_air; lognormal variance with pedigree 0.092025, pedigree (4,4,3,2,4)
  Literature value. In case when no industry/process specific data are available, default evaporation fraction value is used. This value is 15% and is based on literature (Statistics Canada, 2007 & Shaffer, K.H., 2008, Consumptive water use in the Great Lakes Basin, USGS & Shiklomanov, 2003, World Water Resources at the Beginning of the 21st Century) and has been approved by an expert.
- fraction, water, deionised, to air: 0.15; name fraction_WDI_to_air; = fraction_PW_to_air; lognormal variance with pedigree 0.092025, pedigree (4,4,3,2,4)
  Calculated value. See comment in the other parametres present in this dataset. Deionised water is considered to be always used as process water, thus process water fractions to air are applied to all deionised water input flows to calculate the amount of water consumed in the processes.

## Reference product
- methanol, from biomass: 1 kg; CPC 34139: Other alcohols, phenols, phenol-alcohols, and their halogenated, sulphonated, nitrated or nitrosated derivativ[…]; By-product classification allocatable product; CAS 67-56-1
  EcoSpold01Location=CH
  production volume 82369 kg
    No commercial plant of methanol-from-biomass. Laboratory-to-pilot scale.
    Calculated from production of syngas at pilot plant (586920 m3)
  property price 0.216 EUR2005
    Methyl alcohol, import prices for EU-27, USA, Japan, China, and India(http://data.un.org/browse.aspx?d=Comtrade; downloaded 13 September 2010)
  property carbon content 0.375375
    carbon content on a dry matter basis (reserved; not for manual entry)
  property true value 0.216
    allocation property applied in "true value" allocation // value calculated from revenue
  properties: carbon content, fossil 0, water content 0.001001, carbon content, non-fossil 0.375375, water in wet mass 0.001 kg, dry mass 0.999 kg, wet mass 1 kg, carbon allocation 0.375 kg

## By-products
- electricity, for reuse in municipal waste incineration only: 0 kWh; CPC 17100: Electrical energy; By-product classification allocatable product; pedigree (1,1,1,1,1)
  Net electricity generated from this waste and used in internal MSWI plant energy redistribution.
  Uncertainty: uncertainty is calculated from uncertainties in waste composition and uncertainties in energy efficiency and the uncertainty in internal energy demand
  production volume 10.636 kWh
  property exergy 3.6 MJ; name E_el_prod_MSWI_exergy
    This exergy property is based on the exergy content of the product.
  property true value relation 3.6; name E_el_prod_MSWI_true_value_relation
    property to calculate "true value" from
  property price 0.1 EUR2005; name E_el_prod_MSWI_price_EUR2005
    Estimated to be the same price as in case of electricity, medium voltage.
  property true value 1.65905e-5
    allocation property applied in "true value" allocation // value calculated from true value relation
- heat, for reuse in municipal waste incineration only: 0 MJ; CPC 17300: Steam and hot water; By-product classification allocatable product; pedigree (1,1,1,1,1)
  Net useful heat generated from this waste and used in internal MSWI plant energy redistribution.
  Uncertainty: uncertainty is calculated from uncertainties in waste composition and uncertainties in energy efficiency and the uncertainty in internal energy demand
  production volume 75.2481 MJ
  property true value relation 0.1842; name E_th_prod_MSWI_true_value_relation
    property to calculate "true value" from
  property exergy 0.1842 MJ; name E_th_prod_MSWI_exergy
    This exergy property is based on the exergy content of the product.
  property price 0.0106 EUR2005; name E_th_prod_MSWI_price_EUR2005
    Average European district heat price from Ecoheatcool and Euroheat 2005-2006, Ecoheat Work package 1: The European heat market. Final report. 10.6 EUR/GJ i s the price of district heat. http://www.solarthermalworld.org/files/Ecoheatcool%20WP1%20Web.pdf?download
  property true value 6.00572e-6
    (same comment as for electricity, for reuse in municipal waste incineration only)
- zinc concentrate: 0 kg; CPC 14290: Other non-ferrous metal ores and concentrates (other than uranium or thorium ores and concentrates); By-product classification allocatable product
  Calculated value from the knowledge of the properties of both products.
  production volume 0.00188257 kg
  property price 0.38 EUR2005; name ByP_price_EUR2005
    Temporary price data. Calculated as 90% of purchasers price based on: Zinc content in concentrate 53%. Concentrate price per kg Zn 86.5% of refined Zn price (13.5% treatment charges according to CHR Metals Limited 2005: Dynamic cost curves. http://www.minecost.com/dynamic.pdf). 2004 zinc price from USGS (2007) Mineral commodity summaries 2007. <http://minerals.usgs.gov/minerals/pubs/mcs/2007/mcs2007.pdf> [Accessed 25 May 2010]
  property zinc content 0.53; name zinc_C_zinc_concentrate
    Zinc content on a dry matter basis. Value taken from teh "zinc mine operation" /GLO dataset.
  property dry mass 1 kg; name DM_zinc_concentrate
  property carbon content 0
    carbon content on a dry matter basis (reserved; not for manual entry)
  property true value 8.68504e-9
    allocation property applied in "true value" allocation // value calculated from revenue
  properties: wet mass 1 kg, water content 0, carbon content, non-fossil 0, carbon content, fossil 0, water in wet mass 0 kg, carbon allocation 0 kg

## Inputs from technosphere
- wastewater, from residence: -0.00531704 m3; lognormal variance with pedigree 0.2106, pedigree (5,5,5,5,5)
  Estimated, to close mass balance
  EcoSpold01Location=CH
  Uncertainty: Estimated, to close mass balance
  production volume 438.005 m3
    Calculated from the production volume of methanol, from biomass in proportion to the respective output amounts.
  properties: dry mass 0.337476 kg, water content 2962.17, wet mass 1000 kg, carbon content, non-fossil 0.199421
  note on carbon content, non-fossil: 0.0673 kg TOC/m3 (Tab A.17, ecoinvent v2.2 report 13_I). TOC was considered as Total Carbon.
- zinc: 2.99969e-5 kg; lognormal variance with pedigree 0.2861, pedigree (4,5,5,3,5)
  Adapted from 'methanol (from natural gas), at plant'
  EcoSpold01Location=RER
  Uncertainty: Adapted from 'methanol (from natural gas), at plant'
  properties: wet mass 1 kg, dry mass 1 kg
- aluminium oxide, non-metallurgical: 0.000239975 kg; lognormal variance with pedigree 0.2861, pedigree (4,5,5,3,5)
  (same comment as for zinc)
  properties: wet mass 1 kg, dry mass 1 kg
- electricity, medium voltage: 0.276721 kWh; lognormal variance with pedigree 0.140025, pedigree (4,4,5,2,4)
  Data strongly dependent on technology, data from one source
  EcoSpold01Location=CH
  Uncertainty: Data strongly dependent on technology, data from one source
- synthetic gas: 7.12475 m3; lognormal variance with pedigree 0.112125, pedigree (3,2,5,2,4)
  Data derived from literature survey (>20 sources) 2000-2005
  EcoSpold01Location=CH
  Uncertainty: Data derived from literature survey (>20 sources) 2000-2005
  properties: dry mass 1.045 kg, water content 0.100478, carbon content, non-fossil 0.15525, wet mass 1.15 kg
  note on carbon content, non-fossil: Density of the gas (1.15 kg/Nm3), and dry mass were used to convert 0.135 kgC/kg in kg C/Nm3. All data from Tab 18.6, ecoinvent v2.2 report n 17.
- molybdenum: 9.99895e-6 kg; lognormal variance with pedigree 0.2861, pedigree (4,5,5,3,5)
  (same comment as for zinc)
  properties: dry mass 1 kg, wet mass 1 kg
- nickel, 99.5%: 1.99979e-5 kg; lognormal variance with pedigree 0.2861, pedigree (4,5,5,3,5)
  EcoSpold01Location=GLO
  Adapted from 'methanol (from natural gas), at plant'
  Uncertainty: Adapted from 'methanol (from natural gas), at plant'
  properties: dry mass 1 kg, wet mass 1 kg
- water, deionised: 0.849911 kg; name water_deionised_input; lognormal variance with pedigree 0.1127, pedigree (3,3,5,3,4)
  Data dependent on technology
  EcoSpold01Location=CH
  Uncertainty: Data dependent on technology
  properties: wet mass 1 kg
- methanol factory: 3.70331e-11 unit; lognormal variance with pedigree 0.3693, pedigree (2,3,5,3,3)
  EcoSpold01Location=GLO
  Calculation
  Uncertainty: Calculation
- copper oxide: 8.99906e-5 kg; lognormal variance with pedigree 0.2861, pedigree (4,5,5,3,5)
  EcoSpold01Location=RER
  Adapted from 'methanol (from natural gas), at plant'
  Uncertainty: Adapted from 'methanol (from natural gas), at plant'
  properties: wet mass 1 kg, dry mass 1 kg

## Inputs from nature
- Water, cooling, unspecified natural origin [natural resource, in water]: 0.00815915 m3; name water_cooling_UNO_input; lognormal variance with pedigree 0.1213, pedigree (2,3,5,3,4)
  Data dependent on technology, average used
  Uncertainty: Data dependent on technology, average used

## Emissions to nature
- Water [air, unspecified]: 0.00328916 m3; name water_to_air_unspecified; = (water_deionised_input/1000*fraction_WDI_to_air)+(water_cooling_UNO_input*fraction_CW_to_air); lognormal variance with pedigree 0.0807, pedigree (2,2,5,1,1)
  Calculated value based on literature values and expert opinion. See comments in the parametres' comment field.
  property fraction, origin: salt water 0; name fraction_origin_salt_water
  property fraction, origin: unspecified 0.96124; name fraction_origin_unspecified
  property fraction, origin: fresh water 0.0387597; name fraction_origin_fresh_water
- Methanol [water, surface water]: 2.99969e-5 kg; lognormal variance with pedigree 0.4401, pedigree (3,5,5,3,4)
  Adapted from 'methanol (from natural gas), at plant'
  Uncertainty: Adapted from 'methanol (from natural gas), at plant'
- Sulfur dioxide [air, urban air close to ground]: 1.70522e-6 kg; lognormal variance with pedigree 0.1127, pedigree (3,3,5,3,4)
  Calculation, from syngas composition and natural gas combustion
  Uncertainty: Calculation, from syngas composition and natural gas combustion
- Chloride [water, surface water]: 1.99979e-6 kg; lognormal variance with pedigree 0.4401, pedigree (3,5,5,3,4)
  (same comment as for Methanol)
- PAH, polycyclic aromatic hydrocarbons [air, urban air close to ground]: 3.10048e-8 kg; lognormal variance with pedigree 0.4227, pedigree (3,3,5,3,4)
  (same comment as for Sulfur dioxide)
- Propionic acid [air, urban air close to ground]: 6.20095e-8 kg; lognormal variance with pedigree 0.1627, pedigree (3,3,5,3,4)
  (same comment as for Sulfur dioxide)
- Phosphorus [water, surface water]: 9.99895e-6 kg; lognormal variance with pedigree 0.1801, pedigree (3,5,5,3,4)
  (same comment as for Methanol)
- COD, Chemical Oxygen Demand [water, surface water]: 0.000489949 kg; lognormal variance with pedigree 0.1801, pedigree (3,5,5,3,4)
  (same comment as for Methanol)
- Propane [air, urban air close to ground]: 6.20095e-7 kg; lognormal variance with pedigree 0.1627, pedigree (3,3,5,3,4)
  (same comment as for Sulfur dioxide)
- Phenol [water, surface water]: 9.99895e-6 kg; lognormal variance with pedigree 0.4401, pedigree (3,5,5,3,4)
  (same comment as for Methanol)
- TOC, Total Organic Carbon [water, surface water]: 0.000239975 kg; lognormal variance with pedigree 0.1801, pedigree (3,5,5,3,4)
  (same comment as for Methanol)
- Particulates, < 2.5 um [air, urban air close to ground]: 6.20095e-7 kg; lognormal variance with pedigree 0.4227, pedigree (3,3,5,3,4)
  (same comment as for Sulfur dioxide)
- Methanol [air, urban air close to ground]: 0.000529945 kg; lognormal variance with pedigree 0.0827, pedigree (2,4,5,3,1)
  Based on ecoinvent Guidelines
  Uncertainty: Based on ecoinvent Guidelines
- Pentane [air, urban air close to ground]: 3.72051e-6 kg; lognormal variance with pedigree 0.1627, pedigree (3,3,5,3,4)
  (same comment as for Sulfur dioxide)
- Formaldehyde [water, surface water]: 9.99895e-5 kg; lognormal variance with pedigree 0.4401, pedigree (3,5,5,3,4)
  (same comment as for Methanol)
- Benzene [air, urban air close to ground]: 1.24017e-6 kg; lognormal variance with pedigree 0.1627, pedigree (3,3,5,3,4)
  (same comment as for Sulfur dioxide)
- Suspended solids, unspecified [water, surface water]: 1.99979e-5 kg; lognormal variance with pedigree 0.1801, pedigree (3,5,5,3,4)
  (same comment as for Methanol)
- BOD5, Biological Oxygen Demand [water, surface water]: 0.000179981 kg; lognormal variance with pedigree 0.1801, pedigree (3,5,5,3,4)
  (same comment as for Methanol)
- AOX, Adsorbable Organic Halogen as Cl [water, surface water]: 9.99895e-7 kg; lognormal variance with pedigree 0.1801, pedigree (3,5,5,3,4)
  (same comment as for Methanol)
- DOC, Dissolved Organic Carbon [water, surface water]: 0.000239975 kg; lognormal variance with pedigree 0.1801, pedigree (3,5,5,3,4)
  (same comment as for Methanol)
- Acetic acid [air, urban air close to ground]: 4.65071e-7 kg; lognormal variance with pedigree 0.1627, pedigree (3,3,5,3,4)
  (same comment as for Sulfur dioxide)
- Toluene [air, urban air close to ground]: 6.20095e-7 kg; lognormal variance with pedigree 0.1627, pedigree (3,3,5,3,4)
  (same comment as for Sulfur dioxide)
- Nitrogen oxides [air, urban air close to ground]: 0.000205488 kg; lognormal variance with pedigree 0.1627, pedigree (3,3,5,3,4)
  (same comment as for Sulfur dioxide)
- Carbon monoxide, non-fossil [air, urban air close to ground]: 6.51102e-6 kg; lognormal variance with pedigree 0.7627, pedigree (3,3,5,3,4)
  (same comment as for Sulfur dioxide)
- Benzo(a)pyrene [air, urban air close to ground]: 3.10048e-11 kg; lognormal variance with pedigree 0.4227, pedigree (3,3,5,3,4)
  (same comment as for Sulfur dioxide)
- Acetaldehyde [air, urban air close to ground]: 3.10048e-9 kg; lognormal variance with pedigree 0.1627, pedigree (3,3,5,3,4)
  (same comment as for Sulfur dioxide)
- Butane [air, urban air close to ground]: 2.17037e-6 kg; lognormal variance with pedigree 0.1627, pedigree (3,3,5,3,4)
  (same comment as for Sulfur dioxide)
- Formaldehyde [air, urban air close to ground]: 3.10048e-7 kg; lognormal variance with pedigree 0.1627, pedigree (3,3,5,3,4)
  (same comment as for Sulfur dioxide)
- Dioxins, measured as 2,3,7,8-tetrachlorodibenzo-p-dioxin [air, urban air close to ground]: 0 kg; pedigree (1,1,1,1,1)
  (same comment as for Sulfur dioxide)
- Methane, non-fossil [air, urban air close to ground]: 6.20095e-6 kg; lognormal variance with pedigree 0.1627, pedigree (3,3,5,3,4)
  (same comment as for Sulfur dioxide)
- Mercury [air, urban air close to ground]: 9.30143e-11 kg; lognormal variance with pedigree 0.7627, pedigree (3,3,5,3,4)
  (same comment as for Sulfur dioxide)
- Carbon dioxide, non-fossil [air, urban air close to ground]: 2.76391 kg; lognormal variance with pedigree 0.1127, pedigree (3,3,5,3,4)
  Calculation, to close carbon balance
  Uncertainty: Calculation, to close carbon balance
- Dinitrogen monoxide [air, urban air close to ground]: 3.10048e-7 kg; lognormal variance with pedigree 0.1627, pedigree (3,3,5,3,4)
  (same comment as for Sulfur dioxide)

## Sampling procedure
Production assessed with mixed data from literature and the ecoinvent 'methanol from natural gas' process. Data is considered relatively weak, as there is no commercial experience of methanol from bio-syngas. Representativity of the data seems difficult to assess.

## Review by Niels Jungbluth 2006-07-12
Passed.
none
