# lignite briquettes production

Dataset: EcoSpold 2, unit process
Geography: DE
Time period: 1988-01-01 to 2019-12-31
Technology level: current
Classification: EcoSpold01Categories: lignite/fuels
Classification: ISIC rev.4 ecoinvent: 1920:Manufacture of refined petroleum products
Tags: ConvertedDataset
Scenario: Business-as-Usual
System model: Allocation at the point of substitution
Generated by: Christian Bauer
Published in: Röder, A. 2004
Database: ecoinvent
isCopyrightProtected: true
accessRestrictedTo: 1

## General comment
Low heating value is 19.5 MJ/kg. Bulk density is 730 kg/m3. No details on the production process are available. Emission data from drying and milling available from references. The emitted trace elements are proportional to the trace elements in the lignite. Losses from the prozess (0.5 %) are accounted as lignite ashes. The energy requirements are from an onsite mine-mouth lignite power plant.
[This dataset was already contained in the ecoinvent database version 2. It was not individually updated during the transfer to ecoinvent version 3. Life Cycle Impact Assessment results may still have changed, as they are affected by changes in the supply chain, i.e. in other datasets. This dataset was generated following the ecoinvent quality guidelines for version 2. It may have been subject to central changes described in the ecoinvent version 3 change report (http://www.ecoinvent.org/database/ecoinvent-version-3/reports-of-changes/), and the results of the central updates were reviewed extensively. The changes added e.g. consistent water flows and other information throughout the database. The documentation of this dataset can be found in the ecoinvent reports of version 2, which are still available via the ecoinvent website. The change report linked above covers all central changes that were made during the conversion process.]

## Included activities end
The water content of the lignite is reduced in driers from initial 60 % to 20 %. Production of briquettes and lignite dust follows.

## Geography
German conditions.

## Technology
Details not available.

## Reference product
- lignite briquettes: 1 MJ; By-product classification allocatable product; CPC 11040: Brown coal briquettes and similar solid fuels manufactured from brown coal
  EcoSpold01Location=DE
  production volume 0.242058 MJ
    This is a placeholder value that does not reflect real-world production volumes. This dataset does not currently require a real-world production volume to work in the database framework, and no actual data were collected yet. This has no negative effect on the results of the ecoinvent database. The placeholder value of this activity was scaled according to the nominal GDP of 2005 (source: United Nations, http://data.un.org/Glossary.aspx?q=GDP+%28current+US%24%29, accessed 20130726) to reflect an appropriate share of the global production volume, which is also a placeholder value.
  property price 0.00232 EUR2005
    Same prices as for 'lignite, burned in power plant' are assumed.
  property carbon content, fossil 0.65679
    53.2% C and 19% water in wet mass (ecoinvent v2.1 report 6_VI Table 7.1)
  property carbon content 0.65679
    carbon content on a dry matter basis (reserved; not for manual entry)
  property true value 0.00232
    allocation property applied in "true value" allocation // value calculated from revenue
  properties: dry mass 0.0415385 kg, wet mass 0.0512821 kg, water content 0.234568, carbon content, non-fossil 0, water in wet mass 0.00974359 kg, carbon allocation 0.0272821 kg

## By-products
- heat, for reuse in municipal waste incineration only: 0 MJ; CPC 17300: Steam and hot water; By-product classification allocatable product; pedigree (1,1,1,1,1)
  Net electricity generated from this waste and used in internal MSWI plant energy redistribution.
  Uncertainty: uncertainty is calculated from uncertainties in waste composition and uncertainties in energy efficiency and the uncertainty in internal energy demand
  production volume 2.88177e-10 MJ
  property exergy 0.1842 MJ; name E_th_prod_MSWI_exergy
    This exergy property is based on the exergy content of the product.
  property price 0.0106 EUR2005; name E_th_prod_MSWI_price_EUR2005
    Average European district heat price from Ecoheatcool and Euroheat 2005-2006, Ecoheat Work package 1: The European heat market. Final report. 10.6 EUR/GJ i s the price of district heat. http://www.solarthermalworld.org/files/Ecoheatcool%20WP1%20Web.pdf?download
  property true value relation 0.1842; name E_th_prod_MSWI_true_value_relation
    property to calculate "true value" from
  property true value 1.8956e-12
    allocation property applied in "true value" allocation // value calculated from true value relation
- electricity, for reuse in municipal waste incineration only: 0 kWh; CPC 17100: Electrical energy; By-product classification allocatable product; pedigree (1,1,1,1,1)
  (same comment as for heat, for reuse in municipal waste incineration only)
  production volume 4.05862e-11 kWh
  property true value relation 3.6; name E_el_prod_MSWI_true_value_relation
    property to calculate "true value" from
  property price 0.1 EUR2005; name E_el_prod_MSWI_price_EUR2005
    Estimated to be the same price as in case of electricity, medium voltage.
  property exergy 3.6 MJ; name E_el_prod_MSWI_exergy
    This exergy property is based on the exergy content of the product.
  property true value 5.2177e-12
    (same comment as for heat, for reuse in municipal waste incineration only)

## Inputs from technosphere
- electricity, high voltage: 0.0253 kWh; lognormal variance with pedigree 0.34, pedigree (1,1,5,1,1)
  EcoSpold01Location=DE
  own assumption
- lignite briquettes factory: 8.55e-13 unit; lognormal variance with pedigree 0.08, pedigree (1,1,5,1,1)
  EcoSpold01Location=RER
  own assumption
- lignite: 0.111 kg; lognormal variance with pedigree 0.04, pedigree (1,1,5,1,1)
  EcoSpold01Location=RER
  standard for ressources
  properties: carbon content, fossil 0.655, water content 1.38095, wet mass 1 kg, dry mass 0.42 kg
  note on carbon content, fossil: C content of dry lignite is 58-73% (specified in Tab 1.1, report 6, part VI). A mean content of 0.655 kg C/kg dry lignite was considered.
- lignite ash: -0.0005 kg; lognormal variance with pedigree 0.05, pedigree (1,1,5,1,1)
  own assumption
  EcoSpold01Location=DE
  production volume 0.0005 kg
    Calculated from the production volume of lignite briquettes in proportion to the respective output amounts.
  properties: wet mass 1 kg, dry mass 1 kg

## Emissions to nature
- Barium [air, non-urban air or from high stacks]: 2e-10 kg; lognormal variance with pedigree 0.69, pedigree (1,1,5,1,1)
  own assumption
- Scandium [air, non-urban air or from high stacks]: 1e-12 kg; lognormal variance with pedigree 0.69, pedigree (1,1,5,1,1)
  own assumption
- Thorium [air, non-urban air or from high stacks]: 3.2e-12 kg; lognormal variance with pedigree 0.69, pedigree (1,1,5,1,1)
  own assumption
- Lead [air, non-urban air or from high stacks]: 1e-11 kg; lognormal variance with pedigree 0.08, pedigree (1,1,5,1,1)
  own assumption
- Manganese [air, non-urban air or from high stacks]: 4.1e-11 kg; lognormal variance with pedigree 0.69, pedigree (1,1,5,1,1)
  own assumption
- Particulates, > 2.5 um, and < 10um [air, non-urban air or from high stacks]: 3.2e-6 kg; lognormal variance with pedigree 0.34, pedigree (1,1,5,1,1)
  own assumption
- Uranium [air, non-urban air or from high stacks]: 2e-12 kg; lognormal variance with pedigree 0.69, pedigree (1,1,5,1,1)
  own assumption
- Beryllium [air, non-urban air or from high stacks]: 8.1e-12 kg; lognormal variance with pedigree 0.69, pedigree (1,1,5,1,1)
  own assumption
- Potassium [air, non-urban air or from high stacks]: 1.2e-9 kg; lognormal variance with pedigree 0.69, pedigree (1,1,5,1,1)
  own assumption
- Iron [air, non-urban air or from high stacks]: 1.1e-8 kg; lognormal variance with pedigree 0.69, pedigree (1,1,5,1,1)
  own assumption
- Particulates, < 2.5 um [air, non-urban air or from high stacks]: 5.3e-6 kg; lognormal variance with pedigree 0.34, pedigree (1,1,5,1,1)
  own assumption
- Boron [air, non-urban air or from high stacks]: 2.4e-9 kg; lognormal variance with pedigree 0.69, pedigree (1,1,5,1,1)
  own assumption
- Selenium [air, non-urban air or from high stacks]: 4.1e-12 kg; lognormal variance with pedigree 0.69, pedigree (1,1,5,1,1)
  own assumption
- Phosphorus [air, non-urban air or from high stacks]: 8.1e-11 kg; lognormal variance with pedigree 0.69, pedigree (1,1,5,1,1)
  own assumption
- Zinc [air, non-urban air or from high stacks]: 5.7e-11 kg; lognormal variance with pedigree 0.69, pedigree (1,1,5,1,1)
  own assumption
- Tin [air, non-urban air or from high stacks]: 3.2e-12 kg; lognormal variance with pedigree 0.69, pedigree (1,1,5,1,1)
  own assumption
- Magnesium [air, non-urban air or from high stacks]: 6.1e-9 kg; lognormal variance with pedigree 0.69, pedigree (1,1,5,1,1)
  own assumption
- Antimony [air, non-urban air or from high stacks]: 3.2e-11 kg; lognormal variance with pedigree 0.69, pedigree (1,1,5,1,1)
  own assumption
- Titanium [air, non-urban air or from high stacks]: 2e-10 kg; lognormal variance with pedigree 0.69, pedigree (1,1,5,1,1)
  own assumption
- Iodine [air, non-urban air or from high stacks]: 4.1e-12 kg; lognormal variance with pedigree 0.69, pedigree (1,1,5,1,1)
  own assumption
- Chromium [air, non-urban air or from high stacks]: 2.8e-11 kg; lognormal variance with pedigree 0.69, pedigree (1,1,5,1,1)
  own assumption
- Zirconium [air, non-urban air or from high stacks]: 1.7e-10 kg; lognormal variance with pedigree 0.69, pedigree (1,1,5,1,1)
  own assumption
- Cadmium [air, non-urban air or from high stacks]: 1.2e-12 kg; lognormal variance with pedigree 0.08, pedigree (1,1,5,1,1)
  own assumption
- Particulates, > 10 um [air, non-urban air or from high stacks]: 1.5e-6 kg; lognormal variance with pedigree 0.34, pedigree (1,1,5,1,1)
  own assumption
- Cobalt [air, non-urban air or from high stacks]: 3e-11 kg; lognormal variance with pedigree 0.69, pedigree (1,1,5,1,1)
  own assumption
- Calcium [air, non-urban air or from high stacks]: 4.1e-8 kg; lognormal variance with pedigree 0.69, pedigree (1,1,5,1,1)
  own assumption
- Arsenic [air, non-urban air or from high stacks]: 1e-11 kg; lognormal variance with pedigree 0.08, pedigree (1,1,5,1,1)
  own assumption
- Sodium [air, non-urban air or from high stacks]: 1.8e-9 kg; lognormal variance with pedigree 0.69, pedigree (1,1,5,1,1)
  own assumption
- Vanadium [air, non-urban air or from high stacks]: 7.1e-11 kg; lognormal variance with pedigree 0.69, pedigree (1,1,5,1,1)
  own assumption
- Silicon [air, non-urban air or from high stacks]: 9.7e-8 kg; lognormal variance with pedigree 0.69, pedigree (1,1,5,1,1)
  own assumption
- Nickel [air, non-urban air or from high stacks]: 3e-11 kg; lognormal variance with pedigree 0.69, pedigree (1,1,5,1,1)
  own assumption
- Aluminium [air, non-urban air or from high stacks]: 9.5e-9 kg; lognormal variance with pedigree 0.69, pedigree (1,1,5,1,1)
  own assumption
- Copper [air, non-urban air or from high stacks]: 1.2e-11 kg; lognormal variance with pedigree 0.69, pedigree (1,1,5,1,1)
  own assumption
- Bromine [air, non-urban air or from high stacks]: 3.2e-11 kg; lognormal variance with pedigree 0.69, pedigree (1,1,5,1,1)
  own assumption
- Molybdenum [air, non-urban air or from high stacks]: 1.4e-11 kg; lognormal variance with pedigree 0.69, pedigree (1,1,5,1,1)
  own assumption
- Strontium [air, non-urban air or from high stacks]: 1.4e-10 kg; lognormal variance with pedigree 0.69, pedigree (1,1,5,1,1)
  own assumption
- Mercury [air, non-urban air or from high stacks]: 2e-13 kg; lognormal variance with pedigree 0.34, pedigree (1,1,5,1,1)
  own assumption

## Sampling procedure
literature

## Extrapolations
see Geography/Text

## Review by Christian Bauer 2004-04-02
Corrected for v1.1
