# photovoltaic mounting system production, for slanted-roof installation

Dataset: EcoSpold 2, unit process
Geography: RoW
Time period: 1992-01-01 to 2019-12-31
Technology level: current
Classification: ISIC rev.4 ecoinvent: 4220a: Construction of utility projects for electricity production, except for liquid fuels
Tags: photovoltaic power; infrastructure
Scenario: Business-as-Usual
System model: Allocation at the point of substitution
Generated by: [System]
Published in: Jungbluth N. 2012
Database: ecoinvent
isCopyrightProtected: true
accessRestrictedTo: 1

## General comment
This dataset represents the production of the structural components necessary for the mounting of 1 m2 photovoltaic panel on a slanted roof. This is a common and simple type of mounting system. It is necessary to have a faultless roof. The mounting system uses wood, aluminium or steel that is directly attached to the rafter of the roof. Good ventilation is ensured with a distance of about 10 cm from the roof surface. Thus efficiency losses due to higher temperatures are minimised.
Source of the image: Jungbluth et al. 2012, p. 92

## Included activities start
From delivery of the needed materials and parts.

## Included activities end
This activity ends with the installed mounting structure.

This dataset includes
- Materials and packaging for the production
- Energy use for the metal processing.

This dataset doesn't include the energy use for the mounting process itself. This must be included in data for the PV-plant, where all necessary components (panel/laminate, mounting structure, inverter etc.) are assembled and mounted on the building.

## Time period
The calculation of the annual production volume of the reference product is based on data from 2008. It does not represent an average of the time period 1992-2008.

## Parameters
- share open ground installations, multi-Si, on open ground, total: 0.351918; name pv_openground_total; lognormal variance with pedigree 0.1782, pedigree (4,5,2,5,5)
  Literature value, calculated value. The shares of the different types of cells and mounting systems are taken from Jungbluth N. et al. (2012)and adapted for GLO for open ground PV plants. According to IEA (2009), there were 35.19% grid-connected centralized PV power plants globally. It is assumed that all centralized PV power plants are open ground plants.
  Sources:
  - Jungbluth N., Stucki M., Flury K., Frischknecht R. and Buesser S. (2012) Life Cycle Inventories of Photovoltaic Power Production. ESU-services Ltd., Uster, CH, retrieved from: www.esu-services.ch/data/public-lci-reports/ <http://www.esu-services.ch/data/public-lci-reports
  - IEA. 2009. Trends in Photovoltaic Applications:Survey report of selected IEA countries between1992 and 2008. International Energy Agency (IEA), Report IEA-PVPS T1-18:2009, Paris Cedex (FR)
- amount of panel needed per kWp installed capacity: 7.7914 m2; name panel_area_per_kWp; = (0.345*21.4+0.525*22.1+0.03*24+0.047*46.5+0.048*27.7+0.006*25.6)/3; lognormal variance with pedigree 0.012, pedigree (3,3,2,4,3)
  Literature value/calculated value. Weighted average of values for the different cell types given in Tab. 12.3 in Jungbluth et al. 2012. Weighting factor taken from Tab. 14.6.
- Installed capacity: 5490 MW; name capacity_installed; lognormal variance with pedigree 0.0962, pedigree (4,2,5,3,3)
  Literature value. New installed capacity of photovoltaic power in 2008. Valid for grid-connected new capacity. [IEA. 2009. Trends in Photovoltaic Applications:Survey report of selected IEA countries between1992 and 2008. International Energy Agency (IEA), Report IEA-PVPS T1-18:2009, Paris Cedex (FR)]
  Uncertainty: 1) This value is valid for 2008 and gives not any average over the time span 1992-2008.
  2) The given value for new installed grid-connected capacity in 2008 is too low, which is considered in the uncertainty.
  Investigations for the year 2009 showed the following figures:
  - Total installed capacity in 2009 (on- and offgrid or not specified in the sources): 14560MWp GLO, out of it 7450MWp installed in 2009.
  Source: Data from 30 countries (AU,AT, BE, CA, CN, CZ, DK, FI, FR, DE, GR, HU, IN, IT, JP, LU, MY, MX, NL, PT, SI, ZA, KR, ES, SE, CH, TW, TH, GB, US) and 4 sources: [1] [IEA, 2010. Trends in Photovoltaic Applications:Survey report of selected IEA countries between1992 and 2009. International Energy Agency, Report IEA-PVPS T1-19:2010]; [2] [Eurobserver, 2010. Photovoltaic barometer. Systèmes Solaires - le journal du photovoltaïque; Baromètre Photovoltaïque - Eurobserver Nr.3, avril 2010. ]; [3] [Eurobserver, 2011. Photovoltaic barometer. Systèmes Solaires - le journal du photovoltaïque; Baromètre Photovoltaïque - Eurobserver Nr.5, avril 2011.]; [4] [EPIA.Global Market Outlook for Photovoltaics until 2015. European Photovoltaic Industry Association.]
  - Total installed new capacity in 2009, total: 6188 MW (21 countries) [IEA. 2010. Trends in Photovoltaic Applications:Survey report of selected IEA countries between1992 and 2009. International Energy Agency (IEA), Report IEA-PVPS T1-19:2010, Paris Cedex (FR)]
  - New on-grid capacity in 2009: 6113 MW (21 countries) [IEA. 2010. Trends in Photovoltaic Applications:Survey report of selected IEA countries between1992 and 2009. International Energy Agency (IEA), Report IEA-PVPS T1-19:2010, Paris Cedex (FR)]
  This gives a factor of 7447/6188=1.2 between the sources.
- capacity: 0.003 MW; lognormal variance with pedigree 0.0006, pedigree (1,1,1,1,1)
- share of slanted roof installations, panel, mounted, on roof: 0.65 dimensionless; name share_slantedroof_panel; lognormal variance with pedigree 0.0208, pedigree (4,4,2,5,3)
  Literature value. Tab. 14.7, p. 146 in Jungbluth et al. 2012. Shares from european conditions taken for this global dataset.

## Reference product
- photovoltaic mounting system, for slanted-roof installation: 1 m2; By-product classification allocatable product; CPC 87360: Installation services of electrical machinery and apparatus n.e.c.
  EcoSpold01Location=RER
  production volume 1.80032e7 m2; name apv_slantedroof_panel; = (capacity_installed*1000)* (1- pv_openground_total)* share_slantedroof_panel* panel_area_per_kWp
    Calculated value.
    It is assumed that this value ist the same as the number of installed 3kWp plants of this type. Data on new installed capacity of 3kWp PV plants are valid for 2008.
  property price 5.27681 EUR2005
    Calculated based on inputs: The price of the product has been calculated as a sum of the values of the material and energy inputs for this product. This value is therefore a rough estimation. It may underestimate the real price since there are additional expenses when producing any product. These expences can include for example labour costs, treatment of waste materials and profit for the producer. Please consider carefully whether this level of data quality is acceptable for your application.
  property true value 5.27681
    allocation property applied in "true value" allocation // value calculated from revenue

## By-products
- waste paperboard, sorted: 0 kg; CPC 39240: Waste and scrap of paper or paperboard; By-product classification Recyclable; pedigree (1,1,1,1,1)
  It is assumed that 86.3% (wet weight) of waste paperboard, unsorted is segregated to waste paperboard, sorted. Waste paper, sorted is later used in recycling industry where maximum 79% of it, is transformed into new paperboard.
  production volume 2.07136e6 kg
  property price 0.0436 EUR2005; name ByP_waste_paperboard_sorted_price_EUR200
    Estimated value; three different sources were used to determine the price for waste paperboard, sorted. 35 AUD/tonne (http://larimer.org/solidwaste/charts/Current.htm, accessed 20130328), 70 GBP/tonne (http://www.letsrecycle.com/prices/waste%20paper, accessed 20130328) and 20 USD/tonne (http://www.oxpaperboard.com/1/post/2013/03/ox-paperboard-announces-price-adjustment-to-uncoated-recycled-paperboard.html, accessed 20130328).
  property water content 0.243781; = WWM_waste_paperboard_sorted/ DM_waste_paperboard_sorted
  property water in wet mass 0.196 kg; name WWM_waste_paperboard_sorted; = WM_waste_paperboard_sorted- DM_waste_paperboard_sorted
  property dry mass 0.804 kg; name DM_waste_paperboard_sorted
  property wet mass 1 kg; name WM_waste_paperboard_sorted
  property carbon content 0.483259
    carbon content on a dry matter basis (reserved; not for manual entry)
  property true value 0.0050164
    allocation property applied in "true value" allocation // value calculated from revenue
  properties: carbon content, non-fossil 0.483259, carbon content, fossil 0, carbon allocation 0.38854 kg
- electricity, for reuse in municipal waste incineration only: 0 kWh; CPC 17100: Electrical energy; By-product classification allocatable product; pedigree (1,1,1,1,1)
  Net electricity generated from this waste and used in internal MSWI plant energy redistribution.
  Uncertainty: uncertainty is calculated from uncertainties in waste composition and uncertainties in energy efficiency and the uncertainty in internal energy demand
  production volume 571618 kWh
  property true value relation 3.6; name E_el_prod_MSWI_true_value_relation
    property to calculate "true value" from
  property exergy 3.6 MJ; name E_el_prod_MSWI_exergy
    This exergy property is based on the exergy content of the product.
  property price 0.1 EUR2005; name E_el_prod_MSWI_price_EUR2005
    Estimated to be the same price as in case of electricity, medium voltage.
  property true value 0.00406571
    allocation property applied in "true value" allocation // value calculated from true value relation
- heat, for reuse in municipal waste incineration only: 0 MJ; CPC 17300: Steam and hot water; By-product classification allocatable product; pedigree (1,1,1,1,1)
  Net useful heat generated from this waste and used in internal MSWI plant energy redistribution.
  Uncertainty: uncertainty is calculated from uncertainties in waste composition and uncertainties in energy efficiency and the uncertainty in internal energy demand
  production volume 3.97617e6 MJ
  property true value relation 0.1842; name E_th_prod_MSWI_true_value_relation
    property to calculate "true value" from
  property exergy 0.1842 MJ; name E_th_prod_MSWI_exergy
    This exergy property is based on the exergy content of the product.
  property price 0.0106 EUR2005; name E_th_prod_MSWI_price_EUR2005
    Average European district heat price from Ecoheatcool and Euroheat 2005-2006, Ecoheat Work package 1: The European heat market. Final report. 10.6 EUR/GJ i s the price of district heat. http://www.solarthermalworld.org/files/Ecoheatcool%20WP1%20Web.pdf?download
  property true value 0.00144705
    (same comment as for electricity, for reuse in municipal waste incineration only)
- zinc concentrate: 0 kg; CPC 14290: Other non-ferrous metal ores and concentrates (other than uranium or thorium ores and concentrates); By-product classification allocatable product
  Calculated value from the knowledge of the properties of both products.
  production volume 0.320937 kg
  property price 0.38 EUR2005; name ByP_price_EUR2005
    Temporary price data. Calculated as 90% of purchasers price based on: Zinc content in concentrate 53%. Concentrate price per kg Zn 86.5% of refined Zn price (13.5% treatment charges according to CHR Metals Limited 2005: Dynamic cost curves. http://www.minecost.com/dynamic.pdf). 2004 zinc price from USGS (2007) Mineral commodity summaries 2007. <http://minerals.usgs.gov/minerals/pubs/mcs/2007/mcs2007.pdf> [Accessed 25 May 2010]
  property zinc content 0.53; name zinc_C_zinc_concentrate
    Zinc content on a dry matter basis. Value taken from teh "zinc mine operation" /GLO dataset.
  property dry mass 1 kg; name DM_zinc_concentrate
  property carbon content 0
    carbon content on a dry matter basis (reserved; not for manual entry)
  property true value 6.77412e-9
    allocation property applied in "true value" allocation // value calculated from revenue
  properties: wet mass 1 kg, water content 0, carbon content, non-fossil 0, carbon content, fossil 0, water in wet mass 0 kg, carbon allocation 0 kg
- iron scrap, unsorted: 0 kg; source European Aluminium Association 2008; CPC 39310: Slag, dross, scalings and other waste from the manufacture of iron or steel; By-product classification Recyclable; pedigree (1,1,1,1,1)
  production volume 17914.7 kg
  property price 0.149 EUR2005; name ironScrapAmount_price_EUR2005
    Temporary price data. Calculated as 90% of purchasers price based on: estimated at 85% of sorted scrap
  property carbon content 0
    carbon content on a dry matter basis (reserved; not for manual entry)
  property true value 0.000148138
    allocation property applied in "true value" allocation // value calculated from revenue
  properties: water in wet mass 0 kg, water content 0, carbon content, fossil 0, carbon content, non-fossil 0, dry mass 1 kg, wet mass 1 kg, carbon allocation 0 kg
- aluminium oxide, non-metallurgical: 0 kg; source European Aluminium Association 2008; CPC 41432: Alumina (aluminium oxide), except artificial corundum; By-product classification allocatable product; CAS 1344-28-1; pedigree (1,1,1,1,1)
  production volume 1.12731e6 kg
  property carbon content, non-fossil 0; name C_content_non_fossil
  property price 0.28 EUR2005; name Al2O3Amount_price_EUR2005
    From UN trade database. http://data.un.org/ Import data from the largest economies of the world are used (Brazil, India, USA, China, Japan and EU-27).
  property dry mass 1 kg; name DM
  property water content 0; name water_content
  property wet mass 1 kg; name WM
  property water in wet mass 0 kg; name WWM
  property carbon content, fossil 0; name C_content_fossil
  property carbon content 0
    carbon content on a dry matter basis (reserved; not for manual entry)
  property true value 0.0175174
    allocation property applied in "true value" allocation // value calculated from revenue
  properties: carbon allocation 0 kg
- aluminium, cast alloy: 0 kg; source European Aluminium Association 2008; By-product classification allocatable product; CPC 41431: Unwrought aluminium; pedigree (1,1,1,1,1)
  EcoSpold01Location=RER
  production volume 1.05378e7 kg
  property price 1.3 EUR2005; name castAlloyAmount_price_EUR2005
    Temporary price data. Calculated as 90% of purchasers price based on: Source: London Metal Exchange, Aluminium alloy price for 2005
  property carbon content 0
    carbon content on a dry matter basis (reserved; not for manual entry)
  property true value 0.760261
    allocation property applied in "true value" allocation // value calculated from revenue
  properties: water in wet mass 0 kg, carbon content, non-fossil 0, water content 0, dry mass 1 kg, carbon content, fossil 0, wet mass 1 kg, carbon allocation 0 kg
- aluminium, wrought alloy: 0 kg; source European Aluminium Association 2008; By-product classification allocatable product; CPC 4153: Semi-finished products of aluminium or aluminium alloys; pedigree (1,1,1,1,1)
  production volume 4.61326e6 kg
  property price 1.44 EUR2005; name secondaryAluminiumOutput_price_EUR2005
  properties: wet mass 1 kg, water content 0, carbon content, fossil 0, water in wet mass 0 kg, carbon content, non-fossil 0, dry mass 1 kg, carbon content 0, carbon allocation 0 kg, true value 0.368671

## Inputs from technosphere
- waste paperboard, unsorted: -0.109343 kg; name waste_cardboard; = (cardboard)*-1; lognormal variance with pedigree 0.204, pedigree (3,4,5,5,3)
  EcoSpold01Location=CH
  Calculated value
  Uncertainty: Calculated with use
  production volume 2.40019e6 kg; = waste_cardboard* apv_slantedroof_panel
    Calculated from the production volume of photovoltaic slanted-roof construction, mounted, on roof in proportion to the respective output amounts.
  property price 0.03924 EUR2005; name waste_cardboard_price_EUR2005
  properties: water content 0.243781, carbon content, non-fossil 0.483259, dry mass 0.804 kg, wet mass 1 kg
  note on carbon content, non-fossil: C content was calculated for 1 kg DM, using data in Tab A.3, ecoinvent v2.2 report 13_I.
- polystyrene, high impact: 0.00575477 kg; name polystyrene; source Schwarz U. 1992, p. Tab. 11.3, p. 93; lognormal variance with pedigree 0.204, pedigree (3,4,5,5,3)
  Literature value. Packaging material, considered from Schwarz&Keller 1992 with a correction factor (see Jungbluth et al. 2012, p.91 and p.127). Table references to Jungbluth et al. 2012.
  EcoSpold01Location=RER
  properties: carbon content, fossil 0.923077, wet mass 1 kg, dry mass 1 kg
  note on carbon content, fossil: Chemical formula of polystyrene is (C8H8)n (ecoinvent v2.2 report 11_II)
- scrap aluminium: -2.32554 kg; name scrap_aluminium; = (aluminium_wrought)*-1
  Calculated value
  production volume 5.1093e7 kg; = scrap_aluminium* apv_slantedroof_panel
    Calculated from production volume of reference product using the relative outputs.
  property lifetime 30 year; name lifetime
  property price 0 EUR2005; name scrap_aluminium_price_EUR2005
  properties: wet mass 1 kg, dry mass 1 kg
- corrugated board box: 0 kg; name cardboard; source Schwarz U. 1992, p. Tab. 11.3, p. 93; pedigree (1,1,1,1,1)
  EcoSpold01Location=RER
  Literature value. Packaging material, considered from Schwarz&Keller 1992 with a correction factor. Table references to Jungbluth et al. 2012.
  properties: wet mass 1 kg, carbon content, non-fossil 0.432275, water content 0.0582011, carbon content, fossil 0.000656085, dry mass 0.945 kg
  note on carbon content, non-fossil: Biogenic C content was calculated after biogenic C contents of chemicals used in the production of board (Tab 10.15 & 10.16, ecoinvent v2.2 report 11_III, part 10).
  note on carbon content, fossil: Fossil C content was calculated after fossil C contents of chemicals used in the production of board (Tab 10-15 & 10.16 ecoinvent v2.2 report 11_III, part 10)
- sheet rolling, steel: 1.23015 kg; = steel_low_hot; lognormal variance with pedigree 0.204, pedigree (3,4,5,5,3)
  EcoSpold01Location=RER
  Calculated value
  Uncertainty: Estimation
- waste polystyrene isolation, flame-retardant: -0.00575477 kg; name waste_polystyrene; = (polystyrene)*-1; lognormal variance with pedigree 0.204, pedigree (3,4,5,5,3)
  Calculated value
  EcoSpold01Location=CH
  Uncertainty: Disposal of plastics parts at end of life
  production volume 126323 kg; = waste_polystyrene* apv_slantedroof_panel
    (same comment as for waste paperboard, unsorted)
  property price 0 EUR2005; name waste_polystyrene_price_EUR2005
  properties: carbon content, fossil 0.918145, wet mass 1 kg, dry mass 0.998012 kg, water content 0.00199232
  note on carbon content, fossil: Polystyrene isolation (EPS) is flame-retarded with hexa-bromo-cyclo-dodecan (C12H18Br6) and contains 0.67 w% bromine (ecoinvent v2.2 report 13_I, pg 39). The rest is polystyrene: (C8H8)n.
- polyethylene, high density, granulate: 0.00115092 kg; name hdpe; lognormal variance with pedigree 0.1401, pedigree (1,2,4,5,1)
  Literature value. Packaging material, considered from Schwarz&Keller 1992 with a correction factor. Table references to Jungbluth et al. 2012.
  EcoSpold01Location=RER
  properties: wet mass 1 kg, carbon content, fossil 0.857143, dry mass 1 kg
  note on carbon content, fossil: Polyethylene is formed out of a huge amount of ethylene monomers (C2H4) (ecoinvent v2.2 report 11_II). MW=28 g/mol
- scrap steel: -1.23015 kg; name scrap_steel; = (steel_low_hot)*-1
  Calculated value
  production volume 2.70267e7 kg; = scrap_steel* apv_slantedroof_panel
    Calculated from production volume of reference product using the relative outputs.
  property price 0 EUR2005; name scrap_steel_price_EUR2005
  properties: lifetime 30 year, wet mass 1 kg, dry mass 1 kg
- steel, low-alloyed, hot rolled: 1.23015 kg; name steel_low_hot; lognormal variance with pedigree 0.1401, pedigree (1,2,4,5,1)
  EcoSpold01Location=RER
  Literature and personal communications. Rounded values in the reference table.
  properties: wet mass 1 kg, dry mass 1 kg, carbon content, fossil 0.005
  note on carbon content, fossil: Low alloyed steel composition given in Tab. 3.2 ecoinvent v2.2 report 10_partII. Steel assumed to have a C content of 0.5%
- waste polyethylene/polypropylene product: -0.00115092 kg; name waste_polyethy; = (hdpe)*-1; lognormal variance with pedigree 0.204, pedigree (3,4,5,5,3)
  (same comment as for waste polystyrene isolation, flame-retardant)
  production volume 25263.9 kg; = waste_polyethy* apv_slantedroof_panel
    (same comment as for waste paperboard, unsorted)
  property price 0 EUR2005; name waste_polyethy_price_EUR2005
  properties: dry mass 0.847 kg, carbon content, fossil 0.748045, wet mass 1 kg, water content 0.180638
  note on carbon content, fossil: Mixed various plastics was used to estimate the C content of this waste (Tab A.2, ecoinvent v2.2 report 13_I)
- aluminium, wrought alloy: 2.32554 kg; name aluminium_wrought; source Siemer J. 2008, p. Tab. 11.2, p. 93; lognormal variance with pedigree 0.1401, pedigree (1,2,4,5,1)
  Literature and own estimations. The amount of aluminium used for the system is estimated based on recent information from producers and the actual average weight of such sys-tems according to Siemer (2008) with 2.8 kg/m2. Rounded values in the table in Jungbluth et al. 2012.
  EcoSpold01Location=RER
  properties: dry mass 1 kg, wet mass 1 kg
- section bar extrusion, aluminium: 2.32554 kg; = aluminium_wrought; lognormal variance with pedigree 0.204, pedigree (3,4,5,5,3)
  Calculated value
  EcoSpold01Location=RER
  Uncertainty: Estimation
- corrugated board box: 0.00127211, 0.108071 kg (2 entries); source Schwarz U. 1992, p. Tab. 11.3, p. 93; lognormal variance with pedigree 0.204, pedigree (3,4,5,5,3)
  (same comment as for corrugated board box)

## Sampling procedure
Detailed analysis of materials for one product in a diploma thesis.

## Extrapolations
This type of mounting system is described by only one possible example. A market survey for mounting systems has been published by Siemer (2003; 2006; 2007; 2008). In this survey the total weight of several dozen of different mounting systems is reported without providing more detailed information on the type of materials used. In order to achieve an average weight for this type of mounting system, the weights of the different mounting system models were weighted by their installed capacity in Europe.

The different types of mounting systems were described in a handbook for tilers <Prinz et al. 1992>. The examples for slanted roof and façade plants have been investigated for singlecrystalline cells. The average consumption of packaging material for the finished PV plants is calculated with a correction factor from this old information, which accounts for the average weight of 1992-2008 installations (for further information see p.91 and p.127 in Jungbluth et al. 2012)

This dataset has been copied from an original dataset covering the geography RER. The uncertainty has been adjusted accordingly.
The calculation of the annual production volume of the reference product is based on data from 2008.

Sources:
- Siemer J. (2003) Für jedes Dach den passenden Deckel. In: Photon, Vol. 2003, retrieved from: www.photon.de
- Siemer J. (2006) Arbeit an der Schnittstelle. In: Photon, Vol. 2006, retrieved from: www.photon.de.
- Siemer J. (2007) Konkurrenz belebt das Geschäft. In: Photon, Vol. 2007, re-trieved from: www.photon.de.
- Siemer J. (2008) Debütantenball - Marktübersicht Montagesysteme 2008. In: Photon, Vol. 2008, retrieved from: www.photon.de.
- H. Prinz, M. Real, W. Müller et al. „Photovoltaics für Dachdecker - Grundlagen, Systemübersicht and Ausführung“, (Vernehmlassungsausgabe 20. 11.1992), Bundesamt für Konjunkturfragen, (BfK) Programm „PACER“

## Review by Christian Bauer 2009-02-15
Passed.
none

## Review by Carl Vadenbo 2012-03-22
The dataset were found to meet the quality guidelines for the ecoinvent database on 2012.04.10.

Improvements in the following areas/aspects are recommended for future revisions in order to strenghen the overall quality of the dataset:
-material losses during manufacturing.

## Review by Bo Weidema 2012-03-22
This dataset has only been reviewed by two editors.
