# inverter production, 2.5kW

Dataset: EcoSpold 2, unit process
Geography: RoW
Time period: 2004-01-01 to 2019-12-31
Technology level: current
Classification: EcoSpold01Categories: photovoltaic/production of components
Classification: ISIC rev.4 ecoinvent: 2790:Manufacture of other electrical equipment
Synonyms: inverse rectifier
Tags: ConvertedDataset
Scenario: Business-as-Usual
System model: Allocation at the point of substitution
Generated by: Matthias Tuchschmid (obsolete)
Published in: Jungbluth, N. 2007
Database: ecoinvent
isCopyrightProtected: true
accessRestrictedTo: 1

## General comment
Production of an inverter (2500W) with an efficiency of 93.5% (total efficiency factor which includes MPP-Tracking) for photovoltaic plant. Total weight about 18.5 kg.
[This dataset was already contained in the ecoinvent database version 2. It was not individually updated during the transfer to ecoinvent version 3. Life Cycle Impact Assessment results may still have changed, as they are affected by changes in the supply chain, i.e. in other datasets. This dataset was generated following the ecoinvent quality guidelines for version 2. It may have been subject to central changes described in the ecoinvent version 3 change report (http://www.ecoinvent.org/database/ecoinvent-version-3/reports-of-changes/), and the results of the central updates were reviewed extensively. The changes added e.g. consistent water flows and other information throughout the database. The documentation of this dataset can be found in the ecoinvent reports of version 2, which are still available via the ecoinvent website. The change report linked above covers all central changes that were made during the conversion process.]

## Included activities end
Materials, packaging and electricity use for the production of an inverse rectifier. Disposal of the product after use.

## Geography
Production in RER.

## Technology
Inverter for a photovoltaic grid-connected system with a capacity of 2.5kWp.

## Reference product
- inverter, 2.5kW: 1 unit; By-product classification allocatable product; CPC 4717: Parts for the goods of classes 4711, 4712 and 4714 to 4716
  EcoSpold01Location=RER
  production volume 2.67763 unit
    This is a placeholder value that does not reflect real-world production volumes. This dataset does not currently require a real-world production volume to work in the database framework, and no actual data were collected yet. This has no negative effect on the results of the ecoinvent database.
  property price 116.897 EUR2005
    Calculated based on inputs: The price of the product has been calculated as a sum of the values of the material and energy inputs for this product. This value is therefore a rough estimation. It may underestimate the real price since there are additional expenses when producing any product. These expences can include for example labour costs, treatment of waste materials and profit for the producer. Please consider carefully whether this level of data quality is acceptable for your application.
  property true value 116.897
    allocation property applied in "true value" allocation // value calculated from revenue

## By-products
- lead: 0 kg; CPC 41441: Lead, unwrought; By-product classification allocatable product
  EcoSpold01Location=SE
  production volume 0.0817468 kg
  property price 0.744 EUR2005
    Temporary price data. Calculated as 90% of purchasers price based on: Source: ecoinvent v2 report 10-part IX, Tab 5.10 & 2.5
  property carbon content 0
    carbon content on a dry matter basis (reserved; not for manual entry)
  property true value 0.0202732
    allocation property applied in "true value" allocation // value calculated from revenue
  properties: wet mass 1 kg, water content 0, carbon content, non-fossil 0, carbon content, fossil 0, dry mass 1 kg, water in wet mass 0 kg, carbon allocation 0 kg
- copper: 0 kg; By-product classification allocatable product; CPC 41413: Refined copper and copper alloys, unwrought; master alloys of copper
  EcoSpold01Location=SE
  production volume 1.21098 kg
  properties: water content 0, water in wet mass 0 kg, carbon content, fossil 0, carbon content, non-fossil 0, dry mass 1 kg, wet mass 1 kg, price 5.52 EUR2005, carbon content 0, carbon allocation 0 kg, true value 2.2282
- nickel, 99.5%: 0 kg; CPC 41422: Unwrought nickel; By-product classification allocatable product
  EcoSpold01Location=SE
  production volume 0.170644 kg
  property price 10.4 EUR2005
    Temporary price data. Calculated as 90% of purchasers price based on: 2004 nickel price from USGS (2007) Mineral commodity summaries 2007. <http://minerals.usgs.gov/minerals/pubs/mcs/2007/mcs2007.pdf> [Accessed 25 May 2010]
  property carbon content 0
    carbon content on a dry matter basis (reserved; not for manual entry)
  property true value 0.591567
    allocation property applied in "true value" allocation // value calculated from revenue
  properties: water in wet mass 0 kg, wet mass 1 kg, carbon content, non-fossil 0, dry mass 1 kg, water content 0, carbon content, fossil 0, carbon allocation 0 kg
- silver: 0 kg; CPC 41310: Silver (including silver plated with gold or platinum), unwrought or in semi-manufactured forms, or in powder […]; By-product classification allocatable product; CAS 7440-22-4
  EcoSpold01Location=SE
  production volume 0.0281802 kg
  property price 178 EUR2005
    (same comment as for lead)
  property carbon content 0
    carbon content on a dry matter basis (reserved; not for manual entry)
  property true value 1.67202
    allocation property applied in "true value" allocation // value calculated from revenue
  properties: wet mass 1 kg, carbon content, non-fossil 0, dry mass 1 kg, water content 0, carbon content, fossil 0, water in wet mass 0 kg, carbon allocation 0 kg
- palladium: 0 kg; CPC 4160: Other non-ferrous metals and articles thereof (including waste and scrap of some metals); cermets and articles […]; By-product classification allocatable product
  EcoSpold01Location=SE
  production volume 0.00155996 kg
  property price 5640 EUR2005
    Temporary price data. Calculated as 90% of purchasers price based on: 2004 price from USGS (2007) Mineral commodity summaries 2007. <http://minerals.usgs.gov/minerals/pubs/mcs/2007/mcs2007.pdf> [Accessed 25 May 2010]
  property carbon content 0
    carbon content on a dry matter basis (reserved; not for manual entry)
  property true value 2.93272
    allocation property applied in "true value" allocation // value calculated from revenue
  properties: wet mass 1 kg, carbon content, fossil 0, water in wet mass 0 kg, water content 0, carbon content, non-fossil 0, dry mass 1 kg, carbon allocation 0 kg
- gold: 0 kg; CPC 41320: Gold (including gold plated with platinum), unwrought or in semi-manufactured forms, or in powder form; By-product classification allocatable product; CAS 7440-57-5
  EcoSpold01Location=SE
  production volume 0.000855474 kg
  property price 10600 EUR2005
    Temporary price data. Calculated as 90% of purchasers price based on: Source: ecoinvent v2 report 10-part IX, Tab 2.5
  property carbon content 0
    carbon content on a dry matter basis (reserved; not for manual entry)
  property true value 3.02268
    allocation property applied in "true value" allocation // value calculated from revenue
  properties: wet mass 1 kg, carbon content, fossil 0, dry mass 1 kg, carbon content, non-fossil 0, water content 0, water in wet mass 0 kg, carbon allocation 0 kg
- waste paperboard, sorted: 0 kg; CPC 39240: Waste and scrap of paper or paperboard; By-product classification Recyclable; pedigree (1,1,1,1,1)
  It is assumed that 86.3% (wet weight) of waste paperboard, unsorted is segregated to waste paperboard, sorted. Waste paper, sorted is later used in recycling industry where maximum 79% of it, is transformed into new paperboard.
  production volume 6.4725 kg
  property price 0.0436 EUR2005; name ByP_waste_paperboard_sorted_price_EUR200
    Estimated value; three different sources were used to determine the price for waste paperboard, sorted. 35 AUD/tonne (http://larimer.org/solidwaste/charts/Current.htm, accessed 20130328), 70 GBP/tonne (http://www.letsrecycle.com/prices/waste%20paper, accessed 20130328) and 20 USD/tonne (http://www.oxpaperboard.com/1/post/2013/03/ox-paperboard-announces-price-adjustment-to-uncoated-recycled-paperboard.html, accessed 20130328).
  property water content 0.243781; = WWM_waste_paperboard_sorted/ DM_waste_paperboard_sorted
  property water in wet mass 0.196 kg; name WWM_waste_paperboard_sorted; = WM_waste_paperboard_sorted- DM_waste_paperboard_sorted
  property dry mass 0.804 kg; name DM_waste_paperboard_sorted
  property wet mass 1 kg; name WM_waste_paperboard_sorted
  property carbon content 0.483259
    carbon content on a dry matter basis (reserved; not for manual entry)
  property true value 0.094067
    allocation property applied in "true value" allocation // value calculated from revenue
  properties: carbon content, non-fossil 0.483259, carbon content, fossil 0, carbon allocation 0.38854 kg
- electricity, for reuse in municipal waste incineration only: 0 kWh; CPC 17100: Electrical energy; By-product classification allocatable product; pedigree (1,1,1,1,1)
  Net electricity generated from this waste and used in internal MSWI plant energy redistribution.
  Uncertainty: uncertainty is calculated from uncertainties in waste composition and uncertainties in energy efficiency and the uncertainty in internal energy demand
  production volume 0.239987 kWh
  property true value relation 3.6; name E_el_prod_MSWI_true_value_relation
    property to calculate "true value" from
  property exergy 3.6 MJ; name E_el_prod_MSWI_exergy
    This exergy property is based on the exergy content of the product.
  property price 0.1 EUR2005; name E_el_prod_MSWI_price_EUR2005
    Estimated to be the same price as in case of electricity, medium voltage.
  property true value 0.00891736
    allocation property applied in "true value" allocation // value calculated from true value relation
- heat, for reuse in municipal waste incineration only: 0 MJ; CPC 17300: Steam and hot water; By-product classification allocatable product; pedigree (1,1,1,1,1)
  Net useful heat generated from this waste and used in internal MSWI plant energy redistribution.
  Uncertainty: uncertainty is calculated from uncertainties in waste composition and uncertainties in energy efficiency and the uncertainty in internal energy demand
  production volume 1.68201 MJ
  property true value relation 0.1842; name E_th_prod_MSWI_true_value_relation
    property to calculate "true value" from
  property exergy 0.1842 MJ; name E_th_prod_MSWI_exergy
    This exergy property is based on the exergy content of the product.
  property price 0.0106 EUR2005; name E_th_prod_MSWI_price_EUR2005
    Average European district heat price from Ecoheatcool and Euroheat 2005-2006, Ecoheat Work package 1: The European heat market. Final report. 10.6 EUR/GJ i s the price of district heat. http://www.solarthermalworld.org/files/Ecoheatcool%20WP1%20Web.pdf?download
  property true value 0.00320253
    (same comment as for electricity, for reuse in municipal waste incineration only)
- zinc concentrate: 0 kg; CPC 14290: Other non-ferrous metal ores and concentrates (other than uranium or thorium ores and concentrates); By-product classification allocatable product
  Calculated value from the knowledge of the properties of both products.
  production volume 1.00285e-6 kg
  property price 0.38 EUR2005; name ByP_price_EUR2005
    Temporary price data. Calculated as 90% of purchasers price based on: Zinc content in concentrate 53%. Concentrate price per kg Zn 86.5% of refined Zn price (13.5% treatment charges according to CHR Metals Limited 2005: Dynamic cost curves. http://www.minecost.com/dynamic.pdf). 2004 zinc price from USGS (2007) Mineral commodity summaries 2007. <http://minerals.usgs.gov/minerals/pubs/mcs/2007/mcs2007.pdf> [Accessed 25 May 2010]
  property zinc content 0.53; name zinc_C_zinc_concentrate
    Zinc content on a dry matter basis. Value taken from teh "zinc mine operation" /GLO dataset.
  property dry mass 1 kg; name DM_zinc_concentrate
  property carbon content 0
    carbon content on a dry matter basis (reserved; not for manual entry)
  property true value 1.27027e-7
    allocation property applied in "true value" allocation // value calculated from revenue
  properties: wet mass 1 kg, water content 0, carbon content, non-fossil 0, carbon content, fossil 0, water in wet mass 0 kg, carbon allocation 0 kg

## Inputs from technosphere
- styrene-acrylonitrile copolymer: 0.0091705 kg; lognormal variance with pedigree 0.0532, pedigree (2,3,5,5,1)
  Literature (de Wild 2006)
  EcoSpold01Location=RER
  Uncertainty: Literature (de Wild 2006)
  properties: dry mass 1 kg, wet mass 1 kg, carbon content, fossil 0.856023
  note on carbon content, fossil: SAN is the abbreviation originating from its monomers styrene (C8H8) and acrylonitrile (C3H3N). The acrylonitrile content in SAN goes from 20 to 35 wt% (ecoinvent v2.2 report 11_II), an average content of 27.5% was considered. MW styrene =104 g/mol, MW acrylonitrile=53 g/mol
- integrated circuit, logic type: 0.0256774 kg; lognormal variance with pedigree 0.0532, pedigree (2,3,5,5,1)
  EcoSpold01Location=GLO
  Literature (de Wild 2006), Calculation
  Uncertainty: Literature (de Wild 2006), Calculation
  properties: carbon content, fossil 0.221701, wet mass 1 kg, dry mass 1 kg
  note on carbon content, fossil: Calculated as the addition of C contents in the product composition
- electricity, medium voltage: 0 kWh; pedigree (1,1,1,1,1)
  EcoSpold01Location=UCTE
  Literature (Schwarz 1992)
  Uncertainty: Literature (Schwarz 1992)
- resistor, metal film type, through-hole mounting: 0.00458525 kg; lognormal variance with pedigree 0.0532, pedigree (2,3,5,5,1)
  (same comment as for integrated circuit, logic type)
  properties: dry mass 1 kg, wet mass 1 kg, carbon content, fossil 0.029003
  note on carbon content, fossil: Calculated as the addition of C contents in the product composition, and referred to 1 kg DM resistor.
- section bar extrusion, aluminium: 1.28387 kg; lognormal variance with pedigree 0.0532, pedigree (2,3,5,5,1)
  EcoSpold01Location=RER
  Literature (de Wild 2006)
  Uncertainty: Literature (de Wild 2006)
- aluminium, cast alloy: 1.28387 kg; lognormal variance with pedigree 0.0532, pedigree (2,3,5,5,1)
  Literature (de Wild 2006), recycled after use
  EcoSpold01Location=RER
  Uncertainty: Literature (de Wild 2006), recycled after use
  properties: dry mass 1 kg, wet mass 1 kg
- capacitor, film type, for through-hole mounting: 0.312714 kg; lognormal variance with pedigree 0.0532, pedigree (2,3,5,5,1)
  Literature (de Wild 2006), Calculation
  EcoSpold01Location=GLO
  Uncertainty: Literature (de Wild 2006), Calculation
  properties: dry mass 1 kg, wet mass 1 kg, carbon content, fossil 0.278876
  note on carbon content, fossil: Calculated as the addition of C contents in the product composition, and referred to 1 kg capacitors, and then to 1 kg DM
- polystyrene foam slab: 0.275115 kg; lognormal variance with pedigree 0.0632, pedigree (2,3,5,5,1)
  Literature (Schwarz 1992)
  EcoSpold01Location=RER
  Uncertainty: Literature (Schwarz 1992)
  properties: wet mass 1 kg, dry mass 1 kg, carbon content, fossil 0.859091
  note on carbon content, fossil: XPS consists in 91% of polystyrene, 7% of blowing agent and the re-maining 2% are flame retardants (bromine compounds) and other additives (ecoinvent v2.2 report 7, part XIV, pg69). The chemical formula of polystyrene is (C8H8)n. Here, the blowing agent is CO2.
- sheet rolling, steel: 8.98709 kg; lognormal variance with pedigree 0.0532, pedigree (2,3,5,5,1)
  Literature (de Wild 2006)
  EcoSpold01Location=RER
  Uncertainty: Literature (de Wild 2006)
- printed wiring board, for through-hole mounting, Pb containing surface: 0.102985 m2; = 0.2246*0.5; lognormal variance with pedigree 0.0532, pedigree (2,3,5,5,1)
  Literature (de Wild 2006), Calculation
  This original value from production mix has been replaced by 2 flows. Each has 50% share in the production mix.
  Uncertainty: Literature (de Wild 2006), Calculation
  properties: wet mass 3.08 kg, dry mass 3.08 kg, carbon content, fossil 0.203154
- used printed wiring boards: -1.56155 kg; lognormal variance with pedigree 0.0532, pedigree (2,3,5,5,1)
  EcoSpold01Location=GLO
  Calculation, different geographical location
  Uncertainty: Calculation, different geographical location
  production volume 5.1084 kg
    Calculated from the production volume of inverter, 2.5kW in proportion to the respective output amounts.
  properties: wet mass 1 kg, carbon content, fossil 0.193742, carbon content, non-fossil 0.000960142, dry mass 1 kg
  note on carbon content, fossil: Composition of printed wiring boards used to calculate C content
- copper: 5.05295 kg; lognormal variance with pedigree 0.0532, pedigree (2,3,5,5,1)
  EcoSpold01Location=RER
  Literature (de Wild 2006), recycled after use
  Uncertainty: Literature (de Wild 2006), recycled after use
  properties: wet mass 1 kg, dry mass 1 kg
- wire drawing, copper: 5.05295 kg; lognormal variance with pedigree 0.0532, pedigree (2,3,5,5,1)
  Literature (de Wild 2006)
  EcoSpold01Location=RER
  Uncertainty: Literature (de Wild 2006)
- waste polyethylene: 0 kg; pedigree (1,1,1,1,1)
  EcoSpold01Location=CH
  Calculation, different geographical location
  Uncertainty: Calculation, different geographical location
  production volume 0 kg
    (same comment as for used printed wiring boards)
  properties: carbon content, fossil 0.825301, wet mass 1 kg, dry mass 0.996 kg, water content 0.00401606
  note on carbon content, fossil: C content in 1 kg DM was calculated using data in Tab A.1, ecoinvent v2.2 report 13_I
- diode, glass-, for through-hole mounting: 0.0431014 kg; lognormal variance with pedigree 0.0532, pedigree (2,3,5,5,1)
  (same comment as for integrated circuit, logic type)
  properties: wet mass 1 kg, carbon content, fossil 0.0203273, dry mass 1 kg
- polyvinylchloride, suspension polymerised: 0.00102125 kg; lognormal variance with pedigree 0.0532, pedigree (2,3,5,5,1)
  Literature (de Wild 2006)
  EcoSpold01Location=RER
  Uncertainty: Literature (de Wild 2006)
  properties: dry mass 1 kg, carbon content, fossil 0.387097, wet mass 1 kg
  note on carbon content, fossil: Monomer is vynyl chloride, C2H3Cl (ecoinvent v2.2 report 11_II). MW=62 g/mol
- fleece, polyethylene: 0.055023 kg; lognormal variance with pedigree 0.0632, pedigree (2,3,5,5,1)
  Literature (Schwarz 1992)
  EcoSpold01Location=RER
  Uncertainty: Literature (Schwarz 1992)
  properties: carbon content, fossil 0.857143, wet mass 1 kg, dry mass 1 kg
  note on carbon content, fossil: Polyethylene is formed out of a huge amount of ethylene monomers (C2H4) (ecoinvent v2.2 report 11_II). MW=28 g/mol
- waste polystyrene: 0 kg; pedigree (1,1,1,1,1)
  Calculation, different geographical location
  EcoSpold01Location=CH
  Uncertainty: Calculation, different geographical location
  production volume 0 kg
    (same comment as for used printed wiring boards)
  properties: carbon content, fossil 0.922579, dry mass 0.998 kg, wet mass 1 kg, water content 0.00200401
- printed wiring board, for through-hole mounting, Pb free surface: 0.102985 m2; = 0.2246*0.5; lognormal variance with pedigree 0.0532, pedigree (2,3,5,5,1)
  (same comment as for printed wiring board, for through-hole mounting, Pb containing surface)
  property dry mass 3.08 kg; name DM
  property carbon content, fossil 0.210221; name C_content_fossil
  property wet mass 3.08 kg; name WM
  property water in wet mass 0 kg; name WWM
  property carbon content, non-fossil 0; name C_content_non_fossil
  property water content 0; name water_content
- corrugated board box: 0 kg; pedigree (1,1,1,1,1)
  EcoSpold01Location=RER
  Calculation, based on estimated dimension of inverse rectifier
  Uncertainty: Calculation, based on estimated dimension of inverse rectifier
  properties: carbon content, fossil 0.000656085, carbon content, non-fossil 0.432275, dry mass 0.945 kg, wet mass 1 kg, water content 0.0582011
  note on carbon content, fossil: Fossil C content was calculated after fossil C contents of chemicals used in the production of board (Tab 10-15 & 10.16 ecoinvent v2.2 report 11_III, part 10)
  note on carbon content, non-fossil: Biogenic C content was calculated after biogenic C contents of chemicals used in the production of board (Tab 10.15 & 10.16, ecoinvent v2.2 report 11_III, part 10).
- capacitor, tantalum-, for through-hole mounting: 0.0210922 kg; lognormal variance with pedigree 0.0532, pedigree (2,3,5,5,1)
  EcoSpold01Location=GLO
  Literature (de Wild 2006), Assumption for Ceramic Multilayer Chip Capacitors
  Uncertainty: Literature (de Wild 2006), Assumption for Ceramic Multilayer Chip Capacitors
  properties: wet mass 1 kg, carbon content, fossil 0.181224, dry mass 1 kg
- transistor, wired, small size, through-hole mounting: 0.0348479 kg; lognormal variance with pedigree 0.0532, pedigree (2,3,5,5,1)
  (same comment as for integrated circuit, logic type)
  properties: carbon content, fossil 0.080338, wet mass 1 kg, dry mass 1 kg
  note on carbon content, fossil: Calculated as the addition of C contents in the product composition, and referred to 1 kg DM transistor.
- inductor, ring core choke type: 0.321885 kg; lognormal variance with pedigree 0.0532, pedigree (2,3,5,5,1)
  (same comment as for integrated circuit, logic type)
  properties: carbon content, fossil 0.445934, wet mass 1 kg, dry mass 1 kg
  note on carbon content, fossil: Calculated as the addition of C contents in the product composition, and referred to 1 kg DM inductor
- waste paperboard, unsorted: -2.29263 kg; lognormal variance with pedigree 0.0532, pedigree (2,3,5,5,1)
  (same comment as for waste polyethylene)
  production volume 7.5 kg
    (same comment as for used printed wiring boards)
  properties: price 0.03924 EUR2005, carbon content, non-fossil 0.483259, water content 0.243781, wet mass 1 kg, dry mass 0.804 kg
  note on carbon content, non-fossil: C content was calculated for 1 kg DM, using data in Tab A.3, ecoinvent v2.2 report 13_I.
- metal working factory: 8.22796e-9 unit; lognormal variance with pedigree 0.3546, pedigree (2,4,5,5,1)
  EcoSpold01Location=RER
  Calculation, based on annual production of electronic component production plant
  Uncertainty: Calculation, based on annual production of electronic component production plant
- electric connector, wire clamp: 0.217341 kg; lognormal variance with pedigree 0.0532, pedigree (2,3,5,5,1)
  (same comment as for integrated circuit, logic type)
  properties: dry mass 1 kg, wet mass 1 kg, carbon content, fossil 0.19653
- steel, low-alloyed, hot rolled: 8.98709 kg; lognormal variance with pedigree 0.0532, pedigree (2,3,5,5,1)
  (same comment as for copper)
  properties: carbon content, fossil 0.005, dry mass 1 kg, wet mass 1 kg
  note on carbon content, fossil: Low alloyed steel composition given in Tab. 3.2 ecoinvent v2.2 report 10_partII. Steel assumed to have a C content of 0.5%
- capacitor, electrolyte type, > 2cm height: 0.234765 kg; lognormal variance with pedigree 0.0532, pedigree (2,3,5,5,1)
  (same comment as for integrated circuit, logic type)
  properties: wet mass 1 kg, carbon content, fossil 0.16971, dry mass 1 kg, carbon content, non-fossil 0.0349727
- electricity, medium voltage: 0.254503, 0.0463088, 0.785328, 11.3864, 1.62961, 5.33928 kWh (6 entries); lognormal variance with pedigree 0.0632, pedigree (2,3,5,5,1)
  EcoSpold01Location=UCTE
  Literature (Schwarz 1992)
  Uncertainty: Literature (Schwarz 1992)
- waste polyethylene: -0.00676176, -0.000451795, -3.41685e-5, -0.000186607, -7.53873e-5, -0.000177201, -0.0473361 kg (7 entries); lognormal variance with pedigree 0.0532, pedigree (2,3,5,5,1)
  (same comment as for waste polyethylene)
  production volume 0.18 kg
- waste polystyrene: -0.0349358, -0.00233427, -0.000176537, -0.000964139, -0.000389501, -0.00091554, -0.24457 kg (7 entries); lognormal variance with pedigree 0.0532, pedigree (2,3,5,5,1)
  (same comment as for waste polystyrene)
  production volume 0.93 kg
- corrugated board box: 0.0266728, 2.26595 kg (2 entries); lognormal variance with pedigree 0.0546, pedigree (2,4,5,5,1)
  (same comment as for corrugated board box)

## Sampling procedure
Detailed analysis of materials for one product

## Extrapolations
Data for electronic components has been extrapolated from 500 W-Inverter This dataset has been copied from an original dataset covering the geography RER. The uncertainty has been adjusted accordingly.

## Review by Christian Bauer 2009-02-15
passed
none
