# glued laminated timber production, for indoor use

Dataset: EcoSpold 2, unit process
Geography: RER
Time period: 1986-01-01 to 2019-12-31
Technology level: current
Classification: ISIC rev.4 ecoinvent: 1621:Manufacture of veneer sheets and wood-based panels
Classification: EcoSpold01Categories: wooden materials/extraction
Tags: ConvertedDataset
Scenario: Business-as-Usual
System model: Allocation at the point of substitution
Generated by: Hans-Jörg Althaus
Published in: Werner F. 2007
Database: ecoinvent
isCopyrightProtected: true
accessRestrictedTo: 1

## General comment
This dataset represents the production of one m3 glued laminated timber for indoor use. The input of wood is assumed to be naturally dried sawn softwood, more specifically spruce.

The production takes place at a wooden board factory for organic bonded board; the dataset covers German production, which is assumed to be representative for Europe.

Data for glued laminated timber are estimated based on data for three layered laminated board. The overall quality of the data for glued laminated timber (represented by three layered laminated board) is good for such a wide class of products. Data quality, however, is not sufficient to allow for comparing with other wood boards.
[Dataset to be replaced by 'glued laminated timber production, for indoor use, CH, 1986 - 2002']
[Dataset to be replaced by 'glued laminated timber production, for indoor use, Europe without Switzerland, 1986 - 2002']

## Included activities start
From reception of sawn softwood and glue (urea-formaldehyde resin) at the factory gate.

## Included activities end
This activity ends with glued laminated timber at the factory gate. The dataset includes the inputs to the production processes, transports of those inputs and the process emissions as far as they are available. The dataset does not include infrastructure.

## Geography
Data for Germany used for central Europe

## Technology
Estimate for glued laminated timber is based on data for three layered laminated board.

In a normal indoor climate and for building components protected from weathering, glues based on urea resins are used.

Laminated wood is made mostly from spruce, which is the easiest wood to process and fulfils the specific requirements of strength and durability. The three-layered laminated board made of spruce is produced in a large wood processing company in the Canton of Fribourg, Switzerland: out of rough sawn timber (u=70%) 22 mm lamellas are sawn, which are technically dried, planed, finger-jointed, glued with PVAc-adhesive at their ends to “never-ending” lamellas and finally glued to a bloc. This block is sawn to boards, which are planed. The spruce is mainly coming from the area around Fribourg. The thermal energy for the drying of the lamellas is mainly produced by industrial residual wood (8% of wood input). Lamellar boards are sawed from round wood trunks. The boards are pre-dried to ca. 10% residual moisture, graded, and then bonded in automatic plants to form continuous boards with dovetail joints. The moisture in the boards to be glued should be 2 3% below the expected equilibrium moisture level. Variations in the moisture content of the different boards should be not greater than 2%. The broad sides of these joined boards are planed until smooth and uniformly coated with adhesive. Constructing the beams, particular attention is paid to the positions of the annual rings in the cross section of the boards. The rifts (vertical) and the flats (horizontal) should be distributed regularly (Werner et al., 1997).
Reference:
Werner F., Richter K., Bosshart S. and Frischknecht R. (1997) Ökologischer Vergleich von Innenbauteilen am Bsp. von Zargen aus Massivholz, Holzwerkstoff und Stahl. EMPA/ETH-Forschungsbericht, Dübendorf, Zürich.

## Reference product
- glued laminated timber, for indoor use: 0 m3; By-product classification allocatable product; CPC 3141: Plywood consisting solely of sheets of wood, except of bamboo
  Reference product. Glued laminated timber of naturally dried softwood (spruce). The laminated timber is produced at a wooden board factory in Germany by processes representative for European average. The reference product is ready for delivery at the wooden board factory. The timber is intended for indoor use; as basis for timber-concrete composite structures providing increased load bearing capacities and to give positive effects on sound insulation within house-building.
  EcoSpold01Location=RER
  production volume 1.84e6 m3
    Unknown
    Assuming 80% of glulam production (2.3 million cubic metres according to http://www.europanels.org/Folders/euro%20fact_2%20Woodworking.pdf) are for indoor use
  property carbon content, fossil 0.0128964
    C content of 12 kg Urea formaldehyde resin (C3H8N2O) used for glueing
  property carbon content, non-fossil 0.478422
    The laminated timber is composed of wood and glue. The weight of the wood is assumed to be the DM minus 12 kg glue. C content of wood is 0.494 kgC/kg dry wood (ecoinvent v2.2 report 9)
  property price 298 EUR2005
    Temporary price data. Calculated as 90% of purchasers price based on: Price for plywood applied (from 2004 World Import/Export (USD/cubicmeter) from FaoStat http://faostat.fao.org/site/626/default.aspx#ancor, accessed 14th June 2010)
  property carbon content 0.491318
    carbon content on a dry matter basis (reserved; not for manual entry)
  property true value 298
    allocation property applied in "true value" allocation // value calculated from revenue
  properties: wet mass 430 kg, water content 0.13, water in wet mass 49.469 kg, dry mass 380.531 kg, carbon allocation 186.962 kg
- wood chips, dry, measured as dry mass: 1 kg; CPC 31230: Wood in chips or particles; By-product classification allocatable product
  Calculated Value. Since the fuel for the furnace is included in the input, the corresponding amount inventoried with the energy module is subtracted. Since the volume of the chips is bulked, it is higher than the difference of input and output volume.
  production volume 2.63543e8 kg; = Ref('0a7af168-fe27-4f30-b317-3e15a7c832d3', 'ProductionVolume') * (Ref('041876eb-1d90-49c3-ac58-1d83f60ff97d') / Ref('0a7af168-fe27-4f30-b317-3e15a7c832d3'))
    Calculated from production volume of reference product using the relative outputs.
  property price 0.107 EUR2005
    Expert judgement (Urs Luginbühl, Swiss Sawmilling industry, personal communication in June 2014). Wood chips from softwood should have a price of 0.101 EUR/kg. Woodchips from hardwood should have a price of 0.112 EUR/kg. Average of these two values is used. Cross-reference; FAOSTAT database; http://faostat.fao.org/site/626/DesktopDefault.aspx?PageID=626#ancor; Average import/export prices of EU for 'chips and particles'. Price: 48.76 Euro/m3. The density of the wood chips is 650 kg/m3. The price is recalculated accordingly.
  property carbon content, non-fossil 0.494
    C content of dry mass is 0.494 kgC/kg dry wood (ecoinvent v2.2 report 9).
  property carbon content 0.494
    carbon content on a dry matter basis (reserved; not for manual entry)
  property true value 15.3256
    allocation property applied in "true value" allocation // value calculated from revenue
  properties: dry mass 1 kg, carbon content, fossil 0, water content 0.4, water in wet mass 0.4 kg, wet mass 1.4 kg, carbon allocation 0.494 kg

## By-products
- residual wood, dry: 0 m3; CPC 39283: Non-agglomerated wood waste and scrap; By-product classification allocatable product
  Stoichiometric Calculation. Calculated by balance of dry wood mass. The remaining residual wood (0.344 m3) is used for heating purposes and technical drying.
  EcoSpold01Location=RER
  production volume 96048 m3; = Ref('10ac61c0-2f70-40ff-8dd8-aa35e9bc27f3')/ Ref('0a7af168-fe27-4f30-b317-3e15a7c832d3')* Ref('0a7af168-fe27-4f30-b317-3e15a7c832d3', 'ProductionVolume')
    Unknown
    Calculated from the output of glulam (0.0517 m3/m3 glulam)
  property carbon content, non-fossil 0.494
    C content of dry mass is 0.494 kgC/kg dry wood (ecoinvent v2.2 report 9)
  property price 26.9 EUR2005
    Temporary price data. Calculated as 90% of purchasers price based on: 2004 prices for World Import/Export (USD/cubicmeter) from FaoStat (http://faostat.fao.org/site/626/default.aspx#ancor, [accessed 10th June 2010]) Commodity: 'Chips and Particles' assuming this is for air-dry chips (10% water on a dry matter basis at 650 kg/m3) and no price difference for water content (i.e. assuming air-drying).
  property carbon content 0.494
    carbon content on a dry matter basis (reserved; not for manual entry)
  property true value 1.40418
    allocation property applied in "true value" allocation // value calculated from revenue
  properties: carbon content, fossil 0, dry mass 450 kg, wet mass 495 kg, water in wet mass 45 kg, water content 0.1, carbon allocation 222.3 kg

## Inputs from technosphere
- urea formaldehyde resin: 0.00407969 kg; source Frühwald A. 1996; lognormal variance with pedigree 0.0421, pedigree (1,4,5,3,1)
  EcoSpold01Location=RER
  Literature Value. Literature value regarding consumption of adhesives. Without impregnation and surface treatment.
  properties: dry mass 1 kg, wet mass 1 kg, carbon content, fossil 0.408958
  note on carbon content, fossil: Chemical formula of the urea formaldehide monomer was assumed to be C3H8N2O
- electricity, medium voltage: 0.0438567 kWh; source Frühwald A. 1996; lognormal variance with pedigree 0.0421, pedigree (1,4,5,3,1)
  EcoSpold01Location=UCTE
  Literature Value.
- wooden board factory, organic bonded boards: 1.13211e-11 unit; lognormal variance with pedigree 0.4461, pedigree (4,5,5,3,4)
  EcoSpold01Location=RER
  Estimation.
- waste polyurethane: -0.000331135 kg; source Frühwald A. 1996; lognormal variance with pedigree 0.0421, pedigree (1,4,5,3,1)
  Literature Value.
  EcoSpold01Location=CH
  production volume 1.79216e6 kg; = (Ref('f87b0c42-d798-4d55-8e2f-4c2581307dd2')*-1)/ Ref('0a7af168-fe27-4f30-b317-3e15a7c832d3')* Ref('0a7af168-fe27-4f30-b317-3e15a7c832d3', 'ProductionVolume')
    Calculated from the production volume of glued laminated timber, for indoor use in proportion to the respective output amounts.
  properties: wet mass 1 kg, carbon content, fossil 0.641283, water content 0.00200401, dry mass 0.998 kg
  note on carbon content, fossil: C content was calculated for 1 kg DM, using data in Tab A.2, ecoinvent v2.2 report 13_I.
- sawnwood, board, softwood, raw, dried (u=20%): 0.000465765 m3; source Ressel 1986; lognormal variance with pedigree 0.1621, pedigree (1,4,5,3,1)
  Estimation. Calculated from literature value of yield.
  With the introduction of new wood products in ecoinvent version 3.1, the input of this exchange was change from generic sawnwood to an input of boards specifically.
  property water content 0.2; name water_content
  property dry mass 387.2 kg; name basic_d_wood
  properties: wet mass 464.64 kg, carbon content, non-fossil 0.494
- diesel, burned in building machine: 0.0114231 MJ; source Frühwald A. 1996; lognormal variance with pedigree 0.1621, pedigree (1,4,5,3,1)
  Literature Value. Regarding internal transports.
  EcoSpold01Location=GLO
- heat, central or small-scale, other than natural gas: 0.754947 MJ; lognormal variance with pedigree 0.0421, pedigree (1,4,5,3,1)
  Literature Value. The fuels utilized are light fuel oil AND residual softwood wood chips. Regarding softwood wood chips, the energy input for drying = 1620 MJ and the energy input for hall heating = 1072 MJ.

## Emissions to nature
- Formaldehyde [air, unspecified]: 4.07969e-6 kg; source Nimz H. 1997; lognormal variance with pedigree 0.408, pedigree (4,5,5,5,5)
  Literature Value. 0.1 mass-% emissions.

## Sampling procedure
Literature

## Extrapolations
see Geography and Technology

## Review by Roland Hischier 2011-12-01
Transfer of documentation done.

## Review by Roberto Dones 2007-11-13
passed
