# electricity production, photovoltaic, 570kWp open ground installation, multi-Si

Dataset: EcoSpold 2, unit process
Geography: AU
Time period: 2008-01-01 to 2019-12-31
Technology level: current
Classification: EcoSpold01Categories: photovoltaic/power plants
Classification: ISIC rev.4 ecoinvent: 3510b: Electric power generation, photovoltaic
Synonyms: multi-crystalline; centralised photovoltaic plant; silicon; polycrystalline
Tags: single enterprise data; photovoltaic power
Scenario: Business-as-Usual
System model: Allocation at the point of substitution
Generated by: Karin Treyer
Published in: Jungbluth N. 2012
Database: ecoinvent
isCopyrightProtected: true
accessRestrictedTo: 1

## General comment
This dataset represents the production of grid-connected low voltage electricity with a 570 kWp open ground photovoltaic (PV) plant in Australia in 2012. Large central photovoltaic power stations in the higher kilowatt to megawatt range can feed directly into the medium- or high voltage grid. However, the voltage depends largely on the design and size of the plant. In order to treat all photovoltaic installations the same way (no matter which size, design and installation type (building integrated or open ground)), low voltage electricity is assumed as a product in this dataset. Please see field 'extrapolations' for further discussion.
The plant consists out of multi-Si panel modules with a total capacity of 570 kWp.
An inverter is used to convert the low voltage DC power into AC power.
An average yield of {{yield}} was assumed for the calculations.

## Included activities start
From the PV module installed and ready to be used.

## Included activities end
This activity ends with low voltage electricity produced with the 570 kWp module, assuming an average yield.

This dataset includes tap water use for cleaning the module and its treatment.

## Technology
Electricity production with a grid-connected 570 kWp multi-Si photovoltaic open ground installation. See field 'extrapolation' for comment on the output voltage.

## Time period
The annual production volume valid for 2012

## Parameters
- Share 570kWp open ground installation, multi-Si, on open ground: 0.01; name pv_570ogi_mSi_og; lognormal variance with pedigree 0.214, pedigree (5,5,5,5,5)
  Literature values, calculated value.
  Calculated from the shares of different types of cells in 2008 (European Photovoltaic Technology Platform 2012) and the shares of different types of mounting systems (Jungbluth et al. 2012). The latter shares are valid for Europe (RER) and do not take into account open ground PV plants. Due to lack of data for other regions or even countries on the world, the shares have been taken as calculation basis for all PV datasets.Further, the electricity markets in ecoinvent v3.2 are modelled with only three types of PV panels: multi-Si and single-Si panels installed at slanted roofs and open ground installations. The shares of the two slanted-roof installations are calculated based on the two sources mentioned before and amount to 44.5% (single-Si) and 55.5% (multi-Si), respectively (if no open ground present). Further, data from the IEA-PVPS 2013 were used to find out if there are any open ground installations present in a country. In some cases no or only aggregated information were given in the 2013 report, so that the report from 2014 was used in these cases with data for the year 2013. Where no information were given at all, no open ground installations are considered due to lack of data.
  Sources:
  - European Photovoltaic Technology Platform. 2012. Photovoltaic Fact Sheets. The status of the PV industry (2008). LB-32-10-251-EN-D. retrieved from <http://www.eupvplatform.org/publications/misperceptions-fact-sheets.html#c2242> (accessed 31.01.2012)
  - Jungbluth N., Stucki M., Flury K., Frischknecht R. and Buesser S. (2012) Life Cycle Inventories of Photovoltaic Power Production. ESU-services Ltd., Uster, CH, retrieved from: www.esu-services.ch/data/public-lci-reports
  - IEA-PVPS. 2013. Trends 2013 in photovoltaic applications. Survey report of selected IEA countries between 1992 and 2012. International Energy Agency, Photovoltaic Power Systems Programme. Report IEA-PVPS T1-23:2013
  - IEA-PVPS. 2014. Trends 2014 in photovoltaic applications. Survey report of selected IEA countries between 1992 and 2014. International Energy Agency, Photovoltaic Power Systems Programme. Report IEA-PVPS T1-23:2013
  - annual production volumes in ecoinvent v3.2, photovoltaic datasets for electricity production.
- Yield (Output), photovoltaics: 1334 kWh/kWp; name yield; lognormal variance with pedigree 0.0193, pedigree (4,4,2,3,3)
  Literature value/calculated value. Specific solar yield in kWh per kilowatt peak installed (radiation intensity and sunshine duration standardised to a default 1kW peak of capacity).
  The yield is taken from an IEA PVPS report valid for 2012, which presents data for one or several cities in a country for roof-top and façade installations. The two values for one city were averaged based on the weight of the shares of these two installation types as presented in Jungbluth et al. 2012 (12.5% façade installations, 87.5% roof-top installations, data valid for Europe). Data for several cities were just averaged without weighting.
  This dataset: Data from Sydney, Perth and Brisbane
  IEA PVPS. 2014. Compared assessment of selected environmental indicators of photovoltaic electricity in OECD cities. International Energy Agency - Photovoltaic Power Systems Programme.
  Jungbluth N., Stucki M., Flury K., Frischknecht R., Büsser S. 2012. Life Cycle Inventories of Photovoltaics. Report prepared for the Swiss Federal Office of Energy. ESU-services Ltd., Uster, Switzerland.
  nan
- Yield (Output), photovoltaics, corrected: 1227.28 kWh/kWp; name yield_corr; = yield*corr; lognormal variance with pedigree 0, pedigree (1,1,1,1,1)
  Estimated value. The annual yield is corrected with a correction factor of 0.92 according to Jungbluth et al. 2012.
  Annual output (yield), roof-top [kWh* kWp-1*y-1]
  The annual yield is corrected with a correction factor of 0.92 according to [ Jungbluth N., Stucki M., and Frischknecht R. (2009) Photovoltaics. In Dones, R. (Ed.) et al., Sachbilanzen von Energiesystemen: Grundlagen für den ökologischen Vergleich von Energiesystemen und den Einbezug von Energiesystemen in Oekobilanzen für die Schweiz. ecoinvent report No. 6-XII, Swiss Centre for Life Cycle Inventories, Dübendorf, CH, 2009.]
- gross electricity production: 1.489e9 kWh; name gross_electricity; lognormal variance with pedigree 0.0018, pedigree (2,1,1,1,2)
  Literature value/statistics. Total gross grid-connected photovoltaic electricity production in 2012 in this geography.
  For all OECD countries, data were taken from the OECD iLibrary 2014.
  For all non-OECD countries and the world, data were taken from IEA online statistics.
  OECD. 2014. IEA Electricity Information Statistics: OECD - Electricity and heat generation. OECD iLibrary. Online database. DOI : 10.1787/elect-data-en
  IEA. 2014. Online statistics, Electricity and Heat for 2012. Retreived from http://www.iea.org/statistics/statisticssearch/report/?country=WORLD&product=electricityandheat&year=2012
  nan
- water use for cleaning photovoltaic panels: 20 l/m2; name water_pv_panels_cleaning; lognormal variance with pedigree 0.1227, pedigree (5,4,5,3,4)
  Estimation
  nan
- Panel area for one 3 kWp unit, mc-Si: 22.1 m2/unit; name panel_area_mcSi; lognormal variance with pedigree 0.0199, pedigree (4,3,2,3,3)
  Literature value. This value has to be multiplied in order to extrapolate to a 570 kWp installation.
  Jungbluth N., Stucki M., Flury K., Frischknecht R. and Buesser S. (2012) Life Cycle Inventories of Photovoltaic Power Production. ESU-services Ltd., Uster, CH, retrieved from: www.esu-services.ch/data/public-lci-reports/
  Tab. 12.3, p.127
  nan
- fraction, tap water, to air: 0.15; name fraction_TW_to_air; = fraction_PW_to_air; lognormal variance with pedigree 0.092025, pedigree (4,4,3,2,4)
  Calculated value. See comment in the other parametres present in this dataset. Tap water is considered to be always used as process water, thus process water fractions to air are applied to all tap water input flows to calculate the amount of water consumed in the processes.
  nan
- capacity: 0.57 MW; lognormal variance with pedigree 0.001925, pedigree (2,2,1,2,2)
  Capacity of the photovoltaic cell in MWp per installation unit [MWp/unit]
  nan
- lifetime: 30 year; lognormal variance with pedigree 0.026625, pedigree (4,3,3,2,3)
  Oral communication. Gnos, S. 2002. Personal Communication, 10.2002. NET AG, Switzerland
  nan
- losses from gross electricity production: 0.05 dimensionless; name losses_gross_net; lognormal variance with pedigree 0.0167, pedigree (3,3,1,3,3)
  Estimation. The factor for the loss of electricity from gross to net electricity production is an assumption based on experiences and expertise (5% losses for photovoltaics).
  nan
- correction factor: 0.92; name corr; lognormal variance with pedigree 0.0175, pedigree (4,3,2,3,3)
  Estimation. Literature data on the yield for optimum installation and not real performance in the country have been corrected with a factor of 92% according to experiences in Switzerland for average production. This is based on the ratio of actual yield and published IEA data (820/892 = 0.92 - see Jungbluth et al. 2012 for detailed discussion)
  for use when something has to be corrected with an overall factor
- fraction, process water, to air: 0.15 dimensionless; name fraction_PW_to_air; lognormal variance with pedigree 0.092025, pedigree (4,4,3,2,4)
  Literature value. In case when no industry/process specific data are available, default evaporation fraction value is used. This value is 15% and is based on literature (Statistics Canada, 2007 & Shaffer, K.H., 2008, Consumptive water use in the Great Lakes Basin, USGS & Shiklomanov, 2003, World Water Resources at the Beginning of the 21st Century) and has been approved by an expert.
  nan

## Reference product
- electricity, low voltage: 1 kWh; CPC 17100: Electrical energy; By-product classification allocatable product
  production volume 1.3e7 kWh; name apv_electricity
    Calculated value
  property price 0.107 EUR2005
    Temporary price data. Calculated as 90% of purchasers price based on: IEA Key world energy statistics 2004 (www.iea.org/textbase/nppdf/free/2004/keyworld2004.pdf)
  property true value 0.107
    allocation property applied in "true value" allocation // value calculated from revenue

## By-products
- heat, for reuse in municipal waste incineration only: 0 MJ; CPC 17300: Steam and hot water; By-product classification allocatable product; pedigree (1,1,1,1,1)
  Net electricity generated from this waste and used in internal MSWI plant energy redistribution.
  Uncertainty: uncertainty is calculated from uncertainties in waste composition and uncertainties in energy efficiency and the uncertainty in internal energy demand
  production volume 0.0175707 MJ
  property exergy 0.1842 MJ; name E_th_prod_MSWI_exergy
    This exergy property is based on the exergy content of the product.
  property price 0.0106 EUR2005; name E_th_prod_MSWI_price_EUR2005
    Average European district heat price from Ecoheatcool and Euroheat 2005-2006, Ecoheat Work package 1: The European heat market. Final report. 10.6 EUR/GJ i s the price of district heat. http://www.solarthermalworld.org/files/Ecoheatcool%20WP1%20Web.pdf?download
  property true value relation 0.1842; name E_th_prod_MSWI_true_value_relation
    property to calculate "true value" from
  property true value 8.9109e-12
    allocation property applied in "true value" allocation // value calculated from true value relation
- electricity, for reuse in municipal waste incineration only: 0 kWh; CPC 17100: Electrical energy; By-product classification allocatable product; pedigree (1,1,1,1,1)
  (same comment as for heat, for reuse in municipal waste incineration only)
  production volume 0.00244037 kWh
  property price 0.1 EUR2005; name E_el_prod_MSWI_price_EUR2005
    Estimated to be the same price as in case of electricity, medium voltage.
  property exergy 3.6 MJ; name E_el_prod_MSWI_exergy
    This exergy property is based on the exergy content of the product.
  property true value relation 3.6; name E_el_prod_MSWI_true_value_relation
    property to calculate "true value" from
  property true value 2.4188e-11
    (same comment as for heat, for reuse in municipal waste incineration only)

## Inputs from technosphere
- wastewater, from residence: -2.10612e-8 m3; name sewage; = (tapwater/1000)*-1; lognormal variance with pedigree 0.0047, pedigree (2,2,3,5,1)
  Calculated value
  production volume 0.273795 m3; = apv_electricity*sewage
    Calculated value
  property price 0 EUR2005; name sewage_price_EUR2005
  properties: dry mass 0.337476 kg, carbon content, non-fossil 0.199421, water content 2962.17, wet mass 1000 kg
  note on carbon content, non-fossil: 0.0673 kg TOC/m3 (Tab A.17, ecoinvent v2.2 report 13_I). TOC was considered as Total Carbon.
- photovoltaic plant, 570kWp, multi-Si, on open ground: 4.76497e-8 unit; name installation; = 1/(lifetime*(capacity*1000)*yield_corr); lognormal variance with pedigree 0.0161, pedigree (3,2,3,5,1)
  Calculated value. Lifetime*capacity*annual yield = y * kWp/unit * kWh/(kWp*y) = kWh/unit and then the reciproke.
- tap water: 2.10612e-5 kg; name tapwater; = installation*panel_area_mcSi*water_pv_panels_cleaning; lognormal variance with pedigree 0.0047, pedigree (2,2,3,5,1)
  Calculated value. Amount of installation needed to produce 1 kWh * panel area per installation * water need to clean 1 m2 of panel. [unit/kWh * m2/unit * l/m2 = l/kWh]. A density of 1 kg/dm3 is assumed.
  properties: dry mass 0.000337476 kg, wet mass 1 kg, water content 2962.17, carbon content, fossil 0.00178991
  note on carbon content, fossil: Bicarbonate content is 2.93 mol/m3. CO2 content is 0.1 mol/m3 (ecoinvent v2.2 report 8, Tab 93.1).

## Inputs from nature
- Energy, solar, converted [natural resource, in air]: 3.8503 MJ; lognormal variance with pedigree 0.00388441, pedigree (2,2,3,1,1)
  Energy loss in the system is included.

## Emissions to nature
- Water [air, unspecified]: 3.15918e-9 m3; name water_to_air_unspecified; = (tapwater/1000)*fraction_TW_to_air; lognormal variance with pedigree 0.098025, pedigree (4,4,4,2,4)
  Calculated value based on literature values and expert opinion. See comments in the parametres' comment field.
  property fraction, origin: unspecified 0; name fraction_origin_unspecified
  property fraction, origin: fresh water 1; name fraction_origin_fresh_water
  property fraction, origin: salt water 0; name fraction_origin_salt_water

## Sampling procedure
Literature data/manufacturer data.

## Extrapolations
The simplifying assumption was made that all electricity is directly provided as low voltage electricity, so that no transformation has to take place. Even in countries with high shares of open ground installations (where medium or high voltage electricity might arrive at the busbar), the error introduced due to this assumption is not significant, as transformation processes do only have a low influence on environmental impacts.

## Review by Carl Vadenbo 2015-05-29
The update of the whole electricity sector for the ecoinvent v3.2 database consist of hundreds of datasets. All these datasets have passed through a streamlined review processes where the underlying modelling of production volumes, technology shares and efficiencies was reviewed in detail prior to the datasets being submitted to the database.
