# autoclaved aerated concrete block production

Dataset: EcoSpold 2, unit process
Geography: IN
Time period: 2014-04-01 to 2019-12-31
Technology level: current
Classification: ISIC rev.4 ecoinvent: 2395:Manufacture of articles of concrete, cement and plaster
Classification: EcoSpold01Categories: construction materials/bricks
Tags: combined production
Scenario: Business-as-Usual
System model: Allocation at the point of substitution
Generated by: P V Kiran Ananth
Published in: Kiran Ananth P. V. 2017
Database: ecoinvent
isCopyrightProtected: true
accessRestrictedTo: 1

## General comment
Autoclaved Aerated Concrete is a Lightweight, Load-bearing, High-insulating, Durable building product, which is produced in a wide range of sizes and strengths. AAC Blocks is lightweight and compare to the red bricks AAC blocks are three times lighter.
The Autoclaved Aerated Concrete (AAC) material was developed in 1924 in Sweden. It has become one of the most used building materials in Europe and is rapidly growing in many other countries around the world.
AAC is produced from the common materials lime, sand, cement and water, and a small amount of rising agent. After mixing and molding, it is then autoclaved under heat and pressure to create its unique properties. AAC has excellent thermal insulation and acoustic absorption properties. AAC is fire and pest resistant, and is economically and environmentally superior to the more traditional structural building materials such as concrete, wood, brick and stone.
AAC is a highly thermally insulating concrete-based material used for both internal and external construction. Besides AAC's insulating capability, one of its advantages in construction is its quick and easy installation, because the material can be routed, sanded, or cut to size on site using standard carbon steel power tools.
AAC is well suited for urban areas with high rise buildings and those with high temperature variations. Due to its lower density, high rise buildings constructed using AAC require less steel and concrete for structural members. The requirement of mortar for laying of AAC blocks is reduced due to the lower number of joints. Similarly, the material required for rendering is also lower due to the dimensional accuracy of AAC. The increased thermal efficiency of AAC makes it suitable for use in areas with extreme temperatures, as it eliminates the need for separate materials for construction and insulation, leading to faster construction and cost savings.

## Included activities start
From reception of raw materials at the plant gate.

## Included activities end
This activity includes the raw materials preparation and mixing, dosing, moulding, autoclaving process and packaging. The infrastructure is accounted for block production.

## Geography
Data represents for Indian geography.

## Technology
Manufacturing process of AAC blocks starts with mixing of raw materials like flyash, lime, gypsum, cement, aluminium powder, water etc. Then mix are poured in mould for moulding for certain time. After moulding mould are cut in definite shape and then processed for autoclaved operation where high pressure steam used. After autoclave operation blocks are ready for the dispatch.

## Time period
Data collected for above mentioned period.

## Parameters
- fraction, tap water, to air: 0.15; name fraction_TW_to_air; lognormal variance with pedigree 0.092025, pedigree (4,4,3,2,4)
- fraction, process water, to air: 0.15 dimensionless; name fraction_PW_to_air; lognormal variance with pedigree 0.092025, pedigree (4,4,3,2,4)

## Reference product
- hard coal ash: 0 kg; name ash; CPC 39: Wastes or scraps; By-product classification Waste; pedigree (1,1,1,1,1)
  Average data reported by 3 units. Fly ash is a coal combustion product composed of fine particles that are driven out of the boiler with the flue gases. Ash that falls in the bottom of the boiler is called bottom ash. In modern coal-fired power plants, fly ash is generally captured by electrostatic precipitators or other particle filtration equipment before the flue gases reach the chimneys. Depending upon the source and makeup of the coal being burned, the components of fly ash vary considerably, but all fly ash includes substantial amounts of silicon dioxide (SiO2) (both amorphous and crystalline) aluminium oxide (Al2O3) and calcium oxide (CaO).
  production volume 0 kg
    Calculated from production volume of reference product using the relative outputs.
  property price 0 EUR2005; name ash_price_EUR2005
    Waste products are assigned a price of zero as they are assumed to require further treatment.
  property carbon content 0
    carbon content on a dry matter basis (reserved; not for manual entry)
  properties: carbon content, non-fossil 0, carbon content, fossil 0, water content 0, wet mass 1 kg, dry mass 1 kg, water in wet mass 0 kg, carbon allocation 0 kg
- autoclaved aerated concrete block: 1 kg; name aac_block; CPC 37510: Non-refractory mortars and concretes; By-product classification allocatable product
  The density of block in 600 kg/m3.
  production volume 2.7e9 kg; name aac_block_PV
    The following assumptions has been made for calculating annual production volume. Number of Autoclaved Aerated Block manufacturing units in India : 100. Each unit manufactured 150 m3 blocks per day. Annual operation of a unit 300 days per year. Density of blocks 600 kg/m3.
  property price 0.077 EUR2005; name aac_block_price_EUR2005
    Data are not easily available. Therefore, an average price of products supplied by the activities in the same ISIC 3 code has been applied.This price is obtained as '_49 Concrete, asphalt and other mineral products, EU27 virgin, EU27' in the 'EU & DK Input Output Database' (available in SimaPro). The price is assumed to be valid for both RER2003, RER 2004, world 2003 and world 2004.
  property carbon content 0
    carbon content on a dry matter basis (reserved; not for manual entry)
  property true value 0.077; name aac_block_true_value
    allocation property applied in "true value" allocation // value calculated from revenue
  properties: water in wet mass 0 kg, carbon content, non-fossil 0, carbon content, fossil 0, water content 0, dry mass 1 kg, wet mass 1 kg, carbon allocation 0 kg

## By-products
- heat, for reuse in municipal waste incineration only: 0 MJ; CPC 17300: Steam and hot water; By-product classification allocatable product; pedigree (1,1,1,1,1)
  Net electricity generated from this waste and used in internal MSWI plant energy redistribution.
  Uncertainty: uncertainty is calculated from uncertainties in waste composition and uncertainties in energy efficiency and the uncertainty in internal energy demand
  production volume 14433.5 MJ
  property exergy 0.1842 MJ; name E_th_prod_MSWI_exergy
    This exergy property is based on the exergy content of the product.
  property price 0.0106 EUR2005; name E_th_prod_MSWI_price_EUR2005
    Average European district heat price from Ecoheatcool and Euroheat 2005-2006, Ecoheat Work package 1: The European heat market. Final report. 10.6 EUR/GJ i s the price of district heat. http://www.solarthermalworld.org/files/Ecoheatcool%20WP1%20Web.pdf?download
  property true value relation 0.1842; name E_th_prod_MSWI_true_value_relation
    property to calculate "true value" from
  property true value 3.52439e-8
    allocation property applied in "true value" allocation // value calculated from true value relation
- electricity, for reuse in municipal waste incineration only: 0 kWh; CPC 17100: Electrical energy; By-product classification allocatable product; pedigree (1,1,1,1,1)
  (same comment as for heat, for reuse in municipal waste incineration only)
  production volume 2004.65 kWh
  property price 0.1 EUR2005; name E_el_prod_MSWI_price_EUR2005
    Estimated to be the same price as in case of electricity, medium voltage.
  property exergy 3.6 MJ; name E_el_prod_MSWI_exergy
    This exergy property is based on the exergy content of the product.
  property true value relation 3.6; name E_el_prod_MSWI_true_value_relation
    property to calculate "true value" from
  property true value 9.56672e-8
    (same comment as for heat, for reuse in municipal waste incineration only)

## Inputs from technosphere
- packing, clay product: 0.999998 kg; = 1*aac_block; lognormal variance with pedigree 0.6522, pedigree (1,1,2,5,1)
  Referred ecoinvent dataset "concrete block production, GLO" (accessed 20170823). Exrapolation based on specific geography has adjusted.
  EcoSpold01Location=CH
- cement, Portland: 0.2 kg; = 0.2*aac_block+ash*0; lognormal variance with pedigree 0.0514, pedigree (2,3,2,1,1)
  EcoSpold01Location=CH
  Average data reported by 3 units
  properties: wet mass 1 kg, dry mass 1 kg
- quicklime, milled, packed: 0.0799999 kg; = 0.08*aac_block; lognormal variance with pedigree 0.0514, pedigree (2,3,2,1,1)
  EcoSpold01Location=CH
  Average data reported by 3 units
  properties: wet mass 1 kg, water content 0.010101, dry mass 0.99 kg
- heat, district or industrial, other than natural gas: 1.49464 MJ; = 1.4946385867469*aac_block; lognormal variance with pedigree 0.002, pedigree (2,3,2,1,1)
  Average data reported by 3 units
  properties: corresponding fuel use, propane, furnace >100kW 1.05263 MJ
  note on corresponding fuel use, propane, furnace >100kW: Lower heating value of the fuel input related to the heat/electricity output, taken directly from ecoinvent v3.0 dataset "heat production, natural gas, at industrial furnace >100kW, GLO 2000".
- aluminium, cast alloy: 0.002 kg; = 0.002*aac_block; lognormal variance with pedigree 0.0514, pedigree (2,3,2,1,1)
  Average data reported by 3 units
  EcoSpold01Location=RER
  properties: wet mass 1 kg, dry mass 1 kg
- wastewater from concrete production: -8.32999e-5 m3; name wastewater_output; = (0.0000833*aac_block)*-1; lognormal variance with pedigree 0.6522, pedigree (1,1,2,5,1)
  EcoSpold01Location=CH
  Referred ecoinvent dataset "concrete block production, GLO" (accessed 20170823). Exrapolation based on specific geography has adjusted.
  production volume 224910 m3
    Calculated from production volume of reference product using the relative outputs.
  property price 0 EUR2005; name wastewater_output_price_EUR2005
  properties: water content 2225.48, wet mass 1000 kg, dry mass 0.449139 kg, carbon content, fossil 0.027074
  note on carbon content, fossil: TOC =0.01216 kg/m3 (Tab A.20, ecoinvent v2.2 report 13_I). TOC was considered as Total Carbon.
- clay pit infrastructure: 1.67e-10 unit; = 0.000000000167*aac_block; lognormal variance with pedigree 0.6522, pedigree (1,1,2,5,1)
  (same comment as for packing, clay product)
- gypsum, mineral: 0.02 kg; = 0.02*aac_block; lognormal variance with pedigree 0.1294, pedigree (4,3,2,1,5)
  Average data reported by 3 units.
  properties: dry mass 1 kg, wet mass 1 kg
- electricity, medium voltage: 0.021983 kWh; = 0.021983*aac_block; lognormal variance with pedigree 0.0514, pedigree (2,3,2,1,1)
  Average data reported by 3 units
  EcoSpold01Location=UCTE
- tap water: 0.791666 kg; name tap_water_input; = 0.791667*aac_block; source Dansk Teknologisk Institut 1995; lognormal variance with pedigree 0.0114, pedigree (2,3,2,1,1)
  Average data reported by 3 units
  EcoSpold01Location=RER
  properties: water content 2962.17, carbon content, fossil 0.00178991, wet mass 1 kg, dry mass 0.000337476 kg
  note on carbon content, fossil: Bicarbonate content is 2.93 mol/m3. CO2 content is 0.1 mol/m3 (ecoinvent v2.2 report 8, Tab 93.1).

## Emissions to nature
- Water [water, unspecified]: 0.000589616 m3; name water_to_water_unspecified; = 0.00058961695*aac_block; lognormal variance with pedigree 0.0429, pedigree (2,2,2,5,1)
  Referred ecoinvent dataset "concrete block production, GLO" (accessed 20170823). Exrapolation based on specific geography has adjusted.
  property dry mass 0 kg; name DM
  property fraction, origin: unspecified 0; name fraction_origin_unspecified_Ww
  property carbon content, non-fossil 0; name C_content_non_fossil
  property wet mass 1000 kg; name WM
  property fraction, origin: salt water 0; name fraction_origin_salt_water_Ww
  property fraction, origin: fresh water 1; name fraction_origin_fresh_water_Ww
  property water in wet mass 1000 kg; name WWM
  property carbon content, fossil 0; name C_content_fossil
- Water [air, unspecified]: 0.00011875 m3; name water_to_air_unspecified; = 0.00011875005*aac_block; lognormal variance with pedigree 0.0429, pedigree (2,2,2,5,1)
  (same comment as for Water)
  property fraction, origin: fresh water 1; name fraction_origin_fresh_water
  property fraction, origin: salt water 0; name fraction_origin_salt_water
  property fraction, origin: unspecified 0; name fraction_origin_unspecified

## Sampling procedure
Data collected by visiting the one site near by hyderabad and 2 sites in southern part of India. So, data collected for 3 plants in India.

## Extrapolations
Some parameters were referred from ecoinvent dataset concrete block production, GLO accessed (20170823) and uncertainty has been adjusted accordingly.

## Review by Marion Sié 2017-11-09
According to the 3 plants interviewed, the production of AAC blocks in IN does not require sand as an input, contrary to AAC blocks in CH (cf. autoclaved aerated concrete block production / CH (accessed 31/11/2017)). In return, a relatively high quantity of fly ash is involved in the recipe.
