# aircraft production, passenger aircraft, very short haul

Dataset: EcoSpold 2, unit process
Geography: GLO
Time period: 2016-01-01 to 2019-12-31
Technology level: current
Classification: ISIC rev.4 ecoinvent: 3030:Manufacture of air and spacecraft and related machinery
Classification: EcoSpold01Categories: transport systems/airplane
Scenario: Business-as-Usual
System model: Allocation at the point of substitution
Generated by: Philippa Notten
Published in: Notten, P.J. 2018
Database: ecoinvent
isCopyrightProtected: true
accessRestrictedTo: 1

## General comment
The dataset represents the production of a passenger aircraft used for very short haul flights (<800 km). The average very short haul aircraft was calculated from global flight data (OAG, 2016), with 40 different aircraft types used for flights of less than 800 km weighted according to their passenger kms in 2016.
Passenger aircraft were defined as any aircraft carrying passengers, whether or not they also carried belly freight. For aircraft carrying both passengers and belly-freight, allocation factors for passengers and belly-freight were calculated according to EN 16’058, using the weight of the passengers and luggage (105 kg / passenger according to EASA 2009) and the weight of the freight on the flight. Depending on the flight, passengers are thus allocated between 33% and 100% of the burdens of the flight. The unweighted average allocation factor for passengers over all flights is 86%.
The material composition of the average very short haul aircraft was calculated using data on the operating empty weight (OEW) and the material breakdown (percentage aluminium, titanium, nickel, steel and composite) (both obtained from Cox, Jemiolo & Mutel (2018)). The material breakdown is presented in Cox, Jemiolo & Mutel (2018) as a function of the production year, so the average of the material breakdown for the first and last years of production is applied to calculate the materials for each aircraft. For passenger aircraft the breakdown is approximately: 60% aluminium, 25% composite and 12% steel, with the remained formed from nickle and titanium. The composite material used for aircraft manufacture is modelled in the dataset as carbon fibre reinforced plastic, using the dataset from Cox, Jemiolo and Mutel (2018).
Production data (energy and water) and emissions (VOCs and wastewater) from Airbus’ European manufacturing facilities (Airbus, 2017) are used to model aircraft production, with the Airbus data extrapolated to the average very short haul aircraft using a per seat calculation. I.e. Airbus data on the number and models of airplane deliveries (Airbus, 2016) is used along with the maximum seating capacity of the aircraft models (from Cox, Jemiolo and Mutel (2018) to determine the consumption/emission of materials per aircraft seat, which is then multiplied by the average number of seats in the aircraft of the size-class (determined from the maximum seating capacity of the different aircraft models using data in Cox, Jemiolo and Mutel (2018)). The breakdown of the total energy used in manufacturing into different fuels and electricity is based on data for Airbus internationally (Airbus, 2016).
References:
Airbus (2016) Annual Report 2016. Airbus
Airbus (2017) Blue5 – Sustainable Aviation Industrial Environmental Roadmap: 2017 Status. Airbus
Cox, B., Jemiolo, W. & Mutel, C. (2018) Life cycle assessment of air transport and the Swiss commercial air transport fleet. Transport Research Part D. 58. 1-13
EASA (2009) Survey on the standard weights of passengers and baggage: Final Report. European Aviation Safety Agency
EEA (2017) EMEP/EEA air pollutant emission inventory guidebook 2016 – Update July 2017: Category 1.A.3.a Aviation. European Environmental Agency.
ICAO (2015) ICAO Data+. International Civil Aviation Organization
OAG (2016) OAG Analytics. OAG"

## Included activities start
Aircraft production, starting with receiving/obtaining the material inputs required for construction.

## Included activities end
The activity ends with the production of one aircraft. The dataset includes the materials (aluminium, titanium, nickel and composite materials), energy (electricity and heat), kerosene (for aircraft testing) and water used in the production. Emissions of VOCs are also included. Emissions from the production of composite materials are included via an input of carbon fibre reinforced plastic. Electronics and interior materials (plastics, textiles etc.) have not been included due to a lack of available data.

## Geography
The aircraft modelled is representative of the global aircraft fleet (i.e.plane weight, number of seats etc). Production data are taken from European production sites.

## Technology
The aircraft modelled is representative of the global aircraft fleet operating in 2016. Current production technology, with the evolving material composition of planes taken into account by taking the material composition as the average of the first and last years of production.

## Time period
Production data is for 2016. The global aircraft fleet is also for 2016.

## Parameters
- fraction, water, to water: 0.9 dimensionless
- fraction, water, to air: 0.1 dimensionless

## Reference product
- aircraft, passenger, very short haul: 1 unit; name aircraft; By-product classification allocatable product; CPC 49623: Aeroplanes and other powered aircraft of an unladen weight exceeding 2000 kg
  production volume 72 unit; name PV
    Estimated value based on annual passenger.kms (oag, 2016) and the passenger performance (lifetime passenger.kms) of the average very short haul passenger aircraft. Average lifetime kilometres are a weighted average of the lifetime kilometres and maximum number of seats over 40 different aircraft (Cox et al., 2018), weighted according to passenger.kms in 2016 (oag, 2016). Assumed load factor of 80%.
  property lifetime capacity [metric ton*km] 6.71e8 metric ton*km
    Based on lifetime passenger.kms and a passenger weight factor of 105 kg (EASA, 2009). Reference: EASA (2009) Survey on the standard weights of passengers and baggage: Final Report. European Aviation Safety Agency
  property price 677854 EUR2005; name aircraft_price_EUR2005
    Calculated based on inputs: The price of the product has been calculated as a sum of the values of the material and energy inputs for this product. This value is therefore a rough estimation. It may underestimate the real price since there are additional expenses when producing any product. These expences can include for example labour costs, treatment of waste materials and profit for the producer. Please consider carefully whether this level of data quality is acceptable for your application.
  property true value 677854; name aircraft_true_value
    allocation property applied in "true value" allocation // value calculated from revenue

## By-products
- electricity, for reuse in municipal waste incineration only: 0 kWh; CPC 17100: Electrical energy; By-product classification allocatable product; pedigree (1,1,1,1,1)
  Net electricity generated from this waste and used in internal MSWI plant energy redistribution.
  Uncertainty: uncertainty is calculated from uncertainties in waste composition and uncertainties in energy efficiency and the uncertainty in internal energy demand
  production volume 119843 kWh
  property exergy 3.6 MJ; name E_el_prod_MSWI_exergy
    This exergy property is based on the exergy content of the product.
  property true value relation 3.6; name E_el_prod_MSWI_true_value_relation
    property to calculate "true value" from
  property price 0.1 EUR2005; name E_el_prod_MSWI_price_EUR2005
    Estimated to be the same price as in case of electricity, medium voltage.
  property true value 131.115
    allocation property applied in "true value" allocation // value calculated from true value relation
- heat, for reuse in municipal waste incineration only: 0 MJ; CPC 17300: Steam and hot water; By-product classification allocatable product; pedigree (1,1,1,1,1)
  Net useful heat generated from this waste and used in internal MSWI plant energy redistribution.
  Uncertainty: uncertainty is calculated from uncertainties in waste composition and uncertainties in energy efficiency and the uncertainty in internal energy demand
  production volume 839017 MJ
  property true value relation 0.1842; name E_th_prod_MSWI_true_value_relation
    property to calculate "true value" from
  property exergy 0.1842 MJ; name E_th_prod_MSWI_exergy
    This exergy property is based on the exergy content of the product.
  property price 0.0106 EUR2005; name E_th_prod_MSWI_price_EUR2005
    Average European district heat price from Ecoheatcool and Euroheat 2005-2006, Ecoheat Work package 1: The European heat market. Final report. 10.6 EUR/GJ i s the price of district heat. http://www.solarthermalworld.org/files/Ecoheatcool%20WP1%20Web.pdf?download
  property true value 47.0561
    (same comment as for electricity, for reuse in municipal waste incineration only)
- zinc concentrate: 0 kg; CPC 14290: Other non-ferrous metal ores and concentrates (other than uranium or thorium ores and concentrates); By-product classification allocatable product
  Calculated value from the knowledge of the properties of both products.
  production volume 0.0488778 kg
  property price 0.38 EUR2005; name ByP_price_EUR2005
    Temporary price data. Calculated as 90% of purchasers price based on: Zinc content in concentrate 53%. Concentrate price per kg Zn 86.5% of refined Zn price (13.5% treatment charges according to CHR Metals Limited 2005: Dynamic cost curves. http://www.minecost.com/dynamic.pdf). 2004 zinc price from USGS (2007) Mineral commodity summaries 2007. <http://minerals.usgs.gov/minerals/pubs/mcs/2007/mcs2007.pdf> [Accessed 25 May 2010]
  property zinc content 0.53; name zinc_C_zinc_concentrate
    Zinc content on a dry matter basis. Value taken from teh "zinc mine operation" /GLO dataset.
  property dry mass 1 kg; name DM_zinc_concentrate
  property carbon content 0
    carbon content on a dry matter basis (reserved; not for manual entry)
  property true value 2.25486e-6
    allocation property applied in "true value" allocation // value calculated from revenue
  properties: wet mass 1 kg, water content 0, carbon content, non-fossil 0, carbon content, fossil 0, water in wet mass 0 kg, carbon allocation 0 kg
- iron scrap, sorted, pressed: 0 kg; By-product classification Recyclable; CPC 39310: Slag, dross, scalings and other waste from the manufacture of iron or steel; pedigree (1,1,1,1,1)
  Iron scrap recovered from this waste.
  production volume 35405.8 kg
  property price 0.175 EUR2005
    Temporary price data. Calculated as 90% of purchasers price based on: 2005 import and export prices (total trades (USD) divided by total weight (kg) in biggest economies of the world: EU27, USA, Brasil, China, India, Japan and Russia) from UN Commodity Trade Statistics Database (http://data.un.org/Explorer.aspxDatabase [Accessed 2011.06.20]). Commodity: Waste or scrap, of cast iron
  property carbon content 0
    carbon content on a dry matter basis (reserved; not for manual entry)
  property true value 0.580637
    allocation property applied in "true value" allocation // value calculated from revenue
  properties: water content 0, water in wet mass 0 kg, carbon content, fossil 0, dry mass 1 kg, carbon content, non-fossil 0, wet mass 1 kg, carbon allocation 0 kg
- copper: 0 kg; source Rentz O. 1999; By-product classification allocatable product; CPC 41413: Refined copper and copper alloys, unwrought; master alloys of copper
  Literature value. Copper uses: Before end-use copper is manufactured into semi fabricated products, such as shapes and ingots (known as 'semis'). These manufacturing processes are subdivided into hot working, cold working and, if necessary, process annealing. Few of the semis are ready for use as such. They more typically travel to first-stage manufacturers, who make metal rods, wire, and casting, and then to component manufacturers who produce such things as motors, valves, and insulated cables The components in turn are incorporated by final-stage manufacturers into a variety of finished products - automobiles, commercial buildings, residential housing, and so forth. These uses account for about 79% of the world-wide consumption of copper.
  production volume 140240 kg
  property price 5.52 EUR2005
    Literature value (http://www.economist.com/news/business/21576714-mining-industry-has-enriched-chile-its-future-precarious-copper-solution). Average price between 20015 and 2013.
  property carbon content 0
    carbon content on a dry matter basis (reserved; not for manual entry)
  property true value 3583.9
    allocation property applied in "true value" allocation // value calculated from revenue
  properties: dry mass 1 kg, water in wet mass 0 kg, wet mass 1 kg, carbon content, non-fossil 0, water content 0, carbon content, fossil 0, carbon allocation 0 kg
- iron scrap, unsorted: 0 kg; source European Aluminium Association 2008; CPC 39310: Slag, dross, scalings and other waste from the manufacture of iron or steel; By-product classification Recyclable; pedigree (1,1,1,1,1)
  production volume 1660.92 kg
  property price 0.149 EUR2005; name ironScrapAmount_price_EUR2005
    Temporary price data. Calculated as 90% of purchasers price based on: estimated at 85% of sorted scrap
  property carbon content 0
    carbon content on a dry matter basis (reserved; not for manual entry)
  property true value 1.14573
    allocation property applied in "true value" allocation // value calculated from revenue
  properties: water in wet mass 0 kg, water content 0, carbon content, fossil 0, carbon content, non-fossil 0, dry mass 1 kg, wet mass 1 kg, carbon allocation 0 kg
- aluminium oxide, non-metallurgical: 0 kg; source European Aluminium Association 2008; CPC 41432: Alumina (aluminium oxide), except artificial corundum; By-product classification allocatable product; CAS 1344-28-1; pedigree (1,1,1,1,1)
  production volume 104516 kg
  property carbon content, non-fossil 0; name C_content_non_fossil
  property price 0.28 EUR2005; name Al2O3Amount_price_EUR2005
    From UN trade database. http://data.un.org/ Import data from the largest economies of the world are used (Brazil, India, USA, China, Japan and EU-27).
  property dry mass 1 kg; name DM
  property water content 0; name water_content
  property wet mass 1 kg; name WM
  property water in wet mass 0 kg; name WWM
  property carbon content, fossil 0; name C_content_fossil
  property carbon content 0
    carbon content on a dry matter basis (reserved; not for manual entry)
  property true value 135.483
    allocation property applied in "true value" allocation // value calculated from revenue
  properties: carbon allocation 0 kg
- aluminium, cast alloy: 0 kg; source European Aluminium Association 2008; By-product classification allocatable product; CPC 41431: Unwrought aluminium; pedigree (1,1,1,1,1)
  EcoSpold01Location=RER
  production volume 976990 kg
  property price 1.3 EUR2005; name castAlloyAmount_price_EUR2005
    Temporary price data. Calculated as 90% of purchasers price based on: Source: London Metal Exchange, Aluminium alloy price for 2005
  property carbon content 0
    carbon content on a dry matter basis (reserved; not for manual entry)
  property true value 5880.03
    allocation property applied in "true value" allocation // value calculated from revenue
  properties: water in wet mass 0 kg, carbon content, non-fossil 0, water content 0, dry mass 1 kg, carbon content, fossil 0, wet mass 1 kg, carbon allocation 0 kg
- aluminium, wrought alloy: 0 kg; source European Aluminium Association 2008; By-product classification allocatable product; CPC 4153: Semi-finished products of aluminium or aluminium alloys; pedigree (1,1,1,1,1)
  production volume 427708 kg
  property price 1.44 EUR2005; name secondaryAluminiumOutput_price_EUR2005
  properties: wet mass 1 kg, water content 0, carbon content, fossil 0, water in wet mass 0 kg, carbon content, non-fossil 0, dry mass 1 kg, carbon content 0, carbon allocation 0 kg, true value 2851.38

## Inputs from technosphere
- wastewater, unpolluted: 0 m3; name waste_water; pedigree (1,1,1,1,1)
  Extrapolated value from literature: Airbus European sites environmental data (Airbus Blue5, 2017). "Industrial water discharge" assumed to be discharged to municipal water treatment. 10% of water input is estimated to be evaporated (with percentage of evaporative loss from water consumption and discharge data available in Airbus AR (2016)), and the balance discharged to surface water. Scaled to average very short-haul plane by applying a per seat calculation using Airbus plane production data (Airbus AR, 2016) and maximum number of seats per aircraft type (Cox, Jemiolo & Mutel, 2018). Weighting and types of planes making up the very short-haul distance class from global flight data for 2016 (OAG 2016).
  EcoSpold01Location=CH
  production volume 0 m3
    Calculated from production volume of reference product using the relative outputs.
  property price 0 EUR2005; name waste_water_price_EUR2005
  properties: dry mass 0.337476 kg, carbon content, non-fossil 0.00178991, wet mass 1000 kg, carbon content, fossil 0.00178991, water content 2962.17
  note on carbon content, fossil: Assumed to be like in tap water. Bicarbonate content is 2.93 mol/m3. CO2 content is 0.1 mol/m3 (ecoinvent v2.2 report 8, Tab 93.1).
- nickel, 99.5%: 917.937 kg; name nickel; lognormal variance with pedigree 0.0014, pedigree (2,1,2,1,1)
  Nickel is estimated to make up 2% of a very short-haul passenger aircraft, with an operating empty weight of 38 tonnes (aircraft data from Cox, Jemiolo & Mutel (2018) and weighting and types of planes making up the very short-haul distance class from global flight data for 2016 (OAG 2016))
  properties: wet mass 1 kg, dry mass 1 kg
- carbon fibre reinforced plastic, injection moulded: 9044.65 kg; name CFRP; lognormal variance with pedigree 0.0014, pedigree (2,1,2,1,1)
  Composite is estimated to make up 24% of a very short-haul passenger aircraft, with an operating empty weight of 38 tonnes (aircraft data from Cox, Jemiolo & Mutel (2018) and weighting and types of planes making up the very short-haul distance class from global flight data for 2016 (OAG 2016))
  properties: carbon content, fossil 0.68, dry mass 1 kg, wet mass 1 kg
- titanium, primary: 1775.51 kg; name titanium; lognormal variance with pedigree 0.0014, pedigree (2,1,2,1,1)
  Titanium is estimated to make up 5% of a very short-haul passenger aircraft, with an operating empty weight of 38 tonnes (aircraft data from Cox, Jemiolo & Mutel (2018) and weighting and types of planes making up the very short-haul distance class from global flight data for 2016 (OAG 2016)). Because the material breakdown for the different aircraft has changed over time, the percentage applied from the time series data given in Cox, Jemiolo & Mutel (2018) is the average of the first and final years in which the particualr aircraft has been produced.
  properties: wet mass 1 kg, dry mass 1 kg
- waste plastic, mixture: 0 kg; name plastic_scrap; pedigree (1,1,1,1,1)
  Composite (carbon fibre reinforced plastic) at end of aircraft life, assumed to be represented by a mixed plastics waste stream. Set equal to composite (carbon fibre reinforced plastic)l use for production.
  production volume 0 kg
    Calculated from production volume of reference product using the relative outputs.
  property price 0 EUR2005; name plastic_scrap_price_EUR2005
  properties: carbon content, fossil 0.747344, water content 0.180638, dry mass 0.847 kg, wet mass 1 kg
- aluminium, wrought alloy: 21529.2 kg; name aluminium; lognormal variance with pedigree 0.0014, pedigree (2,1,2,1,1)
  Aluminium is estimated to make up 57% of a very short-haul passenger aircraft, with an operating empty weight of 38 tonnes (aircraft data from Cox, Jemiolo & Mutel (2018) and weighting and types of planes making up the very short-haul distance class from global flight data for 2016 (OAG 2016)). Because the material breakdown for the different aircraft has changed over time, the percentage applied from the time series data given in Cox, Jemiolo & Mutel (2018) is the average of the first and final years in which the particualr aircraft has been produced.
  properties: wet mass 1 kg, dry mass 1 kg
- scrap steel: 0 kg; name steel_scrap; pedigree (1,1,1,1,1)
  Steel at end of aircraft life. Set equal to steel use for production.
  production volume 0 kg
    Calculated from production volume of reference product using the relative outputs.
  property price 0 EUR2005; name steel_scrap_price_EUR2005
  properties: wet mass 1 kg, dry mass 1 kg
- electricity, medium voltage: 564.555 kWh; lognormal variance with pedigree 0.0041, pedigree (3,3,2,3,2)
  Extrapolated value from literature: Total energy use at Airbus' European sites (Airbus Blue5, 2017), with the breakdown into electricity, stationary fuel and mobile fuel using Airbus group data (Airbus AR, 2016). Scaled to average very short-haul plane by applying a per seat calculation using Airbus plane production data (Airbus AR, 2016) and maximum number of seats per aircraft type (Cox, Jemiolo & Mutel, 2018). Weighting and types of planes making up the very short-haul distance class from global flight data for 2016 (OAG 2016).
- scrap copper: 0 kg; name copper_scrap; pedigree (1,1,1,1,1)
  Titanium and nickel at end of aircraft life. Assumed to be represented by scrap copper as all three metals are first-row transition metals. Set equal to the titanium and nickel used for production.
  production volume 0 kg
    Calculated from production volume of reference product using the relative outputs.
  property price 0 EUR2005; name copper_scrap_price_EUR2005
  properties: wet mass 1 kg, dry mass 1 kg
- heat, district or industrial, natural gas: 1.86802e6 MJ; lognormal variance with pedigree 0.0041, pedigree (3,3,2,3,2)
  Extrapolated value from literature: Total energy use at Airbus' European sites (Airbus Blue5, 2017), with the breakdown into electricity, stationary fuel and mobile fuel using Airbus group data (Airbus AR, 2016). Natural gas makes up 96% of stationary fuel use (Airbus AR, 2016). Scaled to average very short-haul plane by applying a per seat calculation using Airbus plane production data (Airbus AR, 2016) and maximum number of seats per aircraft type (Cox, Jemiolo & Mutel, 2018). Weighting and types of planes making up the very short-haul distance class from global flight data for 2016 (OAG 2016).
- scrap aluminium: 0 kg; name aluminium_scrap; pedigree (1,1,1,1,1)
  Aluminium at end of aircraft life. Set equal to aluminium use for production.
  production volume 0 kg
    Calculated from production volume of reference product using the relative outputs.
  property price 0 EUR2005; name aluminium_scrap_price_EUR2005
  properties: wet mass 1 kg, dry mass 1 kg
- heat, district or industrial, other than natural gas: 55030.7 MJ; lognormal variance with pedigree 0.0041, pedigree (3,3,2,3,2)
  (same comment as for heat, district or industrial, natural gas)
  properties: corresponding fuel use, propane, furnace >100kW 1.05263 MJ
  note on corresponding fuel use, propane, furnace >100kW: Lower heating value of the fuel input related to the heat/electricity output, taken directly from ecoinvent v3.0 dataset "heat production, natural gas, at industrial furnace >100kW, GLO 2000".
- steel, chromium steel 18/8: 4348.25 kg; name steel; lognormal variance with pedigree 0.0014, pedigree (2,1,2,1,1)
  Steel is estimated to make up 12% of a very short-haul passenger aircraft, with an operating empty weight of 38 tonnes (aircraft data from Cox, Jemiolo & Mutel (2018) and weighting and types of planes making up the very short-haul distance class from global flight data for 2016 (OAG 2016))
  properties: wet mass 1 kg, carbon content, fossil 0.0008, dry mass 1 kg
  note on carbon content, fossil: Stainless steel model is the grade 304 steel (18/8 stainless, 18% chromium 8% nickel; max. 0.08% C)
- tap water: 1.38081e6 kg; name water_input; lognormal variance with pedigree 0.0041, pedigree (3,3,2,3,2)
  Extrapolated value from literature: Airbus European sites environmental data (Airbus Blue5, 2017). Scaled to average very short-haul plane by applying a per seat calculation using Airbus plane production data (Airbus AR, 2016) and maximum number of seats per aircraft type (Cox, Jemiolo & Mutel, 2018). Weighting and types of planes making up the very short-haul distance class from global flight data for 2016 (OAG 2016).
  properties: dry mass 0.000337476 kg, water content 2962.17, wet mass 1 kg, carbon content, fossil 0.00178991
  note on carbon content, fossil: Bicarbonate content is 2.93 mol/m3. CO2 content is 0.1 mol/m3 (ecoinvent v2.2 report 8, Tab 93.1).
- kerosene: 0 kg; pedigree (1,1,1,1,1)
  Jet fuel used for testing. Extrapolated value from literature: Total energy use at Airbus' European sites (Airbus Blue5, 2017), with the breakdown into electricity, stationary fuel and mobile fuel using Airbus group data (Airbus AR, 2016). Jet fuel makes up 97% of mobile fuel use (Airbus AR, 2016). Scaled to average very short-haul plane by applying a per seat calculation using Airbus plane production data (Airbus AR, 2016) and maximum number of seats per aircraft type (Cox, Jemiolo & Mutel, 2018). Weighting and types of planes making up the very short-haul distance class from global flight data for 2016 (OAG 2016).
  properties: wet mass 1 kg, dry mass 1 kg, carbon content, fossil 0.85
- wastewater, unpolluted: -1.23762, -153.465 m3 (2 entries); lognormal variance with pedigree 0.0041, pedigree (3,3,2,3,2)
  (same comment as for wastewater, unpolluted)
  production volume 11346.2 m3
- waste plastic, mixture: -870.59, -67.1173, -27.7219, -26.3245, -1004.51, -11.1993, -5.07597, -7032.11 kg (8 entries); lognormal variance with pedigree 0.0408, pedigree (5,1,2,1,1)
  (same comment as for waste plastic, mixture)
  production volume 663349 kg
- scrap steel: -1058.78, -1.33856, -3288.13 kg (3 entries); lognormal variance with pedigree 0.0014, pedigree (2,1,2,1,1)
  Steel at end of aircraft life. Set equal to steel use for production.
  production volume 318907 kg
- scrap copper: -854.383, -40.0858, -1798.98 kg (3 entries); lognormal variance with pedigree 0.0408, pedigree (5,1,2,1,1)
  (same comment as for scrap copper)
  production volume 197542 kg
- scrap aluminium: -6829.24, -320.412, -14379.6 kg (3 entries); lognormal variance with pedigree 0.0014, pedigree (2,1,2,1,1)
  Aluminium at end of aircraft life. Set equal to aluminium use for production.
  production volume 1.57899e6 kg
- kerosene: 208730, 7655.94, 114623, 14837.5, 36129.5, 6029.63, 9820.53, 1.01992e6 kg (8 entries); lognormal variance with pedigree 0.0041, pedigree (3,3,2,3,2)
  (same comment as for kerosene)

## Emissions to nature
- Water [air, unspecified]: 138.081 m3; = water_input* Ref('19b68029-2cdb-46a0-a85f-7e69e4637a8c')/1000; lognormal variance with pedigree 0.0041, pedigree (3,3,2,3,2)
  Extrapolated value from literature: Airbus European sites environmental data (Airbus Blue5, 2017). "Industrial water discharge" assumed to be discharged to municipal water treatment. 10% of water input is estimated to be evaporated (with percentage of evaporative loss from water consumption and discharge data available in Airbus AR (2016)), and the balance discharged to surface water. Scaled to average very short-haul plane by applying a per seat calculation using Airbus plane production data (Airbus AR, 2016) and maximum number of seats per aircraft type (Cox, Jemiolo & Mutel, 2018). Weighting and types of planes making up the very short-haul distance class from global flight data for 2016 (OAG 2016).
- NMVOC, non-methane volatile organic compounds, unspecified origin [air, unspecified]: 998.835 kg; lognormal variance with pedigree 0.0435, pedigree (3,3,2,3,2)
  (same comment as for tap water)
- Water [water, unspecified]: 1088.02 m3; = water_input* Ref('07193d4c-aa62-40f7-8dd4-db8dc65777a9')/1000-(waste_water*-1); lognormal variance with pedigree 0.0041, pedigree (3,3,2,3,2)
  (same comment as for Water)

## Sampling procedure
Global flight databases; literature data. Manufacturing data is taken from the environmental reports of a major Euorpean manufacturer. The aircraft parameters are derived from a dataset covering 99.5% of all scheduled flights in 2016.

## Extrapolations
Manufacturing data has been extrapolated from a single European manufacturer to represent all aircraft production.
