# zinc mine operation

Dataset: EcoSpold 2, unit process
Geography: GLO
Time period: 2012-01-01 to 2019-12-31
Technology level: current
Classification: ISIC rev.4 ecoinvent: 0729:Mining of other non-ferrous metal ores
Synonyms: Lead concentrate; Zinc concentrate
Scenario: Business-as-Usual
System model: Allocation at the point of substitution
Share of production covered: 36 %
Generated by: Eric Van Genderen
Published in: Eric Van Genderen 2016
Database: ecoinvent
isCopyrightProtected: false
accessRestrictedTo: 1

## General comment
The multi-output "zinc mine operation" process includes all steps required to produce zinc concentrate (59% Zn by mass), namely mining, comminution, and flotation. The dataset describes the production of zinc concentrate and additional co-products, primarily lead concentrate. Data is based on a study undertaken by the International Zinc Association (IZA) in conjunction with thinkstep (the LCA practitioner) for reference year 2012. Participating companies provided annual primary data on inputs and outputs for each process step, which was aggregated into a single production-weighted dataset. Zinc concentrate is most often used as an input to zinc smelting, either electrometallurgical smelting or the less common pyrometallurgical smelting.
The below image presents the system boundary in relation to the primary product, zinc concentrate.

## Included activities start
Extraction of ore from the mine

## Included activities end
Module includes comminution and flotation required to produce zinc concentrate and other by-products.
The original data reported a net input of 0.0326 kg of copper slag (0.0339 kg in and 0.0013 kg out). As this product is treated as a waste in the database, it is excluded from the inventory.

## Geography
This dataset is intended to be representative of global zinc concentrate production. Primary data was collected from 24 mines, representing mining operations in Africa, Australia, Europe, and North America.
The below table presents the regional composition of global concentrate
compared to the regional composition of all sites that provided data. The
deviation is the absolute value of the difference in percentage points between the dataset and global compositions. The deviations for the mine regional composition is 23%, resulting in global representativeness of 77%. The study’s global representativeness is therefore deemed to be moderate.

## Technology
The technological representativeness of this dataset is considered to be high as mining and concentration methods for zinc are consistent in all regions.
Mining
The mining of zinc ore includes underground and open cast mining processes. Within the global zinc industry, about 80% of zinc ore comes from underground mines and 20% from open pit or combination mines.
- Underground Mining: Access is via vertical shafts or inclined roadways. There are usually two access routes (one for mining personnel and materials, and one for the ore) for safety and for ease of ventilation (fresh air comes in one and is then exhausted out of the other). These are permanent structures and therefore require strong roof supports (often including 'bolts' into the rock to tie the layers together for strength). Once at the correct depth has been reached, horizontal tunnels are driven to reach the ore deposit. These are often temporary, so the support requirements are less substantial. Transport for personnel and materials can be by train, truck or conveyor belts. The largest share of the consumed fuels is diesel followed by electricity. Other major inputs include explosives and water.
- Open Pit Mining: Hard-rock surface mining usually includes drilling, blasting, or a combination of both processes, and then lifting of the broken ore either into trucks or onto conveyors for transportation to the processing plant. This lifting is usually by excavator (electric or hydraulic; with shovel or backhoe configuration) or front-end loader.
Benefication (Comminution and Flotation)
Zinc ore is milled and mixed with water to recover a fine concentrate by gravity and elutriation techniques, creating a slurry. The separation process of the metal from the slurry is realized through the addition of various floatation chemicals.

## Time period
All primary data collected for this study is considered to be representative of the year 2012. Primary data used from the previous 2009 study is representative of production in the years 2005 & 2006, however it is valid to assume the technology has not significantly changed since then.

## Parameters
- fraction, process water, to air: 0.15 dimensionless; name fraction_PW_to_air; lognormal variance with pedigree 0.092025, pedigree (4,4,3,2,4)

## Reference product
- copper concentrate, sulfide ore: 1 kg; name copper_conc; By-product classification allocatable product; CPC 14290: Other non-ferrous metal ores and concentrates (other than uranium or thorium ores and concentrates); pedigree (1,1,1,1,1)
  Amount and activity link based on primary data collected from participating companies.
  production volume 1.76981e9 kg; = copper_conc / zinc_conc * zinc_conc_PV
    Calculated from the production volume of zinc concentrate in proportion to the respective output amounts.
  property vanadium content 2.15e-6; name copper_conc_V_content
    vanadium content on a dry matter basis; Calculated based on difference between inputs from environment and total of outputs (if any) of metal. Difference is allocated by mass between metal co-products.
  property titanium content 7.93e-5; name copper_conc_Ti_content
    titanium content on a dry matter basis; Calculated based on difference between inputs from environment and total of outputs (if any) of metal. Difference is allocated by mass between metal co-products.
  property aluminium content 0.00168; name copper_conc_Al_content
    aluminium content on a dry matter basis; Calculated based on difference between inputs from environment and total of outputs (if any) of metal. Difference is allocated by mass between metal co-products.
  property concentration, magnesium 0.0333 kg/kg; name copper_conc_Mg_concentration
    magnesium content on a fresh matter basis; Calculated based on difference between inputs from environment and total of outputs (if any) of metal. Difference is allocated by mass between metal co-products.
  property concentration, iron 0.00201 kg/kg; name copper_conc_concentration_Fe
    Calculated based on difference between inputs from environment and total of outputs (if any) of metal. Difference is allocated by mass between metal co-products.
  property price 0.534 EUR2005; name copper_conc_price_EUR2005
    Temporary price data. Calculated as 90% of purchasers price based on: Concentrate per kg Cu (3.15). Concentrate price per kg Cu 77% of refined Cu price (23% treatment and refining charges according to Barr G, Defreyne J, Jones D, Mean R (2005). On-site processing vs. sale of copper concentrates. Perth: CESL. http://www.cesl.com/DocumentViewer.aspx?elementId=152856&portalName=tc ). 2004 copper price from USGS (2007) Mineral commodity summaries 2007. <http://minerals.usgs.gov/minerals/pubs/mcs/2007/mcs2007.pdf> [Accessed 25 May 2010]
  property manganese content 0.000105; name copper_conc_Mn_content
    manganese content on a dry matter basis; Calculated based on difference between inputs from environment and total of outputs (if any) of metal. Difference is allocated by mass between metal co-products.
  property concentration, nickel 5.54e-7 kg/kg; name copper_conc_Ni_concentration
    nickel content on a fresh matter basis; Calculated based on difference between inputs from environment and total of outputs (if any) of metal. Difference is allocated by mass between metal co-products.
  property concentration, lead 0.0176 kg/kg; name copper_conc_concentration_Pb
    (same comment as for copper concentrate, sulfide ore)
  property concentration, cadmium 5.3e-5 kg/kg; name copper_conc_concentration_Cd
    (same comment as for copper concentrate, sulfide ore)
  property concentration, silver 0.000171 kg/kg; name copper_conc_concentration_Ag
    (same comment as for copper concentrate, sulfide ore)
  property concentration, calcium 0.0572 kg/kg; name copper_conc_Ca_concentration
    calcium content on a fresh matter basis; Calculated based on difference between inputs from environment and total of outputs (if any) of metal. Difference is allocated by mass between metal co-products.
  property barium content 8.92e-6; name copper_conc_Ba_content
    barium content on a dry matter basis; Calculated based on difference between inputs from environment and total of outputs (if any) of metal. Difference is allocated by mass between metal co-products.
  property concentration, copper 0.35 kg/kg; name copper_conc_concentration_Cu
    Calculated based on primary data from participating companies (production-weighted average)
  property gold content 0.00108; name copper_conc_Au_content
    gold content on a dry matter basis; Calculated based on difference between inputs from environment and total of outputs (if any) of metal. Difference is allocated by mass between metal co-products.
  property carbon content 0
    carbon content on a dry matter basis (reserved; not for manual entry)
  property true value 0.0435419; name copper_conc_true_value
    allocation property applied in "true value" allocation // value calculated from revenue
  properties: carbon content, fossil 0, carbon content, non-fossil 0, dry mass 1 kg, water in wet mass 0 kg, wet mass 1 kg, water content 0, carbon allocation 0 kg
- zinc concentrate: 0 kg; name zinc_conc; CPC 14290: Other non-ferrous metal ores and concentrates (other than uranium or thorium ores and concentrates); By-product classification allocatable product; pedigree (1,1,1,1,1)
  Amount and activity link based on primary data collected from participating companies.
  production volume 2.17051e10 kg; name zinc_conc_PV
    Obtained from the International Lead and Zinc Study Group (http://www.ilzsg.org) for the year 2012, version published in 2016. 12,806,000 t by zinc content, scaled to zinc concentrate based on zinc content of 59%.
  property concentration, silver 0.000171 kg/kg; name zinc_conc_concentration_Ag
    (same comment as for copper concentrate, sulfide ore)
  property barium content 8.92e-6; name zinc_conc_Ba_content
    (same comment as for copper concentrate, sulfide ore)
  property titanium content 7.93e-5; name zinc_conc_Ti_content
    (same comment as for copper concentrate, sulfide ore)
  property aluminium content 0.00168; name zinc_conc_Al_content
    (same comment as for copper concentrate, sulfide ore)
  property concentration, calcium 0.0572 kg/kg; name zinc_conc_Ca_concentration
    (same comment as for copper concentrate, sulfide ore)
  property concentration, magnesium 0.0333 kg/kg; name zinc_conc_Mg_concentration
    (same comment as for copper concentrate, sulfide ore)
  property concentration, nickel 5.54e-7 kg/kg; name zinc_conc_Ni_concentration
    (same comment as for copper concentrate, sulfide ore)
  property concentration, iron 0.00201 kg/kg; name zinc_conc_concentration_Fe
    (same comment as for copper concentrate, sulfide ore)
  property vanadium content 2.15e-6; name zinc_conc_V_content
    (same comment as for copper concentrate, sulfide ore)
  property price 0.38 EUR2005
    Temporary price data. Calculated as 90% of purchasers price based on: Zinc content in concentrate 53%. Concentrate price per kg Zn 86.5% of refined Zn price (13.5% treatment charges according to CHR Metals Limited 2005: Dynamic cost curves. http://www.minecost.com/dynamic.pdf). 2004 zinc price from USGS (2007) Mineral commodity summaries 2007. <http://minerals.usgs.gov/minerals/pubs/mcs/2007/mcs2007.pdf> [Accessed 25 May 2010]
  property gold content 0.00108; name zinc_conc_Au_content
    (same comment as for copper concentrate, sulfide ore)
  property manganese content 0.000105; name zinc_conc_Mn_content
    (same comment as for copper concentrate, sulfide ore)
  property concentration, cadmium 5.3e-5 kg/kg; name zinc_conc_concentration_Cd
    (same comment as for copper concentrate, sulfide ore)
  property concentration, lead 0.0176 kg/kg; name zinc_conc_concentration_Pb
    (same comment as for copper concentrate, sulfide ore)
  property zinc content 0.533158; name zinc_conc_Zn_content
    zinc content on a dry matter basis; calculated based on primary data from participating companies (production-weighted average)
  property carbon content 0
    carbon content on a dry matter basis (reserved; not for manual entry)
  property true value 0.38; name zinc_conc_true_value
    allocation property applied in "true value" allocation // value calculated from revenue
  properties: dry mass 1 kg, water content 0, carbon content, non-fossil 0, carbon content, fossil 0, wet mass 1 kg, water in wet mass 0 kg, carbon allocation 0 kg

## By-products
- bulk lead-zinc concentrate: 0 kg; name bulk_conc; CPC 14290: Other non-ferrous metal ores and concentrates (other than uranium or thorium ores and concentrates); By-product classification allocatable product; pedigree (1,1,1,1,1)
  Amount and activity link based on primary data collected from participating companies. Company sells a mix of lead and zinc concentrate for further processing.
  production volume 3.25172e8 kg; = bulk_conc / zinc_conc * zinc_conc_PV
    Calculated from production volume of reference product using the relative outputs.
  property concentration, calcium 0.0572 kg/kg; name bulk_conc_Ca_concentration
    (same comment as for copper concentrate, sulfide ore)
  property aluminium content 0.00168; name bulk_conc_Al_content
    (same comment as for copper concentrate, sulfide ore)
  property vanadium content 2.15e-6; name bulk_conc_V_content
    (same comment as for copper concentrate, sulfide ore)
  property price 0.363 EUR2005; name bulk_conc_price_EUR2005
    Price roughly estimated based on amount of contained metals which are likely to be extracted in zinc-lead smelting facility. It is assumed that half of the theoretical economic value of the contained metals (calculated based on metal prices implemented in ecoinvent) can be recovered.
  property concentration, cadmium 5.3e-5 kg/kg; name bulk_conc_concentration_Cd
    (same comment as for copper concentrate, sulfide ore)
  property titanium content 7.93e-5; name bulk_conc_Ti_content
    (same comment as for copper concentrate, sulfide ore)
  property manganese content 0.000105; name bulk_conc_Mn_content
    (same comment as for copper concentrate, sulfide ore)
  property zinc content 0.305
    (same comment as for zinc concentrate)
  property concentration, nickel 5.54e-7 kg/kg; name bulk_conc_Ni_concentration
    (same comment as for copper concentrate, sulfide ore)
  property concentration, magnesium 0.0333 kg/kg; name bulk_conc_Mg_concentration
    (same comment as for copper concentrate, sulfide ore)
  property concentration, iron 0.00201 kg/kg; name bulk_conc_concentration_Fe
    (same comment as for copper concentrate, sulfide ore)
  property gold content 0.00108; name bulk_conc_Au_content
    (same comment as for copper concentrate, sulfide ore)
  property concentration, silver 0.000171 kg/kg; name bulk_conc_concentration_Ag
    (same comment as for copper concentrate, sulfide ore)
  property barium content 8.92e-6; name bulk_conc_Ba_content
    (same comment as for copper concentrate, sulfide ore)
  property lead content 0.207
    (same comment as for copper concentrate, sulfide ore)
  property carbon content 0
    carbon content on a dry matter basis (reserved; not for manual entry)
  property true value 0.00543825; name bulk_conc_true_value
    allocation property applied in "true value" allocation // value calculated from revenue
  properties: carbon content, fossil 0, water in wet mass 0 kg, wet mass 1 kg, carbon content, non-fossil 0, dry mass 1 kg, water content 0, carbon allocation 0 kg
- gold, unrefined: 0 kg; name gold_unrefined; By-product classification allocatable product; CPC 4132: Gold (including gold plated with platinum), unwrought or in semi-manufactured forms, or in powder form; CAS 7440-57-5; pedigree (1,1,1,1,1)
  Amount and activity link based on primary data collected from participating companies.
  production volume 1471.69 kg; = gold_unrefined / zinc_conc * zinc_conc_PV
    Calculated from production volume of reference product using the relative outputs.
  property gold content 0.85
    gold content on a dry matter basis; calculated based on primary data from participating companies (production-weighted average)
  property concentration, silver 0.000171 kg/kg; name gold_unrefined_concentration_Ag
    (same comment as for copper concentrate, sulfide ore)
  property concentration, calcium 0.0572 kg/kg; name gold_unrefined_Ca_concentration
    (same comment as for copper concentrate, sulfide ore)
  property titanium content 7.93e-5; name gold_unrefined_Ti_content
    (same comment as for copper concentrate, sulfide ore)
  property concentration, iron 0.00201 kg/kg; name gold_unrefined_concentration_Fe
    (same comment as for copper concentrate, sulfide ore)
  property barium content 8.92e-6; name gold_unrefined_Ba_content
    (same comment as for copper concentrate, sulfide ore)
  property concentration, lead 0.0176 kg/kg; name gold_unrefined_concentration_Pb
    (same comment as for copper concentrate, sulfide ore)
  property vanadium content 2.15e-6; name gold_unrefined_V_content
    (same comment as for copper concentrate, sulfide ore)
  property concentration, magnesium 0.0333 kg/kg; name gold_unrefined_Mg_concentration
    (same comment as for copper concentrate, sulfide ore)
  property concentration, nickel 5.54e-7 kg/kg; name gold_unrefined_Ni_concentration
    (same comment as for copper concentrate, sulfide ore)
  property concentration, cadmium 5.3e-5 kg/kg; name gold_unrefined_concentration_Cd
    (same comment as for copper concentrate, sulfide ore)
  property manganese content 0.000105; name gold_unrefined_Mn_content
    (same comment as for copper concentrate, sulfide ore)
  property price 9010 EUR2005; name gold_unrefined_price_EUR2005
    Calculated value. Calculated based on the gold content (0.85) and the price of gold (10600EUR).
  property aluminium content 0.00168; name gold_unrefined_Al_content
    (same comment as for copper concentrate, sulfide ore)
  property carbon content 0
    carbon content on a dry matter basis (reserved; not for manual entry)
  property true value 0.000610914; name gold_unrefined_true_value
    allocation property applied in "true value" allocation // value calculated from revenue
  properties: dry mass 1 kg, water content 0, water in wet mass 0 kg, wet mass 1 kg, carbon content, fossil 0, carbon content, non-fossil 0, carbon allocation 0 kg
- quicklime, milled, loose: 0 kg; name quicklime; CPC 37420: Quicklime, slaked lime and hydraulic lime; By-product classification allocatable product; pedigree (1,1,1,1,1)
  Amount and activity link based on primary data collected from participating companies.
  production volume 2.39166e9 kg; = quicklime / zinc_conc * zinc_conc_PV
    (same comment as for copper concentrate, sulfide ore)
  property price 0.077 EUR2005; name quicklime_price_EUR2005
  property true value 0.00848454; name quicklime_true_value
  properties: water in wet mass 0.01 kg, water content 0.010101, carbon content, non-fossil 0, carbon content, fossil 0, wet mass 1 kg, dry mass 0.99 kg, carbon content 0, carbon allocation 0 kg
- sand: 0 kg; By-product classification allocatable product; CPC 15310: Natural sands; pedigree (1,1,1,1,1)
  Amount and activity link based on primary data collected from participating companies.
  production volume 1.59174e9 kg; = sand / zinc_conc * zinc_conc_PV
    (same comment as for copper concentrate, sulfide ore)
  property price 0.004 EUR2005; name sand_price_EUR2005
    Temporary price data. Calculated as 90% of purchasers price based on: 2004 market prices are estimated to be equal to USA prices, which are given according to http://minerals.usgs.gov/minerals/pubs/commodity/sand_&_gravel_construction/myb1-2007-sandc.xls, table 1, downloaded 21 April 2009. Same price for gravel and sand.
  property carbon content 0
    carbon content on a dry matter basis (reserved; not for manual entry)
  property true value 0.000293339; name sand_true_value
    allocation property applied in "true value" allocation // value calculated from revenue
  properties: carbon content, fossil 0, carbon content, non-fossil 0, wet mass 1 kg, water content 0, water in wet mass 0 kg, dry mass 1 kg, carbon allocation 0 kg
- lead concentrate: 0 kg; name lead_conc; By-product classification allocatable product; CPC 14290: Other non-ferrous metal ores and concentrates (other than uranium or thorium ores and concentrates); pedigree (1,1,1,1,1)
  Amount and activity link based on primary data collected from participating companies.
  production volume 3.65186e9 kg; = lead_conc / zinc_conc * zinc_conc_PV
    (same comment as for copper concentrate, sulfide ore)
  property price 0.376 EUR2005; name lead_conc_price_EUR2005
    Temporary price data. Calculated as 90% of purchasers price based on: Lead content in concentrate 55%. Concentrate price per kg Pb 86.5% of refined Pb price (13.5% treatment charges according to CHR Metals Limited 2005: Dynamic cost curves. http://www.minecost.com/dynamic.pdf). 2004 lead price from USGS (2007) Mineral commodity summaries 2007. <http://minerals.usgs.gov/minerals/pubs/mcs/2007/mcs2007.pdf> [Accessed 25 May 2010]
  property concentration, lead 0.62 kg/kg
    (same comment as for copper concentrate, sulfide ore)
  property manganese content 0.000105; name lead_conc_Mn_content
    (same comment as for copper concentrate, sulfide ore)
  property aluminium content 0.00168; name lead_conc_Al_content
    (same comment as for copper concentrate, sulfide ore)
  property concentration, cadmium 5.3e-5 kg/kg; name lead_conc_concentration_Cd
    (same comment as for copper concentrate, sulfide ore)
  property barium content 8.92e-6; name lead_conc_Ba_content
    (same comment as for copper concentrate, sulfide ore)
  property concentration, silver 0.000171 kg/kg; name lead_conc_concentration_Ag
    (same comment as for copper concentrate, sulfide ore)
  property concentration, calcium 0.0572 kg/kg; name lead_conc_Ca_concentration
    (same comment as for copper concentrate, sulfide ore)
  property concentration, nickel 5.54e-7 kg/kg; name lead_conc_Ni_concentration
    (same comment as for copper concentrate, sulfide ore)
  property titanium content 7.93e-5; name lead_conc_Ti_content
    (same comment as for copper concentrate, sulfide ore)
  property gold content 0.00108; name lead_conc_Au_content
    (same comment as for copper concentrate, sulfide ore)
  property concentration, iron 0.00201 kg/kg; name lead_conc_concentration_Fe
    (same comment as for copper concentrate, sulfide ore)
  property vanadium content 2.15e-6; name lead_conc_V_content
    (same comment as for copper concentrate, sulfide ore)
  property concentration, magnesium 0.0333 kg/kg; name lead_conc_Mg_concentration
    (same comment as for copper concentrate, sulfide ore)
  property carbon content 0
    carbon content on a dry matter basis (reserved; not for manual entry)
  property true value 0.0632617; name lead_conc_true_value
    allocation property applied in "true value" allocation // value calculated from revenue
  properties: water in wet mass 0 kg, water content 0, carbon content, fossil 0, wet mass 1 kg, dry mass 1 kg, carbon content, non-fossil 0, carbon allocation 0 kg
- iron scrap, unsorted: 0 kg; name iron_scrap; CPC 39310: Slag, dross, scalings and other waste from the manufacture of iron or steel; By-product classification Recyclable; pedigree (1,1,1,1,1)
  Amount and activity link based on primary data collected from participating companies.
  production volume 1.55827e6 kg; = iron_scrap / zinc_conc * zinc_conc_PV
    (same comment as for copper concentrate, sulfide ore)
  property price 0.149 EUR2005; name iron_scrap_price_EUR2005
    Temporary price data. Calculated as 90% of purchasers price based on: estimated at 85% of sorted scrap
  property carbon content 0
    carbon content on a dry matter basis (reserved; not for manual entry)
  property true value 1.06971e-5; name iron_scrap_true_value
    allocation property applied in "true value" allocation // value calculated from revenue
  properties: water in wet mass 0 kg, carbon content, fossil 0, dry mass 1 kg, carbon content, non-fossil 0, water content 0, wet mass 1 kg, carbon allocation 0 kg
- lime: 0 kg; By-product classification allocatable product; CPC 161: Chemical and fertilizer minerals; pedigree (1,1,1,1,1)
  Amount and activity link based on primary data collected from participating companies.
  production volume 3.88333e9 kg; = lime / zinc_conc * zinc_conc_PV
    (same comment as for copper concentrate, sulfide ore)
  property price 0.117 EUR2005; name lime_price_EUR2005
  property true value 0.0209329; name lime_true_value
  properties: water content 0, water in wet mass 0 kg, carbon content, fossil 0, wet mass 1 kg, dry mass 1 kg, carbon content, non-fossil 0, carbon content 0, carbon allocation 0 kg
- wood chips, from post-consumer wood, measured as dry mass: 0 kg; By-product classification allocatable product; CPC 3928: Sawdust and wood waste and scrap
  EcoSpold01Location=CH
  production volume 527319 kg
    Production of waste urban and demolition wood in CH in 2003 is 0.2 million m3.
    year 2003 values
    Calculated from the production volume of waste wood, 40% water on dry mass basis in proportion to the respective output amounts.
  property price 0.107 EUR2005
    Expert judgement (Urs Luginbühl, Swiss Sawmilling industry, personal communication in June 2014). Wood chips from softwood should have a price of 0.101 EUR/kg. Woodchips from hardwood should have a price of 0.112 EUR/kg. Average of these two values is used. Cross-reference; FAOSTAT database; http://faostat.fao.org/site/626/DesktopDefault.aspx?PageID=626#ancor; Average import/export prices of EU for 'chips and particles'. Price: 48.76 Euro/m3. The density of the wood chips is 650 kg/m3. The price is recalculated accordingly.
  property carbon content, non-fossil 0.494
    C content of dry mass is 0.494 kgC/kg dry wood (ecoinvent v2.2 report 6_IX & ecoinvent v2.2 report 9).
  property carbon content 0.494
    carbon content on a dry matter basis (reserved; not for manual entry)
  property true value 2.59953e-6
    allocation property applied in "true value" allocation // value calculated from revenue
  properties: carbon content, fossil 0, water in wet mass 0.4 kg, dry mass 1 kg, wet mass 1.4 kg, water content 0.4, carbon allocation 0.494 kg
- heat, for reuse in municipal waste incineration only: 0 MJ; CPC 17300: Steam and hot water; By-product classification allocatable product; pedigree (1,1,1,1,1)
  Net electricity generated from this waste and used in internal MSWI plant energy redistribution.
  Uncertainty: uncertainty is calculated from uncertainties in waste composition and uncertainties in energy efficiency and the uncertainty in internal energy demand
  production volume 4.99899e6 MJ
  property exergy 0.1842 MJ; name E_th_prod_MSWI_exergy
    This exergy property is based on the exergy content of the product.
  property price 0.0106 EUR2005; name E_th_prod_MSWI_price_EUR2005
    Average European district heat price from Ecoheatcool and Euroheat 2005-2006, Ecoheat Work package 1: The European heat market. Final report. 10.6 EUR/GJ i s the price of district heat. http://www.solarthermalworld.org/files/Ecoheatcool%20WP1%20Web.pdf?download
  property true value relation 0.1842; name E_th_prod_MSWI_true_value_relation
    property to calculate "true value" from
  property true value 1.37744e-6
    allocation property applied in "true value" allocation // value calculated from true value relation
- electricity, for reuse in municipal waste incineration only: 0 kWh; CPC 17100: Electrical energy; By-product classification allocatable product; pedigree (1,1,1,1,1)
  (same comment as for heat, for reuse in municipal waste incineration only)
  production volume 677759 kWh
  property true value relation 3.6; name E_el_prod_MSWI_true_value_relation
    property to calculate "true value" from
  property price 0.1 EUR2005; name E_el_prod_MSWI_price_EUR2005
    Estimated to be the same price as in case of electricity, medium voltage.
  property exergy 3.6 MJ; name E_el_prod_MSWI_exergy
    This exergy property is based on the exergy content of the product.
  property true value 3.64645e-6
    (same comment as for heat, for reuse in municipal waste incineration only)
- cobalt: 0 kg; CPC 41601: Tungsten, molybdenum, tantalum, magnesium, cobalt, cadmium, titanium, zirconium, beryllium, gallium, hafnium, […]; By-product classification allocatable product
  EcoSpold01Location=GLO
  production volume 7995.16 kg
  property price 39.7 EUR2005
    Temporary price data. Calculated as 90% of purchasers price based on: Cobalt in USGS (2007) Mineral commodity summaries 2007. <http://minerals.usgs.gov/minerals/pubs/mcs/2007/mcs2007.pdf>
  property carbon content 0
    carbon content on a dry matter basis (reserved; not for manual entry)
  property true value 1.46237e-5
    allocation property applied in "true value" allocation // value calculated from revenue
  properties: dry mass 1 kg, water content 0, water in wet mass 0 kg, carbon content, non-fossil 0, wet mass 1 kg, carbon content, fossil 0, carbon allocation 0 kg
- lithium carbonate: 0 kg; CPC 34240: Phosphates of triammonium; salts and peroxysalts of inorganic acids and metals n.e.c.; By-product classification allocatable product; CAS 554-13-2
  EcoSpold01Location=GLO
  production volume 2975.64 kg
  property price 6.75 EUR2005
    For lithium, there is no exchange trading, no terminal storage market and only an extremely limited spot market (Reuters, 2016). The lithium price is negotiated bilateral and based on customer specifications with price information rarely publicly documented (European Lithium, 2017). Roskill Information Services estimate the price for technical grade lithium carbonate in 2017 between 6900 and 7800 USD per tonne, with a price premium of 500 USD for battery grade lithium (European Lithium, 2017). USGS estimates the price for lithium carbonate, battery grade, to be 7400USD in 2016 (USGS, 2017). Here an average price of 7500 USD per tonne lithium carbonate is assumed, average exchange rate 1 USD = 0.9 EUR in 2017 (Oanda, 2017). Resulting in a price for lithium carbonate of 6.75EUR/kg.
    Reference(s):
    European Lithium. 2017. Lithium Market. Online source: http://europeanlithium.com/lithium/lithium-market/, accessed 10 October 2017.
    Reuters. 2016. What price lithium, the metal of the future? Andy Home. Online source: https://www.reuters.com/article/us-lithium-batteries-ahome/what-price-lithium-the-metal-of-the-future-andy-home-idUSKCN0YS19D, accessed 10 October 2017.
    Oanda. 2017. https://www.oanda.com/lang/de/currency/average, accessed 10 October 2017.
    USGS. 2017. Lithium. Commodity Overview. Online https://minerals.usgs.gov/minerals/pubs/commodity/lithium/mcs-2017-lithi.pdf, accessed 10 October, 2017.
  property carbon content 0.16255
    carbon content on a dry matter basis (reserved; not for manual entry)
  property true value 9.25386e-7
    allocation property applied in "true value" allocation // value calculated from revenue
  properties: dry mass 1 kg, carbon content, non-fossil 0, water in wet mass 0 kg, carbon content, fossil 0.16255, water content 0, wet mass 1 kg, carbon allocation 0.16255 kg
- sulfuric acid: 0 kg; source Althaus H.-J. 2004; CPC 34231: Chemical elements n.e.c.; inorganic acids except phosphoric, nitric and sulphonitric; inorganic oxygen compoun[…]; By-product classification allocatable product; pedigree (1,1,1,1,1)
  production volume 3832.27 kg
  properties: price 0.031 EUR2005, carbon content, non-fossil 0, dry mass 1 kg, carbon content, fossil 0, wet mass 1 kg, water content 0, water in wet mass 0 kg, carbon content 0, carbon allocation 0 kg, true value 5.47338e-9
- copper: 0 kg; By-product classification allocatable product; CPC 41413: Refined copper and copper alloys, unwrought; master alloys of copper; pedigree (1,1,1,1,1)
  Calculated value. Based on Li-ioin battery composition and hydrometallurgical treatment process outputs. The efficiency of Cu, Al and Manganese recovery is estimated 70% based on the estimations of the original process for Cu recovery.
  production volume 778233 kg
  property price 5.52 EUR2005; name copper_bp_price_EUR2005
  properties: carbon content, non-fossil 0, water in wet mass 0 kg, wet mass 1 kg, water content 0, dry mass 1 kg, carbon content, fossil 0, carbon content 0, carbon allocation 0 kg, true value 6.65314e-5
- manganese: 0 kg; CPC 41603: Bismuth, antimony, manganese, chromium and articles thereof; including waste and scrap of bismuth or manganese; By-product classification allocatable product; pedigree (1,1,1,1,1)
  (same comment as for copper)
  production volume 195.671 kg
  property price 1.24 EUR2005; name manganese_bp_price_EUR2005
    Literature value (USGS,http://minerals.usgs.gov/minerals/pubs/commodity/manganese/myb1-2009-manga.pdf, accessed 20160222). The price for manganese ore (48% manganese) is reported to be 6.61 USD/metric ton unit (MTU) = 10kg. The resulting price is (1/0.48*0.661=) 1.38 USD. Cross reference; in 2005 manganese was traded on the markets for 1.5 USD/kg (http://www.infomine.com/investment/metal-prices/manganese/all/, accessed 20160704).
  property carbon content 0
    carbon content on a dry matter basis (reserved; not for manual entry)
  property true value 1.11786e-8
    allocation property applied in "true value" allocation // value calculated from revenue
  properties: dry mass 1 kg, water in wet mass 0 kg, carbon content, fossil 0, wet mass 1 kg, carbon content, non-fossil 0, water content 0, carbon allocation 0 kg
- aluminium oxide, non-metallurgical: 0 kg; source European Aluminium Association 2008; CPC 41432: Alumina (aluminium oxide), except artificial corundum; By-product classification allocatable product; CAS 1344-28-1; pedigree (1,1,1,1,1)
  production volume 160.723 kg
  property carbon content, non-fossil 0; name C_content_non_fossil
  property price 0.28 EUR2005; name Al2O3Amount_price_EUR2005
    From UN trade database. http://data.un.org/ Import data from the largest economies of the world are used (Brazil, India, USA, China, Japan and EU-27).
  property dry mass 1 kg; name DM
  property water content 0; name water_content
  property wet mass 1 kg; name WM
  property water in wet mass 0 kg; name WWM
  property carbon content, fossil 0; name C_content_fossil
  property carbon content 0
    carbon content on a dry matter basis (reserved; not for manual entry)
  property true value 1.92351e-9
    allocation property applied in "true value" allocation // value calculated from revenue
  properties: carbon allocation 0 kg
- aluminium, cast alloy: 0 kg; source European Aluminium Association 2008; By-product classification allocatable product; CPC 41431: Unwrought aluminium; pedigree (1,1,1,1,1)
  EcoSpold01Location=RER
  production volume 1502.41 kg
  property price 1.3 EUR2005; name castAlloyAmount_price_EUR2005
    Temporary price data. Calculated as 90% of purchasers price based on: Source: London Metal Exchange, Aluminium alloy price for 2005
  property carbon content 0
    carbon content on a dry matter basis (reserved; not for manual entry)
  property true value 8.34811e-8
    allocation property applied in "true value" allocation // value calculated from revenue
  properties: water in wet mass 0 kg, carbon content, non-fossil 0, water content 0, dry mass 1 kg, carbon content, fossil 0, wet mass 1 kg, carbon allocation 0 kg
- aluminium, wrought alloy: 0 kg; source European Aluminium Association 2008; By-product classification allocatable product; CPC 4153: Semi-finished products of aluminium or aluminium alloys; pedigree (1,1,1,1,1)
  production volume 657.724 kg
  property price 1.44 EUR2005; name secondaryAluminiumOutput_price_EUR2005
    Estimated based on literature values and expert judgement. Aluminium ccast alloys are about 90% of the price of aluminium wrought alloys.
  property carbon content 0
    carbon content on a dry matter basis (reserved; not for manual entry)
  property true value 4.04822e-8
    allocation property applied in "true value" allocation // value calculated from revenue
  properties: wet mass 1 kg, water content 0, carbon content, fossil 0, water in wet mass 0 kg, carbon content, non-fossil 0, dry mass 1 kg, carbon allocation 0 kg
- iron scrap, sorted, pressed: 0 kg; By-product classification Recyclable; CPC 39310: Slag, dross, scalings and other waste from the manufacture of iron or steel; pedigree (1,1,1,1,1)
  metallic iron scrap removed from ash reamains and recycled.
  Uncertainty: uncertainty is calculated from uncertainties in waste composition and transfer coefficients to soild residues
  production volume 88735 kg
  property price 0.175 EUR2005
    Temporary price data. Calculated as 90% of purchasers price based on: 2005 import and export prices (total trades (USD) divided by total weight (kg) in biggest economies of the world: EU27, USA, Brasil, China, India, Japan and Russia) from UN Commodity Trade Statistics Database (http://data.un.org/Explorer.aspxDatabase [Accessed 2011.06.20]). Commodity: Waste or scrap, of cast iron
  property carbon content 0
    carbon content on a dry matter basis (reserved; not for manual entry)
  property true value 6.12959e-7
    allocation property applied in "true value" allocation // value calculated from revenue
  properties: carbon content, non-fossil 0, wet mass 1 kg, dry mass 1 kg, water content 0, carbon content, fossil 0, water in wet mass 0 kg, carbon allocation 0 kg
- manganese dioxide: 0 kg; CPC 34220: Zinc oxide; zinc peroxide; chromium oxides and hydroxides; manganese oxides; iron oxides and hydroxides; earth[…]; By-product classification allocatable product
  EcoSpold01Location=GLO
  production volume 150.285 kg
  property price 1.04 EUR2005
    Calculated value based on data from United Nations Commodity Trade Statistics Database (comtrade.un.org). UN comtrade category: 282010 Managanese dioxide. Prices from the year 2005. Using exchange rate of 1EURO = 1.209 USD. Average of price of import into 5 main markets (EU, US, JP, IN and CN).
  property carbon content 0
    carbon content on a dry matter basis (reserved; not for manual entry)
  property true value 7.20091e-9
    allocation property applied in "true value" allocation // value calculated from revenue
  properties: water in wet mass 0 kg, wet mass 1 kg, dry mass 1 kg, carbon content, fossil 0, water content 0, carbon content, non-fossil 0, carbon allocation 0 kg
- core board: 0 kg; CPC 321: Pulp, paper and paperboard; By-product classification allocatable product
  EcoSpold01Location=RER
  production volume 3.23331e-6 kg
  property carbon content, non-fossil 0.430314
    Biogenic C content was calculated after biogenic C contents of chemicals used in the production of board (ecoinvent v2.2 report 11_III, part 13). The cellulose content in 1 kg of paper (on a wet mas basis) was estimated as (1-chemical content), C content of cellulose was considered 0.44 kgC/kg dry mass (ecoinvent v2.2 report, n 15a, pg 40)
  property price 0.598 EUR2005
    Export prices for the World+ according to: http://faostat.fao.org/site/626/DesktopDefault.aspx?PageID=626#ancor downloaded 28 April 2009; calculated as export value divided by export volume.
  property carbon content, fossil 0
    Fossil C content was calculated after fossil C contents of chemicals used in the production of board (ecoinvent v2.2 report 11_III, part 13).
  property carbon content 0.430314
    carbon content on a dry matter basis (reserved; not for manual entry)
  property true value 1.51777e-17
    allocation property applied in "true value" allocation // value calculated from revenue
  properties: dry mass 0.945 kg, water in wet mass 0.055 kg, wet mass 1 kg, water content 0.0582011, carbon allocation 0.406646 kg
- residual wood, dry: 0 m3; CPC 39283: Non-agglomerated wood waste and scrap; By-product classification allocatable product; pedigree (1,1,1,1,1)
  Emission factor from DS on heat generation from industrial residual wood mulitplied by the input of wood fuel (direct wood fuel plus production residues)
  production volume 0.261241 m3
  property price 26.9 EUR2005; name w_chips_price_EUR2005
    Temporary price data. Calculated as 90% of purchasers price based on: 2004 prices for World Import/Export (USD/cubicmeter) from FaoStat (http://faostat.fao.org/site/626/default.aspx#ancor, [accessed 10th June 2010]) Commodity: 'Chips and Particles' assuming this is for air-dry chips (10% water on a dry matter basis at 650 kg/m3) and no price difference for water content (i.e. assuming air-drying).
  property carbon content 0.494
    carbon content on a dry matter basis (reserved; not for manual entry)
  property true value 5.51635e-11
    allocation property applied in "true value" allocation // value calculated from revenue
  properties: wet mass 632.5 kg, carbon content, fossil 0, dry mass 550 kg, carbon content, non-fossil 0.494, water content 0.15, water in wet mass 82.5 kg, carbon allocation 271.7 kg
- bark chips, wet, measured as dry mass: 0 kg; By-product classification allocatable product; CPC 31230: Wood in chips or particles; pedigree (1,1,1,1,1)
  bark from debarking of logs, not used energetically
  production volume 12.209 kg
  property price 0.034 EUR2005; name w_bark_price_EUR2005
    Expert judgement (Urs Luginbühl, Swiss Sawmilling industry, personal communication in June 2014). Cross-reference; FAOSTAT database; http://faostat.fao.org/site/626/DesktopDefault.aspx?PageID=626#ancor; Average import/export prices of EU for 'chips and particles'. Price: 48.76 Euro/m3. The density of the wood chips is 650 kg/m3. The price is calculated to be 0.075 EUR/kg.
  property carbon content 0.494
    carbon content on a dry matter basis (reserved; not for manual entry)
  property true value 3.25848e-12
    allocation property applied in "true value" allocation // value calculated from revenue
  properties: carbon content, fossil 0, dry mass 1 kg, carbon content, non-fossil 0.494, wet mass 2.4 kg, water in wet mass 1.4 kg, water content 1.4, carbon allocation 0.494 kg
- fibreboard, soft: 0 m3; CPC 31449: Other fibreboard; By-product classification allocatable product
  production volume 7.63061 m3
  property dry mass 150.62 kg; name DM_FB; = WM_FB - WiWM_FB
  property price 148 EUR2005
    (same comment as for core board)
  property water in wet mass 8.38 kg; name WiWM_FB
  property wet mass 159 kg; name WM_FB
  property carbon content, non-fossil 0.461793; = 140.8*0.494/DM_FB
    wood content converted to carbon, divided by dry mass
  property water content 0.0556367; = WiWM_FB/DM_FB
  property carbon content 0.475101
    carbon content on a dry matter basis (reserved; not for manual entry)
  property true value 8.86498e-9
    allocation property applied in "true value" allocation // value calculated from revenue
  properties: carbon content, fossil 0.0133086, carbon allocation 71.5597 kg
- biogas: 0 m3; source Raboni, Massimo 2014; By-product classification allocatable product; CPC 17200: Coal gas, water gas, producer gas and similar gases, other than petroleum gases and other gaseous hydrocarbons; pedigree (1,1,1,1,1)
  An average yield of 100 litres of biogas per kg biowaste is assumed
  production volume 0.017442 m3
  property price 0.109 EUR2005; name biogas_yield_price_EUR2005
    Temporary price data. Calculated as 90% of purchasers price based on: Same prices per energy output as natural gas, based on the proportional lower heating value (2/3 that of natural gas)
  property carbon content, non-fossil 0.449939
    Total C content in kg/Nm3 (Tab 12.8, ecoinvent v2.2 report n17), referred to 1kg DM
  property carbon content 0.449939
    carbon content on a dry matter basis (reserved; not for manual entry)
  property true value 1.49238e-14
    allocation property applied in "true value" allocation // value calculated from revenue
  properties: water in wet mass 0 kg, wet mass 1.15 kg, carbon content, fossil 0, lower heating value 0 MJ/Nm3, water content 0, dry mass 1.15 kg, carbon allocation 0.51743 kg
- compost: 0 kg; CPC 391: Wastes from food and tobacco industry; By-product classification allocatable product; pedigree (1,1,1,1,1)
  EcoSpold01Location=CH
  Biowaste is reduced in mass by a factor of 2 during composting
  production volume 0.222206 kg
  property water in wet mass 0.472 kg; name Water_in_wet_mass_compost; = 1- DM_compost
  property price 0.03 EUR2005
    Temporary price data. Calculated as 90% of purchasers price based on: Estimation done using the following sources: <http://www.wmaa.asn.au/uploads/documents/MarkWinser_1May2007.pdf>; <http://www.swlf.ait.ac.th/UpdData/International/Composting%20and%20anaerobic%20digestion_%20comparions%20for%20Europe%20and%20Asia.pdf>; <http://www.epa.gov/osw/conserve/rrr/composting/basic.htm>, accessed 2011.06.16
  property carbon content, non-fossil 0.1165
    calculation: dry matter 50%, organic matter 40% of dry matter, C content calculated from organic matter divided by 1.72. Relative to dry matter; relative to fresh matter: divided by 2 => 0.1156
  property dry mass 0.528 kg; name DM_compost
  property water content 0.893939; name Water_content_compost; = Water_in_wet_mass_compost/DM_compost
  property concentration, cadmium 0 kg/kg; name Mass_compost_concentration_Cd; = Mass_biowaste_concentration_Cd*2
    Biowaste mass is reduced by a factor of two during composting, therefore concentration is doubled
  property humus equivalent 0.061 kg
    Humus building fraction expressed in kg per kg product on a FM basis. Humus denotes the converted, primary biomass from plants or animals in the ground. More information can be found in the documentation of the composting itself: "treatment of biowaste, industrial composting".
  property concentration, copper 0 kg/kg; name Mass_compost_concentration_Cu; = Mass_biowaste_concentration_Cu*2
    (same comment as for compost)
  property concentration, calcium 0 kg/kg; name Mass_compost_Ca_concentration; = Mass_biowaste_concentration_Ca*2
    (same comment as for compost)
  property concentration, magnesium 0 kg/kg; name Mass_compost_Mg_concentration; = Mass_biowaste_concentration_Mg*2
    (same comment as for compost)
  property concentration, mercury 0 kg/kg; name Mass_compost_Hg_concentration; = Mass_biowaste_concentration_Hg*2
    (same comment as for compost)
  property concentration, lead 0 kg/kg; name Mass_compost_concentration_Pb; = Mass_biowaste_concentration_Pb*2
    (same comment as for compost)
  property concentration, nickel 0 kg/kg; name Mass_compost_Ni_concentration; = Mass_biowaste_concentration_Ni*2
    (same comment as for compost)
  property concentration, phosphorus 0 kg/kg; name Mass_compost_P_concentration; = Mass_biowaste_concentration_P*2
    (same comment as for compost)
  property concentration, sulfur 0 kg/kg; name Mass_compost_concentration_S; = Mass_biowaste_concentration_S*2
    (same comment as for compost)
  property concentration, potassium 0 kg/kg; name Mass_compost_K_concentration; = Mass_biowaste_concentration_K*2
    (same comment as for compost)
  property nickel content 1.60606e-5; name Mass_compost_Ni_content; = Mass_biowaste_Ni_content/0.5*( DM_biowaste / DM_compost)
    nickel content on a dry matter basis
  property concentration, nitrogen 0 kg/kg; = Mass_biowaste_concentration_N*2
    (same comment as for compost)
  property concentration, zinc 0 kg/kg; name Mass_compost_concentration_Zn; = Mass_biowaste_concentration_Zn*2
    (same comment as for compost)
  property lead content 2.66667e-5; name Mass_compost_Pb_content; = Mass_biowaste_Pb_content/0.5*( DM_biowaste / DM_compost)
    lead content on a dry matter basis
  property copper content 3.81818e-5; name Mass_compost_Cu_content; = Mass_biowaste_Cu_content/0.5*( DM_biowaste / DM_compost)
    copper content on a dry matter basis
  property cadmium content 2.89394e-7; name Mass_compost_Cd_content; = Mass_biowaste_Cd_content/0.5*( DM_biowaste / DM_compost)
    cadmium content on a dry matter basis
  property nitrogen content 0.0136364; name Mass_compost_N_content; = Mass_biowaste_N_content/0.5*( DM_biowaste / DM_compost)
    nitrogen content on a dry matter basis
  property magnesium content 0.00525758; name Mass_compost_Mg_content; = Mass_biowaste_Mg_content/0.5*( DM_biowaste / DM_compost)
    magnesium content on a dry matter basis
  property zinc content 0.000120303; name Mass_compost_Zn_content; = Mass_biowaste_Zn_content/0.5*( DM_biowaste / DM_compost)
    zinc content on a dry matter basis
  property potassium content 0.0099697; name Mass_compost_K_content; = Mass_biowaste_K_content/0.5*( DM_biowaste / DM_compost)
    potassium content on a dry matter basis
  property sulfur content 0.00190909; name Mass_compost_S_content; = Mass_biowaste_S_content/0.5*( DM_biowaste / DM_compost)
    sulfur content on a dry matter basis
  property calcium content 0.0504545; name Mass_compost_Ca_content; = Mass_biowaste_Ca_content/0.5*( DM_biowaste / DM_compost)
    calcium content on a dry matter basis
  property mercury content 1e-7; name Mass_compost_Hg_content; = Mass_biowaste_Hg_content/0.5*( DM_biowaste / DM_compost)
    mercury content on a dry matter basis
  property phosphorus content 0.00275758; name Mass_compost_P_content; = Mass_biowaste_P_content/0.5*( DM_biowaste / DM_compost)
    phosphorus content on a dry matter basis
  property carbon content 0.1165
    carbon content on a dry matter basis (reserved; not for manual entry)
  property true value 5.23281e-14
    allocation property applied in "true value" allocation // value calculated from revenue
  properties: carbon content, fossil 0, wet mass 1 kg, carbon allocation 0.061512 kg
- gypsum fibreboard: 0 kg; CPC 37530: Articles of plaster or of compositions based on plaster; By-product classification allocatable product
  EcoSpold01Location=CH
  production volume 3.23331e-6 kg
  property price 1.77 EUR2005
    Calculated by 2.o-The production volume of this product is small compared to other products supplied by the activities within the same ISIC 3 category. Therefore, an average price of products supplied by the activities in the same ISIC 3 code has been applied.This price is obtained as '_45 Glass, mineral wool and ceramic goods, virgin, EU27' in the 'EU & DK Input Output Database' (available in SimaPro). The price is assumed to be valid for both RER2003, RER 2004, world 2003 and world 2004.
  property carbon content, fossil 0
    Gypsum (CaSO4-2H2O) with 15-20% cellulose fibres (ecoinvent v2.2 report 7, part VIII, pg 5). C-content/dry mass of natural fibres was considered 46% (from "Evolutionary and Biochemical Aspects", A.D. Kay and T. Vrede (in Global Ecology, 2010, Elsevier B.V., S.E. Jørgensen Ed.))
  property carbon content, non-fossil 0.0805
    (same comment as for gypsum fibreboard)
  property carbon content 0.0805
    carbon content on a dry matter basis (reserved; not for manual entry)
  property true value 4.49239e-17
    allocation property applied in "true value" allocation // value calculated from revenue
  properties: water content 0, water in wet mass 0 kg, dry mass 1 kg, wet mass 1 kg, carbon allocation 0.0805 kg
- tissue paper: 0 kg; By-product classification allocatable product; CPC 321: Pulp, paper and paperboard
  EcoSpold01Location=RER
  production volume 8487.43 kg
  property carbon content, non-fossil 0.36169
    Biogenic C content was calculated after biogenic C contents of chemicals used in the production of the paper (in Tab 8.86 ecoinvent v2.2 report 11_III, part 8). The cellulose content in 1 kg of paper (on a wet mas basis) was estimated as (1-chemical content), C content of cellulose was considered 0.44 kgC/kg dry mass (ecoinvent v2.2 report, n 15a, pg 40)
  property price 1.34 EUR2005
    Calculated based on literature values. The price of 1 kg of tissue paper is calculated to be 1.34 euro/kg. This price is calculated as a weighted average of prices calculated based on import (net trade) of this material from the world into 5 big economies; EU, Japan, China, India, USA. The net weight and the trade value is obtained from the UN Comtrade database (average of commodity no. 730830 Doors, windows, frames of iron or steel and commodity no. 481820 Paper hankerchiefs, cleansing, facial tissues, towel), year 2005.
  property carbon content, fossil 2.22e-5
    Fossil C content was calculated after fossil C contents of chemicals used in the production of the paper (in Tab 8.86 ecoinvent v2.2 report 11_III, part 8).
  property carbon content 0.361712
    carbon content on a dry matter basis (reserved; not for manual entry)
  property true value 8.92767e-8
    allocation property applied in "true value" allocation // value calculated from revenue
  properties: dry mass 0.945 kg, wet mass 1 kg, water in wet mass 0.055 kg, water content 0.0582011, carbon allocation 0.341818 kg
- fibre cement roof slate: 0 kg; CPC 37540: Tiles, flagstones, bricks and similar articles, of cement, concrete or artificial stone; By-product classification allocatable product
  Roof slates are used for roof covering tiles instead of clay roof tiles
  The technical specifications are:
  Bulk density rho [kg/m3]: 1800
  Thermal conductivity lamda [W/mK]: about 0.5
  Weight per area [kg/m2]: 23.7 - 24.6 (used: 24.2)
  Thickness [cm]: 1.34
  Maximum size [mm]: 600 * 300
  Further references:
  Weibel T. and Stritz A. (1995) Ökoinventare und Wirkungsbilanzen von Baumaterialien; Grundlagen für den ökologischen Vergleich von Hochbaukonstruktionen. In: ESU-Reihe Nr. 1/95. Laboratorium für Energiesysteme, Eidg. Technische Hochschule (ETH), Zürich.
  Starzner S. and Wurmer-Weiss P. (2000) ECOBIS 2000, ökologisches Baustoffinformationssystem.
  SIA building materials declaration:
  http://www.sia.ch/cf/oekoinfoliste.cfm?ID=2943702&Lang=d&Mfg=72&Grp=0&Produkt=, access date: Mai 2003
  Roof slates are used for roof covering tiles instead of clay roof tiles
  The technical specifications are:
  Bulk density rho [kg/m3]: 1800
  Thermal conductivity lamda [W/mK]: about 0.5
  Weight per area [kg/m2]: 23.7 - 24.6 (used: 24.2)
  Thickness [cm]: 1.34
  Maximum size [mm]: 600 * 300
  Further references:
  Weibel T. and Stritz A. (1995) Ökoinventare und Wirkungsbilanzen von Baumaterialien; Grundlagen für den ökologischen Vergleich von Hochbaukonstruktionen. In: ESU-Reihe Nr. 1/95. Laboratorium für Energiesysteme, Eidg. Technische Hochschule (ETH), Zürich.
  Starzner S. and Wurmer-Weiss P. (2000) ECOBIS 2000, ökologisches Baustoffinformationssystem.
  SIA building materials declaration:
  http://www.sia.ch/cf/oekoinfoliste.cfm?ID=2943702&Lang=d&Mfg=72&Grp=0&Produkt=, access date: Mai 2003
  production volume 3.73613e-7 kg
  property carbon content, non-fossil 0.01288
    Tab 5.1, ecoinvent v2.2 report 7, part IX. Fibres (pulp) 2.8%. Fibres (polyvinyl alcohol) 2.6%. C-content/dry mass of natural fibres was considered 46% (from 'Evolutionary and Biochemical Aspects', A.D. Kay and T. Vrede (in Global Ecology, 2010, Elsevier B.V., S.E. Jørgensen Ed.)). C-content/dry mass of polyvinyl alcohol ((C2H4O)x) was considered =24/44.
  property carbon content, fossil 0.0141818
    Tab 5.1, ecoinvent v2.2 report 7, part IX. Fibres (pulp) 2.5%. Fibres (polyvinyl alcohol) 3.7%. C-content/dry mass of natural fibres was considered 46% (from 'Evolutionary and Biochemical Aspects', A.D. Kay and T. Vrede (in Global Ecology, 2010, Elsevier B.V., S.E. Jørgensen Ed.)). C-content/dry mass of polyvinyl alcohol ((C2H4O)x) was considered =24/44.
  property carbon content 0.0270618
    carbon content on a dry matter basis (reserved; not for manual entry)
  property true value 9.28327e-18
    allocation property applied in "true value" allocation // value calculated from revenue
  properties: water in wet mass 0 kg, price 1.77 EUR2005, wet mass 1 kg, dry mass 1 kg, water content 0, carbon allocation 0.0270618 kg
- cellulose fibre, inclusive blowing in: 0 kg; CPC 32113: Mechanical wood pulp; semi-chemical wood pulp; pulps of fibrous cellulosic material other than wood; By-product classification allocatable product
  This cellulose fibre is intended for use as a thermal insulation material in buildings. It is made out of waste paper and for this application, the fibres are blown into cavities, e.g. between two planks of a wall. Cellulose fibre in this type of application has a density of 50 kg/m3 and a thermal conductivity of 0.04 W/mK when applied. Cellulose fibres are treated with borax and boric acid to enhance fire retarding properties.
  References:
  Kellenberger D., Althaus H.-J., Jungbluth N. and Künniger T. (2007) Life Cycle Inventories of Building Products. Final report ecoinvent data v2.0 No. 7. Swiss Centre for Life Cycle Inventories, Dübendorf, CH.
  Richter et al. (1996) Ökologische Bewertung von Wärmeschutzgläsern, Integraler Vergleich verschiedener Verglasungsvarianten. Forschungsprogramm 'Rationelle Energienutzung in Gebäuden', EMPA, Abteilung Holz. Auftrag Bundesamt für Energiewirtschaft.
  production volume 4.19186e-7 kg
  property carbon content, non-fossil 0.46
    C-content/dry mass of fibres was considered to be 46% ('Evolutionary and Biochemical Aspects', A.D. Kay and T. Vrede (in Global Ecology, 2010, Elsevier B.V., S.E. Jørgensen Ed.))
  property price 0.76 EUR2005
    The production volume of this product is small compared to other products supplied by the activities within the same ISIC 3 category. Therefore, an average price of products supplied by the activities in the same ISIC 3 code has been applied.This price is obtained as '_35 Paper and paper products, EU27' in the 'EU & DK Input Output Database' (available in SimaPro). The price is assumed to be valid for both RER2003, RER 2004, world 2003 and world 2004.
  property carbon content 0.46
    carbon content on a dry matter basis (reserved; not for manual entry)
  property true value 3.98604e-18
    allocation property applied in "true value" allocation // value calculated from revenue
  properties: wet mass 1 kg, carbon content, fossil 0, water in wet mass 0 kg, dry mass 1 kg, water content 0, carbon allocation 0.46 kg
- graphic paper, 100% recycled: 0 kg; CPC 32129: Other uncoated paper and paperboard, of a kind used for writing, printing or other graphic purposes, and punch[…]; By-product classification allocatable product
  production volume 1444.47 kg
  property price 0.0976 EUR2005; name paper_price_EUR2005
    Export prices for the World+ according to: http://faostat.fao.org/site/626/DesktopDefault.aspx?PageID=626#ancor downloaded 27 April 2009; calculated as export value divided by export volume.
  property carbon content 0.43299
    carbon content on a dry matter basis (reserved; not for manual entry)
  property true value 5.6308e-9
    allocation property applied in "true value" allocation // value calculated from revenue
  properties: water content 0.0582011, dry mass 0.945 kg, carbon content, non-fossil 0.43296, carbon content, fossil 3e-5, wet mass 1 kg, water in wet mass 0.055 kg, carbon allocation 0.409176 kg
- deinked pulp, wet lap: 0 kg; CPC 321: Pulp, paper and paperboard; By-product classification allocatable product; pedigree (1,1,1,1,1)
  Wet lap (40% water on a wet mass basis). Initial values of this dataset were given for the production of 1 ton of wet lap pulp scaled to 10% water on a wet mass basis.
  Amount was scaled to the amount of reference product.
  production volume 1954.47 kg
  property water content 0.666667; name Pulp_water_content; = Pulp_WWM / Pulp_DM
  property water in wet mass 0.4 kg; name Pulp_WWM
  property carbon content, fossil 0; name Pulp_C_content_fossil
    fossil carbon content on a dry matter basis
  property wet mass 1 kg; name Pulp_WM
  property price 0.178 EUR2005; name Pulp_price_EUR2005
    Estimated value. It is estimated, that the price of the deinked pulp is 50% of the sulfate pulp.
  property dry mass 0.6 kg; name Pulp_DM; = Pulp_WM - Pulp_WWM
  property carbon content, non-fossil 0.494; name Pulp_C_content_non_fossil
    Biogenic carbon content of dry mass is 0.494 kgC/kg dry wood (ecoinvent v2.2 report 6_IX & ecoinvent v2.2 report 9). No other C containing products in the formulation of the pulp assumed.
  property carbon content 0.494
    carbon content on a dry matter basis (reserved; not for manual entry)
  property true value 1.3895e-8
    allocation property applied in "true value" allocation // value calculated from revenue
  properties: carbon allocation 0.2964 kg
- potassium fertiliser, as K2O: 0 kg; source CRAAQ 2010; CPC 3463: Mineral or chemical fertilizers, potassic; By-product classification allocatable product; pedigree (1,1,1,1,1)
  This is the potassium (as K2O) output (organic and mineral forms of potassium contained) from organic origin. In practice, only a part of this total amount is available to the plants and the available amount has to be calculated considering efficiency of organic potassium (to replace mineral potassium ), which also depends on many factors, such as climate, soil, crop, timing and technique of application, etc. Since this dataset includes field emissions from the application of sludge, potassium availability has been accounted for in the calculation of direct field emissions.
  Uncertainty: The uncertainty of calculated values is determined from propagation of uncertainty factors of underlying variables.
  production volume 0.76086 kg
  property price 0.188 EUR2005; name K2O_fertiliser_price_EUR2005
    Temporary price data. Calculated as 90% of purchasers price based on: 2004 import price calulated from FAOSTAT (http://faostat.fao.org/site/575/DesktopDefault.aspx?PageID=575#ancor [accessed 2011.01.27] Potash Fertilizers (K20 total nutrients) in kUSD/Mg
  property carbon content 0
    carbon content on a dry matter basis (reserved; not for manual entry)
  property true value 5.71312e-12
    allocation property applied in "true value" allocation // value calculated from revenue
  properties: carbon content, fossil 0, dry mass 1 kg, water in wet mass 0 kg, water content 0, wet mass 1 kg, carbon content, non-fossil 0, carbon allocation 0 kg
- nitrogen fertiliser, as N: 0 kg; source CRAAQ 2010; CPC 3461: Mineral or chemical fertilizers, nitrogenous; By-product classification allocatable product; pedigree (1,1,1,1,1)
  This is the total nitrogen (as N) output (organic and mineral forms of nitrogen contained) from organic origin. In practice, only a part of this total amount is available to the plants and the available amount has to be calculated considering nitrogen efficiency (to replace mineral nitrogen), which also depends on many factors, such as climate, soil, crop, timing and technique of application, etc. Since this dataset includes field emissions from the application of sludge, nitrogen availability has been accounted for in the calculation of direct field emissions.
  Uncertainty: The uncertainty of calculated values is determined from propagation of uncertainty factors of underlying variables.
  production volume 4.70554 kg
  property price 0.473 EUR2005; name N_fertiliser_price_EUR2005
    Temporary price data. Calculated as 90% of purchasers price based on: 2004 prices are calculated on basis of Import/Export data (tonnes and US$) from UN Trade Statistics Database (http://data.un.org/Browse.aspx?d=ComTrade, accessed 7/7-2010). N, P2O5, or K2O content (http://www.fertilizer.org/ifa/Home-Page/STATISTICS/Conversions-factors)
  property carbon content 0
    carbon content on a dry matter basis (reserved; not for manual entry)
  property true value 8.88959e-11
    allocation property applied in "true value" allocation // value calculated from revenue
  properties: water content 0, wet mass 1 kg, dry mass 1 kg, carbon content, non-fossil 0, water in wet mass 0 kg, carbon content, fossil 0, carbon allocation 0 kg
- phosphate fertiliser, as P2O5: 0 kg; source CRAAQ 2010; CPC 3462: Mineral or chemical fertilizers, phosphatic; By-product classification allocatable product; pedigree (1,1,1,1,1)
  This is the total phosphate (as P2O5) output (organic and mineral forms of phosphate contained) from organic origin. In practice, only a part of this total amount is available to the plants and the available amount has to be calculated considering efficiency of organic phosphate (to replace mineral phosphate), which also depends on many factors, such as climate, soil, crop, timing and technique of application, etc. Since this dataset includes field emissions from the application of sludge, phosphate availability has been accounted for in the calculation of direct field emissions.
  Uncertainty: The uncertainty of calculated values is determined from propagation of uncertainty factors of underlying variables.
  production volume 3.14957 kg
  property price 0.241 EUR2005; name P2O5_fertiliser_price_EUR2005
    (same comment as for nitrogen fertiliser, as N)
  property carbon content 0
    carbon content on a dry matter basis (reserved; not for manual entry)
  property true value 3.03165e-11
    allocation property applied in "true value" allocation // value calculated from revenue
  properties: dry mass 1 kg, water content 0, carbon content, fossil 0, wet mass 1 kg, carbon content, non-fossil 0, water in wet mass 0 kg, carbon allocation 0 kg
- soil pH raising agent, as CaCO3: 0 kg; source Marianne Lemieux 2013; CPC 34659: Fertilizers n.e.c.; By-product classification allocatable product; pedigree (1,1,1,1,1)
  Calculated value of the amount of CaCO3 that can be substituted considered the liming efficiency of the sludge.
  Uncertainty: The uncertainty of calculated values is determined from propagation of uncertainty factors of underlying variables.
  production volume 87.7215 kg
  property carbon content, fossil 0.12; name soil_pH_raising_agent_C_content_fossil_0; = 12/(40+12+3*16)
    Stoichiometric calculation. Fossil carbon content on a dry matter basis.
  property carbon content, non-fossil 0; name soil_pH_raising_a_C_content_non_fossil_0
    biogene carbon content on a dry matter basis
  property price 0.117 EUR2005; name soil_pH_raising_agent_as_CaCO3_price_EUR
    The price is estimated to be the same as for lime.
  property carbon content 0.12
    carbon content on a dry matter basis (reserved; not for manual entry)
  property true value 4.09923e-10
    allocation property applied in "true value" allocation // value calculated from revenue
  properties: wet mass 1 kg, water in wet mass 0 kg, water content 0, dry mass 1 kg, carbon allocation 0.12 kg

## Inputs from technosphere
- petrol, unleaded: 0 kg; pedigree (1,1,1,1,1)
  Amount and activity link based on primary data collected from participating companies.
  properties: dry mass 1 kg, carbon content, fossil 0.865, wet mass 1 kg
- inert waste: 0 kg; name inert_waste; pedigree (1,1,1,1,1)
  Amount and activity link based on primary data collected from participating companies.
  production volume 0 kg
    (same comment as for copper concentrate, sulfide ore)
  property price 0 EUR2005; name inert_waste_price_EUR2005
  properties: dry mass 1 kg, wet mass 1 kg
- lubricating oil: 0 kg; pedigree (1,1,1,1,1)
  Amount and activity link based on primary data collected from participating companies.
  properties: wet mass 1 kg, dry mass 1 kg, carbon content, fossil 0.75
  note on carbon content, fossil: Lubricating oil is produced from diesel. C-content/dry mass of fats and oils considered 75%, from: ecoinvent v2.2 report, n 15a, pg 40
- lime, hydrated, packed: 0 kg; pedigree (1,1,1,1,1)
  Amount and activity link based on primary data collected from participating companies.
  properties: wet mass 1 kg, dry mass 0.997 kg, water content 0.00300903
- hazardous waste, for underground deposit: -8.24264e-5 kg; name haz_waste_und_deposit; lognormal variance with pedigree 0.0032, pedigree (1,3,3,1,1)
  Amount and activity link based on primary data collected from participating companies.
  production volume 1.75109e6 kg; = haz_waste_und_deposit / zinc_conc * zinc_conc_PV
    (same comment as for copper concentrate, sulfide ore)
  property price 0 EUR2005; name haz_waste_und_deposit_price_EUR2005
  properties: dry mass 1 kg, wet mass 1 kg
- limestone, crushed, washed: 0 kg; pedigree (1,1,1,1,1)
  Amount and activity link based on primary data collected from participating companies.
  properties: water content 0.00200401, wet mass 1 kg, dry mass 0.998 kg, carbon content, fossil 0.117257
  note on carbon content, fossil: Table 3.1, ecoinvent v2.2 report 7, part VII, pg 3. MW CaCO3=100, MW MgCO3=84. C content of limestone is 0.117257 kg/kg DM
- light fuel oil: 0.00143651 kg; lognormal variance with pedigree 0.0032, pedigree (1,3,3,1,1)
  Amount and activity link based on primary data collected from participating companies. Emissions from fuel combustion included in dataset.
  properties: carbon content, fossil 0.862, wet mass 1 kg, dry mass 1 kg
- bilge oil: 0 kg; name bilge_oil; pedigree (1,1,1,1,1)
  Amount and activity link based on primary data collected from participating companies.
  production volume 0 kg
    (same comment as for copper concentrate, sulfide ore)
  property price 0 EUR2005; name bilge_oil_price_EUR2005
  properties: wet mass 1 kg, water content 9, carbon content, fossil 0.84, dry mass 0.1 kg
  note on carbon content, fossil: Tab A.6, ecoinvent v2.2 report 13_I. C content has been calculated after data in the tables, and then referred to 1 kg DM
- lime: 0 kg; pedigree (1,1,1,1,1)
  Amount and activity link based on primary data collected from participating companies.
  properties: wet mass 1 kg, dry mass 1 kg, carbon content, fossil 0.120005
- hazardous waste, for incineration: 0 kg; name haz_waste_incineration; pedigree (1,1,1,1,1)
  Amount and activity link based on primary data collected from participating companies.
  production volume 0 kg
    (same comment as for copper concentrate, sulfide ore)
  property price 0 EUR2005; name haz_waste_incineration_price_EUR2005
  properties: dry mass 0.75 kg, water content 0.333333, wet mass 1 kg
- copper: 7.58482e-5 kg; lognormal variance with pedigree 0.0032, pedigree (1,3,3,1,1)
  Amount and activity link based on primary data collected from participating companies.
  properties: dry mass 1 kg, wet mass 1 kg
- blasting: 0.00159652 kg; lognormal variance with pedigree 0.0032, pedigree (1,3,3,1,1)
  Amount and activity link based on primary data collected from participating companies.
- limestone, unprocessed: 0 kg; pedigree (1,1,1,1,1)
  Amount and activity link based on primary data collected from participating companies.
  properties: dry mass 0.998 kg, carbon content, fossil 0.117257, water content 0.00200401, wet mass 1 kg
- mine infrastructure, underground, non-ferrous metal: 2.2143e-10 unit; lognormal variance with pedigree 0.0887, pedigree (5,5,5,3,1)
  Estimation from author of 'zinc mine operation, GLO, 1994-2003' dataset. No primary data on infrastructure included.
- heat, district or industrial, other than natural gas: 0.00189028, 0.000980011, 0.0418008 MJ (3 entries); lognormal variance with pedigree 0.0032, pedigree (1,3,3,1,1)
  Amount and activity link based on primary data collected from participating companies.
- electricity, medium voltage: 0 kWh; pedigree (1,1,1,1,1)
  Amount and activity link based on primary data collected from participating companies.
- conveyor belt: 1.50807e-7 m; lognormal variance with pedigree 0.0587, pedigree (4,4,5,3,3)
  Estimation from author of 'zinc mine operation, GLO, 1994-2003' dataset: 2000 m conveyor belts are assumed to have a capacity of 2000 t/h which yields 2*10-5 m conveyor belt required per tonne mined raw ore. No primary data on infrastructure included.
- hydrogen cyanide: 0 kg; pedigree (1,1,1,1,1)
  Amount and activity link based on primary data collected from participating companies.
  properties: dry mass 1 kg, carbon content, fossil 0.444444, wet mass 1 kg
- maize starch: 7.54401e-5 kg; lognormal variance with pedigree 0.0032, pedigree (1,3,3,1,1)
  Amount and activity link based on primary data collected from participating companies.
  properties: carbon content, non-fossil 0.46, wet mass 1 kg, water content 0.162791, dry mass 0.86 kg
  note on carbon content, non-fossil: C-content of starch is considered 46% on dry mass basis (from 'Evolutionary and Biochemical Aspects', A.D. Kay and T. Vrede (in Global Ecology, 2010, Elsevier B.V., S.E. Jørgensen Ed.)).
- electricity, medium voltage: 0.14231, 0.182283, 0.0585485, 8.36268e-6, 0.0223182, 0.0176916, 0.141209 kWh (7 entries); lognormal variance with pedigree 0.0032, pedigree (1,3,3,1,1)
  Amount and activity link based on primary data collected from participating companies.
- sulfidic tailings, from zinc-lead mine operation: 0 kg; name sulfidic_tailing; pedigree (1,1,1,1,1)
  Amount and activity link based on primary data collected from participating companies.
  production volume 0 kg
    (same comment as for copper concentrate, sulfide ore)
  property price 0 EUR2005; name sulfidic_tailing_price_EUR2005
  properties: iron content 0.030113, magnesium content 0.0043305, wet mass 1 kg, calcium content 0.0094279, aluminium content 0.014446, sulfur content 0.012233, water content 0.42857, potassium content 0.0063554, silicon content 0.041987, carbon content, fossil 0.0087785, dry mass 0.7 kg, oxygen content 0.86247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
- iron sulfate: 0 kg; pedigree (1,1,1,1,1)
  Amount and activity link based on primary data collected from participating companies.
  properties: dry mass 1 kg, wet mass 1 kg
- zinc slag: -0.000101519 kg; name zinc_slag; lognormal variance with pedigree 0.0032, pedigree (1,3,3,1,1)
  Amount and activity link based on primary data collected from participating companies.
  production volume 2.1567e6 kg; = zinc_slag / zinc_conc * zinc_conc_PV
    (same comment as for copper concentrate, sulfide ore)
  property price 0 EUR2005; name zinc_slag_price_EUR2005
  properties: zinc content 0.0666, potassium content 0.0066, manganese content 0.06405, calcium content 0.02735, wet mass 1 kg, dry mass 1 kg, iron content 0.153, copper content 0.0017175, magnesium content 0.012685, silicon content 0.144, aluminium content 0.022, oxygen content 0.242396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
- copper sulfate: 0.0109889 kg; lognormal variance with pedigree 0.0032, pedigree (1,3,3,1,1)
  Amount and activity link based on primary data collected from participating companies.
  properties: wet mass 1 kg, dry mass 1 kg
- heavy fuel oil: 0.000561552 kg; lognormal variance with pedigree 0.0032, pedigree (1,3,3,1,1)
  (same comment as for light fuel oil)
  properties: carbon content, fossil 0.849, wet mass 1 kg, dry mass 1 kg
- nylon 6: 0 kg; pedigree (1,1,1,1,1)
  Amount and activity link based on primary data collected from participating companies.
  properties: dry mass 1 kg, wet mass 1 kg, carbon content, fossil 0.637168
  note on carbon content, fossil: It is a chain of caprolactam molecules, originating from aminocarboxylic acids - here caproic acid or caprolactam. The structure of nylon 6 is -(NH-(CH2)5-CO)n-, C6H11NO (ecoinvent v2.2 report 11_II). MW=113 g/mol
- electricity, high voltage: 0.0859614 kWh; lognormal variance with pedigree 0.0032, pedigree (1,3,3,1,1)
  Amount and activity link based on primary data collected from participating companies.
- diesel: 0.00623366 kg; lognormal variance with pedigree 0.0032, pedigree (1,3,3,1,1)
  Amount and activity link based on primary data collected from participating companies. Emissions from diesel combustion included in dataset.
  properties: dry mass 1 kg, wet mass 1 kg, carbon content, fossil 0.865, carbon content, non-fossil 0.016474
  note on carbon content, fossil: C-content of diesel is 86.5% (ecoinvent v2.2 report 6_IV, Tab 3.14)
- zinc monosulfate: 0 kg; pedigree (1,1,1,1,1)
  Amount and activity link based on primary data collected from participating companies.
  properties: wet mass 1 kg, dry mass 1 kg
- concrete, 35MPa: 0 m3; pedigree (1,1,1,1,1)
  Amount and activity link based on primary data collected from participating companies.
  properties: cement content 312 kg, wet mass 2312 kg, dry mass 2150 kg, gravel content 950 kg, sand content 815 kg, fly ash content 73 kg, water content 0.0753488
- diesel: 0.0230409 kg; lognormal variance with pedigree 0.0032, pedigree (1,3,3,1,1)
  (same comment as for diesel)
  properties: carbon content, fossil 0.865, dry mass 1 kg, carbon content, non-fossil 0.016474, wet mass 1 kg
- tap water: 5.48062 kg; name water_tap_input; lognormal variance with pedigree 0.0032, pedigree (1,3,3,1,1)
  Amount and activity link based on primary data collected from participating companies.
  properties: water content 2962.17, dry mass 0.000337476 kg, wet mass 1 kg, carbon content, fossil 0.00178991
  note on carbon content, fossil: Bicarbonate content is 2.93 mol/m3. CO2 content is 0.1 mol/m3 (ecoinvent v2.2 report 8, Tab 93.1).
- aluminium chloride: 1.2348e-7 kg; lognormal variance with pedigree 0.0032, pedigree (1,3,3,1,1)
  Amount and activity link based on primary data collected from participating companies.
- steel, low-alloyed: 0.00232312 kg; lognormal variance with pedigree 0.0032, pedigree (1,3,3,1,1)
  Amount and activity link based on primary data collected from participating companies.
  properties: dry mass 1 kg, carbon content, fossil 0.005, wet mass 1 kg
- chemical, organic: 0.00293588 kg; lognormal variance with pedigree 0.0032, pedigree (1,3,3,1,1)
  Amount and activity link based on primary data collected from participating companies.
  properties: dry mass 1 kg, wet mass 1 kg, carbon content, fossil 0.628
  note on carbon content, fossil: This dataset is an unweighted average of 20 organic substances (listed in Tab 88.1, ecoinvent v2.2 report 8, part II), being part of the top100 chemicals included in this database. The C-content has also been calculated as an unweighted average of the C content of the substances composing this dataset.
- concrete, normal: 3.5346e-6 m3; lognormal variance with pedigree 0.0032, pedigree (1,3,3,1,1)
  Amount and activity link based on primary data collected from participating companies.
  properties: water content 0.086758, dry mass 2190 kg, wet mass 2380 kg
- chemical, inorganic: 0.000149851 kg; lognormal variance with pedigree 0.0032, pedigree (1,3,3,1,1)
  Amount and activity link based on primary data collected from participating companies.
  properties: dry mass 1 kg, carbon content, fossil 0.003, wet mass 1 kg
  note on carbon content, fossil: This dataset is an unweighted average of 20 inorganic substances (listed in Tab 88.1, ecoinvent v2.2 report 8, part II), being part of the top100 chemicals included in this database. The C-content has also been calculated as an unweighted average of the C content of the substances composing this dataset.
- transport, freight, lorry 16-32 metric ton, EURO3: 0 metric ton*km; pedigree (1,1,1,1,1)
  Inbound transport of materials to sites. Amount and activity link based on primary data collected from participating companies.
- acrylic acid: 0 kg; pedigree (1,1,1,1,1)
  Amount and activity link based on primary data collected from participating companies.
  properties: dry mass 1 kg, carbon content, fossil 0.5, wet mass 1 kg
- sulfuric acid: 0 kg; pedigree (1,1,1,1,1)
  Amount and activity link based on primary data collected from participating companies.
  properties: wet mass 1 kg, dry mass 1 kg
- waste wood, post-consumer: -2.48216e-5 kg; name waste_wood; lognormal variance with pedigree 0.0032, pedigree (1,3,3,1,1)
  Amount and activity link based on primary data collected from participating companies.
  production volume 527319 kg; = waste_wood / zinc_conc * zinc_conc_PV
    (same comment as for copper concentrate, sulfide ore)
  property price 0.079 EUR2005; name waste_wood_price_EUR2005
  properties: water content 0.4, carbon content, non-fossil 0.494, wet mass 1.4 kg, dry mass 1 kg
- sulfur dioxide, liquid: 0 kg; pedigree (1,1,1,1,1)
  Amount and activity link based on primary data collected from participating companies.
  properties: wet mass 1 kg, dry mass 1 kg
- acetic acid, without water, in 98% solution state: 2.10628e-5 kg; lognormal variance with pedigree 0.0032, pedigree (1,3,3,1,1)
  Amount and activity link based on primary data collected from participating companies.
  properties: wet mass 1 kg, carbon content, fossil 0.400016, dry mass 1 kg
- transport, freight, sea, bulk carrier for dry goods: 0.000221474 metric ton*km; lognormal variance with pedigree 0.1226, pedigree (1,3,3,1,1)
  (same comment as for transport, freight, lorry 16-32 metric ton, EURO3)
- cement, unspecified: 0.000213936 kg; lognormal variance with pedigree 0.0032, pedigree (1,3,3,1,1)
  Amount and activity link based on primary data collected from participating companies.
  properties: dry mass 1 kg, wet mass 1 kg
- sodium dichromate: 5.42057e-6 kg; lognormal variance with pedigree 0.0032, pedigree (1,3,3,1,1)
  Amount and activity link based on primary data collected from participating companies.
  properties: wet mass 1 kg, dry mass 1 kg
- waste paper, unsorted: 0 kg; name waste_paper; pedigree (1,1,1,1,1)
  Amount and activity link based on primary data collected from participating companies.
  production volume 0 kg
    (same comment as for copper concentrate, sulfide ore)
  property price 0.093 EUR2005; name waste_paper_price_EUR2005
- sodium cyanide: 0 kg; pedigree (1,1,1,1,1)
  Amount and activity link based on primary data collected from participating companies.
  properties: carbon content, fossil 0.244898, wet mass 1 kg, dry mass 1 kg
- waste mineral oil: 0 kg; name waste_mineral_oil; pedigree (1,1,1,1,1)
  Amount and activity link based on primary data collected from participating companies.
  production volume 0 kg
    (same comment as for copper concentrate, sulfide ore)
  property price 0 EUR2005; name waste_mineral_oil_price_EUR2005
  properties: carbon content, fossil 0.864444, dry mass 0.9 kg, wet mass 1 kg, water content 0.111111
- polyacrylamide: 5.26622e-5 kg; lognormal variance with pedigree 0.0032, pedigree (1,3,3,1,1)
  Amount and activity link based on primary data collected from participating companies.
  properties: wet mass 1 kg, dry mass 1 kg, carbon content, fossil 0.51
- used Li-ion battery: -1.41482e-6 kg; name used_battery; lognormal variance with pedigree 0.0032, pedigree (1,3,3,1,1)
  Amount and activity link based on primary data collected from participating companies.
  production volume 30057 kg; = used_battery / zinc_conc * zinc_conc_PV
    (same comment as for copper concentrate, sulfide ore)
  property price 0 EUR2005; name used_battery_price_EUR2005
  properties: wet mass 1 kg, carbon content, fossil 0.328011, dry mass 1 kg
- sodium sulfide: 0.000100573 kg; lognormal variance with pedigree 0.0032, pedigree (1,3,3,1,1)
  Amount and activity link based on primary data collected from participating companies.
  properties: wet mass 1 kg, dry mass 1 kg
- calcium chloride: 0 kg; pedigree (1,1,1,1,1)
  Amount and activity link based on primary data collected from participating companies.
  properties: dry mass 1 kg, wet mass 1 kg
- sodium hydrogen sulfite: 3.81846e-5 kg; lognormal variance with pedigree 0.0032, pedigree (1,3,3,1,1)
  Amount and activity link based on primary data collected from participating companies.
  properties: dry mass 1 kg, wet mass 1 kg
- municipal solid waste: 0 kg; name MSW; pedigree (1,1,1,1,1)
  Amount and activity link based on primary data collected from participating companies.
  production volume 0 kg
    (same comment as for copper concentrate, sulfide ore)
  property price 0 EUR2005; name MSW_price_EUR2005
  properties: water content 0.297017, dry mass 0.771 kg, wet mass 1 kg, carbon content, fossil 0.171549
  note on carbon content, fossil: MSW composition in tab 4.1, ecoinvent v2.2 report 13_I. C content referred to 1 kg DM
- quicklime, milled, loose: 0 kg; pedigree (1,1,1,1,1)
  Amount and activity link based on primary data collected from participating companies.
  properties: water content 0.010101, dry mass 0.99 kg, wet mass 1 kg
- waste rubber, unspecified: 0 kg; name waste_rubber; pedigree (1,1,1,1,1)
  Amount and activity link based on primary data collected from participating companies.
  production volume 0 kg
    (same comment as for copper concentrate, sulfide ore)
  property price 0 EUR2005; name waste_rubber_price_EUR2005
  properties: dry mass 1 kg, wet mass 1 kg, carbon content, fossil 0.853
- polyol: 0 kg; pedigree (1,1,1,1,1)
  Amount and activity link based on primary data collected from participating companies.
  properties: dry mass 1 kg, carbon content, fossil 0.640856, wet mass 1 kg
- soda ash, dense: 0.00192814 kg; lognormal variance with pedigree 0.0032, pedigree (1,3,3,1,1)
  Amount and activity link based on primary data collected from participating companies.
  properties: carbon content, fossil 0.113208, dry mass 1 kg, wet mass 1 kg
- non-sulfidic overburden, off-site: -15.7079 kg; name overburden; lognormal variance with pedigree 0.0032, pedigree (1,3,3,1,1)
  Amount and activity link based on primary data collected from participating companies.
  production volume 3.33704e11 kg; = overburden / zinc_conc * zinc_conc_PV
    (same comment as for copper concentrate, sulfide ore)
  property price 0 EUR2005; name overburden_price_EUR2005
  properties: wet mass 1 kg, dry mass 1 kg
- propane: 0.00127723 kg; lognormal variance with pedigree 0.0032, pedigree (1,3,3,1,1)
  Amount and activity link based on primary data collected from participating companies.
  properties: carbon content, fossil 0.272379, wet mass 1 kg, dry mass 1 kg
- scrap copper: 0 kg; name scrap_copper; pedigree (1,1,1,1,1)
  Amount and activity link based on primary data collected from participating companies.
  production volume 0 kg
    (same comment as for copper concentrate, sulfide ore)
  property price 0 EUR2005; name scrap_copper_price_EUR2005
  properties: wet mass 1 kg, dry mass 1 kg
- pig iron: 0.000391223 kg; lognormal variance with pedigree 0.0032, pedigree (1,3,3,1,1)
  Amount and activity link based on primary data collected from participating companies.
  properties: carbon content, fossil 0.045, dry mass 1 kg, wet mass 1 kg
- natural gas, high pressure: 4.37634e-5 m3; lognormal variance with pedigree 0.0032, pedigree (1,3,3,1,1)
  (same comment as for light fuel oil)
  properties: wet mass 0.84 kg, carbon content, fossil 0.602381, dry mass 0.84 kg
  note on carbon content, fossil: An average C content of 0.506 kg C/ m3 has been assumed (this average has been calculated using data in Tab 3.5, ecoinvent v2.2 report 6_V
- quicklime, in pieces, loose: 0 kg; pedigree (1,1,1,1,1)
  Amount and activity link based on primary data collected from participating companies.
  properties: wet mass 1 kg, water content 0.010101, dry mass 0.99 kg
- oxygen, liquid: 0 kg; pedigree (1,1,1,1,1)
  Amount and activity link based on primary data collected from participating companies.
  properties: dry mass 1 kg, wet mass 1 kg
- petrol, unleaded: 7.52366e-6, 3.33971e-7, 1.38023e-6, 3.32887e-7, 1.24533e-6, 6.8572e-8, 3.83304e-5 kg (7 entries); lognormal variance with pedigree 0.0032, pedigree (1,3,3,1,1)
  Amount and activity link based on primary data collected from participating companies.
- inert waste: -9.49775e-5, -8.18012e-7, -0.000334783 kg (3 entries); lognormal variance with pedigree 0.0032, pedigree (1,3,3,1,1)
  Amount and activity link based on primary data collected from participating companies.
  production volume 9.14737e6 kg
- lubricating oil: 0.000114697, 0.000544495 kg (2 entries); lognormal variance with pedigree 0.0032, pedigree (1,3,3,1,1)
  Amount and activity link based on primary data collected from participating companies.
- lime, hydrated, packed: 5.84291e-7, 6.88346e-5 kg (2 entries); lognormal variance with pedigree 0.0032, pedigree (1,3,3,1,1)
  Amount and activity link based on primary data collected from participating companies.
- limestone, crushed, washed: 8.84714e-9, 1.0376e-6 kg (2 entries); lognormal variance with pedigree 0.0032, pedigree (1,3,3,1,1)
  Amount and activity link based on primary data collected from participating companies.
- bilge oil: -1.07556e-6, -2.81144e-8, -2.23657e-6 kg (3 entries); lognormal variance with pedigree 0.0032, pedigree (1,3,3,1,1)
  Amount and activity link based on primary data collected from participating companies.
  production volume 70961.3 kg
- lime: 2.28451e-5, 0.000264508 kg (2 entries); lognormal variance with pedigree 0.0032, pedigree (1,3,3,1,1)
  Amount and activity link based on primary data collected from participating companies.
- hazardous waste, for incineration: -0.000997939, -2.60855e-5, -0.00207516 kg (3 entries); lognormal variance with pedigree 0.0032, pedigree (1,3,3,1,1)
  Amount and activity link based on primary data collected from participating companies.
  production volume 6.58402e7 kg
- limestone, unprocessed: 9.86148e-5, 1.02091e-6, 0.00249672 kg (3 entries); lognormal variance with pedigree 0.0032, pedigree (1,3,3,1,1)
  Amount and activity link based on primary data collected from participating companies.
- hydrogen cyanide: 1.41877e-5, 3.12129e-5 kg (2 entries); lognormal variance with pedigree 0.0032, pedigree (1,3,3,1,1)
  Amount and activity link based on primary data collected from participating companies.
- sulfidic tailings, from zinc-lead mine operation: -2.00204, -0.281841, -0.246853, -0.522863, -0.10224, -0.678361, -0.35959, -1.15146 kg (8 entries); lognormal variance with pedigree 0.0032, pedigree (1,3,3,1,1)
  Amount and activity link based on primary data collected from participating companies.
  production volume 1.13556e11 kg
- iron sulfate: 1.67438e-5, 3.3904e-5 kg (2 entries); lognormal variance with pedigree 0.0032, pedigree (1,3,3,1,1)
  Amount and activity link based on primary data collected from participating companies.
- nylon 6: 4.10705e-6, 8.31626e-6 kg (2 entries); lognormal variance with pedigree 0.0032, pedigree (1,3,3,1,1)
  Amount and activity link based on primary data collected from participating companies.
- zinc monosulfate: 0.000402437, 0.00212595 kg (2 entries); lognormal variance with pedigree 0.0032, pedigree (1,3,3,1,1)
  Amount and activity link based on primary data collected from participating companies.
- concrete, 35MPa: 8.02152e-8, 5.01602e-10, 3.20611e-9, 6.61921e-7 m3 (4 entries); lognormal variance with pedigree 0.0032, pedigree (1,3,3,1,1)
  Amount and activity link based on primary data collected from participating companies.
- transport, freight, lorry 16-32 metric ton, EURO3: 0.000564302, 0.0013883 metric ton*km (2 entries); lognormal variance with pedigree 0.1226, pedigree (1,3,3,1,1)
  (same comment as for transport, freight, lorry 16-32 metric ton, EURO3)
- acrylic acid: 3.28805e-6, 1.56088e-5 kg (2 entries); lognormal variance with pedigree 0.0032, pedigree (1,3,3,1,1)
  Amount and activity link based on primary data collected from participating companies.
- sulfuric acid: 6.82651e-5, 0.000392056 kg (2 entries); lognormal variance with pedigree 0.0032, pedigree (1,3,3,1,1)
  Amount and activity link based on primary data collected from participating companies.
- sulfur dioxide, liquid: 0.000159253, 0.000396408 kg (2 entries); lognormal variance with pedigree 0.0032, pedigree (1,3,3,1,1)
  Amount and activity link based on primary data collected from participating companies.
- waste paper, unsorted: -2.70311e-8, -8.23874e-10, -1.81434e-7 kg (3 entries); lognormal variance with pedigree 0.0032, pedigree (1,3,3,1,1)
  Amount and activity link based on primary data collected from participating companies.
  production volume 4446.2 kg
  properties: price 0.093 EUR2005
- sodium cyanide: 3.66053e-5, 7.41211e-5 kg (2 entries); lognormal variance with pedigree 0.0032, pedigree (1,3,3,1,1)
  Amount and activity link based on primary data collected from participating companies.
- waste mineral oil: -2.25647e-5, -5.22124e-7, -6.71358e-5 kg (3 entries); lognormal variance with pedigree 0.0032, pedigree (1,3,3,1,1)
  Amount and activity link based on primary data collected from participating companies.
  production volume 1.91672e6 kg
- calcium chloride: 6.89362e-6, 2.38717e-5 kg (2 entries); lognormal variance with pedigree 0.0032, pedigree (1,3,3,1,1)
  Amount and activity link based on primary data collected from participating companies.
- municipal solid waste: -9.6566e-5, -5.9188e-7, -4.14174e-7, -1.64371e-6, -0.0011625 kg (5 entries); lognormal variance with pedigree 0.0032, pedigree (1,3,3,1,1)
  Amount and activity link based on primary data collected from participating companies.
  production volume 2.68043e7 kg
- quicklime, milled, loose: 1.01472e-6, 0.000121419 kg (2 entries); lognormal variance with pedigree 0.0032, pedigree (1,3,3,1,1)
  Amount and activity link based on primary data collected from participating companies.
- waste rubber, unspecified: -1.82207e-7, -7.64901e-9, -1.82207e-7 kg (3 entries); lognormal variance with pedigree 0.0032, pedigree (1,3,3,1,1)
  Amount and activity link based on primary data collected from participating companies.
  production volume 7904.23 kg
- polyol: 2.43419e-5, 4.92893e-5 kg (2 entries); lognormal variance with pedigree 0.0032, pedigree (1,3,3,1,1)
  Amount and activity link based on primary data collected from participating companies.
- scrap copper: -1.6285e-5, -7.64055e-7, -3.42895e-5 kg (3 entries); lognormal variance with pedigree 0.0032, pedigree (1,3,3,1,1)
  Amount and activity link based on primary data collected from participating companies.
  production volume 1.09065e6 kg
- quicklime, in pieces, loose: 8.09735e-8, 0.00489295 kg (2 entries); lognormal variance with pedigree 0.0032, pedigree (1,3,3,1,1)
  Amount and activity link based on primary data collected from participating companies.
- oxygen, liquid: 1.65377e-7, 6.02711e-7 kg (2 entries); lognormal variance with pedigree 0.0032, pedigree (1,3,3,1,1)
  Amount and activity link based on primary data collected from participating companies.

## Inputs from nature
All rows: lognormal variance with pedigree 0.0032, pedigree (1,3,3,1,1)
- Dolomite, in ground [natural resource, in ground]: 2.30217e-6 kg
  Amount and activity link based on primary data collected from participating companies.
- Water, lake [natural resource, in water]: 0.000741392 m3; name water_lake_input
  Amount and activity link based on primary data collected from participating companies.
- Sulfur, in ground [natural resource, in ground]: 0.00714064 kg
  Amount and activity link based on primary data collected from participating companies.
- Water, cooling, unspecified natural origin [natural resource, in water]: 0.00418918 m3; name water_cooling_input
  Amount and activity link based on primary data collected from participating companies.
- Water, unspecified natural origin [natural resource, in water]: 0.0460247 m3; name water_unspecified_input
  Amount and activity link based on primary data collected from participating companies.
- Strontium, in ground [natural resource, in ground]: 2.92344e-5 kg
  Amount and activity link based on primary data collected from participating companies.
- Copper, in ground [natural resource, in ground]: 0.0167852 kg
  Amount and activity link based on primary data collected from participating companies.
- Aluminium, in ground [natural resource, in ground]: 0.00216873 kg
  Amount and activity link based on primary data collected from participating companies.
- Gangue, in ground [natural resource, in ground]: 20.3032 kg
  Amount and activity link based on primary data collected from participating companies.
- Gold, in ground [natural resource, in ground]: 0.00139617 kg
  Amount and activity link based on primary data collected from participating companies.
- Vanadium, in ground [natural resource, in ground]: 2.77415e-6 kg
  Amount and activity link based on primary data collected from participating companies.
- Zinc, in ground [natural resource, in ground]: 0.606852 kg
  Amount and activity link based on primary data collected from participating companies.
- Titanium, in ground [natural resource, in ground]: 0.000102424 kg
  Amount and activity link based on primary data collected from participating companies.
- Sodium, in ground [natural resource, in ground]: 8.29343e-5 kg
  Amount and activity link based on primary data collected from participating companies.
- Nickel, in ground [natural resource, in ground]: 1.6338e-6 kg
  Amount and activity link based on primary data collected from participating companies.
- Silver, in ground [natural resource, in ground]: 0.000221615 kg
  Amount and activity link based on primary data collected from participating companies.
- Potassium, in ground [natural resource, in ground]: 0.0027161 kg
  Amount and activity link based on primary data collected from participating companies.
- Manganese, in ground [natural resource, in ground]: 0.000156882 kg
  Amount and activity link based on primary data collected from participating companies.
- Magnesium, in ground [natural resource, in ground]: 0.0430844 kg
  Amount and activity link based on primary data collected from participating companies.
- Phosphorus, in ground [natural resource, in ground]: 1.85359e-5 kg
  Amount and activity link based on primary data collected from participating companies.
- Iron, in ground [natural resource, in ground]: 0.00272024 kg
  Amount and activity link based on primary data collected from participating companies.
- Mercury, in ground [natural resource, in ground]: 2.2102e-8 kg
  Amount and activity link based on primary data collected from participating companies.
- Lead, in ground [natural resource, in ground]: 0.129753 kg
  Amount and activity link based on primary data collected from participating companies.
- Sand, unspecified, in ground [natural resource, in ground]: 0.00010904 kg
  Amount and activity link based on primary data collected from participating companies.
- Cadmium, in ground [natural resource, in ground]: 7.13235e-5 kg
  Amount and activity link based on primary data collected from participating companies.
- Calcium, in ground [natural resource, in ground]: 0.0753707 kg
  Amount and activity link based on primary data collected from participating companies.
- Barium, in ground [natural resource, in ground]: 1.15279e-5 kg
  Amount and activity link based on primary data collected from participating companies.
- Water, well, in ground [natural resource, in water]: 0.00202757 m3; name water_well_in_ground_input
  Amount and activity link based on primary data collected from participating companies.
- Water, river [natural resource, in water]: 8.37153e-5 m3; name water_river_input
  Amount and activity link based on primary data collected from participating companies.
- Chromium, in ground [natural resource, in ground]: 2.67877e-6 kg
  Amount and activity link based on primary data collected from participating companies.
## Emissions to nature
- Lead [soil, industrial]: 2.04474e-8 kg; lognormal variance with pedigree 0.0426, pedigree (1,3,3,1,1)
  Amount and activity link based on primary data collected from participating companies.
- Sulfur dioxide [air, unspecified]: 8.16855e-5 kg; lognormal variance with pedigree 0.0032, pedigree (1,3,3,1,1)
  Amount and activity link based on primary data collected from participating companies.
- Ammonia [air, unspecified]: 1.28252e-6 kg; lognormal variance with pedigree 0.0426, pedigree (1,3,3,1,1)
  Amount and activity link based on primary data collected from participating companies.
- Hydrogen chloride [air, unspecified]: 2.09004e-7 kg; lognormal variance with pedigree 0.0426, pedigree (1,3,3,1,1)
  Amount and activity link based on primary data collected from participating companies.
- Suspended solids, unspecified [water, ocean]: 0.000146177 kg; lognormal variance with pedigree 0.0426, pedigree (1,3,3,1,1)
  Amount and activity link based on primary data collected from participating companies.
- Ammonium, ion [water, surface water]: 3.24289e-6 kg; lognormal variance with pedigree 0.0426, pedigree (1,3,3,1,1)
  Amount and activity link based on primary data collected from participating companies.
- Hydrocarbons, unspecified [soil, unspecified]: 6.66675e-7 kg; lognormal variance with pedigree 0.0426, pedigree (1,3,3,1,1)
  Amount and activity link based on primary data collected from participating companies.
- Selenium [air, unspecified]: 3.23455e-8 kg; lognormal variance with pedigree 0.6526, pedigree (1,3,3,1,1)
  Amount and activity link based on primary data collected from participating companies.
- Antimony [water, surface water]: 8.89476e-8 kg; lognormal variance with pedigree 0.6526, pedigree (1,3,3,1,1)
  Amount and activity link based on primary data collected from participating companies.
- Fluoride [soil, industrial]: 1.33986e-6 kg; lognormal variance with pedigree 0.0426, pedigree (1,3,3,1,1)
  Amount and activity link based on primary data collected from participating companies.
- Sodium [soil, industrial]: 8.38864e-10 kg; lognormal variance with pedigree 0.0426, pedigree (1,3,3,1,1)
  Amount and activity link based on primary data collected from participating companies.
- Benzene [air, unspecified]: 1.04502e-6 kg; lognormal variance with pedigree 0.0426, pedigree (1,3,3,1,1)
  Amount and activity link based on primary data collected from participating companies.
- Lead [air, unspecified]: 5.94282e-5 kg; lognormal variance with pedigree 0.6526, pedigree (1,3,3,1,1)
  Amount and activity link based on primary data collected from participating companies.
- Sulfate [soil, unspecified]: 1.42848e-8 kg; lognormal variance with pedigree 0.0426, pedigree (1,3,3,1,1)
  Amount and activity link based on primary data collected from participating companies.
- Aluminium [water, surface water]: 5.15006e-8 kg; lognormal variance with pedigree 0.6526, pedigree (1,3,3,1,1)
  Amount and activity link based on primary data collected from participating companies.
- Fluorine [air, unspecified]: 2.40478e-6 kg; lognormal variance with pedigree 0.0426, pedigree (1,3,3,1,1)
  Amount and activity link based on primary data collected from participating companies.
- Zinc [soil, industrial]: 5.86842e-6 kg; lognormal variance with pedigree 0.0426, pedigree (1,3,3,1,1)
  Amount and activity link based on primary data collected from participating companies.
- Sulfate [water, surface water]: 0.00425019 kg; lognormal variance with pedigree 0.0426, pedigree (1,3,3,1,1)
  Amount and activity link based on primary data collected from participating companies.
- Arsenic, ion [water, ocean]: 1.53827e-10 kg; lognormal variance with pedigree 0.6526, pedigree (1,3,3,1,1)
  Amount and activity link based on primary data collected from participating companies.
- Dissolved solids [water, surface water]: 0.00461854 kg; lognormal variance with pedigree 0.0426, pedigree (1,3,3,1,1)
  Amount and activity link based on primary data collected from participating companies.
- Zinc, ion [water, ocean]: 5.40071e-6 kg; lognormal variance with pedigree 0.6526, pedigree (1,3,3,1,1)
  Amount and activity link based on primary data collected from participating companies.
- Selenium [water, surface water]: 3.72908e-9 kg; lognormal variance with pedigree 0.6526, pedigree (1,3,3,1,1)
  Amount and activity link based on primary data collected from participating companies.
- Antimony [air, unspecified]: 3.71665e-7 kg; lognormal variance with pedigree 0.6526, pedigree (1,3,3,1,1)
  Amount and activity link based on primary data collected from participating companies.
- Fluoride [water, ocean]: 9.42615e-8 kg; lognormal variance with pedigree 0.0426, pedigree (1,3,3,1,1)
  Amount and activity link based on primary data collected from participating companies.
- Particulates, < 2.5 um [air, unspecified]: 1.33069e-5 kg; lognormal variance with pedigree 0.3026, pedigree (1,3,3,1,1)
  Amount and activity link based on primary data collected from participating companies.
- Fluoride [water, surface water]: 1.90427e-6 kg; lognormal variance with pedigree 0.0426, pedigree (1,3,3,1,1)
  Amount and activity link based on primary data collected from participating companies.
- TOC, Total Organic Carbon [water, surface water]: 1.94639e-7 kg; name TOC_sw; lognormal variance with pedigree 0.0426, pedigree (1,3,3,1,1)
  Amount and activity link based on primary data collected from participating companies.
- Particulates, > 2.5 um, and < 10um [air, unspecified]: 0.000297991 kg; lognormal variance with pedigree 0.1226, pedigree (1,3,3,1,1)
  Amount and activity link based on primary data collected from participating companies.
- Aldehydes, unspecified [air, unspecified]: 5.98813e-8 kg; lognormal variance with pedigree 0.0426, pedigree (1,3,3,1,1)
  Amount and activity link based on primary data collected from participating companies.
- Formaldehyde [air, unspecified]: 4.51259e-6 kg; lognormal variance with pedigree 0.0426, pedigree (1,3,3,1,1)
  Amount and activity link based on primary data collected from participating companies.
- Zinc, ion [water, surface water]: 0.00043391 kg; lognormal variance with pedigree 0.6526, pedigree (1,3,3,1,1)
  Amount and activity link based on primary data collected from participating companies.
- Phosphorus [water, surface water]: 1.31254e-6 kg; lognormal variance with pedigree 0.0426, pedigree (1,3,3,1,1)
  Amount and activity link based on primary data collected from participating companies.
- Water [water, unspecified]: 0.0497656 m3; = (water_river_input+water_unspecified_input+water_cooling_input+water_lake_input+water_tap_input/999.8899)*(1-fraction_PW_to_air)+water_well_in_ground_input*(1-fraction_PW_to_air); lognormal variance with pedigree 0.0433, pedigree (3,3,5,3,1)
  Calculated value based on 'zinc mine operation, GLO, 1994-2003' evaporation factor, which in turn is based on literature values and expert opinion. See comments in the parameter's comment field.
- Copper, ion [water, surface water]: 9.2021e-6 kg; lognormal variance with pedigree 0.6526, pedigree (1,3,3,1,1)
  Amount and activity link based on primary data collected from participating companies.
- Sodium, ion [water, surface water]: 0.000134141 kg; lognormal variance with pedigree 0.0426, pedigree (1,3,3,1,1)
  Amount and activity link based on primary data collected from participating companies.
- Dioxins, measured as 2,3,7,8-tetrachlorodibenzo-p-dioxin [air, unspecified]: 0 kg; pedigree (1,1,1,1,1)
  Amount and activity link based on primary data collected from participating companies.
- Potassium, ion [water, surface water]: 5.53497e-5 kg; lognormal variance with pedigree 0.0426, pedigree (1,3,3,1,1)
  Amount and activity link based on primary data collected from participating companies.
- Cyanide [water, surface water]: 4.03604e-8 kg; lognormal variance with pedigree 0.0426, pedigree (1,3,3,1,1)
  Amount and activity link based on primary data collected from participating companies.
- Particulates, > 10 um [air, unspecified]: 0.00108642 kg; lognormal variance with pedigree 0.0426, pedigree (1,3,3,1,1)
  Amount and activity link based on primary data collected from participating companies.
- COD, Chemical Oxygen Demand [water, ocean]: 7.68391e-9 kg; name COD_ocean; = BOD5_ocean / 0.2; source Weidema B P 2013; lognormal variance with pedigree 0.25, pedigree (5,5,5,5,5)
  Calculated value. The amount of COD is assumed to be five times that of BOD5, based on the estimates provided in section 5.9.7 of Weidema et al. (2013).
- Copper, ion [water, ocean]: 1.13434e-10 kg; lognormal variance with pedigree 0.6526, pedigree (1,3,3,1,1)
  Amount and activity link based on primary data collected from participating companies.
- Nitrogen oxides [air, unspecified]: 0.00129275 kg; lognormal variance with pedigree 0.0426, pedigree (1,3,3,1,1)
  Amount and activity link based on primary data collected from participating companies.
- DOC, Dissolved Organic Carbon [water, surface water]: 1.94639e-7 kg; = TOC_sw; lognormal variance with pedigree 0.25, pedigree (5,5,5,5,5)
  Calculated value. The amount of DOC is assumed to be equal to the amount of TOC
- Cobalt [air, unspecified]: 7.97326e-7 kg; lognormal variance with pedigree 0.6526, pedigree (1,3,3,1,1)
  Amount and activity link based on primary data collected from participating companies.
- Nitrogen, organic bound [water, surface water]: 2.07195e-5 kg; lognormal variance with pedigree 0.0426, pedigree (1,3,3,1,1)
  Amount and activity link based on primary data collected from participating companies.
- DOC, Dissolved Organic Carbon [water, ocean]: 2.84589e-9 kg; = TOC_ocean; lognormal variance with pedigree 0.25, pedigree (5,5,5,5,5)
  Calculated value. The amount of DOC is assumed to be equal to the amount of TOC
- Chromium VI [water, surface water]: 0.000114889 kg; lognormal variance with pedigree 0.6526, pedigree (1,3,3,1,1)
  Amount and activity link based on primary data collected from participating companies.
- Nitrogen [water, surface water]: 1.04313e-5 kg; lognormal variance with pedigree 0.0426, pedigree (1,3,3,1,1)
  Amount and activity link based on primary data collected from participating companies.
- TOC, Total Organic Carbon [water, ocean]: 2.84589e-9 kg; name TOC_ocean; = COD_ocean / 2.7; source Weidema B P 2013; lognormal variance with pedigree 0.25, pedigree (5,5,5,5,5)
  Calculated value. The relation between COD and TOC is assumed to be COD (g O2) = 2.7*TOC (g C), based on the estimates provided in section 5.9.7 of Weidema et al. (2013).
- Chromium [soil, industrial]: 3.76719e-11 kg; lognormal variance with pedigree 0.0426, pedigree (1,3,3,1,1)
  Amount and activity link based on primary data collected from participating companies.
- Nickel, ion [water, surface water]: 2.78317e-7 kg; lognormal variance with pedigree 0.6526, pedigree (1,3,3,1,1)
  Amount and activity link based on primary data collected from participating companies.
- Nitric acid [soil, industrial]: 4.47014e-8 kg; lognormal variance with pedigree 0.0426, pedigree (1,3,3,1,1)
  Amount and activity link based on primary data collected from participating companies.
- COD, Chemical Oxygen Demand [water, surface water]: 7.31444e-6 kg; lognormal variance with pedigree 0.0426, pedigree (1,3,3,1,1)
  Amount and activity link based on primary data collected from participating companies.
- NMVOC, non-methane volatile organic compounds, unspecified origin [air, unspecified]: 5.97202e-5 kg; lognormal variance with pedigree 0.0426, pedigree (1,3,3,1,1)
  Amount and activity link based on primary data collected from participating companies.
- Water [air, unspecified]: 0.00878216 m3; = (water_river_input*fraction_PW_to_air)+(water_well_in_ground_input*fraction_PW_to_air)+(water_unspecified_input*fraction_PW_to_air)+(water_tap_input/999.8899*fraction_PW_to_air)+(water_cooling_input*fraction_PW_to_air)+(water_lake_input*fraction_PW_to_air); lognormal variance with pedigree 0.0433, pedigree (3,3,5,3,1)
  (same comment as for Water)
- Copper [soil, industrial]: 2.27185e-6 kg; lognormal variance with pedigree 0.0426, pedigree (1,3,3,1,1)
  Amount and activity link based on primary data collected from participating companies.
- PAH, polycyclic aromatic hydrocarbons [air, unspecified]: 9.37047e-10 kg; lognormal variance with pedigree 0.3026, pedigree (1,3,3,1,1)
  Amount and activity link based on primary data collected from participating companies.
- Chromium VI [air, unspecified]: 9.20868e-9 kg; lognormal variance with pedigree 0.6526, pedigree (1,3,3,1,1)
  Amount and activity link based on primary data collected from participating companies.
- Nickel [soil, industrial]: 8.765e-9 kg; lognormal variance with pedigree 0.0426, pedigree (1,3,3,1,1)
  Amount and activity link based on primary data collected from participating companies.
- Chromium [air, unspecified]: 1.11856e-7 kg; lognormal variance with pedigree 0.6526, pedigree (1,3,3,1,1)
  Amount and activity link based on primary data collected from participating companies.
- Nitrogen [soil, industrial]: 1.69942e-6 kg; lognormal variance with pedigree 0.0426, pedigree (1,3,3,1,1)
  Amount and activity link based on primary data collected from participating companies.
- Copper [air, unspecified]: 6.30222e-5 kg; lognormal variance with pedigree 0.6526, pedigree (1,3,3,1,1)
  Amount and activity link based on primary data collected from participating companies.
- Nickel [air, unspecified]: 6.30646e-7 kg; lognormal variance with pedigree 0.6526, pedigree (1,3,3,1,1)
  Amount and activity link based on primary data collected from participating companies.
- Ammonia [soil, industrial]: 5.5264e-7 kg; lognormal variance with pedigree 0.0426, pedigree (1,3,3,1,1)
  Amount and activity link based on primary data collected from participating companies.
- Carbon dioxide, non-fossil [air, unspecified]: 0.00176704 kg; lognormal variance with pedigree 0.0032, pedigree (1,3,3,1,1)
  Amount and activity link based on primary data collected from participating companies.
- Nitrate [water, surface water]: 0.000131039 kg; lognormal variance with pedigree 0.0426, pedigree (1,3,3,1,1)
  Amount and activity link based on primary data collected from participating companies.
- Chlorine [water, surface water]: 6.63982e-5 kg; lognormal variance with pedigree 0.0426, pedigree (1,3,3,1,1)
  Amount and activity link based on primary data collected from participating companies.
- Nickel, ion [water, ocean]: 8.09946e-11 kg; lognormal variance with pedigree 0.6526, pedigree (1,3,3,1,1)
  Amount and activity link based on primary data collected from participating companies.
- Carbon monoxide, fossil [air, unspecified]: 0.000239947 kg; lognormal variance with pedigree 0.6526, pedigree (1,3,3,1,1)
  Amount and activity link based on primary data collected from participating companies.
- Methane, fossil [air, unspecified]: 6.97416e-6 kg; lognormal variance with pedigree 0.0426, pedigree (1,3,3,1,1)
  Amount and activity link based on primary data collected from participating companies.
- Calcium, ion [water, surface water]: 0.00149082 kg; lognormal variance with pedigree 0.0426, pedigree (1,3,3,1,1)
  Amount and activity link based on primary data collected from participating companies.
- Methanol [air, unspecified]: 2.71503e-5 kg; lognormal variance with pedigree 0.0426, pedigree (1,3,3,1,1)
  Amount and activity link based on primary data collected from participating companies.
- Chloride [water, surface water]: 2.07195e-5 kg; lognormal variance with pedigree 0.0426, pedigree (1,3,3,1,1)
  Amount and activity link based on primary data collected from participating companies.
- Mercury [air, unspecified]: 3.51554e-8 kg; lognormal variance with pedigree 0.6526, pedigree (1,3,3,1,1)
  Amount and activity link based on primary data collected from participating companies.
- BOD5, Biological Oxygen Demand [water, surface water]: 1.12425e-6 kg; lognormal variance with pedigree 0.0426, pedigree (1,3,3,1,1)
  Amount and activity link based on primary data collected from participating companies.
- Mercury [water, surface water]: 1.43415e-7 kg; lognormal variance with pedigree 0.6526, pedigree (1,3,3,1,1)
  Amount and activity link based on primary data collected from participating companies.
- Calcium [soil, industrial]: 2.52054e-8 kg; lognormal variance with pedigree 0.0426, pedigree (1,3,3,1,1)
  Amount and activity link based on primary data collected from participating companies.
- Mercury [soil, industrial]: 3.5579e-10 kg; lognormal variance with pedigree 0.0426, pedigree (1,3,3,1,1)
  Amount and activity link based on primary data collected from participating companies.
- Cadmium, ion [water, surface water]: 2.2026e-6 kg; lognormal variance with pedigree 0.6526, pedigree (1,3,3,1,1)
  Amount and activity link based on primary data collected from participating companies.
- Magnesium [water, surface water]: 0.00010308 kg; lognormal variance with pedigree 0.0426, pedigree (1,3,3,1,1)
  Amount and activity link based on primary data collected from participating companies.
- Beryllium [air, unspecified]: 2.4628e-8 kg; lognormal variance with pedigree 0.0426, pedigree (1,3,3,1,1)
  Amount and activity link based on primary data collected from participating companies.
- Manganese [soil, industrial]: 1.26808e-6 kg; lognormal variance with pedigree 0.0426, pedigree (1,3,3,1,1)
  Amount and activity link based on primary data collected from participating companies.
- Cadmium [air, unspecified]: 6.1586e-7 kg; lognormal variance with pedigree 0.6526, pedigree (1,3,3,1,1)
  Amount and activity link based on primary data collected from participating companies.
- Manganese [water, ocean]: 1.01714e-8 kg; lognormal variance with pedigree 0.6526, pedigree (1,3,3,1,1)
  Amount and activity link based on primary data collected from participating companies.
- BOD5, Biological Oxygen Demand [water, ocean]: 1.53678e-9 kg; name BOD5_ocean; lognormal variance with pedigree 0.0426, pedigree (1,3,3,1,1)
  Amount and activity link based on primary data collected from participating companies.
- Mercury [water, ocean]: 9.05077e-12 kg; lognormal variance with pedigree 0.6526, pedigree (1,3,3,1,1)
  Amount and activity link based on primary data collected from participating companies.
- Carbon dioxide, fossil [air, unspecified]: 0.121388 kg; lognormal variance with pedigree 0.0032, pedigree (1,3,3,1,1)
  Amount and activity link based on primary data collected from participating companies. Accounts for on-site combustion of diesel at mine. Some companies provided emissions on the combustion of natural gas, diesel, propane, or other fuels, which are included here. If no emissions were provided for these other fuels then input is reflected as a an input of heat instead of a direct fuel input.
- Lead [water, surface water]: 2.94716e-6 kg; lognormal variance with pedigree 0.6526, pedigree (1,3,3,1,1)
  Amount and activity link based on primary data collected from participating companies.
- Cadmium [soil, industrial]: 8.77546e-9 kg; lognormal variance with pedigree 0.0426, pedigree (1,3,3,1,1)
  Amount and activity link based on primary data collected from participating companies.
- Manganese [air, unspecified]: 4.28204e-6 kg; lognormal variance with pedigree 0.6526, pedigree (1,3,3,1,1)
  Amount and activity link based on primary data collected from participating companies.
- Water [water, surface water]: 0.000165507 m3; lognormal variance with pedigree 0.0426, pedigree (1,3,3,1,1)
  Amount and activity link based on primary data collected from participating companies.
- Arsenic [soil, industrial]: 2.43611e-9 kg; lognormal variance with pedigree 0.0426, pedigree (1,3,3,1,1)
  Amount and activity link based on primary data collected from participating companies.
- Manganese [water, surface water]: 1.51017e-5 kg; lognormal variance with pedigree 0.6526, pedigree (1,3,3,1,1)
  Amount and activity link based on primary data collected from participating companies.
- VOC, volatile organic compounds, unspecified origin [air, unspecified]: 2.88501e-6 kg; lognormal variance with pedigree 0.0426, pedigree (1,3,3,1,1)
  Amount and activity link based on primary data collected from participating companies.
- Cadmium, ion [water, ocean]: 4.78142e-8 kg; lognormal variance with pedigree 0.6526, pedigree (1,3,3,1,1)
  Amount and activity link based on primary data collected from participating companies.
- Lead [water, ocean]: 9.77649e-7 kg; lognormal variance with pedigree 0.6526, pedigree (1,3,3,1,1)
  Amount and activity link based on primary data collected from participating companies.
- Suspended solids, unspecified [water, surface water]: 0.000249827 kg; lognormal variance with pedigree 0.0426, pedigree (1,3,3,1,1)
  Amount and activity link based on primary data collected from participating companies.
- Benzo(a)pyrene [air, unspecified]: 6.69762e-11 kg; lognormal variance with pedigree 0.3026, pedigree (1,3,3,1,1)
  Amount and activity link based on primary data collected from participating companies.
- Hydrogen fluoride [air, unspecified]: 1.60734e-7 kg; lognormal variance with pedigree 0.0426, pedigree (1,3,3,1,1)
  Amount and activity link based on primary data collected from participating companies.
- Sulfur oxides [air, unspecified]: 1.96811e-6 kg; lognormal variance with pedigree 0.0426, pedigree (1,3,3,1,1)
  Amount and activity link based on primary data collected from participating companies.
- Arsenic, ion [water, surface water]: 2.53998e-5 kg; lognormal variance with pedigree 0.6526, pedigree (1,3,3,1,1)
  Amount and activity link based on primary data collected from participating companies.
- Iron, ion [water, surface water]: 0.00012633 kg; lognormal variance with pedigree 0.6526, pedigree (1,3,3,1,1)
  Amount and activity link based on primary data collected from participating companies.
- Zinc [air, unspecified]: 5.8805e-5 kg; lognormal variance with pedigree 0.6526, pedigree (1,3,3,1,1)
  Amount and activity link based on primary data collected from participating companies.
- Arsenic [air, unspecified]: 3.26756e-6 kg; lognormal variance with pedigree 0.6526, pedigree (1,3,3,1,1)
  Amount and activity link based on primary data collected from participating companies.

## Sampling procedure
The 24 participating mines provided primary data directly to the study practitioner. All primary data were collected using customized data collection templates, which were sent out by e-mail to the respective data providers in the participating companies. Upon receipt, each questionnaire was cross-checked for completeness and plausibility using mass balance, stoichiometry, and benchmarking. Issues related to data gaps, outliers, or other inconsistencies were resolved through individual engagement with the participating companies. Percent representativeness is calculated in reference to global annual production.

## Review by Louis Brimacombe 2018-06-01
Data look reasonable and queries have been addressed.
