# coffee maker production

Dataset: EcoSpold 2, unit process
Geography: GLO
Time period: 2009-01-01 to 2019-12-31
Technology level: current
Classification: ISIC rev.4 ecoinvent: 2750:Manufacture of domestic appliances
Synonyms: automatic coffee maker; automatic coffee machine; coffee machine
Scenario: Business-as-Usual
System model: Allocation at the point of substitution
Generated by: Viachaslau Filimonau
Published in: Ashby, M.F. 2009
Database: ecoinvent
isCopyrightProtected: true
accessRestrictedTo: 1

## General comment
This activity represents the production and disposal of an average coffee maker which is approximately 1.9 kg in mass and has a rating of 640 W. It has the envisaged lifetime of 5 years and is manufactured in Asia. The figures on material inputs from technosphere and energy required to produce an average coffee maker are taken from Ashby 2009. The figure on the annual production volume (3400000 units) is calculated from Future Market Insights 2018. This figure represents the annual production forecast for 2026 and combines coffee makers produced for coffee shops (1000000 units) and for in-home consumption (2400000 units). Future Market Insights 2018 forecast a 6% growth throughout to 2026. This suggests that, in 2018, the annual production volume approximately equates to 3200000 units of coffee makers.

## Included activities start
This activity starts with the reception of materials at the factory.

## Included activities end
The activity includes the processes of material and energy use in manufacturing an average coffee maker. The inventory additionally accounts for disposal of all materials. Packaging is not included.

## Geography
Geography GLO was chosen because the dataset aims to represent the production of an average coffee maker. The literature sources used refer to manufacturing in Asia.

## Time period
The literature sources used refer to the underpinning technology as being current.

## Reference product
- coffee maker: 1 unit; CPC 44816: Other small electric domestic appliances (including vacuum cleaners, kitchen waste disposers, food mixers, sha[…]; By-product classification allocatable product
  Annual production volume is from Future Market Insights 2018. Automatic coffee machine market to grow at a CAGR of 6.0% through 2016, globally - Future Market Insights. Available from: https://globenewswire.com/news-release/2018/01/09/1285914/0/en/Automatic-Coffee-Machine-Market-to-Grow-at-a-CAGR-of-6-0-through-2026-globally-Future-Market-Insights.html Accessed 11 January 2018.
  production volume 3.2e6 unit
    Calculated from Ashby 2009 based on the forecast production volume for 2026.
  property price 25 EUR2005
    Estimated value. The price is taken from MediaWorld, a shop for electronics, website (retrieved from: https://www.mediaworld.it/mw/macchine-caffe-americano/tristar-caffe-filtro-1-2-l, accessed 13Feb2018). A representative price of 25 was chosen. The choice is based on the most common price for an average appliance, and accounting for profit margins. According to an article from Blokhin "What profit margin is average for a company in the electronics sector?" (Source: Investopedia, retrieved from: https://www.investopedia.com/ask/answers/051215/what-profit-margin-average-company-electronics-sector.asp, 13Feb2018) the average profit margin made in the electronics sector in 2015 was of 9%.
  property lifetime capacity [h] 2129.17 hour; = (35/60)*2*365*5
    Calculated value. The source reports the following characteristics "The 640 Watt coffee maker [...] makes four cups of coffee in 5 minutes (requiring full power) and then keeps the coffee hot for a subsequent 30 minutes, consuming one sixth of full power." (Ashby 2009, p. 139). Source: Ashby 2009, 2009, Ashby, M.F., Materials and the Environment. Eco-informed material choice, Oxford, Elsevier, 2 - ChaptersInAnthology, Ashby, M.F., 2009. Materials and the Environment. Eco-informed material choice. Elsevier, Oxford, 2009. We assume 2 cycles of 35 minutes per day for 5 years.
  property weight 1.9 kg; name weight
    Source: Ashby 2009, 2009, Ashby, M.F., Materials and the Environment. Eco-informed material choice, Oxford, Elsevier, 2 - ChaptersInAnthology, Ashby, M.F., 2009. Materials and the Environment. Eco-informed material choice. Elsevier, Oxford, 2009.
  property lifetime 5 year
    (same comment as for coffee maker)
  property true value 25
    allocation property applied in "true value" allocation // value calculated from revenue

## By-products
- electricity, for reuse in municipal waste incineration only: 0 kWh; CPC 17100: Electrical energy; By-product classification allocatable product; pedigree (1,1,1,1,1)
  Net electricity generated from this waste and used in internal MSWI plant energy redistribution.
  Uncertainty: uncertainty is calculated from uncertainties in waste composition and uncertainties in energy efficiency and the uncertainty in internal energy demand
  production volume 433449 kWh
  property price 0.1 EUR2005; name E_el_prod_MSWI_price_EUR2005
    Estimated to be the same price as in case of electricity, medium voltage.
  property exergy 3.6 MJ; name E_el_prod_MSWI_exergy
    This exergy property is based on the exergy content of the product.
  property true value relation 3.6; name E_el_prod_MSWI_true_value_relation
    property to calculate "true value" from
  property true value 0.0128626
    allocation property applied in "true value" allocation // value calculated from true value relation
- heat, for reuse in municipal waste incineration only: 0 MJ; CPC 17300: Steam and hot water; By-product classification allocatable product; pedigree (1,1,1,1,1)
  (same comment as for electricity, for reuse in municipal waste incineration only)
  production volume 3.07529e6 MJ
  property exergy 0.1842 MJ; name E_th_prod_MSWI_exergy
    This exergy property is based on the exergy content of the product.
  property true value relation 0.1842; name E_th_prod_MSWI_true_value_relation
    property to calculate "true value" from
  property price 0.0106 EUR2005; name E_th_prod_MSWI_price_EUR2005
    Average European district heat price from Ecoheatcool and Euroheat 2005-2006, Ecoheat Work package 1: The European heat market. Final report. 10.6 EUR/GJ i s the price of district heat. http://www.solarthermalworld.org/files/Ecoheatcool%20WP1%20Web.pdf?download
  property true value 0.00467016
    (same comment as for electricity, for reuse in municipal waste incineration only)
- iron scrap, unsorted: 0 kg; source European Aluminium Association 2008; CPC 39310: Slag, dross, scalings and other waste from the manufacture of iron or steel; By-product classification Recyclable; pedigree (1,1,1,1,1)
  production volume 269.284 kg
  property price 0.149 EUR2005; name ironScrapAmount_price_EUR2005
    Temporary price data. Calculated as 90% of purchasers price based on: estimated at 85% of sorted scrap
  property carbon content 0
    carbon content on a dry matter basis (reserved; not for manual entry)
  property true value 4.17951e-6
    allocation property applied in "true value" allocation // value calculated from revenue
  properties: water in wet mass 0 kg, water content 0, carbon content, fossil 0, carbon content, non-fossil 0, dry mass 1 kg, wet mass 1 kg, carbon allocation 0 kg
- aluminium oxide, non-metallurgical: 0 kg; source European Aluminium Association 2008; CPC 41432: Alumina (aluminium oxide), except artificial corundum; By-product classification allocatable product; CAS 1344-28-1; pedigree (1,1,1,1,1)
  production volume 16945 kg
  property carbon content, non-fossil 0; name C_content_non_fossil
  property price 0.28 EUR2005; name Al2O3Amount_price_EUR2005
    From UN trade database. http://data.un.org/ Import data from the largest economies of the world are used (Brazil, India, USA, China, Japan and EU-27).
  property dry mass 1 kg; name DM
  property water content 0; name water_content
  property wet mass 1 kg; name WM
  property water in wet mass 0 kg; name WWM
  property carbon content, fossil 0; name C_content_fossil
  property carbon content 0
    carbon content on a dry matter basis (reserved; not for manual entry)
  property true value 0.00049423
    allocation property applied in "true value" allocation // value calculated from revenue
  properties: carbon allocation 0 kg
- aluminium, cast alloy: 0 kg; source European Aluminium Association 2008; By-product classification allocatable product; CPC 41431: Unwrought aluminium; pedigree (1,1,1,1,1)
  EcoSpold01Location=RER
  production volume 158398 kg
  property price 1.3 EUR2005; name castAlloyAmount_price_EUR2005
  properties: water in wet mass 0 kg, carbon content, non-fossil 0, water content 0, dry mass 1 kg, carbon content, fossil 0, wet mass 1 kg, carbon content 0, carbon allocation 0 kg, true value 0.0214498
- aluminium, wrought alloy: 0 kg; source European Aluminium Association 2008; By-product classification allocatable product; CPC 4153: Semi-finished products of aluminium or aluminium alloys; pedigree (1,1,1,1,1)
  production volume 69343.8 kg
  property price 1.44 EUR2005; name secondaryAluminiumOutput_price_EUR2005
    Estimated based on literature values and expert judgement. Aluminium ccast alloys are about 90% of the price of aluminium wrought alloys.
  property carbon content 0
    carbon content on a dry matter basis (reserved; not for manual entry)
  property true value 0.0104016
    allocation property applied in "true value" allocation // value calculated from revenue
  properties: wet mass 1 kg, water content 0, carbon content, fossil 0, water in wet mass 0 kg, carbon content, non-fossil 0, dry mass 1 kg, carbon allocation 0 kg
- copper: 0 kg; source Rentz O. 1999; By-product classification allocatable product; CPC 41413: Refined copper and copper alloys, unwrought; master alloys of copper
  Literature value. Copper uses: Before end-use copper is manufactured into semi fabricated products, such as shapes and ingots (known as 'semis'). These manufacturing processes are subdivided into hot working, cold working and, if necessary, process annealing. Few of the semis are ready for use as such. They more typically travel to first-stage manufacturers, who make metal rods, wire, and casting, and then to component manufacturers who produce such things as motors, valves, and insulated cables The components in turn are incorporated by final-stage manufacturers into a variety of finished products - automobiles, commercial buildings, residential housing, and so forth. These uses account for about 79% of the world-wide consumption of copper.
  production volume 147664 kg
  properties: dry mass 1 kg, water in wet mass 0 kg, wet mass 1 kg, carbon content, non-fossil 0, water content 0, price 5.52 EUR2005, carbon content, fossil 0, carbon content 0, carbon allocation 0 kg, true value 0.0849069
- zinc concentrate: 0 kg; CPC 14290: Other non-ferrous metal ores and concentrates (other than uranium or thorium ores and concentrates); By-product classification allocatable product
  Calculated value from the knowledge of the properties of both products.
  production volume 0.000117205 kg
  property price 0.38 EUR2005; name ByP_price_EUR2005
    Temporary price data. Calculated as 90% of purchasers price based on: Zinc content in concentrate 53%. Concentrate price per kg Zn 86.5% of refined Zn price (13.5% treatment charges according to CHR Metals Limited 2005: Dynamic cost curves. http://www.minecost.com/dynamic.pdf). 2004 zinc price from USGS (2007) Mineral commodity summaries 2007. <http://minerals.usgs.gov/minerals/pubs/mcs/2007/mcs2007.pdf> [Accessed 25 May 2010]
  property zinc content 0.53; name zinc_C_zinc_concentrate
    Zinc content on a dry matter basis. Value taken from teh "zinc mine operation" /GLO dataset.
  property dry mass 1 kg; name DM_zinc_concentrate
  property carbon content 0
    carbon content on a dry matter basis (reserved; not for manual entry)
  property true value 4.63937e-12
    allocation property applied in "true value" allocation // value calculated from revenue
  properties: wet mass 1 kg, water content 0, carbon content, non-fossil 0, carbon content, fossil 0, water in wet mass 0 kg, carbon allocation 0 kg
- iron scrap, sorted, pressed: 0 kg; By-product classification Recyclable; CPC 39310: Slag, dross, scalings and other waste from the manufacture of iron or steel; pedigree (1,1,1,1,1)
  Iron scrap recovered from this waste.
  production volume 51869.5 kg
  property price 0.175 EUR2005
    Temporary price data. Calculated as 90% of purchasers price based on: 2005 import and export prices (total trades (USD) divided by total weight (kg) in biggest economies of the world: EU27, USA, Brasil, China, India, Japan and Russia) from UN Commodity Trade Statistics Database (http://data.un.org/Explorer.aspxDatabase [Accessed 2011.06.20]). Commodity: Waste or scrap, of cast iron
  property carbon content 0
    carbon content on a dry matter basis (reserved; not for manual entry)
  property true value 1.91393e-5
    allocation property applied in "true value" allocation // value calculated from revenue
  properties: water content 0, water in wet mass 0 kg, carbon content, fossil 0, dry mass 1 kg, carbon content, non-fossil 0, wet mass 1 kg, carbon allocation 0 kg

## Inputs from technosphere
- iron-nickel-chromium alloy: 0.0258606 kg; name iron_nickel_alloy; lognormal variance with pedigree 0.0118, pedigree (1,4,4,4,2)
  Used here in place of nickel chromium alloy. In terms of outputs, assumed to have gone to scrap steel. Data are from Ashby 2009.
  properties: dry mass 1 kg, wet mass 1 kg
- plastic processing factory: 1.39986e-9 unit; = 1/710526316; lognormal variance with pedigree 0.3112, pedigree (1,4,4,4,2)
  Used here in place of infrastructure based on the amount of the largest contributor to the final product mass (polypropylene). This is an estimated value. According to the technology comment of the dataset 'Plastic processing factory construction, GLO' [accessed 19.01.2018], the life time of the tanks is assumed to be 50 years and the annual production is 27000 t/a. Thus, the estimated lifetime output of the factory is 27000 x 50 = 1350000. As the coffee machine mass is 1.9 kg, then the number of coffee machines produced during the lifetime of the factory is 1350000 / 0.0019 = 710526316 units. The calculation of the infrastructure is therefore 1/life time capacity = 1/710526316 unit.
- waste polypropylene: 0 kg; pedigree (1,1,1,1,1)
  Data are from Ashby 2009. The amount is set equal to the input amount for the respective material. In addition, contains waste phenol.
  production volume 0 kg
    Calculated from production volume of reference product using the relative outputs.
  properties: carbon content, fossil 0.825208, water content 0.189061, dry mass 0.841 kg, wet mass 1 kg
- scrap aluminium: 0 kg; pedigree (1,1,1,1,1)
  Data are from Ashby 2009. The amount is set equal to the input amount for the respective material.
  production volume 0 kg
    Calculated from production volume of reference product using the relative outputs.
  properties: wet mass 1 kg, dry mass 1 kg
- brass: 0 kg; pedigree (1,1,1,1,1)
  In terms of outputs, assumed to have gone to scrap copper. Data are from Ashby 2009.
  properties: wet mass 1 kg, dry mass 1 kg
- glass fibre: 0.32823 kg; name glass_fibre; lognormal variance with pedigree 0.0118, pedigree (1,4,4,4,2)
  Data are from Ashby 2009.
  properties: dry mass 1 kg, wet mass 1 kg
- copper: 0.0348123 kg; lognormal variance with pedigree 0.0118, pedigree (1,4,4,4,2)
  Data are from Ashby 2009.
  properties: wet mass 1 kg, dry mass 1 kg
- aluminium, cast alloy: 0.0795709 kg; name aluminium; lognormal variance with pedigree 0.0118, pedigree (1,4,4,4,2)
  Data are from Ashby 2009.
  properties: wet mass 1 kg, dry mass 1 kg
- scrap copper: 0 kg; pedigree (1,1,1,1,1)
  Data are from Ashby 2009. The amount is set equal to the input amount for the respective material. In addition, contains scrap brass and scrap electronic components.
  production volume 0 kg
    Calculated from production volume of reference product using the relative outputs.
  properties: dry mass 1 kg, wet mass 1 kg
- steel, low-alloyed: 0.119356 kg; name steel; lognormal variance with pedigree 0.0118, pedigree (1,4,4,4,2)
  Data are from Ashby 2009.
  properties: dry mass 1 kg, carbon content, fossil 0.005, wet mass 1 kg
- waste polyvinylchloride: 0 kg; pedigree (1,1,1,1,1)
  (same comment as for scrap aluminium)
  production volume 0 kg
    Calculated from production volume of reference product using the relative outputs.
  properties: water content 0.00200401, carbon content, fossil 0.440882, dry mass 0.998 kg, wet mass 1 kg
- scrap steel: 0 kg; pedigree (1,1,1,1,1)
  Data are from Ashby 2009. The amount is set equal to the input amount for the respective material. In addition, contains scrap nickel chromium alloy. .
  production volume 0 kg
    Calculated from production volume of reference product using the relative outputs.
  properties: wet mass 1 kg, dry mass 1 kg
- waste glass: 0 kg; pedigree (1,1,1,1,1)
  (same comment as for scrap aluminium)
  production volume 0 kg
    Calculated from production volume of reference product using the relative outputs.
  properties: wet mass 1 kg, dry mass 1 kg
- phenol: 0 kg; pedigree (1,1,1,1,1)
  Used here in place of phenolic polymers. In terms of outputs, assumed to have gone to waste polypropylene. Data are from Ashby 2009.
  properties: carbon content, fossil 0.765957, wet mass 1 kg, dry mass 1 kg
- polypropylene, granulate: 0.905119 kg; name PP; lognormal variance with pedigree 0.0118, pedigree (1,4,4,4,2)
  Data are from Ashby 2009.
  properties: wet mass 1 kg, carbon content, fossil 0.857143, dry mass 1 kg
- polyvinylchloride, bulk polymerised: 0.119356 kg; name PVC; lognormal variance with pedigree 0.0118, pedigree (1,4,4,4,2)
  Data are from Ashby 2009.
  properties: carbon content, fossil 0.387097, wet mass 1 kg, dry mass 1 kg
  note on carbon content, fossil: Monomer is vynyl chloride, C2H3Cl (ecoinvent v2.2 report 11_II). MW=62 g/mol
- electronic component, passive, unspecified: 0.00696246 kg; lognormal variance with pedigree 0.0118, pedigree (1,4,4,4,2)
  Data are from Ashby 2009. In terms of outputs, assumed to have gone to scrap copper.
  properties: dry mass 1 kg, wet mass 1 kg, carbon content, non-fossil 0.0045566, carbon content, fossil 0.317311
- electricity, medium voltage: 49.8114 kWh; lognormal variance with pedigree 0.0118, pedigree (1,4,4,4,2)
  Used here in place of generic category name 'energy' in the original literature source. Convertion of MJ into kWh (1 kWh = 3.6 MJ). Data are from Ashby 2009.
- waste polypropylene: -0.0906643, -0.00698968, -0.00288699, -0.00274147, -0.104611, -0.00116631, -0.000528618, -0.732333 kg (8 entries); lognormal variance with pedigree 0.0118, pedigree (1,4,4,4,2)
  (same comment as for waste polypropylene)
  production volume 3.0304e6 kg
- scrap aluminium: -0.0252405, -0.00118423, -0.0531462 kg (3 entries); lognormal variance with pedigree 0.0118, pedigree (1,4,4,4,2)
  (same comment as for scrap aluminium)
  production volume 256000 kg
- brass: 0.000149195, 0.0296899 kg (2 entries); lognormal variance with pedigree 0.0118, pedigree (1,4,4,4,2)
  In terms of outputs, assumed to have gone to scrap copper. Data are from Ashby 2009.
- scrap copper: -0.0205079, -0.000962187, -0.0431813 kg (3 entries); lognormal variance with pedigree 0.0118, pedigree (1,4,4,4,2)
  (same comment as for scrap copper)
  production volume 208000 kg
- waste polyvinylchloride: -0.0114886, -0.000885704, -0.000365828, -0.000347388, -0.0132558, -0.00014779, -6.69844e-5, -0.0927982 kg (8 entries); lognormal variance with pedigree 0.0118, pedigree (1,4,4,4,2)
  (same comment as for scrap aluminium)
  production volume 384000 kg
- scrap steel: -0.0353597, -4.47034e-5, -0.109813 kg (3 entries); lognormal variance with pedigree 0.0118, pedigree (1,4,4,4,2)
  (same comment as for scrap steel)
  production volume 467200 kg
- waste glass: -0.0499663, -0.00242443, -0.000226196, -0.00101215, -0.0263046, -0.000343492, -5.50023e-5, -0.247898 kg (8 entries); lognormal variance with pedigree 0.0118, pedigree (1,4,4,4,2)
  (same comment as for scrap aluminium)
  production volume 1.056e6 kg
- phenol: 0.00638932, 0.0304122 kg (2 entries); lognormal variance with pedigree 0.0118, pedigree (1,4,4,4,2)
  (same comment as for phenol)

## Sampling procedure
Manufacturing data are taken from Ashby 2009. Data on the annual production volume are calculated based on the worldwide production forecast for 2026 taken from Future Market Insights 2018. These include coffee makers manufactured for in-home and out-of-home (coffee shops and other hospitality ventures) consumption. Sources: Ashby, M.F., 2009. Materials and the Environment. Eco-informed material choice. Elsevier, Oxford, 2009. Future Market Insights 2018. Automatic coffee machine market to grow at a CAGR of 6.0% through 2016, globally - Future Market Insights. Available from: https://globenewswire.com/news-release/2018/01/09/1285914/0/en/Automatic-Coffee-Machine-Market-to-Grow-at-a-CAGR-of-6-0-through-2026-globally-Future-Market-Insights.html (Accessed 11 January 2018).

## Extrapolations
The figure on the annual world production volume (3400000 units) is calculated from Future Market Insights 2018. This figure represents the annual production forecast for 2026 and combines coffee makers produced for coffee shops (1000000 units) and for in-home consumption (2400000 units). Future Market Insights 2018 forecast a 6% growth throughout to 2026. This suggests that, in 2018, the annual production volume approximately equates to 3200000 units.
