# lime to generic market for soil pH raising agent

Dataset: EcoSpold 2, unit process
Geography: GLO
Time period: 2015-01-01 to 2019-12-31
Technology level: current
Classification: ISIC rev.4 ecoinvent: 0891:Mining of chemical and fertilizer minerals
Classification: EcoSpold01Categories: chemicals/organics
Scenario: Business-as-Usual
System model: Allocation at the point of substitution
Generated by: Emilia Moreno Ruiz
Database: ecoinvent
isCopyrightProtected: true
accessRestrictedTo: 1

## General comment
This is a linking activity which links the product "lime" to the generic market for soil pH raising agent.
All products that enter this generic market provide the function of pH soil raising agent.
When there are no specific product attributes to be fulfilled, the generic market can beused. In the generic market the consumption of one product over another wil only be driven by best available price and not by the product attributes.

## Technology
non applicable

## Reference product
- soil pH raising agent, as CaCO3: 1 kg; name soil_pH_raising_agent_as_CaCO3; CPC 34659: Fertilizers n.e.c.; By-product classification allocatable product
  production volume 1.5003e11 kg
    It is considered that 50% of the lime produced in a GLO scale goes into the generic market for soil pH raising agent
  property wet mass 1 kg; name soil_pH_raising_agent_as_CaCO3_WM
  property dry mass 1 kg; name soil_pH_raising_agent_as_CaCO3_DM
  property water content 0; name soil_pH_raising_agent_as_water_content_0
  property water in wet mass 0 kg; name soil_pH_raising_agent_as_CaCO3_WWM
  property price 0.117 EUR2005; name soil_pH_raising_agent_as_CaCO3_price_EUR
    The price is estimated to be the same as for lime.
  property carbon content, non-fossil 0; name soil_pH_raising_a_C_content_non_fossil_0
  property carbon content, fossil 0.12; name soil_pH_raising_agent_C_content_fossil_0
    Stoichiometric calculation.
  property carbon content 0.12
    carbon content on a dry matter basis (reserved; not for manual entry)
  properties: carbon allocation 0.12 kg

## Inputs from technosphere
- lime: 0, 0.079502, 0.920498 kg (3 entries)
  properties: dry mass 1 kg, carbon content, fossil 0.120005, wet mass 1 kg

## Extrapolations
This dataset has been extrapolated from year 2015 to the year of the calculation (2019). The uncertainty has been adjusted accordingly.
