# cast iron drilling, conventional

Dataset: EcoSpold 2, unit process
Geography: RER
Time period: 2006-01-01 to 2019-12-31
Technology level: current
Classification: ISIC rev.4 ecoinvent: 2592:Treatment and coating of metals; machining
Classification: EcoSpold01Categories: metals/chipping
Tags: ConvertedDataset
Scenario: Business-as-Usual
System model: Allocation at the point of substitution
Share of production covered: 0 %
Generated by: Roland Steiner
Published in: Steiner, R. 2007
Database: ecoinvent
isCopyrightProtected: true
accessRestrictedTo: 1

## General comment
The reference for drilling is 1 kg of metal removed by drilling. As there is a large variation from factory to factory with regard to the LCI, it is advised that in case this dataset becomes important in the results, it has to be investigated further if the rough estimations made are applicable or not.
[This dataset was already contained in the ecoinvent database version 2. It was not individually updated during the transfer to ecoinvent version 3. Life Cycle Impact Assessment results may still have changed, as they are affected by changes in the supply chain, i.e. in other datasets. This dataset was generated following the ecoinvent quality guidelines for version 2. It may have been subject to central changes described in the ecoinvent version 3 change report (http://www.ecoinvent.org/database/ecoinvent-version-3/reports-of-changes/), and the results of the central updates were reviewed extensively. The changes added e.g. consistent water flows and other information throughout the database. The documentation of this dataset can be found in the ecoinvent reports of version 2, which are still available via the ecoinvent website. The change report linked above covers all central changes that were made during the conversion process.]

## Included activities end
This dataset encompasses the direct electricity consumption of the machine. Furthermore, the metal removed is already included. Machine as well as factory infrastructure and operation are considered as well. The metal removed is assumed to be recycled. Maintenance and tool (bit) replacements are not included. Degreasing is not included and has to be added if necessary.

## Geography
Geographical coverage encompasses the industrialised countries.

## Technology
Average technology

## Reference product
- cast iron removed by drilling, conventional: 1 kg; CPC 39310: Slag, dross, scalings and other waste from the manufacture of iron or steel; By-product classification allocatable product
  EcoSpold01Location=RER
  production volume 1.32237 kg
    This is a placeholder value that does not reflect real-world production volumes. This dataset does not currently require a real-world production volume to work in the database framework, and no actual data were collected yet. This has no negative effect on the results of the ecoinvent database. The placeholder value of this activity was scaled according to the nominal GDP of 2005 (source: United Nations, http://data.un.org/Glossary.aspx?q=GDP+%28current+US%24%29, accessed 20130726) to reflect an appropriate share of the global production volume, which is also a placeholder value.
  property price 1.27386 EUR2005
    Calculated based on inputs: The price of the product has been calculated as a sum of the values of the material and energy inputs for this product. This value is therefore a rough estimation. It may underestimate the real price since there are additional expenses when producing any product. These expences can include for example labour costs, treatment of waste materials and profit for the producer. Please consider carefully whether this level of data quality is acceptable for your application.
  property carbon content, fossil 0.04
    Cast iron is made by remelting pig iron in small furnaces (e.g. cupola furnaces or electric arc furnaces) and poured into moulds to make castings. It usually contains 2% to 6% carbon (ecoinvent v2.2 report 10_partII). An average content of 4% was considered
  property carbon content 0.04
    carbon content on a dry matter basis (reserved; not for manual entry)
  properties: water content 0, carbon content, non-fossil 0, water in wet mass 0 kg, wet mass 1 kg, dry mass 1 kg, carbon allocation 0.04 kg

## Inputs from technosphere
- electricity, low voltage: 0.0556 kWh; lognormal variance with pedigree 0.0586, pedigree (1,3,5,1,3)
  EcoSpold01Location=UCTE
  Estimated from literature
  Uncertainty: estimated from literature
- metal working factory: 2.02e-9 unit; lognormal variance with pedigree 0.4906, pedigree (5,3,5,1,4)
  EcoSpold01Location=RER
  Estimated
  Uncertainty: estimated
- metal working machine, unspecified: 3.95e-5 kg; lognormal variance with pedigree 0.4906, pedigree (5,3,5,1,4)
  EcoSpold01Location=RER
  Estimated
  Uncertainty: estimated
- energy and auxilliary inputs, metal working factory: 4.41 kg; lognormal variance with pedigree 0.1906, pedigree (5,3,5,1,4)
  Estimated
  EcoSpold01Location=RER
  Uncertainty: estimated
- cast iron: 1 kg; lognormal variance with pedigree 0.008, pedigree (1,1,4,1,1)
  Material removed
  EcoSpold01Location=RER
  Uncertainty: material removed
  properties: carbon content, fossil 0.04, wet mass 1 kg, dry mass 1 kg
  note on carbon content, fossil: Cast iron is made by remelting pig iron in small furnaces (e.g. cupola furnaces or electric arc furnaces) and poured into moulds to make castings. It usually contains 2% to 6% carbon (ecoinvent v2.2 report 10_partII). An average content of 4% was considered

## Extrapolations
This dataset has been extrapolated from year 2007 to the year of the calculation (2019). The uncertainty has been adjusted accordingly.

## Review by Sébastien Humbert 2007-09-05
passed
none
