# nutrient supply from vinasse, from fermentation of sugar beet

Dataset: EcoSpold 2, unit process
Geography: GLO
Time period: 2000-01-01 to 2019-12-31
Technology level: current
Classification: ISIC rev.4 ecoinvent: 0161:Support activities for crop production
Scenario: Business-as-Usual
System model: Allocation at the point of substitution
Generated by: Sofia Parada Tur
Database: ecoinvent
isCopyrightProtected: true
accessRestrictedTo: 1

## General comment
This inventory describes the application of vinasse, from fermentation of sweet sorghum for fertiliser use. This application provides the nutrients N, P2O5 and K2O contained in the vinasse, namely 3.68E-02 kg N/kg dry mass, 1.25E-01 kg P2O5/kg dry mass and 4.78E-02 kg K2O/kg dry mass. No emissions are considered. This dataset needs to be revised to include the corresponding process emissions.

## Included activities start
Activity starting with the field application of vinasse

## Included activities end
The activity ends with the provision of N-fertiliser, P-fertiliser and K-fertiliser

## Geography
inventory based on composition of vinasse

## Time period
Time validity adopted from dataset producing vinasse, from fermentation of sugar beet in the ecoinvent database

## Reference product
- phosphate fertiliser, as P2O5: 1 kg; name phosphate_fertiliser_output; = 1.25E-01*nutrient_input* DM; CPC 3462: Mineral or chemical fertilizers, phosphatic; By-product classification allocatable product
  Original values given in % based on fresh mass. This was calculated to kg nutrient/kg dry mass, given the dry mass of that specific sample given in the source, namely 68%. Retrieved on 2012.04.23
  (http://www.kws.de/aw/archivierte_Reste/zuckerruebe/bioethanol/Themen_Bioethanol/~ckdc/Vinasse_8211_ein_interessantes_Nebenprodukt )
  production volume 1.30019e7 kg; = 582230000*7.145970253* phosphate_fertiliser_output
    Calculated from the production volume of vinasse, from fermentation of sugar beet in the database and using the relative outputs of the nutrient.
  property price 0.241 EUR2005; name phosphate_fertiliser_outpu_price_EUR2005
    Temporary price data. Calculated as 90% of purchasers price based on: 2004 prices are calculated on basis of Import/Export data (tonnes and US$) from UN Trade Statistics Database (http://data.un.org/Browse.aspx?d=ComTrade, accessed 7/7-2010). N, P2O5, or K2O content (http://www.fertilizer.org/ifa/Home-Page/STATISTICS/Conversions-factors)
  property carbon content 0
    carbon content on a dry matter basis (reserved; not for manual entry)
  property true value 0.000753125; name phosphate_fertiliser_output_true_value
    allocation property applied in "true value" allocation // value calculated from revenue
  properties: wet mass 1 kg, water in wet mass 0 kg, carbon content, non-fossil 0, water content 0, carbon content, fossil 0, dry mass 1 kg, carbon allocation 0 kg

## By-products
- nitrogen fertiliser, as N: 0 kg; name nitrogen_fertiliser_output; = 3.68E-02* nutrient_input* DM; source KWS 2012; CPC 3461: Mineral or chemical fertilizers, nitrogenous; By-product classification allocatable product; pedigree (1,1,1,1,1)
  (same comment as for phosphate fertiliser, as P2O5)
  production volume 3.82775e6 kg; = 582230000*7.145970253* nitrogen_fertiliser_output
    (same comment as for phosphate fertiliser, as P2O5)
  property price 0.473 EUR2005; name nitrogen_fertiliser_output_price_EUR2005
    (same comment as for phosphate fertiliser, as P2O5)
  property carbon content 0
    carbon content on a dry matter basis (reserved; not for manual entry)
  property true value 0.00043516; name nitrogen_fertiliser_output_true_value
    allocation property applied in "true value" allocation // value calculated from revenue
  properties: water content 0, water in wet mass 0 kg, dry mass 1 kg, carbon content, non-fossil 0, wet mass 1 kg, carbon content, fossil 0, carbon allocation 0 kg
- potassium fertiliser, as K2O: 0 kg; name potassium_fertiliser_output; = 4.78E-02* nutrient_input* DM; source KWS 2012; CPC 3463: Mineral or chemical fertilizers, potassic; By-product classification allocatable product; pedigree (1,1,1,1,1)
  (same comment as for phosphate fertiliser, as P2O5)
  production volume 4.97191e6 kg; = 582230000*7.145970253* potassium_fertiliser_output
    (same comment as for phosphate fertiliser, as P2O5)
  property price 0.188 EUR2005; name potassium_fertiliser_output_price_EUR200
    Temporary price data. Calculated as 90% of purchasers price based on: 2004 import price calulated from FAOSTAT (http://faostat.fao.org/site/575/DesktopDefault.aspx?PageID=575#ancor [accessed 2011.01.27] Potash Fertilizers (K20 total nutrients) in kUSD/Mg
  property carbon content 0
    carbon content on a dry matter basis (reserved; not for manual entry)
  property true value 0.00022466; name potassium_fertiliser_output_true_value
    allocation property applied in "true value" allocation // value calculated from revenue
  properties: wet mass 1 kg, water content 0, water in wet mass 0 kg, carbon content, fossil 0, dry mass 1 kg, carbon content, non-fossil 0, carbon allocation 0 kg

## Inputs from technosphere
- vinasse, from fermentation of sugar beet: 170.566 kg; name nutrient_input; lognormal variance with pedigree 0.0486, pedigree (4,1,5,1,1)
  Total production volume of "vinasse, from fermentation of sugar beet" (4160598260 kg), produced in the database is used as nutrient supplement in agriculture.
  property dry mass 0.025 kg; name DM
  property price 0.012 EUR2005; name vinasse_price_EUR2005_1
  properties: carbon content, non-fossil 0.12867, wet mass 1 kg, water content 39

## Sampling procedure
Dataset based on nutrient content of poultry manure for fertiliser use
