# electricity production, hard coal

Dataset: EcoSpold 2, unit process
Geography: WECC, US only
Time period: 1980-01-01 to 2019-12-31
Technology level: modern
Classification: ISIC rev.4 ecoinvent: 3510:Electric power generation, transmission and distribution
Classification: EcoSpold01Categories: hard coal/power plants
Synonyms: anthracite; coking coal; other bituminous coal
Tags: United States; hard coal power; fossil fuels; coal power
Scenario: Business-as-Usual
System model: Allocation at the point of substitution
Generated by: Karin Treyer
Published in: Röder, A. 2007
Database: ecoinvent
isCopyrightProtected: true
accessRestrictedTo: 1

## General comment
This dataset represents the production of high voltage electricity in an average hard coal power plant in US - Western Electricity Coordinating Council in 2012. 'Hard coal' includes anthracite, coking coal and other bituminous coal according to the definition of the IEA electricity information 2014. (IEA. 2014. Electricity Information 2014. ISBN 978-92-64-21692-1. International Energy Agency (IEA), Paris Cedex (FR).)
All exchanges in this dataset except for emissions of SO2, NOx and particles are production-weighted averages of the figures in the datasets in ecoinvent version two, which are valid for the following 14 countries: AT, BE, ES, FR, IT, NL, PT, DE, CZ, HR, PL, SK, CN, US. The exception values are production-weighted averages of version 2 countries and the new countries in version 3 (AU, CA, CL, ID, IN, KR, MX, MY, PE, RU, TH, TR, TW, TZ, UA, ZA)
Comments on the inventory data of emissions:
- For the assessment of main characteristics (sulphur and ash content of coal, efficiency of the plant) and CO2 a bottom-up approach has been used. It consists in the collection of information about single plants.
- The size distribution of particle emissions has been derived from German data.
- Halogene emissions have been estimated on the basis of the content of the species in the country-specific coal input mix, assuming average retention rates.
- For CO and particle emissions average values for the former UCTE are included (Union for the Coordination of the Transmission of Electricity, since 2009 replaced by ENTSO-E European Network of Transmission System Operators for Electricity).
- The country specific emission depend on the share of DeNOx.
- Emissions of trace elements were calculated by means of a formula (CORINAIR) using the ash content in the country-specific coal input mix and average transfer coefficients for coal power plants, taking into account the share of DeSOx installed.
- Emission of uranium and thorium radioactive isotopes were assumed proportional to the corresponding element emitted with particles; the other non-gaseous radioactive isotopes of the uranium and thorium decay chain were assumed proportional to the emitted U-238 or Th-232.
- The emission of gaseous radon and K-40 are taken from the literature.
Itten R., Frischknecht R., Stucki, M. (2012) Life Cycle Inventories of Electricity Mixes and Grid. ESU-services Ltd., Uster, Switzerland.
European Environment Agency (1991) CORINAIR Inventory; VOC's Default Emission Factors
[This dataset is meant to replace the following datasets:]

## Included activities start
From the constructed hard coal power plant ready to produce electricity.
From reception of hard coal and operating materials at power plant gate.

## Included activities end
This activity ends with 1kWh of high voltage electricity produced at the power plant and arrived at the busbar.

This dataset includes:
- all operation and maintenance activities and materials of the power plants.
- Use of fuel oil for startup
- Particle removal (dedusting of the flue gas)

- Desulfurisation and denitrification. These processes are described in separate modules; it can be decided by changing the values of NOx and SOx retained whether and how much DeNOx and DeSOx are installed.
- Cooling: It is assumed that all plants use wet cooling with a cooling tower. No cooling tower is included in this dataset (will be implemented in future versions)
- Loss of feed water

This dataset doesn't include
- raw materials extraction, decommissioning and waste treatment as these activities are already included in the infrastructure datasets
- transformation of the electricity produced
- The disposal of non-recycled ashes is modelled separately.

## Technology
POWER PLANT:
Hard coal power plant input is a market mix of 100MWe power plants (representing all power plants with a capacity <250MWe and 7% of installed capacity) and 500MWe power plants (representing all power plants with a capacity >250MWe and 93% of installed capacity). Please note that in contrast to ecoinvent v2, the two power plant types do not exist anymore as single datasets. Along with (Röder et al. 2004), lifetime of these power plants is assumed to be 150’000 full load hours. Whereas European hard coal power plants are assumed to be operated in mid-load mode with 4000 full load hours per year (corresponding to a lifetime of 37.5 years) (Röder et al. 2004), a capacity factor (average US) of 66% is documented (eGRID 2006), corresponding to about 5800 full load hours per year, or a lifetime of about 26 years.
0
- Share of installed capacity with desulfurisation 2% (rough estimation based on sulfur mass balance
- Average efficiency of desulfurisation installations: 92% (rough estimation based on Dones et al. 27
- Share of installed capacity with denitrification (primary and/or secondary installations): 73% (figure based on IEA 212 )
- Average efficiency of denitrification installations: 8% (estimation based on Dones et al. 27, p.128. Valid for selective catalytic reaction systems)
- Share of installed capacity with particle filters: 98% (figure based on IEA 212 )
- Average efficiency of particle filters: 98% (figure based on IEA 212 )
- IEA 2012. Coal Power Database. International Energy Agency Clean Coal Centre, London
- IEA/OECD. 2010. Electricity Information 2010. International Energy Agency (IEA), Paris Cedex (FR). Part IV. Detailed OECD Electricity And Heat Data.
- Dones, R., Bauer, C., Röder, A. (2007) Kohle. In: Dones, R. (Ed.) et al., Sachbilanzen von Energiesystemen: Grundlagen für den ökologischen Vergleich von Energiesystemen und den Einbezug von Energiesystemen in Ökobilanzen für die Schweiz. Final report ecoinvent No.

## Time period
The Annual Production Volume is valid for the year 2012.

## Parameters
- gross electricity production: 0 kWh; name gross_electricity; pedigree (1,1,1,1,1)
  Parameter not needed in this dataset, but present due to parent child relationship
  nan
- factor: input of MJ for the production of 1 kWh: 9.27835 MJ/kWh; name factor_MJ_kWh; = 1*3.6/efficiency; lognormal variance with pedigree 0.0532, pedigree (4,4,3,4,4)
  Calculated value. 3.6 MJ = 1kWh.
  nan
- water consumption, electricity production from hard coal, recirculating CS: 0 m3/kWh; name WConsumption_EP_HC_recirculatingCS; pedigree (4,4,3,2,4)
  Estimated based on literature (Scown, 2011, Water Footprint of U.S. Transportation Fuels, SI). The amount of water consumed while burning lignite and peat is assumed to be the same as in case of coal.
  nan
- losses from gross electricity production: 0.06 dimensionless; name gross_net_electricity; undefined min 0.06, max 0.06, standardDeviation95 0, pedigree (1,1,1,1,1)
  Calculated value. Own use of electricity plants in this country in 2012. For the OECD countries, the OECD iLibrary provides gross and net electricity values for the specific sector 'Total Fuel Combustion', from which the loss value is being calculated. This value is then applied to all fossil fuel datasets, as no data on a more detailed level were available.
  OECD. 2014. IEA Electricity Information Statistics: OECD - Electricity and heat generation. OECD iLibrary. Online database. DOI : 10.1787/elect-data-en
  nan
  Uncertainty: Generic IEA value used.
- recirculating cooling system as a fraction of all cooling systems: 0.48 dimensionless; name recirculating_CS_fraction_from_allCS; lognormal variance with pedigree 0.092025, pedigree (4,4,3,2,4)
  Calculated as an average of data available for Europe (Floerke, 2008, Future changes of freshwater needs in the electricity production sector) and USA (NERL, 2011, Estimating freshwater needs to meet future thermoelectric generation requirements).
  nan
- efficiency: 0.388 dimensionless; lognormal variance with pedigree 0.016725, pedigree (4,2,1,2,3)
  Literature value/calculated value. Data from the US Energy Information Administration for net electricity production and fuel consumption for electricity generation. Note that only data for electricity production with 'coal' in general were available, so that the same efficiency is being implemented for both hard coal and lignite plants. Further, this value is calculated from data for 2013.
  EIA. 2013. Statistics on electricity - Electricity data browser. Generation and thermal output. Net generation for electric power, annual // Consumption for electricity generation (Btu) for electric power. U.S. Energy Information Administration; Independent Statistics&Analysis.
  output relative to input (requires additional specification)
- fraction, water, decarbonised, to air: 0.0167788; name fraction_WDC_to_air; = fraction_CW_to_air; lognormal variance with pedigree 0.092025, pedigree (4,4,3,2,4)
  Calculated value. See comments in the other parametres present in this dataset. Decarbonised water is considered to be always used as cooling water, thus cooling water fractions to air are applied to all carbonised water input flows to calculate the amount of water consumed in the processes.
  nan
- once-through and cooling pond cooling systems as a fraction of all cooling syste: 0.52 dimensionless; name once_through_andCP_CS_fractio_from_allCS; lognormal variance with pedigree 0.092025, pedigree (4,4,3,2,4)
  (same comment as for recirculating cooling system as a fraction of all cooling systems)
- fraction, cooling water, to air: 0.0167788; name fraction_CW_to_air; = (WConsumption_EP_HC_recirculatingCS*recirculating_CS_fraction_from_allCS+WConsumption_EP_HC_once_through_andCP_CS*once_through_andCP_CS_fractio_from_allCS)/(WWithdrawal_EP_HC_recirculating_CS*recirculating_CS_fraction_from_allCS+WWithdrawal_EP_HC_once_through_andCP_CS*once_through_andCP_CS_fractio_from_allCS); lognormal variance with pedigree 0.092025, pedigree (4,4,3,2,4)
  Calculated
  nan
- fraction, water, completely softened, to air: 0.15; name fraction_WCS_to_air; = fraction_PW_to_air; lognormal variance with pedigree 0.092025, pedigree (4,4,3,2,4)
  Calculated value. See comment in the other parametres present in this dataset. Water, completely softened is considered to be always used as process water, thus process water fractions to air are applied to all water, completely softened input flows to calculate the amount of water consumed in the processes.
  nan
- water withdrawal, electricity production from hard coal, recirculating CS: 0.0021 m3/kWh; name WWithdrawal_EP_HC_recirculating_CS; lognormal variance with pedigree 0.092025, pedigree (4,4,3,2,4)
  Estimated based on literature (Scown, 2011, Water Footprint of U.S. Transportation Fuels, SI). The amount of water withdrawn while burning lignite and peat is assumed to be the same as in case of coal.
  nan
- water withdrawal, electricity production from hard coal, once-through and coolin: 0.0815 m3/kWh; name WWithdrawal_EP_HC_once_through_andCP_CS; lognormal variance with pedigree 0.092025, pedigree (4,4,3,2,4)
  (same comment as for water withdrawal, electricity production from hard coal, recirculating)
- water consumption, electricity production from hard coal, once-through and cooli: 0.0014 m3/kWh; name WConsumption_EP_HC_once_through_andCP_CS; lognormal variance with pedigree 0.092025, pedigree (4,4,3,2,4)
  (same comment as for water consumption, electricity production from hard coal, recirculatin)
- fraction, process water, to air: 0.15 dimensionless; name fraction_PW_to_air; lognormal variance with pedigree 0.092025, pedigree (4,4,3,2,4)
  Literature value. In case when no industry/process specific data are available, default evaporation fraction value is used. This value is 15% and is based on literature (Statistics Canada, 2007 & Shaffer, K.H., 2008, Consumptive water use in the Great Lakes Basin, USGS & Shiklomanov, 2003, World Water Resources at the Beginning of the 21st Century) and has been approved by an expert.
  nan

## Reference product
- electricity, high voltage: 1 kWh; name electricity; CPC 17100: Electrical energy; By-product classification allocatable product
  production volume 9.4646e10 kWh; name electricity_apv
    Literature value. Data from the US Energy Information Administration for 2012, which provides data on net electricity production in each US State with various energy sources. Data from the States were aggregated on the level of US NERC regions. Data were given for the electricity production with total coal This total production was split to production in hard coal plants and lignite plants according to data from the OECD iLibrary 2014 with values valid for total US (not specific for this NERC region).
    EIA. 2013. Statistics on electricity - Electricity data browser. Generation and thermal output. Net generation for electric power, annual. U.S. Energy Information Administration; Independent Statistics&Analysis.
    OECD. 2014. IEA Electricity Information Statistics: OECD - Electricity and heat generation. OECD iLibrary. Online database. DOI : 10.1787/elect-data-en
  property price 0.0977 EUR2005
    Temporary price data. Calculated as 90% of purchasers price based on: 94% of the average price (to account for a 6% loss in transformation and transmission) for electricity for industrial consumersin 2005 (excluded taxes). From IEA.
  property true value 0.0977; name electricity_true_value
    allocation property applied in "true value" allocation // value calculated from revenue

## By-products
- heat, for reuse in municipal waste incineration only: 0 MJ; CPC 17300: Steam and hot water; By-product classification allocatable product; pedigree (1,1,1,1,1)
  Net electricity generated from this waste and used in internal MSWI plant energy redistribution.
  Uncertainty: uncertainty is calculated from uncertainties in waste composition and uncertainties in energy efficiency and the uncertainty in internal energy demand
  production volume 835.44 MJ
  property exergy 0.1842 MJ; name E_th_prod_MSWI_exergy
    This exergy property is based on the exergy content of the product.
  property price 0.0106 EUR2005; name E_th_prod_MSWI_price_EUR2005
    Average European district heat price from Ecoheatcool and Euroheat 2005-2006, Ecoheat Work package 1: The European heat market. Final report. 10.6 EUR/GJ i s the price of district heat. http://www.solarthermalworld.org/files/Ecoheatcool%20WP1%20Web.pdf?download
  property true value relation 0.1842; name E_th_prod_MSWI_true_value_relation
    property to calculate "true value" from
  property true value 5.80631e-11
    allocation property applied in "true value" allocation // value calculated from true value relation
- electricity, for reuse in municipal waste incineration only: 0 kWh; CPC 17100: Electrical energy; By-product classification allocatable product; pedigree (1,1,1,1,1)
  (same comment as for heat, for reuse in municipal waste incineration only)
  production volume 117.662 kWh
  property true value relation 3.6; name E_el_prod_MSWI_true_value_relation
    property to calculate "true value" from
  property price 0.1 EUR2005; name E_el_prod_MSWI_price_EUR2005
    Estimated to be the same price as in case of electricity, medium voltage.
  property exergy 3.6 MJ; name E_el_prod_MSWI_exergy
    This exergy property is based on the exergy content of the product.
  property true value 1.59821e-10
    (same comment as for heat, for reuse in municipal waste incineration only)

## Inputs from technosphere
- light fuel oil: 0.000157732 kg; name light_fuel_oil; = factor_MJ_kWh*0.000017; lognormal variance with pedigree 0.024, pedigree (3,4,4,5,1)
  Literature value/calculated value. Light fuel oil use per 1MJ of hard coal burned, use for start-up of the power plant after shut down. Weighted average with electricity production data (Itten&Frischknecht 2012) and ight fuel oil use values of 14 countries
  (AT, BE, ES, FR, IT, NL, PT, DE, CZ, HR, PL, SK, CN, US) (Röder et al. 2007)
  Country values are typical values for hard coal plants.
  Source:
  Itten R. and Frischknecht R. (2012) Life Cycle Inventories of Electricity Mixes and Grid. ESU-services Ltd., Uster, Switzerland.
  properties: carbon content, fossil 0.862, dry mass 1 kg, wet mass 1 kg
- water, decarbonised: 1.39175 kg; name water_decarbonised_user; = factor_MJ_kWh*0.15; lognormal variance with pedigree 0.054, pedigree (4,5,4,5,3)
  Literature value/calculated value. Cooling water, decarbonised, for the cooling water circuit lost when producing 1kWh of electricity from hard coal, based on the value for burning 1MJ of hard coal. Röder et al. 2007, Tab. 9.65 and Tab. 9.66, p. 160f. These tables give an amount of 0.15 kg/MJ burned, which is valid for the assumption of 75% wet cooling and 25% run-through cooling. However, this revised dataset assumes 100% wet cooling.
  properties: wet mass 1 kg
- NOx retained, by selective catalytic reduction: 0.00105 kg; name nox_retained; source Röder, A. 2007, p. p. 298ff; lognormal variance with pedigree 0.0286, pedigree (3,3,4,1,3)
  Literature value. Amounts of retained NOx and SO2 had to be modeled as US averages, since no region-specific data on NOx and SOx retention were available. According to (NREL 2006), 33% of US coal power plant capacity is equipped with Flue Gas Desulphurization (FGD) units and these FGD units show an average removal efficiency of 85%. Emissions of SO2 and NOx from US average coal power plants without employment of FGD are documented in (NREL 2006 after AP-42 1998). The difference between these uncontrolled US averages and the region-specific actual emissions has served as an approximation for region-specific amounts of retained NOx and SO2.
  properties: wet mass 1 kg, dry mass 1 kg
- water, completely softened: 0.0556701 kg; name water_completely_softened; = factor_MJ_kWh*0.006; lognormal variance with pedigree 0.054, pedigree (4,5,4,5,3)
  Literature value/calculated value. Feed water for the steam circuit lost when producing 1kWh of electricity from hard coal, based on the value for burning 1MJ of hard coal. Röder et al. 2007, Tab. 9.65 and Tab. 9.66, p. 160f.
  properties: wet mass 1 kg
- SOx retained, in hard coal flue gas desulfurisation: 0.00783 kg; name sox_retained; source Röder, A. 2007, p. p. 298ff; lognormal variance with pedigree 0.0286, pedigree (3,3,4,1,3)
  (same comment as for NOx retained, by selective catalytic reduction)
  properties: wet mass 1 kg, dry mass 1 kg
- hard coal: 0 kg; name hard_coal; pedigree (1,1,1,1,1)
  Calculated value. The quantification of coal input depends on the energy content of the coal burned. This energy content differs for single hard coal qualities from different production regions from 19.4 MJ/kg to 31.5 MJ/kg (MIT 2007). For the US NERC regions, the supply is modeled with three production regions with hard coal of different quality and thus energy content.
  Appalachian coal (in terms of lower heating value = 27.5 MJ/kg) is assumed to be used in the following NERC regions: FRCC, NPCC, and RFC. Western coal (LHV = 20.2 MJ/kg) is assumed to be used in the regions ERCOT, MRO, and WECC. Coal from the Interior (LHV = 24.5 MJ/kg) is assumed to be used in the region SPP; and the SERC region is assumed to be supplied by mix of different qualities, i.e. US average hard coal mix as first approximation (LHV = 24.0 MJ/kg). This modelling appears to be consistent with the coal production per region (Appalachian, West, Interior) (MIT 2007) and the consumption per NERC region in 2004 (eGRID 2006), because the total amounts of coal from the three regions for power plant supply are below the total coal production in these mining regions.
  MIT 2007: Massachusetts Institute of Technology (2007) The Future of Coal. Options for a carbon constrained world. ISBN 978-0-615-14092-6. MIT, Cambridge, US, <http://web.mit.edu/coal/>.
  eGRID 2006: Emissions & Generation Resource Integrated Database (2006) Inventory of US electric power system, excel-file 'eGRID2006yr04plant121506.xls' (15.12.2006), <http://www.epa.gov/cleanenergy/egrid/index.htm>.
  properties: wet mass 1 kg, water content 0.0638298, dry mass 0.94 kg, carbon content, fossil 0.845
  note on carbon content, fossil: C content 75-94% (specified in Tab 1.1, report 6, part VI). A mean content of 0.845 kg C/ kg dry hard coal was considered
- hard coal: 0.459278 kg; pedigree (1,1,3,1,1)
  exchange present because of parent/child relationship
- hard coal ash: -0.024866 kg; name amount_ash; = (factor_MJ_kWh*0.00268)*-1; lognormal variance with pedigree 0.0986, pedigree (5,3,4,5,3)
  Calculated value.
  Hard coal ash can either be used as secondary product ('recycled'), or be disposed of. According to (NREL 2006), the rate of ash production is 0.0915 kg ash per kg burned coal (includes fly ash, bottom ash, and boiler slag). Thereof, 30% is further used; the rest must be disposed of (NREL 2006).
  US National Renewable Energy Laboratory (2006) U.S. Life-Cycle Inventory (LCI) Database, <http://www.nrel.gov/lci/about.html>, last updated in the coal chain as of October 2006, according to http://www.nrel.gov/lci/database/pdf/USLCIDB_ChangeLog.pdf.
  production volume 2.35347e9 kg; = amount_ash/electricity*electricity_apv
    Calculated from the production volume of hard coal, burned in power plant in proportion to the respective output amounts.
  property price 0 EUR2005; name amount_ash_price_EUR2005
  properties: dry mass 1 kg, wet mass 1 kg
- residue from cooling tower: -5.10309e-5 kg; name amount_residue; = (factor_MJ_kWh*0.000005*1.1)*-1; lognormal variance with pedigree 0.0812, pedigree (5,3,4,5,2)
  Literature value/calculated value. 'Use' of cooling tower when producing 1kWh of electricity from hard coal, based on the value for burning 1MJ of hard coal.
  US average, based on (NREL 2006).
  US National Renewable Energy Laboratory (2006) U.S. Life-Cycle Inventory (LCI) Database, <http://www.nrel.gov/lci/about.html>, last updated in the coal chain as of October 2006, according to http://www.nrel.gov/lci/database/pdf/USLCIDB_ChangeLog.pdf.
  production volume 4.82987e6 kg; = amount_residue/electricity*electricity_apv
    (same comment as for hard coal ash)
  property price 0 EUR2005; name amount_residue_price_EUR2005
  properties: wet mass 1 kg, water content 0.428571, carbon content, fossil 0.0544233, dry mass 0.7 kg
- hard coal power plant: 4.67629e-11 unit; name hard_coal_power_plant; = 0.00000000000504* factor_MJ_kWh; source Röder, A. 2007; lognormal variance with pedigree 0.3686, pedigree (5,3,4,5,3)
  Calculated value. At the moment, the hard coal power plant input consists of a market mix of a 100MWe power plant and a 500MWe power plant
  .
  For this calculation, 4000 load hours per year are assumed. It is assumed that a total of 150'000h is reached during the lifetime. A capacity of 500MW is taken for the calculation.
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
## Inputs from nature
- Water, cooling, unspecified natural origin [natural resource, in water]: 0.0355941 m3; name water_cooling_UNO_input; = ((recirculating_CS_fraction_from_allCS*WWithdrawal_EP_HC_recirculating_CS)+(once_through_andCP_CS_fractio_from_allCS*WWithdrawal_EP_HC_once_through_andCP_CS))/11.31*factor_MJ_kWh; lognormal variance with pedigree 0.098025, pedigree (4,4,4,2,4)
  Calculated based on literature data.

## Emissions to nature
- Hydrogen fluoride [air, non-urban air or from high stacks]: 2.81134e-5 kg; name hydrogen_fluoride; = factor_MJ_kWh*0.00000303; lognormal variance with pedigree 0.1446, pedigree (4,3,4,1,3)
  Literature value/calculated value. Emissions when producing 1kWh of electricity from hard coal, based on the value for burning 1MJ of hard coal.
  US average, based on (NREL 2006).
  US National Renewable Energy Laboratory (2006) U.S. Life-Cycle Inventory (LCI) Database, <http://www.nrel.gov/lci/about.html>, last updated in the coal chain as of October 2006, according to http://www.nrel.gov/lci/database/pdf/USLCIDB_ChangeLog.pdf.
- Benzo(a)pyrene [air, non-urban air or from high stacks]: 7.11649e-12 kg; name benzo_a_pyrene; = factor_MJ_kWh*0.000000000000767; lognormal variance with pedigree 0.1446, pedigree (4,3,4,1,3)
  (same comment as for Hydrogen fluoride)
- Xylene [air, non-urban air or from high stacks]: 6.92165e-9 kg; name xylene; = factor_MJ_kWh*0.000000000746; lognormal variance with pedigree 0.1446, pedigree (4,3,4,1,3)
  (same comment as for Hydrogen fluoride)
- Thorium-234 [air, non-urban air or from high stacks]: 2.34742e-5 kBq; name thorium_234; = factor_MJ_kWh*0.00000253; lognormal variance with pedigree 0.3246, pedigree (4,3,4,1,3)
  Literature value/calculated value. Emissions when producing 1kWh of electricity from hard coal, based on the value for burning 1MJ of hard coal.
  Average US emissions of radionuclides are based on (USEPA 1998, pg. 9-6). Reported radionuclide species without corresponding elementary flow in ecoinvent are categorized as 'Actinides, radioactive, unspecified'.
  U. S. Environmental Protection Agency (EPA) (1998) The Study of Hazardous Air Pollutant Emissions from Electric Utility Steam Generating Units - Final Report to Congress. Volumes 1 and 2. EPA-453/R-98-004a and EPA-413/R-98-004b.-98-004b
- Ethane [air, non-urban air or from high stacks]: 0 kg; name ethane; = factor_MJ_kWh*0; pedigree (3,5,4,5,1)
  (same comment as for Hydrogen fluoride)
- Magnesium [air, non-urban air or from high stacks]: 2.05979e-6 kg; name magnesium; = factor_MJ_kWh*0.000000222; lognormal variance with pedigree 0.6746, pedigree (4,3,4,1,3)
  (same comment as for Hydrogen fluoride)
- Particulates, > 2.5 um, and < 10um [air, non-urban air or from high stacks]: 4.85e-6 kg; name particulates_2_5_to_10; source Röder, A. 2007; lognormal variance with pedigree 0.2286, pedigree (3,3,4,1,3)
  Literature value. Size distribution of particle emissions as well as an additional generic emissions factor of 5 kg/TJin of PM >10µm due to coal handling at the power plant site are considered along (Röder et al. 2004).
- Ethane, 1,2-dichloro- [air, non-urban air or from high stacks]: 7.48763e-9 kg; name ethane_dichloro; = factor_MJ_kWh*0.000000000807; lognormal variance with pedigree 0.1446, pedigree (4,3,4,1,3)
  (same comment as for Hydrogen fluoride)
- Cyanide [air, non-urban air or from high stacks]: 4.68557e-7 kg; name cyanide; = factor_MJ_kWh*0.0000000505; lognormal variance with pedigree 0.1446, pedigree (4,3,4,1,3)
  (same comment as for Hydrogen fluoride)
- Bromine [air, non-urban air or from high stacks]: 0 kg; name bromine; = factor_MJ_kWh*0; pedigree (5,3,4,5,3)
  (same comment as for Hydrogen fluoride)
- Iodine [air, non-urban air or from high stacks]: 0 kg; name iodine; = factor_MJ_kWh*0; pedigree (5,3,4,5,3)
  (same comment as for Hydrogen fluoride)
- NMVOC, non-methane volatile organic compounds, unspecified origin [air, non-urban air or from high stacks]: 2.11546e-5 kg; name nmvoc; = factor_MJ_kWh*0.00000228; lognormal variance with pedigree 0.1446, pedigree (4,3,4,1,3)
  (same comment as for Hydrogen fluoride)
- Actinides, radioactive, unspecified [air, non-urban air or from high stacks]: 0.000387835 kBq; name actinides_radioactive_unspecified; = factor_MJ_kWh*0.0000418; lognormal variance with pedigree 0.3246, pedigree (4,3,4,1,3)
  (same comment as for Thorium-234)
- Beryllium [air, non-urban air or from high stacks]: 3.93402e-9 kg; name beryllium; = factor_MJ_kWh*0.000000000424; lognormal variance with pedigree 0.6746, pedigree (4,3,4,1,3)
  (same comment as for Hydrogen fluoride)
- Dinitrogen monoxide [air, non-urban air or from high stacks]: 2.05052e-5 kg; name dinitrogen_monoxide; = factor_MJ_kWh*0.00000221; lognormal variance with pedigree 0.1446, pedigree (4,3,4,1,3)
  (same comment as for Hydrogen fluoride)
- Carbon disulfide [air, non-urban air or from high stacks]: 2.44021e-8 kg; name carbon_disulfide; = factor_MJ_kWh*0.00000000263; lognormal variance with pedigree 0.3246, pedigree (4,3,4,1,3)
  (same comment as for Hydrogen fluoride)
- Carbon dioxide, fossil [air, non-urban air or from high stacks]: 0.9 kg; name carbon_dioxide_fossil; = factor_MJ_kWh*0.097; source Röder, A. 2007, p. Tab. 16.12 p. 302; lognormal variance with pedigree 0.0266, pedigree (4,3,4,1,3)
  Literature value/calculated value. Amount of CO2 emissions when producing 1kWh of electricity from hard coal, based on the value for burning 1MJ of hard coal.
  Region specific value, based on (NREL 2006). See ecoinvent report 'Kohle', chapter 16, Tab. 16.10ff (Röder et al. 2007)
  US National Renewable Energy Laboratory (2006) U.S. Life-Cycle Inventory (LCI) Database, <http://www.nrel.gov/lci/about.html>, last updated in the coal chain as of October 2006, according to http://www.nrel.gov/lci/database/pdf/USLCIDB_ChangeLog.pdf.
- Sulfate [air, non-urban air or from high stacks]: 8.96289e-9 kg; name sulfate; = factor_MJ_kWh*0.000000000966; lognormal variance with pedigree 0.1446, pedigree (4,3,4,1,3)
  (same comment as for Hydrogen fluoride)
- Phenol [air, non-urban air or from high stacks]: 2.99691e-9 kg; name phenol; = factor_MJ_kWh*0.000000000323; lognormal variance with pedigree 0.1446, pedigree (4,3,4,1,3)
  (same comment as for Hydrogen fluoride)
- Benzene [air, non-urban air or from high stacks]: 2.43093e-7 kg; name benzene; = factor_MJ_kWh*0.0000000262; lognormal variance with pedigree 0.1446, pedigree (4,3,4,1,3)
  (same comment as for Hydrogen fluoride)
- Benzene, ethyl- [air, non-urban air or from high stacks]: 1.76289e-8 kg; name benzene_ethyl; = factor_MJ_kWh*0.0000000019; lognormal variance with pedigree 0.1446, pedigree (4,3,4,1,3)
  (same comment as for Hydrogen fluoride)
- Copper [air, non-urban air or from high stacks]: 0 kg; name copper; = factor_MJ_kWh*0; pedigree (5,3,4,5,3)
  (same comment as for Hydrogen fluoride)
- Radon-220 [air, non-urban air or from high stacks]: 0.00335876 kBq; name radon_220; = factor_MJ_kWh*0.000362; lognormal variance with pedigree 0.3246, pedigree (4,3,4,1,3)
  (same comment as for Thorium-234)
- Ethane, 1,1,1-trichloro-, HCFC-140 [air, non-urban air or from high stacks]: 3.74845e-9 kg; name ethane_trichloro; = factor_MJ_kWh*0.000000000404; lognormal variance with pedigree 0.1446, pedigree (4,3,4,1,3)
  (same comment as for Hydrogen fluoride)
- Cadmium [air, non-urban air or from high stacks]: 9.5567e-9 kg; name cadmium; = factor_MJ_kWh*0.00000000103; lognormal variance with pedigree 0.6746, pedigree (4,3,4,1,3)
  (same comment as for Hydrogen fluoride)
- Aldehydes, unspecified [air, non-urban air or from high stacks]: 1.78144e-7 kg; name aldehydes_unspecified; = factor_MJ_kWh*0.0000000192; lognormal variance with pedigree 0.1446, pedigree (4,3,4,1,3)
  (same comment as for Hydrogen fluoride)
- Methane, fossil [air, non-urban air or from high stacks]: 7.05155e-6 kg; name methane_fossil; = factor_MJ_kWh*0.00000076; lognormal variance with pedigree 0.1446, pedigree (4,3,4,1,3)
  (same comment as for Hydrogen fluoride)
- Chloroform [air, non-urban air or from high stacks]: 1.83711e-8 kg; name chloroform; = factor_MJ_kWh*0.00000000198; lognormal variance with pedigree 0.1446, pedigree (4,3,4,1,3)
  (same comment as for Hydrogen fluoride)
- Uranium-234 [air, non-urban air or from high stacks]: 4.58351e-5 kBq; name uranium_234; = factor_MJ_kWh*0.00000494; lognormal variance with pedigree 0.3246, pedigree (4,3,4,1,3)
  (same comment as for Thorium-234)
- Ethene, tetrachloro- [air, non-urban air or from high stacks]: 8.05361e-9 kg; name ethene_tetrachloro; = factor_MJ_kWh*0.000000000868; lognormal variance with pedigree 0.1446, pedigree (4,3,4,1,3)
  (same comment as for Hydrogen fluoride)
- Hydrocarbons, aliphatic, alkanes, unspecified [air, non-urban air or from high stacks]: 1.16907e-7 kg; name hydrocarbons_al_al_unspec; = factor_MJ_kWh*0.0000000126; lognormal variance with pedigree 0.1446, pedigree (4,3,4,1,3)
  (same comment as for Hydrogen fluoride)
- Protactinium-234 [air, non-urban air or from high stacks]: 2.34742e-5 kBq; name protactinium_234; = factor_MJ_kWh*0.00000253; lognormal variance with pedigree 0.1446, pedigree (4,3,4,1,3)
  (same comment as for Thorium-234)
- Cobalt [air, non-urban air or from high stacks]: 1.87423e-8 kg; name cobalt; = factor_MJ_kWh*0.00000000202; lognormal variance with pedigree 0.6746, pedigree (4,3,4,1,3)
  (same comment as for Hydrogen fluoride)
- Acrolein [air, non-urban air or from high stacks]: 5.43711e-8 kg; name acrolein; = factor_MJ_kWh*0.00000000586; lognormal variance with pedigree 0.3246, pedigree (4,3,4,1,3)
  (same comment as for Hydrogen fluoride)
- Dioxins, measured as 2,3,7,8-tetrachlorodibenzo-p-dioxin [air, non-urban air or from high stacks]: 1.47526e-13 kg; name dioxins; = factor_MJ_kWh*1.59E-14; lognormal variance with pedigree 0.3246, pedigree (4,3,4,1,3)
  (same comment as for Hydrogen fluoride)
- Propane [air, non-urban air or from high stacks]: 0 kg; name propane; = factor_MJ_kWh*0; pedigree (3,5,4,5,1)
  (same comment as for Hydrogen fluoride)
- Particulates, > 10 um [air, non-urban air or from high stacks]: 6.01e-5 kg; name particulates_gt10; source Röder, A. 2007; lognormal variance with pedigree 0.6686, pedigree (3,3,4,1,3)
  (same comment as for Particulates, > 2.5 um, and < 10um)
- Styrene [air, non-urban air or from high stacks]: 4.64845e-9 kg; name styrene; = factor_MJ_kWh*0.000000000501; lognormal variance with pedigree 0.1446, pedigree (4,3,4,1,3)
  (same comment as for Hydrogen fluoride)
- Zinc [air, non-urban air or from high stacks]: 0 kg; name zinc; = factor_MJ_kWh*0; pedigree (5,3,4,5,3)
  (same comment as for Hydrogen fluoride)
- Acenaphthene [air, non-urban air or from high stacks]: 9.5567e-11 kg; name acenaphthene; = factor_MJ_kWh*0.0000000000103; lognormal variance with pedigree 0.1446, pedigree (4,3,4,1,3)
  (same comment as for Hydrogen fluoride)
- Particulates, < 2.5 um [air, non-urban air or from high stacks]: 3.92e-5 kg; name particulates_lt2_5; source Röder, A. 2007; lognormal variance with pedigree 0.2286, pedigree (3,3,4,1,3)
  (same comment as for Particulates, > 2.5 um, and < 10um)
- Arsenic [air, non-urban air or from high stacks]: 7.68247e-8 kg; name arsenic; = factor_MJ_kWh*0.00000000828; lognormal variance with pedigree 0.6746, pedigree (4,3,4,1,3)
  (same comment as for Hydrogen fluoride)
- Strontium [air, non-urban air or from high stacks]: 0 kg; name strontium; = factor_MJ_kWh*0; pedigree (5,3,4,5,3)
  (same comment as for Hydrogen fluoride)
- Carbon monoxide, fossil [air, non-urban air or from high stacks]: 9.27835e-5 kg; name carbon_monoxide_fossil; = factor_MJ_kWh*0.00001; lognormal variance with pedigree 0.6746, pedigree (4,3,4,1,3)
  (same comment as for Hydrogen fluoride)
- Chromium [air, non-urban air or from high stacks]: 4.87113e-8 kg; name chromium; = factor_MJ_kWh*0.00000000525; lognormal variance with pedigree 0.6746, pedigree (4,3,4,1,3)
  (same comment as for Hydrogen fluoride)
- Nitrogen oxides [air, non-urban air or from high stacks]: 0.0014 kg; name nitrogen_oxides; source Röder, A. 2007, p. Tab. 16.12 p. 302; lognormal variance with pedigree 0.0507, pedigree (2,2,3,1,4)
  Literature value. Data from eGrid 2010. This value is given for 'coal output emissions' in general in the year 2010 and is applied to both hard coal and lignite datasets.
  eGrid. The Emissions & Generation Resource Integrated Database. Year 2010 eGRID 9th edition Version 1.0 . United States Environmental Protection Agency.
- Mercury [air, non-urban air or from high stacks]: 1.35464e-8 kg; name mercury; = factor_MJ_kWh*0.00000000146; source Röder, A. 2007, p. Tab. 16.8 p.296; lognormal variance with pedigree 0.1446, pedigree (4,3,4,1,3)
  Literature value/calculated value. Mercury emissions when producing 1kWh of electricity from hard coal, based on the value for burning 1MJ of hard coal.
  Region specific value, based on (NREL 2006). See ecoinvent report 'Kohle', chapter 16, Tab. 16.10ff (Röder et al. 2007)
  US National Renewable Energy Laboratory (2006) U.S. Life-Cycle Inventory (LCI) Database, <http://www.nrel.gov/lci/about.html>, last updated in the coal chain as of October 2006, according to http://www.nrel.gov/lci/database/pdf/USLCIDB_ChangeLog.pdf.
- Formaldehyde [air, non-urban air or from high stacks]: 4.5e-8 kg; name formaldehyde; = factor_MJ_kWh*0.00000000485; lognormal variance with pedigree 0.1446, pedigree (4,3,4,1,3)
  (same comment as for Hydrogen fluoride)
- Chromium VI [air, non-urban air or from high stacks]: 1.48454e-8 kg; name chromium_vi; = factor_MJ_kWh*0.0000000016; lognormal variance with pedigree 0.6746, pedigree (4,3,4,1,3)
  (same comment as for Hydrogen fluoride)
- Hydrogen chloride [air, non-urban air or from high stacks]: 0.000224536 kg; name hydrogen_chloride; = factor_MJ_kWh*0.0000242; lognormal variance with pedigree 0.1446, pedigree (4,3,4,1,3)
  (same comment as for Hydrogen fluoride)
- Methane, dichloro-, HCC-30 [air, non-urban air or from high stacks]: 5.43711e-8 kg; name methane_dichloro; = factor_MJ_kWh*0.00000000586; lognormal variance with pedigree 0.1446, pedigree (4,3,4,1,3)
  (same comment as for Hydrogen fluoride)
- PAH, polycyclic aromatic hydrocarbons [air, non-urban air or from high stacks]: 1.56804e-7 kg; name pah; = factor_MJ_kWh*0.0000000169; lognormal variance with pedigree 0.1446, pedigree (4,3,4,1,3)
  (same comment as for Hydrogen fluoride)
- Thorium-228 [air, non-urban air or from high stacks]: 1.43814e-5 kBq; name throium_228; = factor_MJ_kWh*0.00000155; lognormal variance with pedigree 0.3246, pedigree (4,3,4,1,3)
  (same comment as for Thorium-234)
- Lead [air, non-urban air or from high stacks]: 7.86804e-8 kg; name lead; = factor_MJ_kWh*0.00000000848; lognormal variance with pedigree 0.6746, pedigree (4,3,4,1,3)
  (same comment as for Hydrogen fluoride)
- Boron [air, non-urban air or from high stacks]: 0 kg; name boron; = factor_MJ_kWh*0; pedigree (5,3,4,5,3)
  (same comment as for Hydrogen fluoride)
- Antimony [air, non-urban air or from high stacks]: 3.36804e-9 kg; name antimony; = factor_MJ_kWh*0.000000000363; lognormal variance with pedigree 0.6746, pedigree (4,3,4,1,3)
  (same comment as for Hydrogen fluoride)
- Methane, monochloro-, R-40 [air, non-urban air or from high stacks]: 9.92784e-8 kg; name methane_monochloro; = factor_MJ_kWh*0.0000000107; lognormal variance with pedigree 0.1446, pedigree (4,3,4,1,3)
  (same comment as for Hydrogen fluoride)
- Radium-226 [air, non-urban air or from high stacks]: 3.66495e-5 kBq; name radium_226; = factor_MJ_kWh*0.00000395; lognormal variance with pedigree 0.3246, pedigree (4,3,4,1,3)
  (same comment as for Thorium-234)
- Pentane [air, non-urban air or from high stacks]: 0 kg; name pentane; = factor_MJ_kWh*0; pedigree (3,5,4,5,1)
  (same comment as for Hydrogen fluoride)
- Hydrocarbons, aliphatic, unsaturated [air, non-urban air or from high stacks]: 0 kg; name hydrocarbons_aliphatic_unsaturated; = factor_MJ_kWh*0; pedigree (3,5,4,5,1)
  (same comment as for Hydrogen fluoride)
- Radium-228 [air, non-urban air or from high stacks]: 2.17113e-5 kBq; name radium_228; = factor_MJ_kWh*0.00000234; lognormal variance with pedigree 0.3246, pedigree (4,3,4,1,3)
  (same comment as for Thorium-234)
- Hydrocarbons, chlorinated [air, non-urban air or from high stacks]: 3.80412e-8 kg; name hydrocarbons_chlorinated; = factor_MJ_kWh*0.0000000041; lognormal variance with pedigree 0.1446, pedigree (4,3,4,1,3)
  (same comment as for Hydrogen fluoride)
- Nickel [air, non-urban air or from high stacks]: 5.24227e-8 kg; name nickel; = factor_MJ_kWh*0.00000000565; lognormal variance with pedigree 0.6746, pedigree (4,3,4,1,3)
  (same comment as for Hydrogen fluoride)
- Hexane [air, non-urban air or from high stacks]: 1.26186e-8 kg; name hexane; = factor_MJ_kWh*0.00000000136; lognormal variance with pedigree 0.1446, pedigree (4,3,4,1,3)
  (same comment as for Hydrogen fluoride)
- Selenium [air, non-urban air or from high stacks]: 2.43093e-7 kg; name selenium; = factor_MJ_kWh*0.0000000262; lognormal variance with pedigree 0.6746, pedigree (4,3,4,1,3)
  (same comment as for Hydrogen fluoride)
- Toluene [air, non-urban air or from high stacks]: 4.49072e-8 kg; name toluene; = factor_MJ_kWh*0.00000000484; lognormal variance with pedigree 0.1446, pedigree (4,3,4,1,3)
  (same comment as for Hydrogen fluoride)
- Barium [air, non-urban air or from high stacks]: 0 kg; name barium; = factor_MJ_kWh*0; pedigree (5,3,4,5,3)
  (same comment as for Hydrogen fluoride)
- Furan [air, non-urban air or from high stacks]: 9.37113e-13 kg; name furan; = factor_MJ_kWh*0.000000000000101; lognormal variance with pedigree 0.1446, pedigree (4,3,4,1,3)
  (same comment as for Hydrogen fluoride)
- Lead-210 [air, non-urban air or from high stacks]: 0.000115979 kBq; name lead_210; = factor_MJ_kWh*0.0000125; lognormal variance with pedigree 0.3246, pedigree (4,3,4,1,3)
  (same comment as for Thorium-234)
- Cumene [air, non-urban air or from high stacks]: 1.02062e-9 kg; name cumene; = factor_MJ_kWh*0.00000000011; lognormal variance with pedigree 0.1446, pedigree (4,3,4,1,3)
  (same comment as for Hydrogen fluoride)
- Uranium-238 [air, non-urban air or from high stacks]: 4.58351e-5 kBq; name uranium_238; = factor_MJ_kWh*0.00000494; lognormal variance with pedigree 0.3246, pedigree (4,3,4,1,3)
  (same comment as for Thorium-234)
- Water [water, unspecified]: 0.0364126 m3; name water_to_water_unspecified; = (water_completely_softened/1000)*(1-fraction_WCS_to_air)+(water_decarbonised_user/1000)*(1-fraction_WDC_to_air)+water_cooling_UNO_input*(1-fraction_CW_to_air); lognormal variance with pedigree 0.098025, pedigree (4,4,4,2,4)
  Calculated value based on literature values and expert opinion. See comments in the parametres' comment field.
  property fraction, origin: unspecified 0.961102; name fraction_origin_unspecified_Ww
  property fraction, origin: fresh water 0.0388978; name fraction_origin_fresh_water_Ww
  property fraction, origin: salt water 0; name fraction_origin_salt_water_Ww
- Polonium-210 [air, non-urban air or from high stacks]: 0.000115979 kBq; name polonium_210; = factor_MJ_kWh*0.0000125; lognormal variance with pedigree 0.3246, pedigree (4,3,4,1,3)
  (same comment as for Thorium-234)
- Water [air, unspecified]: 0.00062893 m3; name water_to_air_unspecified; = (water_completely_softened/1000)*fraction_WCS_to_air+(water_decarbonised_user/1000)*fraction_WDC_to_air+water_cooling_UNO_input*fraction_CW_to_air; lognormal variance with pedigree 0.098025, pedigree (4,4,4,2,4)
  (same comment as for Water)
  property fraction, origin: fresh water 0.0435059; name fraction_origin_fresh_water
  property fraction, origin: unspecified 0.956494; name fraction_origin_unspecified
  property fraction, origin: salt water 0; name fraction_origin_salt_water
- Propene [air, non-urban air or from high stacks]: 0 kg; name propene; = factor_MJ_kWh*0; pedigree (3,5,4,5,1)
  (same comment as for Hydrogen fluoride)
- Radon-222 [air, non-urban air or from high stacks]: 0.00610515 kBq; name radon_222; = factor_MJ_kWh*0.000658; lognormal variance with pedigree 0.3246, pedigree (4,3,4,1,3)
  (same comment as for Thorium-234)
- Molybdenum [air, non-urban air or from high stacks]: 0 kg; name molybdenum; = factor_MJ_kWh*0; pedigree (5,3,4,5,3)
  (same comment as for Hydrogen fluoride)
- Potassium-40 [air, non-urban air or from high stacks]: 0.000161443 kBq; name potassium_40; = factor_MJ_kWh*0.0000174; lognormal variance with pedigree 0.3246, pedigree (4,3,4,1,3)
  (same comment as for Thorium-234)
- Vanadium [air, non-urban air or from high stacks]: 0 kg; name vanadium; = factor_MJ_kWh*0; pedigree (5,3,4,5,3)
  (same comment as for Hydrogen fluoride)
- Thorium-232 [air, non-urban air or from high stacks]: 1.43814e-5 kBq; name thorium_232; = factor_MJ_kWh*0.00000155; lognormal variance with pedigree 0.3246, pedigree (4,3,4,1,3)
  (same comment as for Thorium-234)
- Sulfur dioxide [air, non-urban air or from high stacks]: 0.001 kg; name sulfur_dioxide; source Röder, A. 2007, p. Tab. 16.12 p. 302; lognormal variance with pedigree 0.0527, pedigree (2,2,3,1,4)
  (same comment as for Nitrogen oxides)
- Butane [air, non-urban air or from high stacks]: 0 kg; name butane; = factor_MJ_kWh*0; pedigree (5,3,4,5,3)
  (same comment as for Hydrogen fluoride)
- Hydrocarbons, aliphatic, alkanes, cyclic [air, non-urban air or from high stacks]: 1.08557e-7 kg; name hydrocarbons_al_al_cyclic; = factor_MJ_kWh*0.0000000117; lognormal variance with pedigree 0.1446, pedigree (4,3,4,1,3)
  (same comment as for Hydrogen fluoride)
- Thorium-230 [air, non-urban air or from high stacks]: 2.34742e-5 kBq; name thorium_230; = factor_MJ_kWh*0.00000253; lognormal variance with pedigree 0.3246, pedigree (4,3,4,1,3)
  (same comment as for Thorium-234)
- Manganese [air, non-urban air or from high stacks]: 9.17629e-8 kg; name manganese; = factor_MJ_kWh*0.00000000989; lognormal variance with pedigree 0.6746, pedigree (4,3,4,1,3)
  (same comment as for Hydrogen fluoride)

## Sampling procedure
literature and statistics

## Extrapolations
Data from 1993 have been updated for the years 2000 (v1.0), and 2004-2005 (v2.0). Uncertainty was adjusted accordingly.

Most of the exchanges were extrapolated through production-weighted averages of the datasets of the following 14 countries: AT, BE, ES, FR, IT, NL, PT, DE, CZ, HR, PL, SK, CN, US.

The original data were valid for the burning of 1MJ of hard coal. In this dataset, the values are scaled to the net output of 1kWh of electricity, based on the electrical efficiency.

## Review by Carl Vadenbo 2015-07-23
The update of the whole electricity sector for the ecoinvent v3.2 database consist of hundreds of datasets. All these datasets have passed through a streamlined review processes where the underlying modelling of production volumes, technology shares and efficiencies was reviewed in detail prior to the datasets being submitted to the database.
