# sawnwood production, hardwood, dried (u=10%), planed

Dataset: EcoSpold 2, unit process
Geography: RER
Time period: 2014-01-01 to 2019-12-31
Technology level: current
Classification: ISIC rev.4 ecoinvent: 1610:Sawmilling and planing of wood
Classification: EcoSpold01Categories: wooden materials/extraction
Scenario: Business-as-Usual
System model: Allocation at the point of substitution
Generated by: Emilia Moreno Ruiz
Database: ecoinvent
isCopyrightProtected: false
accessRestrictedTo: 1

## General comment
[Dataset to be replaced by 'sawnwood production, hardwood, dried (u=10%), planed, CH, 2014 - 2014']
[Dataset to be replaced by 'sawnwood production, hardwood, dried (u=10%), planed, Europe without Switzerland, 2014 - 2014']

## Included activities start
Entry of the specific products issued of the planing activity

## Included activities end
Delivery of the generic planed product

## Reference product
- sawnwood, hardwood, dried (u=10%), planed: 1 m3; By-product classification allocatable product; CPC 31102: Wood, sawn or chipped lengthwise, sliced or peeled, of a thickness exceeding 6 mm, of non-coniferous wood
  production volume 9.27211e6 m3; = 0.287*3.2307E+07
    50% of the Production Volume issued from the planing has been made accesible as this generic product.
    The Production Volumes have been downscaled from GLO to RER using the relative GDP values 2011 (source: United Nations, <http://data.un.org/Glossary.aspx?q=GDP+%28current+US%24%29>, accessed 20130726).
  property carbon content, non-fossil 0.494
    C content of dry mass is 0.494 kgC/kg dry wood (ecoinvent v2.2 report 9)
  property price 265 EUR2005
    Temporary price data. Calculated as 90% of purchasers price based on: 2004 export prices for the World+ according to: http://faostat.fao.org/site/626/DesktopDefault.aspx?PageID=626#ancor downloaded 28 April 2009; calculated as export value divided by export volume.
  property carbon content 0.494
    carbon content on a dry matter basis (reserved; not for manual entry)
  properties: wet mass 715 kg, water in wet mass 65 kg, carbon content, fossil 0, dry mass 650 kg, water content 0.1, carbon allocation 321.1 kg

## Inputs from technosphere
- sawnwood, lath, hardwood, dried (u=10%), planed: 0.4 m3
  The input share has been calculated using data from the planing activity
  properties: dry mass 614.4 kg, carbon content, non-fossil 0.494, water content 0.1, wet mass 675.85 kg
- sawnwood, board, hardwood, dried (u=10%), planed: 0.4 m3; name board_planed
  The input share has been calculated using data from the planing activity
  property carbon content, non-fossil 0.494; name board_planed_C_content_non_fossil
  property carbon content, fossil 0; name board_planed_C_content_fossil
  property dry mass 563.2 kg; name board_planed_DM
  property wet mass 619.52 kg; name board_planed_WM; = board_planed_DM*(1+ board_planed_water_content)
  property water in wet mass 56.32 kg; name board_planed_WWM; = board_planed_DM* board_planed_water_content
  property water content 0.1; name board_planed_water_content
- sawnwood, beam, hardwood, dried (u=10%), planed: 0.2 m3; name beam_planed
  The input share has been calculated using data from the planing activity
  property carbon content, non-fossil 0.494; name beam_planed_C_content_non_fossil
  property water content 0.1; name beam_planed_water_content
  property dry mass 563.2 kg; name beam_planed_DM
  property carbon content, fossil 0; name beam_planed_C_content_fossil
  property water in wet mass 56.32 kg; name beam_planed_WWM; = beam_planed_DM* beam_planed_water_content
  property wet mass 619.52 kg; name beam_planed_WM; = beam_planed_DM*(1+ beam_planed_water_content)

## Extrapolations
This dataset has been extrapolated from year 2014 to the year of the calculation (2019). The uncertainty has been adjusted accordingly.
