# sodium silicate production, hydrothermal liquor, product in 48% solution state

Dataset: EcoSpold 2, unit process
Geography: RoW
Time period: 1995-01-01 to 2019-12-31
Technology level: current
Classification: EcoSpold01Categories: chemicals/inorganics
Classification: ISIC rev.4 ecoinvent: 2011:Manufacture of basic chemicals
Tags: ConvertedDataset
Scenario: Business-as-Usual
System model: Allocation at the point of substitution
Generated by: Roland Hischier
Published in: Zah R. 2007
Database: ecoinvent
isCopyrightProtected: true
accessRestrictedTo: 1

## General comment
data based on a EMPA study, commissioned by the CEES.
[This dataset was already contained in the ecoinvent database version 2. It was not individually updated during the transfer to ecoinvent version 3. Life Cycle Impact Assessment results may still have changed, as they are affected by changes in the supply chain, i.e. in other datasets. This dataset was generated following the ecoinvent quality guidelines for version 2. It may have been subject to central changes described in the ecoinvent version 3 change report (http://www.ecoinvent.org/database/ecoinvent-version-3/reports-of-changes/), and the results of the central updates were reviewed extensively. The changes added e.g. consistent water flows and other information throughout the database. The documentation of this dataset can be found in the ecoinvent reports of version 2, which are still available via the ecoinvent website. The change report linked above covers all central changes that were made during the conversion process.]

## Included activities end
This module contains material and energy input, production of waste and emissions for the production of sodium phosphate out of phosphoric aicd. Transport and infrastructure have been estimated. The input of 0.015 m3 air is not reported in the data according to the methodology of the study.

## Geography
average data from 6 Euroopean producers

## Technology
average technology used from these European producers

## Time period
date of published literature

## Parameters
- fraction, cooling water, cooling pond system, to air: 0.032; name fraction_CW_CP_to_air; lognormal variance with pedigree 0.0413, pedigree (2,3,1,3,1)
  Calculated based on literature value (Scown, C.D., 2011, Water Footprint of U.S. Transportation Fuels and supplying information of the article) (Vionnet, S., Quantis Water Database - Technical Report, 2012).
- fraction, process water, to air: 0.876556 dimensionless; name fraction_PW_to_air; lognormal variance with pedigree 0.092025, pedigree (4,4,3,2,4)
- fraction, cooling water, once-through system, to air: 0.004; name fraction_CW_OT_to_air; lognormal variance with pedigree 0.0413, pedigree (2,3,1,3,1)
  (same comment as for fraction, cooling water, cooling pond system, to air)
- fraction, cooling water, to air: 0.3875; name fraction_CW_to_air; = (0.5*fraction_CW_OT_to_air)+(0.5*fraction_CW_R_to_air); lognormal variance with pedigree 0.092025, pedigree (4,4,3,2,4)
  Calculated value based on literature value (see comments of the other parametres present in this dataset) and expert opinion. In the case when no industry/literature data are available about the type of cooling or directly fraction, cooling water, to air specific for the process a default assumption is applied. It is assumed that the once-through cooling system is used in 50% of all cases and recirculating system is used in another 50% of all cases.
- fraction, cooling water, recirculating system, to air: 0.771; name fraction_CW_R_to_air; lognormal variance with pedigree 0.0413, pedigree (2,3,1,3,1)
  (same comment as for fraction, cooling water, cooling pond system, to air)

## Reference product
- sodium silicate, without water, in 48% solution state: 1 kg; By-product classification allocatable product; CPC 34270: Cyanides, cyanide oxides and complex cyanides; fulminates, cyanates and thiocyanates; silicates; borates; perb[…]; CAS 1344-09-8
  EcoSpold01Location=RER
  production volume 2.67763 kg
    This is a placeholder value that does not reflect real-world production volumes. This dataset does not currently require a real-world production volume to work in the database framework, and no actual data were collected yet. This has no negative effect on the results of the ecoinvent database.
  property price 0.471 EUR2005
    From UN trade database. http://data.un.org/ Calculated as average price for all chemicals in the category 'Trade of goods , US$, HS 1992, 28 Inorganic chemicals, precious metal compound, isotope'. Import data from the largest economies of the world are used (Brazil, India, USA, China, Japan and EU-27).
  property carbon content 0
    carbon content on a dry matter basis (reserved; not for manual entry)
  property true value 0.471
    allocation property applied in "true value" allocation // value calculated from revenue
  properties: carbon content, fossil 0, water content 0, carbon content, non-fossil 0, water in wet mass 0 kg, wet mass 1 kg, dry mass 1 kg, carbon allocation 0 kg

## By-products
- heat, for reuse in municipal waste incineration only: 0 MJ; CPC 17300: Steam and hot water; By-product classification allocatable product; pedigree (1,1,1,1,1)
  Net electricity generated from this waste and used in internal MSWI plant energy redistribution.
  Uncertainty: uncertainty is calculated from uncertainties in waste composition and uncertainties in energy efficiency and the uncertainty in internal energy demand
  production volume 2.91865e-7 MJ
  property exergy 0.1842 MJ; name E_th_prod_MSWI_exergy
    This exergy property is based on the exergy content of the product.
  property price 0.0106 EUR2005; name E_th_prod_MSWI_price_EUR2005
    Average European district heat price from Ecoheatcool and Euroheat 2005-2006, Ecoheat Work package 1: The European heat market. Final report. 10.6 EUR/GJ i s the price of district heat. http://www.solarthermalworld.org/files/Ecoheatcool%20WP1%20Web.pdf?download
  property true value relation 0.1842; name E_th_prod_MSWI_true_value_relation
    property to calculate "true value" from
  property true value 6.39954e-10
    allocation property applied in "true value" allocation // value calculated from true value relation
- electricity, for reuse in municipal waste incineration only: 0 kWh; CPC 17100: Electrical energy; By-product classification allocatable product; pedigree (1,1,1,1,1)
  (same comment as for heat, for reuse in municipal waste incineration only)
  production volume 4.11057e-8 kWh
  property true value relation 3.6; name E_el_prod_MSWI_true_value_relation
    property to calculate "true value" from
  property price 0.1 EUR2005; name E_el_prod_MSWI_price_EUR2005
    Estimated to be the same price as in case of electricity, medium voltage.
  property exergy 3.6 MJ; name E_el_prod_MSWI_exergy
    This exergy property is based on the exergy content of the product.
  property true value 1.76149e-9
    (same comment as for heat, for reuse in municipal waste incineration only)

## Inputs from technosphere
- electricity, medium voltage: 0 kWh; pedigree (1,1,1,1,1)
  Average data from 6 European producers
  EcoSpold01Location=UCTE
  Uncertainty: Average data from 6 European producers
- steam, in chemical industry: 0.297 kg; lognormal variance with pedigree 0.0427, pedigree (2,2,5,5,1)
  EcoSpold01Location=RER
  Average data from 6 European producers
  Uncertainty: Average data from 6 European producers
  properties: wet mass 1 kg
- heat, district or industrial, natural gas: 0 MJ; pedigree (1,1,1,1,1)
  Average data from 6 European producers
  EcoSpold01Location=RER
  Uncertainty: Average data from 6 European producers
- silica sand: 0.676 kg; lognormal variance with pedigree 0.0427, pedigree (2,2,5,5,1)
  EcoSpold01Location=DE
  Average data from 6 European producers
  Uncertainty: Average data from 6 European producers
  properties: wet mass 1 kg, dry mass 0.99 kg, water content 0.010101
- chemical factory, organics: 4e-10 unit; lognormal variance with pedigree 0.588, pedigree (4,5,5,5,5)
  Estimation
  EcoSpold01Location=RER
  Uncertainty: estimation
- inert waste, for final disposal: -0.0181 kg; lognormal variance with pedigree 0.0427, pedigree (2,2,5,5,1)
  EcoSpold01Location=CH
  Average data from 6 European producers
  Uncertainty: Average data from 6 European producers
  production volume 0.0543 kg
    Calculated from the production volume of sodium silicate, without water, in 48% solution state in proportion to the respective output amounts.
  properties: wet mass 1 kg, dry mass 0.995 kg, water content 0.00502513
- sodium hydroxide, without water, in 50% solution state: 0.435 kg; lognormal variance with pedigree 0.0427, pedigree (2,2,5,5,1)
  (same comment as for steam, in chemical industry)
  properties: wet mass 1 kg, dry mass 1 kg
- average incineration residue: -4.16e-5 kg; lognormal variance with pedigree 0.0427, pedigree (2,2,5,5,1)
  (same comment as for inert waste, for final disposal)
  production volume 0.0001248 kg
    (same comment as for inert waste, for final disposal)
  properties: dry mass 1 kg, wet mass 1 kg, carbon content, fossil 0.0325466, carbon content, non-fossil 0.0511208
  note on carbon content, fossil: Tab A.1, ecoinvent v2.2 report 13_I. It is considered that 61.1% of the C has a biogenic origin
- heat, district or industrial, other than natural gas: 0 MJ; pedigree (1,1,1,1,1)
  (same comment as for steam, in chemical industry)
- chemical, organic: 0.00146 kg; lognormal variance with pedigree 0.0427, pedigree (2,2,5,5,1)
  EcoSpold01Location=GLO
  Average data from 6 European producers
  Uncertainty: Average data from 6 European producers
  properties: carbon content, fossil 0.628, dry mass 1 kg, wet mass 1 kg
  note on carbon content, fossil: This dataset is an unweighted average of 20 organic substances (listed in Tab 88.1, ecoinvent v2.2 report 8, part II), being part of the top100 chemicals included in this database. The C-content has also been calculated as an unweighted average of the C content of the substances composing this dataset.
- residue from cooling tower: -0.0025 kg; lognormal variance with pedigree 0.0427, pedigree (2,2,5,5,1)
  Average data from 6 European producers
  EcoSpold01Location=CH
  Uncertainty: Average data from 6 European producers
  production volume 0.0075 kg
    (same comment as for inert waste, for final disposal)
  properties: carbon content, fossil 0.0544233, wet mass 1 kg, dry mass 0.7 kg, water content 0.428571
- electricity, medium voltage: 0.000403195, 7.33645e-5, 0.00124415, 0.0180389, 0.0025817, 0.00845871 kWh (6 entries); lognormal variance with pedigree 0.0427, pedigree (2,2,5,5,1)
  (same comment as for electricity, medium voltage)
- heat, district or industrial, natural gas: 0.0127227, 0.719277 MJ (2 entries); lognormal variance with pedigree 0.0427, pedigree (2,2,5,5,1)
  (same comment as for heat, district or industrial, natural gas)
- heat, district or industrial, other than natural gas: 2.80826e-5, 0.0626419 MJ (2 entries); lognormal variance with pedigree 0.0427, pedigree (2,2,5,5,1)
  (same comment as for steam, in chemical industry)

## Inputs from nature
- Water, cooling, unspecified natural origin [natural resource, in water]: 1.29702e-5 m3; name water_cooling_UNO_input; source IPPC - Integrated Pollution Prevention a 2007; lognormal variance with pedigree 0.0527, pedigree (2,2,5,5,1)
  Calculated value: calculation based on literature value. The data reported in the literature refer to a 48% solution of sodium silicate. All chemicals in the dataset use a functional unit referring to 100% of sodium silicate, thus the literature values has been multiplied with a factor of 2.08.
  Calculated based on literature, (Vionnet, S., Quantis Water Database - Technical Report, 2012). The process boundaries are given by the boundaries of the plant. It includes the process of hydrothermal process (mixing and filtering).
  Uncertainty: Average data from 6 European producers
- Water, unspecified natural origin [natural resource, in water]: 0.00086703 m3; name water_UNO_input; source IPPC - Integrated Pollution Prevention a 2007; lognormal variance with pedigree 0.0546, pedigree (3,3,5,5,1)
  Calculated value: calculation based on literature value. The data reported in the literature refer to a 48% solution of sodium silicate. All chemicals in the dataset use a functional unit referring to 100% of sodium silicate, thus the literature values has been multiplied with a factor of 2.08.
  Calculated based on literature, (Vionnet, S., Quantis Water Database - Technical Report, 2012). It includes the process of hydrothermal process (mixing and filtering).
  Uncertainty: Average data from 6 European producers

## Emissions to nature
- Chloride [water, surface water]: 9.78e-5 kg; lognormal variance with pedigree 0.0827, pedigree (2,2,5,5,1)
  Average data from 6 European producers
  Uncertainty: Average data from 6 European producers
- Water [water, unspecified]: 0.000114974 m3; name water_to_water_unspecified; lognormal variance with pedigree 0.0827, pedigree (2,2,5,5,1)
  Calculated value based on literature values and expert opinion. See comments in the parametres' comment field.
  property wet mass 1000 kg; name WM
  property dry mass 0 kg; name DM
  property carbon content, fossil 0; name C_content_fossil
  property water in wet mass 1000 kg; name WWM
  property carbon content, non-fossil 0; name C_content_non_fossil
  property fraction, origin: unspecified 1; name fraction_origin_unspecified_Ww
  property fraction, origin: fresh water 0; name fraction_origin_fresh_water_Ww
  property fraction, origin: salt water 0; name fraction_origin_salt_water_Ww
- TOC, Total Organic Carbon [water, surface water]: 4.85185e-6 kg; lognormal variance with pedigree 0.0827, pedigree (2,2,5,5,1)
  Calculated by default as TOC (gC) = COD/2.7 (COD measured in g O2). Should more correctly be calculated from the carbon content of the specified emissions to water.
  Uncertainty: Average data from 6 European producers
- Water [air, unspecified]: 0.000765026 m3; name water_to_air_unspecified; lognormal variance with pedigree 0.0827, pedigree (2,2,5,5,1)
  (same comment as for Water)
  property fraction, origin: fresh water 0; name fraction_origin_fresh_water
  property fraction, origin: salt water 0; name fraction_origin_salt_water
  property fraction, origin: unspecified 1; name fraction_origin_unspecified
- Phosphate [water, surface water]: 2.08e-8 kg; lognormal variance with pedigree 0.0827, pedigree (2,2,5,5,1)
  Average data from 6 European producers
  Uncertainty: Average data from 6 European producers
- COD, Chemical Oxygen Demand [water, surface water]: 1.31e-5 kg; lognormal variance with pedigree 0.0827, pedigree (2,2,5,5,1)
  Average data from 6 European producers
  Uncertainty: Average data from 6 European producers
- Iron, ion [water, surface water]: 8.32e-8 kg; lognormal variance with pedigree 0.6927, pedigree (2,2,5,5,1)
  Average data from 6 European producers
  Uncertainty: Average data from 6 European producers
- BOD5, Biological Oxygen Demand [water, surface water]: 2.62e-5 kg; lognormal variance with pedigree 0.0827, pedigree (2,2,5,5,1)
  Calculated as 0.5*COD.
  Uncertainty: Average data from 6 European producers
- DOC, Dissolved Organic Carbon [water, surface water]: 4.85185e-6 kg; lognormal variance with pedigree 0.0827, pedigree (2,2,5,5,1)
  Calculated as equal to TOC.
  Uncertainty: Average data from 6 European producers
- Suspended solids, unspecified [water, surface water]: 0.00127 kg; lognormal variance with pedigree 0.0827, pedigree (2,2,5,5,1)
  Average data from 6 European producers
  Uncertainty: Average data from 6 European producers
- Silicon [water, surface water]: 0.00341 kg; lognormal variance with pedigree 0.0827, pedigree (2,2,5,5,1)
  Average data from 6 European producers
  Uncertainty: Average data from 6 European producers
- Nitrate [water, surface water]: 2.91e-7 kg; lognormal variance with pedigree 0.0827, pedigree (2,2,5,5,1)
  Average data from 6 European producers
  Uncertainty: Average data from 6 European producers

## Extrapolations
This dataset has been copied from an original dataset covering the geography RER. The uncertainty has been adjusted accordingly.

## Review by Heiko Kunst 2003-06-20
Passed
Passed
