# electrode production, negative, Ni

Dataset: EcoSpold 2, unit process
Geography: GLO
Time period: 1976-01-01 to 2019-12-31
Technology level: current
Classification: ISIC rev.4 ecoinvent: 2720:Manufacture of batteries and accumulators
Classification: EcoSpold01Categories: electronics/module
Tags: ConvertedDataset
Scenario: Business-as-Usual
System model: Allocation at the point of substitution
Generated by: Wolfram Scharnhorst
Published in: Hischier R. 2007
Database: ecoinvent
isCopyrightProtected: true
accessRestrictedTo: 1

## General comment
This dataset represents the production of 1 kg of of the negative Ni electrode materiall for NiMH batteries production. Main data are taken from an environmental report of a battery producer as well as from literature. In addition own measurements of sizes and weights of batteries were used. It is based on a determined density of 8908 kg/m3 for Ni the total mass of Ni per kg NiMH rechargable battery package of 0.3589 kg Ni electrode. The relevant amount of infrastructure is determined adopting the information from the MAXELL (2003) environmental report in a similar manner like for the positive LaNi5 electrode. This calculation is performed as follows:
<- Single price of NiMH rechargable battery: 91.89 £ = 224.44 CHF
<- Conversion of consolidated net sales: 65'532'000'000 ¥ = 727'405'200 CHF
<- NiMH revenue fraction: 727'405'200 CHF * (1/3) * 0.4 = 96’987’360 CHF
<- Annual NiMH battery package production:
96’987’360 CHF / 224.44 CHF = 432’130 NiMH battery package/year
<- Annual Ni electrode production:
432’130 Ni electrode /year * 0.3589 kg Ni = 155’113 kg Ni / kg NiMH battery package
<- Infrastructure demand per kg Ni electrode:
1 plant/ (155’113 kg Ni electrode /year * 50 years) = 1.2894e-7 plants/kg Ni
[This dataset was already contained in the ecoinvent database version 2. It was not individually updated during the transfer to ecoinvent version 3. Life Cycle Impact Assessment results may still have changed, as they are affected by changes in the supply chain, i.e. in other datasets. This dataset was generated following the ecoinvent quality guidelines for version 2. It may have been subject to central changes described in the ecoinvent version 3 change report (http://www.ecoinvent.org/database/ecoinvent-version-3/reports-of-changes/), and the results of the central updates were reviewed extensively. The changes added e.g. consistent water flows and other information throughout the database. The documentation of this dataset can be found in the ecoinvent reports of version 2, which are still available via the ecoinvent website. The change report linked above covers all central changes that were made during the conversion process.]

## Included activities start
From reception of raw materials at the factory gate.

## Included activities end
This dataset includes (Raw) materials, transport efforts, energy consumption and waste disposal for the production of the negative electrode of NiMH batteries. No emissions to air or water are taken into account.

## Geography
This module relates to the global situation (electricity consumption according to the main producing countries).

## Technology
Construction details for NiMH-rechargable batteries and manufacturing conditions documented in the environmental report were adopted.

## Reference product
- electrode, negative, Ni: 1 kg; By-product classification allocatable product; CPC 46430: Parts of primary cells, primary batteries and electric accumulators (including separators)
  The battery package consists of only one large sized battery cell. Technologically a battery cell consists of a multilayered assembly of coats sandwiched to each other and wound eiter circular or prismatically around a virtual axis. The size of this wound layer assembly is specified based on approximations for single cell layer assembly as contained in a LiIo rechargable battery.
  The mass of the entire multilayer cell assembly of the considered reference NiMH rechargable battery package is approximated based upon size approximations for the above noted LiIo battery model and is made as follows:
  Cell layer assembly length (LiIo rechargable battery): 100.00 mm
  Cell layer assembly width (LiIo rechargable battery): 60.00 mm
  Battery length (LiIo rechargable battery): 128.00 mm
  Battery width (LiIo rechargable battery): 77.00 mm
  Battery length (NiMH rechargable battery): 138.00 mm
  The calculation is then performed as follows:
  Cell layer assembly length (NiMH rechargable battery):
  100.00 mm / 128.00 mm = 78.125%
  138.00 mm *0.781 = 107.81 mm
  Cell layer assembly width (NiMH rechargable battery):
  60.00 mm / 77.00 mm = 77.922%
  105.00 mm *0.779 = 81.81 mm
  The thickness (i.e. the depth) of the single unwound layer compartments is approximated with 0.15 mm. Accordingly the single layers are dimensioned as follows (W x D x H): 81.81 mm x 0.15 mm x 107.81 mm.
  A multilayer package consists of 5 individual layers, namely positive and negative electrode, separator and electrolyte layer. The thickness of the entire prismatically wound multilayer assembly is approximated to 13.5 mm. Adopting the above defined thickness for a single layer (0.15 mm), the entire prismatically wound multilayer assembly consists in total of 90 individual layers and 18 windings (with each time 5 individual layers).
  EcoSpold01Location=GLO
  production volume 1 kg
    Dummy value to be replaced by measured, estimated or calculated value
  property price 11.1071 EUR2005
    Calculated based on inputs: The price of the product has been calculated as a sum of the values of the material and energy inputs for this product. This value is therefore a rough estimation. It may underestimate the real price since there are additional expenses when producing any product. These expences can include for example labour costs, treatment of waste materials and profit for the producer. Please consider carefully whether this level of data quality is acceptable for your application.
  property carbon content, fossil 0.00301397
    Calculated as the addition of C contents in the product composition
  property carbon content 0.00301397
    carbon content on a dry matter basis (reserved; not for manual entry)
  property true value 11.1071
    allocation property applied in "true value" allocation // value calculated from revenue
  properties: water in wet mass 0 kg, wet mass 1 kg, dry mass 1 kg, water content 0, carbon content, non-fossil 0, carbon allocation 0.00301397 kg

## By-products
- electricity, for reuse in municipal waste incineration only: 0 kWh; CPC 17100: Electrical energy; By-product classification allocatable product; pedigree (1,1,1,1,1)
  Net electricity generated from this waste and used in internal MSWI plant energy redistribution.
  Uncertainty: uncertainty is calculated from uncertainties in waste composition and uncertainties in energy efficiency and the uncertainty in internal energy demand
  production volume 0.000800349 kWh
  property exergy 3.6 MJ; name E_el_prod_MSWI_exergy
    This exergy property is based on the exergy content of the product.
  property true value relation 3.6; name E_el_prod_MSWI_true_value_relation
    property to calculate "true value" from
  property price 0.1 EUR2005; name E_el_prod_MSWI_price_EUR2005
    Estimated to be the same price as in case of electricity, medium voltage.
  property true value 7.64838e-5
    allocation property applied in "true value" allocation // value calculated from true value relation
- heat, for reuse in municipal waste incineration only: 0 MJ; CPC 17300: Steam and hot water; By-product classification allocatable product; pedigree (1,1,1,1,1)
  (same comment as for electricity, for reuse in municipal waste incineration only)
  production volume 0.00562822 MJ
  property exergy 0.1842 MJ; name E_th_prod_MSWI_exergy
    This exergy property is based on the exergy content of the product.
  property true value relation 0.1842; name E_th_prod_MSWI_true_value_relation
    property to calculate "true value" from
  property price 0.0106 EUR2005; name E_th_prod_MSWI_price_EUR2005
    Average European district heat price from Ecoheatcool and Euroheat 2005-2006, Ecoheat Work package 1: The European heat market. Final report. 10.6 EUR/GJ i s the price of district heat. http://www.solarthermalworld.org/files/Ecoheatcool%20WP1%20Web.pdf?download
  property true value 2.752e-5
    (same comment as for electricity, for reuse in municipal waste incineration only)

## Inputs from technosphere
All rows: source Linden D. 2002
- nickel, 99.5%: 0.939991 kg; lognormal variance with pedigree 0.0406, pedigree (2,1,5,1,1)
  EcoSpold01Location=GLO
  Estimation based on literature.
  Further references:
  Sakai T., Yoshinaga H., Miyamura H., Kuriyama N. and Ishikawa H. (1992) Rechargeable hydrogen batteries using rare-earth-based hydrogen storage alloys. In: Journal of Alloys and Compounds, 180, pp. 37-54.
  Jayashree R. S. and Kamath P. V. (2001) Nickel hydroxide electrodeposition from nickel nitrate solutions: mechanistic studies. In: Journal of Power Sources, 93, pp. 273-278.
  Freitas M. B. J. G. (2001) Nickel hydroxide powder for NiO*OH/Ni(OH)2 electrodes of the alkaline batteries. In: Journal of Power Sources, 93, pp. 163-173.
  Subbaiah T., Mallick S. C., Mishra K. G., Sanjay K. and Das R. P. (2002) Electrochemical precipitation of nickel hydroxide. In: Journal of Power Sources, 112, pp. 562-569.
  properties: dry mass 1 kg, wet mass 1 kg
- sodium hydroxide, without water, in 50% solution state: 0.167918 kg; lognormal variance with pedigree 0.24, pedigree (5,5,5,5,4)
  Estimation based on literature.
  Further references:
  Sakai T., Yoshinaga H., Miyamura H., Kuriyama N. and Ishikawa H. (1992) Rechargeable hydrogen batteries using rare-earth-based hydrogen storage alloys. In: Journal of Alloys and Compounds, 180, pp. 37-54.
  Jayashree R. S. and Kamath P. V. (2001) Nickel hydroxide electrodeposition from nickel nitrate solutions: mechanistic studies. In: Journal of Power Sources, 93, pp. 273-278.
  Freitas M. B. J. G. (2001) Nickel hydroxide powder for NiO*OH/Ni(OH)2 electrodes of the alkaline batteries. In: Journal of Power Sources, 93, pp. 163-173.
  Subbaiah T., Mallick S. C., Mishra K. G., Sanjay K. and Das R. P. (2002) Electrochemical precipitation of nickel hydroxide. In: Journal of Power Sources, 112, pp. 562-569.
  EcoSpold01Location=RER
  properties: wet mass 1 kg, dry mass 1 kg
- polyurethane, flexible foam: 0 kg; pedigree (1,1,1,1,1)
  Proxy with estimation, to represent the construction of the nickel mesh, polyurethane foam is used. Estimation based on literature.
  Further references:
  Sakai T., Yoshinaga H., Miyamura H., Kuriyama N. and Ishikawa H. (1992) Rechargeable hydrogen batteries using rare-earth-based hydrogen storage alloys. In: Journal of Alloys and Compounds, 180, pp. 37-54.
  Jayashree R. S. and Kamath P. V. (2001) Nickel hydroxide electrodeposition from nickel nitrate solutions: mechanistic studies. In: Journal of Power Sources, 93, pp. 273-278.
  Freitas M. B. J. G. (2001) Nickel hydroxide powder for NiO*OH/Ni(OH)2 electrodes of the alkaline batteries. In: Journal of Power Sources, 93, pp. 163-173.
  Subbaiah T., Mallick S. C., Mishra K. G., Sanjay K. and Das R. P. (2002) Electrochemical precipitation of nickel hydroxide. In: Journal of Power Sources, 112, pp. 562-569.
  EcoSpold01Location=RER
  properties: dry mass 1 kg, wet mass 1 kg, carbon content, fossil 0.633827
  note on carbon content, fossil: Polyurethanes (PUR) is the collective name for an extensive group of polymers with very different compositions and correspondingly varied property profiles, though their molecule chain contains all a urethane group (-NH-CO-O-). All PURs are built on a common principle : they are produced by the diisocyanate polyaddition process, that links polyols and (di)isocyanates. In this dataset, an example of typical polyurethane mixture is described (Ullmann, Polyurethanes, Dieterich et al. & ecoinvent v2 report 11_II). C content was calculated as an addition of C contents in its components.
- waste polyurethane: 0 kg; pedigree (1,1,1,1,1)
  Estimation based on literature.
  Further references:
  Sakai T., Yoshinaga H., Miyamura H., Kuriyama N. and Ishikawa H. (1992) Rechargeable hydrogen batteries using rare-earth-based hydrogen storage alloys. In: Journal of Alloys and Compounds, 180, pp. 37-54.
  Jayashree R. S. and Kamath P. V. (2001) Nickel hydroxide electrodeposition from nickel nitrate solutions: mechanistic studies. In: Journal of Power Sources, 93, pp. 273-278.
  Freitas M. B. J. G. (2001) Nickel hydroxide powder for NiO*OH/Ni(OH)2 electrodes of the alkaline batteries. In: Journal of Power Sources, 93, pp. 163-173.
  Subbaiah T., Mallick S. C., Mishra K. G., Sanjay K. and Das R. P. (2002) Electrochemical precipitation of nickel hydroxide. In: Journal of Power Sources, 112, pp. 562-569.
  EcoSpold01Location=CH
  production volume 0 kg
    Calculated from the production volume of electrode, negative, Ni in proportion to the respective output amounts.
  properties: dry mass 0.998 kg, water content 0.00200401, wet mass 1 kg, carbon content, fossil 0.641283
  note on carbon content, fossil: C content was calculated for 1 kg DM, using data in Tab A.2, ecoinvent v2.2 report 13_I.
- heat, district or industrial, natural gas: 0.439996 MJ; lognormal variance with pedigree 0.040725, pedigree (2,2,5,2,1)
  (same comment as for sodium hydroxide, without water, in 50% solution state)
- electricity, medium voltage: 0.659994 kWh; lognormal variance with pedigree 0.068025, pedigree (4,4,5,2,3)
  EcoSpold01Location=CN
  Estimation based on literature.
  Further references:
  Sakai T., Yoshinaga H., Miyamura H., Kuriyama N. and Ishikawa H. (1992) Rechargeable hydrogen batteries using rare-earth-based hydrogen storage alloys. In: Journal of Alloys and Compounds, 180, pp. 37-54.
  Jayashree R. S. and Kamath P. V. (2001) Nickel hydroxide electrodeposition from nickel nitrate solutions: mechanistic studies. In: Journal of Power Sources, 93, pp. 273-278.
  Freitas M. B. J. G. (2001) Nickel hydroxide powder for NiO*OH/Ni(OH)2 electrodes of the alkaline batteries. In: Journal of Power Sources, 93, pp. 163-173.
  Subbaiah T., Mallick S. C., Mishra K. G., Sanjay K. and Das R. P. (2002) Electrochemical precipitation of nickel hydroxide. In: Journal of Power Sources, 112, pp. 562-569.
- zinc: 0.0299997 kg; lognormal variance with pedigree 0.040725, pedigree (2,2,5,2,1)
  EcoSpold01Location=RER
  Estimation based on literature.
  Further references:
  Sakai T., Yoshinaga H., Miyamura H., Kuriyama N. and Ishikawa H. (1992) Rechargeable hydrogen batteries using rare-earth-based hydrogen storage alloys. In: Journal of Alloys and Compounds, 180, pp. 37-54.
  Jayashree R. S. and Kamath P. V. (2001) Nickel hydroxide electrodeposition from nickel nitrate solutions: mechanistic studies. In: Journal of Power Sources, 93, pp. 273-278.
  Freitas M. B. J. G. (2001) Nickel hydroxide powder for NiO*OH/Ni(OH)2 electrodes of the alkaline batteries. In: Journal of Power Sources, 93, pp. 163-173.
  Subbaiah T., Mallick S. C., Mishra K. G., Sanjay K. and Das R. P. (2002) Electrochemical precipitation of nickel hydroxide. In: Journal of Power Sources, 112, pp. 562-569.
  properties: dry mass 1 kg, wet mass 1 kg
- cobalt: 0.0299997 kg; lognormal variance with pedigree 0.040725, pedigree (2,2,5,2,1)
  Estimation based on literature.
  Further references:
  Sakai T., Yoshinaga H., Miyamura H., Kuriyama N. and Ishikawa H. (1992) Rechargeable hydrogen batteries using rare-earth-based hydrogen storage alloys. In: Journal of Alloys and Compounds, 180, pp. 37-54.
  Jayashree R. S. and Kamath P. V. (2001) Nickel hydroxide electrodeposition from nickel nitrate solutions: mechanistic studies. In: Journal of Power Sources, 93, pp. 273-278.
  Freitas M. B. J. G. (2001) Nickel hydroxide powder for NiO*OH/Ni(OH)2 electrodes of the alkaline batteries. In: Journal of Power Sources, 93, pp. 163-173.
  Subbaiah T., Mallick S. C., Mishra K. G., Sanjay K. and Das R. P. (2002) Electrochemical precipitation of nickel hydroxide. In: Journal of Power Sources, 112, pp. 562-569.
  EcoSpold01Location=GLO
  properties: dry mass 1 kg, wet mass 1 kg
- polyurethane, flexible foam: 0.000827397, 0.00392776 kg (2 entries); lognormal variance with pedigree 0.0406, pedigree (2,1,5,1,1)
  (same comment as for polyurethane, flexible foam)
- waste polyurethane: -0.000622483, -4.79898e-5, -1.98215e-5, -1.88224e-5, -0.000718236, -8.00766e-6, -3.62939e-6, -0.00502805 kg (8 entries); lognormal variance with pedigree 0.082025, pedigree (1,4,5,2,1)
  (same comment as for waste polyurethane)
  production volume 0.0064671 kg

## Sampling procedure
Literature, measurements

## Review by Rolf Frischknecht 2010-03-26
passed

## Review by Roland Hischier 2011-09-30
Transfer of documentation done.
--> TO REVISE
