# shavings, hardwood, measured as dry mass to generic market for residual wood, dry

Dataset: EcoSpold 2, unit process
Geography: GLO
Time period: 2014-01-01 to 2019-12-31
Technology level: current
Classification: ISIC rev.4 ecoinvent: 1610:Sawmilling and planing of wood
Scenario: Business-as-Usual
System model: Allocation at the point of substitution
Generated by: Emilia Moreno Ruiz
Database: ecoinvent
isCopyrightProtected: true
accessRestrictedTo: 1

## General comment
This activity is linking the more specific market for shaving, hardwood, to the more generic market for residual wood, dry.It makes accesible the specific product shaving, hardwood through the more generic product of residual wood, dry.

## Included activities start
Entry of the specific product "shaving, hardwood, measured as dry mass"

## Included activities end
Delivery of the generic product "residual wood, dry"

## Reference product
- residual wood, dry: 1 m3; name residual_wood_dry; CPC 39283: Non-agglomerated wood waste and scrap; By-product classification allocatable product
  production volume 2963.64 m3; = 1.63E+07*0.1/ residual_wood_dry_DM
    1.63E+7 kg is the rough Production Volumes of shaving, hardwood produced out of planing. It is considered that 10% of this volume is consumed as the more generic product "residual wood, dry". The Dry Mass of this product is used to calculate the Production Volumes in m3.
  property price 26.9 EUR2005; name residual_wood_dry_price_EUR2005
    Calculated based on inputs: The price of the product has been calculated as a sum of the values of the material and energy inputs for this product. This value is therefore a rough estimation. It may underestimate the real price since there are additional expenses when producing any product. These expences can include for example labour costs, treatment of waste materials and profit for the producer. Please consider carefully whether this level of data quality is acceptable for your application.
  property dry mass 550 kg; name residual_wood_dry_DM
  property carbon content 0.494
    carbon content on a dry matter basis (reserved; not for manual entry)
  properties: carbon content, non-fossil 0.494, water in wet mass 82.5 kg, wet mass 632.5 kg, carbon content, fossil 0, water content 0.15, carbon allocation 271.7 kg

## Inputs from technosphere
- shavings, hardwood, measured as dry mass: 550 kg; = residual_wood_dry_DM* residual_wood_dry
  Calculated using the Dry Mass of the reference product
  properties: wet mass 1.1 kg, dry mass 1 kg, carbon content, non-fossil 0.494, water content 0.1

## Extrapolations
This dataset has been extrapolated from year 2014 to the year of the calculation (2019). The uncertainty has been adjusted accordingly.
