# rape seed production, for sowing

Dataset: EcoSpold 2, unit process
Geography: CH
Time period: 1999-01-01 to 2019-12-31
Technology level: current
Classification: EcoSpold01Categories: agricultural means of production/seed
Classification: ISIC rev.4 ecoinvent: 0164:Seed processing for propagation
Scenario: Business-as-Usual
System model: Allocation at the point of substitution
Share of production covered: 50 %
Generated by: Thomas Nemecek
Published in: Nemecek, T. 2007
Database: ecoinvent
isCopyrightProtected: true
accessRestrictedTo: 1

## General comment
Refers to 1 kg seed of rape seed (fresh weight), with a maximum water content of 6%
[This dataset was already contained in the ecoinvent database version 2. It was not individually updated during the transfer to ecoinvent version 3. Life Cycle Impact Assessment results may still have changed, as they are affected by changes in the supply chain, i.e. in other datasets. This dataset was generated following the ecoinvent quality guidelines for version 2. It may have been subject to central changes described in the ecoinvent version 3 change report (http://www.ecoinvent.org/database/ecoinvent-version-3/reports-of-changes/), and the results of the central updates were reviewed extensively. The changes added e.g. consistent water flows and other information throughout the database. The documentation of this dataset can be found in the ecoinvent reports of version 2, which are still available via the ecoinvent website. The change report linked above covers all central changes that were made during the conversion process.]

## Included activities start
This activity starts after harvest of the seed.

## Included activities end
The seed is processed in the processing centre, treated (pre-cleaning, cleaning, eventually drying, chemical dressing (for integrated production) and bag filling), stored and afterwards transported to the regional storage centre. No data on wastewater production were available.

## Technology
Refers to average seed processing

## Time period
Date of the major data sources.

## Reference product
- rape seed, for sowing: 1 kg; By-product classification allocatable product; CPC 01443: Rape or colza seed
  EcoSpold01Location=CH
  production volume 92524 kg
    [This estimate refers to all seed used in Switzerland, including imported seed.] Calculated from the average national production of soybeans ("Soja") of the years 2007-2009 (SBV 2008 & 2010), the required seed input for the production of 1 kg of soybeans (Nemecek et al. 2007) and the shares of Swiss integrated production (incl. conventional) and organic production of 90% to 10% (FAO 1999). --- Sources: SBV (Schweizerischer Bauernverband) (2008) - Statistische Erhebungen und Schätzugen über Landwirtschaft und Ernährung. Schweizerischer Bauernverband. Brugg, Switzerland. 2008. --- SBV (2010) - Statistische Erhebungen und Schätzugen über Landwirtschaft und Ernährung. Schweizerischer Bauernverband. Brugg, Switzerland. 2010. --- FAO - Agriculture and Cosumer Protection Department (online) Spotlight 1999: Organic farming. Published January 1999; retrived November 2011: http://www.fao.org/ag/magazine/9901sp3.htm.
  property water content 0.0638298; name water_content; = (1-DM)/DM
  property price 0.3118 EUR2005
    Calculated based on inputs: The price of the product has been calculated as a sum of the values of the material and energy inputs for this product. This value is therefore a rough estimation. It may underestimate the real price since there are additional expenses when producing any product. These expences can include for example labour costs, treatment of waste materials and profit for the producer. Please consider carefully whether this level of data quality is acceptable for your application.
  property carbon content, fossil 0; name C_content_fossil
    fossil carbon content on a dry matter basis
  property water in wet mass 0.06 kg; name WWM; = 1-DM
  property energy content 24.8912 MJ; name energy_content
    as gross calorific value (when relevant)
  property carbon content, non-fossil 0.574; name C_content_non_fossil
    biogene carbon content on a dry matter basis
    Composition data obtained from Table 2.1 in Utilization of canola seed fractions in ruminant feeds, Master thesis by Ravindra Guptha Heendeniya, University of Saskatchewan (Canada), 2008 (http://library2.usask.ca/theses/available/etd-06162008-141937/unrestricted/THESES_Ravindra_Heendeniya_17_june_2008.pdf). First, composition data were refered to 1 kg dry mass. Then, C-contents were calculated considering a C-content/dry mass of 46% in carbohydrates (including fibres), 53% in proteins and 75% in fats. All data from "Evolutionary and Biochemical Aspects", A.D. Kay and T. Vrede (in Global Ecology, 2010, Elsevier B.V., S.E. Jørgensen Ed.).
  property dry mass 0.94 kg; name DM
  property wet mass 1 kg; name WM
  property carbon content 0.574
    carbon content on a dry matter basis (reserved; not for manual entry)
  properties: carbon allocation 0.53956 kg

## Inputs from technosphere
- rape seed: 1.75 kg; lognormal variance with pedigree 0.0406, pedigree (2,1,5,1,1)
  See "01_crop production - seed production & processing_v1.0.pdf" - pdf-document on the dedicated talk page of ecoinvent (www.ecoinvent.org/documentation)
  properties: water content 0.0638298, dry mass 0.94 kg, wet mass 1 kg, carbon content, non-fossil 0.574
  note on carbon content, non-fossil: Composition data obtained from Table 2.1 in Utilization of canola seed fractions in ruminant feeds, Master thesis by Ravindra Guptha Heendeniya, University of Saskatchewan (Canada), 2008 (http://library2.usask.ca/theses/available/etd-06162008-141937/unrestricted/THESES_Ravindra_Heendeniya_17_june_2008.pdf). First, composition data were refered to 1 kg dry mass. Then, C-contents were calculated considering a C-content/dry mass of 46% in carbohydrates (including fibres), 53% in proteins and 75% in fats. All data from "Evolutionary and Biochemical Aspects", A.D. Kay and T. Vrede (in Global Ecology, 2010, Elsevier B.V., S.E. Jørgensen Ed.).
- electricity, low voltage: 0.058 kWh; lognormal variance with pedigree 0.0406, pedigree (2,1,5,1,1)
  See "01_crop production - seed production & processing_v1.0.pdf" - pdf-document on the dedicated talk page of ecoinvent (www.ecoinvent.org/documentation)
  EcoSpold01Location=CH
- building, multi-storey: 2e-5 m3; lognormal variance with pedigree 0.0406, pedigree (2,1,5,1,1)
  EcoSpold01Location=RER
  See "01_crop production - seed production & processing_v1.0.pdf" - pdf-document on the dedicated talk page of ecoinvent (www.ecoinvent.org/documentation)

## Inputs from nature
- Occupation, industrial area [natural resource, land]: 0.0002 m2*year; lognormal variance with pedigree 0.0806, pedigree (2,1,5,1,1)
  (same comment as for rape seed)
- Occupation, construction site [natural resource, land]: 8e-6 m2*year; lognormal variance with pedigree 0.0806, pedigree (2,1,5,1,1)
  (same comment as for rape seed)
- Transformation, to industrial area [natural resource, land]: 4e-6 m2; lognormal variance with pedigree 0.1606, pedigree (2,1,5,1,1)
  (same comment as for rape seed)
- Transformation, from unspecified [natural resource, land]: 4e-6 m2; lognormal variance with pedigree 0.1606, pedigree (2,1,5,1,1)
  (same comment as for rape seed)

## Sampling procedure
Data based on a literature, expert information and enquiry of seed processing plants.

## Extrapolations
This dataset has been extrapolated from year 2002 to the year of the calculation (2019). The uncertainty has been adjusted accordingly.

## Review by Hans-Jörg Althaus 2007-08-13
passed
