# heat and power co-generation, natural gas, conventional power plant, 100MW electrical

Dataset: EcoSpold 2, unit process
Geography: CO
Time period: 2014-01-01 to 2019-12-31
Technology level: current
Classification: EcoSpold01Categories: natural gas/power plants
Classification: ISIC rev.4 ecoinvent: 3510:Electric power generation, transmission and distribution
Synonyms: CHP; cogeneration
Tags: natural gas power; fossil fuels; with true value
Scenario: Business-as-Usual
System model: Allocation at the point of substitution
Generated by: Germán Santa María
Published in: Suppen, N. 2017
Database: ecoinvent
isCopyrightProtected: true
accessRestrictedTo: 1

## General comment
This dataset represents the production of high voltage electricity and heat in a conventional natural gas, co-generation power plant in Colombia in 2014. Data on total net electricity production correspond to the only natural gas, co-generation power plant in Colombia called ”Cogenerador Papeles Nacionales”. Electricity production volume and efficiency have been regionalized, other exchanges correspond to the "heat and power co-generation, natural gas, conventional power plant, 100MW electrical, GLO" dataset accessed in in november of 2017.
For electricity production with natural gas, four different datasets relying to different power plant types exist:
- conventional power plant with / without CHP
- combined cycle power plant with / without CHP
At the moment, these datasets differ in nothing but the efficiency. High voltage electricity (at the busbar) is the reference product, whereupon heat is a by-product in CHP plants. Out of all fossile fuels, natural gas holds worldwide the highest share of CHP plants besides peat. Furthermore, natural gas power plants are today often designed with combined cycles.
The efficiency calculations are based on IEA/OECD statistics (fuel inputs, electricity produced) and some own calculation assumptions. . Reducing factors such as contaminations of important plant parts, cooling conditions or part load have been taken into account. Even if efficiencies vary with different surrounding temperatures, a medium efficiency is assumed for all countries. Temperature adjustments would be related to high uncertainties.
Water is used for wet cooling and as feed water in the steam circuit. In this dataset, 100% wet cooling and no once-through cooling is assumed.
EMISSIONS:
Different sources served as basis for assumption of average emissions. Where possible, the most recent sources were taken into account, whereas older sources were taken in order to determine the remaining data gaps. The emissions have been fixed for the former UCTE region* and have been overtaken as such for all countries without value adaptation (adaptation of the uncertainty). See ecoinvent report 'Erdgas' given as main source for details (Tab. 11.15). In the following a short overview:
- Emissions of NOx, CO, CO2, SO2, particles, N2O and CH4 are mainly taken from CORINAIR 2001, EPA, and a variety of other data sources
- NOx emissions are a major challenge in natural gas power plants. With rising temperature, emissions also rise; band widths of NOx emissions in literature are correspondingly large. There are several methods to diminish these emissions.
- CO is a result of incomplete burning. For economic and technical reasons, plant combustion is optimized and CO emissions are low.
- CO2 and SO2 emissions are dependent on the composition of the used fuel. Due to the low sulfur content of the used natural gas, no desulfurization has to take place.
- Organic compound emissions are estimated on the basis of EPA 1998.
- Particles are assumed to be smaller than 2.5 micro-m
former UCTE: Union for the Coordination of the Transmission of Electricity, since 2009 replaced by ENTSO-E European Network of Transmission System Operators for Electricity.
Sources:
- CORINAIR 2001. EMEP/CORINAIR 2001: Joint EMEP/CORINAIR Atmospheric Emission Inventory Guidebook, Third Edition. Copenhagen: European Environment Agency, 2001. http://reports.eea.eu.int/technical_report_2001_3/en.
- EPA 1998. US Environmental Protection Agency (1998). Compilation of Air Pollutant Emission Factors, AP-42, Fifth Edition, Volume I: Chapter 1: External Combustion Sources, Natural Gas Combustion - Final Section - Supplement D , July 1998. CHIEF (Clearinghouse for Inventories and Emission Factors). Research Triangle Park, North Carolina. http://www.epa.gov/ttn/chief/ap42/.
- Rentz O., Karl U., Peter H. (2002). Ermittlung und Evaluierung von Emissionsfaktoren für Feuerungsanlagen in Deutschland für die Jahre 1995, 2000 und 2010. Deutsch- Französisches Institut für Umweltforschung, Uni Karsruhe. Endbericht. Im Auftrag des Umweltbundesamtes. Forschungsbericht 299 43 142. Umweltbundesamt. Berlin.

## Included activities start
From the constructed natural gas power plant ready to produce electricity.

From reception of natural gas and operating materials at power plant/factory gate

## Included activities end
This activity ends with 1kWh of high voltage electricity and a corresponding amount of heat produced at the power plant and arrived at the busbar.

This dataset includes:
- all operation and maintenance activities and materials of the power plants.
- Cooling: It is a assumed that all plants use wet cooling with a cooling tower.No cooling tower is included in this dataset (will be implemented in future versions)
- decarbonised water use for reduction of NOx emissions

This dataset doesn't include
- raw materials extraction, decommissioning and waste treatment as these activities are already included in the infrastructure datasets.
- transformation of the electricity produced.

## Geography
This dataset is based on the GLO dataset with adjustments to the regional context with data from co-generation, natural gas, conventional power plants in Colombia.

## Technology
Conventional natural gas power plant of 100MWe. The plant is used for middle load with 5000 hours of operation at full capacity per year. The plant is assumed to operate 180000 hours during its lifetime.

## Time period
The Annual Production Volume is valid for the year 2014.

## Parameters
- factor: input of MJ for the production of 1 kWh: 10.3746 MJ/kWh; name factor_MJ_kWh; = 1*3.6/efficiency; lognormal variance with pedigree 0.0532, pedigree (4,4,3,4,4)
  Calculated value. 3.6 MJ = 1kWh.
  nan
- total net electricity: 1.32632e6 kWh; name totalElectricity; lognormal variance with pedigree 0.0012, pedigree (2,1,1,1,1)
  Literature value/statistics for Colombian heat and power co-generation natural gas power plants that provide electricity to the national interconnected network.
  Taken from XM National Statistics for Colombia in 2014. URL: http://informacioninteligente10.xm.com.co/oferta/Paginas/HistoricoOferta.aspx accessed 21/07/2017 File: "Generacion_(kWh)_2014"
- once-through and cooling pond cooling systems as a fraction of all cooling syste: 0.625 dimensionless; name once_through_andCP_CS_fractio_from_allCS; lognormal variance with pedigree 0.092025, pedigree (4,4,3,2,4)
  Calculated as an average of data available for Europe (Floerke, 2008, Future changes of freshwater needs in the electricity production sector) and USA (NERL, 2011, Estimating freshwater needs to meet future thermoelectric generation requirements).
  nan
- fraction, process water, to air: 0.15 dimensionless; name fraction_PW_to_air; lognormal variance with pedigree 0.092025, pedigree (4,4,3,2,4)
  Literature value. In case when no industry/process specific data are available, default evaporation fraction value is used. This value is 15% and is based on literature (Statistics Canada, 2007 & Shaffer, K.H., 2008, Consumptive water use in the Great Lakes Basin, USGS & Shiklomanov, 2003, World Water Resources at the Beginning of the 21st Century) and has been approved by an expert.
  nan
- fraction, cooling water, to air: 0.0159178; name fraction_CW_to_air; = (WConsumption_EP_NG_recirculatingCS*recirculating_CS_fraction_from_allCS+WConsumption_EP_NG_onceT_andCP_CS*once_through_andCP_CS_fractio_from_allCS)/(WWithdrawal_EP_NG_recirculating_CS*recirculating_CS_fraction_from_allCS+WWithdrawal_EP_NG_onceT_andCP_CS*once_through_andCP_CS_fractio_from_allCS); lognormal variance with pedigree 0.092025, pedigree (4,4,3,2,4)
  Calculated
  nan
- water consumption, electricity production from NG, recirculating CS: 0.0018 m3/kWh; name WConsumption_EP_NG_recirculatingCS; lognormal variance with pedigree 0.092025, pedigree (4,4,3,2,4)
  Estimated based on literature (Scown, 2011, Water Footprint of U.S. Transportation Fuels, SI).
  nan
- water withdrawal, electricity production from NG, once-T and coolingP CS: 0.098 m3/kWh; name WWithdrawal_EP_NG_onceT_andCP_CS; lognormal variance with pedigree 0.092025, pedigree (4,4,3,2,4)
  (same comment as for water consumption, electricity production from NG, recirculating CS)
- fraction, water, decarbonised, to air: 0.0159178; name fraction_WDC_to_air; = fraction_CW_to_air; lognormal variance with pedigree 0.092025, pedigree (4,4,3,2,4)
  Calculated value. See comments in the other parametres present in this dataset. Decarbonised water is considered to be always used as cooling water, thus cooling water fractions to air are applied to all carbonised water input flows to calculate the amount of water consumed in the processes.
  nan
- recirculating cooling system as a fraction of all cooling systems: 0.375 dimensionless; name recirculating_CS_fraction_from_allCS; lognormal variance with pedigree 0.092025, pedigree (4,4,3,2,4)
  (same comment as for once-through and cooling pond cooling systems as a fraction of all coo)
- water consumption, electricity production from NG, once-T and coolingP CS: 0.0005 m3/kWh; name WConsumption_EP_NG_onceT_andCP_CS; lognormal variance with pedigree 0.092025, pedigree (4,4,3,2,4)
  (same comment as for water consumption, electricity production from NG, recirculating CS)
- efficiency: 0.347 dimensionless; lognormal variance with pedigree 0.017225, pedigree (4,3,1,2,3)
  Literature value/calculated value. Net electrical efficiency based on the lower heating value (LHV).
  Data on net electricity production and fuel consumption in "Papeles Nacionales" power plant was obtained from the Ministry of Mines and Energy of Colombia.
  http://www.upme.gov.co/Presentaciones/2014/UPME-Naturgas2014_ExperienciaInternacional-v4.pdf accessed on 10/01/2018
- water withdrawal, electricity production from NG, recirculating CS: 0.0021 m3/kWh; name WWithdrawal_EP_NG_recirculating_CS; lognormal variance with pedigree 0.092025, pedigree (4,4,3,2,4)
  (same comment as for water consumption, electricity production from NG, recirculating CS)
- fraction, water, completely softened, to air: 0.15; name fraction_WCS_to_air; = fraction_PW_to_air; lognormal variance with pedigree 0.092025, pedigree (4,4,3,2,4)
  Calculated value. See comment in the other parametres present in this dataset. Water, completely softened is considered to be always used as process water, thus process water fractions to air are applied to all water, completely softened input flows to calculate the amount of water consumed in the processes.
  nan

## Reference product
- heat, district or industrial, natural gas: 1 MJ; name heat; CPC 17300: Steam and hot water; By-product classification allocatable product
  Literature value/calculated value. For OECD countries, gross electricity and heat production 2012 with natural gas in CHP plants are given in the IEA electricity informaiton 2014, country tables 8 and 9, for most countries.
  For non-OECD countries, these values were partly found in the Energy balances of non-OECD countries.
  As an exception, all exchanges refer to the by-product 'electricity, high voltage, 1kWh'.
  IEA. 2014. Electricity Information 2014. ISBN 978-92-64-21692-1. International Energy Agency (IEA), Paris Cedex (FR).
  IEA/OECD. 2014. Energy balances of non-OECD countries 2014. International Energy Agency (IEA), Paris Cedex (FR).
  production volume 5.4379e6 MJ; name heat_apv; = heat/electricity*electricity_apv
    Calculated value
  property true value relation 0.184214; name true_value_relation
    property to calculate 'true value' from
  property price 0.0106 EUR2005
    Average European district heat price from Ecoheatcool and Euroheat 2005-2006, Ecoheat Work package 1: The European heat market. Final report. 10.6 EUR/GJ i s the price of district heat. http://www.solarthermalworld.org/files/Ecoheatcool%20WP1%20Web.pdf?download
  property exergy 0.184214 MJ; name exergy
    allocation factor for electricity (=1) vs. heat, where heat is calculated as the termodynamic mean temperature Tm = (Tfeed-Treturn)/ln(Tfeed/Treturn), relative to the application temperature (Tu, typically = 293 K), i.e. (Tm-Tu)/Tm
  property true value 0.0244794; name heat_true_value
    allocation property applied in "true value" allocation // value calculated from true value relation

## By-products
- electricity, high voltage: 0 kWh; name electricity; CPC 17100: Electrical energy; By-product classification allocatable product; undefined min 1, max 1, standardDeviation95 0, pedigree (1,1,2,1,1)
  production volume 1.32632e6 kWh; name electricity_apv; = totalElectricity
    (same comment as for total net electricity)
  property exergy 3.6 MJ
    (same comment as for heat, district or industrial, natural gas)
  property price 0.0977 EUR2005
    Temporary price data. Calculated as 90% of purchasers price based on: 94% of the average price (to account for a 6% loss in transformation and transmission) for electricity for industrial consumersin 2005 (excluded taxes). From IEA.
  property true value 0.116681; name electricity_true_value
    (same comment as for heat, district or industrial, natural gas)
  properties: true value relation 3.6
- heat, for reuse in municipal waste incineration only: 0 MJ; CPC 17300: Steam and hot water; By-product classification allocatable product; pedigree (1,1,1,1,1)
  Net electricity generated from this waste and used in internal MSWI plant energy redistribution.
  Uncertainty: uncertainty is calculated from uncertainties in waste composition and uncertainties in energy efficiency and the uncertainty in internal energy demand
  production volume 0.000535478 MJ
  property exergy 0.1842 MJ; name E_th_prod_MSWI_exergy
    This exergy property is based on the exergy content of the product.
  property price 0.0106 EUR2005; name E_th_prod_MSWI_price_EUR2005
    (same comment as for heat, district or industrial, natural gas)
  property true value relation 0.1842; name E_th_prod_MSWI_true_value_relation
    property to calculate "true value" from
  property true value 2.41035e-12
    (same comment as for heat, district or industrial, natural gas)
- electricity, for reuse in municipal waste incineration only: 0 kWh; CPC 17100: Electrical energy; By-product classification allocatable product; pedigree (1,1,1,1,1)
  (same comment as for heat, for reuse in municipal waste incineration only)
  production volume 7.54157e-5 kWh
  property true value relation 3.6; name E_el_prod_MSWI_true_value_relation
    property to calculate "true value" from
  property price 0.1 EUR2005; name E_el_prod_MSWI_price_EUR2005
    Estimated to be the same price as in case of electricity, medium voltage.
  property exergy 3.6 MJ; name E_el_prod_MSWI_exergy
    This exergy property is based on the exergy content of the product.
  property true value 6.63457e-12
    (same comment as for heat, district or industrial, natural gas)

## Inputs from technosphere
- water, completely softened: 0.00263287 kg; name water_completely_softened; = factor_MJ_kWh*0.006; lognormal variance with pedigree 0.2286, pedigree (4,3,4,5,1)
  Literature value/calculated value. Feed water for the steam circuit lost when producing 1kWh of electricity from natural gas, based on the value for burning 1MJ of natural gas. Röder et al. 2007, Tab. 9.65 and Tab. 9.66, p. 160f.
  properties: wet mass 1 kg
- natural gas, high pressure: 0.0112516 m3; name natural_gas; = factor_MJ_kWh/ natural_gas_Net_Heat_Value; lognormal variance with pedigree 0.0002, pedigree (1,1,2,1,1)
  Calculated value
  property heating value, net 39 MJ; name natural_gas_Net_Heat_Value
  properties: carbon content, fossil 0.602381, wet mass 0.84 kg, dry mass 0.84 kg
  note on carbon content, fossil: An average C content of 0.506 kg C/ m3 has been assumed (this average has been calculated using data in Tab 3.5, ecoinvent v2.2 report 6_V
  note on heating value, net: Net (lower) heating (calorific) value at norm conditions (0°C, 101.325 kPa). Literature value.
- water, decarbonised: 0.0877625 kg; name water_decarbonised_user; = factor_MJ_kWh*0.2; lognormal variance with pedigree 0.2286, pedigree (4,3,4,5,1)
  Literature value/calculated value. Cooling water, decarbonised, for the cooling water circuit lost when producing 1kWh of electricity from natural gas, based on the value for burning 1MJ of natural gas. Röder et al. 2007, Tab. 9.65 and Tab. 9.66, p. 160f.
  properties: wet mass 1 kg
- gas power plant, 100MW electrical: 2.4398e-11 unit; name gas_power_plant; = factor_MJ_kWh*0.0000000000556; lognormal variance with pedigree 0.1406, pedigree (3,3,4,5,3)
  Literature value/calculated value. Amount of power plant needed for producing 1kWh of electricity from natural gas, based on the value for burning 1MJ of natural gas. Tab. 11.25, p. 143
- residue from cooling tower: -4.38812e-7 kg; name cooling_tower_residue; = (factor_MJ_kWh*0.000001)*-1; lognormal variance with pedigree 1.1086, pedigree (4,3,5,5,3)
  Literature value/calculated value. Mass share of cooling tower needed for producing 1kWh of electricity from natural gas, based on the value for burning 1MJ of natural gas. Weighted average with electricity production data (Itten&Frischknecht 2012) and values of 11 countries
  (AT, BE, DE, ES, FR, GB, IT, JP, LU, NL, US) (Faist Emmenegger et al. 2007)
  Source:
  Itten R. and Frischknecht R. (2012) Life Cycle Inventories of Electricity Mixes and Grid. ESU-services Ltd., Uster, Switzerland.
  production volume 13.7601 kg; = cooling_tower_residue/electricity* electricity_apv
    Calculated from the production volume of electricity produced.
  property price 0 EUR2005; name cooling_tower_residue_price_EUR2005
  properties: wet mass 1 kg, water content 0.428571, dry mass 0.7 kg, carbon content, fossil 0.0544233

## Inputs from nature
- Water, cooling, unspecified natural origin [natural resource, in water]: 0.00259265 m3; name water_cooling_UNO_input; = ((recirculating_CS_fraction_from_allCS*WWithdrawal_EP_NG_recirculating_CS)+(once_through_andCP_CS_fractio_from_allCS*WWithdrawal_EP_NG_onceT_andCP_CS))/10.5*factor_MJ_kWh; lognormal variance with pedigree 0.1, pedigree (4,4,4,5,4)
  Calculated based on literature data.

## Emissions to nature
- Nitrogen oxides [air, non-urban air or from high stacks]: 1.61044e-5 kg; name nitrogen_oxides; = factor_MJ_kWh*0.0000367; lognormal variance with pedigree 0.3106, pedigree (3,3,4,5,3)
  Literature value/calculated value. Emissions when producing 1kWh of electricity from natural gas, based on the value for burning 1MJ of natural gas. Weighted average with electricity production data (Itten&Frischknecht 2012) and emission values of 11 countries
  (AT, BE, DE, ES, FR, GB, IT, JP, LU, NL, US) (Faist Emmenegger et al. 2007)
  Country emissions values estimate from range of values from different references. See Tab. 11.15, p. 133f in Faist Emmenegger et al. 2007.
  Source:
  Itten R. and Frischknecht R. (2012) Life Cycle Inventories of Electricity Mixes and Grid. ESU-services Ltd., Uster, Switzerland.
- Formaldehyde [air, non-urban air or from high stacks]: 1.41736e-8 kg; name formaldehyde; = factor_MJ_kWh*0.0000000323; lognormal variance with pedigree 0.6826, pedigree (3,3,5,5,3)
  Literature value/calculated value. Emissions when producing 1kWh of electricity from natural gas, based on the value for burning 1MJ of natural gas. Weighted average with electricity production data (Itten&Frischknecht 2012) and emission values of 11 countries
  (AT, BE, DE, ES, FR, GB, IT, JP, LU, NL, US) (Faist Emmenegger et al. 2007)
  Country emissions values estimate from range of values from different references. See Tab. 11.19, p. 138 in Faist Emmenegger et al. 2007.
  Source:
  Itten R. and Frischknecht R. (2012) Life Cycle Inventories of Electricity Mixes and Grid. ESU-services Ltd., Uster, Switzerland.
- Chromium [air, non-urban air or from high stacks]: 1.25939e-10 kg; name chromium; = factor_MJ_kWh*0.000000000287; lognormal variance with pedigree 0.034, pedigree (3,5,4,5,3)
  (same comment as for Formaldehyde)
- Cadmium [air, non-urban air or from high stacks]: 9.91716e-11 kg; name cadmium; = factor_MJ_kWh*0.000000000226; lognormal variance with pedigree 0.034, pedigree (3,5,4,5,3)
  (same comment as for Formaldehyde)
- Arsenic [air, non-urban air or from high stacks]: 1.80352e-11 kg; name arsenic; = factor_MJ_kWh*0.0000000000411; lognormal variance with pedigree 0.034, pedigree (3,5,4,5,3)
  (same comment as for Formaldehyde)
- Acetic acid [air, non-urban air or from high stacks]: 5.30963e-8 kg; name acetic_acid; = factor_MJ_kWh*0.000000121; lognormal variance with pedigree 1.1026, pedigree (3,3,5,5,3)
  (same comment as for Formaldehyde)
- Acenaphthene [air, non-urban air or from high stacks]: 3.47978e-13 kg; name acenaphthene; = factor_MJ_kWh*0.000000000000793; lognormal variance with pedigree 0.6826, pedigree (3,3,5,5,3)
  (same comment as for Formaldehyde)
- Water [air, unspecified]: 4.30612e-5 m3; name water_to_air_unspecified; = (water_completely_softened/1000)*fraction_WCS_to_air+(water_decarbonised_user/1000)*fraction_WDC_to_air+water_cooling_UNO_input*fraction_CW_to_air; lognormal variance with pedigree 0.1, pedigree (4,4,4,5,4)
  Calculated value based on literature values and expert opinion. See comments in the parametres' comment field.
  property fraction, origin: fresh water 0.0386784; name fraction_origin_fresh_water
  property fraction, origin: salt water 0; name fraction_origin_salt_water
  property fraction, origin: unspecified 0.961322; name fraction_origin_unspecified
- Propionic acid [air, non-urban air or from high stacks]: 7.021e-9 kg; name propionic_acid; = factor_MJ_kWh*0.000000016; lognormal variance with pedigree 1.1086, pedigree (4,3,5,5,3)
  (same comment as for Formaldehyde)
- Water [water, unspecified]: 0.00263998 m3; name water_to_water_unspecified; = (water_completely_softened/1000)*(1-fraction_WCS_to_air)+(water_decarbonised_user/1000)*(1-fraction_WDC_to_air)+water_cooling_UNO_input*(1-fraction_CW_to_air); lognormal variance with pedigree 0.1, pedigree (4,4,4,5,4)
  (same comment as for Water)
  property fraction, origin: unspecified 0.968823; name fraction_origin_unspecified_Ww
  property fraction, origin: fresh water 0.0311766; name fraction_origin_fresh_water_Ww
  property fraction, origin: salt water 0; name fraction_origin_salt_water_Ww
- Dioxins, measured as 2,3,7,8-tetrachlorodibenzo-p-dioxin [air, non-urban air or from high stacks]: 0 kg; name dioxins; = factor_MJ_kWh*2.9E-17; pedigree (1,1,1,1,1)
  (same comment as for Formaldehyde)
- Propane [air, non-urban air or from high stacks]: 3.09363e-7 kg; name propane; = factor_MJ_kWh*0.000000705; lognormal variance with pedigree 0.6826, pedigree (3,3,5,5,3)
  (same comment as for Formaldehyde)
- Cobalt [air, non-urban air or from high stacks]: 7.54757e-12 kg; name cobalt; = factor_MJ_kWh*0.0000000000172; lognormal variance with pedigree 0.034, pedigree (3,5,4,5,3)
  (same comment as for Formaldehyde)
- Nickel [air, non-urban air or from high stacks]: 1.89128e-10 kg; name nickel; = factor_MJ_kWh*0.000000000431; lognormal variance with pedigree 0.034, pedigree (3,5,4,5,3)
  (same comment as for Formaldehyde)
- Pentane [air, non-urban air or from high stacks]: 5.04634e-7 kg; name pentane; = factor_MJ_kWh*0.00000115; lognormal variance with pedigree 0.6826, pedigree (3,3,5,5,3)
  (same comment as for Formaldehyde)
- Carbon monoxide, fossil [air, non-urban air or from high stacks]: 8.77625e-6 kg; name carbon_monoxide_fossil; = factor_MJ_kWh*0.00002; lognormal variance with pedigree 0.3106, pedigree (3,3,4,5,3)
  Literature value/calculated value. Emissions when producing 1kWh of electricity from natural gas, based on the value for burning 1MJ of natural gas. Weighted average with electricity production data (Itten&Frischknecht 2012) and emission values of 11 countries
  (AT, BE, DE, ES, FR, GB, IT, JP, LU, NL, US) (Faist Emmenegger et al. 2007)
  Country emissions values estimate from range of values from different references. See Tab. 11.15, p. 133f in Faist Emmenegger et al. 2007. CO is a product of an incomplete combustion.
  Source:
  Itten R. and Frischknecht R. (2012) Life Cycle Inventories of Electricity Mixes and Grid. ESU-services Ltd., Uster, Switzerland.
- Benzene [air, non-urban air or from high stacks]: 3.95809e-10 kg; name benzene; = factor_MJ_kWh*0.000000000902; lognormal variance with pedigree 0.6826, pedigree (3,3,5,5,3)
  (same comment as for Formaldehyde)
- Beryllium [air, non-urban air or from high stacks]: 1.08387e-12 kg; name beryllium; = factor_MJ_kWh*0.00000000000247; lognormal variance with pedigree 0.034, pedigree (3,5,4,5,3)
  (same comment as for Formaldehyde)
- Methane, fossil [air, non-urban air or from high stacks]: 4.26087e-7 kg; name methane_fossil; = factor_MJ_kWh*0.000000971; lognormal variance with pedigree 0.6826, pedigree (3,3,5,5,3)
  (same comment as for Nitrogen oxides)
- Dinitrogen monoxide [air, non-urban air or from high stacks]: 4.2872e-7 kg; name dinitrogen_monoxide; = factor_MJ_kWh*0.000000977; lognormal variance with pedigree 0.3426, pedigree (3,3,5,5,3)
  (same comment as for Nitrogen oxides)
- Ethane [air, non-urban air or from high stacks]: 6.01173e-7 kg; name ethane; = factor_MJ_kWh*0.00000137; lognormal variance with pedigree 0.6826, pedigree (3,3,5,5,3)
  (same comment as for Formaldehyde)
- Carbon dioxide, fossil [air, non-urban air or from high stacks]: 0.0234326 kg; name carbon_dioxide_fossil; = factor_MJ_kWh*0.0534; lognormal variance with pedigree 0.0852, pedigree (3,3,5,5,4)
  (same comment as for Carbon monoxide, fossil)
- Benzo(a)pyrene [air, non-urban air or from high stacks]: 2.32132e-13 kg; name benzo_a_pyrene; = factor_MJ_kWh*0.000000000000529; lognormal variance with pedigree 0.6826, pedigree (3,3,5,5,3)
  (same comment as for Formaldehyde)
- Selenium [air, non-urban air or from high stacks]: 2.15457e-12 kg; name selenium; = factor_MJ_kWh*0.00000000000491; lognormal variance with pedigree 0.6826, pedigree (3,3,5,5,3)
  (same comment as for Formaldehyde)
- Sulfur dioxide [air, non-urban air or from high stacks]: 2.51001e-7 kg; name sulfur_dioxide; = factor_MJ_kWh*0.000000572; lognormal variance with pedigree 0.0536, pedigree (3,3,5,5,3)
  (same comment as for Formaldehyde)
- Lead [air, non-urban air or from high stacks]: 4.51977e-11 kg; name lead; = factor_MJ_kWh*0.000000000103; lognormal variance with pedigree 0.034, pedigree (3,5,4,5,3)
  (same comment as for Formaldehyde)
- Manganese [air, non-urban air or from high stacks]: 3.42713e-11 kg; name manganese; = factor_MJ_kWh*0.0000000000781; lognormal variance with pedigree 0.034, pedigree (3,5,4,5,3)
  (same comment as for Formaldehyde)
- PAH, polycyclic aromatic hydrocarbons [air, non-urban air or from high stacks]: 3.5105e-9 kg; name pah; = factor_MJ_kWh*0.000000008; lognormal variance with pedigree 1.1086, pedigree (4,3,5,5,3)
  (same comment as for Formaldehyde)
- Toluene [air, non-urban air or from high stacks]: 6.58219e-10 kg; name toluene; = factor_MJ_kWh*0.0000000015; lognormal variance with pedigree 0.6826, pedigree (3,3,5,5,3)
  (same comment as for Formaldehyde)
- Particulates, < 2.5 um [air, non-urban air or from high stacks]: 2.15457e-7 kg; name particulates_lt2_5; = factor_MJ_kWh*0.000000491; lognormal variance with pedigree 0.3106, pedigree (3,3,4,5,3)
  (same comment as for Carbon monoxide, fossil)
- Hexane [air, non-urban air or from high stacks]: 3.47978e-7 kg; name hexane; = factor_MJ_kWh*0.000000793; lognormal variance with pedigree 0.6826, pedigree (3,3,5,5,3)
  (same comment as for Formaldehyde)
- Mercury [air, non-urban air or from high stacks]: 3.01903e-11 kg; name mercury; = factor_MJ_kWh*0.0000000000688; lognormal variance with pedigree 0.6826, pedigree (3,3,5,5,3)
  (same comment as for Formaldehyde)
- Butane [air, non-urban air or from high stacks]: 4.0634e-7 kg; name butane; = factor_MJ_kWh*0.000000926; lognormal variance with pedigree 0.6826, pedigree (3,3,5,5,3)
  (same comment as for Formaldehyde)
- Acetaldehyde [air, non-urban air or from high stacks]: 3.5105e-10 kg; name acetaldehyde; = factor_MJ_kWh*0.0000000008; lognormal variance with pedigree 1.1086, pedigree (4,3,5,5,3)
  (same comment as for Formaldehyde)

## Sampling procedure
literature and statistics

## Extrapolations
Data have been taken over from a dataset valid for the time period 2000-2005, relying on sources of the 90th. No changes were made for the 2008 dataset, but uncertainty was adjusted.
All exchange data were extrapolated from datasets of the following 11 countries: AT, BE, DE, ES, FR, GB, IT, JP, LU, NL, US. The data of those countries basically rely on data of the former UCTE (see general comment).

The efficiency is based on IEA/OECD statistics and calculated with own assumptions.

The cooling and feed water use has been overtaken from datasets for electricity production with hard coal or lignite.

## Review by Christopher Oberschelp 2017-11-21
Detailed and transparently documented dataset. Main emissions seem plausible, individual deviations may be spotted after comparison of impact assessment results with similar datasets.
