# transport, freight, train with reefer, cooling

Dataset: EcoSpold 2, unit process
Geography: GLO
Time period: 2010-01-01 to 2019-12-31
Technology level: current
Classification: ISIC rev.4 ecoinvent: 4912:Freight rail transport
Scenario: Business-as-Usual
System model: Allocation at the point of substitution
Generated by: Tereza Levova
Database: ecoinvent
isCopyrightProtected: true
accessRestrictedTo: 1

## General comment
This dataset represent transport of reefer (refrigerated container) on a freight train. The operation mode of the reefer is cooling (temperature between 0°C and 20°C).
The amount of operation of the reefer needed is calculated using the assumption of the average speed of the train.
Reefer being transported by a train, Switzerland, Zürich, Hardbrücke train station, December 2014

## Included activities start
This dataset simply combine two other activities - transport, freight train and operation of reefer, For more information on these two activities please see the datasets representing these two activities.

## Parameters
- speed: 40 km/hour; name speed_train; lognormal variance with pedigree 0.0166, pedigree (4,5,1,1,1)
  Estimated value based on an expert judgement. This value represents an average speed of freight train including all stops and breaks.

## Reference product
- transport, freight, train with reefer, cooling: 1 metric ton*km; name transport_train_RP; CPC 65121: Railway transport services of freight by refrigerator cars; By-product classification allocatable product
  production volume 7.77014e9 metric ton*km; = (85344E6*0.0572*0.46)*(1/0.289)
    Calculated based on literature and estimates.
    8.53 E10 tkm is the amount of transport, train, freight transport using intermodal shipping containers in Europe in 2011 (Eurostat database, http://ec.europa.eu/eurostat, Annual railway transport of goods in intermodal transport units, accessed 20150107).
    0.05272 is the fraction of the cargo in need of atmosphere control in comparison with the dry cargo transported in the intermodal shipping containers (9.24E7 ton has been transported in reefers; http://www.joc.com/sites/default/files/u221106/SpeakerPresentations/March3/Dekker_Neil_Cool_Cargoes_Presentation.pdf, accessed 20150107 and 1.52E9 ton in ordinary intermodal shipping containers; http://www.statista.com/statistics/253987/international-seaborne-trade-carried-by-containers/, accessed 20141027).
    According to literature (Drawry, 2008, published in http://www.hamburg-sued.com/group/media/sharedmedia/dokumente/brochures/Reefer_guide.pdf, accessed 20141216) the type of food transported in reefers is following;
    31% fresh fruits and vegetables (excl. bananas)
    20% bananas
    24% meat and poultry
    19% fish and seafood
    6% various (medicine, flowers, etc.)
    The fruits and vegetables (54%) in general need to be cooled during its storage and transport and the meat and seafood (46%) need to be frozen. The various is divided half/half between cooling and freezing.
    0.289 is the GDP scaling factor (GDP GLO = 1, GDP Europe = 0.289). The PV of the global activity has been extrapolated using the nominal GDP of 2011 (source: United Nations, http://data.un.org/Glossary.aspx?q=GDP+%28current+US%24%29, accessed 20130726 and 20130312).
  property price 0.0271685 EUR2005; name transport_train_RP_price_EUR2005
    Calculated based on inputs: The price of the product has been calculated as a sum of the values of the material and energy inputs for this product. This value is therefore a rough estimation. It may underestimate the real price since there are additional expenses when producing any product. These expences can include for example labour costs, treatment of waste materials and profit for the producer. Please consider carefully whether this level of data quality is acceptable for your application.

## Inputs from technosphere
- transport, freight train: 1 metric ton*km; lognormal variance with pedigree 0.0026, pedigree (1,1,3,1,1)
  Calculated value.
- operation, reefer, cooling: 1.04167 kg*day; = 1000*(transport_train_RP/speed_train/24); lognormal variance with pedigree 0.0186, pedigree (4,5,3,1,1)
  Calculated value based on estimated speed of the train.

## Extrapolations
This dataset has been extrapolated from year 2014 to the year of the calculation (2019). The uncertainty has been adjusted accordingly.
