# allyl chloride production, reaction of propylene and chlorine

Dataset: EcoSpold 2, unit process
Geography: RER
Time period: 1998-01-01 to 2019-12-31
Technology level: current
Classification: ISIC rev.4 ecoinvent: 2011:Manufacture of basic chemicals
Classification: EcoSpold01Categories: chemicals/organics
Tags: ConvertedDataset
Scenario: Business-as-Usual
System model: Allocation at the point of substitution
Generated by: Mike Chudacoff
Published in: Jungbluth N. 2007
Database: ecoinvent
isCopyrightProtected: true
accessRestrictedTo: 1

## General comment
Liquid propene is reacted with gaseous chlorine
[This dataset was already contained in the ecoinvent database version 2. It was not individually updated during the transfer to ecoinvent version 3. Life Cycle Impact Assessment results may still have changed, as they are affected by changes in the supply chain, i.e. in other datasets. This dataset was generated following the ecoinvent quality guidelines for version 2. It may have been subject to central changes described in the ecoinvent version 3 change report (http://www.ecoinvent.org/database/ecoinvent-version-3/reports-of-changes/), and the results of the central updates were reviewed extensively. The changes added e.g. consistent water flows and other information throughout the database. The documentation of this dataset can be found in the ecoinvent reports of version 2, which are still available via the ecoinvent website. The change report linked above covers all central changes that were made during the conversion process.]

## Included activities end
Multi-output process that produces three outputs from the reaction of propylene with chlorine: allyl chloride, hydrochloric acid (36wt%) and 1,3-dichloropropene.

## Geography
RER

## Technology
based on industry data in the US and Europe

## Parameters
- fraction, process water, to air: 0.205 dimensionless; name fraction_PW_to_air; lognormal variance with pedigree 0.092025, pedigree (4,4,3,2,4)
  Literature value (Statistics Canada, 2007 & Shaffer, K.H., 2008, Consumptive water use in the Great Lakes Basin, USGS) (Vionnet, S., Quantis Water Database - Technical Report, 2012).
- fraction, water, completely softened, to air: 0.205; name fraction_WCS_to_air; = fraction_PW_to_air; lognormal variance with pedigree 0.092025, pedigree (4,4,3,2,4)
  Calculated value. See comment in the other parametres present in this dataset. Water, completely softened is considered to be always used as process water, thus process water fractions to air are applied to all water, completely softened input flows to calculate the amount of water consumed in the processes.

## Reference product
- hydrochloric acid, without water, in 30% solution state: 1 kg; CPC 34: Basic chemicals; By-product classification allocatable product; CAS 7647-01-0
  production volume 4.676e8 kg; = Ref('d05c9928-91d2-4fba-a976-63ad6dc4c5b4', 'ProductionVolume') * (Ref('6c3613f2-a13a-4e89-9b46-ea8a7a61ac4a') / Ref('d05c9928-91d2-4fba-a976-63ad6dc4c5b4'))
    Calculated from the production volume of allyl chloride in proportion to the respective output amounts.
  property price 0.127 EUR2005
    Temporary price data. Calculated as 90% of purchasers price based on: 2004 Import/Export data (total trades (USD) divided by total weight (kg) in EU27, USA, China, Japan and India) from UN Commodity Trade Statistics Database (http://data.un.org/Explorer.aspxDatabase [Accessed 2 July 2010]). Commodity: Hydrogen chloride (hydrochloric acid).
  property carbon content 0
    carbon content on a dry matter basis (reserved; not for manual entry)
  property true value 0.21209
    allocation property applied in "true value" allocation // value calculated from revenue
  properties: carbon content, fossil 0, dry mass 1 kg, water in wet mass 0 kg, wet mass 1 kg, carbon content, non-fossil 0, water content 0, carbon allocation 0 kg
- allyl chloride: 0 kg; By-product classification allocatable product; CPC 341: Basic organic chemicals; CAS 107-05-1
  EcoSpold01Location=RER
  production volume 2.8e8 kg
    Data retrived from "Acute exposure guideines level (AEGLs) FOR ALLYL CHLORIDE 107-05-1" (EPA, 2008) . Document refers to data from 1993(http://www.epa.gov/oppt/aegl/pubs/allyl_chloride.pdf, accessed 20150928)
  property price 0.448 EUR2005
    Temporary price data. Calculated as 90% of purchasers price based on: 2,3-dichloropropene is used as a chemical intermediate (Krijgsheld and van der Gen 1986). Based on the International Update Rule data, the production volume of 2,3-dichloropropene reported by U.S. manufacturers was <10,000 pounds (4.5 metric tons) in 2002 (IUR 2002). 2004 prices calculated from Import/Export data (total trades (USD) divided by total weight (kg) in EU27, USA, China, Japan and India) from UN Commodity Trade Statistics Database (http://data.un.org/Explorer.aspxDatabase [Accessed 2 July 2010]). Commodity: 'Chlorinated derivs unsaturated acyclic hydrocarbon nes'
  property carbon content 0.473684
    carbon content on a dry matter basis (reserved; not for manual entry)
  property true value 0.448
    allocation property applied in "true value" allocation // value calculated from revenue
  properties: carbon content, fossil 0.473684, water in wet mass 0 kg, wet mass 1 kg, dry mass 1 kg, water content 0, carbon content, non-fossil 0, carbon allocation 0.473684 kg

## By-products
- electricity, for reuse in municipal waste incineration only: 0 kWh; CPC 17100: Electrical energy; By-product classification allocatable product; pedigree (1,1,1,1,1)
  Net electricity generated from this waste and used in internal MSWI plant energy redistribution.
  Uncertainty: uncertainty is calculated from uncertainties in waste composition and uncertainties in energy efficiency and the uncertainty in internal energy demand
  production volume 23.7971 kWh
  property exergy 3.6 MJ; name E_el_prod_MSWI_exergy
    This exergy property is based on the exergy content of the product.
  property true value relation 3.6; name E_el_prod_MSWI_true_value_relation
    property to calculate "true value" from
  property price 0.1 EUR2005; name E_el_prod_MSWI_price_EUR2005
    Estimated to be the same price as in case of electricity, medium voltage.
  property true value 1.09197e-8
    allocation property applied in "true value" allocation // value calculated from true value relation
- heat, for reuse in municipal waste incineration only: 0 MJ; CPC 17300: Steam and hot water; By-product classification allocatable product; pedigree (1,1,1,1,1)
  Net useful heat generated from this waste and used in internal MSWI plant energy redistribution.
  Uncertainty: uncertainty is calculated from uncertainties in waste composition and uncertainties in energy efficiency and the uncertainty in internal energy demand
  production volume 168.361 MJ
  property true value relation 0.1842; name E_th_prod_MSWI_true_value_relation
    property to calculate "true value" from
  property exergy 0.1842 MJ; name E_th_prod_MSWI_exergy
    This exergy property is based on the exergy content of the product.
  property price 0.0106 EUR2005; name E_th_prod_MSWI_price_EUR2005
    Average European district heat price from Ecoheatcool and Euroheat 2005-2006, Ecoheat Work package 1: The European heat market. Final report. 10.6 EUR/GJ i s the price of district heat. http://www.solarthermalworld.org/files/Ecoheatcool%20WP1%20Web.pdf?download
  property true value 3.95291e-9
    (same comment as for electricity, for reuse in municipal waste incineration only)
- zinc concentrate: 0 kg; CPC 14290: Other non-ferrous metal ores and concentrates (other than uranium or thorium ores and concentrates); By-product classification allocatable product
  Calculated value from the knowledge of the properties of both products.
  production volume 0.0042121 kg
  property price 0.38 EUR2005; name ByP_price_EUR2005
    Temporary price data. Calculated as 90% of purchasers price based on: Zinc content in concentrate 53%. Concentrate price per kg Zn 86.5% of refined Zn price (13.5% treatment charges according to CHR Metals Limited 2005: Dynamic cost curves. http://www.minecost.com/dynamic.pdf). 2004 zinc price from USGS (2007) Mineral commodity summaries 2007. <http://minerals.usgs.gov/minerals/pubs/mcs/2007/mcs2007.pdf> [Accessed 25 May 2010]
  property zinc content 0.53; name zinc_C_zinc_concentrate
    Zinc content on a dry matter basis. Value taken from teh "zinc mine operation" /GLO dataset.
  property dry mass 1 kg; name DM_zinc_concentrate
  property carbon content 0
    carbon content on a dry matter basis (reserved; not for manual entry)
  property true value 5.71642e-12
    allocation property applied in "true value" allocation // value calculated from revenue
  properties: wet mass 1 kg, water content 0, carbon content, non-fossil 0, carbon content, fossil 0, water in wet mass 0 kg, carbon allocation 0 kg
- pesticide, unspecified: 0 kg; source Agency for Toxic Substances and Disease  2006; CPC 346: Fertilizers and pesticides; By-product classification allocatable product; pedigree (1,1,1,1,1)
  production volume 3.164e7 kg
  property price 8.98 EUR2005; name pesticide_price_EUR2005
    Prices are calculated on basis of Import data (kg US$) from UN statistics (http://data.un.org ) Name of commodity: Pesticides, rodenticides, nes, for retail sale
  property carbon content, fossil 0.486978; name C_content_fossil
  property water in wet mass 0 kg; name WWM
  property dry mass 1 kg; name DM
  property carbon content, non-fossil 0; name C_content_non_fossil
  property water content 0; name water_content
  property wet mass 1 kg; name WM
  property carbon content 0.486978
    carbon content on a dry matter basis (reserved; not for manual entry)
  property true value 1.01474
    allocation property applied in "true value" allocation // value calculated from revenue
  properties: carbon allocation 0.486978 kg

## Inputs from technosphere
- water, completely softened: 0.082274 kg; name water_softened_input; lognormal variance with pedigree 0.0408, pedigree (2,2,5,3,1)
  EcoSpold01Location=RER
  Literature
  Uncertainty: literature
  properties: wet mass 1 kg
- heat, district or industrial, natural gas: 0.126785 MJ; lognormal variance with pedigree 0.0408, pedigree (2,2,5,3,1)
  Uncertainty: industry source
- chlorine, liquid: 0.0901602 kg; lognormal variance with pedigree 0.0408, pedigree (2,2,5,3,1)
  EcoSpold01Location=RER
  Literature
  Uncertainty: literature
  properties: dry mass 1 kg, wet mass 1 kg
- wastewater, unpolluted: -2.654e-7 m3; lognormal variance with pedigree 0.0582, pedigree (4,2,5,3,1)
  EcoSpold01Location=CH
  Approximation
  Uncertainty: approximation
  production volume 980 m3; = (Ref('9f46e719-46ee-465f-89b5-323f30058ce4')*-1)* Ref('d05c9928-91d2-4fba-a976-63ad6dc4c5b4', 'ProductionVolume')
    (same comment as for hydrochloric acid, without water, in 30% solution state)
  properties: dry mass 0.337476 kg, wet mass 1000 kg, carbon content, non-fossil 0.00178991, carbon content, fossil 0.00178991, water content 2962.17
  note on carbon content, fossil: Assumed to be like in tap water. Bicarbonate content is 2.93 mol/m3. CO2 content is 0.1 mol/m3 (ecoinvent v2.2 report 8, Tab 93.1).
- spent solvent mixture: 0 kg; pedigree (1,1,1,1,1)
  Approximation
  EcoSpold01Location=CH
  Uncertainty: approximation
  production volume 0 kg
    (same comment as for hydrochloric acid, without water, in 30% solution state)
  properties: carbon content, fossil 0.571257, water content 0.197605, dry mass 0.835 kg, wet mass 1 kg
  note on carbon content, fossil: Tab A.7, ecoinvent v2.2 report 13_I. C content has been calculated after data in the tables, and then referred to 1 kg DM
- propylene: 0.0514876 kg; lognormal variance with pedigree 0.0408, pedigree (2,2,5,3,1)
  EcoSpold01Location=RER
  Literature
  Uncertainty: literature
  properties: carbon content, fossil 0.857143, wet mass 1 kg, dry mass 1 kg
- electricity, medium voltage: 0.0109782 kWh; lognormal variance with pedigree 0.0408, pedigree (2,2,5,3,1)
  EcoSpold01Location=UCTE
  Literature
  Uncertainty: literature
- heat, district or industrial, other than natural gas: 0.0707663 MJ; lognormal variance with pedigree 0.0408, pedigree (2,2,5,3,1)
  Uncertainty: industry source
- chemical factory, organics: 3.03314e-11 unit; lognormal variance with pedigree 0.1786, pedigree (4,5,5,5,5)
  EcoSpold01Location=RER
  Infrastructure of a typical plant
  Uncertainty: infrastructure of a typical plant
- dichloropropene: -0.00856863 kg
  EcoSpold01Location=RER
  production volume 3.164e7 kg; = (Ref('050df2e1-852b-49c8-9930-cd2291203610')*-1)* Ref('d05c9928-91d2-4fba-a976-63ad6dc4c5b4', 'ProductionVolume')
    (same comment as for hydrochloric acid, without water, in 30% solution state)
  properties: dry mass 1 kg, wet mass 1 kg, price 1.24 EUR2005, carbon content, fossil 0.327273
- spent solvent mixture: -0.00103888, -2.27194e-5 kg (2 entries); lognormal variance with pedigree 0.0582, pedigree (4,2,5,3,1)
  Approximation
  EcoSpold01Location=CH
  Uncertainty: approximation
  production volume 3.92e6 kg

## Emissions to nature
- BOD5, Biological Oxygen Demand [water, surface water]: 0.0002654 kg; lognormal variance with pedigree 0.0582, pedigree (4,2,5,3,1)
  Calculation
  Uncertainty: calculation
- Water [water, unspecified]: 6.51424e-5 m3; name water_to_water_unspecified; = (water_softened_input/1000)*(1-fraction_WCS_to_air)-0.0000035; lognormal variance with pedigree 0.0807, pedigree (2,2,5,1,1)
  Calculated value based on literature values and expert opinion. See comments in the parametres' comment field.
  property carbon content, fossil 0; name C_content_fossil
  property carbon content, non-fossil 0; name C_content_non_fossil
  property water in wet mass 1000 kg; name WWM
  property fraction, origin: fresh water 1; name fraction_origin_fresh_water_Ww
  property wet mass 1000 kg; name WM
  property fraction, origin: unspecified 0; name fraction_origin_unspecified_Ww
  property fraction, origin: salt water 0; name fraction_origin_salt_water_Ww
  property dry mass 0 kg; name DM
- COD, Chemical Oxygen Demand [water, surface water]: 0.0002654 kg; lognormal variance with pedigree 0.0582, pedigree (4,2,5,3,1)
  Calculation
  Uncertainty: calculation
- Water [air, unspecified]: 1.68662e-5 m3; name water_to_air_unspecified; = (water_softened_input/1000*fraction_WCS_to_air); lognormal variance with pedigree 0.0807, pedigree (2,2,5,1,1)
  (same comment as for Water)
  property fraction, origin: unspecified 0; name fraction_origin_unspecified
  property fraction, origin: fresh water 1; name fraction_origin_fresh_water
  property fraction, origin: salt water 0; name fraction_origin_salt_water
- TOC, Total Organic Carbon [water, surface water]: 9.85772e-5 kg; lognormal variance with pedigree 0.0582, pedigree (4,2,5,3,1)
  Calculation
  Uncertainty: calculation
- DOC, Dissolved Organic Carbon [water, surface water]: 9.85772e-5 kg; lognormal variance with pedigree 0.0582, pedigree (4,2,5,3,1)
  Calculation
  Uncertainty: calculation
- AOX, Adsorbable Organic Halogen as Cl [water, surface water]: 1.13743e-5 kg; lognormal variance with pedigree 0.0582, pedigree (4,2,5,3,1)
  Calculation
  Uncertainty: calculation

## Review by Emilia Moreno Ruiz 2012-03-08
submitted to correct name change from "hydrochloric acid, without water, in 36% solution state" to "hydrochloric acid, without water, in 30% solution state"

## Review by Niels Jungbluth 2006-05-26
Passed.
