# treatment of waste vapour barrier, flame-retarded, municipal incineration with fly ash extraction

Dataset: EcoSpold 2, unit process
Geography: CH
Time period: 2006-01-01 to 2019-12-31
Technology level: current
Classification: ISIC rev.4 ecoinvent: 3821:Treatment and disposal of non-hazardous waste
Synonyms: municipal waste incineration
Scenario: Business-as-Usual
System model: Allocation at the point of substitution
Share of production covered: 1.8 %
Generated by: Gabor Doka
Published in: Doka G. 2015
Database: ecoinvent
isCopyrightProtected: true
accessRestrictedTo: 1

## General comment
This dataset represents the activity of waste disposal of waste vapour barrier, flame-retarded in a municipal solid waste incinerator (MSWI) // Recommended use of this dataset: For disposal of bulk or small parts of flame-retarded polymer vapour barrier (PE with 6.7w% bromine) (waste building product) // // Waste composition (wet, in ppm): upper heating value 40.38 MJ/kg; lower heating value 40.05 MJ/kg; H2O 3732; O 35860; H 114290; C 766980; S 398.3; N 1210.3; P n.a.; B n.a.; Cl 1363.6; Br 67000; F 13.421; I n.a.; Ag n.a.; As 1.7; Ba 223.68; Cd 31.672; Co 1.5658; Cr 11.631; Cu 38.596; Hg 0.044736; Mn 28.034; Mo n.a.; Ni 0.89472; Pb 21.082; Sb 9.3945; Se 1.8789; Sn 3.5585; V 2057.8; Zn 319.09; Be 0.44736; Sc n.a.; Sr 79.182; Ti 894.72; Tl 0.35789; W n.a.; Si n.a.; Fe 1431.5; Ca 2415.7; Al 178.94; K n.a.; Mg 89.472; Na 1311.2; // Share of carbon in waste that is biogenic 0%. // Share of metals in waste not oxidised and bulk-recyclable (exclude very small or thin parts) Iron: 0%; Alu: 0%; Copper: 0%. // Recovery of metal scrap from bottom ash to recycling: 0g iron scrap, 0g aluminium scrap, 0g copper scrap. From this waste, the FLUWA process in the technology mix recovers 0.00197kg (DM) of a hydroxide sludge to be recycled in zinc furnaces. // Ultimately one kg of this waste produces 0.04627 kg of bottom ash (can include some washed ash) and 0.02622 kg of residues, which are landfilled (technology mix). Additional solidification of residues with 0.01049 kg of cement.Net energy production: 5.22MJ/kg electric energy and 10.09MJ/kg thermal energy. //

## Included activities start
waste incineration from waste reception gate and delivery into waste bunker at incinerator plant site (without transports to the incinerator)

## Included activities end
Waste-specific short-term emissions to water from leachate. Long-term emissions from landfill to ground water.

## Geography
Specific to the technology mix encountered in Switzerland in 2012.

## Technology
average Swiss MSWI plants in 2010 (grate incinerators) with electrostatic precipitator for fly ash (ESP), wet flue gas scrubber and 25% SNCR , 42.77% SCR-high dust , 32.68% SCR-low dust -DeNOx facilities and 0% without Denox (weighted according to mass of burnt waste, representing Swiss average). Efficiency of iron scrap separation from slag : 58%. Efficiency of non-ferrous scrap separation from slag : 31%. The technology mix for this dataset includes a filter ash treatment (FLUWA) of a share of 46.22%. Gross electric efficiency technology mix 15.84% and Gross thermal efficiency technology mix 28.51%

## Time period
Waste composition as given in literature reference, theoretical data or other source. Transfer coefficients for modern MSWI.

## Reference product
- electricity, for reuse in municipal waste incineration only: 1 kWh; name E_el_prod_MSWI; CPC 17100: Electrical energy; By-product classification allocatable product; pedigree (1,1,1,1,1)
  Net electricity generated from this waste and used in internal MSWI plant energy redistribution.
  Uncertainty: uncertainty is calculated from uncertainties in waste composition and uncertainties in energy efficiency and the uncertainty in internal energy demand
  production volume 789750 kWh
    calculated in proportion to reference product waste input to incinerator
  property price 0.1 EUR2005; name E_el_prod_MSWI_price_EUR2005
    Estimated to be the same price as in case of electricity, medium voltage.
  property true value relation 3.6; name E_el_prod_MSWI_true_value_relation
    property to calculate "true value" from
  property exergy 3.6 MJ; name E_el_prod_MSWI_exergy
    This exergy property is based on the exergy content of the product.
  property true value 0.185708; name E_el_prod_MSWI_true_value
    allocation property applied in "true value" allocation // value calculated from true value relation
- heat, for reuse in municipal waste incineration only: 0 MJ; name E_th_prod_MSWI; CPC 17300: Steam and hot water; By-product classification allocatable product; pedigree (1,1,1,1,1)
  Net useful heat generated from this waste and used in internal MSWI plant energy redistribution.
  Uncertainty: uncertainty is calculated from uncertainties in waste composition and uncertainties in energy efficiency and the uncertainty in internal energy demand
  production volume 5.5018e6 MJ
    calculated in proportion to reference product waste input to incinerator
  property exergy 0.1842 MJ; name E_th_prod_MSWI_exergy
    This exergy property is based on the exergy content of the product.
  property true value relation 0.1842; name E_th_prod_MSWI_true_value_relation
    property to calculate "true value" from
  property price 0.0106 EUR2005; name E_th_prod_MSWI_price_EUR2005
    Average European district heat price from Ecoheatcool and Euroheat 2005-2006, Ecoheat Work package 1: The European heat market. Final report. 10.6 EUR/GJ i s the price of district heat. http://www.solarthermalworld.org/files/Ecoheatcool%20WP1%20Web.pdf?download
  property true value 0.0661995; name E_th_prod_MSWI_true_value
    (same comment as for electricity, for reuse in municipal waste incineration only)
- waste vapour barrier, flame-retarded: 0 kg; CPC 39217: Worn clothing and other worn textile articles; By-product classification Waste; CAS 9002-88-4
  Main reference product of this activity (supply of disposal service).
  production volume 545020 kg
    based on corresponding global production volume of MSW fraction in conventional MSWI (wo fly ash extraction) and scaled down to annual Swiss incinerated MSW mass of 3.02 mio. tonnes.
  property price 0 EUR2005
    Waste products are assigned a price of zero as they are assumed to require further treatment.
  property carbon content 0.76986
    carbon content on a dry matter basis (reserved; not for manual entry)
  property true value 0
    allocation property applied in "true value" allocation // value calculated from revenue
  properties: tin content 3.5719e-6, vanadium content 0.0020656, zinc content 0.00032029, strontium content 7.9479e-5, iron content 0.0014369, titanium content 0.00089807, water content 0.003746, thallium content 3.5923e-7, antimony content 9.4297e-6, nickel content 8.9807e-7, lead content 2.1161e-5, beryllium content 4.4903e-7, water in wet mass 0.003732 kg, aluminium content 0.00017961, selenium content 1.8859e-6, bromine content 0.067251, sodium content 0.0013161, carbon content, fossil 0.76986, dry mass 0.99627 kg, calcium content 0.0024248, magnesium content 8.9807e-5, wet mass 1 kg, oxygen content 0.035995, hydrogen content 0.11472, chromium content 1.1675e-5, sulfur content 0.00039979, nitrogen content 0.0012148, chlorine content 0.0013687, mercury content 4.4903e-8, barium content 0.00022452, cadmium content 3.179e-5, copper content 3.8741e-5, manganese content 2.8139e-5, arsenic content 1.7063e-6, cobalt content 1.5716e-6, fluorine content 1.3471e-5, carbon allocation 0.766988 kg
- zinc concentrate: 0 kg; CPC 14290: Other non-ferrous metal ores and concentrates (other than uranium or thorium ores and concentrates); By-product classification allocatable product
  Calculated value from the knowledge of the properties of both products.
  production volume 267.468 kg
  property price 0.38 EUR2005; name ByP_price_EUR2005
    Temporary price data. Calculated as 90% of purchasers price based on: Zinc content in concentrate 53%. Concentrate price per kg Zn 86.5% of refined Zn price (13.5% treatment charges according to CHR Metals Limited 2005: Dynamic cost curves. http://www.minecost.com/dynamic.pdf). 2004 zinc price from USGS (2007) Mineral commodity summaries 2007. <http://minerals.usgs.gov/minerals/pubs/mcs/2007/mcs2007.pdf> [Accessed 25 May 2010]
  property zinc content 0.53; name zinc_C_zinc_concentrate
    Zinc content on a dry matter basis. Value taken from teh "zinc mine operation" /GLO dataset.
  property dry mass 1 kg; name DM_zinc_concentrate
  property carbon content 0
    carbon content on a dry matter basis (reserved; not for manual entry)
  property true value 0.000186486
    allocation property applied in "true value" allocation // value calculated from revenue
  properties: wet mass 1 kg, water content 0, carbon content, non-fossil 0, carbon content, fossil 0, water in wet mass 0 kg, carbon allocation 0 kg

## Inputs from technosphere
- chemical, organic: 2.48197e-6 kg; lognormal variance with pedigree 0.98648, pedigree (1,1,3,1,1)
  Auxilliary inputs for the wastewater treatment stage of the incinerator plant. Proxy for (pure) Trisodium-trimercapto-s-triazine (CAS 17766-26-6), used as 15% diluted solution, aka TMT15.
  Uncertainty: uncertainty calculated from uncertainty in average TMT15 input, of transfer coefficients in the incinerator, and the uncertainty of the waste composition of this waste
  properties: wet mass 1 kg, carbon content, fossil 0.628, dry mass 1 kg
- residual material landfill: 5.53691e-11 unit; lognormal variance with pedigree 0.081893, pedigree (1,1,3,1,1)
  Landfill infrastructure required for landfilling of incineration residues.
  Uncertainty: uncertainty is calculated from uncertainties in waste composition and transfer coefficients in incinerator
- heat, district or industrial, natural gas: 0.103234 MJ; lognormal variance with pedigree 0.20805, pedigree (1,1,3,1,1)
  Input to DeNOx stage, to heat up flue gas in low-dust SCR.
  Uncertainty: uncertainty calculated from uncertainty in average DeNOx input, uncertainty in the share of thermal NOx, uncertainty of nitrogen content in average municipal waste and the uncertainty in nitrogen content in *this* waste.
- chemical, inorganic: 0.000283302 kg; lognormal variance with pedigree 0.13697, pedigree (1,1,3,1,1)
  Auxilliary inputs for the wastewater treatment stage of the incinerator plant. Proxy for Polyelectrolyte.
  Uncertainty: uncertainty calculated from uncertainty in average Polyelectrolyte input, of transfer coefficients in the incinerator, and the uncertainty of the waste composition of this waste
  properties: dry mass 1 kg, carbon content, fossil 0.003, wet mass 1 kg
- process-specific burdens, residual material landfill: 0.0265767 kg; lognormal variance with pedigree 0.081893, pedigree (1,1,3,1,1)
  Mass-specific expenditures required for landfilling of incineration residues.;activityLink introduced to establish a direct link to the corresponding regional supply of this product
  Uncertainty: uncertainty is calculated from uncertainties in waste composition and transfer coefficients in incinerator
- cement, unspecified: 0.00533202 kg; lognormal variance with pedigree 0.090977, pedigree (1,1,3,1,1)
  Cement required for solidification of landfilled residual material.
  Uncertainty: Uncertainty calculated from uncertainty of the waste composition of this waste, of transfer coefficients in the incinerator and of the solidification recipe.
  properties: wet mass 1 kg, dry mass 1 kg
- metalliferous hydroxide sludge: -0.00400705 kg; lognormal variance with pedigree 0.05063, pedigree (1,1,3,1,1)
  Metalliferous hydroxide sludge from filter ash leaching (FLUWA).
  Uncertainty: uncertainty is calculated from uncertainties in waste composition and transfer coefficients to filter ash in incinerator and the uncertainty of the transfer coefficients of the FLUWA process.
  production volume 4295.7 kg
    calculated in proportion to reference product waste input to incinerator
  properties: calcium content 0.012366, zinc content 0.028561, water content 3, carbon content, fossil 0.020245, dry mass 0.25 kg, wet mass 1 kg, bromine content 0.6715, chlorine content 0.016684, oxygen content 0.22066, sulfur content 0.01243, vanadium content 0.0059484, cadmium content 0.0054763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
- titanium dioxide: 3.4588e-5 kg; lognormal variance with pedigree 0.50155, pedigree (1,1,3,1,1)
  Input to DeNOx stage (TiO2 catalyst carrier)
  Uncertainty: uncertainty calculated from uncertainty in average DeNOx input, uncertainty in the share of thermal NOx, uncertainty of nitrogen content in average municipal waste and the uncertainty in nitrogen content in *this* waste.
  properties: wet mass 1 kg, dry mass 1 kg
- cationic resin: 1.15268e-7 kg; lognormal variance with pedigree 1.9224, pedigree (1,1,3,1,1)
  Auxilliary input for mercury removal in filter ash treatment (FLUWA).
  Uncertainty: uncertainty calculated from uncertainty in of transfer coefficients in the incinerator, and the uncertainty of the waste composition of this waste
  properties: wet mass 1 kg, carbon content, fossil 0.521606, dry mass 0.5 kg, water content 1
- transport, freight, lorry, unspecified: 0.00177022 metric ton*km; lognormal variance with pedigree 0.025999, pedigree (1,1,3,1,1)
  Transport services to transport incineration residues to landfills and filter ash to external treatments (FLUWA).
  Uncertainty: uncertainty calculated from uncertainty of the waste composition of this waste, uncertainty of transfer coefficients and the uncertainty in generic transportation distances
- chromium oxide, flakes: 7.05853e-7 kg; lognormal variance with pedigree 0.50155, pedigree (1,1,3,1,1)
  Input to DeNOx stage. Active component in SCR catalyst (vanadium pentoxide, V2O5), here approximated with the available chromium trioxide.
  Uncertainty: uncertainty calculated from uncertainty in average DeNOx input, uncertainty in the share of thermal NOx, uncertainty of nitrogen content in average municipal waste and the uncertainty in nitrogen content in *this* waste.
  properties: wet mass 1 kg, dry mass 1 kg
- sodium hydroxide, without water, in 50% solution state: 0.00114653 kg; lognormal variance with pedigree 0.081654, pedigree (1,1,3,1,1)
  Auxilliary inputs for the flue gas treatment stage of the incinerator plant, and partially in the filter ash treatment (FLUWA).
  Uncertainty: uncertainty calculated from uncertainty in average NaOH input, of transfer coefficients in the incinerator, and the uncertainty of the waste composition of this waste
  properties: wet mass 1 kg, dry mass 1 kg
- waste cement, hydrated: -0.0133301 kg; lognormal variance with pedigree 0.090977, pedigree (1,1,3,1,1)
  Hydrated cement output for solidification of landfilled residual material.
  Uncertainty: Uncertainty calculated from uncertainty of the waste composition of this waste and transfer coefficients in the incinerator and of the solidification recipe.
  production volume 14290 kg
    calculated in proportion to reference product waste input to incinerator
  properties: dry mass 1 kg, wet mass 1 kg
- water, decarbonised: 3.35849 kg; lognormal variance with pedigree 0.43777, pedigree (1,1,3,1,1)
  Incinerator process water used in flue gas scrubber stage.
  Uncertainty: uncertainty calculated from uncertainty in average water input, and the uncertainty of the waste composition of this waste
  properties: wet mass 1 kg
- quicklime, milled, packed: 0.00370964 kg; lognormal variance with pedigree 0.17791, pedigree (1,1,3,1,1)
  Auxilliary inputs for the flue gas treatment stage of the incinerator plant.
  Uncertainty: uncertainty calculated from uncertainty in average CaO input, of transfer coefficients in the incinerator, and the uncertainty of the waste composition of this waste
  properties: dry mass 0.99 kg, water content 0.010101, wet mass 1 kg
- ammonia, liquid: 0.000552064 kg; lognormal variance with pedigree 0.20805, pedigree (1,1,3,1,1)
  Input to DeNOx stage (100% NH3).
  Uncertainty: uncertainty calculated from uncertainty in average DeNOx input, uncertainty in the share of thermal NOx, uncertainty of nitrogen content in average municipal waste and the uncertainty in nitrogen content in *this* waste.
  properties: dry mass 1 kg, wet mass 1 kg
- hydrochloric acid, without water, in 30% solution state: 0.000442775 kg; lognormal variance with pedigree 0.087209, pedigree (1,1,3,1,1)
  Auxilliary inputs for the wastewater treatment stage of the incinerator plant.
  Uncertainty: uncertainty calculated from uncertainty in average HCl input, of transfer coefficients in the incinerator, and the uncertainty of the waste composition of this waste
  properties: dry mass 1 kg, wet mass 1 kg
- process-specific burdens, slag landfill: 0.0235208 kg; lognormal variance with pedigree 0.048127, pedigree (1,1,3,1,1)
  Mass-specific expenditures required for landfilling of bottom ash.;activityLink introduced to establish a direct link to the corresponding regional supply of this product
  Uncertainty: uncertainty is calculated from uncertainties in waste composition and transfer coefficients in incinerator
- hydrogen peroxide, without water, in 50% solution state: 0.000937426 kg; lognormal variance with pedigree 0.11795, pedigree (1,1,3,1,1)
  Auxilliary oxidising agent for filter ash treatment (FLUWA).
  Uncertainty: uncertainty calculated from uncertainty in of transfer coefficients in the incinerator, and the uncertainty of the waste composition of this waste
  properties: wet mass 1 kg, dry mass 1 kg
- iron (III) chloride, without water, in 40% solution state: 8.17292e-5 kg; lognormal variance with pedigree 0.43777, pedigree (1,1,3,1,1)
  Auxilliary inputs for the wastewater treatment stage of the incinerator plant.
  Uncertainty: uncertainty calculated from uncertainty in average FeCl3 input, of transfer coefficients in the incinerator, and the uncertainty of the waste composition of this waste
  properties: wet mass 1 kg, dry mass 1 kg
- spent activated carbon with mercury: -1.21333e-7 kg; lognormal variance with pedigree 1.9224, pedigree (1,1,3,1,1)
  Spent ion exchanger charged with mercury, from FLUWA filter ash treatment, approximated here with Spent activated carbon with mercury, deposited undergound in a polyethylene Big Bag.
  Uncertainty: uncertainty calculated from uncertainty in of transfer coefficients in the incinerator, and the uncertainty of the waste composition of this waste.
  production volume 0.130074 kg; = ABS(Ref('0423e508-6886-4d3b-88a8-abfa1100773d', 'ProductionVolume') * ((Ref('2c23c5c6-bf93-4a54-96bb-31f27cfa5dc2')*-1) / Ref('0423e508-6886-4d3b-88a8-abfa1100773d')))
    Calculated from production volume of reference product using the relative outputs.
  properties: dry mass 1 kg, wet mass 1 kg, carbon content, fossil 0.6
- slag landfill: 4.18148e-11 unit; lognormal variance with pedigree 0.048127, pedigree (1,1,3,1,1)
  Landfill infrastructure required for landfilling of bottom ash.
  Uncertainty: uncertainty is calculated from uncertainties in waste composition and transfer coefficients in incinerator
- municipal waste incineration facility: 1.27098e-10 unit
  Demands per kilogram waste.

## Inputs from nature
- Oxygen [natural resource, in air]: 1.49249 kg; lognormal variance with pedigree 0.01472, pedigree (1,1,3,1,1)
  Oxygen from ambient air needed to combust and oxidise this waste. Net demand, i.e. without O2 leaving the plant in flue gas uncombusted.
  Uncertainty: uncertainty is calculated from uncertainties in waste composition and transfer coefficients to flue gas and soild residues in incinerator

## Emissions to nature
- BOD5, Biological Oxygen Demand [water, surface water]: 0.000290089 kg; lognormal variance with pedigree 0.020367, pedigree (1,1,3,1,1)
  Emissions to water from waste composition and transfer coefficients in incinerator and landfills.
  Uncertainty: uncertainty is calculated from uncertainties in waste composition and transfer coefficients in incinerator and landfills
- Heat, waste [water, surface water]: 3.44116 MJ; lognormal variance with pedigree 0.022043, pedigree (1,1,3,1,1)
  Waste heat generated from heating value of this waste plus any electricity required to process it.
  Uncertainty: uncertainty is calculated from uncertainties in waste composition and uncertainties in energy efficiency and the uncertainty in internal energy demand
- Bromine [water, ground-, long-term]: 0.0017658 kg; lognormal variance with pedigree 0.17482, pedigree (1,1,3,1,1)
  Long-term emissions from landfilling of incineration residues.
  Uncertainty: uncertainty is calculated from uncertainties in waste composition and transfer coefficients in incinerator and landfills.
- DOC, Dissolved Organic Carbon [water, surface water]: 0.000129294 kg; lognormal variance with pedigree 0.02015, pedigree (1,1,3,1,1)
  (same comment as for BOD5, Biological Oxygen Demand)
- Water [water, surface water]: 0.00115068 m3; lognormal variance with pedigree 1.8425, pedigree (1,1,3,1,1)
  Process water released to surface water.
  Uncertainty: uncertainty calculated from uncertainty in process water input and the uncertainty of fraction to surface water.
- Fluoride [water, ground-, long-term]: 4.5521e-6 kg; lognormal variance with pedigree 0.79027, pedigree (1,1,3,1,1)
  (same comment as for Bromine)
- Sulfate [water, surface water]: 8.2746e-5 kg; lognormal variance with pedigree 0.39886, pedigree (1,1,3,1,1)
  (same comment as for BOD5, Biological Oxygen Demand)
- Arsenic, ion [water, ground-, long-term]: 5.26898e-7 kg; lognormal variance with pedigree 1.5032, pedigree (1,1,3,1,1)
  (same comment as for Bromine)
- Nitrate [water, surface water]: 7.905e-6 kg; lognormal variance with pedigree 0.42738, pedigree (1,1,3,1,1)
  (same comment as for BOD5, Biological Oxygen Demand)
- Carbon monoxide, fossil [air, urban air close to ground]: 7.98075e-6 kg; lognormal variance with pedigree 0.75229, pedigree (1,1,3,1,1)
  Incomplete combustion product emitted to air.
  Uncertainty: uncertainty calculated from uncertainty in average operation emissions, and the uncertainty of the flue gas volume from this waste.
- Barium [water, ground-, long-term]: 8.30765e-5 kg; lognormal variance with pedigree 1.217, pedigree (1,1,3,1,1)
  (same comment as for Bromine)
- Chloride [water, surface water]: 0.000588821 kg; lognormal variance with pedigree 0.24653, pedigree (1,1,3,1,1)
  (same comment as for BOD5, Biological Oxygen Demand)
- Carbon dioxide, fossil [air, urban air close to ground]: 1.42111 kg; lognormal variance with pedigree 0.0041986, pedigree (1,1,3,1,1)
  Emission to air from waste composition and transfer coefficients.
  Uncertainty: uncertainty is calculated from uncertainties in waste composition and transfer coefficients in incinerator
- Cadmium, ion [water, ground-, long-term]: 2.58157e-6 kg; lognormal variance with pedigree 5.1188, pedigree (1,1,3,1,1)
  (same comment as for Bromine)
- Bromine [water, surface water]: 0.0316068 kg; lognormal variance with pedigree 0.036454, pedigree (1,1,3,1,1)
  (same comment as for BOD5, Biological Oxygen Demand)
- Methane, fossil [air, urban air close to ground]: 7.04226e-8 kg; lognormal variance with pedigree 0.071805, pedigree (1,1,3,1,1)
  (same comment as for Carbon monoxide, fossil)
- Cobalt [water, ground-, long-term]: 7.00565e-7 kg; lognormal variance with pedigree 1.4585, pedigree (1,1,3,1,1)
  (same comment as for Bromine)
- Fluoride [water, surface water]: 1.98578e-6 kg; lognormal variance with pedigree 0.82871, pedigree (1,1,3,1,1)
  (same comment as for BOD5, Biological Oxygen Demand)
- Sulfur dioxide [air, urban air close to ground]: 2.1534e-6 kg; lognormal variance with pedigree 0.79244, pedigree (1,1,3,1,1)
  (same comment as for Carbon dioxide, fossil)
- Chromium VI [water, ground-, long-term]: 3.42301e-7 kg; lognormal variance with pedigree 2.5405, pedigree (1,1,3,1,1)
  (same comment as for Bromine)
- Arsenic, ion [water, surface water]: 3.72591e-7 kg; lognormal variance with pedigree 1.3852, pedigree (1,1,3,1,1)
  (same comment as for BOD5, Biological Oxygen Demand)
- Nitrogen oxides [air, urban air close to ground]: 0.000205543 kg; lognormal variance with pedigree 0.24797, pedigree (1,1,3,1,1)
  Sum of fuel-Nox and thermal-NOx emitted to air after DeNOx stage.
  Uncertainty: uncertainty calculated from uncertainty in average N-emissions and uncertainty in the share of thermal NOx and the uncertainty in nitrogen content in *this* waste.
- Copper, ion [water, ground-, long-term]: 1.84877e-5 kg; lognormal variance with pedigree 1.0794, pedigree (1,1,3,1,1)
  (same comment as for Bromine)
- Barium [water, surface water]: 4.825e-8 kg; lognormal variance with pedigree 0.68937, pedigree (1,1,3,1,1)
  (same comment as for BOD5, Biological Oxygen Demand)
- Ammonia [air, urban air close to ground]: 6.49065e-7 kg; lognormal variance with pedigree 0.24797, pedigree (1,1,3,1,1)
  Nitrogen species emitted to air after DeNOx stage.
  Uncertainty: uncertainty calculated from uncertainty in average N-emissions and uncertainty in the share of thermal NOx and the uncertainty in nitrogen content in *this* waste.
- Mercury [water, ground-, long-term]: 4.78255e-9 kg; lognormal variance with pedigree 1.9157, pedigree (1,1,3,1,1)
  (same comment as for Bromine)
- Cadmium, ion [water, surface water]: 2.86195e-9 kg; lognormal variance with pedigree 1.0855, pedigree (1,1,3,1,1)
  (same comment as for BOD5, Biological Oxygen Demand)
- Dinitrogen monoxide [air, urban air close to ground]: 9.177e-6 kg; lognormal variance with pedigree 1.4088, pedigree (1,1,3,1,1)
  (same comment as for Ammonia)
- Manganese [water, ground-, long-term]: 1.13067e-5 kg; lognormal variance with pedigree 1.5319, pedigree (1,1,3,1,1)
  (same comment as for Bromine)
- Cobalt [water, surface water]: 1.38151e-10 kg; lognormal variance with pedigree 1.9562, pedigree (1,1,3,1,1)
  (same comment as for BOD5, Biological Oxygen Demand)
- Cyanide [air, urban air close to ground]: 1.9716e-6 kg; lognormal variance with pedigree 1.4088, pedigree (1,1,3,1,1)
  (same comment as for Ammonia)
- Nickel, ion [water, ground-, long-term]: 4.93233e-7 kg; lognormal variance with pedigree 1.428, pedigree (1,1,3,1,1)
  (same comment as for Bromine)
- Chromium VI [water, surface water]: 9.93705e-8 kg; lognormal variance with pedigree 1.3201, pedigree (1,1,3,1,1)
  (same comment as for BOD5, Biological Oxygen Demand)
- Hydrogen chloride [air, urban air close to ground]: 3.95611e-7 kg; lognormal variance with pedigree 0.64258, pedigree (1,1,3,1,1)
  (same comment as for Carbon dioxide, fossil)
- Lead [water, ground-, long-term]: 7.54709e-6 kg; lognormal variance with pedigree 2.7355, pedigree (1,1,3,1,1)
  (same comment as for Bromine)
- Copper, ion [water, surface water]: 1.70108e-9 kg; lognormal variance with pedigree 1.2175, pedigree (1,1,3,1,1)
  (same comment as for BOD5, Biological Oxygen Demand)
- Bromine [air, urban air close to ground]: 1.70144e-5 kg; lognormal variance with pedigree 0.18285, pedigree (1,1,3,1,1)
  (same comment as for Carbon dioxide, fossil)
- Antimony [water, ground-, long-term]: 1.93881e-6 kg; lognormal variance with pedigree 1.0701, pedigree (1,1,3,1,1)
  (same comment as for Bromine)
- Mercury [water, surface water]: 1.21028e-10 kg; lognormal variance with pedigree 2.0877, pedigree (1,1,3,1,1)
  (same comment as for BOD5, Biological Oxygen Demand)
- Hydrogen fluoride [air, urban air close to ground]: 4.60324e-8 kg; lognormal variance with pedigree 1.2421, pedigree (1,1,3,1,1)
  (same comment as for Carbon dioxide, fossil)
- Selenium [water, ground-, long-term]: 7.33052e-7 kg; lognormal variance with pedigree 0.96083, pedigree (1,1,3,1,1)
  (same comment as for Bromine)
- Manganese [water, surface water]: 1.75268e-9 kg; lognormal variance with pedigree 1.1304, pedigree (1,1,3,1,1)
  (same comment as for BOD5, Biological Oxygen Demand)
- Arsenic [air, urban air close to ground]: 6.76976e-9 kg; lognormal variance with pedigree 1.514, pedigree (1,1,3,1,1)
  (same comment as for Carbon dioxide, fossil)
- Tin, ion [water, ground-, long-term]: 1.20103e-6 kg; lognormal variance with pedigree 1.507, pedigree (1,1,3,1,1)
  (same comment as for Bromine)
- Nickel, ion [water, surface water]: 3.82062e-10 kg; lognormal variance with pedigree 1.8832, pedigree (1,1,3,1,1)
  (same comment as for BOD5, Biological Oxygen Demand)
- Barium [air, urban air close to ground]: 4.46349e-7 kg; lognormal variance with pedigree 0.87093, pedigree (1,1,3,1,1)
  (same comment as for Carbon dioxide, fossil)
- Vanadium, ion [water, ground-, long-term]: 0.000308218 kg; lognormal variance with pedigree 0.71305, pedigree (1,1,3,1,1)
  (same comment as for Bromine)
- Lead [water, surface water]: 7.3051e-10 kg; lognormal variance with pedigree 0.95781, pedigree (1,1,3,1,1)
  (same comment as for BOD5, Biological Oxygen Demand)
- Cobalt [air, urban air close to ground]: 1.4477e-9 kg; lognormal variance with pedigree 1.5284, pedigree (1,1,3,1,1)
  (same comment as for Carbon dioxide, fossil)
- Zinc, ion [water, ground-, long-term]: 7.28476e-5 kg; lognormal variance with pedigree 1.6309, pedigree (1,1,3,1,1)
  (same comment as for Bromine)
- Antimony [water, surface water]: 9.39053e-7 kg; lognormal variance with pedigree 1.196, pedigree (1,1,3,1,1)
  (same comment as for BOD5, Biological Oxygen Demand)
- Cadmium [air, urban air close to ground]: 8.20699e-9 kg; lognormal variance with pedigree 1.143, pedigree (1,1,3,1,1)
  (same comment as for Carbon dioxide, fossil)
- Beryllium [water, ground-, long-term]: 2.13444e-7 kg; lognormal variance with pedigree 1.6329, pedigree (1,1,3,1,1)
  (same comment as for Bromine)
- Selenium [water, surface water]: 1.90317e-7 kg; lognormal variance with pedigree 1.0517, pedigree (1,1,3,1,1)
  (same comment as for BOD5, Biological Oxygen Demand)
- Chromium [air, urban air close to ground]: 5.16375e-9 kg; lognormal variance with pedigree 1.2675, pedigree (1,1,3,1,1)
  (same comment as for Carbon dioxide, fossil)
- Strontium [water, ground-, long-term]: 4.02124e-5 kg; lognormal variance with pedigree 0.99485, pedigree (1,1,3,1,1)
  (same comment as for Bromine)
- Tin, ion [water, surface water]: 1.63596e-9 kg; lognormal variance with pedigree 1.2965, pedigree (1,1,3,1,1)
  (same comment as for BOD5, Biological Oxygen Demand)
- Copper [air, urban air close to ground]: 1.79717e-9 kg; lognormal variance with pedigree 1.1283, pedigree (1,1,3,1,1)
  (same comment as for Carbon dioxide, fossil)
- Titanium, ion [water, ground-, long-term]: 0.000136127 kg; lognormal variance with pedigree 0.90718, pedigree (1,1,3,1,1)
  (same comment as for Bromine)
- Vanadium, ion [water, surface water]: 1.21597e-6 kg; lognormal variance with pedigree 0.6204, pedigree (1,1,3,1,1)
  (same comment as for BOD5, Biological Oxygen Demand)
- Mercury [air, urban air close to ground]: 6.44846e-10 kg; lognormal variance with pedigree 1.9307, pedigree (1,1,3,1,1)
  (same comment as for Carbon dioxide, fossil)
- Thallium [water, ground-, long-term]: 1.40194e-7 kg; lognormal variance with pedigree 1.4277, pedigree (1,1,3,1,1)
  (same comment as for Bromine)
- Beryllium [water, surface water]: 1.41542e-10 kg; lognormal variance with pedigree 2.2742, pedigree (1,1,3,1,1)
  (same comment as for BOD5, Biological Oxygen Demand)
- Manganese [air, urban air close to ground]: 2.72194e-9 kg; lognormal variance with pedigree 1.165, pedigree (1,1,3,1,1)
  (same comment as for Carbon dioxide, fossil)
- Silicon [water, ground-, long-term]: 0.000547946 kg; lognormal variance with pedigree 0.00200076, pedigree (1,1,3,1,1)
  (same comment as for Bromine)
- Zinc, ion [water, surface water]: 9.91468e-9 kg; lognormal variance with pedigree 0.71278, pedigree (1,1,3,1,1)
  (same comment as for BOD5, Biological Oxygen Demand)
- Lead [air, urban air close to ground]: 8.83028e-10 kg; lognormal variance with pedigree 1.2089, pedigree (1,1,3,1,1)
  (same comment as for Carbon dioxide, fossil)
- Iron, ion [water, ground-, long-term]: 0.000373018 kg; lognormal variance with pedigree 2.0035, pedigree (1,1,3,1,1)
  (same comment as for Bromine)
- Strontium [water, surface water]: 2.6318e-8 kg; lognormal variance with pedigree 1.6639, pedigree (1,1,3,1,1)
  (same comment as for BOD5, Biological Oxygen Demand)
- Nickel [air, urban air close to ground]: 5.71434e-10 kg; lognormal variance with pedigree 1.6072, pedigree (1,1,3,1,1)
  (same comment as for Carbon dioxide, fossil)
- Calcium, ion [water, ground-, long-term]: 0.00125543 kg; lognormal variance with pedigree 0.60236, pedigree (1,1,3,1,1)
  (same comment as for Bromine)
- Titanium, ion [water, surface water]: 9.26038e-8 kg; lognormal variance with pedigree 0.50706, pedigree (1,1,3,1,1)
  (same comment as for BOD5, Biological Oxygen Demand)
- Antimony [air, urban air close to ground]: 3.82596e-12 kg; lognormal variance with pedigree 1.3476, pedigree (1,1,3,1,1)
  (same comment as for Carbon dioxide, fossil)
- Aluminium [water, ground-, long-term]: 0.000118791 kg; lognormal variance with pedigree 0.58303, pedigree (1,1,3,1,1)
  (same comment as for Bromine)
- Thallium [water, surface water]: 1.30433e-10 kg; lognormal variance with pedigree 1.7173, pedigree (1,1,3,1,1)
  (same comment as for BOD5, Biological Oxygen Demand)
- Tin [air, urban air close to ground]: 1.18176e-12 kg; lognormal variance with pedigree 1.478, pedigree (1,1,3,1,1)
  (same comment as for Carbon dioxide, fossil)
- Magnesium [water, ground-, long-term]: 4.23639e-5 kg; lognormal variance with pedigree 0.96342, pedigree (1,1,3,1,1)
  (same comment as for Bromine)
- Silicon [water, surface water]: 1.23514e-6 kg; lognormal variance with pedigree 0.55071, pedigree (1,1,3,1,1)
  (same comment as for BOD5, Biological Oxygen Demand)
- Selenium [air, urban air close to ground]: 1.13956e-8 kg; lognormal variance with pedigree 1.4996, pedigree (1,1,3,1,1)
  (same comment as for Carbon dioxide, fossil)
- Sodium, ion [water, ground-, long-term]: 0.000436282 kg; lognormal variance with pedigree 0.40702, pedigree (1,1,3,1,1)
  (same comment as for Bromine)
- Calcium, ion [water, surface water]: 2.24298e-5 kg; lognormal variance with pedigree 0.2286, pedigree (1,1,3,1,1)
  (same comment as for BOD5, Biological Oxygen Demand)
- Vanadium [air, urban air close to ground]: 2.21888e-5 kg; lognormal variance with pedigree 0.57372, pedigree (1,1,3,1,1)
  (same comment as for Carbon dioxide, fossil)
- NMVOC, non-methane volatile organic compounds, unspecified origin [air, urban air close to ground]: 2.13657e-7 kg; lognormal variance with pedigree 0.071805, pedigree (1,1,3,1,1)
  (same comment as for Carbon monoxide, fossil)
- Iron, ion [water, surface water]: 1.4933e-8 kg; lognormal variance with pedigree 1.0289, pedigree (1,1,3,1,1)
  (same comment as for BOD5, Biological Oxygen Demand)
- Zinc [air, urban air close to ground]: 1.08735e-7 kg; lognormal variance with pedigree 0.83426, pedigree (1,1,3,1,1)
  (same comment as for Carbon dioxide, fossil)
- Particulates, < 2.5 um [air, urban air close to ground]: 5.60503e-7 kg; lognormal variance with pedigree 0.37505, pedigree (1,1,3,1,1)
  (same comment as for Carbon monoxide, fossil)
- Aluminium [water, surface water]: 8.78249e-8 kg; lognormal variance with pedigree 1.3498, pedigree (1,1,3,1,1)
  (same comment as for BOD5, Biological Oxygen Demand)
- Strontium [air, urban air close to ground]: 4.02556e-9 kg; lognormal variance with pedigree 1.0327, pedigree (1,1,3,1,1)
  (same comment as for Carbon dioxide, fossil)
- Particulates, > 2.5 um, and < 10um [air, urban air close to ground]: 2.81665e-9 kg; lognormal variance with pedigree 0.1685, pedigree (1,1,3,1,1)
  (same comment as for Carbon monoxide, fossil)
- Magnesium [water, surface water]: 3.44396e-7 kg; lognormal variance with pedigree 0.80542, pedigree (1,1,3,1,1)
  (same comment as for BOD5, Biological Oxygen Demand)
- Titanium [air, urban air close to ground]: 3.7738e-7 kg; lognormal variance with pedigree 0.69574, pedigree (1,1,3,1,1)
  (same comment as for Carbon dioxide, fossil)
- Dioxins, measured as 2,3,7,8-tetrachlorodibenzo-p-dioxin [air, urban air close to ground]: 9.389e-15 kg; lognormal variance with pedigree 0.37505, pedigree (1,1,3,1,1)
  (same comment as for Carbon monoxide, fossil)
- Sodium, ion [water, surface water]: 0.000219377 kg; lognormal variance with pedigree 0.19281, pedigree (1,1,3,1,1)
  (same comment as for BOD5, Biological Oxygen Demand)
- Thallium [air, urban air close to ground]: 1.81949e-10 kg; lognormal variance with pedigree 1.7208, pedigree (1,1,3,1,1)
  (same comment as for Carbon dioxide, fossil)
- Benzene [air, urban air close to ground]: 4.69475e-9 kg; lognormal variance with pedigree 0.071805, pedigree (1,1,3,1,1)
  (same comment as for Carbon monoxide, fossil)
- Chromium, ion [water, surface water]: 7.67673e-10 kg; lognormal variance with pedigree 0.83051, pedigree (1,1,3,1,1)
  (same comment as for BOD5, Biological Oxygen Demand)
- Iron [air, urban air close to ground]: 1.30433e-9 kg; lognormal variance with pedigree 0.68127, pedigree (1,1,3,1,1)
  (same comment as for Carbon dioxide, fossil)
- Toluene [air, urban air close to ground]: 9.38951e-9 kg; lognormal variance with pedigree 0.071805, pedigree (1,1,3,1,1)
  (same comment as for Carbon monoxide, fossil)
- BOD5, Biological Oxygen Demand [water, ground-, long-term]: 0.000945153 kg; lognormal variance with pedigree 0.014325, pedigree (1,1,3,1,1)
  (same comment as for Bromine)
- Calcium [air, urban air close to ground]: 9.66557e-6 kg; lognormal variance with pedigree 0.55247, pedigree (1,1,3,1,1)
  (same comment as for Carbon dioxide, fossil)
- Benzene, pentachloro- [air, urban air close to ground]: 2.4804e-11 kg; lognormal variance with pedigree 0.071805, pedigree (1,1,3,1,1)
  (same comment as for Carbon monoxide, fossil)
- TOC, Total Organic Carbon [water, ground-, long-term]: 0.00114338 kg; lognormal variance with pedigree 0.014325, pedigree (1,1,3,1,1)
  (same comment as for Bromine)
- Aluminium [air, urban air close to ground]: 7.41745e-11 kg; lognormal variance with pedigree 0.95912, pedigree (1,1,3,1,1)
  (same comment as for Carbon dioxide, fossil)
- Benzene, hexachloro- [air, urban air close to ground]: 9.81656e-12 kg; lognormal variance with pedigree 0.071805, pedigree (1,1,3,1,1)
  (same comment as for Carbon monoxide, fossil)
- COD, Chemical Oxygen Demand [water, ground-, long-term]: 0.0028895 kg; lognormal variance with pedigree 0.014325, pedigree (1,1,3,1,1)
  (same comment as for Bromine)
- Magnesium [air, urban air close to ground]: 4.79786e-8 kg; lognormal variance with pedigree 0.99591, pedigree (1,1,3,1,1)
  (same comment as for Carbon dioxide, fossil)
- Phenol, pentachloro- [air, urban air close to ground]: 2.0445e-12 kg; lognormal variance with pedigree 0.071805, pedigree (1,1,3,1,1)
  (same comment as for Carbon monoxide, fossil)
- DOC, Dissolved Organic Carbon [water, ground-, long-term]: 0.00114338 kg; lognormal variance with pedigree 0.014325, pedigree (1,1,3,1,1)
  (same comment as for Bromine)
- Sodium [air, urban air close to ground]: 5.47285e-6 kg; lognormal variance with pedigree 0.63802, pedigree (1,1,3,1,1)
  (same comment as for Carbon dioxide, fossil)
- Benzo(a)pyrene [air, urban air close to ground]: 1.04475e-13 kg; lognormal variance with pedigree 0.37505, pedigree (1,1,3,1,1)
  (same comment as for Carbon monoxide, fossil)
- Sulfate [water, ground-, long-term]: 0.000484143 kg; lognormal variance with pedigree 0.57737, pedigree (1,1,3,1,1)
  (same comment as for Bromine)
- COD, Chemical Oxygen Demand [water, surface water]: 0.000296434 kg; lognormal variance with pedigree 0.02017, pedigree (1,1,3,1,1)
  (same comment as for BOD5, Biological Oxygen Demand)
- Heat, waste [air, urban air close to ground]: 15.0103 MJ; lognormal variance with pedigree 0.022043, pedigree (1,1,3,1,1)
  (same comment as for Heat, waste)
- Nitrate [water, ground-, long-term]: 2.20688e-5 kg; lognormal variance with pedigree 0.64303, pedigree (1,1,3,1,1)
  (same comment as for Bromine)
- TOC, Total Organic Carbon [water, surface water]: 0.000129294 kg; lognormal variance with pedigree 0.02015, pedigree (1,1,3,1,1)
  (same comment as for BOD5, Biological Oxygen Demand)
- Water [air, urban air close to ground]: 0.00267219 m3; lognormal variance with pedigree 1.3007, pedigree (1,1,3,1,1)
  Water vapour from waste humidity, hydrogen oxidation and part of the process water.
  Uncertainty: Uncertainty calculated from uncertainty in waste composition, process water input and the uncertainty of fraction to air.
- Chloride [water, ground-, long-term]: 8.73267e-5 kg; lognormal variance with pedigree 0.60652, pedigree (1,1,3,1,1)
  (same comment as for Bromine)
