# wood preservation facility construction, oscillating pressure vessel

Dataset: EcoSpold 2, unit process
Geography: GLO
Time period: 2012-01-01 to 2019-12-31
Technology level: current
Classification: ISIC rev.4 ecoinvent: 4290:Construction of other civil engineering projects
Tags: Swiss brush-up completed
Scenario: Business-as-Usual
System model: Allocation at the point of substitution
Generated by: Frank Werner
Published in: Werner F. 2007
Database: ecoinvent
isCopyrightProtected: true
accessRestrictedTo: 1

## General comment
The plant has a yearly throughput of 6'000 m3 timber, a life time of 75 years and a life time output of 4.5E5 m3 treated timber. The infrastructure represents plants with pressure vessels used for oscillating pressure treatment or for the Rüping method (as a proxy). A more detailed description of the design of the required equipment can be found in the respective datasets for wood preservation services.

## Included activities start
Infrastructure dataset containing the main elements of the facility.

## Included activities end
The land area and the material (production and disposal) needed for a preservative treatment plant for oscillating pressure treatment including strorage area is included.

## Geography
Data from Germany and Switzerland. Location of plant within Europe of minor importance

## Technology
Infrastructure for oscillating pressure impregnation, also useable as a proxy for the Rüping method

## Reference product
- wood preservation facility, oscillating pressure method: 1 unit; CPC 53269: Other constructions for manufacturing; By-product classification allocatable product
  production volume 1000 unit; name p_oscillating_pressure_vessel
    estimated based on estimated production volume
  property lifetime 50 year; name lifetime
  property price 121997 EUR2005
    Calculated based on inputs: The price of the product has been calculated as a sum of the values of the material and energy inputs for this product. This value is therefore a rough estimation. It may underestimate the real price since there are additional expenses when producing any product. These expences can include for example labour costs, treatment of waste materials and profit for the producer. Please consider carefully whether this level of data quality is acceptable for your application.
  property true value 121997
    allocation property applied in "true value" allocation // value calculated from revenue

## By-products
- iron scrap, sorted, pressed: 0 kg; By-product classification Recyclable; CPC 39310: Slag, dross, scalings and other waste from the manufacture of iron or steel; pedigree (1,1,1,1,1)
  Iron scrap recovered from this waste.
  production volume 2.77807e6 kg
  property price 0.175 EUR2005
    Temporary price data. Calculated as 90% of purchasers price based on: 2005 import and export prices (total trades (USD) divided by total weight (kg) in biggest economies of the world: EU27, USA, Brasil, China, India, Japan and Russia) from UN Commodity Trade Statistics Database (http://data.un.org/Explorer.aspxDatabase [Accessed 2011.06.20]). Commodity: Waste or scrap, of cast iron
  property carbon content 0
    carbon content on a dry matter basis (reserved; not for manual entry)
  property true value 3.27967
    allocation property applied in "true value" allocation // value calculated from revenue
  properties: water content 0, water in wet mass 0 kg, carbon content, fossil 0, dry mass 1 kg, carbon content, non-fossil 0, wet mass 1 kg, carbon allocation 0 kg
- heat, for reuse in municipal waste incineration only: 0 MJ; CPC 17300: Steam and hot water; By-product classification allocatable product; pedigree (1,1,1,1,1)
  Net electricity generated from this waste and used in internal MSWI plant energy redistribution.
  Uncertainty: uncertainty is calculated from uncertainties in waste composition and uncertainties in energy efficiency and the uncertainty in internal energy demand
  production volume 5.9993 MJ
  property exergy 0.1842 MJ; name E_th_prod_MSWI_exergy
    This exergy property is based on the exergy content of the product.
  property price 0.0106 EUR2005; name E_th_prod_MSWI_price_EUR2005
    Average European district heat price from Ecoheatcool and Euroheat 2005-2006, Ecoheat Work package 1: The European heat market. Final report. 10.6 EUR/GJ i s the price of district heat. http://www.solarthermalworld.org/files/Ecoheatcool%20WP1%20Web.pdf?download
  property true value relation 0.1842; name E_th_prod_MSWI_true_value_relation
    property to calculate "true value" from
  property true value 3.68536e-5
    allocation property applied in "true value" allocation // value calculated from true value relation
- electricity, for reuse in municipal waste incineration only: 0 kWh; CPC 17100: Electrical energy; By-product classification allocatable product; pedigree (1,1,1,1,1)
  (same comment as for heat, for reuse in municipal waste incineration only)
  production volume 0.844863 kWh
  property true value relation 3.6; name E_el_prod_MSWI_true_value_relation
    property to calculate "true value" from
  property price 0.1 EUR2005; name E_el_prod_MSWI_price_EUR2005
    Estimated to be the same price as in case of electricity, medium voltage.
  property exergy 3.6 MJ; name E_el_prod_MSWI_exergy
    This exergy property is based on the exergy content of the product.
  property true value 0.000101433
    (same comment as for heat, for reuse in municipal waste incineration only)

## Inputs from technosphere
- waste reinforced concrete: 0 kg; name w_concrete; source Werner F. 2007; pedigree (1,1,1,1,1)
  Conversion to kg from volume with 2400 kg/m3
  production volume 0 kg
    Calculated from the production volume of wood preservation facility in proportion to the respective output amounts.
  properties: SAM_activityLink_1 883, water content 0.00585407, SAM_activityLink_1_scaling_factor -1, dry mass 0.99418 kg, wet mass 1 kg
  note on SAM_activityLink_1: to be used only in special submissions in coordination with ecoinvent and the Swiss FOEN
- building, hall: 749.98 m2; source Leuenberger H. 2012
  Estimate for roofed area per pressure vessel
  properties: SAM_activityLink_1 342, SAM_activityLink_1_scaling_factor 1
- electronics, for control units: 199.995 kg; name m_electronics; source Leuenberger H. 2012; lognormal variance with pedigree 0.235, pedigree (5,5,5,5,5)
  2012, Hubel M., Written personal communication, Mr. M. Hubel, REU Matthias Hubel GmbH, 6 - PersonalWrittenCommunication
  property water in wet mass 0 kg; name WWM
  property carbon content, fossil 0.337146; name C_content_fossil_electronics
  property carbon content, non-fossil 0.00013442; name C_content_non_fossil_electronics
  property dry mass 1 kg; name m_electronics_DM
  property water content 0; name water_content
  property wet mass 1 kg; name m_electronics_WM
  properties: SAM_activityLink_1 2021, SAM_activityLink_1_scaling_factor 1
- waste electric and electronic equipment: -199.995 kg; name w_electronics; = (m_electronics)*-1; source Hubel M. 2012; lognormal variance with pedigree 0.203, pedigree (4,5,5,5,5)
  Equivalent to input
  production volume 200000 kg; = p_oscillating_pressure_vessel*w_electronics
    Calculated from production volume of reference product using the relative outputs.
  property carbon content, non-fossil 0.00013442; name w_electronics_C_content_non_fossil
  property carbon content, fossil 0.337146; name w_electronics_C_content_fossil
  property wet mass 1 kg; name w_electronics_WM
  property dry mass 1 kg; name w_electronics_DM
  property water in wet mass 0 kg; name w_electronics_WWM
  property water content 0; name w_electronics_water_content
  properties: SAM_activityLink_1_scaling_factor -1, SAM_activityLink_1 928
- scrap steel: 0 kg; pedigree (1,1,1,1,1)
  calculated from steel input
  production volume 0 kg
    Calculated from production volume of reference product using the relative outputs.
  properties: dry mass 1 kg, wet mass 1 kg, carbon content, fossil 0.0025
- concrete, normal: 2.99992 m3; name v_concrete; source Werner F. 2007; lognormal variance with pedigree 0.235, pedigree (5,5,5,5,5)
  Reinforcement for heavy machinery
  properties: water content 0.086758, wet mass 2380 kg, dry mass 2190 kg
- steel, low-alloyed, hot rolled: 24999.3 kg; name m_steel_unalloyed; = 15000+4000+6000; source Leuenberger H. 2012; lognormal variance with pedigree 0.235, pedigree (5,5,5,5,5)
  Weight of pressure vessel + storage vessel + additional equipment
  property dry mass 1 kg; name m_steel_unalloyed_DM
  property wet mass 1 kg; name m_steel_unalloyed_WM
  properties: carbon content, fossil 0.0025, SAM_activityLink_8_scaling_factor 0.1156, SAM_activityLink_9 4433, SAM_activityLink_8 4417, SAM_activityLink_2 2662, SAM_activityLink_1 4222, SAM_activityLink_2_scaling_factor 1, SAM_activityLink_1_scaling_factor 1, SAM_activityLink_9_scaling_factor 0.2048
  note on SAM_activityLink_8_scaling_factor: Scaling factor = amount of transport in corresponding KBOB dataset/amount of this input from technosphere. Transport distances estimated based on: ecoinvent report Overview and methodology, Table 4.2/Frischknecht, Jungblut/2007. To be used only in special submissions in coordination with ecoinvent and the Swiss FOEN
  note on SAM_activityLink_9: This link has been introduced to model transport specifically for the SAM model; to be used only in special submissions in coordination with ecoinvent and the Swiss FOEN.
- waste reinforced concrete: -471.119, -4.99187, -6723.7 kg (3 entries); source Werner F. 2007; lognormal variance with pedigree 0.203, pedigree (4,5,5,5,5)
  Conversion to kg from volume with 2400 kg/m3
  production volume 7.2e6 kg
- scrap steel: -6087.22, -7.69576, -18904.4 kg (3 entries); lognormal variance with pedigree 0.203, pedigree (4,5,5,5,5)
  calculated from steel input
  production volume 2.5e7 kg

## Inputs from nature
All rows: source Leuenberger H. 2012
- Transformation, to industrial area [natural resource, land]: 1749.95 m2; name asphalted_area; lognormal variance with pedigree 0.3701, pedigree (3,5,3,3,3)
  Storage place, asphalted
- Occupation, industrial area [natural resource, land]: 131246 m2*year; = asphalted_area*75; lognormal variance with pedigree 0.202, pedigree (1,1,3,1,1)
  Area times service life
- Transformation, to urban/industrial fallow (non-use) [natural resource, land]: 7499.8 m2; name storage_area_in_gravel; lognormal variance with pedigree 0.3701, pedigree (3,5,3,3,3)
  Storage place under gravel with partly fallow type vegetation
- Transformation, from unspecified [natural resource, land]: 9249.75 m2; = storage_area_in_gravel+asphalted_area; lognormal variance with pedigree 0.352, pedigree (1,1,3,1,1)
  Total area used for building and storage place
- Occupation, urban/industrial fallow (non-use) [natural resource, land]: 562485 m2*year; = storage_area_in_gravel*75; lognormal variance with pedigree 0.202, pedigree (1,1,3,1,1)
  Area times service life

## Sampling procedure
estimation
