# lithium hydroxide production

Dataset: EcoSpold 2, unit process
Geography: GLO
Time period: 2000-01-01 to 2020-12-31
Technology level: current
Classification: ISIC rev.4 ecoinvent: 2011:Manufacture of basic chemicals
Synonyms: Lithium hydroxide anhydrous; LiOH; Lithium hydrate; Lithium hydroxide (Li(OH))
Scenario: Business-as-Usual
System model: Allocation at the point of substitution
Share of production covered: 100 %
Generated by: Jürgen Sutter
Published in: Sutter, J. 2007
Database: ecoinvent
isCopyrightProtected: true
accessRestrictedTo: 1

## General comment
This dataset represents the production of lithium hydroxide and calcium carbonate by reaction betweeen lithium carbonate and calcium hydroxide. Lithium hydroxide is a white hygroscopic crystalline material. It is soluble in water, and slightly soluble in ethanol. There are commercial forms of the hydrated and anhydrous variations of lithium hydroxide.
Lithium hydroxide is used mainly for the production of lubricating greases. Over 50 % of the greases used today in motor vehicles, aircraft, and heavy machinery contain lithium stearates, mainly lithium 12-hydroxystearate. These greases have good viscosity properties up to 200 °C and are practically insoluble in water. Lithium hydroxide is also used in the production of dyes. It has attained some importance as an additive to nickel - iron accumulators and, in its calcined form (98 % LiOH), as an absorbent for carbon dioxide in breathing apparatus, especially for crews of submarines and space vehicles. One gram of anhydrous lithium hydroxide absorbs 450 mL of carbon dioxide, so that ca. 750 g of lithium hydroxide is sufficient to absorb the carbon dioxide generated by one person in one day. Lithium hydroxide is also used in the building industry. As an additive to the mix water, it helps prevent the alkali - silica reaction, which is a cause of deterioration (cracking, disintegration) in portland cement concrete structures. (Wietelmann and Steinbild 2014)
Lithium hydroxide is produced mainly by hydration of lithium carbonate by calcium hydroxide. This production process is modeled in this dataset based on stoichiometric calculations, as well as data from a large chemical plant (Gendorf 2016).
References:
Sutter, J. (2007) Life Cycle Inventories of Highly Pure Chemicals. ecoinvent report No. 19. Swiss Centre for Life Cycle Inventories, Dübendorf, 2007.
Wietelmann, U. and Steinbild, M. 2014. Lithium and Lithium Compounds. Ullmann's Encyclopedia of Industrial Chemistry. 1–38.
Gendorf (2016) Umwelterklärung 2015, Werk Gendorf Industriepark, www.gendorf.de.

## Included activities start
From the reception of lithium carbonate and calcium hydroxide at the factory gate.

## Included activities end
This activity ends with the production of lithium hydroxide. This activity includes the consumption of raw materials and energy, the infrastructure use, as well as the emissions into water. This activity excludes emissions to air.

## Geography
The inventory is modelled for the world. Some values are based on data from a large chemical factory located in Germany. These are assumed to be valid for this geography.

## Technology
Lithium carbonate hydration is one of the most important processes to produce lithium hydroxide. Lithium carbonate is hydrated by calcium hydroxide:
This yields solutions containing up to 3.5 % lithium hydroxide. Attempts to work at higher concentration lead to loss of lithium carbonate in the calcium carbonate residue, because the solubility of lithium carbonate is reduced by the presence of lithium hydroxide. The reaction between these sparingly soluble starting materials requires intensive agitation and gives yields just over 95 % after many hours. The insoluble residue (mainly calcium carbonate) is removed, and lithium hydroxide monohydrate is crystallized from the mother liquor by evaporation, under vacuum if required. It is then separated and dried at 130 –140 °C. Further heating to 150 – 180 °C produces calcined lithium hydroxide (LiOH). The removal of water can be accelerated by use of vacuum.
Other production processes that have been proposed include the reaction of lithium sulfate solution with barium hydroxide and the reaction of lithium carbonate with silicic acid in the molten state followed by hydrolysis of the lithium silicate formed. These processes are, however, of little more than academic interest.
References:
Wietelmann, U. and Steinbild, M. 2014. Lithium and Lithium Compounds. Ullmann's Encyclopedia of Industrial Chemistry. 1–38.

## Time period
Time of publications. Some values are based on data published by the Gendorf factory that were collected between 2011 and 2015. The time period has been adjusted accordingly. For more details, see the comments of the exchanges.

## Reference product
- lithium hydroxide: 1 kg; name RP; source Wietelmann, U. 2004; By-product classification allocatable product; CPC 34220: Zinc oxide; zinc peroxide; chromium oxides and hydroxides; manganese oxides; iron oxides and hydroxides; earth[…]; CAS 1310-65-2
  Lithium hydroxide is a white hygroscopic crystalline material. It is soluble in water, and slightly soluble in ethanol. There are commercial forms of the hydrated and anhydrous variations of lithium hydroxide.
  Lithium hydroxide is used mainly for the production of lubricating greases. Over 50 % of the greases used today in motor vehicles, aircraft, and heavy machinery contain lithium stearates, mainly lithium 12-hydroxystearate. These greases have good viscosity properties up to 200 °C and are practically insoluble in water.
  Lithium hydroxide is also used in the production of dyes. It has attained some importance as an additive to nickel - iron accumulators and, in its calcined form (98 % LiOH), as an absorbent for carbon dioxide in breathing apparatus, especially for crews of submarines and space vehicles. One gram of anhydrous lithium hydroxide absorbs 450 mL of carbon dioxide, so that ca. 750 g of lithium hydroxide is sufficient to absorb the carbon dioxide generated by one person in one day.
  Lithium hydroxide is also used in the building industry. As an additive to the mix water, it helps prevent the alkali - silica reaction, which is a cause of deterioration (cracking, disintegration) in portland cement concrete structures.
  production volume 1.4835e7 kg; name RP_PV
    Na
    Calculated from total Lithium extraction (21500000 kg); Molar ratio of LiOH/Li (3.45); assuming 17% of Li is used for lubricants and lubricants make up 85% of LiOH use.
  property price 2.35 EUR2005
    Temporary price data. Calculated as 90% of purchasers price based on: 2005 import and export prices (total trades (USD) divided by total weight (kg) in biggest economies of the world: EU27, USA, Brasil, China, India, Japan and Russia) from UN Commodity Trade Statistics Database (http://data.un.org/Explorer.aspxDatabase [Accessed 2011.06.20]). Commodity: Lithium oxide and hydroxide
  property carbon content 0
    carbon content on a dry matter basis (reserved; not for manual entry)
  property true value 1.44812; name RP_true_value
    allocation property applied in "true value" allocation // value calculated from revenue
  properties: water in wet mass 0 kg, water content 0, wet mass 1 kg, carbon content, non-fossil 0, dry mass 1 kg, carbon content, fossil 0, carbon allocation 0 kg

## By-products
- heat, for reuse in municipal waste incineration only: 0 MJ; CPC 17300: Steam and hot water; By-product classification allocatable product; pedigree (1,1,1,1,1)
  Net electricity generated from this waste and used in internal MSWI plant energy redistribution.
  Uncertainty: uncertainty is calculated from uncertainties in waste composition and uncertainties in energy efficiency and the uncertainty in internal energy demand
  production volume 440.82 MJ
  property exergy 0.1842 MJ; name E_th_prod_MSWI_exergy
    This exergy property is based on the exergy content of the product.
  property price 0.0106 EUR2005; name E_th_prod_MSWI_price_EUR2005
    Average European district heat price from Ecoheatcool and Euroheat 2005-2006, Ecoheat Work package 1: The European heat market. Final report. 10.6 EUR/GJ i s the price of district heat. http://www.solarthermalworld.org/files/Ecoheatcool%20WP1%20Web.pdf?download
  property true value relation 0.1842; name E_th_prod_MSWI_true_value_relation
    property to calculate "true value" from
  property true value 9.08169e-8
    allocation property applied in "true value" allocation // value calculated from true value relation
- electricity, for reuse in municipal waste incineration only: 0 kWh; CPC 17100: Electrical energy; By-product classification allocatable product; pedigree (1,1,1,1,1)
  (same comment as for heat, for reuse in municipal waste incineration only)
  production volume 62.0672 kWh
  property true value relation 3.6; name E_el_prod_MSWI_true_value_relation
    property to calculate "true value" from
  property price 0.1 EUR2005; name E_el_prod_MSWI_price_EUR2005
    Estimated to be the same price as in case of electricity, medium voltage.
  property exergy 3.6 MJ; name E_el_prod_MSWI_exergy
    This exergy property is based on the exergy content of the product.
  property true value 2.49912e-7
    (same comment as for heat, for reuse in municipal waste incineration only)
- zinc concentrate: 0 kg; CPC 14290: Other non-ferrous metal ores and concentrates (other than uranium or thorium ores and concentrates); By-product classification allocatable product
  Calculated value from the knowledge of the properties of both products.
  production volume 0.000279375 kg
  property price 0.38 EUR2005; name ByP_price_EUR2005
    Temporary price data. Calculated as 90% of purchasers price based on: Zinc content in concentrate 53%. Concentrate price per kg Zn 86.5% of refined Zn price (13.5% treatment charges according to CHR Metals Limited 2005: Dynamic cost curves. http://www.minecost.com/dynamic.pdf). 2004 zinc price from USGS (2007) Mineral commodity summaries 2007. <http://minerals.usgs.gov/minerals/pubs/mcs/2007/mcs2007.pdf> [Accessed 25 May 2010]
  property zinc content 0.53; name zinc_C_zinc_concentrate
    Zinc content on a dry matter basis. Value taken from teh "zinc mine operation" /GLO dataset.
  property dry mass 1 kg; name DM_zinc_concentrate
  property carbon content 0
    carbon content on a dry matter basis (reserved; not for manual entry)
  property true value 1.49062e-13
    allocation property applied in "true value" allocation // value calculated from revenue
  properties: wet mass 1 kg, water content 0, carbon content, non-fossil 0, carbon content, fossil 0, water in wet mass 0 kg, carbon allocation 0 kg

## Inputs from technosphere
- lime, hydrated, loose weight: 0 kg; source Wietelmann, U. 2004; pedigree (1,1,1,1,1)
  Stoechiometric calculation. The yield of reaction is assumed to be 95% in order to obtain the lithium hydroxide.
  Uncertainty: S
  properties: wet mass 1 kg, dry mass 0.997 kg, water content 0.00300903
- electricity, medium voltage: 0.675083 kWh; source Gendorf 2000; lognormal variance with pedigree 0.0104, pedigree (2,3,1,4,3)
  Calculated based on literature data published by the industry. This value is a 5-year average of data (2011 - 2015) published by the Gendorf factory (Gendorf, 2016, Umwelterklärung, www.gendorf.de), (Gendorf, 2015, Umwelterklärung, www.gendorf.de), (Gendorf, 2014, Umwelterklärung, www.gendorf.de). The amount of electricity per kg of chemical substance produced is calculated using literature data published by the Gendorf factory based in Germany, which produces a wide range of chemical substances. The factory produced 1657400 tonnes of chemical substances in the year 2015 (Gendorf, 2016, Umwelterklärung, www.gendorf.de) and 740000 tonnes of intermediate products. The amount of electricity consumed in the year 2015 was 3498800 GJ (Gendorf, 2016, Umwelterklärung, www.gendorf.de). The resulting amount of electricity is 0.406 kWh/kg (year 2015) of chemical substance produced. The 5-year average (2011 - 2015, weighted by production volume) is 0.416 kWh/kg (1.5 MJ/kg). Cross-reference: the amount of chemicals produced (excluding intermediate products) in the EU-28 in the year 2011 was 327 million tonnes (Eurostat, http://ec.europa.eu/eurostat/statistics-explained/index.php/Chemicals_production_statistics, accessed 20170126). The chemical and petrochemical industry sector consumed 2.33 EJ of energy in 2011 (European Commission - Joint Research Centre, 2014, BAT on Common Waste water and Waste Gas Treatment/Management Systems in the Chemical Sector). The resulting energy (both heat and electricity) consumed per kg of chemicals produced in 2011 is thus 7.13 MJ/kg. This is higher than the value calculated using data published by Gendorf – 3.85 MJ/kg, but that is to be expected as the intermediate products are not accounted for.
- chemical factory, organics: 6.49119e-10 unit; lognormal variance with pedigree 0.3098, pedigree (2,3,1,4,3)
  Calculated based on literature data published by the industry. For this activity, no information was readily available concerning infrastructure and land-use. Therefore, the infrastructure is estimated based on data from two chemical factories, the BASF site of Ludwigshafen and the chemical factory in Gendorf (which are both located in Germany), which produce a wide range of chemical substances. Based on this data, the following assumptions are made: the built area amounts to about 4.2 ha, the plant has an average output of 50'000 t/a and a lifespan of fifty years. The estimated infrastructure amount is therefore 4.00 E-10 units per kg of produced chemical.
  References:
  Althaus H.-J., Chudacoff M., Hischier R., Jungbluth N., Osses M. and Primas A. (2007) Life Cycle Inventories of Chemicals. ecoinvent report No. 8, v2.0. EMPA Dübendorf, Swiss Centre for Life Cycle Inventories, Dübendorf, CH.
  Gendorf (2000) Umwelterklärung 2000, Werk Gendorf. Werk Gendorf, Burgkirchen.
- heat, district or industrial, natural gas: 3.48901 MJ; source Gendorf 2000; lognormal variance with pedigree 0.0104, pedigree (2,3,1,4,3)
  Calculated based on literature data published by the industry. This value is a 5-year average of data (2011 - 2015) published by the Gendorf factory (Gendorf, 2016, Umwelterklärung, www.gendorf.de), (Gendorf, 2015, Umwelterklärung, www.gendorf.de), (Gendorf, 2014, Umwelterklärung, www.gendorf.de). The amount of heat used per kg of chemical substance produced is calculated using literature data published by the Gendorf factory based in Germany, which produces a wide range of chemical substances. The factory produced 1657400 tonnes of chemical substances in the year 2015 (Gendorf, 2016, Umwelterklärung, www.gendorf.de) and 740000 tonnes of intermediate products. The amount of heat in the year 2015 was 523500 GJ (Gendorf, 2016, Umwelterklärung, www.gendorf.de) of which 90% was obtained from natural gas and 10% from steam. The resulting amount of heat from natural gas is 2.02 MJ/kg of chemical product produced. The 5-year average (2011 - 2015, weighted by production volume) is 2.15 MJ/kg. Cross-reference: the amount of chemicals produced (excluding intermediate products) in the EU-28 in the year 2011 was 327 million tonnes (Eurostat, http://ec.europa.eu/eurostat/statistics-explained/index.php/Chemicals_production_statistics, accessed 20170126). The chemical and petrochemical industry sector consumed 2.33 EJ of energy in 2011 (European Commission - Joint Research Centre, 2014, BAT on Common Waste water and Waste Gas Treatment/Management Systems in the Chemical Sector). The resulting energy (both heat and electricity) consumed per kg of chemicals produced in 2011 is thus 7.13 MJ/kg. This is higher than the value calculated using data published by Gendorf – 3.85 MJ/kg, but that is to be expected as the intermediate products are not accounted for.
- tap water: 0.0421927 kg; lognormal variance with pedigree 0.0104, pedigree (2,3,1,4,3)
  Calculated based on literature data published by the industry. This value is a 5-year average of data (2011 - 2015) published by the Gendorf factory (Gendorf, 2016, Umwelterklärung, www.gendorf.de), (Gendorf, 2015, Umwelterklärung, www.gendorf.de), (Gendorf, 2014, Umwelterklärung, www.gendorf.de). The amount of tap water per kg of chemical substance produced is calculated using literature data published by the Gendorf factory based in Germany, which produces a wide range of chemical substances. The factory produced 1657400 tonnes of chemical substances in the year 2015 (Gendorf, 2016, Umwelterklärung, www.gendorf.de) and 740000 tonnes of intermediate products. The amount of tap water consumed in the year 2015 was 55100 tonnes (Gendorf, 2016, Umwelterklärung, www.gendorf.de). The resulting amount of tap water is 0.023 kg/kg of chemical product produced. The 5-year average (2011 - 2015, weighted by production volume) is 0.026 kg/kg.
  properties: wet mass 1 kg, dry mass 0.000337476 kg, water content 2962.17, carbon content, fossil 0.00178991
  note on carbon content, fossil: Bicarbonate content is 2.93 mol/m3. CO2 content is 0.1 mol/m3 (ecoinvent v2.2 report 8, Tab 93.1).
- wastewater, average: 0 m3; name BP_wastewater_average; pedigree (1,1,1,1,1)
  Calculated based on literature data published by the industry. This value is a 5-year average of data (2011 - 2015) published by the Gendorf factory (Gendorf, 2016, Umwelterklärung, www.gendorf.de), (Gendorf, 2015, Umwelterklärung, www.gendorf.de), (Gendorf, 2014, Umwelterklärung, www.gendorf.de). The amount of wastewater (which is later on treated in the municipal WWTP) per kg of chemical substance produced is calculated using literature data published by the Gendorf factory based in Germany, which produces a wide range of chemical substances. The factory produced 1657400 tonnes of chemical substances in the year 2015 (Gendorf, 2016, Umwelterklärung, www.gendorf.de) and 740000 tonnes of intermediate products. The amount of wastewater which is later on treated in the municipal WWTP in the year 2015 was 1200 tonnes (Gendorf, 2016, Umwelterklärung, www.gendorf.de). The resulting amount of wastewater is 2.7E-06 m3/kg of chemical product produced.
  production volume 0 m3
    Calculated from the production volume of lithium hydroxide in proportion to the respective output amounts.
  property price 0 EUR2005; name BP_wastewater_average_price_EUR2005
  properties: dry mass 0.346837 kg, carbon content, non-fossil 0.194039, water content 2882.2, wet mass 1000 kg
  note on carbon content, non-fossil: 0.0673 kg TOC/m3 (Tab A.17, ecoinvent v2.2 report 13_I). TOC was considered as Total Carbon.
- heat, from steam, in chemical industry: 0 MJ; pedigree (1,1,1,1,1)
  Calculated based on literature data published by the industry. This value is a 5-year average of data (2011 - 2015) published by the Gendorf factory (Gendorf, 2016, Umwelterklärung, www.gendorf.de), (Gendorf, 2015, Umwelterklärung, www.gendorf.de), (Gendorf, 2014, Umwelterklärung, www.gendorf.de). The amount of heat used per kg of chemical substance produced is calculated using literature data published by the Gendorf factory based in Germany, which produces a wide range of chemical substances. The factory produced 1657400 tonnes of chemical substances in the year 2015 (Gendorf, 2016, Umwelterklärung, www.gendorf.de) and 740000 tonnes of intermediate products. The amount of heat in the year 2015 was 523500 GJ (Gendorf, 2016, Umwelterklärung, www.gendorf.de) of which 90% was obtained from natural gas and 10% from steam. The resulting amount of heat from steam is 0.22 MJ/kg of chemical product produced. The 5-year average (2011 - 2015, weighted by production volume) is 0.20 MJ/kg. Cross-reference: the amount of chemicals produced (excluding intermediate products) in the EU-28 in the year 2011 was 327 million tonnes (Eurostat, http://ec.europa.eu/eurostat/statistics-explained/index.php/Chemicals_production_statistics, accessed 20170126). The chemical and petrochemical industry sector consumed 2.33 EJ of energy in 2011 (European Commission - Joint Research Centre, 2014, BAT on Common Waste water and Waste Gas Treatment/Management Systems in the Chemical Sector). The resulting energy (both heat and electricity) consumed per kg of chemicals produced in 2011 is thus 7.13 MJ/kg. This is higher than the value calculated using data published by Gendorf – 3.85 MJ/kg, but that is to be expected as the intermediate products are not accounted for.
- lithium carbonate: 1.6228 kg; source Wietelmann, U. 2004; lognormal variance with pedigree 0.036, pedigree (4,5,1,1,1)
  Stoechiometric calculation (functional unit). The yield of reaction is assumed to be 95% in order to obtain the lithium hydroxide.
  Uncertainty: S
  properties: dry mass 1 kg, wet mass 1 kg, carbon content, fossil 0.16255
- inert waste: 0 kg; name BP_inert_waste
  Calcium carbonate (lime) is produced as byproduct of the reaction. It is assumed to be discarded as waste.
  production volume 0 kg
    (same comment as for wastewater, average)
  property price 0 EUR2005; name BP_inert_waste_price_EUR2005
  properties: wet mass 1 kg, dry mass 1 kg
- lime, hydrated, loose weight: 0.0136591, 1.60914 kg (2 entries); source Wietelmann, U. 2004; lognormal variance with pedigree 0.036, pedigree (4,5,1,1,1)
  (same comment as for lime, hydrated, loose weight)
- wastewater, average: -1.36907e-6, -1.48107e-7, -2.86438e-6 m3 (3 entries); lognormal variance with pedigree 0.0104, pedigree (2,3,1,4,3)
  (same comment as for wastewater, average)
  production volume 65.0003 m3
- heat, from steam, in chemical industry: 0.0486468, 0.275913 MJ (2 entries); lognormal variance with pedigree 0.0104, pedigree (2,3,1,4,3)
  (same comment as for heat, from steam, in chemical industry)
- inert waste: -0.459546, -0.00395793, -1.61984 kg (3 entries)
  (same comment as for inert waste)
  production volume 3.09065e7 kg

## Inputs from nature
- Water, cooling, unspecified natural origin [natural resource, in water]: 0.0266139 m3; lognormal variance with pedigree 0.0104, pedigree (2,3,1,4,3)
  Calculated based on literature data published by the industry. This value is a 5-year average of data (2011 - 2015) published by the Gendorf factory (Gendorf, 2016, Umwelterklärung, www.gendorf.de), (Gendorf, 2015, Umwelterklärung, www.gendorf.de), (Gendorf, 2014, Umwelterklärung, www.gendorf.de). The amount of water for cooling extracted per kg of chemical substance produced is calculated using literature data published by the Gendorf factory based in Germany, which produces a wide range of chemical substances. The factory produced 1657400 tonnes of chemical substances in the year 2015 (Gendorf, 2016, Umwelterklärung, www.gendorf.de) and 740000 tonnes of intermediate products. The reported amounts of water extracted as groundwater and surface water (river) are assumed to be used entirely for cooling purposes.
- Water, well, in ground [natural resource, in water]: 0.00134692 m3; lognormal variance with pedigree 0.0104, pedigree (2,3,1,4,3)
  Calculated based on literature data published by the industry. This value is a 5-year average of data (2011 - 2015) published by the Gendorf factory (Gendorf, 2016, Umwelterklärung, www.gendorf.de), (Gendorf, 2015, Umwelterklärung, www.gendorf.de), (Gendorf, 2014, Umwelterklärung, www.gendorf.de). The amount of groundwater and surface water (river) extracted per kg of chemical substance produced is calculated using literature data published by the Gendorf factory based in Germany, which produces a wide range of chemical substances. The factory produced 1657400 tonnes of chemical substances in the year 2015 (Gendorf, 2016, Umwelterklärung, www.gendorf.de) and 740000 tonnes of intermediate products. The amount of groundwater and surface water (river) extracted in the year 2015 was 19950000 tonnes and 21488100 tonnes respectively (Gendorf, 2016, Umwelterklärung, www.gendorf.de).
- Water, river [natural resource, in water]: 0.00139561 m3; lognormal variance with pedigree 0.0104, pedigree (2,3,1,4,3)
  (same comment as for Water, well, in ground)

## Emissions to nature
- Hydroxide [water, surface water]: 0.0372805 kg; lognormal variance with pedigree 0.188, pedigree (4,5,5,5,5)
  Estimation. The remaining amount of unreacted lithium carbonate and calcium hydroxide (5 % of the input) is assumed to leave the production process with the waste water.
  Uncertainty: E
- Water [water, unspecified]: 0.0271007 m3; lognormal variance with pedigree 0.0104, pedigree (2,3,1,4,3)
  Calculated based on literature data published by the industry (Gendorf, 2016, Umwelterklärung, www.gendorf.de). The amount of water released back to the environment consists of the amount of process water treated in the internal WWTP and then released back to the environment and the amount of cooling water released back to the environment.
  property wet mass 1000 kg; name WM
  property fraction, origin: fresh water 0; name fraction_origin_fresh_water_Ww
  property fraction, origin: salt water 0; name fraction_origin_salt_water_Ww
  property fraction, origin: unspecified 1; name fraction_origin_unspecified_Ww
  property water in wet mass 1000 kg; name WWM
  property carbon content, fossil 0; name C_content_fossil
  property carbon content, non-fossil 0; name C_content_non_fossil
  property dry mass 0 kg; name DM
- Carbonate [water, surface water]: 0.0657898 kg; lognormal variance with pedigree 0.448, pedigree (4,5,5,5,5)
  (same comment as for Hydroxide)
- Water [air, unspecified]: 0.00227192 m3; lognormal variance with pedigree 0.0104, pedigree (2,3,1,4,3)
  Calculated to ensure the water balance. In general, in the case of recirculating cooling systems, 77% of the water input evaporates to air. In case of once-through cooling systems, 4% of the water input evaporates to air. The process water has in the chemical industry an average evaporation rate of 20.5%. In the specific case of the Gendorf factory, the calculated evaporation rate based on the data published is 6.3%. This matches the qualitative information, that the majority of the cooling systems in Gendorf are once-through and that the amount of cooling water used is significantly higher than the amount of process water used (Gendorf, 2016, Umwelterklärung, www.gendorf.de).
  property fraction, origin: unspecified 1; name fraction_origin_unspecified
  property fraction, origin: fresh water 0; name fraction_origin_fresh_water
  property fraction, origin: salt water 0; name fraction_origin_salt_water
- Calcium, ion [water, surface water]: 0.0438593 kg; lognormal variance with pedigree 0.448, pedigree (4,5,5,5,5)
  (same comment as for Hydroxide)
- Lithium, ion [water, surface water]: 0.0153508 kg; lognormal variance with pedigree 0.188, pedigree (4,5,5,5,5)
  (same comment as for Hydroxide)

## Sampling procedure
Literature data. Some values are calculated based on data from a large chemical factory located in Germany. For more details, see the comments of the exchanges.

## Review by Gregor Wernet 2017-08-07
This dataset was additionally reviewed in a separate review process by Eric Johnson of Atlantic Consulting as well as Emilia Moreno Ruiz and Gregor Wernet of ecoinvent.
