# treatment of decommissioned road

Dataset: EcoSpold 2, unit process
Geography: RoW
Time period: 1985-01-01 to 2019-12-31
Technology level: current
Classification: EcoSpold01Categories: transport systems/road
Classification: ISIC rev.4 ecoinvent: 3830:Materials recovery
Tags: ConvertedDataset; Treatment
Scenario: Business-as-Usual
System model: Allocation at the point of substitution
Generated by: Michael Spielmann (obsolete)
Published in: Spielmann M. 2007
Database: ecoinvent
isCopyrightProtected: true
accessRestrictedTo: 1

## General comment
Expenditures for the recycling of excavated materials are not considered.
[This dataset was already contained in the ecoinvent database version 2. It was not individually updated during the transfer to ecoinvent version 3. Life Cycle Impact Assessment results may still have changed, as they are affected by changes in the supply chain, i.e. in other datasets. This dataset was generated following the ecoinvent quality guidelines for version 2. It may have been subject to central changes described in the ecoinvent version 3 change report (http://www.ecoinvent.org/database/ecoinvent-version-3/reports-of-changes/), and the results of the central updates were reviewed extensively. The changes added e.g. consistent water flows and other information throughout the database. The documentation of this dataset can be found in the ecoinvent reports of version 2, which are still available via the ecoinvent website. The change report linked above covers all central changes that were made during the conversion process.]

## Included activities end
This module merely contains the excavation and transport activities of road excavation.

## Geography
Data referrs to Swiss conditions

## Technology
Swiss state of the art technology

## Reference product
- decommissioned road: -1 m*year; By-product classification Waste; CPC 39990: Other wastes n.e.c.
  EcoSpold01Location=RER
  production volume 2.67763 m*year
    This is a placeholder value that does not reflect real-world production volumes. This dataset does not currently require a real-world production volume to work in the database framework, and no actual data were collected yet. This has no negative effect on the results of the ecoinvent database.
  property price 0 EUR2005
    Waste products are assigned a price of zero as they are assumed to require further treatment.
  property carbon content, fossil 0.0220896
    Calculated from C content in input materials in the infrastructure
  property carbon content, non-fossil 0
    Calculated from C content in input materials in the infrastructure
  property carbon content 0.0220896
    carbon content on a dry matter basis (reserved; not for manual entry)
  properties: water content 0, dry mass 122 kg, wet mass 122 kg, water in wet mass 0 kg, carbon allocation 2.69493 kg

## Inputs from technosphere
- excavation, skid-steer loader: 0.062 m3; lognormal variance with pedigree 0.1846, pedigree (3,3,5,5,1)
  Literature studies and own calculations
  EcoSpold01Location=RER
  Uncertainty: literature studies and own calculations

## Sampling procedure
own calculations and literature

## Extrapolations
This dataset has been copied from an original dataset covering the geography RER. The uncertainty has been adjusted accordingly.

## Review by Niels Jungbluth 2003-08-29
passed
