# catch crop growing, phacelia, September-October, organic fertiliser 60 kg N

Dataset: EcoSpold 2, unit process
Geography: RoW
Time period: 2011-01-01 to 2019-12-31
Technology level: current
Classification: ISIC rev.4 ecoinvent: 0161:Support activities for crop production
Scenario: Business-as-Usual
System model: Allocation at the point of substitution
Generated by: Thomas Nemecek
Database: ecoinvent
isCopyrightProtected: true
accessRestrictedTo: 1

## General comment
This dataset represents the cultivation of phacelia silage on an area of 1 ha. The dry matter yield is 1544.4 kg/ha. The moisture content of the silage at storage is 75%.

## Included activities start
This activity starts after the harvest of the previous crop. The input of seeds is included. Farm manure as an organic fertiliser - if applied - is only accounted for in terms of direct field emissions; all pre-processes are included in the animal production systems.

## Included activities end
The dataset includes all machine operations and corresponding machine infrastructure and sheds. Machine operations are: soil cultivation, sowing, manuring - if manure is applied -, mowing, haying, swathing, baling, bale loading and transport of silage bales to the farm. Further, direct field emissions are included. This activity ends after the transport of the bales to the farm at the farm gate.

## Technology
Swiss integrated production

## Reference product
- phacelia silage: 1 kg; name REF_PRODUCT; source Lehmann J. 1991; CPC 01919: Forage products, n.e.c.; By-product classification allocatable product
  Dry matter yield per hectare; calculated based on Lehmann (1991): dry matter yield at 25 kg N/ha; 10% added due to higher fertilisation; 10% of silage loss are subtracted (Agridea 2007). --- Sources: AGRIDEA (2007) Landwirtschaftliches Handbuch Pflanzen und Tiere. Wirz Kalender, 2007. Ed. AGRIDEA, Lindau (Switzerland).
  production volume 5.29875e9 kg; = 1500*3571750
    Scaled from Swiss production volume, using the share of Swiss area of temporary pastures and meadows (0.55%) on the world area (FAOSTAT, year 2011), scaling factor = 182.
  property energy content 17.17 MJ
    Approximation by sunflower: Gross calorific value of 'Sonnenblumenganzpflanze, vor Blüte, Silage' in Swiss Feed Database ('Schweizerische Futtermitteldatenbank. V1.0'; http://www.feed-alp.admin.ch/start.php?action=adv_search&cmd=list_feed).
  property carbon content, non-fossil 0.39688; name REF_PRODUCT_C_content_non_fossil
    Approximation by sunflower: Composition data obtained from 'Sonnenblumenganzpflanze, vor Blüte, Silage' in Swiss Feed Database ('Schweizerische Futtermitteldatenbank. V1.0'; http://www.feed-alp.admin.ch/start.php?action=adv_search&cmd=list_feed). First, composition data were refered to 1 kg dry mass. Then, C-contents were calculated considering a C-content/dry mass of 44% in carbohydrates (including fibres), 53% in proteins and 75% in fats. All data from ecoinvent report, n 15a, pg 40, except C-content in protein, that comes from Determination of protein concentration by total organic carbon analysis, Rouwenhorst et al., 1991, J Biochem and Biophys Methods, 22:119-128.
  property price 0.033 EUR2005; name REF_PRODUCT_price_EUR2005
    Assumed the same price of barley silage to phacelia silage, based on data for 2016 in Manitoba (Canada) [https://www.gov.mb.ca/agriculture/business-and-economics/financial-management/pubs/cop_forage_cerealsilage.pdf].
  property dry mass 1 kg; name REF_PRODUCT_DM
  property carbon content 0.39688
    carbon content on a dry matter basis (reserved; not for manual entry)
  properties: wet mass 4 kg, carbon allocation 0.39688 kg

## Inputs from technosphere
- baling: 0.00571426 unit; source Nemecek, T. 2007; lognormal variance with pedigree 0.0092, pedigree (2,1,4,1,1)
  Calculated from fresh matter yield (25% dry matter content) and bale weigth of 700 kg (fresh matter; Nemecek 2007).
- bale loading: 0.00571426 unit; source Nemecek, T. 2007; lognormal variance with pedigree 0.0092, pedigree (2,1,4,1,1)
  (same comment as for baling)
- haying, by rotary tedder: 0.001295 ha; source Boessinger M. 2004; lognormal variance with pedigree 0.0092, pedigree (2,1,4,1,1)
  Assumption based on the number of cuts and current practice in Switzerland (cf. Boessinger et. al 2004)
- tillage, cultivating, chiselling: 0.000647501 ha; source Boessinger M. 2004; lognormal variance with pedigree 0.0092, pedigree (2,1,4,1,1)
  (same comment as for haying, by rotary tedder)
- liquid manure spreading, by vacuum tanker: 0.0298846 m3; source Flisch R. 2009; lognormal variance with pedigree 0.0092, pedigree (2,1,4,1,1)
  Calculated based on the amount of applied nitrogen. Data on nutrient content of slurry from Flisch (2009). Slurry represents the only input of nitrogen.
- tillage, harrowing, by rotary harrow: 0.000647501 ha; source Boessinger M. 2004; lognormal variance with pedigree 0.0092, pedigree (2,1,4,1,1)
  (same comment as for haying, by rotary tedder)
- transport, tractor and trailer, agricultural: 0.001 metric ton*km; lognormal variance with pedigree 0.1364, pedigree (4,1,4,1,1)
  Transport of silage bales to farm; distance 1 km.
- tillage, rolling: 0.000647501 ha; source Boessinger M. 2004; lognormal variance with pedigree 0.0092, pedigree (2,1,4,1,1)
  (same comment as for haying, by rotary tedder)
- swath, by rotary windrower: 0.000647501 ha; source Boessinger M. 2004; lognormal variance with pedigree 0.0092, pedigree (2,1,4,1,1)
  (same comment as for haying, by rotary tedder)
- sowing: 0.000647501 ha; source Boessinger M. 2004; lognormal variance with pedigree 0.0092, pedigree (2,1,4,1,1)
  (same comment as for haying, by rotary tedder)
- mowing, by rotary mower: 0.000647501 ha; source Boessinger M. 2004; lognormal variance with pedigree 0.0092, pedigree (2,1,4,1,1)
  (same comment as for haying, by rotary tedder)
- beet seed, Swiss integrated production, for sowing: 0.00518001 kg; name SEED; source Lehmann J. 1991; lognormal variance with pedigree 0.0092, pedigree (2,1,4,1,1)
  Approximation for phacelia seed.
  property energy content 15.3935 MJ; name SEED_energy_content
  property dry mass 0.85 kg; name SEED_DM
  property carbon content, non-fossil 0.464601; name SEED_C_content_non_fossil
  properties: wet mass 1 kg, water content 0.176471
  note on energy content: See "01_crop production - seed production & processing_v1.0.pdf" - pdf-document on the dedicated talk page of ecoinvent (www.ecoinvent.org/documentation)
  note on carbon content, non-fossil: biogene carbon content on a dry matter basis Wheat values are used to model sugar beet seeds. Composition data obtained from Wheat, soft red winter, in (http://www.nal.usda.gov/fnic/foodcomp/search/). First, composition data were refered to 1 kg dry mass. Then, C-contents were calculated considering a C-content/dry mass of 46% in carbohydrates (including fibres), 53% in proteins and 75% in fats. All data from "Evolutionary and Biochemical Aspects", A.D. Kay and T. Vrede (in Global Ecology, 2010, Elsevier B.V., S.E. Jørgensen Ed.).

## Inputs from nature
- Occupation, annual crop [natural resource, land]: 1.0821 m2*year; lognormal variance with pedigree 0.0109, pedigree (2,1,4,1,1)
  Modelled, see chapter 'Land use' in "01_crop production_direct field emissions and natural resources_v1.0.pdf" - pdf-document on the dedicated talk page of ecoinvent (www.ecoinvent.org/documentation)
- Transformation, from annual crop [natural resource, land]: 6.47501 m2; lognormal variance with pedigree 0.0169, pedigree (2,1,4,1,1)
  (same comment as for Occupation, annual crop)
- Energy, gross calorific value, in biomass [natural resource, biotic]: 17.17 MJ; lognormal variance with pedigree 0.0499, pedigree (2,3,4,3,4)
  (same comment as for phacelia silage)
- Carbon dioxide, in air [natural resource, in air]: 1.44773 kg; = 44/12 * (REF_PRODUCT_C_content_non_fossil * REF_PRODUCT * REF_PRODUCT_DM - SEED_C_content_non_fossil * SEED * SEED_DM); lognormal variance with pedigree 0.0498, pedigree (2,2,4,1,1)
  Modelled,see chapter 'CO2 binding' in "01_crop production_direct field emissions and natural resources_v1.0.pdf" - pdf-document on the dedicated talk page of ecoinvent (www.ecoinvent.org/documentation)
- Transformation, to annual crop [natural resource, land]: 6.47501 m2; lognormal variance with pedigree 0.0169, pedigree (2,1,4,1,1)
  (same comment as for Occupation, annual crop)

## Emissions to nature
- Mercury [soil, agricultural]: 4.92923e-7 kg; lognormal variance with pedigree 0.0498, pedigree (2,2,4,1,1)
  Modelled, see chapter 'Emissions of heavy metals to agricultural soil, surface water and ground water' in "01_crop production_direct field emissions and natural resources_v1.0.pdf" - pdf-document on the dedicated talk page of ecoinvent (www.ecoinvent.org/documentation)
- Zinc, ion [water, surface water]: 9.2489e-9 kg; lognormal variance with pedigree 0.0951, pedigree (2,2,4,1,1)
  (same comment as for Mercury)
- Chromium [soil, agricultural]: -4.59298e-6 kg
  (same comment as for Mercury)
- Lead [water, surface water]: 1.94606e-12 kg; lognormal variance with pedigree 0.0951, pedigree (2,2,4,1,1)
  (same comment as for Mercury)
- Dinitrogen monoxide [air, non-urban air or from high stacks]: 0.00162994 kg; name N2O; lognormal variance with pedigree 0.0498, pedigree (2,2,4,1,1)
  Modelled, see chapter 'Emissions of N2O to the air' in "01_crop production_direct field emissions and natural resources_v1.0.pdf" - pdf-document on the dedicated talk page of ecoinvent (www.ecoinvent.org/documentation)
- Zinc [soil, agricultural]: 0.000176148 kg; lognormal variance with pedigree 0.0498, pedigree (2,2,4,1,1)
  (same comment as for Mercury)
- Ammonia [air, non-urban air or from high stacks]: 0.0187181 kg; lognormal variance with pedigree 0.017, pedigree (2,2,4,1,1)
  Modelled with the 'AGRAMMON model' described in "01_crop production_direct field emissions and natural resources_v1.0.pdf" - pdf-document on the dedicated talk page of ecoinvent (www.ecoinvent.org/documentation)
- Phosphate [water, surface water]: 7.91261e-5 kg; lognormal variance with pedigree 0.0498, pedigree (2,2,4,1,1)
  Modelled, see chapter 'Emissions of phosphorous to the water' in "01_crop production_direct field emissions and natural resources_v1.0.pdf" - pdf-document on the dedicated talk page of ecoinvent (www.ecoinvent.org/documentation)
- Cadmium [soil, agricultural]: 1.93428e-7 kg; lognormal variance with pedigree 0.0498, pedigree (2,2,4,1,1)
  (same comment as for Mercury)
- Lead [soil, agricultural]: 4.79761e-6 kg; lognormal variance with pedigree 0.0498, pedigree (2,2,4,1,1)
  (same comment as for Mercury)
- Nitrate [water, ground-]: 0.122932 kg; lognormal variance with pedigree 0.0498, pedigree (2,2,4,1,1)
  Modelled with the 'SALCA-NO3 model' described in "01_crop production_direct field emissions and natural resources_v1.0.pdf" - pdf-document on the dedicated talk page of ecoinvent (www.ecoinvent.org/documentation)
- Chromium, ion [water, ground-]: 9.46034e-6 kg; lognormal variance with pedigree 0.0951, pedigree (2,2,4,1,1)
  (same comment as for Mercury)
- Zinc, ion [water, ground-]: 1.68395e-5 kg; lognormal variance with pedigree 0.0951, pedigree (2,2,4,1,1)
  (same comment as for Mercury)
- Lead [water, ground-]: 1.14646e-7 kg; lognormal variance with pedigree 0.0951, pedigree (2,2,4,1,1)
  (same comment as for Mercury)
- Chromium, ion [water, surface water]: 3.67774e-9 kg; lognormal variance with pedigree 0.0951, pedigree (2,2,4,1,1)
  (same comment as for Mercury)
- Nickel, ion [water, surface water]: 4.57485e-11 kg; lognormal variance with pedigree 0.0951, pedigree (2,2,4,1,1)
  (same comment as for Mercury)
- Copper, ion [water, surface water]: 1.12277e-9 kg; lognormal variance with pedigree 0.0951, pedigree (2,2,4,1,1)
  (same comment as for Mercury)
- Copper [soil, agricultural]: 4.12297e-5 kg; lognormal variance with pedigree 0.0498, pedigree (2,2,4,1,1)
  (same comment as for Mercury)
- Cadmium, ion [water, surface water]: 1.77461e-11 kg; lognormal variance with pedigree 0.0951, pedigree (2,2,4,1,1)
  (same comment as for Mercury)
- Phosphate [water, ground-]: 2.56239e-5 kg; lognormal variance with pedigree 0.0498, pedigree (2,2,4,1,1)
  (same comment as for Phosphate)
- Nitrogen oxides [air, non-urban air or from high stacks]: 0.000342288 kg; = 0.21*N2O; lognormal variance with pedigree 0.0498, pedigree (2,2,4,1,1)
  Modelled, see chapter 'Emissions of NOx to the air' in "01_crop production_direct field emissions and natural resources_v1.0.pdf" - pdf-document on the dedicated talk page of ecoinvent (www.ecoinvent.org/documentation)
- Copper, ion [water, ground-]: 2.25951e-6 kg; lognormal variance with pedigree 0.0951, pedigree (2,2,4,1,1)
  (same comment as for Mercury)
- Cadmium, ion [water, ground-]: 1.1183e-8 kg; lognormal variance with pedigree 0.0951, pedigree (2,2,4,1,1)
  (same comment as for Mercury)
- Nickel [soil, agricultural]: 5.13882e-6 kg; lognormal variance with pedigree 0.0498, pedigree (2,2,4,1,1)
  (same comment as for Mercury)
- Mercury [water, ground-]: 6.89977e-9 kg; lognormal variance with pedigree 0.0951, pedigree (2,2,4,1,1)
  (same comment as for Mercury)

## Sampling procedure
Data collected from literature and expert knowledge; some own estimates.

## Extrapolations
This dataset was copied from a local dataset covering the geography CH.
