# electricity production, lignite

Dataset: EcoSpold 2, unit process
Geography: RU
Time period: 2016-01-01 to 2019-12-31
Technology level: modern
Classification: ISIC rev.4 ecoinvent: 3510:Electric power generation, transmission and distribution
Classification: EcoSpold01Categories: lignite/power plants
Synonyms: sub-bituminous coal; brown coal
Tags: coal power; consequential version only; marginal; fossil fuels; lignite power
Scenario: Business-as-Usual
System model: Allocation at the point of substitution
Generated by: Christian Bauer
Published in: Röder, A. 2007
Database: ecoinvent
isCopyrightProtected: true
accessRestrictedTo: 1

## General comment
This dataset represents the production of high voltage electricity in a modern lignite power plant. 'Lignite' is used as representant for 'brown coal', which includes sub-bituminous coal and lignite according to the definition of the IEA electricity information 2014. This activity is only used in the consequential version of the database; currently, lignite is not used for power generation in this country, but is supposed to contribute to capacity replacement/expansion until 2030.
Comments on the inventory data of emissions:
- for the assessment of main characteristics (sulphur and ash content of coal, efficiency of the plant) and CO2 a bottom-up approach has been used. It consists in the collection of information about single plants.
- Halogene emissions have been estimated on the basis of the content of the species in the country-specific coal input mix, assuming average retention rates.
- For CO and particle emissions average values for the former UCTE are included (Union for the Coordination of the Transmission of Electricity, since 2009 replaced by ENTSO-E European Network of Transmission System Operators for Electricity).
- The country specific emissions of N2O depend on the share of DeNOx. - Emissions of trace elements were calculated by means of a formula (CORINAIR) using the ash content in the country-specific coal input mix and average transfer coefficients for coal power plants, taking into account the share of DeSOx installed.
- Emission of uranium and thorium radioactive isotopes were assumed proportional to the corresponding element emitted with particles; the other non-gaseous radioactive isotopes of the uranium and thorium decay chain were assumed proportional to the emitted U-238 or Th-232.
- The emission of gaseous radon and K-40 are taken from the literature.
IEA. 2009. Coal information, 2009 edition. Documentation for beyond 2020 files. International Energy Agency.
European Environment Agency (1991) CORINAIR Inventory; VOC's Default Emission Factors

## Included activities start
From the constructed lignite power plant ready to produce electricity.

From reception of lignite and operating materials at power plant gate.

## Included activities end
This activity ends with 1kWh of high voltage electricity produced at the power plant and arrived at the busbar.

This dataset includes:
- all operation and maintenance activities and materials of the power plants.

- Particle removal (dedusting of the flue gas)
- Desulfurisation and denitrification. These processes are described in separate modules; it can be decided by changing the values of NOx and SOx retained whether and how much DeNOx and DeSOx are installed.
- Cooling: It is assumed that all plants use wet cooling with a cooling tower. No cooling tower is included in this dataset (will be implemented in future versions)
- Loss of feed water
- Losses from gross electricity production, e.g. for internal use

This dataset doesn't include
- raw materials extraction, decommissioning and waste treatment as these activities are already included in the infrastructure datasets
- transformation of the electricity produced
- The disposal of non-recycled ashes is modelled separately.
- Use of fuel oil for startup, as this can be neglected for lignite power plants because these are run for a long time (2-3 years) without being shut down.

## Technology
Lignite power plant input is a dataset which consists of a mix of 30% 100MW power plant and 70% 500MW power plant. The plants are used for basic load with 6000 hours of operation at full capacity per year. The plants are assumed to operate 200000 hours during its lifetime.
OTHER DATA:
- Share of installed capacity with desulfurisation: 20% (rough estimation based on sulfur mass balance
- Average efficiency of desulfurisation installations: 92% (rough estimation based on Dones et al. 2007
- Share of installed capacity with denitrification: 73% (figure based on IEA 2012 )
- Average efficiency of denitrification installations: 80% (estimation based on Dones et al. 2007, p.128. Valid for selective catalytic reaction systems)
- Share of installed capacity with particle filters: 98% (figure based on IEA 2012 )
- Average efficiency of particle filters: 98% (figure based on IEA 2012 )
Sources :
1) Victoria: http://new.dpi.vic.gov.au/energy-future/our-energy-story/energy-in-victoria/resources-in-victoria-map
2) Queensland: http://www.dme.qld.gov.au/Energy/power_stations.cfm
3) New South Wales: http://www.industry.nsw.gov.au/energy/electricity/generation
4) Map of Fossil Fuel Power Stations in Australia, DEWHA, http://www.ga.gov.au/fossil_fuel/
5) IEA 2012. Coal Power Database. International Energy Agency Clean Coal Centre, London
6) Australian National Pollutant Inventory, http://www.npi.gov.au/
7) IEA/OECD. 2010. Electricity Information 2010. International Energy Agency (IEA), Paris Cedex (FR). Part IV. Detailed OECD Electricity And Heat Data.
8) Dones, R., Bauer, C., Röder, A. (2007) Kohle. In: Dones, R. (Ed.) et al., Sachbilanzen von Energiesystemen: Grundlagen für den ökologischen Vergleich von Energiesystemen und den Einbezug von Energiesystemen in Ökobilanzen für die Schweiz. Final report ecoinvent No. 6-VI, Paul Scherrer Institut Villigen, Swiss Centre for Life Cycle Inventories, Dübendorf, CH.

## Time period
Annual production volume in 2017 is zero. Activity is needed for the consequential electricity market and implemented into the database via manual "market override".

## Parameters
- gross electricity production: 0 kWh; name gross_electricity; pedigree (1,1,1,1,1)
  APV=0; not part of the current consumption mix, but supposed to contribute to capacity replacement/expansion until 2030.
- fraction, cooling water, to air: 0.0299662; name fraction_CW_to_air; = (WConsumption_EP_HC_recirculatingCS*recirculating_CS_fraction_from_allCS+WConsumption_EP_HC_once_through_andCP_CS*once_through_andCP_CS_fractio_from_allCS)/(WWithdrawal_EP_HC_recirculating_CS*recirculating_CS_fraction_from_allCS+WWithdrawal_EP_HC_once_through_andCP_CS*once_through_andCP_CS_fractio_from_allCS); lognormal variance with pedigree 0.092025, pedigree (4,4,3,2,4)
  Calculated
  nan
- recirculating cooling system as a fraction of all cooling systems: 0.375 dimensionless; name recirculating_CS_fraction_from_allCS; lognormal variance with pedigree 0.092025, pedigree (4,4,3,2,4)
  Calculated as an average of data available for Europe (Floerke, 2008, Future changes of freshwater needs in the electricity production sector) and USA (NERL, 2011, Estimating freshwater needs to meet future thermoelectric generation requirements).
  nan
- water consumption, electricity production from hard coal, once-through and cooli: 0.0014 m3/kWh; name WConsumption_EP_HC_once_through_andCP_CS; lognormal variance with pedigree 0.092025, pedigree (4,4,3,2,4)
  Estimated based on literature (Scown, 2011, Water Footprint of U.S. Transportation Fuels, SI). The amount of water consumed while burning lignite and peat is assumed to be the same as in case of coal.
  nan
- losses from gross electricity production: 0.07 dimensionless; name gross_net_electricity; lognormal variance with pedigree 0.017225, pedigree (4,3,1,2,3)
  Literature value. Own use of electricity plants in this country in 2012. The default loss as described by the IEA in the electricity statistic is applied, which is 0.07 (IEA electricity information 2014: The difference between gross and net electricity production is generally observed to be about 7% for conventional thermal stations, 1% for hydro stations and 6% for nuclear.)
  IEA. 2014. Electricity Information 2014. ISBN 978-92-64-21692-1. International Energy Agency (IEA), Paris Cedex (FR).
  nan
  Uncertainty: generic IEA value used
- fraction, water, decarbonised, to air: 0.0299662; name fraction_WDC_to_air; = fraction_CW_to_air; lognormal variance with pedigree 0.092025, pedigree (4,4,3,2,4)
  Calculated value. See comments in the other parametres present in this dataset. Decarbonised water is considered to be always used as cooling water, thus cooling water fractions to air are applied to all carbonised water input flows to calculate the amount of water consumed in the processes.
  nan
- water consumption, electricity production from hard coal, recirculating CS: 0.0018 m3/kWh; name WConsumption_EP_HC_recirculatingCS; lognormal variance with pedigree 0.092025, pedigree (4,4,3,2,4)
  (same comment as for water consumption, electricity production from hard coal, once-through)
- water withdrawal, electricity production from hard coal, recirculating CS: 0.0021 m3/kWh; name WWithdrawal_EP_HC_recirculating_CS; lognormal variance with pedigree 0.092025, pedigree (4,4,3,2,4)
  Estimated based on literature (Scown, 2011, Water Footprint of U.S. Transportation Fuels, SI). The amount of water withdrawn while burning lignite and peat is assumed to be the same as in case of coal.
  nan
- fraction, water, completely softened, to air: 0.15; name fraction_WCS_to_air; = fraction_PW_to_air; lognormal variance with pedigree 0.092025, pedigree (4,4,3,2,4)
  Calculated value. See comment in the other parametres present in this dataset. Water, completely softened is considered to be always used as process water, thus process water fractions to air are applied to all water, completely softened input flows to calculate the amount of water consumed in the processes.
  nan
- efficiency: 0.388 dimensionless; lognormal variance with pedigree 0.003325, pedigree (3,2,1,2,2)
  Value represents best performing supply region average in 2014, US-WECC, assumed to be representative for capacity expansion between today and 2030. Literature value/calculated value. Net electrical efficiency based on the lower heating value (LHV).
  For all OECD countries, the IEA Electricity information 2014 provides data for the year 2012 on fuel input (TJ, Net calorific value NCV) and gross electricity production (GWh) as well as heat production (TJ) in tables 8 and 9 for each country for electricity only and Combined Heat and Power (CHP) plants each. Together with the information on own use (see parameter 'losses'), the net electrical efficiency based on the NCV is calculated.
  For all non-OECD countries, data from the IEA Energy balances of non-OECD countries 2014 have been used. These tables do not always provide information on how much of the electricity has been produced in electricity only and in CHP plants, but often give the total value only.
  IEA. 2014. Electricity Information 2014. ISBN 978-92-64-21692-1. International Energy Agency (IEA), Paris Cedex (FR).
  IEA/OECD. 2014. Energy balances of non-OECD countries 2014. International Energy Agency (IEA), Paris Cedex (FR).
  output relative to input (requires additional specification)
- fraction, process water, to air: 0.15 dimensionless; name fraction_PW_to_air; lognormal variance with pedigree 0.092025, pedigree (4,4,3,2,4)
  Literature value. In case when no industry/process specific data are available, default evaporation fraction value is used. This value is 15% and is based on literature (Statistics Canada, 2007 & Shaffer, K.H., 2008, Consumptive water use in the Great Lakes Basin, USGS & Shiklomanov, 2003, World Water Resources at the Beginning of the 21st Century) and has been approved by an expert.
  nan
- water withdrawal, electricity production from hard coal, once-through and coolin: 0.0815 m3/kWh; name WWithdrawal_EP_HC_once_through_andCP_CS; lognormal variance with pedigree 0.092025, pedigree (4,4,3,2,4)
  (same comment as for water withdrawal, electricity production from hard coal, recirculating)
- once-through and cooling pond cooling systems as a fraction of all cooling syste: 0.625 dimensionless; name once_through_andCP_CS_fractio_from_allCS; lognormal variance with pedigree 0.092025, pedigree (4,4,3,2,4)
  (same comment as for recirculating cooling system as a fraction of all cooling systems)
- factor: input of MJ for the production of 1 kWh: 9.27835 MJ/kWh; name factor_MJ_kWh; = 1*3.6/efficiency; lognormal variance with pedigree 0.0532, pedigree (4,4,3,4,4)
  Calculated value. 3.6 MJ = 1kWh.
  nan

## Reference product
- electricity, high voltage: 1 kWh; name electricity; CPC 17100: Electrical energy; By-product classification allocatable product
  production volume 0 kWh; name electricity_apv
    (same comment as for gross electricity production)
  property price 0.0977 EUR2005
    Temporary price data. Calculated as 90% of purchasers price based on: 94% of the average price (to account for a 6% loss in transformation and transmission) for electricity for industrial consumersin 2005 (excluded taxes). From IEA.
  property true value 0.0977; name electricity_true_value
    allocation property applied in "true value" allocation // value calculated from revenue

## By-products
- heat, for reuse in municipal waste incineration only: 0 MJ; CPC 17300: Steam and hot water; By-product classification allocatable product; pedigree (1,1,1,1,1)
  Net electricity generated from this waste and used in internal MSWI plant energy redistribution.
  Uncertainty: uncertainty is calculated from uncertainties in waste composition and uncertainties in energy efficiency and the uncertainty in internal energy demand
  property exergy 0.1842 MJ; name E_th_prod_MSWI_exergy
    This exergy property is based on the exergy content of the product.
  property price 0.0106 EUR2005; name E_th_prod_MSWI_price_EUR2005
    Average European district heat price from Ecoheatcool and Euroheat 2005-2006, Ecoheat Work package 1: The European heat market. Final report. 10.6 EUR/GJ i s the price of district heat. http://www.solarthermalworld.org/files/Ecoheatcool%20WP1%20Web.pdf?download
  property true value relation 0.1842; name E_th_prod_MSWI_true_value_relation
    property to calculate "true value" from
  property true value 5.28964e-10
    allocation property applied in "true value" allocation // value calculated from true value relation
- electricity, for reuse in municipal waste incineration only: 0 kWh; CPC 17100: Electrical energy; By-product classification allocatable product; pedigree (1,1,1,1,1)
  (same comment as for heat, for reuse in municipal waste incineration only)
  property true value relation 3.6; name E_el_prod_MSWI_true_value_relation
    property to calculate "true value" from
  property price 0.1 EUR2005; name E_el_prod_MSWI_price_EUR2005
    Estimated to be the same price as in case of electricity, medium voltage.
  property exergy 3.6 MJ; name E_el_prod_MSWI_exergy
    This exergy property is based on the exergy content of the product.
  property true value 1.45599e-9
    (same comment as for heat, for reuse in municipal waste incineration only)

## Inputs from technosphere
- NOx retained, by selective catalytic reduction: 0.00219397 kg; name nox_retained; source Itten R. 2012; lognormal variance with pedigree 0.093, pedigree (4,4,5,5,4)
  Calculated value. Weighted average from all figures from countries in ecoinvent version 2 (AT, FR, BA, BG, CS, CZ, DE, ES, GR, HU, MK, PL, RO, SI, SK) and the new countries for version 3 (AU, CA, ID, IN, RU, TH, TR, TW, UA). Weighting was made with net electricity production 2008 in these countries (Itten&Frischknecht 2012).
  properties: wet mass 1 kg, dry mass 1 kg
- lignite power plant: 1e-11 unit; name lignite_power_plant; = 1/(200000*500*1000); source Röder, A. 2007, p. p.99; lognormal variance with pedigree 0.3686, pedigree (5,3,4,5,3)
  Calculated value. At the moment, the lignite power plant input consists out of mix of a 100MWe power plant (30%) and a 500MWe power plant (70%).
  For this calculation, 6000 load hours per year are assumed. It is assumed that a total of 200'000h is reached during the lifetime. A capacity of 500MW is taken for the calculation.
- petroleum coke: 0.00128969 kg; name petroleum_coke; = factor_MJ_kWh*0.000139; lognormal variance with pedigree 0.0028, pedigree (2,1,2,5,1)
  Literature value/calculated value. Petroleum coke use when producing 1kWh of electricity from lignite, based on the value for burning 1MJ of lignite. Weighted average with electricity production data (Itten&Frischknecht 2012) and values of 10 countries
  (AT, BA, CZ, DE, ES, FR, HU, PL, SI, SK) (Röder et al. 2007)
  Source:
  Itten R. and Frischknecht R. (2012) Life Cycle Inventories of Electricity Mixes and Grid. ESU-services Ltd., Uster, Switzerland.
  properties: carbon content, fossil 0.885, wet mass 1 kg, dry mass 1 kg
- lignite ash: -0.136392 kg; name lignite_ash; = (factor_MJ_kWh*0.0147)*-1; source Röder, A. 2007, p. Tab. 9.69, p.165; lognormal variance with pedigree 0.0986, pedigree (5,3,4,5,3)
  Literature value/calculated value. Ash remaining when producing 1kWh of electricity from lignite, based on the value for burning 1MJ of lignite. Weighted average with electricity production data (Itten&Frischknecht 2012) and ash values 10 countries
  (AT, BA, CZ, DE, ES, FR, HU, PL, SI, SK). These values were valid for the ash being disposed off. Now, total amount of ash has been calculated (disposed+recycled) with the data in Tab. 9.69 p. 165 in Röder et al. 2007. Country ash values calculated from mass balance. Globally, 6% of the lignite ash are recycled, 94% go to disposal.
  Source:
  Itten R. and Frischknecht R. (2012) Life Cycle Inventories of Electricity Mixes and Grid. ESU-services Ltd., Uster, Switzerland.
  production volume 0 kg; = lignite_ash/electricity*electricity_apv
    APV=0
  property price 0 EUR2005; name lignite_ash_price_EUR2005
  properties: wet mass 1 kg, dry mass 1 kg
- lignite: 0.992783 kg; = factor_MJ_kWh*0.107; lognormal variance with pedigree 0.0212, pedigree (3,3,4,5,3)
  Literature value/calculated value. Lignite mass needed for producing 1kWh of electricity from lignite, based on the value for burning 1MJ of lignite. Weighted average with electricity production data (Itten&Frischknecht 2012) and values of 10 countries
  (AT, BA, CZ, DE, ES, FR, HU, PL, SI, SK) (Röder et al. 2007)
  Source:
  Itten R. and Frischknecht R. (2012) Life Cycle Inventories of Electricity Mixes and Grid. ESU-services Ltd., Uster, Switzerland.
  properties: dry mass 0.42 kg, water content 1.38095, wet mass 1 kg, carbon content, fossil 0.655
  note on carbon content, fossil: C content of dry lignite is 58-73% (specified in Tab 1.1, report 6, part VI). A mean content of 0.655 kg C/kg dry lignite was considered.
- chlorine, liquid: 0 kg; pedigree (1,1,2,1,1)
  Exchange present due to parent child relationship
- residue from cooling tower: -4.63918e-5 kg; name cooling_tower_residue; = (factor_MJ_kWh*0.000005)*-1; lognormal variance with pedigree 0.0812, pedigree (5,3,4,5,2)
  Literature value/calculated value. Amount of resuidue from cooling tower in relation to producing 1kWh of electricity from lignite, based on the value for burning 1MJ of lignite. Weighted average with electricity production data (Itten&Frischknecht 2012) and values of 10 countries
  (AT, BA, CZ, DE, ES, FR, HU, PL, SI, SK).
  Source:
  Itten R. and Frischknecht R. (2012) Life Cycle Inventories of Electricity Mixes and Grid. ESU-services Ltd., Uster, Switzerland.
  production volume 0 kg; = cooling_tower_residue/electricity*electricity_apv
    APV=0
  property price 0 EUR2005; name cooling_tower_residue_price_EUR2005
  properties: carbon content, fossil 0.0544233, wet mass 1 kg, dry mass 0.7 kg, water content 0.428571
- water, decarbonised: 1.85567 kg; name water_decarbonised_user; = factor_MJ_kWh*0.2; lognormal variance with pedigree 0.054, pedigree (4,5,4,5,3)
  Literature value/calculated value. Cooling water, decarbonised, for the cooling water circuit lost when producing 1kWh of electricity from lignite, based on the value for burning 1MJ of lignite. Röder et al. 2007, Tab. 9.65 and Tab. 9.66, p. 160f. These tables give an amount of 0.15 kg/MJ burned, which is valid for the assumption of 75% wet cooling and 25% run-through cooling. However, this revised dataset assumes 100% wet cooling.
  properties: wet mass 1 kg
- water, completely softened: 0.0556701 kg; name water_completely_softened; = factor_MJ_kWh*0.006; lognormal variance with pedigree 0.054, pedigree (4,5,4,5,3)
  Literature value/calculated value. Feed water for the steam circuit lost when producing 1kWh of electricity from lignite, based on the value for burning 1MJ of lignite. Röder et al. 2007, Tab. 9.65 and Tab. 9.66, p. 160f.
  properties: wet mass 1 kg
- SOx retained, in lignite flue gas desulfurisation: 0.0088 kg; name sox_retained; source Itten R. 2012; lognormal variance with pedigree 0.093, pedigree (4,4,5,5,4)
  (same comment as for NOx retained, by selective catalytic reduction)
  properties: wet mass 1 kg, dry mass 1 kg

## Inputs from nature
- Water, cooling, unspecified natural origin [natural resource, in water]: 0.04166 m3; name water_cooling_UNO_input; = ((recirculating_CS_fraction_from_allCS*WWithdrawal_EP_HC_recirculating_CS)+(once_through_andCP_CS_fractio_from_allCS*WWithdrawal_EP_HC_once_through_andCP_CS))/11.52*factor_MJ_kWh; lognormal variance with pedigree 0.098025, pedigree (4,4,4,2,4)
  Calculated based on literature data.

## Emissions to nature
- Lead [air, non-urban air or from high stacks]: 2.41237e-8 kg; name lead; = factor_MJ_kWh*0.0000000026; lognormal variance with pedigree 0.7486, pedigree (5,3,4,5,3)
  Literature value/calculated value. Emissions when producing 1kWh of electricity from lignite, based on the value for burning 1MJ of lignite. Weighted average with electricity production data (Itten&Frischknecht 2012) and emission values of 10 countries
  (AT, BA, CZ, DE, ES, FR, HU, PL, SI, SK) (Röder et al. 2007)
  Country emissions values calculated from trace element balance, input uncertain
  Source:
  Itten R. and Frischknecht R. (2012) Life Cycle Inventories of Electricity Mixes and Grid. ESU-services Ltd., Uster, Switzerland.
- Cadmium [air, non-urban air or from high stacks]: 6.23505e-9 kg; name cadmium; = factor_MJ_kWh*0.000000000672; lognormal variance with pedigree 0.7486, pedigree (5,3,4,5,3)
  (same comment as for Lead)
- Ethane [air, non-urban air or from high stacks]: 3.80412e-7 kg; name ethane; = factor_MJ_kWh*0.000000041; lognormal variance with pedigree 0.08, pedigree (3,5,4,5,1)
  Literature value/calculated value. Emissions when producing 1kWh of electricity from lignite, based on the value for burning 1MJ of lignite. Weighted average with electricity production data (Itten&Frischknecht 2012) and emission values of 10 countries
  (AT, BA, CZ, DE, ES, FR, HU, PL, SI, SK) (Röder et al. 2007)
  Country emissions values based on literature.
  Source:
  Itten R. and Frischknecht R. (2012) Life Cycle Inventories of Electricity Mixes and Grid. ESU-services Ltd., Uster, Switzerland.
- Mercury [air, non-urban air or from high stacks]: 5.01959e-8 kg; name mercury; = factor_MJ_kWh*0.00000000541; lognormal variance with pedigree 0.7486, pedigree (5,3,4,5,3)
  (same comment as for Lead)
- Radium-226 [air, non-urban air or from high stacks]: 2.00412e-5 kBq; name radium_226; = factor_MJ_kWh*0.00000216; lognormal variance with pedigree 0.3907, pedigree (3,3,5,3,3)
  (same comment as for Lead)
- Formaldehyde [air, non-urban air or from high stacks]: 5.38144e-7 kg; name formaldehyde; = factor_MJ_kWh*0.000000058; lognormal variance with pedigree 0.08, pedigree (3,5,4,5,1)
  (same comment as for Ethane)
- Particulates, > 2.5 um, and < 10um [air, non-urban air or from high stacks]: 0.00104 kg; name particulates_2_5_to_10; source Itten R. 2012; lognormal variance with pedigree 0.093, pedigree (4,4,5,5,4)
  (same comment as for NOx retained, by selective catalytic reduction)
- Radium-228 [air, non-urban air or from high stacks]: 1.19691e-5 kBq; name radium_228; = factor_MJ_kWh*0.00000129; lognormal variance with pedigree 0.3986, pedigree (5,3,4,5,3)
  (same comment as for Lead)
- Butane [air, non-urban air or from high stacks]: 1.76289e-7 kg; name butane; = factor_MJ_kWh*0.000000019; lognormal variance with pedigree 0.08, pedigree (3,5,4,5,1)
  (same comment as for Ethane)
- Nickel [air, non-urban air or from high stacks]: 9.46392e-8 kg; name nickel; = factor_MJ_kWh*0.0000000102; lognormal variance with pedigree 0.7486, pedigree (5,3,4,5,3)
  (same comment as for Lead)
- Thorium-228 [air, non-urban air or from high stacks]: 6.46701e-6 kBq; name thorium_228; = factor_MJ_kWh*0.000000697; lognormal variance with pedigree 0.3986, pedigree (5,3,4,5,3)
  (same comment as for Lead)
- Pentane [air, non-urban air or from high stacks]: 1.36392e-6 kg; name pentane; = factor_MJ_kWh*0.000000147; lognormal variance with pedigree 0.08, pedigree (3,5,4,5,1)
  (same comment as for Ethane)
- Dinitrogen monoxide [air, non-urban air or from high stacks]: 1.34536e-5 kg; name dinitrogen_monoxide; = factor_MJ_kWh*0.00000145; lognormal variance with pedigree 0.074, pedigree (3,4,4,5,1)
  (same comment as for Ethane)
- Selenium [air, non-urban air or from high stacks]: 1.14124e-7 kg; name selenium; = factor_MJ_kWh*0.0000000123; lognormal variance with pedigree 0.7486, pedigree (5,3,4,5,3)
  (same comment as for Lead)
- Thorium-232 [air, non-urban air or from high stacks]: 1.02062e-5 kBq; name thorium_232; = factor_MJ_kWh*0.0000011; lognormal variance with pedigree 0.3986, pedigree (5,3,4,5,3)
  (same comment as for Lead)
- Benzene [air, non-urban air or from high stacks]: 2.0134e-6 kg; name benzene; = factor_MJ_kWh*0.000000217; lognormal variance with pedigree 0.088, pedigree (3,5,4,5,3)
  (same comment as for Ethane)
- Potassium-40 [air, non-urban air or from high stacks]: 2.69072e-5 kBq; name potassium_40; = factor_MJ_kWh*0.0000029; lognormal variance with pedigree 0.3986, pedigree (5,3,4,5,3)
  Literature value/calculated value. Emissions when producing 1kWh of electricity from lignite, based on the value for burning 1MJ of lignite. Weighted average with electricity production data (Itten&Frischknecht 2012) and emission values of 10 countries
  (AT, BA, CZ, DE, ES, FR, HU, PL, SI, SK) (Röder et al. 2007)
  Source:
  Itten R. and Frischknecht R. (2012) Life Cycle Inventories of Electricity Mixes and Grid. ESU-services Ltd., Uster, Switzerland.
- Hydrocarbons, aliphatic, unsaturated [air, non-urban air or from high stacks]: 2.00412e-6 kg; name hydrocarbons_aliphatic_unsaturated; = factor_MJ_kWh*0.000000216; lognormal variance with pedigree 0.08, pedigree (3,5,4,5,1)
  (same comment as for Ethane)
- Copper [air, non-urban air or from high stacks]: 6.86598e-8 kg; name copper; = factor_MJ_kWh*0.0000000074; lognormal variance with pedigree 0.7486, pedigree (5,3,4,5,3)
  (same comment as for Lead)
- Carbon dioxide, fossil [air, non-urban air or from high stacks]: 0.992783 kg; name carbon_dioxide_fossil; = factor_MJ_kWh*0.107; lognormal variance with pedigree 0.0206, pedigree (3,3,4,5,3)
  (same comment as for Ethane)
- Toluene [air, non-urban air or from high stacks]: 1.01134e-6 kg; name toluene; = factor_MJ_kWh*0.000000109; lognormal variance with pedigree 0.08, pedigree (3,5,4,5,1)
  (same comment as for Ethane)
- Iodine [air, non-urban air or from high stacks]: 4.45361e-7 kg; name iodine; = factor_MJ_kWh*0.000000048; lognormal variance with pedigree 0.2186, pedigree (5,3,4,5,3)
  (same comment as for Lead)
- Radon-220 [air, non-urban air or from high stacks]: 0.00117835 kBq; name radon_220; = factor_MJ_kWh*0.000127; lognormal variance with pedigree 0.3986, pedigree (5,3,4,5,3)
  (same comment as for Lead)
- Lead-210 [air, non-urban air or from high stacks]: 7.76598e-5 kBq; name lead_210; = factor_MJ_kWh*0.00000837; lognormal variance with pedigree 0.3986, pedigree (5,3,4,5,3)
  (same comment as for Lead)
- Methane, fossil [air, non-urban air or from high stacks]: 9.27835e-6 kg; name methane_fossil; = factor_MJ_kWh*0.000001; lognormal variance with pedigree 0.074, pedigree (3,4,4,5,1)
  (same comment as for Ethane)
- Water [water, unspecified]: 0.0422589 m3; name water_to_water_unspecified; = (water_completely_softened/1000)*(1-fraction_WCS_to_air)+(water_decarbonised_user/1000)*(1-fraction_WDC_to_air)+water_cooling_UNO_input*(1-fraction_CW_to_air); lognormal variance with pedigree 0.098025, pedigree (4,4,4,2,4)
  Calculated value based on literature values and expert opinion. See comments in the parametres' comment field.
  property fraction, origin: salt water 0; name fraction_origin_salt_water_Ww
  property fraction, origin: unspecified 0.956282; name fraction_origin_unspecified_Ww
  property fraction, origin: fresh water 0.0437175; name fraction_origin_fresh_water_Ww
- Uranium-238 [air, non-urban air or from high stacks]: 1.6701e-5 kBq; name uranium_238; = factor_MJ_kWh*0.0000018; lognormal variance with pedigree 0.3986, pedigree (5,3,4,5,3)
  (same comment as for Lead)
- Hydrocarbons, aliphatic, alkanes, unspecified [air, non-urban air or from high stacks]: 2.03196e-6 kg; name hydrocarbons_al_al_unspec; = factor_MJ_kWh*0.000000219; lognormal variance with pedigree 0.08, pedigree (3,5,4,5,1)
  (same comment as for Ethane)
- Water [air, unspecified]: 0.00131235 m3; name water_to_air_unspecified; = (water_completely_softened/1000)*fraction_WCS_to_air+(water_decarbonised_user/1000)*fraction_WDC_to_air+water_cooling_UNO_input*fraction_CW_to_air; lognormal variance with pedigree 0.098025, pedigree (4,4,4,2,4)
  (same comment as for Water)
  property fraction, origin: unspecified 0.951263; name fraction_origin_unspecified
  property fraction, origin: fresh water 0.0487374; name fraction_origin_fresh_water
  property fraction, origin: salt water 0; name fraction_origin_salt_water
- Polonium-210 [air, non-urban air or from high stacks]: 0.000141959 kBq; name polonium_210; = factor_MJ_kWh*0.0000153; lognormal variance with pedigree 0.3986, pedigree (5,3,4,5,3)
  (same comment as for Potassium-40)
- Cobalt [air, non-urban air or from high stacks]: 4.99175e-9 kg; name cobalt; = factor_MJ_kWh*0.000000000538; lognormal variance with pedigree 0.7486, pedigree (5,3,4,5,3)
  (same comment as for Lead)
- Radon-222 [air, non-urban air or from high stacks]: 0.00208763 kBq; name radon_222; = factor_MJ_kWh*0.000225; lognormal variance with pedigree 0.3986, pedigree (5,3,4,5,3)
  (same comment as for Lead)
- Propene [air, non-urban air or from high stacks]: 1.48454e-7 kg; name propene; = factor_MJ_kWh*0.000000016; lognormal variance with pedigree 0.08, pedigree (3,5,4,5,1)
  (same comment as for Potassium-40)
- Dioxins, measured as 2,3,7,8-tetrachlorodibenzo-p-dioxin [air, non-urban air or from high stacks]: 6.49485e-14 kg; name dioxins; = factor_MJ_kWh*0.000000000000007; lognormal variance with pedigree 0.34, pedigree (3,5,4,5,1)
  (same comment as for Ethane)
- Carbon monoxide, fossil [air, non-urban air or from high stacks]: 0.000185567 kg; name carbon_monoxide_fossil; = factor_MJ_kWh*0.00002; lognormal variance with pedigree 0.674, pedigree (3,4,4,5,1)
  (same comment as for Ethane)
- Molybdenum [air, non-urban air or from high stacks]: 1.49381e-8 kg; name molybdenum; = factor_MJ_kWh*0.00000000161; lognormal variance with pedigree 0.7486, pedigree (5,3,4,5,3)
  (same comment as for Lead)
- Propane [air, non-urban air or from high stacks]: 3.24742e-7 kg; name propane; = factor_MJ_kWh*0.000000035; lognormal variance with pedigree 0.08, pedigree (3,5,4,5,1)
  (same comment as for Potassium-40)
- Chromium VI [air, non-urban air or from high stacks]: 2.97835e-9 kg; name chromium_vi; = factor_MJ_kWh*0.000000000321; lognormal variance with pedigree 0.5006, pedigree (3,3,4,5,3)
  Literature value/calculated value. Emissions when producing 1kWh of electricity from lignite, based on the value for burning 1MJ of lignite. Weighted average with electricity production data (Itten&Frischknecht 2012) and emission values of 10 countries
  (AT, BA, CZ, DE, ES, FR, HU, PL, SI, SK) (Röder et al. 2007)
  Country emissions values based on range of data.
  Source:
  Itten R. and Frischknecht R. (2012) Life Cycle Inventories of Electricity Mixes and Grid. ESU-services Ltd., Uster, Switzerland.
- Vanadium [air, non-urban air or from high stacks]: 3.1268e-8 kg; name vanadium; = factor_MJ_kWh*0.00000000337; lognormal variance with pedigree 0.7486, pedigree (5,3,4,5,3)
  (same comment as for Lead)
- Particulates, > 10 um [air, non-urban air or from high stacks]: 0.000612 kg; name particulates_gt10; source Itten R. 2012; lognormal variance with pedigree 0.093, pedigree (4,4,5,5,4)
  (same comment as for NOx retained, by selective catalytic reduction)
- Hydrogen fluoride [air, non-urban air or from high stacks]: 1.25258e-5 kg; name hydrogen_fluoride; = factor_MJ_kWh*0.00000135; lognormal variance with pedigree 0.2186, pedigree (5,3,4,5,3)
  (same comment as for Lead)
- Sulfur dioxide [air, non-urban air or from high stacks]: 0.00556 kg; name sulfur_dioxide; source Itten R. 2012; lognormal variance with pedigree 0.093, pedigree (4,4,5,5,4)
  Calculated value. Weighted average from all figures from countries in ecoinvent version 2 (AT, FR, BA, BG, CS, CZ, DE, ES, GR, HU, MK, PL, RO, SI, SK) and the new countries for version 3 (AU, CA, ID, IN, RU, TH, TR, TW, UA). Weighting was made with net electricity production 2008 in these countries (Itten&Frischknecht 2012). According to Röder et al. 2007, about 20-60% of the sulfur contained in the coal don't turn into SO2 but can be found in the ash. A factor of 40% is taken into account here.
- Zinc [air, non-urban air or from high stacks]: 1.61443e-7 kg; name zinc; = factor_MJ_kWh*0.0000000174; lognormal variance with pedigree 0.7486, pedigree (5,3,4,5,3)
  (same comment as for Lead)
- Barium [air, non-urban air or from high stacks]: 1.43814e-7 kg; name barium; = factor_MJ_kWh*0.0000000155; lognormal variance with pedigree 0.7486, pedigree (5,3,4,5,3)
  (same comment as for Lead)
- Boron [air, non-urban air or from high stacks]: 1.73505e-5 kg; name boron; = factor_MJ_kWh*0.00000187; lognormal variance with pedigree 0.7486, pedigree (5,3,4,5,3)
  (same comment as for Lead)
- Arsenic [air, non-urban air or from high stacks]: 2.74639e-8 kg; name arsenic; = factor_MJ_kWh*0.00000000296; lognormal variance with pedigree 0.7486, pedigree (5,3,4,5,3)
  (same comment as for Lead)
- Hydrogen chloride [air, non-urban air or from high stacks]: 5.24227e-5 kg; name hydrogen_chloride; = factor_MJ_kWh*0.00000565; lognormal variance with pedigree 0.2186, pedigree (5,3,4,5,3)
  (same comment as for Lead)
- Particulates, < 2.5 um [air, non-urban air or from high stacks]: 0.0088 kg; name particulates_lt2_5; source Itten R. 2012; lognormal variance with pedigree 0.093, pedigree (4,4,5,5,4)
  (same comment as for NOx retained, by selective catalytic reduction)
- Manganese [air, non-urban air or from high stacks]: 7.84948e-8 kg; name manganese; = factor_MJ_kWh*0.00000000846; lognormal variance with pedigree 0.7486, pedigree (5,3,4,5,3)
  (same comment as for Lead)
- Chromium [air, non-urban air or from high stacks]: 2.46804e-8 kg; name chromium; = factor_MJ_kWh*0.00000000266; lognormal variance with pedigree 0.7486, pedigree (5,3,4,5,3)
  (same comment as for Lead)
- PAH, polycyclic aromatic hydrocarbons [air, non-urban air or from high stacks]: 9.27835e-9 kg; name pah; = factor_MJ_kWh*0.000000001; lognormal variance with pedigree 0.34, pedigree (3,5,4,5,1)
  (same comment as for Ethane)
- Strontium [air, non-urban air or from high stacks]: 1.27113e-7 kg; name strontium; = factor_MJ_kWh*0.0000000137; lognormal variance with pedigree 0.7486, pedigree (5,3,4,5,3)
  (same comment as for Lead)
- Benzo(a)pyrene [air, non-urban air or from high stacks]: 1.85567e-12 kg; name benzo_a_pyrene; = factor_MJ_kWh*0.0000000000002; lognormal variance with pedigree 0.08, pedigree (3,5,4,5,1)
  (same comment as for Ethane)
- Nitrogen oxides [air, non-urban air or from high stacks]: 0.00226 kg; name nitrogen_oxides; source Itten R. 2012; lognormal variance with pedigree 0.093, pedigree (4,4,5,5,4)
  (same comment as for NOx retained, by selective catalytic reduction)
- Antimony [air, non-urban air or from high stacks]: 4.8433e-9 kg; name antimony; = factor_MJ_kWh*0.000000000522; lognormal variance with pedigree 0.7486, pedigree (5,3,4,5,3)
  (same comment as for Lead)
- Bromine [air, non-urban air or from high stacks]: 6.13299e-7 kg; name bromine; = factor_MJ_kWh*0.0000000661; lognormal variance with pedigree 0.1806, pedigree (3,3,4,5,3)
  (same comment as for Lead)
- Xylene [air, non-urban air or from high stacks]: 8.55464e-6 kg; name xylene; = factor_MJ_kWh*0.000000922; lognormal variance with pedigree 0.08, pedigree (3,5,4,5,1)
  (same comment as for Ethane)

## Sampling procedure
literature and statistics

## Extrapolations
Most of the exchanges were extrapolated through production-weighted averages of the datasets of the following 10 countries: AT, BA, CZ, DE, ES, FR, HU, PL, SI, SK.

The original data were valid for the burning of 1MJ of lignite. In this dataset, the values are scaled to the net output of 1kWh of electricity, based on the electrical efficiency.
