# electricity production, natural gas, conventional power plant

Dataset: EcoSpold 2, unit process
Geography: PE
Time period: 2012-01-01 to 2019-12-31
Technology level: current
Classification: ISIC rev.4 ecoinvent: 3510:Electric power generation, transmission and distribution
Classification: EcoSpold01Categories: natural gas/power plants
Tags: fossil fuels; natural gas power
Scenario: Business-as-Usual
System model: Allocation at the point of substitution
Generated by: Alfredo Pro Castaneyra
Published in: Suppen, N. 2017
Database: ecoinvent
isCopyrightProtected: true
accessRestrictedTo: 1

## General comment
This dataset represents the production of high voltage electricity in a natural gas, conventional power plant in Peru. This dataset is based on the dataset "electricity production, natural gas, at conventional power plant, GLO" (accessed October 2017) and adapted using regional data, such as efficiency and net electricity production. The regional data was obtained from nine power plants in the country in 2014, which are the following: Santa Rosa (28.6%), Malacas (15.7%), Pisco (19.0%), Aguaytia (13.7), Termochilca (13%), Las Flores (7.2%) and Tablazo (2.8%) . The approximate conventional natural gas power plants production in Peru is 6.6 % of the total in the country. Data was obtained from the Committee of Economic Operations of the National Interconnected System (COES), the national peruvian entity that regulates the dispatch and generation of energy from the electricity sector. The COES publishes the statistics of operations of the National Interconnected System (SEIN) in an annual basis. In addition, public access information was requested from the General Directorate of Environmental Energy Affairs (DGAAE) of the Ministry of Energy and Mines on Environmental Impact Studies (EIA) of the plants, as well as, the Environmental Monitoring Reports (IMA) presented by the power plants quarterly, the reports and studies were obtained for Las Flores, Aguaytia, Termochilca, Malacas and Santa Rosa.
For the peruvian natural gas conventional power plants, the efficiency vary between 24 and 40 %. Gestión de la Información. COES, 2014)
The efficiency calculations consider fuel input vs. electricity/heat produced. Even if efficiencies vary with different surrounding temperatures, temperature adjustments would be related to high uncertainties
EMISSIONS: Emissions of NOx, CO, CO2, SO2, particles, and CH4 were estimated using emission factors from EPA, 1998., as per the OSINERGMIN, supervisory body for energy and mining investment (http://www.osinergmin.gob.pe/seccion/centro_documental/Institucional/Estudios_Economicos/Libros/anexo-industria-hidrocarburos-liquidos-Peru.pdf retrieved 24 august 2017). Based on the dataset of natural gas burned in a conventional power plant ("electricity production, natural gas, at conventional power plant, PE, 2008-2008", accessed October 2017") other exchanges were adjusted.
- Organic compound emissions are estimated on the basis of EPA 1998.
Sources:
- CORINAIR 2001. EMEP/CORINAIR 2001: Joint EMEP/CORINAIR Atmospheric Emission Inventory Guidebook, Third Edition. Copenhagen: European Environment Agency, 2001. http://reports.eea.eu.int/technical_report_2001_3/en.
- EPA 1998. US Environmental Protection Agency (1998). Compilation of Air Pollutant Emission Factors, AP-42, Fifth Edition, Volume I: Chapter 1: External Combustion Sources, Natural Gas Combustion - Final Section - Supplement D , July 1998. CHIEF (Clearinghouse for Inventories and Emission Factors). Research Triangle Park, North Carolina. http://www.epa.gov/ttn/chief/ap42/.
- Rentz O., Karl U., Peter H. (2002). Ermittlung und Evaluierung von Emissionsfaktoren für Feuerungsanlagen in Deutschland für die Jahre 1995, 2000 und 2010. Deutsch- Französisches Institut für Umweltforschung, Uni Karsruhe. Endbericht. Im Auftrag des Umweltbundesamtes. Forschungsbericht 299 43 142. Umweltbundesamt. Berlin.
COES, 2014. Sub Dirección de Gestión de la Información. RA-SGI-0115. ESTADISTICA RELEVANTE DEL SISTEMA ELÉCTRICO INTERCONECTADO NACIONAL, (2014). Cap. 06 PRODUCCIÓN TERMOELÉCTRICA Y CONSUMO DE COMBUSTIBLE. Retrieved online from http://www.coes.org.pe/Portal/Publicaciones/Estadisticas/ 2014/PDF/06_PRODUCCION TERMOELECTRICA Y CONSUMO DE COMBUSTIBLE, CUADRO N° 6.3 CONSUMO DE COMBUSTIBLE EN LAS CENTRALES TERMOELÉCTRICAS 2014,CUADRO N° 6.2 RENDIMIENTO PROMEDIO ANUAL - 2014. November 14, 2017.
MINEM, 2014. Ministerio de Energía y Minas (2014). Anuario Ejecutivo de Electricidad 2014. Dirección General de Electricidad. Retrieved online from http://www.minem.gob.pe/_estadisticaSector.php?idSector=6, 24 august 2017.
MINEM, 2017. Ministerio de Energía y Minas (20147).Preguntas Frecuentes en Relación al Gas Natural en el Perú http://www.minem.gob.pe/minem/archivos/gasnatural.pdf. Retrieved online 24 august 2017.
OSINERGMIN, 2015. Oganismo Supervisor de la Energía y Mineria. La industria de los hidrocarburos líquidos en el Perú: 20 años de aporte al desarrollo del país (2015) http://www.osinergmin.gob.pe/seccion/centro_documental/Institucional/Estudios_Economicos/Libros/anexo-industria-hidrocarburos-liquidos-Peru.pdf. Retrieved online 24 august 2017.
EPA, 1998. US Environmental Protection Agency (1998). AP 42 -Compilation of Air Pollutant Emission Factors, Volume 1: Stationary Point and Area Sources Compilation of Air Pollutant Emission Factors, AP-42, AP 42, Fifth Edition. Natural Gas Combustion
Final Section - Supplement D , July 1998. https://www3.epa.gov/ttn/chief/ap42/ch01/index.html. Retrieved online 24 august 2017.
The split of the natural gas power plants by technology was performed using the data reported by (COES, 2014).
Technology “Turbina a Gas” = Natural gas, conventional
Technology “CC TG-TV” = Natural gas, combined cycle

Source: Estadisticas Anuales 2014 02_Estadistica 02_EXCEL 06_PRODUCCIÓN TERMOELECTRICA Y CONSUMO DE COMBUSTIBLE DEL SEIN, CUADRO N° 6.8 _COSTOS VARIABLES DE LAS CENTRALES TERMOELÉCTRICAS DEL COES.xlsx URL: http://www.coes.org.pe/Portal/Publicaciones/Estadisticas/ accessed on November 14, 2017.

## Included activities start
From the constructed natural gas power plant ready to produce electricity.

From reception of natural gas and operating materials at power plant/factory gate

## Included activities end
This activity ends with 1kWh of high voltage electricity produced at the power plant and arrived at the busbar.

This dataset includes:
- all operation and maintenance activities and materials of the power plants.
- Cooling: It is a assumed that all plants use wet cooling with a cooling tower.No cooling tower is included in this dataset (will be implemented in future versions)
- decarbonised water use for reduction of NOx emissions

This dataset doesn't include
- raw materials extraction, decommissioning and waste treatment as these activities are already included in the infrastructure datasets.
- transformation of the electricity produced.

## Geography
In Peru, the Economic Operation Committee of the National Interconnected System (COES) is divided in three operation areas, north, central and south. The nine power plants considered in this dataset are located as follows: in the north operation area, Malacas and Tablazo; in the central area, Aguaytia, Santa Rosa, Las Flores, Pisco, Independencia, Termochilca and Oquendo.

## Technology
Conventional natural gas power plant of 100MWe. The plant is used for middle load with 5000 hours of operation at full capacity per year. The plant is assumed to operate 180000 hours during its lifetime.

## Time period
The Annual Production Volume is valid for the year 2014.

## Parameters
- factor: input of MJ for the production of 1 kWh: 11.8033 MJ/kWh; name factor_MJ_kWh; = 1*3.6/efficiency; lognormal variance with pedigree 0.0532, pedigree (4,4,3,4,4)
  Calculated value. 3.6 MJ = 1kWh.
- fraction, process water, to air: 0.15 dimensionless; name fraction_PW_to_air; lognormal variance with pedigree 0.092025, pedigree (4,4,3,2,4)
  Literature value reported in "electricity production, natural gas, at conventional power plant, PE, 2008-2008" (accessed October 2017), where it states that in case when no industry/process specific data are available, default evaporation fraction value is used. This value is 15% and is based on literature (Statistics Canada, 2007 & Shaffer, K.H., 2008, Consumptive water use in the Great Lakes Basin, USGS & Shiklomanov, 2003, World Water Resources at the Beginning of the 21st Century) and has been approved by an expert.
- fraction, cooling water, to air: 0.0159178; name fraction_CW_to_air; = (WConsumption_EP_NG_recirculatingCS*recirculating_CS_fraction_from_allCS+WConsumption_EP_NG_onceT_andCP_CS*once_through_andCP_CS_fractio_from_allCS)/(WWithdrawal_EP_NG_recirculating_CS*recirculating_CS_fraction_from_allCS+WWithdrawal_EP_NG_onceT_andCP_CS*once_through_andCP_CS_fractio_from_allCS); lognormal variance with pedigree 0.092025, pedigree (4,4,3,2,4)
  Calculated as per "electricity production, natural gas, at conventional power plant, PE, 2008-2008" (accessed October 2017).
- water withdrawal, electricity production from NG, once-T and coolingP CS: 0.098 m3/kWh; name WWithdrawal_EP_NG_onceT_andCP_CS; lognormal variance with pedigree 0.092025, pedigree (4,4,3,2,4)
  Estimated as per "electricity production, natural gas, at conventional power plant, PE, 2008-2008" (accessed October 2017), based on literature (Scown, 2011, Water Footprint of U.S. Transportation Fuels, SI).
- recirculating cooling system as a fraction of all cooling systems: 0.375 dimensionless; name recirculating_CS_fraction_from_allCS; lognormal variance with pedigree 0.092025, pedigree (4,4,3,2,4)
  Calculated as per "electricity production, natural gas, at conventional power plant, PE, 2008-2008" (accessed October 2017), as an average of data available for Europe (Floerke, 2008, Future changes of freshwater needs in the electricity production sector) and USA (NERL, 2011, Estimating freshwater needs to meet future thermoelectric generation requirements).
- fraction, water, completely softened, to air: 0.15; name fraction_WCS_to_air; = fraction_PW_to_air; lognormal variance with pedigree 0.092025, pedigree (4,4,3,2,4)
  Calculated value as per "electricity production, natural gas, at conventional power plant, PE, 2008-2008" (accessed October 2017). See comment in the other parametres present in this dataset. Water, completely softened is considered to be always used as process water, thus process water fractions to air are applied to all water, completely softened input flows to calculate the amount of water consumed in the processes"
- once-through and cooling pond cooling systems as a fraction of all cooling syste: 0.625 dimensionless; name once_through_andCP_CS_fractio_from_allCS; lognormal variance with pedigree 0.092025, pedigree (4,4,3,2,4)
  Calculated as per "electricity production, natural gas, at conventional power plant, PE, 2008-2008" (accessed October 2017)), as an average of data available for Europe (Floerke, 2008, Future changes of freshwater needs in the electricity production sector) and USA (NERL, 2011, Estimating freshwater needs to meet future thermoelectric generation requirements).
- efficiency: 0.305 dimensionless; lognormal variance with pedigree 0.017225, pedigree (4,3,1,2,3)
  Literature value/calculated value. Net electrical efficiency based on the lower heating value (LHV).
  Low heating value of natural gas 9030 kcal/m3
  Source: http://www.minem.gob.pe/minem/archivos/gasnatural.pdf accessed on November 14, 2017.
  Density of natural gas: 0.65 kg/m3
  Source: http://www.minem.gob.pe/minem/archivos/gasnatural.pdf accessed on November 14, 2017.
  Data on net electricity production (kWh) and natural gas consumption (MBTU) for the year 2014 in Peru were used for the calculations (COES, 2014).
  Power plant Net electricity production (GWh) Natural gas (ft3 10E+3)
  TG Santa Rosa WTG - Gas 3.22E+00 3.68E+04
  Sta Rosa TG8 7.90E+02 7.83E+06
  Malacas TG1 5.20E+00 1.29E+05
  Malacas TG4 4.32E+02 5.23E+06
  Pisco TG1 2.84E+02 3.28E+06
  Pisco TG2 2.43E+02 2.83E+06
  Las Flores 8.05E+01 8.17E+05
  Las Flores 1.22E+02 1.24E+06
  Tablazo 8.00E+01 8.65E+05
  TG1 Aguaytía 2.72E+02 3.82E+06
  TG2 Aguaytía 1.08E+02 1.47E+06
  Termochilca TG1 3.56E+02 3.53E+06
  Source for electricity production and fuel consumption:
  COES, 2014. Sub Dirección de Gestión de la Información. RA-SGI-0115. ESTADISTICA RELEVANTE DEL SISTEMA ELÉCTRICO INTERCONECTADO NACIONAL, (2014). Cap. 06 PRODUCCIÓN TERMOELÉCTRICA Y CONSUMO DE COMBUSTIBLE. Retrieved online from http://www.coes.org.pe/Portal/Publicaciones/Estadisticas/ 2014/PDF/06_PRODUCCION TERMOELECTRICA Y CONSUMO DE COMBUSTIBLE, CUADRO N° 6.3 CONSUMO DE COMBUSTIBLE EN LAS CENTRALES TERMOELÉCTRICAS 2014,CUADRO N° 6.2 RENDIMIENTO PROMEDIO ANUAL - 2014. accessed on November 14, 2017.
  Source for allocation in combined cycle and conventional cycle technology:
  COES, 2014. Sub Dirección de Gestión de la Información. RA-SGI-0115. ESTADISTICA RELEVANTE DEL SISTEMA ELÉCTRICO INTERCONECTADO NACIONAL, (2014). Cap. 06 PRODUCCIÓN TERMOELÉCTRICA Y CONSUMO DE COMBUSTIBLE. Retrieved online from http://www.coes.org.pe/Portal/Publicaciones/Estadisticas/ 2014/PDF/06_PRODUCCION TERMOELECTRICA Y CONSUMO DE COMBUSTIBLE, CUADRO, No 6.8_COSTOS VARIABLES DE LAS CENTRALES TERMOELÉCTRICAS DEL COES. accessed on November 14, 2017.
- fraction, water, decarbonised, to air: 0.0159178; name fraction_WDC_to_air; = fraction_CW_to_air; lognormal variance with pedigree 0.092025, pedigree (4,4,3,2,4)
  Calculated value as reported in dataset: "electricity production, natural gas, at conventional power plant, PE, 2008-2008" (accessed October 2017). See comments in the other parametres present in this dataset. Decarbonised water is considered to be always used as cooling water, thus cooling water fractions to air are applied to all carbonised water input flows to calculate the amount of water consumed in the processes.
- water withdrawal, electricity production from NG, recirculating CS: 0.0021 m3/kWh; name WWithdrawal_EP_NG_recirculating_CS; lognormal variance with pedigree 0.092025, pedigree (4,4,3,2,4)
  (same comment as for water withdrawal, electricity production from NG, once-T and coolingP )
- water consumption, electricity production from NG, recirculating CS: 0.0018 m3/kWh; name WConsumption_EP_NG_recirculatingCS; lognormal variance with pedigree 0.092025, pedigree (4,4,3,2,4)
  (same comment as for water withdrawal, electricity production from NG, once-T and coolingP )
- water consumption, electricity production from NG, once-T and coolingP CS: 0.0005 m3/kWh; name WConsumption_EP_NG_onceT_andCP_CS; lognormal variance with pedigree 0.092025, pedigree (4,4,3,2,4)
  (same comment as for water withdrawal, electricity production from NG, once-T and coolingP )

## Reference product
- electricity, high voltage: 1 kWh; name electricity; CPC 17100: Electrical energy; By-product classification allocatable product
  production volume 2.77583e9 kWh; name electricity_apv
    The production data was calculated based on the information from the following nine conventional power plants in Peru: Santa Rosa, Malacas, Aguaytia, Chilca,Pisco,Las Flores, Independencia Tablazo,Oquendo . (COES, 2014)
    Source: COES, 2014. Sub Dirección de Gestión de la Información. RA-SGI-0115. ESTADISTICA RELEVANTE DEL SISTEMA ELÉCTRICO INTERCONECTADO NACIONAL, (2014). Cap. 06 PRODUCCIÓN TERMOELÉCTRICA Y CONSUMO DE COMBUSTIBLE. Retrieved online from http://www.coes.org.pe/Portal/Publicaciones/Estadisticas/ 2014/PDF/06_PRODUCCION TERMOELECTRICA Y CONSUMO DE COMBUSTIBLE, CUADRO N° 6.3 CONSUMO DE COMBUSTIBLE EN LAS CENTRALES TERMOELÉCTRICAS 2014,CUADRO N° 6.2 RENDIMIENTO PROMEDIO ANUAL - 2014. November 14, 2017.
  property price 0.0977 EUR2005
    Temporary price data. Calculated as 90% of purchasers price based on: 94% of the average price (to account for a 6% loss in transformation and transmission) for electricity for industrial consumersin 2005 (excluded taxes). From IEA.
  property true value 0.0977; name electricity_true_value
    allocation property applied in "true value" allocation // value calculated from revenue

## By-products
- heat, for reuse in municipal waste incineration only: 0 MJ; CPC 17300: Steam and hot water; By-product classification allocatable product; pedigree (1,1,1,1,1)
  Net electricity generated from this waste and used in internal MSWI plant energy redistribution.
  Uncertainty: uncertainty is calculated from uncertainties in waste composition and uncertainties in energy efficiency and the uncertainty in internal energy demand
  production volume 1.27502 MJ
  property exergy 0.1842 MJ; name E_th_prod_MSWI_exergy
    This exergy property is based on the exergy content of the product.
  property price 0.0106 EUR2005; name E_th_prod_MSWI_price_EUR2005
    Average European district heat price from Ecoheatcool and Euroheat 2005-2006, Ecoheat Work package 1: The European heat market. Final report. 10.6 EUR/GJ i s the price of district heat. http://www.solarthermalworld.org/files/Ecoheatcool%20WP1%20Web.pdf?download
  property true value relation 0.1842; name E_th_prod_MSWI_true_value_relation
    property to calculate "true value" from
  property true value 3.02142e-12
    allocation property applied in "true value" allocation // value calculated from true value relation
- electricity, for reuse in municipal waste incineration only: 0 kWh; CPC 17100: Electrical energy; By-product classification allocatable product; pedigree (1,1,1,1,1)
  (same comment as for heat, for reuse in municipal waste incineration only)
  production volume 0.179571 kWh
  property true value relation 3.6; name E_el_prod_MSWI_true_value_relation
    property to calculate "true value" from
  property price 0.1 EUR2005; name E_el_prod_MSWI_price_EUR2005
    Estimated to be the same price as in case of electricity, medium voltage.
  property exergy 3.6 MJ; name E_el_prod_MSWI_exergy
    This exergy property is based on the exergy content of the product.
  property true value 8.31656e-12
    (same comment as for heat, for reuse in municipal waste incineration only)

## Inputs from technosphere
- water, completely softened: 0.0747 kg; name water_completely_softened; lognormal variance with pedigree 0.2266, pedigree (4,3,4,1,1)
  Literature value. Value taken from PE dataset, "electricity production, natural gas, conventional power plant, PE, 2008-2008"
  properties: wet mass 1 kg
- water, decarbonised: 2.491 kg; name water_decarbonised_user; lognormal variance with pedigree 0.2266, pedigree (4,3,4,1,1)
  Literature value. Value taken from PE dataset, "electricity production, natural gas, conventional power plant, PE, 2008-2008".
  properties: wet mass 1 kg
- gas power plant, 100MW electrical: 6.56262e-10 unit; name gas_power_plant; = factor_MJ_kWh*0.0000000000556; lognormal variance with pedigree 0.1387, pedigree (3,3,4,3,3)
  Literature value/calculated value. Amount of power plant needed for producing 1kWh of electricity, based on the burning of 1MJ of natural gas. Tab. 11.25, p. 143
- residue from cooling tower: -1.18033e-5 kg; name cooling_tower_residue; = (factor_MJ_kWh*0.000001)*-1; lognormal variance with pedigree 1.1067, pedigree (4,3,5,3,3)
  Literature value/calculated value. Mass share of cooling tower needed for producing 1kWh of electricity, based on the burning of 1MJ of natural gas. Weighted average with electricity production data (Itten&Frischknecht 2012) and values of 11 countries
  (AT, BE, DE, ES, FR, GB, IT, JP, LU, NL, US) (Faist Emmenegger et al. 2007)
  Source:
  Itten R. and Frischknecht R. (2012) Life Cycle Inventories of Electricity Mixes and Grid. ESU-services Ltd., Uster, Switzerland.
  production volume 32763.8 kg; = cooling_tower_residue/electricity* electricity_apv
    Calculated from the production volume of electricity produced.
  property price 0 EUR2005; name cooling_tower_residue_price_EUR2005
  properties: carbon content, fossil 0.0544233, wet mass 1 kg, dry mass 0.7 kg, water content 0.428571
- natural gas, high pressure: 0.317103 m3; name natural_gas; = factor_MJ_kWh*0.02686566; lognormal variance with pedigree 0.0002, pedigree (1,1,2,1,1)
  Calculated weighted average (with electricity production data) for natural gas conventional power plants from peruvian statistics (Subdirección de Gestión de la Información. COES, 2014).
  Power plant Net electricity production (GWh) Natural gas (ft3 10E+3)
  TG Santa Rosa WTG - Gas 3.22E+00 3.68E+04
  Sta Rosa TG8 7.90E+02 7.83E+06
  Malacas TG1 5.20E+00 1.29E+05
  Malacas TG4 4.32E+02 5.23E+06
  Pisco TG1 2.84E+02 3.28E+06
  Pisco TG2 2.43E+02 2.83E+06
  Las Flores 8.05E+01 8.17E+05
  Las Flores 1.22E+02 1.24E+06
  Tablazo 8.00E+01 8.65E+05
  TG1 Aguaytía 2.72E+02 3.82E+06
  TG2 Aguaytía 1.08E+02 1.47E+06
  Termochilca TG1 3.56E+02 3.53E+06
  Source for electricity production and fuel consumption:
  COES, 2014. Sub Dirección de Gestión de la Información. RA-SGI-0115. ESTADISTICA RELEVANTE DEL SISTEMA ELÉCTRICO INTERCONECTADO NACIONAL, (2014). Cap. 06 PRODUCCIÓN TERMOELÉCTRICA Y CONSUMO DE COMBUSTIBLE. Retrieved online from http://www.coes.org.pe/Portal/Publicaciones/Estadisticas/ 2014/PDF/06_PRODUCCION TERMOELECTRICA Y CONSUMO DE COMBUSTIBLE, CUADRO N° 6.3 CONSUMO DE COMBUSTIBLE EN LAS CENTRALES TERMOELÉCTRICAS 2014,CUADRO N° 6.2 RENDIMIENTO PROMEDIO ANUAL - 2014. accessed on November 14, 2017.
  Low heating value of natural gas 9030 kcal/m3
  Source: http://www.minem.gob.pe/minem/archivos/gasnatural.pdf accessed on November 14, 2017.
  Density of natural gas: 0.65 kg/m3
  Source: http://www.minem.gob.pe/minem/archivos/gasnatural.pdf accessed on November 14, 2017.
  property heating value, net 39 MJ; name natural_gas_Net_Heat_Value
  properties: wet mass 0.84 kg, dry mass 0.84 kg, carbon content, fossil 0.602381
  note on heating value, net: Net (lower) heating (calorific) value at norm conditions (0°C, 101.325 kPa). Literature value.
  note on carbon content, fossil: An average C content of 0.506 kg C/ m3 has been assumed (this average has been calculated using data in Tab 3.5, ecoinvent v2.2 report 6_V

## Inputs from nature
- Water, cooling, unspecified natural origin [natural resource, in water]: 0.0697377 m3; name water_cooling_UNO_input; = ((recirculating_CS_fraction_from_allCS*WWithdrawal_EP_NG_recirculating_CS)+(once_through_andCP_CS_fractio_from_allCS*WWithdrawal_EP_NG_onceT_andCP_CS))/10.5*factor_MJ_kWh; lognormal variance with pedigree 0.098025, pedigree (4,4,4,2,4)
  Calculated based on literature data.

## Emissions to nature
- Arsenic [air, non-urban air or from high stacks]: 4.85115e-10 kg; name arsenic; = factor_MJ_kWh*0.0000000000411; lognormal variance with pedigree 0.034, pedigree (3,5,4,5,3)
  Literature value/calculated value. Emissions when producing 1kWh of electricity, based on the burning of 1MJ of natural gas. Weighted average with electricity production data (Itten&Frischknecht 2012) and emission values of 11 countries
  (AT, BE, DE, ES, FR, GB, IT, JP, LU, NL, US) (Faist Emmenegger et al. 2007)
  Country emissions values estimate from range of values from different references. See Tab. 11.19, p. 138 in Faist Emmenegger et al. 2007.
  Source:
  Itten R. and Frischknecht R. (2012) Life Cycle Inventories of Electricity Mixes and Grid. ESU-services Ltd., Uster, Switzerland.
- Acetic acid [air, non-urban air or from high stacks]: 1.4282e-6 kg; name acetic_acid; = factor_MJ_kWh*0.000000121; lognormal variance with pedigree 1.1007, pedigree (3,3,5,3,3)
  (same comment as for Arsenic)
- Acenaphthene [air, non-urban air or from high stacks]: 9.36e-12 kg; name acenaphthene; = factor_MJ_kWh*0.000000000000793; lognormal variance with pedigree 0.6807, pedigree (3,3,5,3,3)
  (same comment as for Arsenic)
- Water [air, unspecified]: 0.00116093 m3; name water_to_air_unspecified; = (water_completely_softened/1000)*fraction_WCS_to_air+(water_decarbonised_user/1000)*fraction_WDC_to_air+water_cooling_UNO_input*fraction_CW_to_air; lognormal variance with pedigree 0.098025, pedigree (4,4,4,2,4)
  Calculated value based on literature values and expert opinion. See comments in the parametres' comment field.
  property fraction, origin: fresh water 0.0416136; name fraction_origin_fresh_water
  property fraction, origin: unspecified 0.958386; name fraction_origin_unspecified
  property fraction, origin: salt water 0; name fraction_origin_salt_water
- Dioxins, measured as 2,3,7,8-tetrachlorodibenzo-p-dioxin [air, non-urban air or from high stacks]: 0 kg; name dioxins; = factor_MJ_kWh*2.9E-17; pedigree (1,1,1,1,1)
  (same comment as for Arsenic)
- Propane [air, non-urban air or from high stacks]: 8.32131e-6 kg; name propane; = factor_MJ_kWh*0.000000705; lognormal variance with pedigree 0.6807, pedigree (3,3,5,3,3)
  (same comment as for Arsenic)
- Propionic acid [air, non-urban air or from high stacks]: 1.88852e-7 kg; name propionic_acid; = factor_MJ_kWh*0.000000016; lognormal variance with pedigree 1.1067, pedigree (4,3,5,3,3)
  (same comment as for Arsenic)
- Water [water, unspecified]: 0.0711425 m3; name water_to_water_unspecified; = (water_completely_softened/1000)*(1-fraction_WCS_to_air)+(water_decarbonised_user/1000)*(1-fraction_WDC_to_air)+water_cooling_UNO_input*(1-fraction_CW_to_air); lognormal variance with pedigree 0.098025, pedigree (4,4,4,2,4)
  (same comment as for Water)
  property fraction, origin: fresh water 0.0335624; name fraction_origin_fresh_water_Ww
  property fraction, origin: unspecified 0.966438; name fraction_origin_unspecified_Ww
  property fraction, origin: salt water 0; name fraction_origin_salt_water_Ww
- Cobalt [air, non-urban air or from high stacks]: 2.03016e-10 kg; name cobalt; = factor_MJ_kWh*0.0000000000172; lognormal variance with pedigree 0.034, pedigree (3,5,4,5,3)
  (same comment as for Arsenic)
- Nickel [air, non-urban air or from high stacks]: 5.08721e-9 kg; name nickel; = factor_MJ_kWh*0.000000000431; lognormal variance with pedigree 0.034, pedigree (3,5,4,5,3)
  (same comment as for Arsenic)
- Benzene [air, non-urban air or from high stacks]: 1.06466e-8 kg; name benzene; = factor_MJ_kWh*0.000000000902; lognormal variance with pedigree 0.6807, pedigree (3,3,5,3,3)
  (same comment as for Arsenic)
- Beryllium [air, non-urban air or from high stacks]: 2.91541e-11 kg; name beryllium; = factor_MJ_kWh*0.00000000000247; lognormal variance with pedigree 0.034, pedigree (3,5,4,5,3)
  (same comment as for Arsenic)
- Pentane [air, non-urban air or from high stacks]: 1.35738e-5 kg; name pentane; = factor_MJ_kWh*0.00000115; lognormal variance with pedigree 0.6807, pedigree (3,3,5,3,3)
  (same comment as for Arsenic)
- Carbon monoxide, fossil [air, non-urban air or from high stacks]: 0.000426186 kg; name carbon_monoxide_fossil; = factor_MJ_kWh*0.0000361074502145192; lognormal variance with pedigree 0.3087, pedigree (3,3,4,3,3)
  Calculated emissions when producing 1kWh of electricity by burning natural gas in a conventional cycle power plant. Weighted average based on the fuel consumption and net electricity production of the following natural gas conventional cycle power plants in Peru (COES, 2014) and emission factor from (EPA, 1998).
  Power plant Net electricity production (GWh) Natural gas (ft3 10E+3)
  TG Santa Rosa WTG - Gas 3.22E+00 3.68E+04
  Sta Rosa TG8 7.90E+02 7.83E+06
  Malacas TG1 5.20E+00 1.29E+05
  Malacas TG4 4.32E+02 5.23E+06
  Pisco TG1 2.84E+02 3.28E+06
  Pisco TG2 2.43E+02 2.83E+06
  Las Flores 8.05E+01 8.17E+05
  Las Flores 1.22E+02 1.24E+06
  Tablazo 8.00E+01 8.65E+05
  TG1 Aguaytía 2.72E+02 3.82E+06
  TG2 Aguaytía 1.08E+02 1.47E+06
  Termochilca TG1 3.56E+02 3.53E+06
  Source for electricity production and fuel consumption:
  COES, 2014. Sub Dirección de Gestión de la Información. RA-SGI-0115. ESTADISTICA RELEVANTE DEL SISTEMA ELÉCTRICO INTERCONECTADO NACIONAL, (2014). Cap. 06 PRODUCCIÓN TERMOELÉCTRICA Y CONSUMO DE COMBUSTIBLE. Retrieved online from http://www.coes.org.pe/Portal/Publicaciones/Estadisticas/ 2014/PDF/06_PRODUCCION TERMOELECTRICA Y CONSUMO DE COMBUSTIBLE, CUADRO N° 6.3 CONSUMO DE COMBUSTIBLE EN LAS CENTRALES TERMOELÉCTRICAS 2014,CUADRO N° 6.2 RENDIMIENTO PROMEDIO ANUAL - 2014. accessed on November 14, 2017.
  Source for allocation in combined cycle and conventional cycle technology:
  COES, 2014. Sub Dirección de Gestión de la Información. RA-SGI-0115. ESTADISTICA RELEVANTE DEL SISTEMA ELÉCTRICO INTERCONECTADO NACIONAL, (2014). Cap. 06 PRODUCCIÓN TERMOELÉCTRICA Y CONSUMO DE COMBUSTIBLE. Retrieved online from http://www.coes.org.pe/Portal/Publicaciones/Estadisticas/ 2014/PDF/06_PRODUCCION TERMOELECTRICA Y CONSUMO DE COMBUSTIBLE, CUADRO, No 6.8_COSTOS VARIABLES DE LAS CENTRALES TERMOELÉCTRICAS DEL COES. accessed on November 14, 2017.
  Low heating value of natural gas 9030 kcal/m3
  Source: http://www.minem.gob.pe/minem/archivos/gasnatural.pdf accessed on November 14, 2017.
  Density of natural gas: 0.65 kg/m3
  Source: http://www.minem.gob.pe/minem/archivos/gasnatural.pdf accessed on November 14, 2017.
  Substance Emission factor lb/(scf 10E+6)
  Óxidos de nitrógeno (NOx) 140
  Monoxido de carbono (CO) 84
  Dióxido de carbono (CO2) 120000
  Óxido nitroso (N2O) controlado 0.64
  Dióxido de azufre (SO2) 0.6
  Metano (CH4) 2.3
  Source:
  EPA AP 42, Fifth Edition, Volume I Chapter 1: External Combustion, 1.4 NATURAL GAS COMBUSTION. Retrieved online from URL: <https://www3.epa.gov/ttn/chief/ap42/ch01/final/c01s04.pdf> accessed on 24 august 2017.
- Methane, fossil [air, non-urban air or from high stacks]: 1.16694e-5 kg; name methane_fossil; = factor_MJ_kWh*9.88656374921358E-07; lognormal variance with pedigree 0.6807, pedigree (3,3,5,3,3)
  (same comment as for Carbon monoxide, fossil)
- Dinitrogen monoxide [air, non-urban air or from high stacks]: 1.15318e-5 kg; name dinitrogen_monoxide; = factor_MJ_kWh*0.000000977; lognormal variance with pedigree 0.3407, pedigree (3,3,5,3,3)
  Literature value/calculated value. Emissions when producing 1kWh of electricity, based on the burning of 1MJ of natural gas. Weighted average with electricity production data (Itten&Frischknecht 2012) and emission values of 11 countries
  (AT, BE, DE, ES, FR, GB, IT, JP, LU, NL, US) (Faist Emmenegger et al. 2007)
  Country emissions values estimate from range of values from different references. See Tab. 11.15, p. 133f in Faist Emmenegger et al. 2007.
  Source:
  Itten R. and Frischknecht R. (2012) Life Cycle Inventories of Electricity Mixes and Grid. ESU-services Ltd., Uster, Switzerland.
- Ethane [air, non-urban air or from high stacks]: 1.61705e-5 kg; name ethane; = factor_MJ_kWh*0.00000137; lognormal variance with pedigree 0.6807, pedigree (3,3,5,3,3)
  (same comment as for Arsenic)
- Carbon dioxide, fossil [air, non-urban air or from high stacks]: 0.608838 kg; name carbon_dioxide_fossil; = factor_MJ_kWh*0.0515820717350274; lognormal variance with pedigree 0.0513, pedigree (3,3,5,3,3)
  (same comment as for Carbon monoxide, fossil)
- Benzo(a)pyrene [air, non-urban air or from high stacks]: 6.24393e-12 kg; name benzo_a_pyrene; = factor_MJ_kWh*0.000000000000529; lognormal variance with pedigree 0.6807, pedigree (3,3,5,3,3)
  (same comment as for Arsenic)
- Selenium [air, non-urban air or from high stacks]: 5.79541e-11 kg; name selenium; = factor_MJ_kWh*0.00000000000491; lognormal variance with pedigree 0.6807, pedigree (3,3,5,3,3)
  (same comment as for Arsenic)
- Manganese [air, non-urban air or from high stacks]: 9.21836e-10 kg; name manganese; = factor_MJ_kWh*0.0000000000781; lognormal variance with pedigree 0.034, pedigree (3,5,4,5,3)
  (same comment as for Arsenic)
- Lead [air, non-urban air or from high stacks]: 1.21574e-9 kg; name lead; = factor_MJ_kWh*0.000000000103; lognormal variance with pedigree 0.034, pedigree (3,5,4,5,3)
  (same comment as for Arsenic)
- Toluene [air, non-urban air or from high stacks]: 1.77049e-8 kg; name toluene; = factor_MJ_kWh*0.0000000015; lognormal variance with pedigree 0.6807, pedigree (3,3,5,3,3)
  (same comment as for Arsenic)
- PAH, polycyclic aromatic hydrocarbons [air, non-urban air or from high stacks]: 9.44262e-8 kg; name pah; = factor_MJ_kWh*0.000000008; lognormal variance with pedigree 1.1067, pedigree (4,3,5,3,3)
  (same comment as for Arsenic)
- Sulfur dioxide [air, non-urban air or from high stacks]: 3.04419e-6 kg; name sulfur_dioxide; = factor_MJ_kWh*2.57910358675137E-07; lognormal variance with pedigree 0.0517, pedigree (3,3,5,3,3)
  (same comment as for Carbon monoxide, fossil)
- Mercury [air, non-urban air or from high stacks]: 8.12066e-10 kg; name mercury; = factor_MJ_kWh*0.0000000000688; lognormal variance with pedigree 0.6807, pedigree (3,3,5,3,3)
  (same comment as for Arsenic)
- Hexane [air, non-urban air or from high stacks]: 9.36e-6 kg; name hexane; = factor_MJ_kWh*0.000000793; lognormal variance with pedigree 0.6807, pedigree (3,3,5,3,3)
  (same comment as for Arsenic)
- Particulates, < 2.5 um [air, non-urban air or from high stacks]: 6.11641e-6 kg; name particulates_lt2_5; = factor_MJ_kWh*6.11626297577855E-06/11.803; lognormal variance with pedigree 0.3087, pedigree (3,3,4,3,3)
  Literature value. Value taken from the dataset of natural gas burned in a combined cycle power plant ("electricity production, natural gas, combined cycle power plant, PE, 2008-2008").
- Acetaldehyde [air, non-urban air or from high stacks]: 9.44262e-9 kg; name acetaldehyde; = factor_MJ_kWh*0.0000000008; lognormal variance with pedigree 1.1067, pedigree (4,3,5,3,3)
  (same comment as for Arsenic)
- Butane [air, non-urban air or from high stacks]: 1.09298e-5 kg; name butane; = factor_MJ_kWh*0.000000926; lognormal variance with pedigree 0.6807, pedigree (3,3,5,3,3)
  (same comment as for Arsenic)
- Chromium [air, non-urban air or from high stacks]: 3.38754e-9 kg; name chromium; = factor_MJ_kWh*0.000000000287; lognormal variance with pedigree 0.034, pedigree (3,5,4,5,3)
  (same comment as for Arsenic)
- Formaldehyde [air, non-urban air or from high stacks]: 3.81246e-7 kg; name formaldehyde; = factor_MJ_kWh*0.0000000323; lognormal variance with pedigree 0.6807, pedigree (3,3,5,3,3)
  (same comment as for Arsenic)
- Nitrogen oxides [air, non-urban air or from high stacks]: 0.00071031 kg; name nitrogen_oxides; = factor_MJ_kWh*0.0000601790836908653; lognormal variance with pedigree 0.3087, pedigree (3,3,4,3,3)
  (same comment as for Carbon monoxide, fossil)
- Cadmium [air, non-urban air or from high stacks]: 2.66754e-9 kg; name cadmium; = factor_MJ_kWh*0.000000000226; lognormal variance with pedigree 0.034, pedigree (3,5,4,5,3)
  (same comment as for Arsenic)

## Sampling procedure
Peruvian national statistics and environmental reports from nine plants.

## Extrapolations
This dataset is based on GLO dataset, "electricity production, natural gas, at conventional power plant, GLO" (accessed October 2017). Data from nine Peruvian power plants that account for 100% of the natural gas conventional electricity production were considered, including net electricity production and efficiency (COES, 2014).
The PM<2.5 emission, cooling and feed water exchanges were taken from the PE dataset: "electricity production, natural gas, at conventional power plant, PE, 2008-2008", accessed October 2017.

For the following exchanges, emission factors from EPA were used:
*exchange amount_PM<2.5
*exchange amount_carbon dioxide, fossil (kg CO2/kWh)
*exchange amount_carbon monoxide fossil
*exchange amount_methane fossil (kg CH4/kWh)
*exchange amount_nitrogen oxide (kg NOx/kWh)
*exchange amount_PM>2.5<10
*exchange amount_sulfur dioxide (kg SO2/kWh)

Source:
EPA AP 42, Fifth Edition, Volume I Chapter 1: External Combustion, 1.4 NATURAL GAS COMBUSTION. Retrieved online from URL: <https://www3.epa.gov/ttn/chief/ap42/ch01/final/c01s04.pdf> accessed on 24 august 2017.

## Review by Christopher Oberschelp 2018-01-16
Documentation, key values and data format seem reasonable. Individual deviations may be spotted by comparison with reference datasets. Uncertainties might have to be adjusted later (as agreed upon with ecoinvent).
