# carbon tetrachloride production

Dataset: EcoSpold 2, unit process
Geography: RER
Time period: 1997-01-01 to 2019-12-31
Technology level: current
Classification: EcoSpold01Categories: chemicals/organics
Classification: ISIC rev.4 ecoinvent: 2011:Manufacture of basic chemicals
Synonyms: Tetrachloromethane
Tags: ConvertedDataset
Scenario: Business-as-Usual
System model: Allocation at the point of substitution
Generated by: Roland Hischier
Published in: Althaus H.-J. 2004
Database: ecoinvent
isCopyrightProtected: true
accessRestrictedTo: 1

## General comment
Data are from the Eco-profiles of the European plastics industry (APME). Not included are the values reported for: recyclable wastes, amount of air / N2 / O2 consumed, unspecified metal emission to air and to water, mercaptan emission to air, unspecified CFC/HCFC emission to air. The amount of "sulphur (bonded)" is assumed to be included into the amount of raw oil.
[This dataset was already contained in the ecoinvent database version 2. It was not individually updated during the transfer to ecoinvent version 3. Life Cycle Impact Assessment results may still have changed, as they are affected by changes in the supply chain, i.e. in other datasets. This dataset was generated following the ecoinvent quality guidelines for version 2. It may have been subject to central changes described in the ecoinvent version 3 change report (http://www.ecoinvent.org/database/ecoinvent-version-3/reports-of-changes/), and the results of the central updates were reviewed extensively. The changes added e.g. consistent water flows and other information throughout the database. The documentation of this dataset can be found in the ecoinvent reports of version 2, which are still available via the ecoinvent website. The change report linked above covers all central changes that were made during the conversion process.]

## Included activities end
Aggregated data for all processes from raw material extraction until delivery at plant

## Geography
5 major European producers

## Technology
production by three different routes (methane with chlorine / chlorination of chloromethane / chlorination of higher hydrocarbons)

## Time period
date of literature used

## Parameters
- fraction, cooling water, cooling pond system, to air: 0.032; name fraction_CW_CP_to_air; lognormal variance with pedigree 0.0413, pedigree (2,3,1,3,1)
  Calculated based on literature value (Scown, C.D., 2011, Water Footprint of U.S. Transportation Fuels and supplying information of the article) (Vionnet, S., Quantis Water Database - Technical Report, 2012).
- fraction, cooling water, once-through system, to air: 0.004; name fraction_CW_OT_to_air; lognormal variance with pedigree 0.0413, pedigree (2,3,1,3,1)
  (same comment as for fraction, cooling water, cooling pond system, to air)
- fraction, cooling water, to air: 0.3875; name fraction_CW_to_air; = (0.5*fraction_CW_OT_to_air)+(0.5*fraction_CW_R_to_air); lognormal variance with pedigree 0.092025, pedigree (4,4,3,2,4)
  Calculated value based on literature value (see comments of the other parametres present in this dataset) and expert opinion. In the case when no industry/literature data are available about the type of cooling or directly fraction, cooling water, to air specific for the process a default assumption is applied. It is assumed that the once-through cooling system is used in 50% of all cases and recirculating system is used in another 50% of all cases.
- fraction, cooling water, recirculating system, to air: 0.771; name fraction_CW_R_to_air; lognormal variance with pedigree 0.0413, pedigree (2,3,1,3,1)
  (same comment as for fraction, cooling water, cooling pond system, to air)
- fraction, process water, to air: 0.205 dimensionless; name fraction_PW_to_air; lognormal variance with pedigree 0.092025, pedigree (4,4,3,2,4)
  Literature value (Statistics Canada, 2007 & Shaffer, K.H., 2008, Consumptive water use in the Great Lakes Basin, USGS) (Vionnet, S., Quantis Water Database - Technical Report, 2012).

## Reference product
- carbon tetrachloride: 1 kg; By-product classification allocatable product; CPC 34110: Hydrocarbons and their halogenated, sulphonated, nitrated or nitrosated derivatives; CAS 56-23-5
  EcoSpold01Location=RER
  production volume 3.6523e7 kg
    Unknown
    Assumed to be 1/4 of global production volume
  property carbon content 0.0789474
    carbon content on a dry matter basis (reserved; not for manual entry)
  property true value 5.4
    allocation property applied in "true value" allocation // value calculated from revenue
  properties: carbon content, non-fossil 0, carbon content, fossil 0.0789474, price 5.4 EUR2005, water content 0, wet mass 1 kg, dry mass 1 kg, water in wet mass 0 kg, carbon allocation 0.0789474 kg

## By-products
- electricity, for reuse in municipal waste incineration only: 0 kWh; CPC 17100: Electrical energy; By-product classification allocatable product; pedigree (1,1,1,1,1)
  Net electricity generated from this waste and used in internal MSWI plant energy redistribution.
  Uncertainty: uncertainty is calculated from uncertainties in waste composition and uncertainties in energy efficiency and the uncertainty in internal energy demand
  production volume 1.32457 kWh
  property true value relation 3.6; name E_el_prod_MSWI_true_value_relation
    property to calculate "true value" from
  property exergy 3.6 MJ; name E_el_prod_MSWI_exergy
    This exergy property is based on the exergy content of the product.
  property price 0.1 EUR2005; name E_el_prod_MSWI_price_EUR2005
    Estimated to be the same price as in case of electricity, medium voltage.
  property true value 4.65285e-9
    allocation property applied in "true value" allocation // value calculated from true value relation
- heat, for reuse in municipal waste incineration only: 0 MJ; CPC 17300: Steam and hot water; By-product classification allocatable product; pedigree (1,1,1,1,1)
  Net useful heat generated from this waste and used in internal MSWI plant energy redistribution.
  Uncertainty: uncertainty is calculated from uncertainties in waste composition and uncertainties in energy efficiency and the uncertainty in internal energy demand
  production volume 9.28704 MJ
  property true value relation 0.1842; name E_th_prod_MSWI_true_value_relation
    property to calculate "true value" from
  property exergy 0.1842 MJ; name E_th_prod_MSWI_exergy
    This exergy property is based on the exergy content of the product.
  property price 0.0106 EUR2005; name E_th_prod_MSWI_price_EUR2005
    Average European district heat price from Ecoheatcool and Euroheat 2005-2006, Ecoheat Work package 1: The European heat market. Final report. 10.6 EUR/GJ i s the price of district heat. http://www.solarthermalworld.org/files/Ecoheatcool%20WP1%20Web.pdf?download
  property true value 1.6692e-9
    (same comment as for electricity, for reuse in municipal waste incineration only)
- zinc concentrate: 0 kg; CPC 14290: Other non-ferrous metal ores and concentrates (other than uranium or thorium ores and concentrates); By-product classification allocatable product
  Calculated value from the knowledge of the properties of both products.
  production volume 7.31085e-5 kg
  property price 0.38 EUR2005; name ByP_price_EUR2005
    Temporary price data. Calculated as 90% of purchasers price based on: Zinc content in concentrate 53%. Concentrate price per kg Zn 86.5% of refined Zn price (13.5% treatment charges according to CHR Metals Limited 2005: Dynamic cost curves. http://www.minecost.com/dynamic.pdf). 2004 zinc price from USGS (2007) Mineral commodity summaries 2007. <http://minerals.usgs.gov/minerals/pubs/mcs/2007/mcs2007.pdf> [Accessed 25 May 2010]
  property zinc content 0.53; name zinc_C_zinc_concentrate
    Zinc content on a dry matter basis. Value taken from teh "zinc mine operation" /GLO dataset.
  property dry mass 1 kg; name DM_zinc_concentrate
  property carbon content 0
    carbon content on a dry matter basis (reserved; not for manual entry)
  property true value 7.60651e-13
    allocation property applied in "true value" allocation // value calculated from revenue
  properties: wet mass 1 kg, water content 0, carbon content, non-fossil 0, carbon content, fossil 0, water in wet mass 0 kg, carbon allocation 0 kg
- copper: 0 kg; By-product classification allocatable product; CPC 41413: Refined copper and copper alloys, unwrought; master alloys of copper
  production volume 0.270086 kg
  property price 5.52 EUR2005
    Literature value (http://www.economist.com/news/business/21576714-mining-industry-has-enriched-chile-its-future-precarious-copper-solution). Average price between 20015 and 2013.
  property carbon content 0
    carbon content on a dry matter basis (reserved; not for manual entry)
  property true value 4.08202e-8
    allocation property applied in "true value" allocation // value calculated from revenue
  properties: water in wet mass 0 kg, water content 0, carbon content, non-fossil 0, dry mass 1 kg, carbon content, fossil 0, wet mass 1 kg, carbon allocation 0 kg
- lead: 0 kg; CPC 41441: Lead, unwrought; By-product classification allocatable product
  EcoSpold01Location=SE
  production volume 0.00703686 kg
  property price 0.744 EUR2005
    Temporary price data. Calculated as 90% of purchasers price based on: Source: ecoinvent v2 report 10-part IX, Tab 5.10 & 2.5
  property carbon content 0
    carbon content on a dry matter basis (reserved; not for manual entry)
  property true value 1.43346e-10
    allocation property applied in "true value" allocation // value calculated from revenue
  properties: wet mass 1 kg, water content 0, carbon content, non-fossil 0, carbon content, fossil 0, dry mass 1 kg, water in wet mass 0 kg, carbon allocation 0 kg
- nickel, 99.5%: 0 kg; CPC 41422: Unwrought nickel; By-product classification allocatable product
  EcoSpold01Location=SE
  production volume 0.0146893 kg
  property price 10.4 EUR2005
    Temporary price data. Calculated as 90% of purchasers price based on: 2004 nickel price from USGS (2007) Mineral commodity summaries 2007. <http://minerals.usgs.gov/minerals/pubs/mcs/2007/mcs2007.pdf> [Accessed 25 May 2010]
  property carbon content 0
    carbon content on a dry matter basis (reserved; not for manual entry)
  property true value 4.18279e-9
    allocation property applied in "true value" allocation // value calculated from revenue
  properties: water in wet mass 0 kg, wet mass 1 kg, carbon content, non-fossil 0, dry mass 1 kg, water content 0, carbon content, fossil 0, carbon allocation 0 kg
- silver: 0 kg; CPC 41310: Silver (including silver plated with gold or platinum), unwrought or in semi-manufactured forms, or in powder […]; By-product classification allocatable product; CAS 7440-22-4
  EcoSpold01Location=SE
  production volume 0.00242578 kg
  property price 178 EUR2005
    (same comment as for lead)
  property carbon content 0
    carbon content on a dry matter basis (reserved; not for manual entry)
  property true value 1.18224e-8
    allocation property applied in "true value" allocation // value calculated from revenue
  properties: wet mass 1 kg, carbon content, non-fossil 0, dry mass 1 kg, water content 0, carbon content, fossil 0, water in wet mass 0 kg, carbon allocation 0 kg
- palladium: 0 kg; CPC 4160: Other non-ferrous metals and articles thereof (including waste and scrap of some metals); cermets and articles […]; By-product classification allocatable product
  EcoSpold01Location=SE
  production volume 0.000134283 kg
  property price 5640 EUR2005
    Temporary price data. Calculated as 90% of purchasers price based on: 2004 price from USGS (2007) Mineral commodity summaries 2007. <http://minerals.usgs.gov/minerals/pubs/mcs/2007/mcs2007.pdf> [Accessed 25 May 2010]
  property carbon content 0
    carbon content on a dry matter basis (reserved; not for manual entry)
  property true value 2.07364e-8
    allocation property applied in "true value" allocation // value calculated from revenue
  properties: wet mass 1 kg, carbon content, fossil 0, water in wet mass 0 kg, water content 0, carbon content, non-fossil 0, dry mass 1 kg, carbon allocation 0 kg
- gold: 0 kg; CPC 41320: Gold (including gold plated with platinum), unwrought or in semi-manufactured forms, or in powder form; By-product classification allocatable product; CAS 7440-57-5
  EcoSpold01Location=SE
  production volume 7.36402e-5 kg
  property price 10600 EUR2005
    Temporary price data. Calculated as 90% of purchasers price based on: Source: ecoinvent v2 report 10-part IX, Tab 2.5
  property carbon content 0
    carbon content on a dry matter basis (reserved; not for manual entry)
  property true value 2.13725e-8
    allocation property applied in "true value" allocation // value calculated from revenue
  properties: wet mass 1 kg, carbon content, fossil 0, dry mass 1 kg, carbon content, non-fossil 0, water content 0, water in wet mass 0 kg, carbon allocation 0 kg
- iron scrap, sorted, pressed: 0 kg; By-product classification Recyclable; CPC 39310: Slag, dross, scalings and other waste from the manufacture of iron or steel; pedigree (1,1,1,1,1)
  Iron scrap recovered from this waste.
  production volume 0.0347077 kg
  property price 0.175 EUR2005
    Temporary price data. Calculated as 90% of purchasers price based on: 2005 import and export prices (total trades (USD) divided by total weight (kg) in biggest economies of the world: EU27, USA, Brasil, China, India, Japan and Russia) from UN Commodity Trade Statistics Database (http://data.un.org/Explorer.aspxDatabase [Accessed 2011.06.20]). Commodity: Waste or scrap, of cast iron
  property carbon content 0
    carbon content on a dry matter basis (reserved; not for manual entry)
  property true value 1.66302e-10
    allocation property applied in "true value" allocation // value calculated from revenue
  properties: water content 0, water in wet mass 0 kg, carbon content, fossil 0, dry mass 1 kg, carbon content, non-fossil 0, wet mass 1 kg, carbon allocation 0 kg

## Inputs from technosphere
All rows: lognormal variance with pedigree 0.04, pedigree (1,1,5,1,1)
- waste plastic, mixture: -5e-7 kg
  EcoSpold01Location=CH
  production volume 18.2615 kg
    Calculated from the production volume of carbon tetrachloride in proportion to the respective output amounts.
  properties: dry mass 0.847 kg, water content 0.180638, wet mass 1 kg, carbon content, fossil 0.747344
  note on carbon content, fossil: C content in 1 kg DM was calculated using data in Tab A.2, ecoinvent v2.2 report 13_I
- municipal solid waste: -0.0072 kg
  EcoSpold01Location=CH
  production volume 262966 kg
    (same comment as for waste plastic, mixture)
  properties: wet mass 1 kg, dry mass 0.771 kg, water content 0.297017, carbon content, non-fossil 0.261655, carbon content, fossil 0.171549
  note on carbon content, non-fossil: MSW composition in tab 4.1, ecoinvent v2.2 report 13_I. C content referred to 1 kg DM
- hazardous waste, for underground deposit: -0.0049 kg
  EcoSpold01Location=DE
  production volume 178963 kg
    (same comment as for waste plastic, mixture)
  properties: carbon content, fossil 0.554667, dry mass 1 kg, wet mass 1 kg
  note on carbon content, fossil: Tab A.6, ecoinvent v2.2 report 13_I, average hazardous waste composition was used, and referred to 0% water mass. No waste-specific emission are currently inventoried for underground deposits. Accordingly, no waste composition must be specified. For generic, average waste to underground deposit deposition in a 200 liter steel drum without cement solidification is assumed (ecoinvent v2.2 report 13_I).
- spoil from hard coal mining: -0.048 kg
  EcoSpold01Location=GLO
  production volume 1.7531e6 kg
    (same comment as for waste plastic, mixture)
  properties: wet mass 1 kg, carbon content, fossil 0.007879, dry mass 1 kg
  note on carbon content, fossil: Composition of coal spoil is adopted by proxy from lignite spoil (pg 19, Doka G. (2009) Life Cycle Inventory of the disposal of lignite spoil, coal spoil and coal tailings. Doka Life Cycle Assessments, Zurich. Commissioned by the Swiss Centre for Life Cycle Inventories ecoinvent Centre)
- waste wood, untreated: -5e-7 kg
  EcoSpold01Location=CH
  production volume 18.2615 kg
    (same comment as for waste plastic, mixture)
  properties: water content 0.25, wet mass 1 kg, dry mass 0.8 kg, carbon content, non-fossil 0.48632
  note on carbon content, non-fossil: Tab A.4, ecoinvent v2.2 report 13_I. C content has been referred to 1 kg DM,
- decommissioned chemical production facilities: -2e-6 kg
  EcoSpold01Location=RER
  production volume 73.046 kg
    (same comment as for waste plastic, mixture)
  properties: carbon content, non-fossil 5.78006e-6, carbon content, fossil 0.0169382, wet mass 1 kg, dry mass 1 kg
  note on carbon content, non-fossil: Calculated from C content in input materials in the infrastructure
- average incineration residue: -0.0207 kg
  EcoSpold01Location=CH
  production volume 756026 kg
    (same comment as for waste plastic, mixture)
  properties: carbon content, fossil 0.0325466, carbon content, non-fossil 0.0511208, wet mass 1 kg, dry mass 1 kg
  note on carbon content, fossil: Tab A.1, ecoinvent v2.2 report 13_I. It is considered that 61.1% of the C has a biogenic origin

## Inputs from nature
- Sylvite, in ground [natural resource, in ground]: 5e-6 kg; lognormal variance with pedigree 0.04, pedigree (1,1,5,1,1)
  25% Sylvite in sylvinite
- Barium, in ground [natural resource, in ground]: 0.00061 kg; lognormal variance with pedigree 0.04, pedigree (1,1,5,1,1)
  15% BaSO4 in ore
- Sodium chloride, in ground [natural resource, in ground]: 1.1 kg; lognormal variance with pedigree 0.04, pedigree (1,1,5,1,1)
- Clay, unspecified, in ground [natural resource, in ground]: 2e-6 kg; lognormal variance with pedigree 0.04, pedigree (1,1,5,1,1)
- Coal, hard, unspecified, in ground [natural resource, in ground]: 0.11 kg; lognormal variance with pedigree 0.04, pedigree (1,1,5,1,1)
- Water, well, in ground [natural resource, in water]: 0.0018 m3; name water_well_in_ground_input; lognormal variance with pedigree 0.04, pedigree (1,1,5,1,1)
- Sulfur, in ground [natural resource, in ground]: 0.0015 kg; lognormal variance with pedigree 0.04, pedigree (1,1,5,1,1)
- Oil, crude, in ground [natural resource, in ground]: 0.12 kg; lognormal variance with pedigree 0.04, pedigree (1,1,5,1,1)
- Coal, brown, in ground [natural resource, in ground]: 0.018 kg; lognormal variance with pedigree 0.04, pedigree (1,1,5,1,1)
- Energy, potential (in hydropower reservoir), converted [natural resource, in water]: 0.89 MJ
- Sand, unspecified, in ground [natural resource, in ground]: 0.00078 kg; lognormal variance with pedigree 0.04, pedigree (1,1,5,1,1)
- Water, river [natural resource, in water]: 1.7e-6 m3; name water_river_input; lognormal variance with pedigree 0.04, pedigree (1,1,5,1,1)
- Iron, in ground [natural resource, in ground]: 8.5e-5 kg; lognormal variance with pedigree 0.04, pedigree (1,1,5,1,1)
  46% Fe in siderite; 25% Fe in ore
- Calcite, in ground [natural resource, in ground]: 0.022 kg; lognormal variance with pedigree 0.04, pedigree (1,1,5,1,1)
- Water, cooling, unspecified natural origin [natural resource, in water]: 0.14 m3; name water_cooling_UNO_input; lognormal variance with pedigree 0.04, pedigree (1,1,5,1,1)
- Fluorspar, in ground [natural resource, in ground]: 3e-6 kg; lognormal variance with pedigree 0.04, pedigree (1,1,5,1,1)
  92% CaF2 in ore
- Gas, natural, in ground [natural resource, in ground]: 0.362 m3; lognormal variance with pedigree 0.04, pedigree (1,1,5,1,1)
- Uranium, in ground [natural resource, in ground]: 2.19e-5 kg; lognormal variance with pedigree 0.04, pedigree (1,1,5,1,1)
- Aluminium, in ground [natural resource, in ground]: 5.76e-6 kg; lognormal variance with pedigree 0.04, pedigree (1,1,5,1,1)
  24% Al in bauxite; 11% Al in ore
- Wood, unspecified, standing [natural resource, biotic]: 7.6e-9 m3; lognormal variance with pedigree 0.04, pedigree (1,1,5,1,1)
- Water, salt, ocean [natural resource, in water]: 7.4e-7 m3; name water_salt_ocean_input; lognormal variance with pedigree 0.04, pedigree (1,1,5,1,1)
- Water, unspecified natural origin [natural resource, in water]: 0.0075 m3; name water_UNO_input; lognormal variance with pedigree 0.04, pedigree (1,1,5,1,1)

## Emissions to nature
- Ammonium, ion [water, surface water]: 5e-7 kg; lognormal variance with pedigree 0.04, pedigree (1,1,5,1,1)
- TOC, Total Organic Carbon [water, surface water]: 4e-6 kg; lognormal variance with pedigree 0.04, pedigree (1,1,5,1,1)
- Particulates, > 10 um [air, urban air close to ground]: 0.000672 kg; lognormal variance with pedigree 0.04, pedigree (1,1,5,1,1)
- Carbon dioxide, fossil [air, urban air close to ground]: 1.4 kg; lognormal variance with pedigree 0.04, pedigree (1,1,5,1,1)
- Chloride [water, surface water]: 0.063 kg; lognormal variance with pedigree 0.04, pedigree (1,1,5,1,1)
- Hydrogen chloride [air, urban air close to ground]: 6.2e-5 kg; lognormal variance with pedigree 0.04, pedigree (1,1,5,1,1)
- Mercury [air, urban air close to ground]: 5e-7 kg; lognormal variance with pedigree 0.04, pedigree (1,1,5,1,1)
- Ammonia [air, urban air close to ground]: 5e-7 kg; lognormal variance with pedigree 0.04, pedigree (1,1,5,1,1)
- BOD5, Biological Oxygen Demand [water, surface water]: 1.1e-5 kg; lognormal variance with pedigree 0.04, pedigree (1,1,5,1,1)
- Phosphorus [water, surface water]: 2.2e-7 kg; lognormal variance with pedigree 0.04, pedigree (1,1,5,1,1)
- Nickel, ion [water, surface water]: 5e-7 kg; lognormal variance with pedigree 0.04, pedigree (1,1,5,1,1)
- Methane, fossil [air, urban air close to ground]: 0.0091 kg; lognormal variance with pedigree 0.04, pedigree (1,1,5,1,1)
- Particulates, < 2.5 um [air, urban air close to ground]: 0.000525 kg; lognormal variance with pedigree 0.04, pedigree (1,1,5,1,1)
- Aluminium [water, surface water]: 5e-7 kg; lognormal variance with pedigree 0.04, pedigree (1,1,5,1,1)
- Hydrogen [air, urban air close to ground]: 0.00021 kg; lognormal variance with pedigree 0.04, pedigree (1,1,5,1,1)
- Fluoride [water, surface water]: 5e-7 kg; lognormal variance with pedigree 0.04, pedigree (1,1,5,1,1)
- Suspended solids, unspecified [water, surface water]: 0.0015 kg; lognormal variance with pedigree 0.04, pedigree (1,1,5,1,1)
- Ethene, chloro- [air, urban air close to ground]: 5e-7 kg; lognormal variance with pedigree 0.04, pedigree (1,1,5,1,1)
- Calcium, ion [water, surface water]: 0.0029 kg; lognormal variance with pedigree 0.04, pedigree (1,1,5,1,1)
- Acidity, unspecified [water, surface water]: 1.6e-5 kg; lognormal variance with pedigree 0.04, pedigree (1,1,5,1,1)
- Sulfate [air, urban air close to ground]: 4.9e-7 kg; lognormal variance with pedigree 0.04, pedigree (1,1,5,1,1)
- Cyanide [water, surface water]: 5e-7 kg; lognormal variance with pedigree 0.04, pedigree (1,1,5,1,1)
- Zinc, ion [water, surface water]: 5e-7 kg; lognormal variance with pedigree 0.04, pedigree (1,1,5,1,1)
- Hydrogen sulfide [air, urban air close to ground]: 5e-7 kg; lognormal variance with pedigree 0.04, pedigree (1,1,5,1,1)
- Hydrocarbons, aromatic [air, urban air close to ground]: 5e-7 kg; lognormal variance with pedigree 0.04, pedigree (1,1,5,1,1)
- Oils, unspecified [water, surface water]: 1e-6 kg; lognormal variance with pedigree 0.04, pedigree (1,1,5,1,1)
- Hydrogen fluoride [air, urban air close to ground]: 3e-6 kg; lognormal variance with pedigree 0.04, pedigree (1,1,5,1,1)
- Magnesium [water, surface water]: 2e-6 kg; lognormal variance with pedigree 0.04, pedigree (1,1,5,1,1)
- Water [water, unspecified]: 0.0931454 m3; name water_to_water_unspecified; = water_cooling_UNO_input*(1-fraction_CW_to_air)+water_river_input*(1-fraction_PW_to_air)+water_salt_ocean_input*(1-fraction_PW_to_air)+water_UNO_input*(1-fraction_PW_to_air)+water_well_in_ground_input*(1-fraction_PW_to_air); lognormal variance with pedigree 0.0807, pedigree (2,2,5,1,1)
  Calculated value based on literature values and expert opinion. See comments in the parametres' comment field.
  property fraction, origin: fresh water 0.0153776; name fraction_origin_fresh_water_Ww
  property fraction, origin: unspecified 0.984616; name fraction_origin_unspecified_Ww
  property fraction, origin: salt water 6.31593e-6; name fraction_origin_salt_water_Ww
  property water in wet mass 1000 kg; name WWM
  property dry mass 0 kg; name DM
  property wet mass 1000 kg; name WM
  property carbon content, non-fossil 0; name C_content_non_fossil
  property carbon content, fossil 0; name C_content_fossil
- Hydrocarbons, chlorinated [air, urban air close to ground]: 0.00045 kg; lognormal variance with pedigree 0.04, pedigree (1,1,5,1,1)
- Carbon monoxide, fossil [air, urban air close to ground]: 0.001 kg; lognormal variance with pedigree 0.04, pedigree (1,1,5,1,1)
- Water [air, unspecified]: 0.056157 m3; name water_to_air_unspecified; = (water_cooling_UNO_input*fraction_CW_to_air)+(water_river_input*fraction_PW_to_air)+(water_salt_ocean_input*fraction_PW_to_air)+(water_UNO_input*fraction_PW_to_air)+(water_well_in_ground_input*fraction_PW_to_air); lognormal variance with pedigree 0.0807, pedigree (2,2,5,1,1)
  (same comment as for Water)
  property fraction, origin: salt water 2.70136e-6; name fraction_origin_salt_water
  property fraction, origin: fresh water 0.00657707; name fraction_origin_fresh_water
  property fraction, origin: unspecified 0.99342; name fraction_origin_unspecified
- Potassium, ion [water, surface water]: 5e-7 kg; lognormal variance with pedigree 0.04, pedigree (1,1,5,1,1)
- Particulates, > 2.5 um, and < 10um [air, urban air close to ground]: 0.000903 kg; lognormal variance with pedigree 0.04, pedigree (1,1,5,1,1)
- NMVOC, non-methane volatile organic compounds, unspecified origin [air, urban air close to ground]: 0.000969 kg; lognormal variance with pedigree 0.04, pedigree (1,1,5,1,1)
- Sulfide [water, surface water]: 5e-6 kg; lognormal variance with pedigree 0.04, pedigree (1,1,5,1,1)
- Sulfur dioxide [air, urban air close to ground]: 0.007 kg; lognormal variance with pedigree 0.04, pedigree (1,1,5,1,1)
- Aldehydes, unspecified [air, urban air close to ground]: 5e-7 kg; lognormal variance with pedigree 0.04, pedigree (1,1,5,1,1)
- Nitrogen oxides [air, urban air close to ground]: 0.0074 kg; lognormal variance with pedigree 0.04, pedigree (1,1,5,1,1)
- Sodium, ion [water, surface water]: 0.036 kg; lognormal variance with pedigree 0.04, pedigree (1,1,5,1,1)
- Ethane, 1,2-dichloro- [air, urban air close to ground]: 5e-7 kg; lognormal variance with pedigree 0.04, pedigree (1,1,5,1,1)
- Dinitrogen monoxide [air, urban air close to ground]: 5e-7 kg; lognormal variance with pedigree 0.04, pedigree (1,1,5,1,1)
- Copper, ion [water, surface water]: 5e-7 kg; lognormal variance with pedigree 0.04, pedigree (1,1,5,1,1)
- Chlorinated solvents, unspecified [water, surface water]: 6e-6 kg; lognormal variance with pedigree 0.04, pedigree (1,1,5,1,1)
- Hydrocarbons, unspecified [water, surface water]: 1.2e-5 kg; lognormal variance with pedigree 0.04, pedigree (1,1,5,1,1)
- Dissolved solids [water, surface water]: 0.000171 kg; lognormal variance with pedigree 0.04, pedigree (1,1,5,1,1)
- Carbonate [water, surface water]: 5e-7 kg; lognormal variance with pedigree 0.04, pedigree (1,1,5,1,1)
- Nitrate [water, surface water]: 5e-7 kg; lognormal variance with pedigree 0.04, pedigree (1,1,5,1,1)
- Nitrogen [water, surface water]: 5e-7 kg; lognormal variance with pedigree 0.04, pedigree (1,1,5,1,1)
- Mercury [water, surface water]: 5e-7 kg; lognormal variance with pedigree 0.04, pedigree (1,1,5,1,1)
- Iron, ion [water, surface water]: 3e-6 kg; lognormal variance with pedigree 0.04, pedigree (1,1,5,1,1)
- Cyanide [air, urban air close to ground]: 5e-7 kg; lognormal variance with pedigree 0.04, pedigree (1,1,5,1,1)
- Phenol [water, surface water]: 3e-6 kg; lognormal variance with pedigree 0.04, pedigree (1,1,5,1,1)
- Chlorine [air, urban air close to ground]: 5e-7 kg; lognormal variance with pedigree 0.04, pedigree (1,1,5,1,1)
- COD, Chemical Oxygen Demand [water, surface water]: 5.3e-5 kg; lognormal variance with pedigree 0.04, pedigree (1,1,5,1,1)
- DOC, Dissolved Organic Carbon [water, surface water]: 4e-6 kg; lognormal variance with pedigree 0.04, pedigree (1,1,5,1,1)
  Calculated as equal to TOC.
- Fluorine [air, urban air close to ground]: 5e-7 kg; lognormal variance with pedigree 0.04, pedigree (1,1,5,1,1)
- Lead [air, urban air close to ground]: 5e-7 kg; lognormal variance with pedigree 0.04, pedigree (1,1,5,1,1)
- Sulfate [water, surface water]: 0.0019 kg; lognormal variance with pedigree 0.04, pedigree (1,1,5,1,1)

## Sampling procedure
literature values based on company survey

## Extrapolations
no extrapolation

## Review by Mischa Classen 2010-04-06
passed.
