# acetone production, liquid

Dataset: EcoSpold 2, unit process
Geography: RoW
Time period: 1992-01-01 to 2019-12-31
Technology level: current
Classification: EcoSpold01Categories: chemicals/organics
Classification: ISIC rev.4 ecoinvent: 2011:Manufacture of basic chemicals
Tags: ConvertedDataset
Scenario: Business-as-Usual
System model: Allocation at the point of substitution
Generated by: Roland Hischier
Published in: Althaus H.-J. 2007
Database: ecoinvent
isCopyrightProtected: true
accessRestrictedTo: 1

## General comment
Data are derived from the Eco-profiles of the European plastics industry (PlasticsEurope). Not included are the values reported for: recyclable wastes, amount of air / N2 / O2 consumed, unspecified metal emission to air and to water, mercaptan emission to air, unspecified CFC/HCFC emission to air, dioxin to water. The amount of "sulphur (bonded)" is assumed to be included into the amount of raw oil.
[This dataset was already contained in the ecoinvent database version 2. It was not individually updated during the transfer to ecoinvent version 3. Life Cycle Impact Assessment results may still have changed, as they are affected by changes in the supply chain, i.e. in other datasets. This dataset was generated following the ecoinvent quality guidelines for version 2. It may have been subject to central changes described in the ecoinvent version 3 change report (http://www.ecoinvent.org/database/ecoinvent-version-3/reports-of-changes/), and the results of the central updates were reviewed extensively. The changes added e.g. consistent water flows and other information throughout the database. The documentation of this dataset can be found in the ecoinvent reports of version 2, which are still available via the ecoinvent website. The change report linked above covers all central changes that were made during the conversion process.]

## Included activities end
Aggregated data for all processes from raw material extraction until delivery at plant

## Geography
3 European plants (NL, D)

## Technology
production by oxidation of cumene

## Time period
time to which data refer

## Parameters
- fraction, process water, to air: 0.205 dimensionless; name fraction_PW_to_air; lognormal variance with pedigree 0.092025, pedigree (4,4,3,2,4)
- fraction, cooling water, cooling pond system, to air: 0.032; name fraction_CW_CP_to_air; lognormal variance with pedigree 0.0413, pedigree (2,3,1,3,1)
  Calculated based on literature value (Scown, C.D., 2011, Water Footprint of U.S. Transportation Fuels and supplying information of the article) (Vionnet, S., Quantis Water Database - Technical Report, 2012).
- fraction, cooling water, once-through system, to air: 0.004; name fraction_CW_OT_to_air; lognormal variance with pedigree 0.0413, pedigree (2,3,1,3,1)
  (same comment as for fraction, cooling water, cooling pond system, to air)
- fraction, cooling water, to air: 0.3875; name fraction_CW_to_air; = (0.5*fraction_CW_OT_to_air)+(0.5*fraction_CW_R_to_air); lognormal variance with pedigree 0.092025, pedigree (4,4,3,2,4)
  Calculated value based on literature value (see comments of the other parametres present in this dataset) and expert opinion. In the case when no industry/literature data are available about the type of cooling or directly fraction, cooling water, to air specific for the process a default assumption is applied. It is assumed that the once-through cooling system is used in 50% of all cases and recirculating system is used in another 50% of all cases.
- fraction, cooling water, recirculating system, to air: 0.771; name fraction_CW_R_to_air; lognormal variance with pedigree 0.0413, pedigree (2,3,1,3,1)
  (same comment as for fraction, cooling water, cooling pond system, to air)

## Reference product
- acetone, liquid: 1 kg; name acetone_RP; CPC 34170: Ethers, alcohol peroxides, ether peroxides, epoxides, acetals and hemiacetals, and their halogenated, sulphona[…]; By-product classification allocatable product; CAS 67-64-1
  EcoSpold01Location=RER
  production volume 3.13953e10 kg; name acetone_RP_PV
    Calculated based on literature and estimate. According to Ullmann's Encyclopedia app.70% of world's production of acetone is from this type of technology. The world's production volume in 2010 is estimated to be 6.7E+10kg (World's Petrochemical Report, January 2012).
  property price 0.58 EUR2005
    Temporary price data. Calculated as 90% of purchasers price based on: 2004 import and export prices (total trades (USD) divided by total weight (kg) in EU27, USA, China, Japan and India) from UN Commodity Trade Statistics Database (http://data.un.org/Explorer.aspxDatabase [Accessed 2 July 2010]). Commodity: Acetone
  property carbon content 0.62069
    carbon content on a dry matter basis (reserved; not for manual entry)
  property true value 0.58; name acetone_RP_true_value
    allocation property applied in "true value" allocation // value calculated from revenue
  properties: carbon content, non-fossil 0, dry mass 1 kg, water in wet mass 0 kg, wet mass 1 kg, water content 0, carbon content, fossil 0.62069, carbon allocation 0.62069 kg

## By-products
- electricity, for reuse in municipal waste incineration only: 0 kWh; CPC 17100: Electrical energy; By-product classification allocatable product; pedigree (1,1,1,1,1)
  Net electricity generated from this waste and used in internal MSWI plant energy redistribution.
  Uncertainty: uncertainty is calculated from uncertainties in waste composition and uncertainties in energy efficiency and the uncertainty in internal energy demand
  production volume 2.32637e6 kWh
  property true value relation 3.6; name E_el_prod_MSWI_true_value_relation
    property to calculate "true value" from
  property exergy 3.6 MJ; name E_el_prod_MSWI_exergy
    This exergy property is based on the exergy content of the product.
  property price 0.1 EUR2005; name E_el_prod_MSWI_price_EUR2005
    Estimated to be the same price as in case of electricity, medium voltage.
  property true value 9.3176e-6
    allocation property applied in "true value" allocation // value calculated from true value relation
- heat, for reuse in municipal waste incineration only: 0 MJ; CPC 17300: Steam and hot water; By-product classification allocatable product; pedigree (1,1,1,1,1)
  Net useful heat generated from this waste and used in internal MSWI plant energy redistribution.
  Uncertainty: uncertainty is calculated from uncertainties in waste composition and uncertainties in energy efficiency and the uncertainty in internal energy demand
  production volume 1.70655e7 MJ
  property true value relation 0.1842; name E_th_prod_MSWI_true_value_relation
    property to calculate "true value" from
  property exergy 0.1842 MJ; name E_th_prod_MSWI_exergy
    This exergy property is based on the exergy content of the product.
  property price 0.0106 EUR2005; name E_th_prod_MSWI_price_EUR2005
    Average European district heat price from Ecoheatcool and Euroheat 2005-2006, Ecoheat Work package 1: The European heat market. Final report. 10.6 EUR/GJ i s the price of district heat. http://www.solarthermalworld.org/files/Ecoheatcool%20WP1%20Web.pdf?download
  property true value 3.50093e-6
    (same comment as for electricity, for reuse in municipal waste incineration only)
- zinc concentrate: 0 kg; CPC 14290: Other non-ferrous metal ores and concentrates (other than uranium or thorium ores and concentrates); By-product classification allocatable product
  Calculated value from the knowledge of the properties of both products.
  production volume 0.447271 kg
  property price 0.38 EUR2005; name ByP_price_EUR2005
    Temporary price data. Calculated as 90% of purchasers price based on: Zinc content in concentrate 53%. Concentrate price per kg Zn 86.5% of refined Zn price (13.5% treatment charges according to CHR Metals Limited 2005: Dynamic cost curves. http://www.minecost.com/dynamic.pdf). 2004 zinc price from USGS (2007) Mineral commodity summaries 2007. <http://minerals.usgs.gov/minerals/pubs/mcs/2007/mcs2007.pdf> [Accessed 25 May 2010]
  property zinc content 0.53; name zinc_C_zinc_concentrate
    Zinc content on a dry matter basis. Value taken from teh "zinc mine operation" /GLO dataset.
  property dry mass 1 kg; name DM_zinc_concentrate
  property carbon content 0
    carbon content on a dry matter basis (reserved; not for manual entry)
  property true value 5.41363e-12
    allocation property applied in "true value" allocation // value calculated from revenue
  properties: wet mass 1 kg, water content 0, carbon content, non-fossil 0, carbon content, fossil 0, water in wet mass 0 kg, carbon allocation 0 kg
- copper: 0 kg; By-product classification allocatable product; CPC 41413: Refined copper and copper alloys, unwrought; master alloys of copper
  production volume 10311.2 kg
  property price 5.52 EUR2005
    Literature value (http://www.economist.com/news/business/21576714-mining-industry-has-enriched-chile-its-future-precarious-copper-solution). Average price between 20015 and 2013.
  property carbon content 0
    carbon content on a dry matter basis (reserved; not for manual entry)
  property true value 1.68577e-6
    allocation property applied in "true value" allocation // value calculated from revenue
  properties: water in wet mass 0 kg, water content 0, carbon content, non-fossil 0, dry mass 1 kg, carbon content, fossil 0, wet mass 1 kg, carbon allocation 0 kg
- lead: 0 kg; CPC 41441: Lead, unwrought; By-product classification allocatable product
  EcoSpold01Location=SE
  production volume 43.0501 kg
  property price 0.744 EUR2005
    Temporary price data. Calculated as 90% of purchasers price based on: Source: ecoinvent v2 report 10-part IX, Tab 5.10 & 2.5
  property carbon content 0
    carbon content on a dry matter basis (reserved; not for manual entry)
  property true value 1.02019e-9
    allocation property applied in "true value" allocation // value calculated from revenue
  properties: wet mass 1 kg, water content 0, carbon content, non-fossil 0, carbon content, fossil 0, dry mass 1 kg, water in wet mass 0 kg, carbon allocation 0 kg
- nickel, 99.5%: 0 kg; CPC 41422: Unwrought nickel; By-product classification allocatable product
  EcoSpold01Location=SE
  production volume 89.866 kg
  property price 10.4 EUR2005
    Temporary price data. Calculated as 90% of purchasers price based on: 2004 nickel price from USGS (2007) Mineral commodity summaries 2007. <http://minerals.usgs.gov/minerals/pubs/mcs/2007/mcs2007.pdf> [Accessed 25 May 2010]
  property carbon content 0
    carbon content on a dry matter basis (reserved; not for manual entry)
  property true value 2.9769e-8
    allocation property applied in "true value" allocation // value calculated from revenue
  properties: water in wet mass 0 kg, wet mass 1 kg, carbon content, non-fossil 0, dry mass 1 kg, water content 0, carbon content, fossil 0, carbon allocation 0 kg
- silver: 0 kg; CPC 41310: Silver (including silver plated with gold or platinum), unwrought or in semi-manufactured forms, or in powder […]; By-product classification allocatable product; CAS 7440-22-4
  EcoSpold01Location=SE
  production volume 14.8405 kg
  property price 178 EUR2005
    (same comment as for lead)
  property carbon content 0
    carbon content on a dry matter basis (reserved; not for manual entry)
  property true value 8.414e-8
    allocation property applied in "true value" allocation // value calculated from revenue
  properties: wet mass 1 kg, carbon content, non-fossil 0, dry mass 1 kg, water content 0, carbon content, fossil 0, water in wet mass 0 kg, carbon allocation 0 kg
- palladium: 0 kg; CPC 4160: Other non-ferrous metals and articles thereof (including waste and scrap of some metals); cermets and articles […]; By-product classification allocatable product
  EcoSpold01Location=SE
  production volume 0.821517 kg
  property price 5640 EUR2005
    Temporary price data. Calculated as 90% of purchasers price based on: 2004 price from USGS (2007) Mineral commodity summaries 2007. <http://minerals.usgs.gov/minerals/pubs/mcs/2007/mcs2007.pdf> [Accessed 25 May 2010]
  property carbon content 0
    carbon content on a dry matter basis (reserved; not for manual entry)
  property true value 1.47581e-7
    allocation property applied in "true value" allocation // value calculated from revenue
  properties: wet mass 1 kg, carbon content, fossil 0, water in wet mass 0 kg, water content 0, carbon content, non-fossil 0, dry mass 1 kg, carbon allocation 0 kg
- gold: 0 kg; CPC 41320: Gold (including gold plated with platinum), unwrought or in semi-manufactured forms, or in powder form; By-product classification allocatable product; CAS 7440-57-5
  EcoSpold01Location=SE
  production volume 0.450516 kg
  property price 10600 EUR2005
    Temporary price data. Calculated as 90% of purchasers price based on: Source: ecoinvent v2 report 10-part IX, Tab 2.5
  property carbon content 0
    carbon content on a dry matter basis (reserved; not for manual entry)
  property true value 1.52108e-7
    allocation property applied in "true value" allocation // value calculated from revenue
  properties: wet mass 1 kg, carbon content, fossil 0, dry mass 1 kg, carbon content, non-fossil 0, water content 0, water in wet mass 0 kg, carbon allocation 0 kg
- iron scrap, sorted, pressed: 0 kg; By-product classification Recyclable; CPC 39310: Slag, dross, scalings and other waste from the manufacture of iron or steel; pedigree (1,1,1,1,1)
  Iron scrap recovered from this waste.
  production volume 268927 kg
  property price 0.175 EUR2005
    Temporary price data. Calculated as 90% of purchasers price based on: 2005 import and export prices (total trades (USD) divided by total weight (kg) in biggest economies of the world: EU27, USA, Brasil, China, India, Japan and Russia) from UN Commodity Trade Statistics Database (http://data.un.org/Explorer.aspxDatabase [Accessed 2011.06.20]). Commodity: Waste or scrap, of cast iron
  property carbon content 0
    carbon content on a dry matter basis (reserved; not for manual entry)
  property true value 1.39086e-6
    allocation property applied in "true value" allocation // value calculated from revenue
  properties: water content 0, water in wet mass 0 kg, carbon content, fossil 0, dry mass 1 kg, carbon content, non-fossil 0, wet mass 1 kg, carbon allocation 0 kg
- iron scrap, unsorted: 0 kg; source European Aluminium Association 2008; CPC 39310: Slag, dross, scalings and other waste from the manufacture of iron or steel; By-product classification Recyclable; pedigree (1,1,1,1,1)
  production volume 7.1091 kg
  property price 0.149 EUR2005; name ironScrapAmount_price_EUR2005
    Temporary price data. Calculated as 90% of purchasers price based on: estimated at 85% of sorted scrap
  property carbon content 0
    carbon content on a dry matter basis (reserved; not for manual entry)
  property true value 3.36626e-11
    allocation property applied in "true value" allocation // value calculated from revenue
  properties: water in wet mass 0 kg, water content 0, carbon content, fossil 0, carbon content, non-fossil 0, dry mass 1 kg, wet mass 1 kg, carbon allocation 0 kg
- aluminium oxide, non-metallurgical: 0 kg; source European Aluminium Association 2008; CPC 41432: Alumina (aluminium oxide), except artificial corundum; By-product classification allocatable product; CAS 1344-28-1; pedigree (1,1,1,1,1)
  production volume 447.349 kg
  property carbon content, non-fossil 0; name C_content_non_fossil
  property price 0.28 EUR2005; name Al2O3Amount_price_EUR2005
    From UN trade database. http://data.un.org/ Import data from the largest economies of the world are used (Brazil, India, USA, China, Japan and EU-27).
  property dry mass 1 kg; name DM
  property water content 0; name water_content
  property wet mass 1 kg; name WM
  property water in wet mass 0 kg; name WWM
  property carbon content, fossil 0; name C_content_fossil
  property carbon content 0
    carbon content on a dry matter basis (reserved; not for manual entry)
  property true value 3.98062e-9
    allocation property applied in "true value" allocation // value calculated from revenue
  properties: carbon allocation 0 kg
- aluminium, cast alloy: 0 kg; source European Aluminium Association 2008; By-product classification allocatable product; CPC 41431: Unwrought aluminium; pedigree (1,1,1,1,1)
  EcoSpold01Location=RER
  production volume 4181.72 kg
  property price 1.3 EUR2005; name castAlloyAmount_price_EUR2005
    Temporary price data. Calculated as 90% of purchasers price based on: Source: London Metal Exchange, Aluminium alloy price for 2005
  property carbon content 0
    carbon content on a dry matter basis (reserved; not for manual entry)
  property true value 1.72761e-7
    allocation property applied in "true value" allocation // value calculated from revenue
  properties: water in wet mass 0 kg, carbon content, non-fossil 0, water content 0, dry mass 1 kg, carbon content, fossil 0, wet mass 1 kg, carbon allocation 0 kg
- aluminium, wrought alloy: 0 kg; source European Aluminium Association 2008; By-product classification allocatable product; CPC 4153: Semi-finished products of aluminium or aluminium alloys; pedigree (1,1,1,1,1)
  production volume 1830.68 kg
  property price 1.44 EUR2005; name secondaryAluminiumOutput_price_EUR2005
    Estimated based on literature values and expert judgement. Aluminium ccast alloys are about 90% of the price of aluminium wrought alloys.
  property carbon content 0
    carbon content on a dry matter basis (reserved; not for manual entry)
  property true value 8.37762e-8
    allocation property applied in "true value" allocation // value calculated from revenue
  properties: wet mass 1 kg, water content 0, carbon content, fossil 0, water in wet mass 0 kg, carbon content, non-fossil 0, dry mass 1 kg, carbon allocation 0 kg

## Inputs from technosphere
- waste plastic, mixture: 0 kg; name waste_plastic_byP
  EcoSpold01Location=CH
  Uncertainty for LCI results cannot be determined
  production volume 0 kg
    Calculated from the production volume of acetone, liquid in proportion to the respective output amounts.
  property price 0 EUR2005; name waste_plastic_byP_price_EUR2005
  properties: wet mass 1 kg, dry mass 0.847 kg, carbon content, fossil 0.747344, water content 0.180638
  note on carbon content, fossil: C content in 1 kg DM was calculated using data in Tab A.2, ecoinvent v2.2 report 13_I
- hazardous waste, for incineration: -0.00423408 kg; name haz_waste_byP
  Uncertainty for LCI results cannot be determined
  EcoSpold01Location=CH
  production volume 1.32934e8 kg; = haz_waste_byP/ acetone_RP* acetone_RP_PV
    (same comment as for waste plastic, mixture)
  property price 0 EUR2005; name haz_waste_byP_price_EUR2005
  properties: carbon content, fossil 0.554667, wet mass 1 kg, dry mass 0.75 kg, water content 0.333333
  note on carbon content, fossil: Tab A.6, ecoinvent v2.2 report 13_I. C content has been calculated after data in the tables, and then referred to 1 kg DM
- municipal solid waste: 0 kg; name msw_byP
  Uncertainty for LCI results cannot be determined
  EcoSpold01Location=CH
  production volume 0 kg
    (same comment as for waste plastic, mixture)
  properties: carbon content, fossil 0.171549, carbon content, non-fossil 0.261655, water content 0.297017, dry mass 0.771 kg, wet mass 1 kg
  note on carbon content, fossil: MSW composition in tab 4.1, ecoinvent v2.2 report 13_I. C content referred to 1 kg DM
- average incineration residue: -0.00732029 kg; name inc_residue_byP
  EcoSpold01Location=CH
  Uncertainty for LCI results cannot be determined
  production volume 2.2983e8 kg; = inc_residue_byP/ acetone_RP* acetone_RP_PV
    (same comment as for waste plastic, mixture)
  property price 0 EUR2005; name inc_residue_byP_price_EUR2005
  properties: wet mass 1 kg, carbon content, non-fossil 0.0511208, carbon content, fossil 0.0325466, dry mass 1 kg
  note on carbon content, non-fossil: Tab A.1, ecoinvent v2.2 report 13_I. It is considered that 61.1% of the C has a biogenic origin
- spoil from hard coal mining: -0.0194724 kg; name waste_spoil_byP
  Uncertainty for LCI results cannot be determined
  EcoSpold01Location=GLO
  production volume 6.11361e8 kg; = waste_spoil_byP/ acetone_RP* acetone_RP_PV
    (same comment as for waste plastic, mixture)
  property price 0 EUR2005; name waste_spoil_byP_price_EUR2005
  properties: wet mass 1 kg, carbon content, fossil 0.007879, dry mass 1 kg
  note on carbon content, fossil: Composition of coal spoil is adopted by proxy from lignite spoil (pg 19, Doka G. (2009) Life Cycle Inventory of the disposal of lignite spoil, coal spoil and coal tailings. Doka Life Cycle Assessments, Zurich. Commissioned by the Swiss Centre for Life Cycle Inventories ecoinvent Centre)
- coal slurry: -4.47227e-5 kg; name waste_coalslurry_byP
  EcoSpold01Location=GLO
  Uncertainty for LCI results cannot be determined
  production volume 1.40412e6 kg; = waste_coalslurry_byP/ acetone_RP* acetone_RP_PV
    (same comment as for waste plastic, mixture)
  property price 0 EUR2005; name waste_coalslurry_byP_price_EUR2005
  properties: wet mass 1 kg, carbon content, fossil 0.124, dry mass 1 kg
  note on carbon content, fossil: Coal tailings composition in Tab 3.4, (Doka G. (2009) Life Cycle Inventory of the disposal of lignite spoil, coal spoil and coal tailings. Doka Life Cycle Assessments, Zurich. Commissioned by the Swiss Centre for Life Cycle Inventories ecoinvent Centre)
- waste wood, untreated: 0 kg; name waste_wood_byP
  EcoSpold01Location=CH
  Uncertainty for LCI results cannot be determined
  production volume 0 kg
    (same comment as for waste plastic, mixture)
  property price 0 EUR2005; name waste_wood_byP_price_EUR2005
  properties: carbon content, non-fossil 0.48632, dry mass 0.8 kg, water content 0.25, wet mass 1 kg
  note on carbon content, non-fossil: Tab A.4, ecoinvent v2.2 report 13_I. C content has been referred to 1 kg DM,
- decommissioned chemical production facilities: -1.42336e-5 kg; name waste_chem_byP
  EcoSpold01Location=RER
  Uncertainty for LCI results cannot be determined
  production volume 446881 kg; = waste_chem_byP/ acetone_RP* acetone_RP_PV
    (same comment as for waste plastic, mixture)
  property price 0 EUR2005; name waste_chem_byP_price_EUR2005
  properties: carbon content, fossil 0.0169382, carbon content, non-fossil 5.78006e-6, dry mass 1 kg, wet mass 1 kg
  note on carbon content, fossil: Calculated from C content in input materials in the infrastructure
- waste plastic, mixture: -1.00995e-5, -6.74812e-7, -5.10349e-8, -2.78721e-7, -1.126e-7, -2.64672e-7, -7.07023e-5 kg (7 entries)
  EcoSpold01Location=CH
  Uncertainty for LCI results cannot be determined
  production volume 2.58026e6 kg
- municipal solid waste: -3.64734e-6, -9.19039e-7, -1.31336e-6, -0.00257955 kg (4 entries)
  Uncertainty for LCI results cannot be determined
  EcoSpold01Location=CH
  production volume 8.11726e7 kg
- waste wood, untreated: -6.1699e-7, -7.66086e-8, -5.60095e-9, -2.1517e-7, -3.25071e-8, -5.13909e-8, -8.18557e-6 kg (7 entries)
  EcoSpold01Location=CH
  Uncertainty for LCI results cannot be determined
  production volume 288338 kg

## Inputs from nature
- Clay, unspecified, in ground [natural resource, in ground]: 1.38076e-9 kg
  Uncertainty for LCI results cannot be determined
- Gravel, in ground [natural resource, in ground]: 1.83465e-6 kg
  Uncertainty for LCI results cannot be determined
- Zinc, in ground [natural resource, in ground]: 1.57116e-8 kg
  9.0% Zn in sulfide; 5.3% Zn in ore; Uncertainty for LCI results cannot be determined
- Oil, crude, in ground [natural resource, in ground]: 0.587713 kg
  Uncertainty for LCI results cannot be determined
- Clay, bentonite, in ground [natural resource, in ground]: 0.000138416 kg
  Uncertainty for LCI results cannot be determined
- Energy, potential (in hydropower reservoir), converted [natural resource, in water]: 0.137536 MJ
- Wood, unspecified, standing [natural resource, biotic]: 6.9844e-7 m3
  Uncertainty for LCI results cannot be determined
- Water, river [natural resource, in water]: 0.000104107 m3; name water_river_input; lognormal variance with pedigree 1.21, pedigree (5,5,5,5,5)
  Uncertainty for LCI results cannot be determined
- Manganese, in ground [natural resource, in ground]: 6.41362e-7 kg
  35.7% Mn in sedimentary deposit; 14.2% Mn in ore; Uncertainty for LCI results cannot be determined
- Chromium, in ground [natural resource, in ground]: 1.29536e-10 kg
  25.5% Cr in chromite; 11.6% in ore; Uncertainty for LCI results cannot be determined
- Energy, gross calorific value, in biomass [natural resource, biotic]: 0.113077 MJ
- Coal, hard, unspecified, in ground [natural resource, in ground]: 0.0925284 kg
  Uncertainty for LCI results cannot be determined
- Barium, in ground [natural resource, in ground]: 2.31213e-6 kg
  15% BaSO4 in ore; Uncertainty for LCI results cannot be determined
- Iron, in ground [natural resource, in ground]: 0.000497266 kg
  46% Fe in siderite; 25% Fe in ore; Uncertainty for LCI results cannot be determined
- Sylvite, in ground [natural resource, in ground]: 1.73545e-7 kg
  25% Sylvite in sylvinite; Uncertainty for LCI results cannot be determined
- Titanium, in ground [natural resource, in ground]: 0 kg
  95% TiO2 in rutile; 0.4% TiO2 in ore; Uncertainty for LCI results cannot be determined
- Copper, in ground [natural resource, in ground]: 1.04047e-6 kg
  0.99% Cu in sulfide; 0.36% Cu and 82 ppm Mo in ore; Uncertainty for LCI results cannot be determined
- Sodium chloride, in ground [natural resource, in ground]: 0.0754658 kg
  Uncertainty for LCI results cannot be determined
- Phosphorus, in ground [natural resource, in ground]: 0.000133886 kg
  18% P in apatite; 12% in ore; Uncertainty for LCI results cannot be determined
- Mercury, in ground [natural resource, in ground]: 1.40686e-7 kg
  Uncertainty for LCI results cannot be determined
- Dolomite, in ground [natural resource, in ground]: 6.08333e-6 kg
  Uncertainty for LCI results cannot be determined
- Feldspar, in ground [natural resource, in ground]: 0 kg
  Uncertainty for LCI results cannot be determined
- Anhydrite, in ground [natural resource, in ground]: 1.38056e-5 kg
  Uncertainty for LCI results cannot be determined
- Water, well, in ground [natural resource, in water]: 1.95904e-10 m3; name water_well_in_ground_input; lognormal variance with pedigree 1.21, pedigree (5,5,5,5,5)
  Uncertainty for LCI results cannot be determined
- Sand, unspecified, in ground [natural resource, in ground]: 0.000496276 kg
  Uncertainty for LCI results cannot be determined
- Nickel, in ground [natural resource, in ground]: 2.14414e-11 kg
  1.98% Ni in silicates; 1.04% Ni in ore; Uncertainty for LCI results cannot be determined
- Lead, in ground [natural resource, in ground]: 3.97399e-7 kg
  5.0% Pb in sulfide; 3.0% Pb in ore; Uncertainty for LCI results cannot be determined
- Sulfur, in ground [natural resource, in ground]: 0.00239203 kg
  Uncertainty for LCI results cannot be determined
- Water, salt, ocean [natural resource, in water]: 0.000330591 m3; name water_salt_ocean_input; lognormal variance with pedigree 1.21, pedigree (5,5,5,5,5)
  Uncertainty for LCI results cannot be determined
- Talc, in ground [natural resource, in ground]: 0 kg
  Uncertainty for LCI results cannot be determined
- Aluminium, in ground [natural resource, in ground]: 1.92205e-6 kg
  24% Al in bauxite; 11% Al in ore; Uncertainty for LCI results cannot be determined
- Calcite, in ground [natural resource, in ground]: 0.0035889 kg
  Uncertainty for LCI results cannot be determined
- Peat, in ground [natural resource, biotic]: 0.000194474 kg
  Uncertainty for LCI results cannot be determined
- Fluorspar, in ground [natural resource, in ground]: 2.91092e-7 kg
  92% CaF2 in ore; Uncertainty for LCI results cannot be determined
- Water, unspecified natural origin [natural resource, in water]: 0.00310041 m3; name water_UNO_input; lognormal variance with pedigree 1.21, pedigree (5,5,5,5,5)
  Uncertainty for LCI results cannot be determined
- Water, cooling, unspecified natural origin [natural resource, in water]: 0.0786688 m3; name water_cooling_UNO_input; lognormal variance with pedigree 1.21, pedigree (5,5,5,5,5)
  Uncertainty for LCI results cannot be determined
- Gas, natural, in ground [natural resource, in ground]: 0.942703 m3
  Uncertainty for LCI results cannot be determined
- Uranium, in ground [natural resource, in ground]: 4.02558e-6 kg
  Uncertainty for LCI results cannot be determined
- Magnesite, in ground [natural resource, in ground]: 0 kg
  60% Magnesite in ore; Uncertainty for LCI results cannot be determined
- Coal, brown, in ground [natural resource, in ground]: 3.27181e-6 kg
  Uncertainty for LCI results cannot be determined
- Sodium nitrate, in ground [natural resource, in ground]: 0 kg
  Uncertainty for LCI results cannot be determined
- Granite, in ground [natural resource, in ground]: 6.25622e-15 kg
  Uncertainty for LCI results cannot be determined
- Shale, in ground [natural resource, in ground]: 3.90839e-5 kg
  Uncertainty for LCI results cannot be determined
- Olivine, in ground [natural resource, in ground]: 4.66517e-6 kg
  Uncertainty for LCI results cannot be determined

## Emissions to nature
- Chlorinated solvents, unspecified [water, surface water]: 1.24256e-6 kg
  Uncertainty for LCI results cannot be determined
- Arsenic [air, urban air close to ground]: 8.14247e-11 kg
  Uncertainty for LCI results cannot be determined
- Antimony [air, urban air close to ground]: 3.87849e-14 kg
  Uncertainty for LCI results cannot be determined
- Hydrocarbons, aliphatic, alkanes, cyclic [air, urban air close to ground]: 1.61745e-6 kg
  Uncertainty for LCI results cannot be determined
- DOC, Dissolved Organic Carbon [water, surface water]: 4.34038e-5 kg
  Calculated as equal to TOC.
- Hydrogen fluoride [air, urban air close to ground]: 1.86615e-6 kg
  Uncertainty for LCI results cannot be determined
- Sulfate [air, urban air close to ground]: 1.49146e-12 kg
  Uncertainty for LCI results cannot be determined
- Copper [air, urban air close to ground]: 1.70795e-9 kg
  Uncertainty for LCI results cannot be determined
- Methane, dichloro-, HCC-30 [air, urban air close to ground]: 5.63984e-11 kg
  Uncertainty for LCI results cannot be determined
- Magnesium [water, surface water]: 4.10328e-9 kg
  Uncertainty for LCI results cannot be determined
- Carbon dioxide, fossil [air, urban air close to ground]: 1.78605 kg
  Uncertainty for LCI results cannot be determined
- Nickel, ion [water, surface water]: 8.29776e-8 kg
  Uncertainty for LCI results cannot be determined
- Ethane, 1,2-dichloro- [air, urban air close to ground]: 1.09057e-10 kg
  Uncertainty for LCI results cannot be determined
- Hydrocarbons, chlorinated [air, urban air close to ground]: 4.28538e-9 kg
  Uncertainty for LCI results cannot be determined
- Strontium [water, surface water]: 2.27943e-9 kg
  Uncertainty for LCI results cannot be determined
- Ammonium, ion [water, surface water]: 1.93474e-6 kg
  Uncertainty for LCI results cannot be determined
- BOD5, Biological Oxygen Demand [water, surface water]: 2.03634e-5 kg
  Uncertainty for LCI results cannot be determined
- Selenium [air, urban air close to ground]: 1.95044e-13 kg
  Uncertainty for LCI results cannot be determined
- TOC, Total Organic Carbon [water, surface water]: 4.34038e-5 kg
  Uncertainty for LCI results cannot be determined
- Suspended solids, unspecified [water, surface water]: 0.000623272 kg
  Uncertainty for LCI results cannot be determined
- Copper, ion [water, surface water]: 1.14337e-7 kg
  Uncertainty for LCI results cannot be determined
- COD, Chemical Oxygen Demand [water, surface water]: 0.000434748 kg
  Uncertainty for LCI results cannot be determined
- Hydrocarbons, aromatic [air, urban air close to ground]: 2.65972e-5 kg
  Uncertainty for LCI results cannot be determined
- Acidity, unspecified [water, surface water]: 1.04987e-6 kg
  Uncertainty for LCI results cannot be determined
- Chlorine [air, urban air close to ground]: 2.00324e-8 kg
  Uncertainty for LCI results cannot be determined
- Arsenic, ion [water, surface water]: 2.20924e-10 kg
  Uncertainty for LCI results cannot be determined
- Styrene [air, urban air close to ground]: 5.40405e-8 kg
  Uncertainty for LCI results cannot be determined
- Cadmium [air, urban air close to ground]: 2.04364e-11 kg
  Uncertainty for LCI results cannot be determined
- Manganese [water, surface water]: 1.88145e-12 kg
  Uncertainty for LCI results cannot be determined
- Tin, ion [water, surface water]: 6.73751e-15 kg
  Uncertainty for LCI results cannot be determined
- Sulfur dioxide [air, urban air close to ground]: 0.0068739 kg
  Uncertainty for LCI results cannot be determined
- Chlorate [water, surface water]: 2.01974e-5 kg
  Uncertainty for LCI results cannot be determined
- Aldehydes, unspecified [air, urban air close to ground]: 8.34976e-5 kg
  Uncertainty for LCI results cannot be determined
- Toluene [air, urban air close to ground]: 9.14564e-7 kg
  Uncertainty for LCI results cannot be determined
- Ammonia [air, urban air close to ground]: 9.71312e-9 kg
  Uncertainty for LCI results cannot be determined
- Potassium, ion [water, surface water]: 5.24005e-9 kg
  Uncertainty for LCI results cannot be determined
- Nitrate [water, surface water]: 2.66912e-6 kg
  Uncertainty for LCI results cannot be determined
- Ethene, chloro- [air, urban air close to ground]: 4.00099e-10 kg
  Uncertainty for LCI results cannot be determined
- Benzene [air, urban air close to ground]: 5.39645e-6 kg
  Uncertainty for LCI results cannot be determined
- Ethane, 1,2-dichloro- [water, surface water]: 1.80875e-12 kg
  Uncertainty for LCI results cannot be determined
- Hydrogen [air, urban air close to ground]: 6.38272e-5 kg
  Uncertainty for LCI results cannot be determined
- Methane, non-fossil [air, urban air close to ground]: 2.63052e-5 kg
  Uncertainty for LCI results cannot be determined
- Carbon disulfide [air, urban air close to ground]: 4.65337e-11 kg
  Uncertainty for LCI results cannot be determined
- Ethene, chloro- [water, surface water]: 7.60878e-12 kg
  Uncertainty for LCI results cannot be determined
- Dioxins, measured as 2,3,7,8-tetrachlorodibenzo-p-dioxin [air, urban air close to ground]: 0 kg
  Uncertainty for LCI results cannot be determined
- Calcium, ion [water, surface water]: 7.51039e-6 kg
  Uncertainty for LCI results cannot be determined
- Silver [air, urban air close to ground]: 5.63174e-12 kg
  Uncertainty for LCI results cannot be determined
- Sulfate [water, surface water]: 0.00723949 kg
  Uncertainty for LCI results cannot be determined
- Carbon dioxide, non-fossil [air, urban air close to ground]: 0.00275132 kg
  Uncertainty for LCI results cannot be determined
- Bromate [water, surface water]: 4.83926e-10 kg
  Uncertainty for LCI results cannot be determined
- Hydrocarbons, unspecified [water, surface water]: 0.000767168 kg
  Uncertainty for LCI results cannot be determined
- Zinc [air, urban air close to ground]: 2.56453e-10 kg
  Uncertainty for LCI results cannot be determined
- Particulates, < 2.5 um [air, urban air close to ground]: 0.000146596 kg
  Uncertainty for LCI results cannot be determined
- Nickel [air, urban air close to ground]: 1.61745e-6 kg
  Uncertainty for LCI results cannot be determined
- Sulfide [water, surface water]: 1.00567e-9 kg
  Uncertainty for LCI results cannot be determined
- Nitrogen oxides [air, urban air close to ground]: 0.00459407 kg
  Uncertainty for LCI results cannot be determined
- Aluminium [water, surface water]: 4.12028e-7 kg
  Uncertainty for LCI results cannot be determined
- Ethene [air, urban air close to ground]: 2.25604e-6 kg
  Uncertainty for LCI results cannot be determined
- Mercury [water, surface water]: 3.71429e-9 kg
  Uncertainty for LCI results cannot be determined
- Carbon monoxide, non-fossil [air, urban air close to ground]: 2.88032e-6 kg
  Uncertainty for LCI results cannot be determined
- Cadmium, ion [water, surface water]: 1.55616e-13 kg
  Uncertainty for LCI results cannot be determined
- Iron, ion [water, surface water]: 3.87969e-8 kg
  Uncertainty for LCI results cannot be determined
- Oils, unspecified [water, surface water]: 1.11797e-5 kg
  Uncertainty for LCI results cannot be determined
- Propene [air, urban air close to ground]: 1.67115e-6 kg
  Uncertainty for LCI results cannot be determined
- Benzene [water, surface water]: 0 kg
  Uncertainty for LCI results cannot be determined
- Chlorine [water, surface water]: 1.18797e-9 kg
  Uncertainty for LCI results cannot be determined
- Water [water, unspecified]: 0.050995 m3; name water_to_water_unspecified; lognormal variance with pedigree 0.0827, pedigree (2,2,5,5,1)
  Calculated value based on literature values and expert opinion. See comments in the parametres' comment field.
  property water in wet mass 1000 kg; name WWM
  property carbon content, non-fossil 0; name C_content_non_fossil
  property wet mass 1000 kg; name WM
  property carbon content, fossil 0; name C_content_fossil
  property fraction, origin: salt water 0.00515383; name fraction_origin_salt_water_Ww
  property fraction, origin: unspecified 0.993223; name fraction_origin_unspecified_Ww
  property fraction, origin: fresh water 0.00162301; name fraction_origin_fresh_water_Ww
  property dry mass 0 kg; name DM
- Chromium, ion [water, surface water]: 9.90782e-13 kg
  Uncertainty for LCI results cannot be determined
- Water [air, unspecified]: 0.0312088 m3; name water_to_air_unspecified; lognormal variance with pedigree 0.0827, pedigree (2,2,5,5,1)
  (same comment as for Water)
  property fraction, origin: salt water 0.00217153; name fraction_origin_salt_water
  property fraction, origin: unspecified 0.997145; name fraction_origin_unspecified
  property fraction, origin: fresh water 0.000683844; name fraction_origin_fresh_water
- AOX, Adsorbable Organic Halogen as Cl [water, surface water]: 2.90432e-12 kg
  Uncertainty for LCI results cannot be determined
- Hydrogen chloride [air, urban air close to ground]: 4.97106e-5 kg
  Uncertainty for LCI results cannot be determined
- Zinc, ion [water, surface water]: 1.51886e-8 kg
  Uncertainty for LCI results cannot be determined
- Dissolved solids [water, surface water]: 0.00118487 kg
  Uncertainty for LCI results cannot be determined
- Chloride [water, surface water]: 0.00255103 kg
  Uncertainty for LCI results cannot be determined
- Phosphorus [water, surface water]: 0.000133756 kg
  Uncertainty for LCI results cannot be determined
- NMVOC, non-methane volatile organic compounds, unspecified origin [air, urban air close to ground]: 0.0035231 kg
  Uncertainty for LCI results cannot be determined
- Carbonate [water, surface water]: 0.000144836 kg
  Uncertainty for LCI results cannot be determined
- Lead [water, surface water]: 3.6396e-10 kg
  Uncertainty for LCI results cannot be determined
- Hydrogen sulfide [air, urban air close to ground]: 1.66555e-8 kg
  Uncertainty for LCI results cannot be determined
- Phenol [water, surface water]: 5.66474e-7 kg
  Uncertainty for LCI results cannot be determined
- Methane, fossil [air, urban air close to ground]: 0.0170775 kg
  Uncertainty for LCI results cannot be determined
- Fluorine [air, urban air close to ground]: 1.36036e-10 kg
  Uncertainty for LCI results cannot be determined
- Particulates, > 2.5 um, and < 10um [air, urban air close to ground]: 0.000252133 kg
  Uncertainty for LCI results cannot be determined
- Nitrogen [water, surface water]: 4.13748e-6 kg
  Uncertainty for LCI results cannot be determined
- Chromium [air, urban air close to ground]: 8.89735e-7 kg
  Uncertainty for LCI results cannot be determined
- Sodium, ion [water, surface water]: 0.007118 kg
  Uncertainty for LCI results cannot be determined
- Lead [air, urban air close to ground]: 1.86155e-9 kg
  Uncertainty for LCI results cannot be determined
- Dinitrogen monoxide [air, urban air close to ground]: 7.1379e-9 kg
  Uncertainty for LCI results cannot be determined
- Cyanide [air, urban air close to ground]: 0 kg
  Uncertainty for LCI results cannot be determined
- Silicon [water, surface water]: 0 kg
  Uncertainty for LCI results cannot be determined
- Particulates, > 10 um [air, urban air close to ground]: 0.000187635 kg
  Uncertainty for LCI results cannot be determined
- Carbon monoxide, fossil [air, urban air close to ground]: 0.00186985 kg
  Uncertainty for LCI results cannot be determined
- Mercury [air, urban air close to ground]: 1.34626e-8 kg
  Uncertainty for LCI results cannot be determined
- Fluoride [water, surface water]: 4.88036e-9 kg
  Uncertainty for LCI results cannot be determined
- Benzene, ethyl- [air, urban air close to ground]: 3.04811e-7 kg
  Uncertainty for LCI results cannot be determined
- Cyanide [water, surface water]: 4.71257e-11 kg
  Uncertainty for LCI results cannot be determined
- Xylene [air, urban air close to ground]: 3.77729e-7 kg
  Uncertainty for LCI results cannot be determined

## Sampling procedure
literature values based on company survey

## Extrapolations
no extrapolation This dataset has been copied from an original dataset covering the geography RER. The uncertainty has been adjusted accordingly.

## Review by Jürgen Sutter 2010-04-06
passed.
