# electricity voltage transformation from medium to low voltage

Dataset: EcoSpold 2, unit process
Geography: CO
Time period: 2014-01-01 to 2019-12-31
Technology level: current
Classification: ISIC rev.4 ecoinvent: 3510:Electric power generation, transmission and distribution
Scenario: Business-as-Usual
System model: Allocation at the point of substitution
Generated by: Germán Santa María Restrepo
Published in: Suppen, N. 2017
Database: ecoinvent
isCopyrightProtected: true
accessRestrictedTo: 1

## General comment
This dataset represents the transformation of electricity voltage from medium to low voltage in Colombia. Data on absolute losses were retrieved from the International Energy Agency and the share of these losses was allocated to the different voltage levels based on generic data from Switzerland in 2009.
Definition of the voltage levels:
- High voltage level above 24 kV (large scale industry)
- Medium voltage level between 1 kV and 24 kV (medium to small scale industry, service sector
and public buildings)
- Low voltage level below 1 kV (Households)

## Included activities start
This activity starts with the medium voltage electricity arriving at the transformer station.

## Included activities end
This activity ends with 1kWh of medium voltage electricity transformed to low voltage.

This dataset includes the losses during voltage transformation.

It doesn't include the transformer station itself as this is included in the dataset for the transmission network.

## Geography
This dataset contains country-specific data.

## Technology
Transformers are essential components of the electricity grid. They connect the different voltage levels.
Big power plants feed the electricity at a very high voltage to the electricity grid. Transformers between 600 MVA and 80 MVA can be found in substations, where the high transmission voltage is transformed to the medium distribution voltage. In an additional step the medium voltage is transformed to low voltage using transformers below 2.5 MVA. The small transformers below 2.5 MVA are allocated to the low voltage level, whereas all the other transformers are allocated to the medium voltage level.

## Parameters
- total electricity losses within the country: 0 dimensionless; name electricity_losses_total; pedigree (1,1,1,1,1)
- electricity transformation losses: 0 dimensionless; name electricity_transformation_losses; pedigree (1,1,1,1,1)

## Reference product
- electricity, low voltage: 1 kWh; CPC 17100: Electrical energy; By-product classification allocatable product
  production volume 3.2812e10 kWh
    Literature value/ calculated value. For details on the modelling of the electricity volume along the voltage level chain please see the special documentation on ecoQuery.
    Amount of electricity available at LV for use (32812 GWh) = Absolute amount of electricity arriving at the LV level after transformation (34608 GWh) - Absolute losses, Transmission LV (1797 GWh)
    Absolute losses, Transmission LV (1797 GWh) = Total transmission losses (7.487 GWh)* Transmission losses at low voltage level (24%)
  property price 0.107 EUR2005
    Temporary price data. Calculated as 90% of purchasers price based on: IEA Key world energy statistics 2004 (www.iea.org/textbase/nppdf/free/2004/keyworld2004.pdf)

## Inputs from technosphere
- electricity, medium voltage: 0 kWh; undefined min 0.0074, max 0.0074, standardDeviation95 0, pedigree (1,1,2,1,1)
  Electricity arriving from the medium voltage market to the low voltage market.
- electricity, medium voltage: 1.04936 kWh; lognormal variance with pedigree 0.0222, pedigree (3,2,3,3,3)
  Calculated value/estimation. This value compensates for the losses during transmission/distribution on this electricity market. The calculation is made based on total electricity losses between net electricity available at the busbar and the use of electricity calculated based on the IEA electricity information 2014, table 1.1, Electrity supply vs. transmission losses.
  Total electricity supply: 58755 GWh
  Total demand: 51278 GWh
  Total transmission losses: 7478 GWh
  *Electricity production value for calculations was 58755 GWh (Total electricity supply =Final consumption 51268 GWh + total losses 7487 GWh) given that the domestic supply value of IEA has a statistical difference of (-8577 GWh) and internal consumption of the energy sector (-1977 GWh).
  Total losses over the whole chain are then allocated to the different voltage levels as well as transformation and transmission losses based on generic data taken from the City of Zürich in 2009.
  Voltage level (definitions taken from Itten et al. 2014).
  High voltage level (>24 kV)
  Fraction of total consumption at high voltage level (generic, data taken from Switzerland): 4%.
  Total losses on high voltage level (generic, data taken from the City of Zürich in 2009): 39%
  Of which: Transmission: 33%
  Of which: Transformation: 6%
  Medium voltage level (1kV - 24 kV)
  Fraction of total consumption at medium voltage level (generic, data taken from Switzerland): 32%.
  Total losses on medium voltage level (generic, data taken from the City of Zürich in 2009): 13%
  Of which: Transmission: 5%
  Of which: Transformation: 8%
  Low voltage level (>1kV)
  Fraction of total consumption at low voltage level (generic, data taken from Switzerland): 64%.
  Total losses on medium voltage level (generic, data taken from the City of Zürich in 2009): 48%
  Of which: Transmission: 24%
  Of which: Transformation: 24%
  Calculation details
  Transformation losses on low voltage level are assumed to be the total transformation losses from medium to low voltage.
  Percentage of electricity lost due to transformation MV to LV, referring to the amount which could potentially arrive at MV after transformation (4,93%)=
  Absolute losses, Transformation MV-LV (1797 GWh)/ Amount of electricity leaving the MV level = amount of electricity which has to be transformed MV to LV (36405 GWh)
  Sources:
  International Energy Agency, Colombia: Indicators for 2014, Electricity and Heat.
  https://www.iea.org/statistics/statisticssearch/report/?country=COLOMBIA&product=electricityandheat&year=2014
  Accessed on 26/07/2017
  IEA. 2014. Electricity Information 2014. ISBN 978-92-64-21692-1. International Energy Agency (IEA), Paris Cedex (FR).
  Itten R., Frischknecht R., Stucki M. 2014. Life Cycle Inventories of Electricity Mixes and Grid. Version 1.3. treeze, Uster, Switzerland

## Extrapolations
This dataset has been extrapolated from year 2017 to the year of the calculation (2019). The uncertainty has been adjusted accordingly.

## Review by Christopher Oberschelp 2017-11-21
Well-documented dataset. Main exchanges look plausible. Comparison with similar datasets may show remaining deviations.
