# iron sulfate production

Dataset: EcoSpold 2, unit process
Geography: RER
Time period: 1993-01-01 to 2019-12-31
Technology level: current
Classification: EcoSpold01Categories: metals/extraction
Classification: ISIC rev.4 ecoinvent: 2011:Manufacture of basic chemicals
Tags: ConvertedDataset
Scenario: Business-as-Usual
System model: Allocation at the point of substitution
Generated by: Niels Jungbluth
Published in: Jungbluth, N. 2007
Database: ecoinvent
isCopyrightProtected: true
accessRestrictedTo: 1

## General comment
Iron sulphate is a by-product of steel and iron manufacturing.
[This dataset was already contained in the ecoinvent database version 2. It was not individually updated during the transfer to ecoinvent version 3. Life Cycle Impact Assessment results may still have changed, as they are affected by changes in the supply chain, i.e. in other datasets. This dataset was generated following the ecoinvent quality guidelines for version 2. It may have been subject to central changes described in the ecoinvent version 3 change report (http://www.ecoinvent.org/database/ecoinvent-version-3/reports-of-changes/), and the results of the central updates were reviewed extensively. The changes added e.g. consistent water flows and other information throughout the database. The documentation of this dataset can be found in the ecoinvent reports of version 2, which are still available via the ecoinvent website. The change report linked above covers all central changes that were made during the conversion process.]

## Included activities end
Rough estimation of the electricity use for purification of the by-product. No data for infrastructure and emissions

## Geography
Investigation for CH.

## Technology
Chemical product for waste water treatment.

## Time period
Time of publication.

## Reference product
- iron sulfate: 1 kg; CPC 34240: Phosphates of triammonium; salts and peroxysalts of inorganic acids and metals n.e.c.; By-product classification allocatable product; CAS 7720-78-7
  EcoSpold01Location=RER
  production volume 1.32237 kg
    This is a placeholder value that does not reflect real-world production volumes. This dataset does not currently require a real-world production volume to work in the database framework, and no actual data were collected yet. This has no negative effect on the results of the ecoinvent database. The placeholder value of this activity was scaled according to the nominal GDP of 2005 (source: United Nations, http://data.un.org/Glossary.aspx?q=GDP+%28current+US%24%29, accessed 20130726) to reflect an appropriate share of the global production volume, which is also a placeholder value.
  property price 0.071 EUR2005
    Estimated values. Consumer's price for 2015 is between 77 and 80 USD/tonne (http://sdjiangyuanjh.en.made-in-china.com/product/CKLJkmiybRWH/China-Ferrous-Sulfate.html, accessed 20151022). The price has been calculated from a mean value of 78.5 USD. The echange rate for 2015 is of EUR = 1.109 (http://www.imf.org, accessed 20160105)
  property carbon content 0
    carbon content on a dry matter basis (reserved; not for manual entry)
  properties: water content 0, water in wet mass 0 kg, carbon content, fossil 0, dry mass 1 kg, carbon content, non-fossil 0, wet mass 1 kg, carbon allocation 0 kg

## Inputs from technosphere
- chemical factory, organics: 4e-10 unit; lognormal variance with pedigree 0.37, pedigree (4,4,5,1,1)
  EcoSpold01Location=RER
  Rough estimation
  Uncertainty: Rough estimation
- electricity, medium voltage: 0.222 kWh; lognormal variance with pedigree 0.06, pedigree (4,4,5,1,1)
  EcoSpold01Location=UCTE
  Literature
  Uncertainty: Literature

## Sampling procedure
Diploma thesis for a waste water treatment plant.

## Extrapolations
This dataset has been extrapolated from year 1993 to the year of the calculation (2019). The uncertainty has been adjusted accordingly.

## Review by Michael Spielmann (obsolete) 2003-07-04
passed
