# heat and power co-generation, biogas, gas engine

Dataset: EcoSpold 2, unit process
Geography: NL
Time period: 2007-01-01 to 2019-12-31
Technology level: modern
Classification: EcoSpold01Categories: biomass/cogeneration
Classification: ISIC rev.4 ecoinvent: 3821:Treatment and disposal of non-hazardous waste
Tags: biogas power; with true value
Scenario: Business-as-Usual
System model: Allocation at the point of substitution
Generated by: Karin Treyer
Published in: Jungbluth N. 2007
Database: ecoinvent
isCopyrightProtected: true
accessRestrictedTo: 1

## General comment
This dataset represents the production of electricity and heat from a biogas mix from different sources (biowaste, sewage sludge) when burning it in a cogeneration unit with gas engine. It is intended to represent the production of grid-connected electricity with biogas. The main product is then considered to be electricity at high voltage, while heat is produced as a co-product. The cogeneration unit has a capacity of 160 kWel; the degrees of efficiency are as follows: electricity: 0.37 and heat: 0.53. A mix of biogas is treated in this dataset with an average lower heating value of 22.73 MJ/Nm3.

## Included activities start
From the cogeneration unit ready to treat biogas and from the biogas entry at the power plant.

## Included activities end
This activity ends with the production of electricity high voltage, corresponding to the treatment of 1m3 of biogas in a cogeneration unit.

This dataset includes emissions to air, biogas consumption, use and disposal of operational supplements as well as infrastructure expenditures.

## Geography
Conditions of cogeneration in Switzerland.

## Technology
Lambda 1-engine' with a catalytic converter.
Electrical efficiency: 0.32
Thermal efficiency: 0.55

## Parameters
- electrical efficiency: 0.37 dimensionless; name efficiency_electrical; lognormal variance with pedigree 0.0166, pedigree (3,4,3,5,3)
  Literature value. Bauer et al. 2012, Tab. 4 in chapter 4.2.6
  Bauer, C., Frischknecht, R., Eckle, P., Flury, K., Neal, T., Papp, K., Schori, S., Simons, A., Stucki, M., Treyer, K. Umweltauswirkungen der Stromerzeugung in der Schweiz. Ausgearbeitet durch ESU-services GmbH und Paul Scherrer Institut im Auftrag des Bundesamtes für Energie BFE, Bern, Schweiz.
- thermal efficiency: 0.53 dimensionless; name efficiency_thermal; lognormal variance with pedigree 0.0166, pedigree (3,4,3,5,3)
  Literature value. Jungbluth et al. 2007 (see general source) Tab. 13.9, p. 251
  nan

## Reference product
- electricity, high voltage: 1 kWh; name electricity; = lower_heating_value* efficiency_electrical/3.6; CPC 17100: Electrical energy; By-product classification allocatable product; pedigree (1,1,1,1,1)
  Calculated value. 3.6 MJ/kWh
  production volume 1.008e9 kWh; name apv_electricity
    Literature value/statistics. Net production of grid-connected electricity from biogas in 2012. No power plant own uses (losses from gross to net) have been assumed. Taken from the IEA electricity information 2014, table 1.3 (biogases/liquid biofuels).
    IEA. 2014. Electricity Information 2014. ISBN 978-92-64-21692-1. International Energy Agency (IEA), Paris Cedex (FR).
  property price 0.0977 EUR2005
    Temporary price data. Calculated as 90% of purchasers price based on: 94% of the average price (to account for a 6% loss in transformation and transmission) for electricity for industrial consumersin 2005 (excluded taxes). From IEA.
  property exergy 3.6 MJ
    allocation factor for electricity (=1) vs. heat, where heat is calculated as the termodynamic mean temperature Tm = (Tfeed-Treturn)/ln(Tfeed/Treturn), relative to the application temperature (Tu, typically = 293 K), i.e. (Tm-Tu)/Tm
  property true value 0.286371; name electricity_true_value
    allocation property applied in "true value" allocation // value calculated from true value relation
  properties: true value relation 3.6

## By-products
- heat, central or small-scale, other than natural gas: 0 MJ; name heat; = lower_heating_value* efficiency_thermal; By-product classification allocatable product; CPC 17300: Steam and hot water; undefined min 12.5027, max 12.5027, standardDeviation95 0, pedigree (1,1,3,1,1)
  Calculated value
  production volume 5.19801e9 MJ; = apv_electricity*heat/electricity
    Calculated from the electricity production volumes and the relative amounts.
  property true value relation 0.169678; name heat_true_value_relation
    property to calculate 'true value' from
  property price 0.0106 EUR2005; name heat_price_EUR2005
    Average European district heat price from Ecoheatcool and Euroheat 2005-2006, Ecoheat Work package 1: The European heat market. Final report. 10.6 EUR/GJ i s the price of district heat. http://www.solarthermalworld.org/files/Ecoheatcool%20WP1%20Web.pdf?download
  property exergy 0.169678 MJ; name heat_exergy
    (same comment as for electricity, high voltage)
  property true value 0.0696028; name heat_true_value
    (same comment as for electricity, high voltage)

## Inputs from technosphere
- heat and power co-generation unit, 160kW electrical, components for electricity only: 0 unit; uniform min 0, max 0, pedigree (1,1,3,1,1)
  value for cogeneration of natural gas used as approximination
- waste mineral oil: -0.000234819 kg; name waste_oil; = (lubricating_oil)*-1; lognormal variance with pedigree 0.024, pedigree (1,4,3,5,3)
  value for cogeneration of natural gas used as approximation
  production volume 294227 kg; = apv_electricity*waste_oil/electricity
    Calculated from the production volume of electricity in proportion to the respective output amounts.
  property price 0 EUR2005; name waste_oil_price_EUR2005
  properties: water content 0.111111, wet mass 1 kg, carbon content, fossil 0.864444, dry mass 0.9 kg
  note on carbon content, fossil: Tab A.6, ecoinvent v2.2 report 13_I. C content has been calculated after data in the tables, and then referred to 1 kg DM
- heat and power co-generation unit, 160kW electrical, common components for heat+electricity: 3.91368e-8 unit; lognormal variance with pedigree 0.33, pedigree (1,4,4,5,3)
  value for cogeneration of natural gas used as approximination
- heat and power co-generation unit, 160kW electrical, common components for heat+electricity: 0 unit; uniform min 0, max 0, pedigree (1,1,3,1,1)
  value for cogeneration of natural gas used as approximination
- heat and power co-generation unit, 160kW electrical, components for heat only: 0 unit; uniform min 0, max 0, pedigree (1,1,3,1,1)
  value for cogeneration of natural gas used as approximination
- heat and power co-generation unit, 160kW electrical, components for electricity only: 3.91368e-8 unit; lognormal variance with pedigree 0.33, pedigree (1,4,4,5,3)
  value for cogeneration of natural gas used as approximination
- heat and power co-generation unit, 160kW electrical, components for heat only: 3.91368e-8 unit; lognormal variance with pedigree 0.33, pedigree (1,4,4,5,3)
  value for cogeneration of natural gas used as approximination
- lubricating oil: 0.000234819 kg; name lubricating_oil; = (0.03/1000)* lower_heating_value; source Heck, T. 2007, p. p. 252 in Jungbluth et al. 200; lognormal variance with pedigree 0.03, pedigree (1,4,4,5,3)
  value for cogeneration of natural gas used as approximination. Assumption of a lubricate consumption of 0.03 g/MJin
  properties: dry mass 1 kg, wet mass 1 kg, carbon content, fossil 0.75
  note on carbon content, fossil: Lubricating oil is produced from diesel. C-content/dry mass of fats and oils considered 75%, from: ecoinvent v2.2 report, n 15a, pg 40
- biogas: 0.344325 m3; lognormal variance with pedigree 0.03, pedigree (1,4,4,5,3)
  property lower heating value 22.7323 MJ/Nm3; name lower_heating_value; = 0.9145*22.61+0.0855*24.04
  properties: carbon content, non-fossil 0.449939, dry mass 1.15 kg, wet mass 1.15 kg
  note on carbon content, non-fossil: Total C content in kg/Nm3 (Tab 12.8, ecoinvent v2.2 report n17), referred to 1kg DM
  note on lower heating value: Net calorific value (lower heating value) of the Swiss biogas production mix. This mix consists out of 91.45% biogas from sewage sludge and 8.55% biogas from biowaste (Tab. 13.2 p. 245 in Jungbluth et al. 2007).

## Emissions to nature
- NMVOC, non-methane volatile organic compounds, unspecified origin [air, non-urban air or from high stacks]: 1.56547e-5 kg; lognormal variance with pedigree 0.33, pedigree (1,4,4,5,3)
  value for cogeneration of natural gas used as approximination
- Sulfur dioxide [air, non-urban air or from high stacks]: 0.000195682 kg; = (25/1000^2)* lower_heating_value; lognormal variance with pedigree 0.03, pedigree (1,4,4,5,3)
  own calculations based on sulphur content in biogas (assumption: 300mg/m3)
- Dinitrogen monoxide [air, non-urban air or from high stacks]: 1.95684e-5 kg; source Heck, T. 2007, p. p. 252 in Jungbluth et al. 200; lognormal variance with pedigree 0.33, pedigree (1,4,4,5,3)
  value for cogeneration of natural gas used as approximination
- Nitrogen oxides [air, non-urban air or from high stacks]: 0.000117409 kg; = (15/1000^2)* lower_heating_value; lognormal variance with pedigree 0.15, pedigree (1,4,4,5,3)
  value for cogeneration of natural gas used as approximination. 15mg/MJin NOx emissions for a lambda 1-engine with a catalytic converter
- Methane, non-fossil [air, non-urban air or from high stacks]: 0.000180029 kg; source Heck, T. 2007, p. p. 252 in Jungbluth et al. 200; lognormal variance with pedigree 0.33, pedigree (1,4,4,5,3)
  value for cogeneration of natural gas used as approximination
- Platinum [air, non-urban air or from high stacks]: 5.47915e-11 kg; source Heck, T. 2007, p. p. 252 in Jungbluth et al. 200; lognormal variance with pedigree 0.68, pedigree (1,4,4,5,3)
  value for cogeneration of natural gas used as approximination
- Carbon dioxide, non-fossil [air, non-urban air or from high stacks]: 0.653579 kg; = 0.0835* lower_heating_value; lognormal variance with pedigree 0.03, pedigree (1,4,4,5,3)
  own calculations based on carbon content in biogas. See Tab. 13.10, which results in CO2 emissions of 0.0835 kg/MJin
- Carbon monoxide, non-fossil [air, non-urban air or from high stacks]: 0.000375713 kg; source Heck, T. 2007, p. p. 252 in Jungbluth et al. 200; lognormal variance with pedigree 0.15, pedigree (1,4,4,5,3)
  value for cogeneration of natural gas used as approximination

## Sampling procedure
Literature data

## Extrapolations
This dataset has been copied from an original dataset covering the geography CH without any adjustment of emissions. The uncertainty has been adjusted accordingly.
The annual production volume is valid for 2012.

Dataset copied from a dataset valid for Switzerland.

## Review by Carl Vadenbo 2015-05-27
The update of the whole electricity sector for the ecoinvent v3.2 database consist of hundreds of datasets. All these datasets have passed through a streamlined review processes where the underlying modelling of production volumes, technology shares and efficiencies was reviewed in detail prior to the datasets being submitted to the database.
