# containerboard production, fluting medium, recycled

Dataset: EcoSpold 2, unit process
Geography: RER
Time period: 2009-01-01 to 2019-12-31
Technology level: current
Classification: EcoSpold01Categories: paper & cardboard/cardboard & corrugated board
Classification: ISIC rev.4 ecoinvent: 1702:Manufacture of corrugated paper and paperboard and of containers of paper a
Scenario: Business-as-Usual
System model: Allocation at the point of substitution
Share of production covered: 66 %
Generated by: Angeline de Beaufort
Published in: FEFCO Corrugated Packaging 2015
Database: ecoinvent
isCopyrightProtected: true
accessRestrictedTo: 1

## General comment
Wellenstoff is a grade of corrugated base paper, which forms the corrugated middle layer in the production of corrugated board, where is covered between two outer layers of linerboard (e.g. kraftliner or testliner). According to the common sector terminology, “wellenstoff” or “recycled medium” is made from recycled material, i.e. uses recovered paper as raw material as opposed to “semichemical fluting”, which is used interchangeably with wellenstoff but is made from virgin material.
Data for the production of wellenstoff were provided by the industry association of corrugated packaging manufacturers in Europe (The European Federation of Corrugated Board Manufacturers, FEFCO). The data for the production of Testliner and Wellenstoff were collected from European mills, together producing about 66% (12 490 000 tonnes) of the total annual production of corrugated base papers from recovered paper in Europe in 2014. The mills contributing with data are located in Austria, Czech Republic, France, Germany, Italy, the Netherlands, Poland, Spain and the United Kingdom. Thereby each mill has an annual production volume of about 60 000 – 1 300 000 tonnes net saleable paper product (FEFCO, 2015.).
FEFCO. 2015. European Database for Corrugated Board Life Cycle Studies 2015. Reference(s): http://www.fefco.org/sites/default/files/lca-report-2015.pdf, accessed 6. February 2018.
In FEFCO 2015 fuel consumption and the related emission to air include only steam and net electricity used on site. Sold electricity is not reported as a sold product and the associated input and output data are not included in the inventory. The fuel consumption and emissions to air associated with the total heat production and the net electricity used on site were allocated to the paper production.
"[This dataset is meant to replace the following datasets:
- corrugated board base paper production, wellenstoff, RER, 1995 - 2005]"
The production volume is valid for the year 2015. Inventory data were collected for the year 2014.

## Included activities start
The process starts wih the reception of the recovered paper.

## Included activities end
The stock preparation is done in accordance with a recipe for each paper grade and grammage. The grades of recovered paper are put on the conveyor to the pulper in the ratio mentioned in the recipe. In the pulper the blend of dry, baled paper is converted into a pumpable suspension of fibres. This is achieved by submerging the bales in water and agitating the mixture so that the paper is wetted and broken up to form a suspension. The pulp is then screened and cleaned. and may undergo a disperging treatment. The stock passes through one or two head boxes onto the paper machine, Wellenstoff can be a one ply or two ply product.
Usually a size press treatment with a starch solution is applied in-line on the paper machine in order to obtain sufficient strength and stiffness properties.The process ends with the production of corrugated board base paper.

## Geography
Data for main producers in Europe (Austria, Czech Republic, France, Germany, Italy, the Netherlands, Spain and Great Britain).

## Technology
Average of present used technology

## Parameters
- fraction, process water, to air: 0.15 dimensionless; name fraction_PW_to_air; lognormal variance with pedigree 0.092025, pedigree (4,4,3,2,4)
  Literature value. In case when no industry/process specific data are available, default evaporation fraction value is used. This value is 15% and is based on literature (Statistics Canada, 2007 & Shaffer, K.H., 2008, Consumptive water use in the Great Lakes Basin, USGS & Shiklomanov, 2003, World Water Resources at the Beginning of the 21st Century) and has been approved by an expert.
- fraction, tap water, to air: 0.15; name fraction_TW_to_air; = fraction_PW_to_air; lognormal variance with pedigree 0.092025, pedigree (4,4,3,2,4)
  Calculated value. See comment in the other parametres present in this dataset. Tap water is considered to be always used as process water, thus process water fractions to air are applied to all tap water input flows to calculate the amount of water consumed in the processes.

## Reference product
- containerboard, fluting medium: 1 kg; name flutingMediumAmount; source FEFCO Corrugated Packaging 2015; CPC 32151: Corrugated paper and paperboard; By-product classification allocatable product
  FEFCO 2015
  production volume 8.22e9 kg; name flutingMediumProductionVolume
    From FEFCO Annual Statistics 2015 (http://www.fefco.org/sites/default/files/documents/Fefco_AnnualEvaluation_2015.pdf last accessed May 2017):Total shipments multiplied by European average of consumption of wellenstoff (recycled fluting) in total raw meterial consumtion of corrugated board production.
  property price 0.598 EUR2005; name flutingMediumAmount_price_EUR2005
    Export prices for the World+ according to: http://faostat.fao.org/site/626/DesktopDefault.aspx?PageID=626#ancor downloaded 28 April 2009; calculated as export value divided by export volume.
  property carbon content 0.46
    carbon content on a dry matter basis (reserved; not for manual entry)
  property true value 598; name flutingMediumAmount_true_value
    allocation property applied in "true value" allocation // value calculated from revenue
  properties: carbon content, non-fossil 0.46, wet mass 1 kg, dry mass 0.92592 kg, water in wet mass 0.074074 kg, water content 0.08, carbon allocation 0.425923 kg

## By-products
All rows: By-product classification allocatable product
- phosphate fertiliser, as P2O5: 0 kg; source CRAAQ 2010; CPC 3462: Mineral or chemical fertilizers, phosphatic; pedigree (1,1,1,1,1)
  This is the total phosphate (as P2O5) output (organic and mineral forms of phosphate contained) from organic origin. In practice, only a part of this total amount is available to the plants and the available amount has to be calculated considering efficiency of organic phosphate (to replace mineral phosphate), which also depends on many factors, such as climate, soil, crop, timing and technique of application, etc. For information purposes, the amount considering efficiency of organic phosphate is estimated in the parameter section of this dataset under 'phosphorus availability for plants'. Since this dataset includes field emissions from the application of sludge, phosphate availability has been accounted for in the calculation of direct field emissions.
  production volume 1.55798e6 kg
  property price 0.241 EUR2005; name P2O5_fertiliser_price_EUR2005
    Temporary price data. Calculated as 90% of purchasers price based on: 2004 prices are calculated on basis of Import/Export data (tonnes and US$) from UN Trade Statistics Database (http://data.un.org/Browse.aspx?d=ComTrade, accessed 7/7-2010). N, P2O5, or K2O content (http://www.fertilizer.org/ifa/Home-Page/STATISTICS/Conversions-factors)
  property carbon content 0
    carbon content on a dry matter basis (reserved; not for manual entry)
  property true value 0.0456442
    allocation property applied in "true value" allocation // value calculated from revenue
  properties: water content 0, carbon content, non-fossil 0, wet mass 1 kg, dry mass 1 kg, water in wet mass 0 kg, carbon content, fossil 0, carbon allocation 0 kg
- nitrogen fertiliser, as N: 0 kg; source CRAAQ 2010; CPC 3461: Mineral or chemical fertilizers, nitrogenous; pedigree (1,1,1,1,1)
  This is the total nitrogen (as N) output (organic and mineral forms of nitrogen contained) from organic origin. In practice, only a part of this total amount is available to the plants and the available amount has to be calculated considering nitrogen efficiency (to replace mineral nitrogen), which also depends on many factors, such as climate, soil, crop, timing and technique of application, etc. For information purposes, the amount considering nitrogen efficiency is estimated in the parameter section of this dataset under 'nitrogen availability for plants'. Since this dataset includes field emissions from the application of sludge, nitrogen availability has been accounted for in the calculation of direct field emissions.
  production volume 2.32767e6 kg
  property price 0.473 EUR2005; name N_fertiliser_price_EUR2005
    (same comment as for phosphate fertiliser, as P2O5)
  property carbon content 0
    carbon content on a dry matter basis (reserved; not for manual entry)
  property true value 0.133841
    allocation property applied in "true value" allocation // value calculated from revenue
  properties: dry mass 1 kg, water content 0, carbon content, fossil 0, carbon content, non-fossil 0, water in wet mass 0 kg, wet mass 1 kg, carbon allocation 0 kg
- soil pH raising agent, as CaCO3: 0 kg; source Marianne Lemieux 2013; CPC 34659: Fertilizers n.e.c.; pedigree (1,1,1,1,1)
  Calculated value of the amount of CaCO3 that can be substituted considered the liming efficiency of the sludge.
  production volume 4.33927e7 kg
  property carbon content, non-fossil 0; name soil_pH_raising_a_C_content_non_fossil_0
    biogene carbon content on a dry matter basis
  property carbon content, fossil 0.12; name soil_pH_raising_agent_Cfoss_content; = 12/(40+12+3*16)
    Stoichiometric calculation. Fossil carbon content on a dry matter basis.
  property price 0.117 EUR2005; name soil_pH_raising_agent_as_CaCO3_price_EUR
    The price is estimated to be the same as for lime.
  property carbon content 0.12
    carbon content on a dry matter basis (reserved; not for manual entry)
  property true value 0.617177
    allocation property applied in "true value" allocation // value calculated from revenue
  properties: water in wet mass 0 kg, dry mass 1 kg, water content 0, wet mass 1 kg, carbon allocation 0.12 kg
- potassium fertiliser, as K2O: 0 kg; source CRAAQ 2010; CPC 3463: Mineral or chemical fertilizers, potassic; pedigree (1,1,1,1,1)
  This is the potassium (as K2O) output (organic and mineral forms of potassium contained) from organic origin. In practice, only a part of this total amount is available to the plants and the available amount has to be calculated considering efficiency of organic potassium (to replace mineral potassium ), which also depends on many factors, such as climate, soil, crop, timing and technique of application, etc. For information purposes, the amount considering efficiency of organic potassium is estimated in the parameter section of this dataset under 'potassium availability for plants'. Since this dataset includes field emissions from the application of sludge, potassium availability has been accounted for in the calculation of direct field emissions.
  production volume 376370 kg
  property price 0.188 EUR2005; name K2O_fertiliser_price_EUR2005
    Temporary price data. Calculated as 90% of purchasers price based on: 2004 import price calulated from FAOSTAT (http://faostat.fao.org/site/575/DesktopDefault.aspx?PageID=575#ancor [accessed 2011.01.27] Potash Fertilizers (K20 total nutrients) in kUSD/Mg
  property carbon content 0
    carbon content on a dry matter basis (reserved; not for manual entry)
  property true value 0.00860162
    allocation property applied in "true value" allocation // value calculated from revenue
  properties: wet mass 1 kg, water content 0, water in wet mass 0 kg, dry mass 1 kg, carbon content, fossil 0, carbon content, non-fossil 0, carbon allocation 0 kg
- electricity, for reuse in municipal waste incineration only: 0 kWh; CPC 17100: Electrical energy; pedigree (1,1,1,1,1)
  Net electricity generated from this waste and used in internal MSWI plant energy redistribution.
  Uncertainty: uncertainty is calculated from uncertainties in waste composition and uncertainties in energy efficiency and the uncertainty in internal energy demand
  production volume 24640.3 kWh
  property exergy 3.6 MJ; name E_el_prod_MSWI_exergy
    This exergy property is based on the exergy content of the product.
  property true value relation 3.6; name E_el_prod_MSWI_true_value_relation
    property to calculate "true value" from
  property price 0.1 EUR2005; name E_el_prod_MSWI_price_EUR2005
    Estimated to be the same price as in case of electricity, medium voltage.
  property true value 2.84605e-7
    allocation property applied in "true value" allocation // value calculated from true value relation
- heat, for reuse in municipal waste incineration only: 0 MJ; CPC 17300: Steam and hot water; pedigree (1,1,1,1,1)
  Net useful heat generated from this waste and used in internal MSWI plant energy redistribution.
  Uncertainty: uncertainty is calculated from uncertainties in waste composition and uncertainties in energy efficiency and the uncertainty in internal energy demand
  production volume 174316 MJ
  property exergy 0.1842 MJ; name E_th_prod_MSWI_exergy
    This exergy property is based on the exergy content of the product.
  property true value relation 0.1842; name E_th_prod_MSWI_true_value_relation
    property to calculate "true value" from
  property price 0.0106 EUR2005; name E_th_prod_MSWI_price_EUR2005
    Average European district heat price from Ecoheatcool and Euroheat 2005-2006, Ecoheat Work package 1: The European heat market. Final report. 10.6 EUR/GJ i s the price of district heat. http://www.solarthermalworld.org/files/Ecoheatcool%20WP1%20Web.pdf?download
  property true value 1.03019e-7
    (same comment as for electricity, for reuse in municipal waste incineration only)
- zinc concentrate: 0 kg; CPC 14290: Other non-ferrous metal ores and concentrates (other than uranium or thorium ores and concentrates)
  Calculated value from the knowledge of the properties of both products.
  production volume 6.183 kg
  property price 0.38 EUR2005; name ByP_price_EUR2005
    Temporary price data. Calculated as 90% of purchasers price based on: Zinc content in concentrate 53%. Concentrate price per kg Zn 86.5% of refined Zn price (13.5% treatment charges according to CHR Metals Limited 2005: Dynamic cost curves. http://www.minecost.com/dynamic.pdf). 2004 zinc price from USGS (2007) Mineral commodity summaries 2007. <http://minerals.usgs.gov/minerals/pubs/mcs/2007/mcs2007.pdf> [Accessed 25 May 2010]
  property zinc content 0.53; name zinc_C_zinc_concentrate
    Zinc content on a dry matter basis. Value taken from teh "zinc mine operation" /GLO dataset.
  property dry mass 1 kg; name DM_zinc_concentrate
  property carbon content 0
    carbon content on a dry matter basis (reserved; not for manual entry)
  property true value 2.11221e-10
    allocation property applied in "true value" allocation // value calculated from revenue
  properties: wet mass 1 kg, water content 0, carbon content, non-fossil 0, carbon content, fossil 0, water in wet mass 0 kg, carbon allocation 0 kg

## Inputs from technosphere
- light fuel oil: 2.25691e-5 kg; = 0.000965*1000/42.7; source FEFCO Corrugated Packaging 2015; lognormal variance with pedigree 0.0118, pedigree (2,3,3,1,3)
  Reported as 0.46 MJ /tonnene NSP. Converted to kg using the lower heating value (42.7 MJ/kg) reported in "Dones R. et al.(2007) Life Cycle Inventories of Energy Systems: Results for Current Systems in Switzerland and other UCTE Countries. Final report ecoinvent data v2.0, No. 5. Swiss Centre for Life Cycle Inventories, Dübendorf, CH."
  Uncertainty: Uncertainty accounts for both the uncertainty associated with the fuel consumption value reported by FEFCO and the lower heating value used to convert the exchange value to a mass basis.
  properties: wet mass 1 kg, dry mass 1 kg, carbon content, fossil 0.862
- retention aid, for paper production: 0.000950682 kg; source FEFCO Corrugated Packaging 2015; lognormal variance with pedigree 0.0032, pedigree (1,3,3,1,1)
  Proxy for retention agents.
  properties: carbon content, fossil 0.5, wet mass 1 kg, dry mass 1 kg
- sludge from pulp and paper production: 0 kg; name sludgeTotalAmount; source FEFCO Corrugated Packaging 2015; pedigree (1,1,1,1,1)
  Reported as residue, organic sludges, 49 kg per tonne of net selable product. (Dry content of sludge 35%)
  production volume 0 kg
    Calculated from production volume of corrugated board base paper.
  property price 0 EUR2005; name sludgeTotalAmount_price_EUR2005
  property dry mass 0.35 kg; name sludgeTotalAmount_DM
  property water in wet mass 0.65 kg; name sludgeTotalAmount_WWM
  property wet mass 1 kg; name sludgeTotalAmount_WM
  property water content 1.85714; name sludgeTotalAmount_water_content
  property carbon content, non-fossil 0.21; name sludgeTotalAmount_C_content_non_fossil
- heavy fuel oil: 7.6252e-5 kg; = 0.0031*1000/40.6; source FEFCO Corrugated Packaging 2015; lognormal variance with pedigree 0.0118, pedigree (2,3,3,1,3)
  Reported as 0.003 MJ /tonne NSP. Converted to kg using the lower heating value (40.6 MJ/kg) reported in "Dones R. et al.(2007) Life Cycle Inventories of Energy Systems: Results for Current Systems in Switzerland and other UCTE Countries. Final report ecoinvent data v2.0, No. 5. Swiss Centre for Life Cycle Inventories, Dübendorf, CH."
  Uncertainty: Uncertainty accounts for both the uncertainty associated with the fuel consumption value reported by FEFCO and the lower heating value used to convert the exchange value to a mass basis.
  properties: carbon content, fossil 0.849, dry mass 1 kg, wet mass 1 kg
- diesel, low-sulfur: 0.000466661 kg; = 0.02*1000/42.8; source FEFCO Corrugated Packaging 2015; lognormal variance with pedigree 0.0032, pedigree (1,3,3,1,1)
  Reported as 0.02 GJ /tonne net saleable product. Converted to kg using the lower heating value (42.8 MJ/kg) reported in "Dones R. et al.(2007) Life Cycle Inventories of Energy Systems: Results for Current Systems in Switzerland and other UCTE Countries. Final report ecoinvent data v2.0, No. 5. Swiss Centre for Life Cycle Inventories, Dübendorf, CH."
  properties: dry mass 1 kg, carbon content, fossil 0.865, wet mass 1 kg
- ash from paper production sludge: 0 kg; name inorganicAshAmount; source FEFCO Corrugated Packaging 2015; pedigree (1,1,1,1,1)
  Reported as residue inorganic ashes
  production volume 0 kg
    Calculated from production volume of corrugated board base paper.
  property price 0 EUR2005; name inorganicAshAmount_price_EUR2005
  property carbon content, non-fossil 0.0092; name inorganicAshAmoun_C_content_non_fossil_0
  property dry mass 0.8 kg; name inorganicAshAmount_DM
  property wet mass 1 kg; name inorganicAshAmount_WM
  properties: water content 0.25
- core board: 0.00223699 kg; source FEFCO Corrugated Packaging 2015; lognormal variance with pedigree 0.0032, pedigree (1,3,3,1,1)
  Reported as paper consumption for corrugated board production. Cores and core plugs summed.
  properties: carbon content, non-fossil 0.43031, wet mass 1 kg, dry mass 0.945 kg, water content 0.058201
- pitch despergents, in paper production: 3.07213e-5 kg; source FEFCO Corrugated Packaging 2015; lognormal variance with pedigree 0.0032, pedigree (1,3,3,1,1)
  FEFCO 2015
  properties: carbon content, fossil 0.29009, dry mass 1 kg, wet mass 1 kg
- waste mineral oil: 0 kg; name wasteLubricantsOilAmount; source FEFCO Corrugated Packaging 2015; pedigree (1,1,1,1,1)
  Reported as residue, lubricants and oil.
  production volume 0 kg
    Calculated from production volume of corrugated board base paper.
  property price 0 EUR2005; name wasteLubricantsOilAmount_price_EUR2005
  property dry mass 1 kg; name wasteLubricantsOilAmount_DM
  property water in wet mass 0 kg; name wasteLubricantsOilAmount_WWM
  property wet mass 1 kg; name wasteLubricantsOilAmount_WM
  property water content 0; name wasteLubricantsOilAmount_water_content
  property carbon content, fossil 0.86444; name wasteLubricantsOilAmo_C_content_fossil_0
- municipal solid waste: -0.0409449 kg; name rejectsAmount; = (10+31)*-1; source FEFCO Corrugated Packaging 2015; lognormal variance with pedigree 0.0032, pedigree (1,3,3,1,1)
  Waste reported as "residue, rejects, paper-related" (10 kg), representing paper clips, tags, adhesive labels, fibres etc. and "residue, rejects, other" (31 kg), representing e.g. glass, sand, plastics. The average dry mass of the rejects is about 55%.
  production volume 3.3702e8 kg; = flutingMediumProductionVolume*rejectsAmount/flutingMediumAmount
    Calculated from production volume of reference product using the relative outputs.
  property price 0 EUR2005; name rejectsAmount_price_EUR2005
  property dry mass 0.5 kg; name MSW_DM
  property water content 1; name MSW_water_content
  properties: wet mass 1 kg, carbon content, non-fossil 0.261655, carbon content, fossil 0.171549
  note on carbon content, non-fossil: MSW composition in tab 4.1, ecoinvent v2.2 report 13_I. C content referred to 1 kg DM
- ethoxylated alcohol (AE3): 0.000274005 kg; source FEFCO Corrugated Packaging 2015; lognormal variance with pedigree 0.0032, pedigree (1,3,3,1,1)
  Proxy for defoamer, unspecified.
  properties: wet mass 1 kg, carbon content, non-fossil 0.48522, carbon content, fossil 0.20795, dry mass 1 kg
- EUR-flat pallet: 4.54388e-7 unit; source FEFCO Corrugated Packaging 2015; lognormal variance with pedigree 0.0052, pedigree (3,3,3,1,1)
  Assumption that the weight of a pallet is 22 kg. 0,01 kg of pallet is used for 1000kg of product.
  properties: water content 0.2, wet mass 22 kg, carbon content, fossil 0.0311351, carbon content, non-fossil 0.58833, dry mass 18.3333 kg
- electricity, medium voltage: 0.162549 kWh; = 0.585962792048714/0.0036; source FEFCO Corrugated Packaging 2015; lognormal variance with pedigree 0.0047, pedigree (1,2,3,5,1)
  Reported as 0.59 GJ/tonnene net saleable product.
- paper mill, integrated: 5.43268e-11 unit; lognormal variance with pedigree 0.1692, pedigree (4,3,5,1,5)
  Assumption.
- lignite ash: -0.000517306 kg; lognormal variance with pedigree 0.018725, pedigree (4,2,3,2,3)
  Estimation based on fuel input data and emission factors from corresponding fuel combustion ecoinvent datasets. Emissions from peat combustion approximated with lignite combustion, LPG with natural gas combustion, diesel with light fuel oil combustion, refuse derived fuel (RFD) with combustion of wood chips from post consumer wood.
  production volume 4.25798e6 kg; = flutingMediumProductionVolume * ((Ref('d1a458da-def3-4463-be40-e6104a6f0124')*-1) / flutingMediumAmount)
    Calculated from production volume of reference product using the relative outputs.
  properties: dry mass 1 kg, wet mass 1 kg
- maize starch: 0.0302811 kg; = 16.5998582373369+(26.5853484265679+0.858725016950933)/2; source FEFCO Corrugated Packaging 2015; lognormal variance with pedigree 0.0427, pedigree (2,2,3,1,1)
  Proxy for maize starch (16.6 kg) and half of (1.5 kg) "starch modified" (0,86 kg) and "wheat starch" (26.6 kg). Other half of latter three starches modeled as potato starch.
  properties: dry mass 0.86 kg, wet mass 1 kg, carbon content, non-fossil 0.46, water content 0.16279
- heat, district or industrial, other than natural gas: 0.509314 MJ; = 0.51*1000; source FEFCO Corrugated Packaging 2015; lognormal variance with pedigree 0.0127, pedigree (3,2,3,1,3)
  Reported as GJ/t of steam from external CHP.
  properties: corresponding fuel use, propane, furnace >100kW 1.05263 MJ
  note on corresponding fuel use, propane, furnace >100kW: Lower heating value of the fuel input related to the heat/electricity output, taken directly from ecoinvent v3.0 dataset "heat production, natural gas, at industrial furnace >100kW, GLO 2000".
- lubricating oil: 2.90165e-5 kg; source FEFCO Corrugated Packaging 2015; lognormal variance with pedigree 0.0032, pedigree (1,3,3,1,1)
  Reported as lubricants.
  properties: carbon content, fossil 0.75, wet mass 1 kg, dry mass 1 kg
- hard coal ash: -0.000471416 kg; lognormal variance with pedigree 0.018725, pedigree (4,2,3,2,3)
  (same comment as for lignite ash)
  production volume 3.88026e6 kg; = flutingMediumProductionVolume * ((Ref('54ee99e1-f00d-4951-b6a6-471e5299f045')*-1) / flutingMediumAmount)
    Calculated from production volume of reference product using the relative outputs.
  properties: dry mass 1 kg, wet mass 1 kg
- potato starch: 0.0144092 kg; source FEFCO Corrugated Packaging 2015; lognormal variance with pedigree 0.0032, pedigree (1,3,3,1,1)
  Proxy for potato starch (0.71 kg) and half of "starch modified" (0.86 kg) and "wheat starch" (26.6 kg). Other half of latter three starches modeled as maize starch.
  properties: water content 0.25, wet mass 1 kg, carbon content, non-fossil 0.46, dry mass 0.8 kg
- wood chips, from post-consumer wood, measured as dry mass: 0.00879644 kg; = 0.17*1000/19.3; source FEFCO Corrugated Packaging 2015; lognormal variance with pedigree 0.0501, pedigree (3,2,3,1,4)
  Reported as fuel input of Refuse Derived Fuel (without further specifcation on the composition) of 0.17 GJ per tonne net saleable product.
  properties: dry mass 1 kg, water content 0.4, wet mass 1.4 kg, carbon content, non-fossil 0.494
- packaging film, low density polyethylene: 1.49798e-5 kg; source FEFCO Corrugated Packaging 2015; lognormal variance with pedigree 0.0032, pedigree (1,3,3,1,1)
  Proxy for PE.
  properties: carbon content, fossil 0.85714, wet mass 1 kg, dry mass 1 kg
- natural gas, low pressure: 0.126732 m3; = 4.67*1000/36.8; source FEFCO Corrugated Packaging 2015; lognormal variance with pedigree 0.0032, pedigree (1,3,3,1,1)
  Reported as 4.67 GJ /tonnene net saleable product. Converted to Nm3 using the lower heating value (36.8 MJ/m3) reported in "Dones R. et al.(2007) Life Cycle Inventories of Energy Systems: Results for Current Systems in Switzerland and other UCTE Countries. Final report ecoinvent data v2.0, No. 5. Swiss Centre for Life Cycle Inventories, Dübendorf, CH.
  properties: dry mass 0.84 kg, carbon content, fossil 0.60238, heating value, gross 39 MJ, wet mass 0.84 kg
- waste paperboard, sorted: 1.09063 kg; name recoveredPaperAmount; = 1.0921*1000; lognormal variance with pedigree 0.0027, pedigree (1,2,3,1,1)
  Reported as 1.092t wet weight of recovered paper per tonne product, with 0.804kg dry mass/kg
  property wet mass 1 kg; name recoveredPaperAmount_WM
  property dry mass 0.88 kg; name recoveredPaperAmount_DM
  property water in wet mass 0.12 kg; name recoveredPaperAmount_WWM
  property carbon content, non-fossil 0.46; name recoveredPaperAmo_C_content_non_fossil_0
  note on carbon content, non-fossil: biogene carbon content on a dry matter basis. Value taken over from linerboard and fluting medium.
- wood chips, dry, measured as dry mass: 0.00306824 kg; = 0.0564087368482092*1000/18.36; source FEFCO Corrugated Packaging 2015; lognormal variance with pedigree 0.0113, pedigree (2,2,3,1,3)
  Reported as biofuels (bark, scrap wood and tall oil) 0.56 GJ/tonnene product. Average lower heating value of wood chips calculated as 18.36MJ/kg dry mass.
  properties: water content 0.4, wet mass 1.4 kg, dry mass 1 kg, carbon content, non-fossil 0.494
  note on carbon content, non-fossil: C content of dry mass is 0.494 kgC/kg dry wood (ecoinvent v2.2 report 9).
- dithiocarbamate-compound: 5.4926e-5 kg; = 0.11/2; source FEFCO Corrugated Packaging 2015; lognormal variance with pedigree 0.0112, pedigree (1,3,3,1,3)
  Reported as biocide. Assumed equally split between dithiocarbamate and triazine-compound
  properties: dry mass 1 kg, carbon content, fossil 0.179339, wet mass 1 kg
- triazine-compound, unspecified: 5.48401e-5 kg; source FEFCO Corrugated Packaging 2015; lognormal variance with pedigree 0.0112, pedigree (1,3,3,1,3)
  Reported as biocide. Assumed equally split between dithiocarbamate and triazine-compound
  properties: dry mass 1 kg, carbon content, fossil 0.475616, wet mass 1 kg
- liquefied petroleum gas: 0 kg; source FEFCO Corrugated Packaging 2015; pedigree (1,1,1,1,1)
  Reported as 0.052 MJ /tonne net salebale product Converted to kg using the lower heating value (46.05 MJ/kg), assuming a 50/50 mix of butane and propane and lower heating values from NIST Chemistry Handbook.
- lignite briquettes: 0.215544 MJ; = 0.215834234299992*1000; source FEFCO Corrugated Packaging 2015; lognormal variance with pedigree 0.0032, pedigree (1,3,3,1,1)
  FEFCO 2015
  properties: dry mass 0.0415385 kg, wet mass 0.051282 kg, water content 0.23457, carbon content, fossil 0.65679
- hard coal: 0.00562449 kg; = 0.161076908007024*1000/28.6; source FEFCO Corrugated Packaging 2015; lognormal variance with pedigree 0.0118, pedigree (2,3,3,1,3)
  Reported as 0.16 GJ /tonne net salebale product. Converted to kg using the lower heating value (28.6 MJ/kg) reported in "Dones R. et al.(2007) Life Cycle Inventories of Energy Systems: Results for Current Systems in Switzerland and other UCTE Countries. Final report ecoinvent data v2.0, No. 5. Swiss Centre for Life Cycle Inventories, Dübendorf, CH."
  Uncertainty: Uncertainty accounts for both the uncertainty associated with the fuel consumption value reported by FEFCO and the lower heating value used to convert the exchange value to a mass basis.
  properties: dry mass 0.94 kg, water content 0.0638298, carbon content, fossil 0.845, wet mass 1 kg
- tap water: 0.115132 kg; name tap_water_input; = 0.115287*1000; source FEFCO Corrugated Packaging 2015; lognormal variance with pedigree 0.0032, pedigree (1,3,3,1,1)
  Reported as municipal water supply.
  properties: wet mass 1 kg, water content 2940, carbon content, fossil 0.0017899, dry mass 0.00034 kg
- sodium hydroxide, without water, in 50% solution state: 9.30894e-5 kg; source FEFCO Corrugated Packaging 2015; lognormal variance with pedigree 0.0032, pedigree (1,3,3,1,1)
  FEFCO 2015
  properties: wet mass 1 kg, dry mass 1 kg
- sludge from pulp and paper production: -0.0493648, -3.6506e-5 kg (2 entries); source FEFCO Corrugated Packaging 2015; lognormal variance with pedigree 0.0032, pedigree (1,3,3,1,1)
  (same comment as for sludge from pulp and paper production)
  production volume 4.06625e8 kg
  properties: dry mass 0.35 kg, wet mass 1 kg, water content 1.85714, carbon content, non-fossil 0.21
- ash from paper production sludge: -0.00290174, -7.58497e-5 kg (2 entries); source FEFCO Corrugated Packaging 2015; lognormal variance with pedigree 0.0032, pedigree (1,3,3,1,1)
  Reported as residue inorganic ashes
  production volume 2.45087e7 kg
  properties: carbon content, non-fossil 0.0092, dry mass 0.8 kg, water content 0.25, wet mass 1 kg
- waste mineral oil: -3.28148e-5, -7.59302e-7 kg (2 entries); source FEFCO Corrugated Packaging 2015; lognormal variance with pedigree 0.0032, pedigree (1,3,3,1,1)
  Reported as residue, lubricants and oil.
  production volume 276351 kg
  properties: dry mass 1 kg, wet mass 1 kg, carbon content, fossil 0.86444
- liquefied petroleum gas: 1.12198e-6, 5.70618e-9 kg (2 entries); source FEFCO Corrugated Packaging 2015; lognormal variance with pedigree 0.0032, pedigree (1,3,3,1,1)
  (same comment as for liquefied petroleum gas)

## Inputs from nature
- Water, well, in ground [natural resource, in water]: 0.00297704 m3; name water_well_in_ground_input; source FEFCO Corrugated Packaging 2015; lognormal variance with pedigree 0.0038, pedigree (1,3,3,1,2)
  FEFCO 2015
- Water, river [natural resource, in water]: 0.00365044 m3; name water_river_input; source FEFCO Corrugated Packaging 2015; lognormal variance with pedigree 0.0038, pedigree (1,3,3,1,2)
  Reported as surface water in m3/t

## Emissions to nature
- Radium-228 [air, unspecified]: 1.24199e-5 kBq; lognormal variance with pedigree 0.3126, pedigree (3,3,3,1,3)
  Estimation based on fuel input data and emission factors from corresponding fuel combustion ecoinvent datasets. Emissions from peat combustion approximated with lignite combustion, LPG with natural gas combustion, diesel with light fuel oil combustion, refuse derived fuel (RFD) with combustion of wood chips from post consumer wood.
  Uncertainty: This emission was calculated from the ecoinvent emission factor of combustion of energy. Some energy sources do not have emission factor (LPG, peat and diesel) so other factors were used ( natural gas, lignite and light fuel oil).
- Butane [air, unspecified]: 3.46887e-6 kg; lognormal variance with pedigree 0.0526, pedigree (3,3,3,1,3)
  (same comment as for Radium-228)
- Formaldehyde [air, unspecified]: 5.89493e-7 kg; lognormal variance with pedigree 0.0526, pedigree (3,3,3,1,3)
  (same comment as for Radium-228)
- Ethene [air, unspecified]: 6.95399e-6 kg; lognormal variance with pedigree 0.0526, pedigree (3,3,3,1,3)
  (same comment as for Radium-228)
- Potassium [air, unspecified]: 7.75538e-6 kg; lognormal variance with pedigree 0.6626, pedigree (3,3,3,1,3)
  (same comment as for Radium-228)
- Manganese [air, unspecified]: 6.15201e-8 kg; lognormal variance with pedigree 0.6626, pedigree (3,3,3,1,3)
  (same comment as for Radium-228)
- Hydrocarbons, aromatic [air, unspecified]: 1.09107e-9 kg; lognormal variance with pedigree 0.0526, pedigree (3,3,3,1,3)
  (same comment as for Radium-228)
- Uranium-238 [air, unspecified]: 4.51386e-6 kBq; lognormal variance with pedigree 0.3126, pedigree (3,3,3,1,3)
  (same comment as for Radium-228)
- Thorium-228 [air, unspecified]: 2.48909e-6 kBq; lognormal variance with pedigree 0.3126, pedigree (3,3,3,1,3)
  (same comment as for Radium-228)
- Ethane [air, unspecified]: 3.477e-6 kg; lognormal variance with pedigree 0.0526, pedigree (3,3,3,1,3)
  (same comment as for lignite ash)
- Magnesium [air, unspecified]: 2.36104e-6 kg; lognormal variance with pedigree 0.6626, pedigree (3,3,3,1,3)
  (same comment as for Radium-228)
- Lead [air, unspecified]: 2.86567e-8 kg; lognormal variance with pedigree 0.6626, pedigree (3,3,3,1,3)
  (same comment as for lignite ash)
- Antimony [air, unspecified]: 5.7101e-9 kg; lognormal variance with pedigree 0.4126, pedigree (3,3,3,1,3)
  (same comment as for Radium-228)
- PAH, polycyclic aromatic hydrocarbons [air, unspecified]: 5.29015e-8 kg; lognormal variance with pedigree 0.3126, pedigree (3,3,3,1,3)
  (same comment as for lignite ash)
- Particulates, > 2.5 um, and < 10um [air, unspecified]: 1.21666e-5 kg; lognormal variance with pedigree 0.1326, pedigree (3,3,3,1,3)
  Particulate matter emissions from fuel combustion were not reported by the data source, only dust emissions of 0.00083 kg/1000kg of reference product. These are considered to be covered in the particulate matter emissions estimated from on site fuel use.
  Uncertainty: This emission was calculated from the ecoinvent emission factor of combustion of energy. Some energy sources do not have emission factor (LPG, peat and diesel) so other factors were used ( natural gas, lignite and light fuel oil).
- Lead-210 [air, unspecified]: 2.09226e-5 kBq; lognormal variance with pedigree 0.3126, pedigree (3,3,3,1,3)
  (same comment as for Radium-228)
- Zinc [air, unspecified]: 1.10085e-7 kg; lognormal variance with pedigree 0.6626, pedigree (3,3,3,1,3)
  (same comment as for Radium-228)
- Toluene [air, unspecified]: 1.31435e-6 kg; lognormal variance with pedigree 0.0526, pedigree (3,3,3,1,3)
  (same comment as for Radium-228)
- Phosphorus [air, unspecified]: 1.24645e-7 kg; lognormal variance with pedigree 0.0526, pedigree (3,3,3,1,3)
  (same comment as for Radium-228)
- Acetic acid [air, unspecified]: 7.43776e-7 kg; lognormal variance with pedigree 0.0526, pedigree (3,3,3,1,3)
  (same comment as for Radium-228)
- BOD5, Biological Oxygen Demand [water, unspecified]: 6.12974e-5 kg; source FEFCO Corrugated Packaging 2015; lognormal variance with pedigree 0.0426, pedigree (1,3,3,1,1)
  This value was reported by FEFCO 2015, i.e. it is not calculated using emission factors, contrary to most combustion emissions.
- Radium-226 [air, unspecified]: 5.39939e-6 kBq; lognormal variance with pedigree 0.3126, pedigree (3,3,3,1,3)
  (same comment as for Radium-228)
- Acetaldehyde [air, unspecified]: 2.42396e-8 kg; lognormal variance with pedigree 0.0526, pedigree (3,3,3,1,3)
  (same comment as for Radium-228)
- Phosphorus [water, unspecified]: 7.20655e-6 kg; source FEFCO Corrugated Packaging 2015; lognormal variance with pedigree 0.0426, pedigree (1,3,3,1,1)
  (same comment as for BOD5, Biological Oxygen Demand)
- Water [water, surface water]: 0.00537996 m3; name water_to_water_surface; source FEFCO Corrugated Packaging 2015; lognormal variance with pedigree 0.0112, pedigree (1,3,3,1,3)
  Accounts for both "thermally polluted" (0.16m3) and "chemically polluted" (5.2 m3) water output (after treatment)
- Hydrogen chloride [air, unspecified]: 7.30345e-6 kg; lognormal variance with pedigree 0.0526, pedigree (3,3,3,1,3)
  (same comment as for Radium-228)
- Water [air, unspecified]: 0.00137833 m3; name water_to_air_unspecified; = 0.000183123+1.38; lognormal variance with pedigree 0.098025, pedigree (4,4,4,2,4)
  1.38m3 was calculated to close the water balance, assumption that evaporated to air. The amount represents about 20% of the water inputs 0.00183123 was estimation based on fuel input data and emission factors from corresponding fuel combustion ecoinvent datasets. Emissions from peat combustion approximated with lignite combustion, LPG with natural gas combustion, diesel with light fuel oil combustion, refuse derived fuel (RFD) with combustion of wood chips from post consumer wood.
  property fraction, origin: fresh water 1; name fraction_origin_fresh_water
  property fraction, origin: unspecified 0; name fraction_origin_unspecified
  property fraction, origin: salt water 0; name fraction_origin_salt_water
- Radon-220 [air, unspecified]: 1.02473e-6 kBq; lognormal variance with pedigree 0.3126, pedigree (3,3,3,1,3)
  (same comment as for Radium-228)
- Thorium [air, unspecified]: 9.61958e-10 kg; lognormal variance with pedigree 0.0526, pedigree (3,3,3,1,3)
  (same comment as for Radium-228)
- Ammonia [air, unspecified]: 5.37168e-7 kg; lognormal variance with pedigree 0.0526, pedigree (3,3,3,1,3)
  (same comment as for lignite ash)
- Calcium [air, unspecified]: 1.28959e-5 kg; lognormal variance with pedigree 0.0526, pedigree (3,3,3,1,3)
  (same comment as for lignite ash)
- Selenium [air, unspecified]: 1.79165e-8 kg; lognormal variance with pedigree 0.0526, pedigree (3,3,3,1,3)
  (same comment as for Radium-228)
- Dioxins, measured as 2,3,7,8-tetrachlorodibenzo-p-dioxin [air, unspecified]: 1.34102e-14 kg; lognormal variance with pedigree 0.0526, pedigree (3,3,3,1,3)
  (same comment as for lignite ash)
- Iron [air, unspecified]: 3.65244e-6 kg; lognormal variance with pedigree 0.6626, pedigree (3,3,3,1,3)
  (same comment as for Radium-228)
- Ethanol [air, unspecified]: 9.28769e-10 kg; lognormal variance with pedigree 0.0526, pedigree (3,3,3,1,3)
  (same comment as for Radium-228)
- Hydrogen fluoride [air, unspecified]: 2.31887e-7 kg; lognormal variance with pedigree 0.0526, pedigree (3,3,3,1,3)
  (same comment as for Radium-228)
- Chromium [air, unspecified]: 2.00049e-8 kg; lognormal variance with pedigree 0.6626, pedigree (3,3,3,1,3)
  (same comment as for Radium-228)
- Methanol [air, unspecified]: 1.5789e-9 kg; lognormal variance with pedigree 0.0526, pedigree (3,3,3,1,3)
  (same comment as for Radium-228)
- Chromium VI [air, unspecified]: 6.17016e-10 kg; lognormal variance with pedigree 0.6626, pedigree (3,3,3,1,3)
  (same comment as for Radium-228)
- Polonium-210 [air, unspecified]: 3.83894e-5 kBq; lognormal variance with pedigree 0.3126, pedigree (3,3,3,1,3)
  (same comment as for Radium-228)
- Silicon [air, unspecified]: 2.86492e-5 kg; lognormal variance with pedigree 0.0526, pedigree (3,3,3,1,3)
  (same comment as for Radium-228)
- AOX, Adsorbable Organic Halogen as Cl [water, unspecified]: 8.23435e-7 kg; source FEFCO Corrugated Packaging 2015; lognormal variance with pedigree 0.0506, pedigree (2,5,3,1,1)
  This value was reported by FEFCO 2015, i.e. it is not calculated using emission factors, contrary to most combustion emissions.
  Uncertainty: Note as not representative in the report.
- Propionic acid [air, unspecified]: 9.89226e-8 kg; lognormal variance with pedigree 0.0526, pedigree (3,3,3,1,3)
  (same comment as for Radium-228)
- Mercury [air, unspecified]: 3.17076e-9 kg; lognormal variance with pedigree 0.6626, pedigree (3,3,3,1,3)
  (same comment as for lignite ash)
- Molybdenum [air, unspecified]: 1.03223e-8 kg; lognormal variance with pedigree 0.6626, pedigree (3,3,3,1,3)
  (same comment as for lignite ash)
- Potassium-40 [air, unspecified]: 5.79411e-6 kBq; lognormal variance with pedigree 0.3126, pedigree (3,3,3,1,3)
  (same comment as for Radium-228)
- Nitrogen oxides [air, unspecified]: 0.00034677 kg; source FEFCO Corrugated Packaging 2015; lognormal variance with pedigree 0.0426, pedigree (1,3,3,1,1)
  (same comment as for BOD5, Biological Oxygen Demand)
- Hydrocarbons, aliphatic, unsaturated [air, unspecified]: 2.11598e-6 kg; lognormal variance with pedigree 0.0526, pedigree (3,3,3,1,3)
  (same comment as for Radium-228)
- Benzo(a)pyrene [air, unspecified]: 4.51698e-9 kg; lognormal variance with pedigree 0.0526, pedigree (3,3,3,1,3)
  (same comment as for Radium-228)
- Copper, ion [water, unspecified]: 8.07226e-8 kg; source FEFCO Corrugated Packaging 2015; lognormal variance with pedigree 0.6526, pedigree (1,3,3,1,1)
  This value is qualified as "not representative" in FEFCO (2015) because only a few mills were able to report this figure. Moreover, mills were not able to report substances in the input water, hence this figure represents gross rather than net emissions. The value is a straight average over the reporting mills.
- Suspended solids, unspecified [water, unspecified]: 0.000229832 kg; source FEFCO Corrugated Packaging 2015; lognormal variance with pedigree 0.0426, pedigree (1,3,3,1,1)
  (same comment as for BOD5, Biological Oxygen Demand)
- Bromine [air, unspecified]: 2.33377e-8 kg; lognormal variance with pedigree 0.0526, pedigree (3,3,3,1,3)
  (same comment as for Radium-228)
- Nickel, ion [water, unspecified]: 2.12482e-8 kg; lognormal variance with pedigree 0.6546, pedigree (3,3,3,1,1)
  (same comment as for Copper, ion)
- Thallium [air, unspecified]: 2.84e-10 kg; lognormal variance with pedigree 0.0526, pedigree (3,3,3,1,3)
  Estimation based on fuel input data and emission factors from corresponding fuel combustion ecoinvent datasets. Emissions from peat combustion approximated with lignite combustion, LPG with natural gas combustion, diesel with light fuel oil combustion, refuse derived fuel (RFD) with combustion of wood chips from post consumer wood.
  Uncertainty: The data for the production of Testliner and Wellenstoff were collected from mills, together producing about 63% (9.700.000 tonnes) of the total annual production of corrugated base papers from recovered paper in Europe. They were provided by paper mills in Austria, Czech Republic, France, Germany, Italy, the Netherlands, Spain and Great Britain. The data are for the year 2008. The data were collected directly from the producers and checked by technical experts. This emission was calculated from the ecoinvent emission factor of combustion of energy. Some energy sources do not have emission factor (LPG, peat and diesel) so other factors were used ( natural gas, lignite and light fuel oil).
- Sodium [air, unspecified]: 9.95617e-7 kg; lognormal variance with pedigree 0.0526, pedigree (3,3,3,1,3)
  (same comment as for Radium-228)
- Lead [water, unspecified]: 3.63245e-8 kg; lognormal variance with pedigree 65.0046, pedigree (3,3,3,1,1)
  (same comment as for Copper, ion)
- DOC, Dissolved Organic Carbon [water, unspecified]: 0.000325454 kg; lognormal variance with pedigree 0.0446, pedigree (3,3,3,1,1)
  No data available for DOC. DOC=TOC as proposed by ecoinvent Data Quality Guidelines.
- Chromium, ion [water, unspecified]: 9.29111e-8 kg; lognormal variance with pedigree 0.6546, pedigree (3,3,3,1,1)
  (same comment as for Copper, ion)
- Pentane [air, unspecified]: 5.93974e-6 kg; lognormal variance with pedigree 0.0526, pedigree (3,3,3,1,3)
  (same comment as for Radium-228)
- Benzene [air, unspecified]: 3.41866e-6 kg; lognormal variance with pedigree 0.0526, pedigree (3,3,3,1,3)
  (same comment as for Radium-228)
- Arsenic, ion [water, unspecified]: 5.02297e-8 kg; lognormal variance with pedigree 0.6546, pedigree (3,3,3,1,1)
  (same comment as for Copper, ion)
- Carbon dioxide, non-fossil [air, unspecified]: 0.02474 kg; source FEFCO Corrugated Packaging 2015; lognormal variance with pedigree 0.0032, pedigree (1,3,3,1,1)
  As reported, i.e. not calculated using emission factors, contrary to most combustion emissions.
- Barium [air, unspecified]: 7.50149e-8 kg; lognormal variance with pedigree 0.0526, pedigree (3,3,3,1,3)
  (same comment as for Radium-228)
- Mercury [water, unspecified]: 4.09664e-9 kg; lognormal variance with pedigree 0.6546, pedigree (3,3,3,1,1)
  (same comment as for Copper, ion)
- Ethyne [air, unspecified]: 1.159e-6 kg; lognormal variance with pedigree 0.0526, pedigree (3,3,3,1,3)
  (same comment as for Radium-228)
- Phenol [air, unspecified]: 1.07772e-7 kg; lognormal variance with pedigree 0.0526, pedigree (3,3,3,1,3)
  (same comment as for Radium-228)
- m-Xylene [air, unspecified]: 3.70407e-8 kg; lognormal variance with pedigree 0.058125, pedigree (4,2,3,2,3)
  (same comment as for lignite ash)
- Propane [air, unspecified]: 3.30774e-6 kg; lognormal variance with pedigree 0.0526, pedigree (3,3,3,1,3)
  (same comment as for Radium-228)
- Vanadium [air, unspecified]: 3.79241e-8 kg; lognormal variance with pedigree 0.0526, pedigree (3,3,3,1,3)
  (same comment as for Radium-228)
- Carbon monoxide, non-fossil [air, unspecified]: 4.10276e-5 kg; lognormal variance with pedigree 0.668125, pedigree (4,2,3,2,3)
  (same comment as for lignite ash)
- Particulates, > 10 um [air, unspecified]: 3.18092e-5 kg; lognormal variance with pedigree 0.0526, pedigree (3,3,3,1,3)
  (same comment as for Particulates, > 2.5 um, and < 10um)
- Beryllium [air, unspecified]: 7.50149e-10 kg; lognormal variance with pedigree 0.0526, pedigree (3,3,3,1,3)
  (same comment as for Radium-228)
- Benzene, hexachloro- [air, unspecified]: 2.22244e-15 kg; lognormal variance with pedigree 0.058125, pedigree (4,2,3,2,3)
  (same comment as for lignite ash)
- COD, Chemical Oxygen Demand [water, unspecified]: 0.000821986 kg; source FEFCO Corrugated Packaging 2015; lognormal variance with pedigree 0.0426, pedigree (1,3,3,1,1)
  (same comment as for BOD5, Biological Oxygen Demand)
- Copper [air, unspecified]: 2.98733e-8 kg; lognormal variance with pedigree 0.6626, pedigree (3,3,3,1,3)
  (same comment as for lignite ash)
- Fluorine [air, unspecified]: 1.54336e-8 kg; lognormal variance with pedigree 0.058125, pedigree (4,2,3,2,3)
  (same comment as for lignite ash)
- Cadmium [air, unspecified]: 2.13476e-9 kg; lognormal variance with pedigree 0.0526, pedigree (3,3,3,1,3)
  (same comment as for lignite ash)
- Scandium [air, unspecified]: 3.41046e-10 kg; lognormal variance with pedigree 0.0526, pedigree (3,3,3,1,3)
  (same comment as for Radium-228)
- Chlorine [air, unspecified]: 5.5561e-8 kg; lognormal variance with pedigree 0.058125, pedigree (4,2,3,2,3)
  (same comment as for lignite ash)
- Iodine [air, unspecified]: 1.16604e-8 kg; lognormal variance with pedigree 0.0526, pedigree (3,3,3,1,3)
  (same comment as for Radium-228)
- Nickel [air, unspecified]: 1.87221e-8 kg; lognormal variance with pedigree 0.6626, pedigree (3,3,3,1,3)
  (same comment as for lignite ash)
- Methane, non-fossil [air, unspecified]: 3.61227e-7 kg; lognormal variance with pedigree 0.058125, pedigree (4,2,3,2,3)
  (same comment as for lignite ash)
- Sulfur oxides [air, unspecified]: 4.12777e-5 kg; source FEFCO Corrugated Packaging 2015; lognormal variance with pedigree 0.0032, pedigree (1,3,3,1,1)
  (same comment as for BOD5, Biological Oxygen Demand)
- Carbon dioxide, fossil [air, unspecified]: 0.322718 kg; source FEFCO Corrugated Packaging 2015; lognormal variance with pedigree 0.0032, pedigree (1,3,3,1,1)
  (same comment as for Carbon dioxide, non-fossil)
- Benzene, ethyl- [air, unspecified]: 9.26017e-9 kg; lognormal variance with pedigree 0.058125, pedigree (4,2,3,2,3)
  (same comment as for lignite ash)
- Hydrocarbons, aliphatic, alkanes, unspecified [air, unspecified]: 1.45178e-6 kg; lognormal variance with pedigree 0.0526, pedigree (3,3,3,1,3)
  (same comment as for Radium-228)
- Aluminium [air, unspecified]: 4.30434e-6 kg; lognormal variance with pedigree 0.6626, pedigree (3,3,3,1,3)
  (same comment as for Radium-228)
- Hydrogen sulfide [air, unspecified]: 2.15544e-8 kg; lognormal variance with pedigree 0.058125, pedigree (4,2,3,2,3)
  (same comment as for lignite ash)
- Boron [air, unspecified]: 2.53425e-6 kg; lognormal variance with pedigree 0.6626, pedigree (3,3,3,1,3)
  (same comment as for Radium-228)
- Thorium-232 [air, unspecified]: 1.56045e-6 kBq; lognormal variance with pedigree 0.3126, pedigree (3,3,3,1,3)
  (same comment as for Radium-228)
- Phenol, pentachloro- [air, unspecified]: 2.50024e-12 kg; lognormal variance with pedigree 0.058125, pedigree (4,2,3,2,3)
  (same comment as for lignite ash)
- Cobalt [air, unspecified]: 8.78496e-9 kg; lognormal variance with pedigree 0.6626, pedigree (3,3,3,1,3)
  (same comment as for Radium-228)
- TOC, Total Organic Carbon [water, unspecified]: 0.000325454 kg; source FEFCO Corrugated Packaging 2015; lognormal variance with pedigree 0.0432, pedigree (1,3,3,1,2)
  (same comment as for BOD5, Biological Oxygen Demand)
- Strontium [air, unspecified]: 8.80051e-8 kg; lognormal variance with pedigree 0.0526, pedigree (3,3,3,1,3)
  (same comment as for Radium-228)
- Nitrogen [water, unspecified]: 5.54465e-5 kg; source FEFCO Corrugated Packaging 2015; lognormal variance with pedigree 0.0426, pedigree (1,3,3,1,1)
  Reported as total nitrogen.
- Ammonium, ion [water, unspecified]: 1.59785e-5 kg; source FEFCO Corrugated Packaging 2015; lognormal variance with pedigree 0.0506, pedigree (2,5,3,1,1)
  This value was taken over from FEFCO 2009 as it is not reported in FEFCO 2015 anymore. In FEFCO 2009 it is qualified as "not representative" because only a few mills were able to report this figure. Moreover, mills were not able to report substances in the input water, hence this figure represents gross rather than net emissions. The value is a straight average over the reporting mills.
- Carbon monoxide, fossil [air, unspecified]: 5.59311e-5 kg; source FEFCO Corrugated Packaging 2015; lognormal variance with pedigree 0.6526, pedigree (1,3,3,1,1)
  (same comment as for Carbon dioxide, non-fossil)
- Particulates, < 2.5 um [air, unspecified]: 2.53298e-5 kg; lognormal variance with pedigree 0.3126, pedigree (3,3,3,1,3)
  (same comment as for Particulates, > 2.5 um, and < 10um)
- Chlorides, unspecified [water, unspecified]: 0.000758978 kg; source FEFCO Corrugated Packaging 2015; lognormal variance with pedigree 0.0506, pedigree (2,5,3,1,1)
  This value was taken over from FEFCO 2009 as it is not reported in FEFCO 2015 anymore. In FEFCO 2009 it is qualified as "not representative" because only a few mills were able to report this figure. Moreover, mills were not able to report substances in the input water, hence this figure represents gross rather than net emissions. The value is a straight average over the reporting mills.
  Uncertainty: Note as not representative in the report.
- Tin [air, unspecified]: 5.38135e-10 kg; lognormal variance with pedigree 0.6626, pedigree (3,3,3,1,3)
  (same comment as for Radium-228)
- Radon-222 [air, unspecified]: 1.02473e-6 kBq; lognormal variance with pedigree 0.3126, pedigree (3,3,3,1,3)
  (same comment as for Radium-228)
- Acetone [air, unspecified]: 4.64385e-10 kg; lognormal variance with pedigree 0.0526, pedigree (3,3,3,1,3)
  (same comment as for Radium-228)
- Titanium [air, unspecified]: 1.16142e-7 kg; lognormal variance with pedigree 0.6626, pedigree (3,3,3,1,3)
  (same comment as for Radium-228)
- Uranium [air, unspecified]: 1.49977e-9 kg; lognormal variance with pedigree 0.0526, pedigree (3,3,3,1,3)
  (same comment as for Radium-228)
- NMVOC, non-methane volatile organic compounds, unspecified origin [air, unspecified]: 4.78937e-6 kg; lognormal variance with pedigree 0.0526, pedigree (3,3,3,1,3)
  (same comment as for lignite ash)
- Xylene [air, unspecified]: 7.27551e-7 kg; lognormal variance with pedigree 0.0526, pedigree (3,3,3,1,3)
  (same comment as for Radium-228)
- Zinc, ion [water, unspecified]: 2.51757e-7 kg; source FEFCO Corrugated Packaging 2015; lognormal variance with pedigree 0.0506, pedigree (2,5,3,1,1)
  This value is qualified as "not representative" in FEFCO (2015) because only a few mills were able to report this figure. Moreover, mills were not able to report substances in the input water, hence this figure represents gross rather than net emissions. The value is a straight average over the reporting mills.
  Uncertainty: Note as not representative in the report.
- Propene [air, unspecified]: 1.159e-6 kg; lognormal variance with pedigree 0.0526, pedigree (3,3,3,1,3)
  (same comment as for Radium-228)
- Dinitrogen monoxide [air, unspecified]: 1.55163e-6 kg; lognormal variance with pedigree 0.0526, pedigree (3,3,3,1,3)
  (same comment as for lignite ash)
- Methane, fossil [air, unspecified]: 7.62112e-5 kg; lognormal variance with pedigree 0.0526, pedigree (3,3,3,1,3)
  (same comment as for Radium-228)
- Arsenic [air, unspecified]: 1.53466e-8 kg; lognormal variance with pedigree 0.0526, pedigree (3,3,3,1,3)
  (same comment as for lignite ash)

## Sampling procedure
Data were collected from the producers by Cepi ContainerBoard and FEFCO Corrugated Pagaging for the European Database for Corrugated Board Life Cycle Studies and reviewed by the Institut für Energie- und Umweltforschung Heidelberg (ifeu).
The data for the production of Testliner and Wellenstoff were
collected from mills, which together represent about 66% of the total yearly production of corrugated base papers from recovered paper in Europe. 66% of production correspond to 12.490.000 tonnes.Data were provided by mills in Austria, Czech Republic, France, Germany, Italy, the Netherlands, Poland, Spain and the United Kingdom. Each mill produces between 60.000 - 1.300.000 tonnes of net saleable paper (FEFCO, 2015).

Mind that this dataset is identical to the production recycled fluting (wellenstoff) except for inputs of
alkyletene dimer sizing agent
chemical, organic and
kaolin
are specific to testliner. These do not appear in the production of wellenstoff.
FEFCO (2015) reports weighted average values of in- and outputs over the testliner and wellenstoff where there is no technical reason for differences between the two grades. This is mentioned to be the case for energy consumption and the related emissions to air, for water consumption, the related effluents and emissions to water as well as for residues. For this reason also the calculated emissions resulting from fuel consumption are identical for wellenstoff and testliner.
Reference(s): CCB & FEFCO. 2015. European Database for Corrugated Board Life Cycle Studies. Accessible online at <http://www.fefco.org/sites/default/files/lca-report-2015.pdf> (25.Jan 2018).

## Extrapolations
Additional air emissions from the combustion of fossil fuels estimated based on industrial heating datasets from the ecoinvent database and matched as follows:
light fuel oil: heat production, light fuel oil, at industrial furnace 1MW, Europe without Switzerland
heavy fuel oil: heat production, heavy fuel oil, at industrial furnace 1MW, Europe without Switzerland
hard coal: heat production, at hard coal industrial furnace 1-10MW, Europe without Switzerland
natural gas: heat production, natural gas, at industrial furnace >100kW, Europe without Switzerland
lignite briquettes and peat: heat production, lignite briquette, at stove 5-15kW, Europe without Switzerland
wood chips: heat production, wood chips from industry, at furnace 1000kW, CH
