# heat and power co-generation, hard coal

Dataset: EcoSpold 2, unit process
Geography: CO
Time period: 2014-01-01 to 2019-12-31
Technology level: modern
Classification: EcoSpold01Categories: hard coal/power plants
Classification: ISIC rev.4 ecoinvent: 3510:Electric power generation, transmission and distribution
Synonyms: coking coal; anthracite; other bituminous coal
Tags: hard coal power; fossil fuels; coal power
Scenario: Business-as-Usual
System model: Allocation at the point of substitution
Generated by: Germán Santa María Restrepo
Published in: Suppen, N. 2017
Database: ecoinvent
isCopyrightProtected: true
accessRestrictedTo: 1

## General comment
This dataset represents the production of high voltage electricity and heat in a hard coal cogeneration power plant in Colombia in 2014. This dataset covers only co-generation in power plants that exclusively burn coal “COGENERADOR COLTEJER 1”, it does not include plants that burn coal as a primary fuel in combination with secondary fuels like sugarcane bagasse. This dataset was created from the “heat and power co-generation, hard-coal, GLO” dataset, retrieved on 20/11/2017. The exchanges are valid for 1MJ of hard coal burned. Total net electricity production and efficiency parameters were regionalized with Colombian data.

'Hard coal' includes anthracite, coking coal and other bituminous coal according to the definition of the IEA electricity information 2014. Efficiency and total net electricity production data correspond to heat and power cogeneration with hard coal in Colombia in 2014.
Comments on the inventory data of emissions:
- For the assessment of main characteristics (sulphur and ash content of coal, efficiency of the plant) and CO2 a bottom-up approach has been used. It consists in the collection of information about single plants.
- The size distribution of particle emissions has been derived from German data.
- Halogene emissions have been estimated on the basis of the content of the species in the country-specific coal input mix, assuming average retention rates.
- For CO and particle emissions average values for the former UCTE are included (Union for the Coordination of the Transmission of Electricity, since 2009 replaced by ENTSO-E European Network of Transmission System Operators for Electricity).
- The country specific emission depend on the share of DeNOx.
- Emissions of trace elements were calculated by means of a formula (CORINAIR) using the ash content in the country-specific coal input mix and average transfer coefficients for coal power plants, taking into account the share of DeSOx installed.
- Emission of uranium and thorium radioactive isotopes were assumed proportional to the corresponding element emitted with particles; the other non-gaseous radioactive isotopes of the uranium and thorium decay chain were assumed proportional to the emitted U-238 or Th-232.
- The emission of gaseous radon and K-40 are taken from the literature.
IEA. 2014. Electricity Information 2014. ISBN 978-92-64-21692-1. International Energy Agency (IEA), Paris Cedex (FR)
European Environment Agency (1991) CORINAIR Inventory; VOC's Default Emission Factors

## Included activities start
From the constructed hard coal power plant ready to produce electricity.
From reception of hard coal and operating materials at power plant gate. Functional unit is the combustion of 1MJ of hard coal.

## Included activities end
This activity ends with heat and electricity generated in a CHP power plant.
This dataset includes:
- all operation and maintenance activities and materials of the power plants.
- Use of fuel oil for startup
- Particle removal (dedusting of the flue gas)

- Desulfurisation and denitrification. These processes are described in separate modules; it can be decided by changing the values of NOx and SOx retained whether and how much DeNOx and DeSOx are installed.
- Cooling: It is assumed that all plants use wet cooling with a cooling tower. No cooling tower is included in this dataset (will be implemented in future versions)
- Loss of feed water

This dataset doesn't include
- raw materials extraction, decommissioning and waste treatment as these activities are already included in the infrastructure datasets
- transformation of the electricity produced
- The disposal of non-recycled ashes is modelled separately.

## Geography
This dataset is based on the GLO dataset with adjustments to the regional context with data from co-generation, hard coal power plants in Colombia.

## Technology
POWER PLANT:
Hard coal power plant input is a market mix of 100MWe power plants (representing all power plants with a capacity <250MWe and 7% of the installed capacity) and 500MWe power plants (representing all power plants with a capacity >250MWe and 93% of the installed capacity). The plants are used for middle load with 4000 hours of operation at full capacity per year. The plants are assumed to operate 150000 hours during its lifetime.
OTHER DATA:
- Share of installed capacity with desulfurisation 2% (rough estimation based on sulfur mass balance
- Average efficiency of desulfurisation installations: 92% (rough estimation based on Dones et al. 27
- Share of installed capacity with denitrification (primary and/or secondary installations): 73% (figure based on IEA 212 )
- Average efficiency of denitrification installations: 8% (estimation based on Dones et al. 27, p.128. Valid for selective catalytic reaction systems)
- Share of installed capacity with particle filters: 98% (figure based on IEA 212 )
- Average efficiency of particle filters: 98% (figure based on IEA 212 )
- IEA 2012. Coal Power Database. International Energy Agency Clean Coal Centre, London
- IEA/OECD. 2010. Electricity Information 2010. International Energy Agency (IEA), Paris Cedex (FR). Part IV. Detailed OECD Electricity And Heat Data.
- Dones, R., Bauer, C., Röder, A. (2007) Kohle. In: Dones, R. (Ed.) et al., Sachbilanzen von Energiesystemen: Grundlagen für den ökologischen Vergleich von Energiesystemen und den Einbezug von Energiesystemen in Ökobilanzen für die Schweiz. Final report ecoinvent No.

## Time period
The Annual Production Volume is valid for the year 2014.

## Parameters
- recirculating cooling system as a fraction of all cooling systems: 0.375 dimensionless; name recirculating_CS_fraction_from_allCS; lognormal variance with pedigree 0.092025, pedigree (4,4,3,2,4)
  Calculated as an average of data available for Europe (Floerke, 2008, Future changes of freshwater needs in the electricity production sector) and USA (NERL, 2011, Estimating freshwater needs to meet future thermoelectric generation requirements).
- water withdrawal, electricity production from hard coal, recirculating CS: 0.0021 m3/kWh; name WWithdrawal_EP_HC_recirculating_CS; lognormal variance with pedigree 0.092025, pedigree (4,4,3,2,4)
  Estimated based on literature (Scown, 2011, Water Footprint of U.S. Transportation Fuels, SI). The amount of water withdrawn while burning lignite and peat is assumed to be the same as in case of coal.
- total net electricity: 2.89865e7 kWh; name totalElectricity; lognormal variance with pedigree 0.0018, pedigree (2,1,1,1,2)
  Literature value/statistics. Taken from XM National Statistics for Colombia in 2014. URL: http://informacioninteligente10.xm.com.co/oferta/Paginas/HistoricoOferta.aspx accessed 21/07/2017 File: "Generacion_(kWh)_2014"
- fraction, water, decarbonised, to air: 0.0299662; name fraction_WDC_to_air; = fraction_CW_to_air; lognormal variance with pedigree 0.092025, pedigree (4,4,3,2,4)
  Calculated value. See comments in the other parametres present in this dataset. Decarbonised water is considered to be always used as cooling water, thus cooling water fractions to air are applied to all carbonised water input flows to calculate the amount of water consumed in the processes.
- fraction, cooling water, to air: 0.0299662; name fraction_CW_to_air; = (WConsumption_EP_HC_recirculatingCS*recirculating_CS_fraction_from_allCS+WConsumption_EP_HC_once_through_andCP_CS*once_through_andCP_CS_fractio_from_allCS)/(WWithdrawal_EP_HC_recirculating_CS*recirculating_CS_fraction_from_allCS+WWithdrawal_EP_HC_once_through_andCP_CS*once_through_andCP_CS_fractio_from_allCS); lognormal variance with pedigree 0.092025, pedigree (4,4,3,2,4)
  Calculated value
- fraction, water, completely softened, to air: 0.15; name fraction_WCS_to_air; = fraction_PW_to_air; lognormal variance with pedigree 0.092025, pedigree (4,4,3,2,4)
  Calculated value. See comment in the other parametres present in this dataset. Water, completely softened is considered to be always used as process water, thus process water fractions to air are applied to all water, completely softened input flows to calculate the amount of water consumed in the processes.
- once-through and cooling pond cooling systems as a fraction of all cooling syste: 0.625 dimensionless; name once_through_andCP_CS_fractio_from_allCS; lognormal variance with pedigree 0.092025, pedigree (4,4,3,2,4)
  (same comment as for recirculating cooling system as a fraction of all cooling systems)
- efficiency: 0.2217 dimensionless; lognormal variance with pedigree 0.0012, pedigree (2,1,1,1,1)
  Literature value.
  Data on electricity efficiency of "Cogenerador Coltejer 1" was obtained from the XM report on cogenerators.
  Source: XM "Informe de Cogeneradores" page 9 "Rendimiento Eléctrico Equivalente, REE (%)" , published on 03/07/2015, URL: http://www.xm.com.co/Documetos/pdf/INFORME_COGENERADORES_Julio_2015.pdf accessed on 19/01/2017
- water withdrawal, electricity production from hard coal, once-through and coolin: 0.0815 m3/kWh; name WWithdrawal_EP_HC_once_through_andCP_CS; lognormal variance with pedigree 0.092025, pedigree (4,4,3,2,4)
  (same comment as for water withdrawal, electricity production from hard coal, recirculating)
- factor: input of MJ for the production of 1 kWh: 16.2382 MJ/kWh; name factor_MJ_kWh; = 1*3.6/efficiency; lognormal variance with pedigree 0.0532, pedigree (4,4,3,4,4)
  Calculated value. 3.6 MJ = 1kWh.
- heat ratio over total energy: 0.302 dimensionless; name heat_ratio_over_total_energy; lognormal variance with pedigree 0.006, pedigree (1,1,1,1,1)
  Ratio of useful heat production over total energy output. The data corresponds to the period from March 21, 2016 to March 26, 2017.
  Source: Informe de seguimiento a cogeneradores - Gerencia Nacional de Despacho Dirección Información.
  Document: XM CND-2017-017. Retrieved from: <http://www.xm.com.co/Informe%20Trimestral%20de%20Seguimiento%20a%20Cogeneradores/2017/INFORME_COGENERADORES_Abril_2017.pdf> on 30 of October 2017.
- fraction, process water, to air: 0.15 dimensionless; name fraction_PW_to_air; lognormal variance with pedigree 0.092025, pedigree (4,4,3,2,4)
  Literature value. In case when no industry/process specific data are available, default evaporation fraction value is used. This value is 15% and is based on literature (Statistics Canada, 2007 & Shaffer, K.H., 2008, Consumptive water use in the Great Lakes Basin, USGS & Shiklomanov, 2003, World Water Resources at the Beginning of the 21st Century) and has been approved by an expert.
- water consumption, electricity production from hard coal, once-through and cooli: 0.0014 m3/kWh; name WConsumption_EP_HC_once_through_andCP_CS; lognormal variance with pedigree 0.092025, pedigree (4,4,3,2,4)
  Estimated based on literature (Scown, 2011, Water Footprint of U.S. Transportation Fuels, SI). The amount of water consumed while burning lignite and peat is assumed to be the same as in case of coal.
- water consumption, electricity production from hard coal, recirculating CS: 0.0018 m3/kWh; name WConsumption_EP_HC_recirculatingCS; lognormal variance with pedigree 0.092025, pedigree (4,4,3,2,4)
  (same comment as for water consumption, electricity production from hard coal, once-through)

## Reference product
- heat, district or industrial, other than natural gas: 1 MJ; name heat; = electricity/(1- heat_ratio_over_total_energy); CPC 17300: Steam and hot water; By-product classification allocatable product; pedigree (1,1,1,1,1)
  Calculated value from electricity production and heat to total energy production ratio.
  production volume 1.42148e8 MJ; = totalElectricity*factor_MJ_kWh*heat_ratio_over_total_energy
    Calculated value from total net electricity and heat ratio over total energy
  property price 0.0106 EUR2005; name heat_price_EUR2005
    Average European district heat price from Ecoheatcool and Euroheat 2005-2006, Ecoheat Work package 1: The European heat market. Final report. 10.6 EUR/GJ i s the price of district heat. http://www.solarthermalworld.org/files/Ecoheatcool%20WP1%20Web.pdf?download
  property exergy 0.1842 MJ; name heat_exergy
    This exergy property is based on the exergy content of the product.
  property true value relation 0.1842; name heat_true_value_relation
    property to calculate "true value" from
  property true value 0.000474802; name heat_true_value
    allocation property applied in "true value" allocation // value calculated from true value relation
  properties: corresponding fuel use, propane, furnace >100kW 0 MJ

## By-products
- electricity, high voltage: 0 kWh; name electricity; = efficiency/3.6; CPC 17100: Electrical energy; By-product classification allocatable product; undefined min 0.112233, max 0.112233, standardDeviation95 0, pedigree (1,1,2,1,1)
  Electricity output per MJ of hard coal burned.
  production volume 2.89865e7 kWh; name electricity_apv; = totalElectricity
    (same comment as for total net electricity)
  property price 0.0977 EUR2005; name electricity_price_EUR2005
    Temporary price data. Calculated as 90% of purchasers price based on: 94% of the average price (to account for a 6% loss in transformation and transmission) for electricity for industrial consumersin 2005 (excluded taxes). From IEA.
  property exergy 3.6 MJ; name electricity_exergy
    This exergy property is based on the exergy content of the product.
  property true value relation 3.6; name electricity_true_value_relation
    property to calculate "true value" from
  property true value 0.00647711; name electricity_true_value
    (same comment as for heat, district or industrial, other than natural gas)
- heat, for reuse in municipal waste incineration only: 0 MJ; CPC 17300: Steam and hot water; By-product classification allocatable product; pedigree (1,1,1,1,1)
  Net electricity generated from this waste and used in internal MSWI plant energy redistribution.
  Uncertainty: uncertainty is calculated from uncertainties in waste composition and uncertainties in energy efficiency and the uncertainty in internal energy demand
  production volume 1.06021 MJ
  property exergy 0.1842 MJ; name E_th_prod_MSWI_exergy
    This exergy property is based on the exergy content of the product.
  property price 0.0106 EUR2005; name E_th_prod_MSWI_price_EUR2005
    (same comment as for heat, district or industrial, other than natural gas)
  property true value relation 0.1842; name E_th_prod_MSWI_true_value_relation
    property to calculate "true value" from
  property true value 1.21217e-11
    (same comment as for heat, district or industrial, other than natural gas)
- electricity, for reuse in municipal waste incineration only: 0 kWh; CPC 17100: Electrical energy; By-product classification allocatable product; pedigree (1,1,1,1,1)
  (same comment as for heat, for reuse in municipal waste incineration only)
  production volume 0.149318 kWh
  property true value relation 3.6; name E_el_prod_MSWI_true_value_relation
    property to calculate "true value" from
  property price 0.1 EUR2005; name E_el_prod_MSWI_price_EUR2005
    Estimated to be the same price as in case of electricity, medium voltage.
  property exergy 3.6 MJ; name E_el_prod_MSWI_exergy
    This exergy property is based on the exergy content of the product.
  property true value 3.33654e-11
    (same comment as for heat, district or industrial, other than natural gas)

## Inputs from technosphere
- hard coal power plant: 6.35628e-13 unit; name hard_coal_power_plant; = 1/ (150000*500*1000)*(efficiency/3.6); source Röder, A. 2007; lognormal variance with pedigree 0.3686, pedigree (5,3,4,5,3)
  Calculated value. At the moment, the hard coal power plant input consists of a market mix of a 100MWe power plant and a 500MWe power plant
  .
  For this calculation, 4000 load hours per year are assumed. It is assumed that a total of 150'000h is reached during the lifetime. A capacity of 500MW is taken for the calculation.
- hard coal: 0.0269161 kg; name hard_coal; = electricity* factor_MJ_kWh/ hard_co_low_heating_value_hard_coal_CO_0; lognormal variance with pedigree 0.0014, pedigree (2,1,2,1,1)
  Calculated value from low heating value of Colombian coal and the factor of input of MJ for the production of 1 kWh.
  property low heating value of hardcoal in Colombia 28.76 MJ/kg; name hard_co_low_heating_value_hard_coal_CO_0
  properties: water content 0.0638298, wet mass 1 kg, carbon content, fossil 0.845, dry mass 0.94 kg
  note on carbon content, fossil: C content 75-94% (specified in Tab 1.1, report 6, part VI). A mean content of 0.845 kg C/ kg dry hard coal was considered
  note on low heating value of hardcoal in Colombia: This property represents the low heating value of hard coal in Colombia.
- water, completely softened: 0.00464464 kg; name water_completely_softened; lognormal variance with pedigree 0.054, pedigree (4,5,4,5,3)
  Literature value/calculated value. Feed water for the steam circuit lost when producing 1kWh of electricity from hard coal, based on the value for burning 1MJ of hard coal. Röder et al. 2007, Tab. 9.65 and Tab. 9.66, p. 160f.
  properties: wet mass 1 kg
- residue from cooling tower: -3.87053e-6 kg; name amount_residue; lognormal variance with pedigree 0.0812, pedigree (5,3,4,5,2)
  Literature value/calculated value. Amount of cooling tower needed for producing 1kWh of electricity from hard coal, based on the value for burning 1MJ of hard coal. Weighted average with electricity production data (Itten&Frischknecht 2012) and values of 14 countries
  (AT, BE, ES, FR, IT, NL, PT, DE, CZ, HR, PL, SK, CN, US) (Röder et al. 2007) .
  Country values calculated from mass balance.
  Source:
  Itten R. and Frischknecht R. (2012) Life Cycle Inventories of Electricity Mixes and Grid. ESU-services Ltd., Uster, Switzerland.
  production volume 2353.44 kg; = amount_residue/electricity*electricity_apv
    Calculated from the production volume of electricity produced in proportion to the respective output amounts.
  property price 0 EUR2005; name amount_residue_price_EUR2005
  properties: wet mass 1 kg, carbon content, fossil 0.0544233, dry mass 0.7 kg, water content 0.428571
- NOx retained, by selective catalytic reduction: 3.48006e-5 kg; name nox_retained; = 0.00073*(efficiency/3.6); source Itten R. 2012; lognormal variance with pedigree 0.093, pedigree (4,4,5,5,4)
  Calculated value. Weighted average from all figures from countries in ecoinvent version 2 (AT, BE, BR, CN, CZ, DE, DK, ES, FI, FR, GB, ES, FI, FR, GB, HR, HU, IE, IT, JP, NL, NO, PL, PT, RO, SE, SI, SK) and the new countries for version 3 (AU, CA regions, CL, IN, KR, MX, MY, PE, RU, TH, TR, TW, TZ, UA, US regions, ZA). Weighting was made with net electricity production 2008 in these countries (Itten&Frischknecht 2012).
  BA and BG were not included in the calculation of the GLO average as they inherit all GLO values at the moment.
  properties: dry mass 1 kg, wet mass 1 kg
- light fuel oil: 1.31598e-5 kg; name light_fuel_oil; lognormal variance with pedigree 0.024, pedigree (3,4,4,5,1)
  Literature value/calculated value. Light fuel oil use per 1MJ of hard coal burned, use for start-up of the power plant after shut down. Weighted average with electricity production data (Itten&Frischknecht 2012) and ight fuel oil use values of 14 countries
  (AT, BE, ES, FR, IT, NL, PT, DE, CZ, HR, PL, SK, CN, US) (Röder et al. 2007)
  Country values are typical values for hard coal plants.
  Source:
  Itten R. and Frischknecht R. (2012) Life Cycle Inventories of Electricity Mixes and Grid. ESU-services Ltd., Uster, Switzerland.
  properties: dry mass 1 kg, carbon content, fossil 0.862, wet mass 1 kg
- hard coal ash: -0.00579032 kg; name amount_ash; lognormal variance with pedigree 0.0986, pedigree (5,3,4,5,3)
  Literature value/calculated value. Hard coal ash produced when producing 1kWh of electricity from hard coal, based on the value for burning 1MJ of hard coal. Weighted average with electricity production data (Itten&Frischknecht 2012) and values of 12 countries
  (AT, BE, ES, FR, IT, NL, PT, DE, CZ, HR, PL, SK). These values were valid for the ash being disposed off. Now, total amount of ash has been calculated (disposed+recycled) with the data in Tab. 9.69 p. 165 in Röder et al. 2007. Globally, 74% of the lignite ash are recycled, 26% go to disposal.
  Source:
  Itten R. and Frischknecht R. (2012) Life Cycle Inventories of Electricity Mixes and Grid. ESU-services Ltd., Uster, Switzerland.
  production volume 3.52075e6 kg; = amount_ash/electricity*electricity_apv
    Calculated from the production volume of electricity produced in proportion to the respective output amounts. An extra amount has been added to the global dataset due to parent child relationship.
  property price 0 EUR2005; name amount_ash_price_EUR2005
  properties: dry mass 1 kg, wet mass 1 kg
- SOx retained, in hard coal flue gas desulfurisation: 9.58209e-5 kg; name sox_retained; = 0.00201*(efficiency/3.6); source Itten R. 2012; lognormal variance with pedigree 0.093, pedigree (4,4,5,5,4)
  (same comment as for NOx retained, by selective catalytic reduction)
  properties: dry mass 1 kg, wet mass 1 kg
- water, decarbonised: 0.154821 kg; name water_decarbonised_user; lognormal variance with pedigree 0.054, pedigree (4,5,4,5,3)
  Literature value/calculated value. Cooling water, decarbonised, for the cooling water circuit lost when producing 1kWh of electricity from hard coal, based on the value for burning 1MJ of hard coal. Röder et al. 2007, Tab. 9.65 and Tab. 9.66, p. 160f. These tables give an amount of 0.15 kg/MJ burned, which is valid for the assumption of 75% wet cooling and 25% run-through cooling. However, this revised dataset assumes 100% wet cooling.
  properties: wet mass 1 kg

## Inputs from nature
- Water, cooling, unspecified natural origin [natural resource, in water]: 0.00354029 m3; name water_cooling_UNO_input; = ((recirculating_CS_fraction_from_allCS*WWithdrawal_EP_HC_recirculating_CS)+(once_through_andCP_CS_fractio_from_allCS*WWithdrawal_EP_HC_once_through_andCP_CS))/11.31*factor_MJ_kWh*(efficiency/3.6); lognormal variance with pedigree 0.098025, pedigree (4,4,4,2,4)
  Calculated based on literature data.

## Emissions to nature
- Methane, fossil [air, non-urban air or from high stacks]: 6.98244e-7 kg; name methane_fossil; lognormal variance with pedigree 0.074, pedigree (3,4,4,5,1)
  Literature value/calculated value. Emissions when producing 1kWh of electricity from hard coal, based on the value for burning 1MJ of hard coal. Weighted average with electricity production data (Itten&Frischknecht 2012) and emission values of 14 countries
  (AT, BE, ES, FR, IT, NL, PT, DE, CZ, HR, PL, SK, CN, US) (Röder et al. 2007)
  Country emissions values based on literature.
  Source:
  Itten R. and Frischknecht R. (2012) Life Cycle Inventories of Electricity Mixes and Grid. ESU-services Ltd., Uster, Switzerland.
- Cadmium [air, non-urban air or from high stacks]: 8.05071e-10 kg; name cadmium; lognormal variance with pedigree 0.7486, pedigree (5,3,4,5,3)
  Literature value/calculated value. Emissions when producing 1kWh of electricity from hard coal, based on the value for burning 1MJ of hard coal. Weighted average with electricity production data (Itten&Frischknecht 2012) and emission values of 14 countries
  (AT, BE, ES, FR, IT, NL, PT, DE, CZ, HR, PL, SK, CN, US) (Röder et al. 2007)
  Country emissions values calculated from trace element balance, input uncertain
  Source:
  Itten R. and Frischknecht R. (2012) Life Cycle Inventories of Electricity Mixes and Grid. ESU-services Ltd., Uster, Switzerland.
- Uranium-234 [air, non-urban air or from high stacks]: 1.5637e-6 kBq; name uranium_234; lognormal variance with pedigree 0.3586, pedigree (5,3,4,5,3)
  (same comment as for Methane, fossil)
- Formaldehyde [air, non-urban air or from high stacks]: 2.81001e-8 kg; name formaldehyde; lognormal variance with pedigree 0.08, pedigree (3,5,4,5,1)
  (same comment as for Methane, fossil)
- Ethene, tetrachloro- [air, non-urban air or from high stacks]: 2.74034e-10 kg; name ethene_tetrachloro; lognormal variance with pedigree 0.1786, pedigree (5,3,4,5,3)
  (same comment as for Methane, fossil)
- Methane, dichloro-, HCC-30 [air, non-urban air or from high stacks]: 1.85012e-9 kg; name methane_dichloro; lognormal variance with pedigree 0.1786, pedigree (5,3,4,5,3)
  (same comment as for Methane, fossil)
- Hydrocarbons, aliphatic, alkanes, unspecified [air, non-urban air or from high stacks]: 1.04504e-7 kg; name hydrocarbons_al_al_unspec; lognormal variance with pedigree 0.08, pedigree (3,5,4,5,1)
  (same comment as for Methane, fossil)
- Thorium-228 [air, non-urban air or from high stacks]: 2.55455e-6 kBq; name throium_228; lognormal variance with pedigree 0.3986, pedigree (5,3,4,5,3)
  (same comment as for Cadmium)
- Chromium [air, non-urban air or from high stacks]: 6.34768e-9 kg; name chromium; lognormal variance with pedigree 0.7486, pedigree (5,3,4,5,3)
  (same comment as for Cadmium)
- Dioxins, measured as 2,3,7,8-tetrachlorodibenzo-p-dioxin [air, non-urban air or from high stacks]: 8.20553e-15 kg; name dioxins; lognormal variance with pedigree 0.34, pedigree (3,5,4,5,1)
  (same comment as for Methane, fossil)
- Pentane [air, non-urban air or from high stacks]: 6.73473e-8 kg; name pentane; lognormal variance with pedigree 0.08, pedigree (3,5,4,5,1)
  (same comment as for Methane, fossil)
- Cobalt [air, non-urban air or from high stacks]: 2.58552e-9 kg; name cobalt; lognormal variance with pedigree 0.7486, pedigree (5,3,4,5,3)
  (same comment as for Cadmium)
- Boron [air, non-urban air or from high stacks]: 2.96483e-7 kg; name boron; lognormal variance with pedigree 0.7486, pedigree (5,3,4,5,3)
  (same comment as for Cadmium)
- Nitrogen oxides [air, non-urban air or from high stacks]: 0.000144923 kg; name nitrogen_oxides; = 0.00304*(efficiency/3.6); source Itten R. 2012; lognormal variance with pedigree 0.093, pedigree (4,4,5,5,4)
  (same comment as for NOx retained, by selective catalytic reduction)
- Propane [air, non-urban air or from high stacks]: 1.6024e-8 kg; name propane; lognormal variance with pedigree 0.08, pedigree (3,5,4,5,1)
  (same comment as for Methane, fossil)
- Hydrocarbons, aliphatic, unsaturated [air, non-urban air or from high stacks]: 9.90857e-8 kg; name hydrocarbons_aliphatic_unsaturated; lognormal variance with pedigree 0.08, pedigree (3,5,4,5,1)
  (same comment as for Methane, fossil)
- Mercury [air, non-urban air or from high stacks]: 2.09009e-9 kg; name mercury; lognormal variance with pedigree 0.7486, pedigree (5,3,4,5,3)
  (same comment as for Cadmium)
- Zinc [air, non-urban air or from high stacks]: 3.22028e-8 kg; name zinc; lognormal variance with pedigree 0.7486, pedigree (5,3,4,5,3)
  (same comment as for Cadmium)
- Methane, monochloro-, R-40 [air, non-urban air or from high stacks]: 3.38285e-9 kg; name methane_monochloro; lognormal variance with pedigree 0.1406, pedigree (3,3,4,5,3)
  (same comment as for Methane, fossil)
- Hydrogen chloride [air, non-urban air or from high stacks]: 2.05138e-5 kg; name hydrogen_chloride; lognormal variance with pedigree 0.2186, pedigree (5,3,4,5,3)
  (same comment as for Cadmium)
- Particulates, > 10 um [air, non-urban air or from high stacks]: 4.26665e-6 kg; name particulates_gt10; = 0.0000895*(efficiency/3.6); source Itten R. 2012; lognormal variance with pedigree 0.093, pedigree (4,4,5,5,4)
  (same comment as for NOx retained, by selective catalytic reduction)
- Hydrocarbons, chlorinated [air, non-urban air or from high stacks]: 1.29276e-9 kg; name hydrocarbons_chlorinated; lognormal variance with pedigree 0.1786, pedigree (5,3,4,5,3)
  (same comment as for Methane, fossil)
- PAH, polycyclic aromatic hydrocarbons [air, non-urban air or from high stacks]: 5.79806e-9 kg; name pah; lognormal variance with pedigree 0.34, pedigree (3,5,4,5,1)
  (same comment as for Methane, fossil)
- Acenaphthene [air, non-urban air or from high stacks]: 3.25125e-12 kg; name acenaphthene; lognormal variance with pedigree 0.1406, pedigree (3,3,4,5,3)
  (same comment as for Methane, fossil)
- Hexane [air, non-urban air or from high stacks]: 4.29629e-10 kg; name hexane; lognormal variance with pedigree 0.1786, pedigree (5,3,4,5,3)
  (same comment as for Methane, fossil)
- Antimony [air, non-urban air or from high stacks]: 9.28928e-10 kg; name antimony; lognormal variance with pedigree 0.7486, pedigree (5,3,4,5,3)
  (same comment as for Cadmium)
- Arsenic [air, non-urban air or from high stacks]: 7.71785e-9 kg; name arsenic; lognormal variance with pedigree 0.7486, pedigree (5,3,4,5,3)
  (same comment as for Cadmium)
- Lead-210 [air, non-urban air or from high stacks]: 5.36456e-5 kBq; name lead_210; lognormal variance with pedigree 0.3986, pedigree (5,3,4,5,3)
  (same comment as for Cadmium)
- Lead [air, non-urban air or from high stacks]: 2.87194e-8 kg; name lead; lognormal variance with pedigree 0.7486, pedigree (5,3,4,5,3)
  (same comment as for Cadmium)
- Toluene [air, non-urban air or from high stacks]: 5.14781e-8 kg; name toluene; lognormal variance with pedigree 0.08, pedigree (3,5,4,5,1)
  (same comment as for Methane, fossil)
- Radium-228 [air, non-urban air or from high stacks]: 4.57497e-6 kBq; name radium_228; lognormal variance with pedigree 0.3986, pedigree (5,3,4,5,3)
  (same comment as for Cadmium)
- Polonium-210 [air, non-urban air or from high stacks]: 9.52151e-5 kBq; name polonium_210; lognormal variance with pedigree 0.3986, pedigree (5,3,4,5,3)
  (same comment as for Cadmium)
- Radium-226 [air, non-urban air or from high stacks]: 1.41662e-5 kBq; name radium_226; lognormal variance with pedigree 0.3907, pedigree (3,3,5,3,3)
  (same comment as for Cadmium)
- Uranium-238 [air, non-urban air or from high stacks]: 1.23083e-5 kBq; name uranium_238; lognormal variance with pedigree 0.3986, pedigree (5,3,4,5,3)
  (same comment as for Cadmium)
- Nickel [air, non-urban air or from high stacks]: 1.54821e-8 kg; name nickel; lognormal variance with pedigree 0.7486, pedigree (5,3,4,5,3)
  (same comment as for Cadmium)
- Propene [air, non-urban air or from high stacks]: 7.33079e-9 kg; name propene; lognormal variance with pedigree 0.08, pedigree (3,5,4,5,1)
  (same comment as for Methane, fossil)
- Selenium [air, non-urban air or from high stacks]: 1.27728e-8 kg; name selenium; lognormal variance with pedigree 0.7486, pedigree (5,3,4,5,3)
  (same comment as for Cadmium)
- Molybdenum [air, non-urban air or from high stacks]: 8.90223e-10 kg; name molybdenum; lognormal variance with pedigree 0.7486, pedigree (5,3,4,5,3)
  (same comment as for Cadmium)
- Furan [air, non-urban air or from high stacks]: 3.18932e-14 kg; name furan; lognormal variance with pedigree 0.1406, pedigree (3,3,4,5,3)
  (same comment as for Methane, fossil)
- Vanadium [air, non-urban air or from high stacks]: 1.14568e-8 kg; name vanadium; lognormal variance with pedigree 0.7486, pedigree (5,3,4,5,3)
  (same comment as for Cadmium)
- Cumene [air, non-urban air or from high stacks]: 3.47574e-11 kg; name cumene; lognormal variance with pedigree 0.1222, pedigree (1,1,2,5,1)
  Literature value/calculated value. Emissions when producing 1kWh of electricity from hard coal, based on the value for burning 1MJ of hard coal. Weighted average with electricity production data (Itten&Frischknecht 2012) and emission values of 14 countries
  (AT, BE, ES, FR, IT, NL, PT, DE, CZ, HR, PL, SK, CN, US) (Röder et al. 2007)
  Source:
  Itten R. and Frischknecht R. (2012) Life Cycle Inventories of Electricity Mixes and Grid. ESU-services Ltd., Uster, Switzerland.
- Thorium-232 [air, non-urban air or from high stacks]: 3.73894e-6 kBq; name thorium_232; lognormal variance with pedigree 0.3986, pedigree (5,3,4,5,3)
  (same comment as for Cadmium)
- Water [water, unspecified]: 0.000365619 m3; name water_to_water_unspecified; = (water_completely_softened/1000)*(1-fraction_WCS_to_air)+(water_decarbonised_user/1000)*(1-fraction_WDC_to_air)+water_cooling_UNO_input*(1-fraction_CW_to_air)*(efficiency/3.6); lognormal variance with pedigree 0.098025, pedigree (4,4,4,2,4)
  Calculated value based on literature values and expert opinion. See comments in the parametres' comment field.
  property fraction, origin: fresh water 0.0429463; name fraction_origin_fresh_water_Ww
  property fraction, origin: salt water 0; name fraction_origin_salt_water_Ww
  property fraction, origin: unspecified 0.957054; name fraction_origin_unspecified_Ww
- Butane [air, non-urban air or from high stacks]: 8.67e-9 kg; name butane; lognormal variance with pedigree 0.08, pedigree (3,5,4,5,1)
  (same comment as for Methane, fossil)
- Water [air, unspecified]: 1.18694e-5 m3; name water_to_air_unspecified; = (water_completely_softened/1000)*fraction_WCS_to_air+(water_decarbonised_user/1000)*fraction_WDC_to_air+water_cooling_UNO_input*fraction_CW_to_air*(efficiency/3.6); lognormal variance with pedigree 0.098025, pedigree (4,4,4,2,4)
  (same comment as for Water)
  property fraction, origin: salt water 0; name fraction_origin_salt_water
  property fraction, origin: unspecified 0.952118; name fraction_origin_unspecified
  property fraction, origin: fresh water 0.047882; name fraction_origin_fresh_water
- Sulfur dioxide [air, non-urban air or from high stacks]: 0.000288893 kg; name sulfur_dioxide; = 0.00606*(efficiency/3.6); source Itten R. 2012; lognormal variance with pedigree 0.093, pedigree (4,4,5,5,4)
  (same comment as for NOx retained, by selective catalytic reduction)
- Potassium-40 [air, non-urban air or from high stacks]: 1.78045e-5 kBq; name potassium_40; lognormal variance with pedigree 0.3986, pedigree (5,3,4,5,3)
  (same comment as for Cadmium)
- Hydrocarbons, aliphatic, alkanes, cyclic [air, non-urban air or from high stacks]: 3.69249e-9 kg; name hydrocarbons_al_al_cyclic; lognormal variance with pedigree 0.1406, pedigree (3,3,4,5,3)
  (same comment as for Methane, fossil)
- Protactinium-234 [air, non-urban air or from high stacks]: 7.9733e-7 kBq; name protactinium_234; lognormal variance with pedigree 0.3206, pedigree (3,3,4,5,3)
  (same comment as for Methane, fossil)
- Thorium-230 [air, non-urban air or from high stacks]: 7.9733e-7 kBq; name thorium_230; lognormal variance with pedigree 0.3586, pedigree (5,3,4,5,3)
  (same comment as for Methane, fossil)
- Carbon dioxide, fossil [air, non-urban air or from high stacks]: 0.0739272 kg; name carbon_dioxide_fossil; lognormal variance with pedigree 0.0206, pedigree (3,3,4,5,3)
  (same comment as for Methane, fossil)
- Manganese [air, non-urban air or from high stacks]: 2.7713e-8 kg; name manganese; lognormal variance with pedigree 0.7486, pedigree (5,3,4,5,3)
  (same comment as for Cadmium)
- Phenol [air, non-urban air or from high stacks]: 1.02182e-10 kg; name phenol; lognormal variance with pedigree 0.1406, pedigree (3,3,4,5,3)
  (same comment as for Methane, fossil)
- Benzo(a)pyrene [air, non-urban air or from high stacks]: 3.3364e-13 kg; name benzo_a_pyrene; lognormal variance with pedigree 0.08, pedigree (3,5,4,5,1)
  (same comment as for Methane, fossil)
- Benzene, ethyl- [air, non-urban air or from high stacks]: 5.99933e-10 kg; name benzene_ethyl; lognormal variance with pedigree 0.1406, pedigree (3,3,4,5,3)
  (same comment as for Cumene)
- Thorium-234 [air, non-urban air or from high stacks]: 7.9733e-7 kBq; name thorium_234; lognormal variance with pedigree 0.3206, pedigree (3,3,4,5,3)
  (same comment as for Methane, fossil)
- Ethane, 1,2-dichloro- [air, non-urban air or from high stacks]: 2.54681e-10 kg; name ethane_dichloro; lognormal variance with pedigree 0.1786, pedigree (5,3,4,5,3)
  (same comment as for Methane, fossil)
- Xylene [air, non-urban air or from high stacks]: 4.22662e-7 kg; name xylene; lognormal variance with pedigree 0.08, pedigree (3,5,4,5,1)
  (same comment as for Methane, fossil)
- Beryllium [air, non-urban air or from high stacks]: 1.3392e-10 kg; name beryllium; lognormal variance with pedigree 0.6706, pedigree (3,3,4,5,3)
  (same comment as for Cumene)
- Ethane [air, non-urban air or from high stacks]: 1.88108e-8 kg; name ethane; lognormal variance with pedigree 0.08, pedigree (3,5,4,5,1)
  (same comment as for Methane, fossil)
- Radon-220 [air, non-urban air or from high stacks]: 0.000392472 kBq; name radon_220; lognormal variance with pedigree 0.3986, pedigree (5,3,4,5,3)
  (same comment as for Cadmium)
- Magnesium [air, non-urban air or from high stacks]: 7.01341e-8 kg; name magnesium; lognormal variance with pedigree 0.7086, pedigree (5,3,4,5,3)
  (same comment as for Methane, fossil)
- Styrene [air, non-urban air or from high stacks]: 1.57918e-10 kg; name styrene; lognormal variance with pedigree 0.1406, pedigree (3,3,4,5,3)
  (same comment as for Methane, fossil)
- Cyanide [air, non-urban air or from high stacks]: 1.59466e-8 kg; name cyanide; lognormal variance with pedigree 0.1786, pedigree (5,3,4,5,3)
  (same comment as for Cumene)
- Radon-222 [air, non-urban air or from high stacks]: 0.000385505 kBq; name radon_222; lognormal variance with pedigree 0.3986, pedigree (5,3,4,5,3)
  (same comment as for Cadmium)
- Particulates, > 2.5 um, and < 10um [air, non-urban air or from high stacks]: 1.96886e-6 kg; name particulates_2_5_to_10; = 0.0000413*(efficiency/3.6); source Itten R. 2012; lognormal variance with pedigree 0.093, pedigree (4,4,5,5,4)
  (same comment as for NOx retained, by selective catalytic reduction)
- Carbon monoxide, fossil [air, non-urban air or from high stacks]: 6.82762e-6 kg; name carbon_monoxide_fossil; lognormal variance with pedigree 0.674, pedigree (3,4,4,5,1)
  (same comment as for Methane, fossil)
- Iodine [air, non-urban air or from high stacks]: 1.23083e-7 kg; name iodine; lognormal variance with pedigree 0.2186, pedigree (5,3,4,5,3)
  (same comment as for Cadmium)
- Chromium VI [air, non-urban air or from high stacks]: 1.08375e-9 kg; name chromium_vi; lognormal variance with pedigree 0.5006, pedigree (3,3,4,5,3)
  Literature value/calculated value. Emissions when producing 1kWh of electricity from hard coal, based on the value for burning 1MJ of hard coal. Weighted average with electricity production data (Itten&Frischknecht 2012) and emission values of 14 countries
  (AT, BE, ES, FR, IT, NL, PT, DE, CZ, HR, PL, SK, CN, US) (Röder et al. 2007)
  Country emissions values based on range of data.
  Source:
  Itten R. and Frischknecht R. (2012) Life Cycle Inventories of Electricity Mixes and Grid. ESU-services Ltd., Uster, Switzerland.
- NMVOC, non-methane volatile organic compounds, unspecified origin [air, non-urban air or from high stacks]: 7.19919e-7 kg; name nmvoc; lognormal variance with pedigree 0.1406, pedigree (3,3,4,5,3)
  (same comment as for Methane, fossil)
- Barium [air, non-urban air or from high stacks]: 5.02395e-8 kg; name barium; lognormal variance with pedigree 0.7486, pedigree (5,3,4,5,3)
  (same comment as for Cadmium)
- Dinitrogen monoxide [air, non-urban air or from high stacks]: 1.02182e-6 kg; name dinitrogen_monoxide; lognormal variance with pedigree 0.074, pedigree (3,4,4,5,1)
  (same comment as for Methane, fossil)
- Hydrogen fluoride [air, non-urban air or from high stacks]: 2.19072e-6 kg; name hydrogen_fluoride; lognormal variance with pedigree 0.2186, pedigree (5,3,4,5,3)
  (same comment as for Cadmium)
- Sulfate [air, non-urban air or from high stacks]: 3.04998e-10 kg; name sulfate; lognormal variance with pedigree 0.1786, pedigree (5,3,4,5,3)
  (same comment as for Methane, fossil)
- Chloroform [air, non-urban air or from high stacks]: 6.25478e-10 kg; name chloroform; lognormal variance with pedigree 0.1406, pedigree (3,3,4,5,3)
  (same comment as for Cumene)
- Actinides, radioactive, unspecified [air, non-urban air or from high stacks]: 1.32372e-5 kBq; name actinides_radioactive_unspecified; lognormal variance with pedigree 0.3206, pedigree (3,3,4,5,3)
  (same comment as for Methane, fossil)
- Particulates, < 2.5 um [air, non-urban air or from high stacks]: 1.58271e-5 kg; name particulates_lt2_5; = 0.000332*(efficiency/3.6); source Itten R. 2012; lognormal variance with pedigree 0.093, pedigree (4,4,5,5,4)
  (same comment as for NOx retained, by selective catalytic reduction)
- Benzene [air, non-urban air or from high stacks]: 1.07601e-7 kg; name benzene; lognormal variance with pedigree 0.088, pedigree (3,5,4,5,3)
  (same comment as for Methane, fossil)
- Acrolein [air, non-urban air or from high stacks]: 1.85012e-9 kg; name acrolein; lognormal variance with pedigree 0.3586, pedigree (5,3,4,5,3)
  (same comment as for Methane, fossil)
- Copper [air, non-urban air or from high stacks]: 6.35542e-9 kg; name copper; lognormal variance with pedigree 0.7486, pedigree (5,3,4,5,3)
  (same comment as for Cadmium)
- Strontium [air, non-urban air or from high stacks]: 4.58271e-8 kg; name strontium; lognormal variance with pedigree 0.7486, pedigree (5,3,4,5,3)
  (same comment as for Cadmium)
- Aldehydes, unspecified [air, non-urban air or from high stacks]: 6.06126e-9 kg; name aldehydes_unspecified; lognormal variance with pedigree 0.1406, pedigree (3,3,4,5,3)
  (same comment as for Methane, fossil)
- Carbon disulfide [air, non-urban air or from high stacks]: 8.28294e-10 kg; name carbon_disulfide; lognormal variance with pedigree 0.3206, pedigree (3,3,4,5,3)
  (same comment as for Cumene)
- Ethane, 1,1,1-trichloro-, HCFC-140 [air, non-urban air or from high stacks]: 1.27728e-10 kg; name ethane_trichloro; lognormal variance with pedigree 0.1406, pedigree (3,3,4,5,3)
  (same comment as for Methane, fossil)
- Bromine [air, non-urban air or from high stacks]: 2.42295e-7 kg; name bromine; lognormal variance with pedigree 0.1806, pedigree (3,3,4,5,3)
  (same comment as for Cadmium)

## Sampling procedure
Literature and statistics. Bottom-up approach.

## Extrapolations
Electricity production volume and efficiency parameters were regionalized with a bottom-up approach, including all the heat and power co-generation power plants that provide electricity to the Colombian interconnected grid.

Exchanges were extrapolated through production-weighted averages of the datasets of the following 14 countries: AT, BE, ES, FR, IT, NL, PT, DE, CZ, HR, PL, SK, CN, US. Uncertainty was adjusted accordingly.

## Review by Christopher Oberschelp 2017-11-23
Detailed and transparently documented dataset. Main emissions seem plausible, individual deviations will be spotted by comparison with similar datasets for other regions later on.
