# epoxy resin production, liquid

Dataset: EcoSpold 2, unit process
Geography: RER
Time period: 2015-01-01 to 2020-12-31
Technology level: current
Classification: ISIC rev.4 ecoinvent: 2011:Manufacture of basic chemicals
Scenario: Business-as-Usual
System model: Allocation at the point of substitution
Generated by: [System]
Database: ecoinvent
isCopyrightProtected: true
accessRestrictedTo: 1

## General comment
Epoxy resins are pre-polymers or polymers. Epoxy resins are used in multiple industries. In particular they are used in the production of coatings. Other applications are in the production of adhesives, of electronics and for material reinforcement (Pham and Marks 2005).
The global demand in the year 2000 of epoxy resins was of 1.15 million metric tonnes. The US production of this product in 1994 was of approximately 433 thousand metric tonnes, while the Asia-Pacific area is responsible for 809 thousand metric tonnes (year 2001) (Pham and Marks 2005).
Reference(s):
Gendorf (2016) Umwelterklärung 2015, Werk Gendorf Industriepark, www.gendorf.de
Pham, H.Q. and Marks, M.J. 2005. Epoxy Resins. In Ullmann's Encyclopedia of Industrial Chemistry, Electronic Release, Vol.13, pp.155-244. Wiley-VCH, Weinheim.
Guichon Valves, n.d. Epoxy resins – Manufacturing process of Epoxy resins. Retrieved from: http://guichon-valves.com/faqs/epoxy-resins-manufacturing-process-of-epoxy-resins/, accessed 13th February 2017
For more information on the model please refer to the dedicate ecoinvent report, access it in the Report section of ecoQuery (http://www.ecoinvent.org/login-databases.html)

## Included activities start
The activity starts when the raw materials enter the process.

## Included activities end
Materials entering the process are included as well as energy uses, infrastructure and emissions.

## Geography
The inputs to the process are calculated based on stoichiometry and literature data, they are therefore considered to be valid for the chosen geography. The inputs of heat, electricity, water, factory and nitrogen are mostly taken as average of industry data. Industry data values are a 5-year average of data (2011 - 2015) published by the Gendorf factory (Gendorf, 2016, Umwelterklärung, www.gendorf.de), (Gendorf, 2015, Umwelterklärung, www.gendorf.de), (Gendorf, 2014, Umwelterklärung, www.gendorf.de). The Gendorf factory is based in Germany, it produces a wide range of chemical substances. The factory produced 1657400 tonnes of chemical substances in the year 2015 (Gendorf, 2016, Umwelterklärung, www.gendorf.de) and 740000 tonnes of intermediate products. Given the range of chemicals produced by the german site, the values are used for the GLO geography, with uncertainty adjusted accordingly.

## Technology
Commercial epoxy resin can be produced by reacting bisphenol-A and epichlorohydrin in presence of a base catalyst (here represented by sodium hydroxide) (Guichon Valves n.d. and Pham and Marks 2005). Epoxy resins are in liquid form if n is from 0 to 1. When n is larger than 1 the resin in solid (Licare and Swanson, 2011). As the product here representes epoxy resin in liquid form, n is set to 1.
2C15H16O2 + 3C3H5ClO + 3NaOH -> C39H44O7 + 3Na+ + 3Cl- + 3H2O
Pham, H.Q. and Marks, M.J. 2005. Epoxy Resins. In Ullmann's Encyclopedia of Industrial Chemistry, Electronic Release, Vol.13, pp.155-244. Wiley-VCH, Weinheim.
Guichon Valves, n.d. Epoxy resins – Manufacturing process of Epoxy resins. Retrieved from: http://guichon-valves.com/faqs/epoxy-resins-manufacturing-process-of-epoxy-resins/, accessed 13th February 2017
For more information on the model please refer to the dedicate ecoinvent report, access it in the Report section of ecoQuery (http://www.ecoinvent.org/login-databases.html)
The process is carried out in a reactor where a solution of sodium hydroxide is added (20 to 40% concentration). The product is brought to boiling temperature and a solvent is added. Solvents are not included in the inventory as it is assumed that solvents are closed-loop recycled. The unreacted epichlorohydrin is collected and recycled back into the system. The epoxy resin in then washed; this gives the final product in liquid form. Epoxy resin can also be produced in solid form. To do so, curing with, for example secondary amines, is necessary. Epoxy resins can have different characteristics, these depend on additional products that can be added to the liquid resin. The required characteristics depend on the final use of the product (Guichon Valves n.d.)
This inventory representing production of a particular chemical compound is at least partially based on a generic model on the production of chemicals. The data generated by this model have been improved by compound-specific data when available.
The model on production of chemicals is using specific industry or literature data wherever possible and more generic data on chemical production processes to fill compound-specific data gaps when necessary. The basic principles of the model have been published in literature (Hischier 2005, Establishing Life Cycle Inventories of Chemicals Based on Differing Data Availability). The model has been updated and extended with newly available data from the chemical industry.
In the model, unreacted fractions are treated in a waste treatment process, and emissions reported are after a waste treatment process that is included in the scope of this dataset. For volatile reactants, a small level of evaporation is assumed. Solvents and catalysts are mostly recycled in closed-loop systems within the scope of the dataset and reported flows are for losses from this system.
The main source of information for the values for heat, electricity, water (process and cooling), nitrogen, chemical factory is industry data from Gendorf. The values are a 5-year average of data (2011 - 2015) published by the Gendorf factory (Gendorf, 2016, Umwelterklärung, www.gendorf.de), (Gendorf, 2015, Umwelterklärung, www.gendorf.de), (Gendorf, 2014, Umwelterklärung, www.gendorf.de). The Gendorf factory is based in Germany, it produces a wide range of chemical substances. The factory produced 1657400 tonnes of chemical substances in the year 2015 (Gendorf, 2016, Umwelterklärung, www.gendorf.de) and 740000 tonnes of intermediate products.
Reference(s):
Hischier, R. (2005) Establishing Life Cycle Inventories of Chemicals Based on Differing Data Availability (9 pp). The International Journal of Life Cycle Assessment, Volume 10, Issue 1, pp 59–67. 10.1065/lca2004.10.181.7
Gendorf (2016) Umwelterklärung 2015, Werk Gendorf Industriepark, www.gendorf.de
Licari, J.J. and Swanson, D.W. 2011. Chemistry, Formulation, and Properties of Adhesives. In Adhesives Technology for Electronic Applications (Second Edition), 2011

## Reference product
- epoxy resin, liquid: 1 kg; CPC 34740: Polyacetals, other polyethers and epoxide resins, in primary forms; polycarbonates, alkyd resins, polyallyl es[…]; By-product classification allocatable product; CAS 25928-94-3
  production volume 2.001e8 kg
    Literature value. European consumption for that year was reported by Pham and Marks (2005) to be over 370 thousand metric tonnes.
    Reference(s):
    Pham, H.Q. and Marks, M.J. 2005. Epoxy Resins. In Ullmann's Encyclopedia of Industrial Chemistry, Electronic Release, Vol.13, pp.155-244. Wiley-VCH, Weinheim.
  property price 2.366 EUR2005
    Estimated value. This price is averaged from 3 different suppliers available in the commercial webstore of alibaba. The price refers to a bulk quantity purchase. All websites were retrieved on the 19th Sept 2017. THe exchange rate used is from 2010 when 1 USD - 0.755 EUR.
    Price range:
    supplier 1: 1-8 $ per kg, https://www.alibaba.com/product-detail/Factory-supply-high-quality-61788-97_60412854553.html?spm=a2700.7724838.2017115.49.3c93b095G3m8CH
    supplier 2: 2.3-2.5 $ per kg, https://www.alibaba.com/product-detail/High-quality-liquid-epoxy-resin-YN_60679038751.html?spm=a2700.7724838.2017115.60.3c93b095G3m8CH
    supplier 3: 2.5 $ per kg, https://www.alibaba.com/product-detail/Two-components-epoxy-adhesive-ab-glue_60158153437.html?spm=a2700.7724838.2017115.71.3c93b095G3m8CH
  property carbon content 0.42325
    carbon content on a dry matter basis (reserved; not for manual entry)
  property true value 2.366
    allocation property applied in "true value" allocation // value calculated from revenue
  properties: water content 0, carbon content, non-fossil 0, wet mass 1 kg, carbon content, fossil 0.42325, dry mass 1 kg, water in wet mass 0 kg, carbon allocation 0.42325 kg

## By-products
- heat, for reuse in municipal waste incineration only: 0 MJ; CPC 17300: Steam and hot water; By-product classification allocatable product; pedigree (1,1,1,1,1)
  Net electricity generated from this waste and used in internal MSWI plant energy redistribution.
  Uncertainty: uncertainty is calculated from uncertainties in waste composition and uncertainties in energy efficiency and the uncertainty in internal energy demand
  production volume 23.8848 MJ
  property exergy 0.1842 MJ; name E_th_prod_MSWI_exergy
    This exergy property is based on the exergy content of the product.
  property price 0.0106 EUR2005; name E_th_prod_MSWI_price_EUR2005
    Average European district heat price from Ecoheatcool and Euroheat 2005-2006, Ecoheat Work package 1: The European heat market. Final report. 10.6 EUR/GJ i s the price of district heat. http://www.solarthermalworld.org/files/Ecoheatcool%20WP1%20Web.pdf?download
  property true value relation 0.1842; name E_th_prod_MSWI_true_value_relation
    property to calculate "true value" from
  property true value 1.16811e-9
    allocation property applied in "true value" allocation // value calculated from true value relation
- electricity, for reuse in municipal waste incineration only: 0 kWh; CPC 17100: Electrical energy; By-product classification allocatable product; pedigree (1,1,1,1,1)
  (same comment as for heat, for reuse in municipal waste incineration only)
  production volume 3.35838 kWh
  property true value relation 3.6; name E_el_prod_MSWI_true_value_relation
    property to calculate "true value" from
  property price 0.1 EUR2005; name E_el_prod_MSWI_price_EUR2005
    Estimated to be the same price as in case of electricity, medium voltage.
  property exergy 3.6 MJ; name E_el_prod_MSWI_exergy
    This exergy property is based on the exergy content of the product.
  property true value 3.17451e-9
    (same comment as for heat, for reuse in municipal waste incineration only)
- zinc concentrate: 0 kg; CPC 14290: Other non-ferrous metal ores and concentrates (other than uranium or thorium ores and concentrates); By-product classification allocatable product
  Calculated value from the knowledge of the properties of both products.
  production volume 0.000454348 kg
  property price 0.38 EUR2005; name ByP_price_EUR2005
    Temporary price data. Calculated as 90% of purchasers price based on: Zinc content in concentrate 53%. Concentrate price per kg Zn 86.5% of refined Zn price (13.5% treatment charges according to CHR Metals Limited 2005: Dynamic cost curves. http://www.minecost.com/dynamic.pdf). 2004 zinc price from USGS (2007) Mineral commodity summaries 2007. <http://minerals.usgs.gov/minerals/pubs/mcs/2007/mcs2007.pdf> [Accessed 25 May 2010]
  property zinc content 0.53; name zinc_C_zinc_concentrate
    Zinc content on a dry matter basis. Value taken from teh "zinc mine operation" /GLO dataset.
  property dry mass 1 kg; name DM_zinc_concentrate
  property carbon content 0
    carbon content on a dry matter basis (reserved; not for manual entry)
  property true value 4.30488e-13
    allocation property applied in "true value" allocation // value calculated from revenue
  properties: wet mass 1 kg, water content 0, carbon content, non-fossil 0, carbon content, fossil 0, water in wet mass 0 kg, carbon allocation 0 kg

## Inputs from technosphere
- electricity, medium voltage: 0.416 kWh
- heat, from steam, in chemical industry: 0.2 MJ
- bisphenol A, powder: 0.670617 kg
  properties: dry mass 1 kg, wet mass 1 kg, carbon content, fossil 0.789474
- tap water: 0.026 kg
  properties: water content 2962.17, dry mass 0.000337476 kg, wet mass 1 kg, carbon content, fossil 0.00178991
  note on carbon content, fossil: Bicarbonate content is 2.93 mol/m3. CO2 content is 0.1 mol/m3 (ecoinvent v2.2 report 8, Tab 93.1).
- sodium hydroxide, without water, in 50% solution state: 0.234987 kg
  properties: wet mass 1 kg, dry mass 1 kg
- epichlorohydrin: 0.543593 kg
  properties: dry mass 1 kg, wet mass 1 kg, carbon content, fossil 0.391304
- wastewater, average: 0 m3
  production volume 0 m3
    Calculated from the production volume of the reference product in proportion to the respective output amounts.
  properties: wet mass 1000 kg, water content 2882.2, carbon content, non-fossil 0.194039, dry mass 0.346837 kg
  note on carbon content, non-fossil: 0.0673 kg TOC/m3 (Tab A.17, ecoinvent v2.2 report 13_I). TOC was considered as Total Carbon.
- nitrogen, liquid: 0.019 kg
  properties: wet mass 1 kg, dry mass 1 kg
- heat, district or industrial, natural gas: 2.15 MJ
- chemical factory, organics: 4e-10 unit
  Calculated based on literature data published by the industry. For this activity, no information was readily available concerning infrastructure and land-use. Therefore, the infrastructure is estimated based on data from two chemical factories, the BASF site of Ludwigshafen and the chemical factory in Gendorf (which are both located in Germany), which produce a wide range of chemical substances. Based on this data, the following assumptions are made: the built area amounts to about 4.2 ha, the plant has an average output of 50'000 t/a and a lifespan of fifty years. The estimated infrastructure amount is therefore 4.00 E-10 units per kg of produced chemical.
  References:
  Althaus H.-J., Chudacoff M., Hischier R., Jungbluth N., Osses M. and Primas A. (2007) Life Cycle Inventories of Chemicals. ecoinvent report No. 8, v2.0. EMPA Dübendorf, Swiss Centre for Life Cycle Inventories, Dübendorf, CH.
  Gendorf (2000) Umwelterklärung 2000, Werk Gendorf. Werk Gendorf, Burgkirchen.;activityLink introduced to establish a direct link to the corresponding regional supply of this product
- wastewater, average: -2.43642e-6, -2.63575e-7 m3 (2 entries)
  production volume 105.71 m3

## Inputs from nature
- Water, river [natural resource, in water]: 0.00086 m3
- Water, cooling, unspecified natural origin [natural resource, in water]: 0.0164 m3
- Water, well, in ground [natural resource, in water]: 0.00083 m3

## Emissions to nature
- Nitrogen [air, unspecified]: 0.019 kg
- Chloride [water, unspecified]: 0.197874 kg
- Water [air, unspecified]: 0.0014 m3
- Water [water, unspecified]: 0.0167 m3
- Sodium, ion [water, unspecified]: 0.135067 kg
- Chloride, ion [water, unspecified]: 0.0104144 kg
