# tap water production, direct filtration treatment

Dataset: EcoSpold 2, unit process
Geography: BR
Time period: 2015-01-01 to 2019-12-31
Technology level: current
Classification: EcoSpold01Categories: water supply/production
Classification: ISIC rev.4 ecoinvent: 3600:Water collection, treatment and supply
Synonyms: potable water
Scenario: Business-as-Usual
System model: Allocation at the point of substitution
Generated by: Laura Rubio
Published in: Gmünder S. 2017
Database: ecoinvent
isCopyrightProtected: true
accessRestrictedTo: 1

## General comment
This dataset is created as a child of the global dataset with edited production volume for this geography.

This dataset represents production of 1 kg of tap water under pressure at facility gate, ready for distribution in network. It represents average operation of direct filtration treatment for production of tap water. Direct filtration treatment includes sand filtration and disinfection. Inventory was constructed from reported chemicals, energy inputs and wastes from 2 distinct direct filtration plants located in Québec covering nearly 100% of total production of tap water from this technology.

## Included activities start
From the intake pumping of raw surface water into the water treatment plant.

## Included activities end
This dataset ends with the production of tap water, at facility gate, under pressure. It includes energy for intake pumping, treatment system, lighting and heating of the building as well as the energy of the pump pressurizing water to the beginning of the network. It includes all chemicals and material added to the water during treatment and, when needed, ultraviolent lamps for replacement. It excludes energy for pumping stations and water losses within the network which is included in the tap water market. Emissions to the environment occurring during the treatment and during the distribution were not considered as they are assumed negligible. Main substance in water that would be released in the environment are assumed to be considered in wastewater processes.

## Geography
Extrapolated from data from two plants in Quebec (Canada).The uncertainty was adjusted accordingly.

## Time period
The time period is set from 2015 to the year 2017 as it is a considering period in which treatment data has not passed through drastic changes.

## Parameters
- unit conversion, days in a year: 365.25 d/year; name days_per_year; lognormal variance with pedigree 0.0006, pedigree (1,1,1,1,1)
  Conversion factor.

## Reference product
- tap water: 1 kg; name tapwater; CPC 18000: Natural water; By-product classification allocatable product; CAS 7732-18-5
  production volume 9.97043e11 kg; name PV_tapwater; = 11078255352000*0.09
    Calculated value based on specific reports from Grupo Aguas do Brasil (Brasil, 2015)- < http://www.grupoaguasdobrasil.com.br/>. Out of 65 assessed treatment plants (total number of conventional treatment plants for which data was compiled), 59 incorporated conventional treatment. Overall,The production technology shares, present in the ecoinvent database, are calculated to be as follows; tap water production, conventional treatment (90.8 %) followed by tap water production, direct filtration treatment (9.0%) and undergound water with disinfection (0.2%).
  property price 0.000397 EUR2005
    Converted from EU price by using Purchasing Power Parities (0.8458 in 2003 and 0.8426 in 2004)
  property carbon content 0.0017899
    carbon content on a dry matter basis (reserved; not for manual entry)
  property true value 0.000397; name tapwater_true_value
    allocation property applied in "true value" allocation // value calculated from revenue
  properties: water in wet mass 0.99966 kg, wet mass 1 kg, carbon content, non-fossil 0, carbon content, fossil 0.0017899, dry mass 0.00034 kg, water content 2940.18, carbon allocation 6.08566e-7 kg

## By-products
- heat, for reuse in municipal waste incineration only: 0 MJ; CPC 17300: Steam and hot water; By-product classification allocatable product; pedigree (1,1,1,1,1)
  Net electricity generated from this waste and used in internal MSWI plant energy redistribution.
  Uncertainty: uncertainty is calculated from uncertainties in waste composition and uncertainties in energy efficiency and the uncertainty in internal energy demand
  production volume 821955 MJ
  property exergy 0.1842 MJ; name E_th_prod_MSWI_exergy
    This exergy property is based on the exergy content of the product.
  property price 0.0106 EUR2005; name E_th_prod_MSWI_price_EUR2005
    Average European district heat price from Ecoheatcool and Euroheat 2005-2006, Ecoheat Work package 1: The European heat market. Final report. 10.6 EUR/GJ i s the price of district heat. http://www.solarthermalworld.org/files/Ecoheatcool%20WP1%20Web.pdf?download
  property true value relation 0.1842; name E_th_prod_MSWI_true_value_relation
    property to calculate "true value" from
  property true value 5.43513e-9
    allocation property applied in "true value" allocation // value calculated from true value relation
- electricity, for reuse in municipal waste incineration only: 0 kWh; CPC 17100: Electrical energy; By-product classification allocatable product; pedigree (1,1,1,1,1)
  (same comment as for heat, for reuse in municipal waste incineration only)
  production volume 114160 kWh
  property price 0.1 EUR2005; name E_el_prod_MSWI_price_EUR2005
    Estimated to be the same price as in case of electricity, medium voltage.
  property exergy 3.6 MJ; name E_el_prod_MSWI_exergy
    This exergy property is based on the exergy content of the product.
  property true value relation 3.6; name E_el_prod_MSWI_true_value_relation
    property to calculate "true value" from
  property true value 1.47533e-8
    (same comment as for heat, for reuse in municipal waste incineration only)

## Inputs from technosphere
- wastewater, unpolluted: -1.28454e-5 m3; name ww; lognormal variance with pedigree 0.0035, pedigree (2,2,2,5,1)
  Measured value taken from the "tap water production, direct filtration treatment, GLO" dataset (accessed 20170920) as it was considered adequate also for this dataset. Average amount of wastewater produced during treatment.
  EcoSpold01Location=CH
  production volume 1.28081e7 m3; = PV_tapwater*(ww/tapwater)
    Calculated from the production volume of tap water, at user in proportion to the respective output amounts.
  property price 0 EUR2005; name ww_price_EUR2005
  properties: water content 2962.17, dry mass 0.337476 kg, carbon content, non-fossil 0.00178991, wet mass 1000 kg, carbon content, fossil 0.00178991
  note on carbon content, fossil: Assumed to be like in tap water. Bicarbonate content is 2.93 mol/m3. CO2 content is 0.1 mol/m3 (ecoinvent v2.2 report 8, Tab 93.1).
- water pump operation, diesel: 6.64037e-6 MJ; = diesel_use*density_diesel*NHV; lognormal variance with pedigree 0.0022, pedigree (1,1,2,5,1)
  Calculated value, taken from the "tap water production, direct filtration treatment, GLO" dataset (accessed 20170920) as it was considered adequate also for this dataset
  Uncertainty: Calculated variable. Uncertainty will be determined from propagation of uncertainty factors of underlying variables.
  property density 0.84 kg/l; name density_diesel
  property fuel input in physical units, L 1.83e-7 l; name diesel_use
  property heating value, net 43.2 MJ; name NHV
  properties: price 0.07 EUR2005
  note on fuel input in physical units, L: Measured value. Diesel volume consumed in a year. Exclusively used for routine runs of emergy generators. Diesel use was available for one plant only, but extrapolated for both.
  note on heating value, net: Literature. net (lower) heating (calorific) value for diesel in MJ/kg
- water works, capacity 1.1E10l/year: 1.52095e-12 unit; = 1/(Q_av* days_per_year*lifetime*UnitConversion(1, 'm3', 'l')); lognormal variance with pedigree 0.0022, pedigree (1,1,2,5,1)
  Calculated value taken from the "tap water production, direct filtration treatment, GLO" dataset (accessed 20170920) as it was considered adequate also for this dataset. Amount of water works construction attributed to the production of 1kg of tap water. Value is based on assumed lifetime production of water treatment plant and an assumed typical medium-sized plant of 30,000 m3/day.
  Uncertainty: Calculated variable. Uncertainty will be determined from propagation of uncertainty factors of underlying variables.
  property plant average daily flow rate 30000 m3/d; name Q_av
  property lifetime 60 year; name lifetime
  note on plant average daily flow rate: Fixed values, Flow rate of a conventional water purification plant for a medium-size facility as defined in the water works process.
  note on lifetime: Estimated Value. Expected lifetime of water works as defined in the construction process.
- chlorine, liquid: 3.20876e-6 kg; lognormal variance with pedigree 0.0035, pedigree (2,2,2,5,1)
  Measured value taken from the "tap water production, direct filtration treatment, GLO" dataset (accessed 20170920) as it was considered adequate also for this dataset. Average use of chlorine(dry basis), delivered in liquid state, for disinfection in surveyed direct filtration treatment plants. Note the 2 plants reported using this substance.
  properties: dry mass 1 kg, wet mass 1 kg
- electricity, medium voltage: 0.000285985 kWh; lognormal variance with pedigree 0.0035, pedigree (2,2,2,5,1)
  Measured value taken from the "tap water production, direct filtration treatment, GLO" dataset (accessed 20170920) as it was considered adequate also for this dataset Average electricity consumption for entire process including pumping for water intake and pumping for distribution at the plant gate. All plants (2) reported electricity use.
  EcoSpold01Location=UCTE
- heat, district or industrial, natural gas: 1.16038e-6 MJ; = fuel_input*heating_value*fuel_use; lognormal variance with pedigree 0.0022, pedigree (1,1,2,5,1)
  Calculated value taken from the "tap water production, direct filtration treatment, GLO" dataset (accessed 20170920) as it was considered adequate also for this dataset.
  Uncertainty: Calculated variable. Uncertainty will be determined from propagation of uncertainty factors of underlying variables.
  property fuel input in physical units, m3 2.88e-8 m3; name fuel_input
  property Corresponding fuel use 1.11 MJ; name fuel_use
  property lower heating value 36.3 MJ/Nm3; name heating_value
  note on fuel input in physical units, m3: Measured value. Average natural gas consumption in surveyed plants for this technology type. Note than only 1 of the 2 plants reported using natural gas. Plants not reporting natural gas were attributed an input value of 0 during the calculation of the weighted average.
  note on Corresponding fuel use: Lower heating value of the fuel input related to the heat/electricity output

## Inputs from nature
- Water, river [natural resource, in water]: 0.00101279 m3; name waterIn_R; lognormal variance with pedigree 0.0035, pedigree (2,2,2,5,1)
  Calculated value taken from the "tap water production, direct filtration treatment, GLO" dataset (accessed 20170920) as it was considered adequate also for this dataset. Surface water withdrawal represents average withdrawal from surveyed plants. Share of subcompartiment type (river 91%, lake 9%) is estimated based on share number of people in Quebec desserved by water source types.

## Sampling procedure
Based on data collected from two direct filtration treatment plants in Quebec (Canada). See corresponding Quebec dataset for more information. Note that percent representativeness is not supplied because technology-specific global production volumes is too uncertain. Should this information become available, the representativeness can be calculated by dividing the sum of the water treated by the Quebec plants that served as a basis for the Global dataset by the technology-specific global production volume. (5.73E11 kg/a)

## Extrapolations
From two direct filtration tap water production facilities in Quebec (Canada) to Brazilian average of same technology. Brazilian production volumen data was used for regionalizing the dataset, the remaining exchanges were copied from the global dataset. Direct filtration treatment accounts for 9% of the total produced tap water in Brazil.The uncertainty has been changed accordingly.

## Review by Philippe Loubet 2017-11-23
The overall quality of this dataset is acceptable.
In the future it would be desirable to implement specific data from Brazil.
