# treatment of tailing, from uranium milling

Dataset: EcoSpold 2, unit process
Geography: GLO
Time period: 1986-01-01 to 2019-12-31
Technology level: current
Classification: ISIC rev.4 ecoinvent: 3822:Treatment and disposal of hazardous waste
Classification: EcoSpold01Categories: nuclear power/waste treatment
Tags: ConvertedDataset; Treatment
Scenario: Business-as-Usual
System model: Allocation at the point of substitution
Generated by: Roberto Dones
Published in: Dones, R. 2007
Database: ecoinvent
isCopyrightProtected: true
accessRestrictedTo: 1

## General comment
The model for radioactive emissions may not reflect specific conditions nor its results be suitable for comparison with environmental impact appraisals of single uranium mills. Hence, great prudence should be taken when analysing results for the uranium milling step as well as the complete nuclear energy chain.
[This dataset was already contained in the ecoinvent database version 2. It was not individually updated during the transfer to ecoinvent version 3. Life Cycle Impact Assessment results may still have changed, as they are affected by changes in the supply chain, i.e. in other datasets. This dataset was generated following the ecoinvent quality guidelines for version 2. It may have been subject to central changes described in the ecoinvent version 3 change report (http://www.ecoinvent.org/database/ecoinvent-version-3/reports-of-changes/), and the results of the central updates were reviewed extensively. The changes added e.g. consistent water flows and other information throughout the database. The documentation of this dataset can be found in the ecoinvent reports of version 2, which are still available via the ecoinvent website. The change report linked above covers all central changes that were made during the conversion process.]

## Included activities end
The module includes the land use of tailings, the long term emission of Rn-222 and radioactive isotopes to surface water (assumption). Non radioactive emissions are separately included with the dataset "disposal, uranium tailings, non-radiolactive emissions".

## Geography
Data on US, Australian, Canadian, Namibian, Nigeran mills.

## Technology
Average conditions.

## Reference product
- tailing, from uranium milling: -1 m3; By-product classification Waste; CPC 33690: Other radioactive elements and isotopes and compounds; alloys, dispersions, ceramic products and mixtures cont[…]
  EcoSpold01Location=GLO
  production volume 1 m3
    Dummy value to be replaced by value to be calculated from the demand for this treatment activity
  property price 0 EUR2005
    Waste products are assigned a price of zero as they are assumed to require further treatment.
  property carbon content 0
    carbon content on a dry matter basis (reserved; not for manual entry)
  properties: water content 0.333333, carbon content, fossil 0, water in wet mass 450 kg, carbon content, non-fossil 0, wet mass 1800 kg, dry mass 1350 kg, carbon allocation 0 kg

## Inputs from technosphere
- uranium tailing, non-radioactive emission: -1 m3; lognormal variance with pedigree 0.04, pedigree (1,1,5,1,1)
  EcoSpold01Location=GLO
  own estimation
  production volume 1 m3
    Calculated from the production volume of tailing, from uranium milling in proportion to the respective output amounts.
  properties: water content 0.333333, dry mass 1350 kg, carbon content, non-fossil 0.00133333, wet mass 1800 kg

## Inputs from nature
- Transformation, from unspecified [natural resource, land]: 0.072 m2; lognormal variance with pedigree 0.69, pedigree (1,1,5,1,1)
  own estimation, based on range of data
- Transformation, to dump site [natural resource, land]: 0.072 m2; lognormal variance with pedigree 0.69, pedigree (1,1,5,1,1)
  own estimation, based on range of data
- Occupation, dump site [natural resource, land]: 7.2 m2*year; lognormal variance with pedigree 0.84, pedigree (1,1,5,1,1)
  own estimation

## Emissions to nature
- Radium-226 [water, surface water]: 4 kBq; lognormal variance with pedigree 1.37, pedigree (1,1,5,1,1)
  arbitrary assumption
- Uranium-234 [water, surface water]: 1.2 kBq; lognormal variance with pedigree 1.37, pedigree (1,1,5,1,1)
  arbitrary assumption
- Thorium-230 [water, surface water]: 600 kBq; lognormal variance with pedigree 1.37, pedigree (1,1,5,1,1)
  arbitrary assumption
- Uranium-238 [water, surface water]: 19.4 kBq; lognormal variance with pedigree 1.37, pedigree (1,1,5,1,1)
  arbitrary assumption
- Radon-222 [air, low population density, long-term]: 1.4e8 kBq; lognormal variance with pedigree 1.09, pedigree (1,1,5,1,1)
  own estimation, based on uncertainty contribution from key factors
- Uranium-235 [water, surface water]: 19.4 kBq; lognormal variance with pedigree 1.37, pedigree (1,1,5,1,1)
  arbitrary assumption

## Sampling procedure
Literature

## Extrapolations
This dataset has been extrapolated from year 1998 to the year of the calculation (2019). The uncertainty has been adjusted accordingly.

## Review by Christian Bauer 2009-02-06
passed
for final calculation August 2003
