# wood preservation, dipping/immersion, water-based preservative, outdoor use, no ground contact

Dataset: EcoSpold 2, unit process
Geography: RER
Time period: 2012-01-01 to 2019-12-31
Technology level: current
Classification: EcoSpold01Categories: wooden materials/refinement
Classification: ISIC rev.4 ecoinvent: 1610:Sawmilling and planing of wood
Synonyms: open tank impregnation
Scenario: Business-as-Usual
System model: Allocation at the point of substitution
Generated by: trainee ecoinvent
Database: ecoinvent
isCopyrightProtected: true
accessRestrictedTo: 1

## General comment
This dataset covers the treatment of wood in open tank impregnation. The dipping/immersion process is considered to be a surface treatment and not a deep penetraton treatment. Wood preservatives do not penetrate the wood more than three milimeters. We can distinguish two main typse of industrial branches apllying dipping/immersion for wood preservation purposes: a) sawmilling where freshly cut wood is treated with fungicides to prevent the discoloration caused by blue stain forming fungi; this treatment aims for a short-term preservation of wood until it is further processed, and b) joinery industry and carpentry shops: "joinery applications" are industrial processes to creating wood articles that have been made to shape, for example fence panels, composites, window, doors and door frames, floors, architrave, decorative features, etc; carpentry shops fabricate wooden construction materials and treat them for long term protection against insects and fungi. Despite some small differences in the operation and infrastructure, dipping/immersion applied by the two industrial sectors can be described by a generic "dipping/immersion" emission scenario (OECD 2000).
Both automatic and manual dipping/immersion are batch processes. It involves submerging a pack or a single piece of wood into the dipping tank filled with a solution containing the preservative. Packs of wood are loaded on automatic equipment (e.g. hydraulic elevator) and lowered into a dipping tank. Wood remains there for a period usually between a few minutes and an hour (it is less than 30 seconds fro sawmill anti-sapstain treatments but can last for several days for other applications, e.g. for cold soaking or steeping) during which the wood absorbs the preservative through capillary forces and diffusion. Dipping baths can be heated in cold climate conditions. The treated wood is held over the dipping vat, usually for 30 minutes to an hour, in order the excess of the preservative solution to drain. Drips are usually collected and recycled into the process. Then the treated wood is removed to storage. Dipping facilities may be open or encapsulated, equipped with vapour trapping and air emission control.
Application: 100 g/m2;
Characterisation of preservative: active agent: 1.25% iodopropinyl butylcarbamat, 1.25% Permethrin, 1.25% Tebocunazol; concentration for application: 100% v/v
Wood is not included in the dataset.
The process does not cause any waste water; preservatives from dripping or leaching during storage are recovered and recycled. Emissions into air and into surface water from run-off water are calculated based on emission factors (EF) as determined in OECD (2000, part 1), depending on the physical properties of the main componentes of the wood preservative. It is assumed in addition that all solvents (incl. water) are evaporated during drying and fixation. For acids and salts, no emissions into air are inventoried. The determination of emission factors is documented in the following table:
Sources:
OECD (2000): Emission scenario document for wood preservatives, part 1. OECD series on emission scenario documents, number 2, Organisation for Economic Co-operation and Development, Paris.
Personal written communications of several producers and/or researchers (see source fields for each exchange)

## Included activities start
Service starting with the reception of the concentrated wood preservative at the factory gate

## Included activities end
The data set contains the treatment service of dried wood with a water-based wood preservative (primer) for use class 3 (outdoor use, no ground contact) in the dipping/immersion process. It covers the necessary inputs of the wood preservative, electricity as well as some infrastructure. For the inventorying of emissions into surface water and air, see general comment. The dataset does not include wood. Also eventual waste streams (e.g. saw dust recollected from the dipping/immersion vat) are not included.

## Parameters
- efficiency of air filter: 0.75 dimensionless; name efficiency_air_filter
  According to EPA 1999 (p. 10.8-5) 'the result of one emission test on the incinerator-controlled facility indicated a VOC control efficiency of more than 99 percent'. Other emissions control devices such as knock-out tanks followed by a ventury scrubber are indicated to have a VOC control efficiency of 75% (same source).
- share of collected rainwater: 0.5 dimensionless; name share_collected_rainwater
  share of the rainwater that is colleced and lead into the sewer contrary to run-off water; default value according to OECD (2000, part 1)

## Reference product
- wood preservation, dipping/immersion method, water-based, outdoor use, no ground contact: 1 kg; CPC 54730: Painting services; By-product classification allocatable product
  production volume 9.05816e6 kg; name p_preservation; = 22300 * 1000/3429519*16584000 * 0.9* 0.28/3
    Total production in DE (2000): 22300 t (OECD 2000), extrapolated to RER via GDP, assuming 90% waterborne preservatives, a slit of 1/3 each between use classes 1-3 and a share of 72% spraying/deluging and 28% dipping (split in Germany for 2000, according to OECD 2000)
  property price 0.92 EUR2005
    Calculated based on inputs: The price of the product has been calculated as a sum of the values of the material and energy inputs for this product. This value is therefore a rough estimation. It may underestimate the real price since there are additional expenses when producing any product. These expences can include for example labour costs, treatment of waste materials and profit for the producer. Please consider carefully whether this level of data quality is acceptable for your application.

## Inputs from technosphere
- lubricating oil: 0.000194444 kg; name m_lubricating_oil; = 35/3/6000/50/0.2; source Hubel M. 2012; lognormal variance with pedigree 0.0066, pedigree (1,4,3,5,1)
  35 kg every 3 years at an annual production o 6000 m3, equalling 50 m2/m3 at 200 ml wood preservative/m2
  property dry mass 1 kg; name m_lubricating_oil_DM
  properties: carbon content, fossil 0.75
- wood preservative, water-based, outdoor use, no ground contact: 1 kg; name preservative_concentration; lognormal variance with pedigree 0.002, pedigree (1,1,3,1,1)
- wood preservation facility, dipping/immersion tank: 2.22222e-7 unit; = 1/75/6000/50/0.2; source Hubel M. 2012; lognormal variance with pedigree 0.372, pedigree (3,5,3,1,1)
  1 plant per 75 years of service life at 6000 m3/year, 50 m2/m3 and an input of 0.2 kg of wood preservative
- electricity, medium voltage: 0.000714286 kWh; = 3/60*2/14/50/0.2; source Künniger T. 2000; lognormal variance with pedigree 0.0066, pedigree (1,4,3,5,1)
  2 minutes with 3 kW motor per 14 m3, 50 m2/m3 and 0.2 kg/m2
- tap water: 0 kg; name m_tapwater; = 1- preservative_concentration; source Empa St. Gallen 2012; pedigree (1,1,1,1,1)
  Water for diluting the perservative to reach concentration for application
  property dry mass 0.000337476 kg; name DM
  property wet mass 1 kg; name WM
  properties: water content 2962.17, carbon content, fossil 0.00178991
- waste mineral oil: 0 kg; name w_mineral_oil; source Hubel M. 2012; pedigree (1,1,1,1,1)
  = disposal of hydraulic (lubricating) oil
  production volume 0 kg
    Calculated from production volume of reference product using the relative outputs.
  properties: water content 0.111111, dry mass 0.9 kg, carbon content, fossil 0.864444, wet mass 1 kg
- waste mineral oil: -0.000190047, -4.39749e-6 kg (2 entries); source Hubel M. 2012; lognormal variance with pedigree 0.002, pedigree (1,1,3,1,1)
  = disposal of hydraulic (lubricating) oil
  production volume 1761.31 kg
    Calculated from production volume of reference product using the relative outputs.

## Emissions to nature
- Tebuconazole [air, non-urban air or from high stacks]: 3.125e-6 kg; = (1-efficiency_air_filter)*0.0125* preservative_concentration*0.001; source OECD 2000; lognormal variance with pedigree 0.1701, pedigree (3,5,5,3,1)
  scenario according to (OECD 2000, p. 38ff)
  property carbon content, fossil 0.624307; name C_content_fossil_Tebuconazole
- Water [air, unspecified]: 0.0008 m3; = (m_tapwater+0.80)/1000; lognormal variance with pedigree 0.0045, pedigree (1,1,3,1,1)
  tap water plus water in preservative
- Permethrin [air, non-urban air or from high stacks]: 3.125e-6 kg; = (1-efficiency_air_filter)*0.0125* preservative_concentration*0.001; source OECD 2000; lognormal variance with pedigree 0.1701, pedigree (3,5,5,3,1)
  scenario according to (OECD 2000, p. 38ff)
  property carbon content, fossil 0.644027; name C_content_fossil_Permethrin
- Butylcarbamate, iodopropynyl [air, non-urban air or from high stacks]: 6.25e-5 kg; = (1-efficiency_air_filter)*0.0125* preservative_concentration*0.02; source OECD 2000; lognormal variance with pedigree 0.1701, pedigree (3,5,5,3,1)
  scenario according to (OECD 2000, p. 38ff)
  property carbon content, fossil 0.341527; name C_content_fossil_IPBC
- Permethrin [water, unspecified]: 0.0001875 kg; = (1-share_collected_rainwater)*0.0125* preservative_concentration*0.03; source OECD 2000; lognormal variance with pedigree 0.3501, pedigree (3,5,5,3,1)
  scenario according to (OECD 2000, p. 38ff)
- 2-Methyl-1-propanol [water, surface water]: 0.0006135 kg; = (1-share_collected_rainwater)*0.0409* preservative_concentration*0.03; source OECD 2000; lognormal variance with pedigree 0.3501, pedigree (3,5,5,3,1)
  scenario according to (OECD 2000, p. 38ff); proxy for structurally comparable alcohols
- Butylcarbamate, iodopropynyl [water, surface water]: 0.0001875 kg; = (1-share_collected_rainwater)*0.0125* preservative_concentration*0.03; source OECD 2000; lognormal variance with pedigree 0.3501, pedigree (3,5,5,3,1)
  scenario according to (OECD 2000, p. 38ff)
- Tebuconazole [water, surface water]: 0.0001875 kg; = (1-share_collected_rainwater)*0.0125* preservative_concentration*0.03; source OECD 2000; lognormal variance with pedigree 0.3501, pedigree (3,5,5,3,1)
  scenario according to (OECD 2000, p. 38ff)
- Carbon dioxide, fossil [air, non-urban air or from high stacks]: 0.0185041 kg; = (0.0125* preservative_concentration*0.001* C_content_fossil_Permethrin+0.0125* preservative_concentration*0.001* C_content_fossil_Tebuconazole+0.0125* preservative_concentration*0.02* C_content_fossil_IPBC+0.0409* preservative_concentration*0.25* C_content_fossil_Methyl_propanol)*efficiency_air_filter/12*44; lognormal variance with pedigree 0.042, pedigree (5,1,3,1,1)
  assuming that all C retained in the filter is finally converted to CO2, irrespective of the filter technology
- 2-Methyl-1-propanol [air, non-urban air or from high stacks]: 0.00255625 kg; = (1-efficiency_air_filter)*0.0409* preservative_concentration*0.25; source OECD 2000; lognormal variance with pedigree 0.1701, pedigree (3,5,5,3,1)
  scenario according to (OECD 2000, p. 38ff); proxy for structurally comparable alcohols
  property carbon content, fossil 0.648168; name C_content_fossil_Methyl_propanol

## Sampling procedure
Plant measurements for input of energy, water, etc. Estimates based on literature for air-borne emissions and emissions into water.

## Extrapolations
This dataset has been extrapolated from year 2012 to the year of the calculation (2019). The uncertainty has been adjusted accordingly.
