# treatment of aluminium scrap, post-consumer, prepared for recycling, at refiner

Dataset: EcoSpold 2, unit process
Geography: RER
Time period: 2005-01-01 to 2019-12-31
Technology level: current
Classification: EcoSpold01Categories: metals/extraction
Classification: ISIC rev.4 ecoinvent: 2420:Manufacture of basic precious and other non-ferrous metals
Scenario: Business-as-Usual
System model: Allocation at the point of substitution
Share of production covered: 23 %
Generated by: Pascal Lesage
Published in: European Aluminium Association 2008
Database: ecoinvent
isCopyrightProtected: true
accessRestrictedTo: 1

## General comment
This dataset is based on two sources: the European Aluminium Association 2005 LCI data (EAA, 2008); and (2) the ecoinvent v2.2 dataset for the same activity (Althaus, 2009), itself largely based on EAA data from 2000. Priority was given to data contained in EAA (2008); Althaus (2009) was used only in cases where it was found to be more complete that EAA (2008).
While this dataset represents the refining of prepared post-consumer scrap aluminium, the inputs and outputs reported by EAA (2008) actually refer to refining of all scrap, including post-consumer scrap, scrap from foundries, turnings, skimmings (dross) and aluminium metallics. In the ecoinvent database, the refining of post-consumer scrap and new scrap is represented by two distinct but mostly identical datasets to enable the appropriate modeling of aluminium mass flow through the economy.
The dataset contains the inputs and outputs for rotary (64%) and reverbatory (36%) furnaces, which together make up about 90% of utilized furnaces in Europe. The dataset excludes, for lack of access to data, salt slag and dross recycling. According to EAA, this data gap represents approximately 10-20% of potential impacts, as calculated using the CML 2001 method.

## Included activities start
The activity starts with the reception of prepared post-consumer aluminium scrap and includes the refining of said scrap in rotary (64%) and reverbatory (36%) furnaces. It includes alloying (based on weak data on actual alloying metals) and casting to secondary billets.

## Included activities end
The activity ends with cast aluminium billets. Note that the dataset excludes salt slag processing and dross recycling (data gap).

## Technology
Average technology for the aluminium recycled (refined) in Europe

## Reference product
- aluminium scrap, post-consumer, prepared for melting: -1 kg; name scrapInputAmount; source European Aluminium Association 2008; By-product classification Recyclable; CPC 39363: Waste and scrap of aluminium
  EcoSpold01Location=RER
  production volume 1.08908e9 kg; name scrapInputVolume; = 3.6e9*(7.2/23.8)
    Based on (1) EAA (2008) which states that approx. 16.6 million tonnes of scrap was treated by refiners in 2005 and (2) the split between new (16.6 Mt) and post-consumer (7.2 Mt) scrap treated by refiners globally in 2007, based on Wellmet (2011).
  property price 0.806 EUR2005; name scrapInputAmount_price_EUR2005
    Temporary price data. Calculated as 90% of purchasers price based on: 2005 import and export prices (total trades (USD) divided by total weight (kg) in biggest economies of the world: EU27, USA, Brasil, China, India, Japan and Russia) from UN Commodity Trade Statistics Database (http://data.un.org/Explorer.aspxDatabase [Accessed 2011.06.17]). Commodity: Waste or scrap, aluminium
  property carbon content 0
    carbon content on a dry matter basis (reserved; not for manual entry)
  properties: wet mass 1 kg, water in wet mass 0 kg, carbon content, non-fossil 0, carbon content, fossil 0, water content 0, dry mass 1 kg, carbon allocation 0 kg

## By-products
All rows: pedigree (1,1,1,1,1)
- iron scrap, unsorted: 0 kg; name ironScrapAmount; source European Aluminium Association 2008; CPC 39310: Slag, dross, scalings and other waste from the manufacture of iron or steel; By-product classification Recyclable
  production volume 0 kg; = ironScrapAmount/abs(scrapInputAmount)*scrapInputVolume
    Calculated from the production volume of aluminium scrap, post-consumer in proportion to the respective output amounts.
  property price 0.149 EUR2005; name ironScrapAmount_price_EUR2005
    Temporary price data. Calculated as 90% of purchasers price based on: estimated at 85% of sorted scrap
  property carbon content 0
    carbon content on a dry matter basis (reserved; not for manual entry)
  properties: water in wet mass 0 kg, water content 0, carbon content, fossil 0, carbon content, non-fossil 0, dry mass 1 kg, wet mass 1 kg, carbon allocation 0 kg
- aluminium oxide, non-metallurgical: 0 kg; name Al2O3Amount; source European Aluminium Association 2008; CPC 41432: Alumina (aluminium oxide), except artificial corundum; By-product classification allocatable product; CAS 1344-28-1
  production volume 0 kg; = Al2O3Amount/abs(scrapInputAmount)*scrapInputVolume
    (same comment as for iron scrap, unsorted)
  property carbon content, non-fossil 0; name C_content_non_fossil
  property price 0.28 EUR2005; name Al2O3Amount_price_EUR2005
    From UN trade database. http://data.un.org/ Import data from the largest economies of the world are used (Brazil, India, USA, China, Japan and EU-27).
  property dry mass 1 kg; name DM
  property water content 0; name water_content
  property wet mass 1 kg; name WM
  property water in wet mass 0 kg; name WWM
  property carbon content, fossil 0; name C_content_fossil
  property carbon content 0
    carbon content on a dry matter basis (reserved; not for manual entry)
  properties: carbon allocation 0 kg
- aluminium, cast alloy: 0 kg; name castAlloyAmount; source European Aluminium Association 2008; By-product classification allocatable product; CPC 41431: Unwrought aluminium
  EcoSpold01Location=RER
  production volume 0 kg; = 9.0125e9
    Based on International Aluminium Institute data on the relative share of primary, secondary (new scrap) and aluminium (old scrap) aluminium in cast alloy, the total amount of cast alloy produced globally, and the total amount of primary aluminium ingots produced globally. 2012 data.
  property price 1.3 EUR2005; name castAlloyAmount_price_EUR2005
    Temporary price data. Calculated as 90% of purchasers price based on: Source: London Metal Exchange, Aluminium alloy price for 2005
  property carbon content 0
    carbon content on a dry matter basis (reserved; not for manual entry)
  properties: water in wet mass 0 kg, carbon content, non-fossil 0, water content 0, dry mass 1 kg, carbon content, fossil 0, wet mass 1 kg, carbon allocation 0 kg
- heat, for reuse in municipal waste incineration only: 0 MJ; CPC 17300: Steam and hot water; By-product classification allocatable product
  Net electricity generated from this waste and used in internal MSWI plant energy redistribution.
  Uncertainty: uncertainty is calculated from uncertainties in waste composition and uncertainties in energy efficiency and the uncertainty in internal energy demand
  property exergy 0.1842 MJ; name E_th_prod_MSWI_exergy
    This exergy property is based on the exergy content of the product.
  property true value relation 0.1842; name E_th_prod_MSWI_true_value_relation
    property to calculate "true value" from
  property price 0.0106 EUR2005; name E_th_prod_MSWI_price_EUR2005
    Average European district heat price from Ecoheatcool and Euroheat 2005-2006, Ecoheat Work package 1: The European heat market. Final report. 10.6 EUR/GJ i s the price of district heat. http://www.solarthermalworld.org/files/Ecoheatcool%20WP1%20Web.pdf?download
- electricity, for reuse in municipal waste incineration only: 0 kWh; CPC 17100: Electrical energy; By-product classification allocatable product
  (same comment as for heat, for reuse in municipal waste incineration only)
  property exergy 3.6 MJ; name E_el_prod_MSWI_exergy
    This exergy property is based on the exergy content of the product.
  property true value relation 3.6; name E_el_prod_MSWI_true_value_relation
    property to calculate "true value" from
  property price 0.1 EUR2005; name E_el_prod_MSWI_price_EUR2005
    Estimated to be the same price as in case of electricity, medium voltage.

## Inputs from technosphere
- chlorine, liquid: 0.0002372 kg; source European Aluminium Association 2008; lognormal variance with pedigree 0.0406, pedigree (1,3,5,1,1)
  EcoSpold01Location=RER
  properties: dry mass 1 kg, wet mass 1 kg
- light fuel oil: 2.277e-6 kg; source Hans-Jörg Althaus  2009; lognormal variance with pedigree 0.0412, pedigree (1,3,5,1,1)
  Not reported in EAA (2008). Inherited form Althaus (2009).
  EcoSpold01Location=RER
  properties: dry mass 1 kg, wet mass 1 kg, carbon content, fossil 0.862
- copper: 0.000582912 kg; = 0.06072*0.96%; source European Aluminium Association 2008; lognormal variance with pedigree 0.0418, pedigree (2,3,5,1,1)
  Reported as "alloying metal", 0.96% assumed to be Copper in Althaus (2009)
  properties: dry mass 1 kg, wet mass 1 kg
- zinc: 0.0505798 kg; = 0.06072*83.3%; source European Aluminium Association 2008; lognormal variance with pedigree 0.0418, pedigree (2,3,5,1,1)
  Reported as "alloying metal", 83.3% assumed to be zinc in Althaus (2009)
  EcoSpold01Location=RER
  properties: wet mass 1 kg, dry mass 1 kg
- waste polyethylene: -0.0237 kg; name combustedPE; source European Aluminium Association 2008; lognormal variance with pedigree 0.0412, pedigree (1,3,5,1,1)
  Represents polyethylene combusted onsite for heat.
  production volume 2.58111e7 kg; = combustedPE/abs(scrapInputAmount)*scrapInputVolume
    (same comment as for iron scrap, unsorted)
  property price 0 EUR2005; name combustedPE_price_EUR2005
  properties: wet mass 1 kg, water content 0.00401606, carbon content, fossil 0.825301, dry mass 0.996 kg
  note on carbon content, fossil: C content in 1 kg DM was calculated using data in Tab A.1, ecoinvent v2.2 report 13_I
- refractory, basic, packed: 0.002277 kg; source European Aluminium Association 2008; lognormal variance with pedigree 0.0412, pedigree (1,3,5,1,1)
  Reported as Refractory
  properties: wet mass 1 kg, dry mass 1 kg
- hydrochloric acid, without water, in 30% solution state: 0.0001989 kg; source Hans-Jörg Althaus  2009; lognormal variance with pedigree 0.0412, pedigree (1,3,5,1,1)
  EcoSpold01Location=RER
  Not reported in EAA (2008). Inherited form Althaus (2009).
  properties: dry mass 1 kg, wet mass 1 kg
- sulfuric acid: 0.007552 kg; source Hans-Jörg Althaus  2009; lognormal variance with pedigree 0.0412, pedigree (1,3,5,1,1)
  Not reported in EAA (2008). Inherited form Althaus (2009).
  EcoSpold01Location=RER
  properties: wet mass 1 kg, dry mass 1 kg
- electricity, medium voltage: 0.05769 kWh; source European Aluminium Association 2008; lognormal variance with pedigree 0.0412, pedigree (1,3,5,1,1)
  EcoSpold01Location=UCTE
- silicon, metallurgical grade: 0.00953304 kg; = 0.06072*15.7%; source Hans-Jörg Althaus  2009; lognormal variance with pedigree 0.0418, pedigree (2,3,5,1,1)
  EcoSpold01Location=NO
  Reported as "alloying metal", 15.7% assumed to be Silicon in Althaus (2009)
  properties: wet mass 1 kg, dry mass 1 kg
- lubricating oil: 0.0001044 kg; source European Aluminium Association 2008; lognormal variance with pedigree 0.0412, pedigree (1,3,5,1,1)
  reported as Lubricants (maintenance material)
  properties: carbon content, fossil 0.75, dry mass 1 kg, wet mass 1 kg
  note on carbon content, fossil: Lubricating oil is produced from diesel. C-content/dry mass of fats and oils considered 75%, from: ecoinvent v2.2 report, n 15a, pg 40
- nitrogen, liquid: 0.003036 kg; source European Aluminium Association 2008; lognormal variance with pedigree 0.0412, pedigree (1,3,5,1,1)
  Reported as nitrogen
  EcoSpold01Location=RER
  properties: wet mass 1 kg, dry mass 1 kg
- filter dust from Al electrolysis: -0.0165 kg; name filterDustAmount; source European Aluminium Association 2008; lognormal variance with pedigree 0.0412, pedigree (1,3,5,1,1)
  EcoSpold01Location=CH
  Reported as Filter dust, assumption that this can be approximated by filter dust from Al electrolysis made in Althaus 2009.
  production volume 1.79697e7 kg; = filterDustAmount/abs(scrapInputAmount)*scrapInputVolume
    (same comment as for iron scrap, unsorted)
  property price 0 EUR2005; name filterDustAmount_price_EUR2005
  properties: wet mass 1 kg, carbon content, fossil 0.11586, dry mass 1 kg
- lime, hydrated, packed: 0.003738 kg; source European Aluminium Association 2008; lognormal variance with pedigree 0.0412, pedigree (1,3,5,1,1)
  EcoSpold01Location=CH
  Reported as lime, for emission treatment
  properties: wet mass 1 kg, water content 0.00300903, dry mass 0.997 kg
- sodium chloride, powder: 0.01072 kg; source European Aluminium Association 2008; lognormal variance with pedigree 0.0412, pedigree (1,3,5,1,1)
  EcoSpold01Location=RER
  properties: dry mass 1 kg, wet mass 1 kg
- cryolite: 0.0006831 kg; source European Aluminium Association 2008; lognormal variance with pedigree 0.0412, pedigree (1,3,5,1,1)
  Reported as Sodium aluminium fluoride
  properties: dry mass 1 kg, wet mass 1 kg
- aluminium casting facility: 0 unit; source Hans-Jörg Althaus  2009; uniform min 0, max 0, pedigree (1,1,5,1,1)
  EcoSpold01Location=RER
  Estimated, based on an assumed 130 000 tonne scrap aluminium output per year and a lifetime of 50 years. Based on casting plant.
  Uncertainty: rough guess
- hazardous waste, for underground deposit: -0.0008065 kg; name hazWasteAmount; source European Aluminium Association 2008; lognormal variance with pedigree 0.0412, pedigree (1,3,5,1,1)
  EcoSpold01Location=DE
  production volume 878339 kg; = hazWasteAmount/abs(scrapInputAmount)*scrapInputVolume
    (same comment as for iron scrap, unsorted)
  property price 0 EUR2005; name hazWasteAmount_price_EUR2005
  properties: dry mass 1 kg, carbon content, fossil 0.554667, wet mass 1 kg
  note on carbon content, fossil: Tab A.6, ecoinvent v2.2 report 13_I, average hazardous waste composition was used, and referred to 0% water mass. No waste-specific emission are currently inventoried for underground deposits. Accordingly, no waste composition must be specified. For generic, average waste to underground deposit deposition in a 200 liter steel drum without cement solidification is assumed (ecoinvent v2.2 report 13_I).
- aluminium casting facility: 1.45969e-10 unit; = castAlloyAmount/(50*130000000); source Hans-Jörg Althaus  2009; lognormal variance with pedigree 0.2106, pedigree (5,5,5,5,5)
  (same comment as for aluminium casting facility)
- heat, district or industrial, other than natural gas: 0.14416 MJ; = Net_Heat_Value_HFO * kgFuel_Input_HFO / fuel_use_HFO; source European Aluminium Association 2008; lognormal variance with pedigree 0.04, pedigree (1,1,5,1,1)
  Reported as kg input of heavy fuel oil (for combustion). Conversion to heat supplied by the combustion of fuel oil based on lower heating value of heavy fuel oil and boiler efficiency (expressed as 1/fuel_use), both taken from ecoinvent reports.
  Uncertainty: Uncertainty based on that of underlying variables.
  property heating value, net 40 MJ; name Net_Heat_Value_HFO
  property fuel input in physical units, kg 0.003795 kg; name kgFuel_Input_HFO
  property Corresponding fuel use 1.053 MJ; name fuel_use_HFO
  note on Corresponding fuel use: Lower heating value of the fuel input related to the heat/electricity output
- aluminium melting furnace: 0 unit; source Hans-Jörg Althaus  2009; uniform min 0, max 0, pedigree (1,1,5,1,1)
  Estimated, based on an assumed 10 000 tonne scrap aluminium output per year and a lifetime of 50 years.
  EcoSpold01Location=RER
  Uncertainty: rough guess
- heat, district or industrial, natural gas: 3.46655 MJ; = fuel_input_in_kg_ng*Net_Heat_Value_NG_per_kg /fuel_use_ng; source European Aluminium Association 2008; lognormal variance with pedigree 0.04, pedigree (1,1,5,1,1)
  Reported as kg natural gas. Conversion to heat supplied by the combustion of natural gas based on lower heating value of natural gas and boiler efficiency (expressed as 1/fuel_use), both taken from ecoinvent reports on energy production.
  Uncertainty: Uncertainty based on that of underlying variables.
  property Corresponding fuel use 1.04 MJ; name fuel_use_ng
  property kgFuel_Input 0.07941 kg; name fuel_input_in_kg_ng
  property heating value, net 45.4 MJ; name Net_Heat_Value_NG_per_kg
  note on Corresponding fuel use: Lower heating value of the fuel input related to the heat/electricity output, based on an efficiency of 96%
- sodium hydroxide, without water, in 50% solution state: 0.001509 kg; source Hans-Jörg Althaus  2009; lognormal variance with pedigree 0.0412, pedigree (1,3,5,1,1)
  EcoSpold01Location=RER
  Not reported in EAA (2008). Inherited form Althaus (2009).
  properties: dry mass 1 kg, wet mass 1 kg
- aluminium melting furnace: 1.8976e-9 unit; = castAlloyAmount/(50*10000000); source Hans-Jörg Althaus  2009; lognormal variance with pedigree 0.2106, pedigree (5,5,5,5,5)
  EcoSpold01Location=RER
  Estimated, based on an assumed 10 000 tonne scrap aluminium output per year and a lifetime of 50 years.
  Uncertainty: rough guess
- argon, liquid: 0.0009203 kg; source European Aluminium Association 2008; lognormal variance with pedigree 0.0412, pedigree (1,3,5,1,1)
  Reported as Argon
  properties: wet mass 1 kg, dry mass 1 kg

## Inputs from nature
- Water, unspecified natural origin [natural resource, in water]: 0.01689 m3; source European Aluminium Association 2008; lognormal variance with pedigree 0.0406, pedigree (1,3,5,1,1)
  Reported as water (cooling)

## Emissions to nature
- Hydrogen sulfide [air, unspecified]: 2.657e-6 kg; source Hans-Jörg Althaus  2009; lognormal variance with pedigree 0.0806, pedigree (1,3,5,1,1)
  Not reported in EAA (2008). Inherited form Althaus (2009).
- Hydrocarbons, chlorinated [air, unspecified]: 4.744e-5 kg; source Hans-Jörg Althaus  2009; lognormal variance with pedigree 0.0806, pedigree (1,3,5,1,1)
  Not reported in EAA (2008). Inherited form Althaus (2009).
- Particulates, < 2.5 um [air, unspecified]: 6.3744e-6 kg; = 1.992e-5*32%; source European Aluminium Association 2008; lognormal variance with pedigree 0.3812, pedigree (2,3,5,1,4)
  Reported as dust emissions to air. Split between three classes of particulates based on CEPMIEP database: 32% <2.5 um, 48% >2.5<10 um, 20% > 10 um. Assumed process emissions and not combustion emissions.
  Uncertainty: Uncertainty accounts for use of CEPMEIP database to split total particulates among the three particulate classes.
- Water [water, unspecified]: 8.349e-6 m3; source European Aluminium Association 2008; lognormal variance with pedigree 0.0412, pedigree (1,3,5,1,1)
  Reported as "water"
- Particulates, > 10 um [air, unspecified]: 3.984e-6 kg; = 1.992e-5*20%; source European Aluminium Association 2008; lognormal variance with pedigree 0.1212, pedigree (2,3,5,1,4)
  (same comment as for Particulates, < 2.5 um)
- Phosphorus [air, unspecified]: 4.934e-7 kg; source Hans-Jörg Althaus  2009; lognormal variance with pedigree 0.0406, pedigree (1,3,5,1,1)
  Not reported in EAA (2008). Inherited form Althaus (2009).
- Chlorine [air, unspecified]: 1.898e-6 kg; source European Aluminium Association 2008; lognormal variance with pedigree 0.0806, pedigree (1,3,5,1,1)
- Hydrogen chloride [air, unspecified]: 3.605e-5 kg; source European Aluminium Association 2008; lognormal variance with pedigree 0.0806, pedigree (1,3,5,1,1)
- Particulates, > 2.5 um, and < 10um [air, unspecified]: 9.5616e-6 kg; = 1.992e-5*48%; source European Aluminium Association 2008; lognormal variance with pedigree 0.2012, pedigree (2,3,5,1,4)
  (same comment as for Particulates, < 2.5 um)
- Ammonia [air, unspecified]: 1.898e-5 kg; source Hans-Jörg Althaus  2009; lognormal variance with pedigree 0.0806, pedigree (1,3,5,1,1)
  Not reported in EAA (2008). Inherited form Althaus (2009).
- Hydrogen fluoride [air, unspecified]: 1.898e-6 kg; source European Aluminium Association 2008; lognormal variance with pedigree 0.0806, pedigree (1,3,5,1,1)

## Sampling procedure
Literature / Survey

## Extrapolations
This dataset has been extrapolated from year 2005 to the year of the calculation (2019). The uncertainty has been adjusted accordingly.

## Review by Christian Bauer 2012-06-01
passed

## Review by Hans-Jörg Althaus 2012-06-01
ok
