# electricity production, lignite

Dataset: EcoSpold 2, unit process
Geography: SI
Time period: 1980-01-01 to 2019-12-31
Technology level: modern
Classification: ISIC rev.4 ecoinvent: 3510:Electric power generation, transmission and distribution
Classification: EcoSpold01Categories: lignite/power plants
Synonyms: sub-bituminous coal; brown coal
Tags: coal power; lignite power; fossil fuels
Scenario: Business-as-Usual
System model: Allocation at the point of substitution
Generated by: Karin Treyer
Published in: Röder, A. 2007
Database: ecoinvent
isCopyrightProtected: true
accessRestrictedTo: 1

## General comment
This dataset represents the production of high voltage electricity in an average lignite power plant in Slovenia in 2012. 'Lignite' is used as representant for 'brown coal', which includes sub-bituminous coal and lignite according to the definition of the IEA electricity information 2014. (IEA. 2014. Electricity Information 2014. ISBN 978-92-64-21692-1. International Energy Agency (IEA), Paris Cedex (FR).)
All exchanges in this dataset except for emissions of SO2, NOx and particles are production-weighted averages of the figures in the datasets in ecoinvent version two, which are valid for the following 10 countries: AT, BA, CZ, DE, ES, FR, HU, PL, SI, SK. The exception values are production-weighted averages of version 2 countries and the new countries in version 3 (AU, CA, CL, ID, IN, KR, MX, MY, PE, RU, TH, TR, TW, TZ, UA, ZA){{children_only}}
Comments on the inventory data of emissions:
- for the assessment of main characteristics (sulphur and ash content of coal, efficiency of the plant) and CO2 a bottom-up approach has been used. It consists in the collection of information about single plants.
- Halogene emissions have been estimated on the basis of the content of the species in the country-specific coal input mix, assuming average retention rates.
- For CO and particle emissions average values for the former UCTE are included (Union for the Coordination of the Transmission of Electricity, since 2009 replaced by ENTSO-E European Network of Transmission System Operators for Electricity).
- The country specific emissions of N2O depend on the share of DeNOx. - Emissions of trace elements were calculated by means of a formula (CORINAIR) using the ash content in the country-specific coal input mix and average transfer coefficients for coal power plants, taking into account the share of DeSOx installed.
- Emission of uranium and thorium radioactive isotopes were assumed proportional to the corresponding element emitted with particles; the other non-gaseous radioactive isotopes of the uranium and thorium decay chain were assumed proportional to the emitted U-238 or Th-232.
- The emission of gaseous radon and K-40 are taken from the literature.
[This dataset was already contained in the ecoinvent database version 2. It was not individually updated during the transfer to ecoinvent version 3. Life Cycle Impact Assessment results may still have changed, as they are affected by changes in the supply chain, i.e. in other datasets. This dataset was generated following the ecoinvent quality guidelines for version 2. It may have been subject to central changes described in the ecoinvent version 3 change report (http://www.ecoinvent.org/database/ecoinvent-version-3/reports-of-changes/), and the results of the central updates were reviewed extensively. The changes added e.g. consistent water flows and other information throughout the database. The documentation of this dataset can be found in the ecoinvent reports of version 2, which are still available via the ecoinvent website. The change report linked above covers all central changes that were made during the conversion process.]
European Environment Agency (1991) CORINAIR Inventory; VOC's Default Emission Factors
[This dataset is meant to replace the following datasets:
- electricity production, hard coal, SI, 1993 - 2000]

## Included activities start
From the constructed lignite power plant ready to produce electricity.

From reception of lignite and operating materials at power plant gate.

## Included activities end
Energy conversion for electricity production. Particle removal is included in this module. DeSOx is described in a different module; it is applied here according to the actual use in the country; SOx emission is the reduced one. There is no information about the use of DeNOx in the country. It is assumed that 25 % of the plants are river cooled, 75 % use cooling tower (average UCTE). The water treatment is described in separate modules. The disposal of non-recycled ashes is modelled separately.

## Geography
Country-specific data.

## Technology
POWER PLANT:
Lignite power plant input is a dataset which consists of a mix of 30% 100MW power plant and 70% 500MW power plant. The plants are used for basic load with 6000 hours of operation at full capacity per year. The plants are assumed to operate 200000 hours during its lifetime.
Average installed technology.
- Share of installed capacity with desulfurisation: 20% (rough estimation based on sulfur mass balance
- Average efficiency of desulfurisation installations: 92% (rough estimation based on Dones et al. 2007
- Share of installed capacity with denitrification: 73% (figure based on IEA 2012 )
- Average efficiency of denitrification installations: 80% (estimation based on Dones et al. 2007, p.128. Valid for selective catalytic reaction systems)
- Share of installed capacity with particle filters: 98% (figure based on IEA 2012 )
- Average efficiency of particle filters: 98% (figure based on IEA 2012 )
Sources :
1) Victoria: http://new.dpi.vic.gov.au/energy-future/our-energy-story/energy-in-victoria/resources-in-victoria-map
2) Queensland: http://www.dme.qld.gov.au/Energy/power_stations.cfm
3) New South Wales: http://www.industry.nsw.gov.au/energy/electricity/generation
4) Map of Fossil Fuel Power Stations in Australia, DEWHA, http://www.ga.gov.au/fossil_fuel/
5) IEA 2012. Coal Power Database. International Energy Agency Clean Coal Centre, London
6) Australian National Pollutant Inventory, http://www.npi.gov.au/
7) IEA/OECD. 2010. Electricity Information 2010. International Energy Agency (IEA), Paris Cedex (FR). Part IV. Detailed OECD Electricity And Heat Data.
8) Dones, R., Bauer, C., Röder, A. (2007) Kohle. In: Dones, R. (Ed.) et al., Sachbilanzen von Energiesystemen: Grundlagen für den ökologischen Vergleich von Energiesystemen und den Einbezug von Energiesystemen in Ökobilanzen für die Schweiz. Final report ecoinvent No. 6-VI, Paul Scherrer Institut Villigen, Swiss Centre for Life Cycle Inventories, Dübendorf, CH.

## Time period
The Annual Production Volume is valid for the year 2012.

## Parameters
- water withdrawal, electricity production from hard coal, once-through and coolin: 0.0815 m3/kWh; name WWithdrawal_EP_HC_once_through_andCP_CS; lognormal variance with pedigree 0.092025, pedigree (4,4,3,2,4)
  Estimated based on literature (Scown, 2011, Water Footprint of U.S. Transportation Fuels, SI). The amount of water withdrawn while burning lignite and peat is assumed to be the same as in case of coal.
  nan
- fraction, process water, to air: 0.15 dimensionless; name fraction_PW_to_air; lognormal variance with pedigree 0.092025, pedigree (4,4,3,2,4)
  Literature value. In case when no industry/process specific data are available, default evaporation fraction value is used. This value is 15% and is based on literature (Statistics Canada, 2007 & Shaffer, K.H., 2008, Consumptive water use in the Great Lakes Basin, USGS & Shiklomanov, 2003, World Water Resources at the Beginning of the 21st Century) and has been approved by an expert.
  nan
- fraction, water, completely softened, to air: 0.15; name fraction_WCS_to_air; = fraction_PW_to_air; lognormal variance with pedigree 0.092025, pedigree (4,4,3,2,4)
  Calculated value. See comment in the other parametres present in this dataset. Water, completely softened is considered to be always used as process water, thus process water fractions to air are applied to all water, completely softened input flows to calculate the amount of water consumed in the processes.
  nan
- once-through and cooling pond cooling systems as a fraction of all cooling syste: 0.73 dimensionless; name once_through_andCP_CS_fractio_from_allCS; lognormal variance with pedigree 0.092025, pedigree (4,4,3,2,4)
  Calculated as an average of data available for Europe (Floerke, 2008, Future changes of freshwater needs in the electricity production sector) and USA (NERL, 2011, Estimating freshwater needs to meet future thermoelectric generation requirements).
  nan
- recirculating cooling system as a fraction of all cooling systems: 0.27 dimensionless; name recirculating_CS_fraction_from_allCS; lognormal variance with pedigree 0.092025, pedigree (4,4,3,2,4)
  (same comment as for once-through and cooling pond cooling systems as a fraction of all coo)
- efficiency: 0.316 dimensionless; lognormal variance with pedigree 0.003325, pedigree (3,2,1,2,2)
  Literature value/calculated value. Net electrical efficiency based on the lower heating value (LHV).
  For all OECD countries, the IEA Electricity information 2014 provides data for the year 2012 on fuel input (TJ, Net calorific value NCV) and gross electricity production (GWh) as well as heat production (TJ) in tables 8 and 9 for each country for electricity only and Combined Heat and Power (CHP) plants each. Together with the information on own use (see parameter 'losses'), the net electrical efficiency based on the NCV is calculated.
  For all non-OECD countries, data from the IEA Energy balances of non-OECD countries 2014 have been used. These tables do not always provide information on how much of the electricity has been produced in electricity only and in CHP plants, but often give the total value only.
  IEA. 2014. Electricity Information 2014. ISBN 978-92-64-21692-1. International Energy Agency (IEA), Paris Cedex (FR).
  IEA/OECD. 2014. Energy balances of non-OECD countries 2014. International Energy Agency (IEA), Paris Cedex (FR).
  output relative to input (requires additional specification)
- water withdrawal, electricity production from hard coal, recirculating CS: 0.0021 m3/kWh; name WWithdrawal_EP_HC_recirculating_CS; lognormal variance with pedigree 0.092025, pedigree (4,4,3,2,4)
  (same comment as for water withdrawal, electricity production from hard coal, once-through )
- gross electricity production: 6.35e8 kWh; name gross_electricity; lognormal variance with pedigree 0.001225, pedigree (2,1,1,2,1)
  Literature value/statistics. Taken from the IEA electricity information 2014, table 1.3.
  IEA. 2014. Electricity Information 2014. ISBN 978-92-64-21692-1. International Energy Agency (IEA), Paris Cedex (FR).
  nan
- fraction, cooling water, to air: 0.0251074; name fraction_CW_to_air; lognormal variance with pedigree 0.092025, pedigree (4,4,3,2,4)
  Calculated value based on literature value (Scown, 2011 & Floerke, 2009, Future changes of freshwater needs in the electricity production sector & Stiegel, 2008, Estimating Freshwater Needs to Meet Future Thermoelectric Generation Requirements) (Vionnet, S., Quantis Water Database - Technical Report, 2012).
  nan
- factor: input of MJ for the production of 1 kWh: 11.3924 MJ/kWh; name factor_MJ_kWh; = 1*3.6/efficiency; lognormal variance with pedigree 0.0532, pedigree (4,4,3,4,4)
  Calculated value. 3.6 MJ = 1kWh.
  nan
- water consumption, electricity production from hard coal, recirculating CS: 0.0018 m3/kWh; name WConsumption_EP_HC_recirculatingCS; lognormal variance with pedigree 0.092025, pedigree (4,4,3,2,4)
  Estimated based on literature (Scown, 2011, Water Footprint of U.S. Transportation Fuels, SI). The amount of water consumed while burning lignite and peat is assumed to be the same as in case of coal.
  nan
- water consumption, electricity production from hard coal, once-through and cooli: 0.0014 m3/kWh; name WConsumption_EP_HC_once_through_andCP_CS; lognormal variance with pedigree 0.092025, pedigree (4,4,3,2,4)
  (same comment as for water consumption, electricity production from hard coal, recirculatin)
- fraction, water, decarbonised, to air: 0.0251074; name fraction_WDC_to_air; = fraction_CW_to_air; lognormal variance with pedigree 0.041425, pedigree (2,3,2,2,1)
  Calculated value. See comments in the other parametres present in this dataset. Decarbonised water is considered to be always used as cooling water, thus cooling water fractions to air are applied to all carbonised water input flows to calculate the amount of water consumed in the processes.
  nan
- losses from gross electricity production: 0.12 dimensionless; name gross_net_electricity; lognormal variance with pedigree 0.003525, pedigree (3,2,2,2,2)
  Calculated value. Own use of electricity plants in this country in 2012. For the OECD countries, the OECD iLibrary provides gross and net electricity values for the specific sector \'Total Fuel Combustion\', from which the loss value is being calculated. This value is then applied to all fossil fuel datasets, as no data on a more detailed level were available.
  OECD. 2014. IEA Electricity Information Statistics: OECD - Electricity and heat generation. OECD iLibrary. Online database. DOI : 10.1787/elect-data-en
  nan
  Uncertainty: generic IEA value used

## Reference product
- electricity, high voltage: 1 kWh; name electricity; = 0.0900900900900901 * factor_MJ_kWh; CPC 17100: Electrical energy; By-product classification allocatable product
  Amount was scaled to 1.
  production volume 5.588e8 kWh; name electricity_apv; = gross_electricity*(1- gross_net_electricity)
    Calculated value
  property price 0.0977 EUR2005
    Temporary price data. Calculated as 90% of purchasers price based on: 94% of the average price (to account for a 6% loss in transformation and transmission) for electricity for industrial consumersin 2005 (excluded taxes). From IEA.
  property true value 0.100274; name electricity_true_value
    allocation property applied in "true value" allocation // value calculated from revenue
  properties: Corresponding fuel use 11.1 MJ

## By-products
- heat, for reuse in municipal waste incineration only: 0 MJ; CPC 17300: Steam and hot water; By-product classification allocatable product; pedigree (1,1,1,1,1)
  Net electricity generated from this waste and used in internal MSWI plant energy redistribution.
  Uncertainty: uncertainty is calculated from uncertainties in waste composition and uncertainties in energy efficiency and the uncertainty in internal energy demand
  production volume 67.7007 MJ
  property exergy 0.1842 MJ; name E_th_prod_MSWI_exergy
    This exergy property is based on the exergy content of the product.
  property price 0.0106 EUR2005; name E_th_prod_MSWI_price_EUR2005
    Average European district heat price from Ecoheatcool and Euroheat 2005-2006, Ecoheat Work package 1: The European heat market. Final report. 10.6 EUR/GJ i s the price of district heat. http://www.solarthermalworld.org/files/Ecoheatcool%20WP1%20Web.pdf?download
  property true value relation 0.1842; name E_th_prod_MSWI_true_value_relation
    property to calculate "true value" from
  property true value 8.17931e-10
    allocation property applied in "true value" allocation // value calculated from true value relation
- electricity, for reuse in municipal waste incineration only: 0 kWh; CPC 17100: Electrical energy; By-product classification allocatable product; pedigree (1,1,1,1,1)
  (same comment as for heat, for reuse in municipal waste incineration only)
  production volume 9.53483 kWh
  property true value relation 3.6; name E_el_prod_MSWI_true_value_relation
    property to calculate "true value" from
  property price 0.1 EUR2005; name E_el_prod_MSWI_price_EUR2005
    Estimated to be the same price as in case of electricity, medium voltage.
  property exergy 3.6 MJ; name E_el_prod_MSWI_exergy
    This exergy property is based on the exergy content of the product.
  property true value 2.25138e-9
    (same comment as for heat, for reuse in municipal waste incineration only)

## Inputs from technosphere
- lignite ash: -0.20646 kg; name lignite_ash; = (0.0186 * factor_MJ_kWh)*-1; source Röder, A. 2007, p. Tab. 9.69, p.165; lognormal variance with pedigree 0.072, pedigree (5,1,3,1,1)
  Calculated from mass balance
  Amount was scaled to the amount of reference product.
  production volume 1.1537e8 kg; = lignite_ash/electricity*electricity_apv
    Calculated from the electricity production with lignite in proportion to the respective output amounts.
  property price 0 EUR2005; name lignite_ash_price_EUR2005
  properties: dry mass 1 kg, wet mass 1 kg
- NOx retained, by selective catalytic reduction: 0 kg; name nox_retained; source Itten R. 2012; pedigree (1,1,3,1,1)
  Exchange present due to parent child relationship
  properties: dry mass 1 kg, wet mass 1 kg
- SOx retained, in lignite flue gas desulfurisation: 0.0029082 kg; name sox_retained; = 0.000262 * factor_MJ_kWh; source Itten R. 2012; lognormal variance with pedigree 0.004, pedigree (3,1,3,1,1)
  See power plant data base for details
  Amount was scaled to the amount of reference product.
  properties: wet mass 1 kg, dry mass 1 kg
- water, completely softened: 0.0666 kg; name water_softened_input; = 0.006 * factor_MJ_kWh; lognormal variance with pedigree 0.052025, pedigree (4,5,4,2,3)
  Estimate based on literature
  Amount was scaled to the amount of reference product.
  estimate based on literature
  Amount was scaled to the amount of reference product.
  properties: wet mass 1 kg
- chlorine, liquid: 0.000111 kg; = 1E-05 * factor_MJ_kWh; lognormal variance with pedigree 0.108025, pedigree (5,4,4,2,3)
  Rough guess
  Amount was scaled to the amount of reference product.
  properties: dry mass 1 kg, wet mass 1 kg
- lignite: 1.1211 kg; = 0.101 * factor_MJ_kWh; lognormal variance with pedigree 0.0026, pedigree (2,1,3,1,1)
  (same comment as for SOx retained, in lignite flue gas desulfurisation)
  properties: carbon content, fossil 0.655, dry mass 0.42 kg, wet mass 1 kg, water content 1.38095
  note on carbon content, fossil: C content of dry lignite is 58-73% (specified in Tab 1.1, report 6, part VI). A mean content of 0.655 kg C/kg dry lignite was considered.
- lignite power plant: 0 unit; name dummy123; source Röder, A. 2007, p. p.99; uniform min 0, max 0, pedigree (1,1,3,1,1)
  Calculated value. At the moment, the lignite power plant input consists out of mix of a 100MWe power plant (30%) and a 500MWe power plant (70%).
  For this calculation, 6000 load hours per year are assumed. It is assumed that a total of 200'000h is reached during the lifetime. A capacity of 500MW is taken for the calculation.
- petroleum coke: 0 kg; name petroleum_coke; pedigree (1,1,3,1,1)
  Exchange present due to parent child relationship
  properties: carbon content, fossil 0.885, wet mass 1 kg, dry mass 1 kg
- lignite power plant: 1.07892e-11 unit; name lignite_power_plant; = 9.72E-13 * factor_MJ_kWh; source Röder, A. 2007, p. p.99; lognormal variance with pedigree 0.3686, pedigree (5,3,4,5,3)
  (same comment as for lignite power plant)
- water, decarbonised: 1.665 kg; name water_decarbonised_input; = 0.15 * factor_MJ_kWh; lognormal variance with pedigree 0.052025, pedigree (4,5,4,2,3)
  (same comment as for water, completely softened)
  properties: wet mass 1 kg
- residue from cooling tower: -5.55e-5 kg; name cooling_tower_residue; = (factor_MJ_kWh*0.000005)*-1; pedigree (1,1,3,1,1)
  Exchange present due to parent child relationship
  production volume 31013.4 kg; = cooling_tower_residue/electricity*electricity_apv
    Calculated from production volume of reference product using the relative outputs.
  property price 0 EUR2005; name cooling_tower_residue_price_EUR2005
  properties: wet mass 1 kg, carbon content, fossil 0.0544233, dry mass 0.7 kg, water content 0.428571

## Inputs from nature
- Water, cooling, unspecified natural origin [natural resource, in water]: 0.0563869 m3; name water_cooling_UNO_input; source Scown, C.D., et al. 2011; lognormal variance with pedigree 0.098025, pedigree (4,4,4,2,4)
  Estimate based on literature
  Amount was scaled to the amount of reference product.
  Calculated based on literature (Scown, C.D., et al., 2011, Water Footprint of U.S. Trasportation Fuels;Scown, C.D., et al., 2011, Water Footprint of U.S. Trasportation Fuels (SI); Stiegel, 2008, Estimating Freshwater Needs to Meet Future Thermoelectric Generation Requirements; Floerke, M., 2009, Future changes of freshwater needs in the electricity production sector), (Vionnet, S., Quantis Water Database - Technical Report, 2012). Water use in this process is modelled based on literature (see references). The process boundaries are given by the boundaries of the power plant. The process ends when the energy (MJ) is produced and ready to be used for electricity production (kWh). It is assumed that the water use during this process is the same as in case of coal.
  Calculated based on literature data.

## Emissions to nature
- Selenium [air, non-urban air or from high stacks]: 1.7982e-7 kg; name selenium; = 1.62E-08 * factor_MJ_kWh; lognormal variance with pedigree 0.732, pedigree (5,1,3,1,1)
  Calculated from trace element balance, input uncertain
  Amount was scaled to the amount of reference product.
- Hydrocarbons, aliphatic, unsaturated [air, non-urban air or from high stacks]: 2.3976e-6 kg; name hydrocarbons_aliphatic_unsaturated; = 2.16E-07 * factor_MJ_kWh; lognormal variance with pedigree 0.078025, pedigree (3,5,4,2,1)
  Based on available literature
  Amount was scaled to the amount of reference product.
- Potassium-40 [air, non-urban air or from high stacks]: 2.7195e-5 kBq; name potassium_40; = 2.45E-06 * factor_MJ_kWh; lognormal variance with pedigree 0.382, pedigree (5,1,3,1,1)
  (same comment as for Selenium)
- Vanadium [air, non-urban air or from high stacks]: 9.0021e-8 kg; name vanadium; = 8.11E-09 * factor_MJ_kWh; lognormal variance with pedigree 0.732, pedigree (5,1,3,1,1)
  (same comment as for Selenium)
- Thorium-228 [air, non-urban air or from high stacks]: 7.2927e-6 kBq; name thorium_228; = 6.57E-07 * factor_MJ_kWh; lognormal variance with pedigree 0.382, pedigree (5,1,3,1,1)
  (same comment as for Selenium)
- Boron [air, non-urban air or from high stacks]: 4.5621e-5 kg; name boron; = 4.11E-06 * factor_MJ_kWh; lognormal variance with pedigree 0.732, pedigree (5,1,3,1,1)
  (same comment as for Selenium)
- Zinc [air, non-urban air or from high stacks]: 2.6307e-7 kg; name zinc; = 2.37E-08 * factor_MJ_kWh; lognormal variance with pedigree 0.732, pedigree (5,1,3,1,1)
  (same comment as for Selenium)
- Water [water, unspecified]: 0.0566509 m3; name water_to_water_unspecified; = (water_softened_input/1000)*(1-fraction_WCS_to_air)+(water_decarbonised_input/1000)*(1-fraction_WDC_to_air)+water_cooling_UNO_input*(1-fraction_CW_to_air); lognormal variance with pedigree 0.098025, pedigree (4,4,4,2,4)
  Calculated value based on literature values and expert opinion. See comments in the parametres' comment field.
  property water in wet mass 1000 kg; name WWM
  property dry mass 0 kg; name DM
  property wet mass 1000 kg; name WM
  property fraction, origin: fresh water 0.0289128; name fraction_origin_fresh_water_Ww
  property fraction, origin: unspecified 0.971087; name fraction_origin_unspecified_Ww
  property fraction, origin: salt water 0; name fraction_origin_salt_water_Ww
  property carbon content, non-fossil 0; name C_content_non_fossil
  property carbon content, fossil 0; name C_content_fossil
- Polonium-210 [air, non-urban air or from high stacks]: 0.00026973 kBq; name polonium_210; = 2.43E-05 * factor_MJ_kWh; lognormal variance with pedigree 0.382, pedigree (5,1,3,1,1)
  (same comment as for Selenium)
- Water [air, unspecified]: 0.00146752 m3; name water_to_air_unspecified; = (water_softened_input/1000)*fraction_WCS_to_air+(water_decarbonised_input/1000)*fraction_WDC_to_air+water_cooling_UNO_input*fraction_CW_to_air; lognormal variance with pedigree 0.098025, pedigree (4,4,4,2,4)
  (same comment as for Water)
  property fraction, origin: fresh water 0.0344187; name fraction_origin_fresh_water
  property fraction, origin: salt water 0; name fraction_origin_salt_water
  property fraction, origin: unspecified 0.965581; name fraction_origin_unspecified
- Dioxins, measured as 2,3,7,8-tetrachlorodibenzo-p-dioxin [air, non-urban air or from high stacks]: 7.77e-14 kg; name dioxins; = 7E-15 * factor_MJ_kWh; lognormal variance with pedigree 0.338025, pedigree (3,5,4,2,1)
  Based on available literature
  Amount was scaled to the amount of reference product.
- Propene [air, non-urban air or from high stacks]: 1.776e-7 kg; name propene; = 1.6E-08 * factor_MJ_kWh; lognormal variance with pedigree 0.078025, pedigree (3,5,4,2,1)
  Based on available literature
  Amount was scaled to the amount of reference product.
- Radon-220 [air, non-urban air or from high stacks]: 0.0013431 kBq; name radon_220; = 0.000121 * factor_MJ_kWh; lognormal variance with pedigree 0.382, pedigree (5,1,3,1,1)
  (same comment as for Selenium)
- Propane [air, non-urban air or from high stacks]: 3.885e-7 kg; name propane; = 3.5E-08 * factor_MJ_kWh; lognormal variance with pedigree 0.078025, pedigree (3,5,4,2,1)
  Based on available literature
  Amount was scaled to the amount of reference product.
- Arsenic [air, non-urban air or from high stacks]: 5.1615e-8 kg; name arsenic; = 4.65E-09 * factor_MJ_kWh; lognormal variance with pedigree 0.732, pedigree (5,1,3,1,1)
  (same comment as for Selenium)
- Molybdenum [air, non-urban air or from high stacks]: 2.0424e-8 kg; name molybdenum; = 1.84E-09 * factor_MJ_kWh; lognormal variance with pedigree 0.732, pedigree (5,1,3,1,1)
  (same comment as for Selenium)
- Carbon dioxide, fossil [air, non-urban air or from high stacks]: 1.1655 kg; name carbon_dioxide_fossil; = 0.105 * factor_MJ_kWh; lognormal variance with pedigree 0.004, pedigree (3,1,3,1,1)
  Literature value/calculated value. Emissions when producing 1kWh of electricity from lignite, based on the value for burning 1MJ of lignite. Weighted average with electricity production data (Itten&Frischknecht 2012) and emission values of 10 countries
  (AT, BA, CZ, DE, ES, FR, HU, PL, SI, SK) (Röder et al. 2007)
  Country emissions values based on literature.
  Source:
  Itten R. and Frischknecht R. (2012) Life Cycle Inventories of Electricity Mixes and Grid. ESU-services Ltd., Uster, Switzerland.
- Lead [air, non-urban air or from high stacks]: 4.3845e-8 kg; name lead; = 3.95E-09 * factor_MJ_kWh; lognormal variance with pedigree 0.732, pedigree (5,1,3,1,1)
  (same comment as for Selenium)
- Nitrogen oxides [air, non-urban air or from high stacks]: 0.0028638 kg; name nitrogen_oxides; = 0.000258 * factor_MJ_kWh; source Itten R. 2012; lognormal variance with pedigree 0.044, pedigree (3,1,3,1,1)
  (same comment as for SOx retained, in lignite flue gas desulfurisation)
- Sulfur dioxide [air, non-urban air or from high stacks]: 0.02109 kg; name sulfur_dioxide; = 0.0019 * factor_MJ_kWh; source Itten R. 2012; lognormal variance with pedigree 0.004, pedigree (3,1,3,1,1)
  (same comment as for SOx retained, in lignite flue gas desulfurisation)
- Chromium VI [air, non-urban air or from high stacks]: 2.2422e-9 kg; name chromium_vi; = 2.02E-10 * factor_MJ_kWh; lognormal variance with pedigree 0.482, pedigree (1,1,3,1,1)
  based on range of data
  Amount was scaled to the amount of reference product.
- Particulates, > 10 um [air, non-urban air or from high stacks]: 8.3805e-5 kg; name particulates_gt10; = 7.55E-06 * factor_MJ_kWh; source Itten R. 2012; lognormal variance with pedigree 0.122, pedigree (5,1,3,1,1)
  (same comment as for SOx retained, in lignite flue gas desulfurisation)
- Xylene [air, non-urban air or from high stacks]: 1.02342e-5 kg; name xylene; = 9.22E-07 * factor_MJ_kWh; lognormal variance with pedigree 0.078025, pedigree (3,5,4,2,1)
  Based on available literature
  Amount was scaled to the amount of reference product.
- Radon-222 [air, non-urban air or from high stacks]: 0.0023976 kBq; name radon_222; = 0.000216 * factor_MJ_kWh; lognormal variance with pedigree 0.382, pedigree (5,1,3,1,1)
  (same comment as for Selenium)
- Chromium [air, non-urban air or from high stacks]: 1.8204e-8 kg; name chromium; = 1.64E-09 * factor_MJ_kWh; lognormal variance with pedigree 0.732, pedigree (5,1,3,1,1)
  (same comment as for Selenium)
- Manganese [air, non-urban air or from high stacks]: 2.6862e-8 kg; name manganese; = 2.42E-09 * factor_MJ_kWh; lognormal variance with pedigree 0.732, pedigree (5,1,3,1,1)
  (same comment as for Selenium)
- Carbon monoxide, fossil [air, non-urban air or from high stacks]: 0.000222 kg; name carbon_monoxide_fossil; = 2E-05 * factor_MJ_kWh; lognormal variance with pedigree 0.672025, pedigree (3,4,4,2,1)
  Based on available literature
  Amount was scaled to the amount of reference product.
- Particulates, > 2.5 um, and < 10um [air, non-urban air or from high stacks]: 5.661e-5 kg; name particulates_2_5_to_10; = 5.1E-06 * factor_MJ_kWh; source Itten R. 2012; lognormal variance with pedigree 0.202, pedigree (5,1,3,1,1)
  (same comment as for SOx retained, in lignite flue gas desulfurisation)
- Barium [air, non-urban air or from high stacks]: 1.4652e-7 kg; name barium; = 1.32E-08 * factor_MJ_kWh; lognormal variance with pedigree 0.732, pedigree (5,1,3,1,1)
  (same comment as for Selenium)
- Cobalt [air, non-urban air or from high stacks]: 2.1867e-8 kg; name cobalt; = 1.97E-09 * factor_MJ_kWh; lognormal variance with pedigree 0.732, pedigree (5,1,3,1,1)
  (same comment as for Selenium)
- Benzo(a)pyrene [air, non-urban air or from high stacks]: 2.22e-12 kg; name benzo_a_pyrene; = 2E-13 * factor_MJ_kWh; lognormal variance with pedigree 0.078025, pedigree (3,5,4,2,1)
  Based on available literature
  Amount was scaled to the amount of reference product.
- Hydrogen fluoride [air, non-urban air or from high stacks]: 2.3643e-5 kg; name hydrogen_fluoride; = 2.13E-06 * factor_MJ_kWh; lognormal variance with pedigree 0.202, pedigree (5,1,3,1,1)
  (same comment as for Selenium)
- Ethane [air, non-urban air or from high stacks]: 4.551e-7 kg; name ethane; = 4.1E-08 * factor_MJ_kWh; lognormal variance with pedigree 0.078025, pedigree (3,5,4,2,1)
  Based on available literature
  Amount was scaled to the amount of reference product.
- Particulates, < 2.5 um [air, non-urban air or from high stacks]: 0.00048174 kg; name particulates_lt2_5; = 4.34E-05 * factor_MJ_kWh; source Itten R. 2012; lognormal variance with pedigree 0.382, pedigree (5,1,3,1,1)
  (same comment as for SOx retained, in lignite flue gas desulfurisation)
- Nickel [air, non-urban air or from high stacks]: 7.2261e-8 kg; name nickel; = 6.51E-09 * factor_MJ_kWh; lognormal variance with pedigree 0.732, pedigree (5,1,3,1,1)
  (same comment as for Selenium)
- Cadmium [air, non-urban air or from high stacks]: 6.2382e-9 kg; name cadmium; = 5.62E-10 * factor_MJ_kWh; lognormal variance with pedigree 0.732, pedigree (5,1,3,1,1)
  (same comment as for Selenium)
- Hydrogen chloride [air, non-urban air or from high stacks]: 7.326e-5 kg; name hydrogen_chloride; = 6.6E-06 * factor_MJ_kWh; lognormal variance with pedigree 0.202, pedigree (5,1,3,1,1)
  (same comment as for Selenium)
- Benzene [air, non-urban air or from high stacks]: 2.4087e-6 kg; name benzene; = 2.17E-07 * factor_MJ_kWh; lognormal variance with pedigree 0.078025, pedigree (3,5,4,2,1)
  Based on available literature
  Amount was scaled to the amount of reference product.
- Formaldehyde [air, non-urban air or from high stacks]: 6.438e-7 kg; name formaldehyde; = 5.8E-08 * factor_MJ_kWh; lognormal variance with pedigree 0.078025, pedigree (3,5,4,2,1)
  Based on available literature
  Amount was scaled to the amount of reference product.
- PAH, polycyclic aromatic hydrocarbons [air, non-urban air or from high stacks]: 1.11e-8 kg; name pah; = 1E-09 * factor_MJ_kWh; lognormal variance with pedigree 0.338025, pedigree (3,5,4,2,1)
  Based on available literature
  Amount was scaled to the amount of reference product.
- Copper [air, non-urban air or from high stacks]: 2.0202e-8 kg; name copper; = 1.82E-09 * factor_MJ_kWh; lognormal variance with pedigree 0.732, pedigree (5,1,3,1,1)
  (same comment as for Selenium)
- Bromine [air, non-urban air or from high stacks]: 1.1766e-6 kg; name bromine; = 1.06E-07 * factor_MJ_kWh; lognormal variance with pedigree 0.202, pedigree (5,1,3,1,1)
  (same comment as for Selenium)
- Dinitrogen monoxide [air, non-urban air or from high stacks]: 5.55e-6 kg; name dinitrogen_monoxide; = 5E-07 * factor_MJ_kWh; lognormal variance with pedigree 0.072025, pedigree (3,4,4,2,1)
  Based on available literature
  Amount was scaled to the amount of reference product.
- Strontium [air, non-urban air or from high stacks]: 1.3098e-7 kg; name strontium; = 1.18E-08 * factor_MJ_kWh; lognormal variance with pedigree 0.732, pedigree (5,1,3,1,1)
  (same comment as for Selenium)
- Methane, fossil [air, non-urban air or from high stacks]: 1.11e-5 kg; name methane_fossil; = 1E-06 * factor_MJ_kWh; lognormal variance with pedigree 0.072025, pedigree (3,4,4,2,1)
  Based on available literature
  Amount was scaled to the amount of reference product.
- Toluene [air, non-urban air or from high stacks]: 1.2099e-6 kg; name toluene; = 1.09E-07 * factor_MJ_kWh; lognormal variance with pedigree 0.078025, pedigree (3,5,4,2,1)
  Based on available literature
  Amount was scaled to the amount of reference product.
- Iodine [air, non-urban air or from high stacks]: 8.8911e-7 kg; name iodine; = 8.01E-08 * factor_MJ_kWh; lognormal variance with pedigree 0.202, pedigree (5,1,3,1,1)
  (same comment as for Selenium)
- Butane [air, non-urban air or from high stacks]: 2.109e-7 kg; name butane; = 1.9E-08 * factor_MJ_kWh; lognormal variance with pedigree 0.078025, pedigree (3,5,4,2,1)
  Based on available literature
  Amount was scaled to the amount of reference product.
- Hydrocarbons, aliphatic, alkanes, unspecified [air, non-urban air or from high stacks]: 2.4309e-6 kg; name hydrocarbons_al_al_unspec; = 2.19E-07 * factor_MJ_kWh; lognormal variance with pedigree 0.078025, pedigree (3,5,4,2,1)
  Based on available literature
  Amount was scaled to the amount of reference product.
- Pentane [air, non-urban air or from high stacks]: 1.6317e-6 kg; name pentane; = 1.47E-07 * factor_MJ_kWh; lognormal variance with pedigree 0.078025, pedigree (3,5,4,2,1)
  Based on available literature
  Amount was scaled to the amount of reference product.
- Radium-228 [air, non-urban air or from high stacks]: 1.3542e-5 kBq; name radium_228; = 1.22E-06 * factor_MJ_kWh; lognormal variance with pedigree 0.382, pedigree (5,1,3,1,1)
  (same comment as for Selenium)
- Thorium-232 [air, non-urban air or from high stacks]: 1.1433e-5 kBq; name thorium_232; = 1.03E-06 * factor_MJ_kWh; lognormal variance with pedigree 0.382, pedigree (5,1,3,1,1)
  (same comment as for Selenium)
- Mercury [air, non-urban air or from high stacks]: 4.5954e-8 kg; name mercury; = 4.14E-09 * factor_MJ_kWh; lognormal variance with pedigree 0.732, pedigree (5,1,3,1,1)
  (same comment as for Selenium)
- Antimony [air, non-urban air or from high stacks]: 2.1534e-8 kg; name antimony; = 1.94E-09 * factor_MJ_kWh; lognormal variance with pedigree 0.732, pedigree (5,1,3,1,1)
  (same comment as for Selenium)
- Uranium-238 [air, non-urban air or from high stacks]: 3.1746e-5 kBq; name uranium_238; = 2.86E-06 * factor_MJ_kWh; lognormal variance with pedigree 0.382, pedigree (5,1,3,1,1)
  (same comment as for Selenium)
- Radium-226 [air, non-urban air or from high stacks]: 3.8073e-5 kBq; name radium_226; = 3.43E-06 * factor_MJ_kWh; lognormal variance with pedigree 0.382, pedigree (5,1,3,1,1)
  (same comment as for Selenium)
- Lead-210 [air, non-urban air or from high stacks]: 0.00014763 kBq; name lead_210; = 1.33E-05 * factor_MJ_kWh; lognormal variance with pedigree 0.382, pedigree (5,1,3,1,1)
  (same comment as for Selenium)

## Sampling procedure
literature and statistics

## Extrapolations
Most of the exchanges were extrapolated through production-weighted averages of the datasets of the following 10 countries: AT, BA, CZ, DE, ES, FR, HU, PL, SI, SK.

The original data were valid for the burning of 1MJ of lignite. In this dataset, the values are scaled to the net output of 1kWh of electricity, based on the electrical efficiency.

## Review by Carl Vadenbo 2015-06-20
The update of the whole electricity sector for the ecoinvent v3.2 database consist of hundreds of datasets. All these datasets have passed through a streamlined review processes where the underlying modelling of production volumes, technology shares and efficiencies was reviewed in detail prior to the datasets being submitted to the database.
