# treatment of refinery sludge, hazardous waste incineration

Dataset: EcoSpold 2, unit process
Geography: CH
Time period: 1997-01-01 to 2019-12-31
Technology level: current
Classification: ISIC rev.4 ecoinvent: 3822:Treatment and disposal of hazardous waste
Classification: EcoSpold01Categories: waste management/hazardous waste incineration
Tags: ConvertedDataset; Treatment
Scenario: Business-as-Usual
System model: Allocation at the point of substitution
Share of production covered: 39 %
Generated by: Gabor Doka (obsolete)
Published in: Doka G. 2008
Database: ecoinvent
isCopyrightProtected: true
accessRestrictedTo: 1

## General comment
Inventoried waste contains 100% refinery sludge; .
waste composition (wet, in ppm): upper heating value 4.732 MJ/kg; lower heating value 2.453 MJ/kg; H2O 888000; O 1017.1; H 13731; C 86452; S 508.54; N 1017.1; P 478.03; B n.a.; Cl n.a.; Br n.a.; F n.a.; I n.a.; Ag n.a.; As n.a.; Ba n.a.; Cd 10.171; Co 20.342; Cr n.a.; Cu 101.71; Hg 2.0342; Mn n.a.; Mo n.a.; Ni 152.56; Pb 457.69; Sb n.a.; Se n.a.; Sn n.a.; V n.a.; Zn 1017.1; Be n.a.; Sc n.a.; Sr n.a.; Ti n.a.; Tl n.a.; W n.a.; Si n.a.; Fe n.a.; Ca 7000; Al n.a.; K n.a.; Mg n.a.; Na n.a.;
Share of carbon in waste that is biogenic 0%.
Net energy produced in HWI: 17.11MJ/kg electric energy and 1.27MJ/kg thermal energy
Allocation of energy production: no substitution or expansion. 100% of burden allocated to waste disposal function of HWI.
One kg of this waste produces 0.01394 kg of residues, which are landfilled. Additional solidification with 0.005575 kg of cement.
[This dataset was already contained in the ecoinvent database version 2. It was not individually updated during the transfer to ecoinvent version 3. Life Cycle Impact Assessment results may still have changed, as they are affected by changes in the supply chain, i.e. in other datasets. This dataset was generated following the ecoinvent quality guidelines for version 2. It may have been subject to central changes described in the ecoinvent version 3 change report (http://www.ecoinvent.org/database/ecoinvent-version-3/reports-of-changes/), and the results of the central updates were reviewed extensively. The changes added e.g. consistent water flows and other information throughout the database. The documentation of this dataset can be found in the ecoinvent reports of version 2, which are still available via the ecoinvent website. The change report linked above covers all central changes that were made during the conversion process.]

## Included activities end
waste-specific air and water emissions from incineration, auxiliary material consumption for flue gas cleaning. Short-term emissions to river water and long-term emissions to ground water from residual material landfill (from solidified fly ashes and scrubber slugde). Process energy demands for HWI.

## Geography
Specific to the technology encountered in Switzerland in 2000. Well applicable to modern incineration practices in Europe or North America or Japan.

## Technology
Swiss HWI plant in 2000 with wet flue gas scrubber and low-dust SCR DeNOx facility. Gross thermal efficiency 74.4% and gross electric efficiency 10%.

## Time period
Transfer coefficients for modern Swiss MSWI. Emission speciation based on early 90ies data.

## Parameters
- fraction, process water, to air: 1 dimensionless; name fraction_PW_to_air; lognormal variance with pedigree 0.092025, pedigree (4,4,3,2,4)
  Calculated value. During incineration all water incorporated in the products entering the incinerator evaporate to air.

## Reference product
- refinery sludge: -1 kg; By-product classification Waste; CPC 39920: Sewage sludge
  production volume 5.3e7 kg
    2 Swiss HWI plants with a total capacity of 53'000 t/a.
    source: ecoinvent v2
  property price 0 EUR2005
    Waste products are assigned a price of zero as they are assumed to require further treatment.
  property carbon content, fossil 0.767857
    Tab A.6, ecoinvent v2.2 report 13_I. C content has been calculated after data in the tables, and then referred to 1 kg DM
  property carbon content 0.767857
    carbon content on a dry matter basis (reserved; not for manual entry)
  properties: dry mass 0.105 kg, wet mass 1 kg, carbon content, non-fossil 0, water content 8.52381, water in wet mass 0.895 kg, carbon allocation 0.080625 kg

## Inputs from technosphere
- hydrogen peroxide, without water, in 50% solution state: 2.2871e-6 kg; lognormal variance with pedigree 0.79, pedigree (1,1,5,1,1)
  uncertainty calculated from uncertainty in average auxiliary material input, and the unertainty of the waste composition of this waste
  properties: wet mass 1 kg, dry mass 1 kg
- chromium: 2.9725e-8 kg; lognormal variance with pedigree 1.56, pedigree (1,1,5,1,1)
  Proxy for vanadium pentoxide V2O5 in SCR catalyst. uncertainty calculated from uncertainty in average DeNOx input, uncertainty in the share of thermal NOx, uncertainty of nitrogen content in average municipal waste and the unertainty in nitrogen content in *this* waste.
  properties: dry mass 1 kg, wet mass 1 kg
- calcium chloride: 0.0016576 kg; lognormal variance with pedigree 0.83, pedigree (1,1,5,1,1)
  (same comment as for hydrogen peroxide, without water, in 50% solution state)
  properties: dry mass 1 kg, wet mass 1 kg
- process-specific burdens, hazardous waste incineration plant: 1 kg; lognormal variance with pedigree 0.04, pedigree (1,1,5,1,1)
  demands per kilogram waste. uncertainty is heeded in the module;activityLink introduced to establish a direct link to the corresponding regional supply of this product
- chemical, inorganic: 3.423e-5 kg; lognormal variance with pedigree 0.29, pedigree (1,1,5,1,1)
  Proxy for Polyelectrolyte. uncertainty calculated from uncertainty in average auxiliary material input, and the unertainty of the waste composition of this waste
  properties: dry mass 1 kg, carbon content, fossil 0.003, wet mass 1 kg
  note on carbon content, fossil: This dataset is an unweighted average of 20 inorganic substances (listed in Tab 88.1, ecoinvent v2.2 report 8, part II), being part of the top100 chemicals included in this database. The C-content has also been calculated as an unweighted average of the C content of the substances composing this dataset.
- hazardous waste incineration facility: 1.25e-9 unit; lognormal variance with pedigree 0.04, pedigree (1,1,5,1,1)
  demands per kilogram waste. uncertainty is heeded in the module
  This exchange has an activity link directly to the producing activity because the product is primarily consumed in the same geographical area where it is produced.
- residual material landfill: 2.9036e-11 unit; lognormal variance with pedigree 0.23, pedigree (1,1,5,1,1)
  uncertainty is calculated from uncertainties in waste composition and transfer coefficients in incinerator
- heat, central or small-scale, other than natural gas: 19.3142 MJ; lognormal variance with pedigree 0.09, pedigree (1,1,5,1,1)
  Uncertainty dependent on total energy required and heating value present, using experimental GSd for substraction from uc=A*GSDa^2-B
- waste cement, hydrated: -0.013937 kg; lognormal variance with pedigree 0.24, pedigree (1,1,5,1,1)
  Hydrated cement for solidification of landfilled residual material. Uncertainty calculated from unertainty of the waste composition of this waste and transfer coefficients in the incinerator and of the solidification recipe.
  production volume 738661 kg
    Calculated from the production volume of refinery sludge, 89.5% water in proportion to the respective output amounts.
  properties: wet mass 1 kg, dry mass 1 kg
- heat, district or industrial, natural gas: 0.0181062 MJ; lognormal variance with pedigree 1.28, pedigree (1,1,5,1,1)
  uncertainty calculated from uncertainty in average DeNOx input, uncertainty in the share of thermal NOx, uncertainty of nitrogen content in average municipal waste and the unertainty in nitrogen content in *this* waste.
- process-specific burdens, residual material landfill: 0.013937 kg; lognormal variance with pedigree 0.23, pedigree (1,1,5,1,1)
  uncertainty is calculated from uncertainties in waste composition and transfer coefficients in incinerator;activityLink introduced to establish a direct link to the corresponding regional supply of this product
- hydrochloric acid, without water, in 30% solution state: 2.0538e-5 kg; lognormal variance with pedigree 0.29, pedigree (1,1,5,1,1)
  (same comment as for hydrogen peroxide, without water, in 50% solution state)
  properties: wet mass 1 kg, dry mass 1 kg
- titanium dioxide: 1.4565e-6 kg; lognormal variance with pedigree 1.56, pedigree (1,1,5,1,1)
  (same comment as for heat, district or industrial, natural gas)
  properties: wet mass 1 kg, dry mass 1 kg
- ammonia, liquid: 3.7092e-5 kg; lognormal variance with pedigree 1.18, pedigree (1,1,5,1,1)
  (same comment as for heat, district or industrial, natural gas)
  properties: wet mass 1 kg, dry mass 1 kg
- chemical, organic: 7.1663e-5 kg; lognormal variance with pedigree 1.21, pedigree (1,1,5,1,1)
  Proxy for TMT15. uncertainty calculated from uncertainty in average auxiliary material input, and the unertainty of the waste composition of this waste
  properties: wet mass 1 kg, carbon content, fossil 0.628, dry mass 1 kg
  note on carbon content, fossil: This dataset is an unweighted average of 20 organic substances (listed in Tab 88.1, ecoinvent v2.2 report 8, part II), being part of the top100 chemicals included in this database. The C-content has also been calculated as an unweighted average of the C content of the substances composing this dataset.
- quicklime, milled, packed: 0.00033708 kg; lognormal variance with pedigree 0.55, pedigree (1,1,5,1,1)
  (same comment as for hydrogen peroxide, without water, in 50% solution state)
  properties: wet mass 1 kg, water content 0.010101, dry mass 0.99 kg
- cement, unspecified: 0.0055749 kg; lognormal variance with pedigree 0.24, pedigree (1,1,5,1,1)
  Cement for solidification of landfilled residual material. Uncertainty calculated from unertainty of the waste composition of this waste, of transfer coefficients in the incinerator and of the solidification recipe.
  properties: dry mass 1 kg, wet mass 1 kg
- iron (III) chloride, without water, in 40% solution state: 0.0010207 kg; lognormal variance with pedigree 0.41, pedigree (1,1,5,1,1)
  (same comment as for hydrogen peroxide, without water, in 50% solution state)
  properties: dry mass 1 kg, wet mass 1 kg
- sodium hydroxide, without water, in 50% solution state: 0.0024646 kg; lognormal variance with pedigree 0.49, pedigree (1,1,5,1,1)
  (same comment as for hydrogen peroxide, without water, in 50% solution state)
  properties: dry mass 1 kg, wet mass 1 kg

## Emissions to nature
- Phosphate [water, surface water]: 2.2951e-5 kg; lognormal variance with pedigree 0.77, pedigree (1,1,5,1,1)
  uncertainty is calculated from uncertainties in waste composition and transfer coefficients in incinerator and landfills
- Nickel [air, urban air close to ground]: 1.0679e-7 kg; lognormal variance with pedigree 0.97, pedigree (1,1,5,1,1)
  (same comment as for residual material landfill)
- DOC, Dissolved Organic Carbon [water, surface water]: 1.9005e-6 kg; lognormal variance with pedigree 0.43, pedigree (1,1,5,1,1)
  (same comment as for Phosphate)
- Mercury [water, ground-, long-term]: 9.5011e-8 kg; lognormal variance with pedigree 3.85, pedigree (1,1,5,1,1)
  Long-term emissions from landfilling of incineration residues. uncertainty is calculated from uncertainties in waste composition and transfer coefficients in incinerator and landfills.
- BOD5, Biological Oxygen Demand [water, ground-, long-term]: 0.0014046 kg; lognormal variance with pedigree 0.23, pedigree (1,1,5,1,1)
  (same comment as for Mercury)
- TOC, Total Organic Carbon [water, ground-, long-term]: 0.00061451 kg; lognormal variance with pedigree 0.23, pedigree (1,1,5,1,1)
  (same comment as for Mercury)
- Cobalt [air, urban air close to ground]: 1.4239e-8 kg; lognormal variance with pedigree 1.24, pedigree (1,1,5,1,1)
  (same comment as for residual material landfill)
- Phosphorus [air, urban air close to ground]: 3.3462e-7 kg; lognormal variance with pedigree 0.82, pedigree (1,1,5,1,1)
  (same comment as for residual material landfill)
- BOD5, Biological Oxygen Demand [water, surface water]: 4.344e-6 kg; lognormal variance with pedigree 0.43, pedigree (1,1,5,1,1)
  (same comment as for Phosphate)
- Nitrate [water, surface water]: 1.301e-5 kg; lognormal variance with pedigree 0.5, pedigree (1,1,5,1,1)
  (same comment as for Phosphate)
- Phosphate [water, ground-, long-term]: 0.00032222 kg; lognormal variance with pedigree 1.36, pedigree (1,1,5,1,1)
  (same comment as for Mercury)
- Copper, ion [water, ground-, long-term]: 3.7445e-6 kg; lognormal variance with pedigree 3.65, pedigree (1,1,5,1,1)
  (same comment as for Mercury)
- Cobalt [water, surface water]: 2.0327e-5 kg; lognormal variance with pedigree 1.21, pedigree (1,1,5,1,1)
  (same comment as for Phosphate)
- Copper [air, urban air close to ground]: 7.1196e-8 kg; lognormal variance with pedigree 1.02, pedigree (1,1,5,1,1)
  (same comment as for residual material landfill)
- Carbon dioxide, fossil [air, urban air close to ground]: 0.31347 kg; lognormal variance with pedigree 0.17, pedigree (1,1,5,1,1)
  calculated from uncertainty in carbon in waste and transfer coefficients
- DOC, Dissolved Organic Carbon [water, ground-, long-term]: 0.00061451 kg; lognormal variance with pedigree 0.23, pedigree (1,1,5,1,1)
  (same comment as for Mercury)
- Calcium, ion [water, surface water]: 1.0542e-6 kg; lognormal variance with pedigree 1.35, pedigree (1,1,5,1,1)
  (same comment as for Phosphate)
- Cadmium, ion [water, ground-, long-term]: 6.9015e-8 kg; lognormal variance with pedigree 7.54, pedigree (1,1,5,1,1)
  (same comment as for Mercury)
- Lead [air, urban air close to ground]: 1.6989e-8 kg; lognormal variance with pedigree 0.84, pedigree (1,1,5,1,1)
  (same comment as for residual material landfill)
- Mercury [air, urban air close to ground]: 7.0255e-14 kg; lognormal variance with pedigree 1.62, pedigree (1,1,5,1,1)
  (same comment as for residual material landfill)
- Sulfate [water, surface water]: 0.0014664 kg; lognormal variance with pedigree 0.78, pedigree (1,1,5,1,1)
  (same comment as for Phosphate)
- COD, Chemical Oxygen Demand [water, surface water]: 4.344e-6 kg; lognormal variance with pedigree 0.43, pedigree (1,1,5,1,1)
  (same comment as for Phosphate)
- Nitrogen oxides [air, urban air close to ground]: 2.6153e-5 kg; lognormal variance with pedigree 1.22, pedigree (1,1,5,1,1)
  uncertainty calculated from uncertainty in average N-emissions, uncertainty in the share of thermal NOx, uncertainty of nitrogen content in average municipal waste and the unertainty in nitrogen content in *this* waste.
- Zinc, ion [water, ground-, long-term]: 1.229e-5 kg; lognormal variance with pedigree 5.54, pedigree (1,1,5,1,1)
  (same comment as for Mercury)
- Sulfur dioxide [air, urban air close to ground]: 6.1025e-7 kg; lognormal variance with pedigree 0.81, pedigree (1,1,5,1,1)
  (same comment as for residual material landfill)
- Dinitrogen monoxide [air, urban air close to ground]: 3.6212e-6 kg; lognormal variance with pedigree 1.31, pedigree (5,5,5,5,5)
  uncertainty calculated from uncertainty for proxy (from MSWI), uncertainty in average N-emissions, uncertainty in the share of thermal NOx, uncertainty of nitrogen content in average municipal waste and the unertainty in nitrogen content in *this* waste.
- Calcium [air, urban air close to ground]: 1.1669e-5 kg; lognormal variance with pedigree 0.47, pedigree (1,1,5,1,1)
  (same comment as for residual material landfill)
- Copper, ion [water, surface water]: 4.3695e-6 kg; lognormal variance with pedigree 1, pedigree (1,1,5,1,1)
  (same comment as for Phosphate)
- Water [air, unspecified]: 0.000895 m3; name water_to_air_unspecified; lognormal variance with pedigree 0.0807, pedigree (2,2,5,1,1)
  Calculated value based on water balance.
  property wet mass 1000 kg; name WM
  property carbon content, fossil 0; name C_content_fossil
  property fraction, origin: fresh water 0; name fraction_origin_fresh_water
  property water in wet mass 1000 kg; name WWM
  property dry mass 0 kg; name DM
  property carbon content, non-fossil 0; name C_content_non_fossil
  property fraction, origin: salt water 0; name fraction_origin_salt_water
  property fraction, origin: unspecified 1; name fraction_origin_unspecified
- Mercury [water, surface water]: 2.1448e-8 kg; lognormal variance with pedigree 1.51, pedigree (1,1,5,1,1)
  (same comment as for Phosphate)
- Cadmium, ion [water, surface water]: 4.5959e-9 kg; lognormal variance with pedigree 1.27, pedigree (1,1,5,1,1)
  (same comment as for Phosphate)
- Lead [water, surface water]: 1.2458e-8 kg; lognormal variance with pedigree 1.07, pedigree (1,1,5,1,1)
  (same comment as for Phosphate)
- Zinc [air, urban air close to ground]: 7.1196e-7 kg; lognormal variance with pedigree 0.72, pedigree (1,1,5,1,1)
  (same comment as for residual material landfill)
- Cadmium [air, urban air close to ground]: 5.6009e-10 kg; lognormal variance with pedigree 1.34, pedigree (1,1,5,1,1)
  (same comment as for residual material landfill)
- Carbon monoxide, fossil [air, urban air close to ground]: 1.2076e-5 kg; lognormal variance with pedigree 0.71, pedigree (1,4,5,1,3)
  1 plant for waste solvent incineration in Switzerland
- Sulfate [water, ground-, long-term]: 5.8291e-5 kg; lognormal variance with pedigree 0.79, pedigree (1,1,5,1,1)
  (same comment as for Mercury)
- Zinc, ion [water, surface water]: 1.3649e-5 kg; lognormal variance with pedigree 0.7, pedigree (1,1,5,1,1)
  (same comment as for Phosphate)
- Lead [water, ground-, long-term]: 2.3739e-6 kg; lognormal variance with pedigree 7.72, pedigree (1,1,5,1,1)
  (same comment as for Mercury)
- Nickel, ion [water, ground-, long-term]: 4.39e-5 kg; lognormal variance with pedigree 1.2, pedigree (1,1,5,1,1)
  (same comment as for Mercury)
- TOC, Total Organic Carbon [water, surface water]: 1.9005e-6 kg; lognormal variance with pedigree 0.43, pedigree (1,1,5,1,1)
  (same comment as for Phosphate)
- Cyanide [air, urban air close to ground]: 9.0531e-7 kg; lognormal variance with pedigree 1.31, pedigree (5,5,5,5,5)
  (same comment as for Dinitrogen monoxide)
- Nickel, ion [water, surface water]: 3.1272e-5 kg; lognormal variance with pedigree 0.94, pedigree (1,1,5,1,1)
  (same comment as for Phosphate)
- Ammonia [air, urban air close to ground]: 1.0059e-6 kg; lognormal variance with pedigree 1.22, pedigree (1,1,5,1,1)
  (same comment as for Nitrogen oxides)
- Calcium, ion [water, ground-, long-term]: 0.00063145 kg; lognormal variance with pedigree 1.89, pedigree (1,1,5,1,1)
  (same comment as for Mercury)
- COD, Chemical Oxygen Demand [water, ground-, long-term]: 0.0014046 kg; lognormal variance with pedigree 0.23, pedigree (1,1,5,1,1)
  (same comment as for Mercury)
- Nitrate [water, ground-, long-term]: 3.6537e-5 kg; lognormal variance with pedigree 0.71, pedigree (1,1,5,1,1)
  (same comment as for Mercury)

## Sampling procedure
The 2 Swiss HWI plants, used as the inventory reference technology mix, have a total annual capacity of 53'000 tons of hazardous waste. This corresponds to 39% of the Swiss total installed capacity in 2000. Swiss average plants size is 20'000 t/a.

## Extrapolations
This dataset has been extrapolated from year 2000 to the year of the calculation (2019). The uncertainty has been adjusted accordingly.

## Review by Niels Jungbluth 2009-01-22
passed.
