# receiver system construction, solar tower power plant, 20 MW

Dataset: EcoSpold 2, unit process
Geography: RoW
Time period: 2010-01-01 to 2020-01-01
Technology level: current
Classification: ISIC rev.4 ecoinvent: 4220a: Construction of utility projects for electricity production, except for liquid fuels
Tags: Concentrated Solar Power; CSP
Scenario: Business-as-Usual
System model: Allocation at the point of substitution
Generated by: Karin Treyer
Published in: Telsnig, Thomas 2015
Database: ecoinvent
isCopyrightProtected: true
accessRestrictedTo: 1

## General comment
The activity represents the construction of the receiver tower for a concentrated solar tower plant in Upington, South Africa. The sunlight transferred from the heliostats strikes the top of the tower. It is here that temperatures rises up close to 1000°C. The present modelling of the receiver system includes pumps, which promote the cold salt melt to the receiver. The receiver component itself consists largely of a nickel-chromium alloy in order to be able to withstand the high temperatures during operation.
This dataset is entirely based on the detailed life cycle inventory as presented in the dissertation report by
Telsnig, Thomas. 2015. Standortabhängige Analyse und Bewertung solarthermischer Kraftwerke am Beispiel Südafrikas. Forschungsbericht. Band 123. ISSN 0938-1228. Institut für Energiewirtschaft und Rationelle Energieanwendung, Universität Stuttgart, Germany.

## Included activities start
The activity begins with the construction of the tower and its absorbers, pumps for using molten salts for heat transfer.
Total land use for the CSP plant is accounted for in the dataset concentrated solar power plant construction, solar tower, 20 MW".

## Included activities end
The activity concludes with the completion of operation of the receiver systems and is then sent disposal

## Geography
This dataset has been extrapolated from a dataset modelled for the location Upington, South Africa. Uncertainty has not been adjusted as it is assumed that the modelled 20 MW solar tower power plant would be very similar in other parts of the world.

## Technology
Cold Salt Pump (Extended shaft turbine, 4 stage, 6,000gpm, 1584 lb/sec, 1260 ft total developed head, 4500bhp motor variable speed drive

Heat Transport Fluid Pumps-Horizontal, multi-stage 17000 gpm, 715 ft tdh, 3500 bhp electric motor, Variable speed drive, CS impeller and bowl

Nitrate Salt Reciever: 910 MWt, external Cylinder, nickel alloy steel tubes and headers, 20m dia x 25m absorber height, 2 flow circuits, 12 passes per circuit, includes inlet and outlet vessels, piping, valves, insulation, heat tracing, installation and checkout
.

## Reference product
- receiver system, solar tower power plant, 20 MW: 1 unit; By-product classification allocatable product; CPC 53262: Power plants; pedigree (1,1,1,1,1)
  Reference product unit for construction of receiver system in solar tower, 20 mega watt plant
  production volume 1 unit
    Data about concentrating solar power plants in operation, construction and development globally are available from SolarPACES (https://solarpaces.nrel.gov/, accessed April 2019). On average 2 solar tower concentrating solar power plants per year went in operation worldwide between 2010 and 2019. This includes plants with an installed capacity other than 20MW and is used as approximate annual production volume for this dataset.
  property price 3.4e7 EUR2005
    Telsnig 2015: Investment cost for the receiver system of a 20MW CSP solar tower plant in South Africa (EUR2010) with limited storage capacity (see Table 4-4 in Telsnig, 2015).
    Reference(s): Telsnig, Thomas. 2015. Standortabhängige Analyse und Bewertung solarthermischer Kraftwerke am Beispiel Südafrikas. Forschungsbericht. Band 123. ISSN 0938-1228. Institut für Energiewirtschaft und Rationelle Energieanwendung, Universität Stuttgart, Germany.
  property lifetime 30 year
    The economic lifetime of the plant is assumed to be 30 years.
  property true value 3.4e7
    allocation property applied in "true value" allocation // value calculated from revenue

## By-products
- electricity, for reuse in municipal waste incineration only: 0 kWh; CPC 17100: Electrical energy; By-product classification allocatable product; pedigree (1,1,1,1,1)
  Net electricity generated from this waste and used in internal MSWI plant energy redistribution.
  Uncertainty: uncertainty is calculated from uncertainties in waste composition and uncertainties in energy efficiency and the uncertainty in internal energy demand
  production volume 0.324923 kWh
  property exergy 3.6 MJ; name E_el_prod_MSWI_exergy
    This exergy property is based on the exergy content of the product.
  property true value relation 3.6; name E_el_prod_MSWI_true_value_relation
    property to calculate "true value" from
  property price 0.1 EUR2005; name E_el_prod_MSWI_price_EUR2005
    Estimated to be the same price as in case of electricity, medium voltage.
  property true value 0.0415948
    allocation property applied in "true value" allocation // value calculated from true value relation
- heat, for reuse in municipal waste incineration only: 0 MJ; CPC 17300: Steam and hot water; By-product classification allocatable product; pedigree (1,1,1,1,1)
  Net useful heat generated from this waste and used in internal MSWI plant energy redistribution.
  Uncertainty: uncertainty is calculated from uncertainties in waste composition and uncertainties in energy efficiency and the uncertainty in internal energy demand
  production volume 2.29897 MJ
  property true value relation 0.1842; name E_th_prod_MSWI_true_value_relation
    property to calculate "true value" from
  property exergy 0.1842 MJ; name E_th_prod_MSWI_exergy
    This exergy property is based on the exergy content of the product.
  property price 0.0106 EUR2005; name E_th_prod_MSWI_price_EUR2005
    Average European district heat price from Ecoheatcool and Euroheat 2005-2006, Ecoheat Work package 1: The European heat market. Final report. 10.6 EUR/GJ i s the price of district heat. http://www.solarthermalworld.org/files/Ecoheatcool%20WP1%20Web.pdf?download
  property true value 0.0150578
    (same comment as for electricity, for reuse in municipal waste incineration only)
- zinc concentrate: 0 kg; CPC 14290: Other non-ferrous metal ores and concentrates (other than uranium or thorium ores and concentrates); By-product classification allocatable product
  Calculated value from the knowledge of the properties of both products.
  production volume 5.72515e-5 kg
  property price 0.38 EUR2005; name ByP_price_EUR2005
    Temporary price data. Calculated as 90% of purchasers price based on: Zinc content in concentrate 53%. Concentrate price per kg Zn 86.5% of refined Zn price (13.5% treatment charges according to CHR Metals Limited 2005: Dynamic cost curves. http://www.minecost.com/dynamic.pdf). 2004 zinc price from USGS (2007) Mineral commodity summaries 2007. <http://minerals.usgs.gov/minerals/pubs/mcs/2007/mcs2007.pdf> [Accessed 25 May 2010]
  property zinc content 0.53; name zinc_C_zinc_concentrate
    Zinc content on a dry matter basis. Value taken from teh "zinc mine operation" /GLO dataset.
  property dry mass 1 kg; name DM_zinc_concentrate
  property carbon content 0
    carbon content on a dry matter basis (reserved; not for manual entry)
  property true value 2.17251e-5
    allocation property applied in "true value" allocation // value calculated from revenue
  properties: wet mass 1 kg, water content 0, carbon content, non-fossil 0, carbon content, fossil 0, water in wet mass 0 kg, carbon allocation 0 kg
- copper: 0 kg; source Rentz O. 1999; By-product classification allocatable product; CPC 41413: Refined copper and copper alloys, unwrought; master alloys of copper
  Literature value. Copper uses: Before end-use copper is manufactured into semi fabricated products, such as shapes and ingots (known as 'semis'). These manufacturing processes are subdivided into hot working, cold working and, if necessary, process annealing. Few of the semis are ready for use as such. They more typically travel to first-stage manufacturers, who make metal rods, wire, and casting, and then to component manufacturers who produce such things as motors, valves, and insulated cables The components in turn are incorporated by final-stage manufacturers into a variety of finished products - automobiles, commercial buildings, residential housing, and so forth. These uses account for about 79% of the world-wide consumption of copper.
  production volume 202.092 kg
  properties: dry mass 1 kg, water in wet mass 0 kg, wet mass 1 kg, carbon content, non-fossil 0, water content 0, price 5.52 EUR2005, carbon content, fossil 0, carbon content 0, carbon allocation 0 kg, true value 557.773
- iron scrap, sorted, pressed: 0 kg; By-product classification Recyclable; CPC 39310: Slag, dross, scalings and other waste from the manufacture of iron or steel; pedigree (1,1,1,1,1)
  Iron scrap recovered from this waste.
  Uncertainty: uncertainty calculated from uncertainty in waste composition, uncertainty of share of recyclable metal, uncertainty of transfer coefficient to bottom ash, uncertainty of the efficiency of scrap removal in MSWI plant.
  production volume 37097.8 kg
  property price 0.175 EUR2005
    Temporary price data. Calculated as 90% of purchasers price based on: 2005 import and export prices (total trades (USD) divided by total weight (kg) in biggest economies of the world: EU27, USA, Brasil, China, India, Japan and Russia) from UN Commodity Trade Statistics Database (http://data.un.org/Explorer.aspxDatabase [Accessed 2011.06.20]). Commodity: Waste or scrap, of cast iron
  property carbon content 0
    carbon content on a dry matter basis (reserved; not for manual entry)
  property true value 87.9777
    allocation property applied in "true value" allocation // value calculated from revenue
  properties: wet mass 1 kg, water in wet mass 0 kg, carbon content, non-fossil 0, carbon content, fossil 0, dry mass 1 kg, water content 0, carbon allocation 0 kg

## Inputs from technosphere
- concrete, normal: 0 m3; name concrete; pedigree (1,1,1,1,1)
  Concrete used for tower foundation and to embed metals
  properties: water content 0.086758, wet mass 2380 kg, dry mass 2190 kg
- tap water: 0 kg; name water; pedigree (1,1,1,1,1)
  Used in the manufacturing process of pumps.
  properties: water content 2962.17, dry mass 0.000337476 kg, carbon content, fossil 0.00178991, wet mass 1 kg
  note on carbon content, fossil: Bicarbonate content is 2.93 mol/m3. CO2 content is 0.1 mol/m3 (ecoinvent v2.2 report 8, Tab 93.1).
- scrap copper: 0 kg; pedigree (1,1,1,1,1)
  Copper disposed by municipal incineration
  production volume 0 kg
    Calculated from production volume of reference product using the relative outputs.
  properties: dry mass 1 kg, wet mass 1 kg
- excavation, hydraulic digger: 1663.97 m3; lognormal variance with pedigree 0.0137, pedigree (4,4,3,3,2)
  Excavation and backfilling. The digger is a removable unit. All the soil dislocated for initial construction is put back. Hence no end of life calculation is needed.
- copper: 426.992 kg; lognormal variance with pedigree 0.0137, pedigree (4,4,3,3,2)
  Copper supplied for field wiring purposes
  properties: dry mass 1 kg, wet mass 1 kg
- steel, chromium steel 18/8, hot rolled: 2115.96 kg; name chromesteel; lognormal variance with pedigree 0.0137, pedigree (4,4,3,3,2)
  Material component in pumps
  properties: wet mass 1 kg, dry mass 1 kg, carbon content, fossil 0.0008
  note on carbon content, fossil: Stainless steel model is the grade 304 steel (18/8 stainless, 18% chromium 8% nickel; max. 0.08% C)
- cast iron: 26539.5 kg; name castiron; lognormal variance with pedigree 0.0137, pedigree (4,4,3,3,2)
  Material component in pumps and valves
  properties: carbon content, fossil 0.04, dry mass 1 kg, wet mass 1 kg
  note on carbon content, fossil: Cast iron is made by remelting pig iron in small furnaces (e.g. cupola furnaces or electric arc furnaces) and poured into moulds to make castings. It usually contains 2% to 6% carbon (ecoinvent v2.2 report 10_partII). An average content of 4% was considered
- wire drawing, copper: 426.992 kg; lognormal variance with pedigree 0.0137, pedigree (4,4,3,3,2)
  Parts of the copper input are used to draw wires for field wiring, cables etc from available copper
- reinforcing steel: 1.36206e6 kg; name steel; lognormal variance with pedigree 0.0137, pedigree (4,4,3,3,2)
  Key material component used for drawing of pipes, structural steel etc
  properties: dry mass 1 kg, wet mass 1 kg, carbon content, fossil 0.004
- iron-nickel-chromium alloy: 274052 kg; name alloy; lognormal variance with pedigree 0.0137, pedigree (4,4,3,3,2)
  Main component for construction of the tower including all electrical applications
  properties: wet mass 1 kg, dry mass 1 kg
- waste concrete: 0 kg; pedigree (1,1,1,1,1)
  Disposal of concrete. The density is assumed to be 2200kg/m3.
  production volume 0 kg
    Calculated from production volume of reference product using the relative outputs.
  properties: wet mass 1 kg, water content 1, dry mass 0.5 kg
- drawing of pipe, steel: 876785 kg; lognormal variance with pedigree 0.0137, pedigree (4,4,3,3,2)
  Process done to draw pipes made of steel
- silicone product: 1147.98 kg; name silicone_product; lognormal variance with pedigree 0.0137, pedigree (4,4,3,3,2)
  Used in pumps for prevention of mositure entry
  properties: carbon content, fossil 0.324324, wet mass 1 kg, dry mass 1 kg
- waste reinforcement steel: 0 kg; pedigree (1,1,1,1,1)
  All steel masses combined with cast iron and iron nickel chromium alloy
  production volume 0 kg
    Calculated from production volume of reference product using the relative outputs.
  properties: dry mass 1 kg, wet mass 1 kg
- transformer, high voltage use: 1131.98 kg; lognormal variance with pedigree 0.0137, pedigree (4,4,3,3,2)
  Transformer setup including substations and primary power distribution sources.
  properties: carbon content, fossil 0.262798, wet mass 1 kg, dry mass 1 kg
- steel, low-alloyed: 5998.89 kg; name lowsteel; lognormal variance with pedigree 0.0137, pedigree (4,4,3,3,2)
  Material component in structural steel
  properties: carbon content, fossil 0.005, wet mass 1 kg, dry mass 1 kg
- tin plated chromium steel sheet, 2 mm: 16.9997 m2; lognormal variance with pedigree 0.0137, pedigree (4,4,3,3,2)
  Construction of deck plate as part of structural steel
  properties: dry mass 15.6365 kg, wet mass 15.6365 kg
- welding, arc, steel: 3646.93 m; lognormal variance with pedigree 0.0137, pedigree (4,4,3,3,2)
  Part of the reinforced steel is used for welding through arc welding process
- hazardous waste, for incineration: 0 kg; pedigree (1,1,1,1,1)
  Disposal of the oil used for the initial filling and during operation of the pumps and transformers. Calculated based on the environmental product declarations for pumps as provided by Sulzer and for transformers as provided by ABB.
  Sulzer EPDs: https://www.sulzer.com/en/shared/about-us/2017/08/10/13/22/environmental-product-declarations (accessed May 2019)
  ABB library: https://library.abb.com/en/ (accessed May 2019)
  production volume 0 kg
    Calculated from production volume of reference product using the relative outputs.
  properties: carbon content, fossil 0.554667, wet mass 1 kg, water content 0.333333, dry mass 0.75 kg
  note on carbon content, fossil: Tab A.6, ecoinvent v2.2 report 13_I. C content has been calculated after data in the tables, and then referred to 1 kg DM
- expanded perlite: 590810 kg; name expandedperilite; lognormal variance with pedigree 0.0137, pedigree (4,4,3,3,2)
  Insulation in pipes
  properties: wet mass 1 kg, dry mass 1 kg
- metal working, average for metal product manufacturing: 42547.2 kg; lognormal variance with pedigree 0.0137, pedigree (4,4,3,3,2)
  Part of the iron nickel chromium alloy is being used to set up the nitrate salt receiver.
- particle board, cement bonded: 144.997 m3; lognormal variance with pedigree 0.0137, pedigree (4,4,3,3,2)
  Used in pumps to prevent leakage
  properties: water content 0.0197355, dry mass 1176.78 kg, wet mass 1200 kg, carbon content, non-fossil 0.139276, carbon content, fossil 0.0240148
- wastewater, unpolluted: -13.2827 m3; = (water/1000)*-1; lognormal variance with pedigree 0.0137, pedigree (4,4,3,3,2)
  The amount of tap water input stems from the water consumption reported in the EPDs of the modelled pumps (Sulzer EPDs). It is stated in the EPDs that the water is used for testing purposes. Therefore, it is assumed to be discharged to the sewer system without pollution. Sulzer EPDs: https://www.sulzer.com/en/shared/about-us/2017/08/10/13/22/environmental-product-declarations (accessed May 2019)
  production volume 13.283 m3; = Ref('83732bd9-7370-495b-a40c-466f1f07de88', 'ProductionVolume') * ((Ref('c7c047ec-ba27-4457-8ba9-eb202f76eb84')*-1) / Ref('83732bd9-7370-495b-a40c-466f1f07de88'))
    Calculated from production volume of reference product using the relative outputs.
  properties: wet mass 1000 kg, dry mass 0.337476 kg, carbon content, non-fossil 0.00178991, carbon content, fossil 0.00178991, water content 2962.17
  note on carbon content, fossil: Assumed to be like in tap water. Bicarbonate content is 2.93 mol/m3. CO2 content is 0.1 mol/m3 (ecoinvent v2.2 report 8, Tab 93.1).
- concrete, normal: 1.75015, 58.092, 6.05311, 49.0042, 27.5649, 116.729, 2268.76 m3 (7 entries); lognormal variance with pedigree 0.0137, pedigree (4,4,3,3,2)
  Concrete used for tower foundation and to embed metals
- tap water: 14.9797, 5334.37, 124.444, 24.7564, 624.258, 16.2399, 7143.7 kg (7 entries); lognormal variance with pedigree 0.0137, pedigree (4,4,3,3,2)
  Used in the manufacturing process of pumps.
- scrap copper: -19.1357, -407.856 kg (2 entries); lognormal variance with pedigree 0.0137, pedigree (4,4,3,3,2)
  Copper disposed by municipal incineration
  production volume 427 kg
- waste concrete: -21675.5, -6.13063e6 kg (2 entries); lognormal variance with pedigree 0.0137, pedigree (4,4,3,3,2)
  Disposal of concrete. The density is assumed to be 2200kg/m3.
  production volume 6.15242e6 kg
- waste reinforcement steel: -1159.3, -1.66961e6 kg (2 entries); lognormal variance with pedigree 0.0137, pedigree (4,4,3,3,2)
  All steel masses combined with cast iron and iron nickel chromium alloy
  production volume 3.34159e6 kg
- hazardous waste, for incineration: -29.2431, -1118.74 kg (2 entries); lognormal variance with pedigree 0.0137, pedigree (4,4,3,3,2)
  (same comment as for hazardous waste, for incineration)
  production volume 1148 kg

## Sampling procedure
This dataset is entirely based on the detailed life cycle inventory as presented in the dissertation report by
Telsnig, Thomas. 2015. Standortabhängige Analyse und Bewertung solarthermischer Kraftwerke am Beispiel Südafrikas. Forschungsbericht. Band 123. ISSN 0938-1228. Institut für Energiewirtschaft und Rationelle Energieanwendung, Universität Stuttgart, Germany.

Further, data in Telsnig 2015 are not shown explicitely for the downscaled 20 MW solar tower power plant. This gap is filled in the ecoinvent report.

## Extrapolations
This dataset has been extrapolated from a dataset modelled for the location Upington, South Africa. The original data modelling a 440 MW power plant have been scaled down with parameter specific linear and non-linear equations to represent a 20 MW plant design. Uncertainty has not been adjusted as it is assumed that the modelled 20 MW solar tower power plant would be very similar in other parts of the world.

## Review by Christopher Oberschelp 2017-03-13
Very detailed, structured and well-documented datasets. Main exchanges have been checked and make sense.
