# refractory production, high aluminium oxide, packed

Dataset: EcoSpold 2, unit process
Geography: DE
Time period: 1999-01-01 to 2019-12-31
Technology level: current
Classification: ISIC rev.4 ecoinvent: 2391:Manufacture of refractory products
Classification: EcoSpold01Categories: construction materials/bricks
Tags: ConvertedDataset
Scenario: Business-as-Usual
System model: Allocation at the point of substitution
Generated by: Tina Künniger
Published in: Kellenberger D. 2004
Database: ecoinvent
isCopyrightProtected: true
accessRestrictedTo: 1

## General comment
This dataset represents the production of 1 kg of refractory high aluminium oxide bricks.
[This dataset was already contained in the ecoinvent database version 2. It was not individually updated during the transfer to ecoinvent version 3. Life Cycle Impact Assessment results may still have changed, as they are affected by changes in the supply chain, i.e. in other datasets. This dataset was generated following the ecoinvent quality guidelines for version 2. It may have been subject to central changes described in the ecoinvent version 3 change report (http://www.ecoinvent.org/database/ecoinvent-version-3/reports-of-changes/), and the results of the central updates were reviewed extensively. The changes added e.g. consistent water flows and other information throughout the database. The documentation of this dataset can be found in the ecoinvent reports of version 2, which are still available via the ecoinvent website. The change report linked above covers all central changes that were made during the conversion process.]

## Included activities start
From bauxite and clay, at the factory gate.

## Included activities end
The activity ends with the packed product, at factory. This dataset includes the whole manufacturing process, internal processes (transport, etc.), packing and infrastructure. This dataset doesn't include the administration.

## Geography
Data was obtained from a German company.

## Technology
The typical German technology for refractory fireclay production.
For the production of one ton of high aluminium oxide refractory 1.1 ton of bauxite (95%) and clay (5%) are required. The raw materials are fractionated in different coarse size groups and one or several flour components. The grains and flours are mixed in a certain share and a fixing agent (lime milk) is added. The mixture is pressed to bricks, which are baked at 1200 to 1800°C.

## Parameters
- fraction, process water, to air: 0.15 dimensionless; name fraction_PW_to_air; lognormal variance with pedigree 0.092025, pedigree (4,4,3,2,4)
  Literature value. In case when no industry/process specific data are available, default evaporation fraction value is used. This value is 15% and is based on literature (Statistics Canada, 2007 & Shaffer, K.H., 2008, Consumptive water use in the Great Lakes Basin, USGS & Shiklomanov, 2003, World Water Resources at the Beginning of the 21st Century) and has been approved by an expert.

## Reference product
- refractory, high aluminium oxide, packed: 1 kg; source Routschka G. and Granitzki K.-E. 1997; By-product classification allocatable product; CPC 373: Refractory products and structural non-refractory clay products
  EcoSpold01Location=DE
  Bricks with Al2O3 >45% are required for increased thermal and chemical stresses. These bricks are produced using various high-aluminium oxide raw materials (sillimanite group, mullitized materials, sintered and fused mullite and corundum, sintered bauxite ), alone, in combination, or together with other raw material types, mainly chamotte.
  A small amount of clay (<15%) is normally used to produce ceramic-bonded fired bricks. The use of a mixture of clay and fine aluminium oxide leads to a mullite-bonded corundum brick. A chemical bond on an aluminium phosphate base has also proven successful. This brick type is supplied either fired (1000 - 1500°C) or heat-treated (150 - 800°C). The chemical bond gives the brick higher resistance to attacking melts, slag, and alkali oxides. A pitch or resin bond is used for applications in the steel industry. Coking at about 300°C causes a slag-rejecting carbon bond to develop. In special cases fired bricks are impregnated with pitch or resin.
  Addition of Cr2O3 powder (5 - 15%) to corundum bricks, either alone or in combination with zirconium silicate, leads to a highly corrosion-resistant corundum chrome brick.
  The chemical and mineralogical compositions of high-aluminium oxide bricks vary over wide ranges because firing of the bricks normally fails to produce phase equilibrium, and significant changes may occur in the properties of the bricks in service. Bauxite bricks, which constitute the majority of high-aluminium oxide bricks, show more or less after-expansion in service caused by reactions between clay bond and corundum and resulting in mullitization. Compared with fireclay refractories, the alkali oxide content and the extent of glassy phase are low (< 20%). The main mineralogical components are corundum and mullite. Sillimanite and andalusite bricks normally contain residual amounts of these minerals.
  The corrosion resistance of such bricks to glass, slag, and iron and steel melts is good. They are prone to alkali attack: high-aluminium oxide bricks with low Al2O3 content react to produce low-melting alkali aluminium silicate phases or glasses. With higher aluminium oxide content alkali bursting occurs (due to crystallisation of, for example, nepheline), as does the formation of b-Al2O3.
  The main applications of high aluminium oxide refractory are the iron and steel industry, non-ferrous industry, glass and cement industry, ceramic industry (also as high temperature kiln furniture).
  production volume 0.242058 kg
    This is a placeholder value that does not reflect real-world production volumes. This dataset does not currently require a real-world production volume to work in the database framework, and no actual data were collected yet. This has no negative effect on the results of the ecoinvent database. The placeholder value of this activity was scaled according to the nominal GDP of 2005 (source: United Nations, http://data.un.org/Glossary.aspx?q=GDP+%28current+US%24%29, accessed 20130726) to reflect an appropriate share of the global production volume, which is also a placeholder value.
  property price 0.693 EUR2005
    UN import prices. From UN trade database. Category: 'Refractory bricks etc >50% alumina or silica'.
  property carbon content 0
    carbon content on a dry matter basis (reserved; not for manual entry)
  property true value 0.693
    allocation property applied in "true value" allocation // value calculated from revenue
  properties: water content 0, water in wet mass 0 kg, carbon content, fossil 0, wet mass 1 kg, carbon content, non-fossil 0, dry mass 1 kg, carbon allocation 0 kg

## By-products
- heat, for reuse in municipal waste incineration only: 0 MJ; CPC 17300: Steam and hot water; By-product classification allocatable product; pedigree (1,1,1,1,1)
  Net electricity generated from this waste and used in internal MSWI plant energy redistribution.
  Uncertainty: uncertainty is calculated from uncertainties in waste composition and uncertainties in energy efficiency and the uncertainty in internal energy demand
  production volume 0.0141642 MJ
  property exergy 0.1842 MJ; name E_th_prod_MSWI_exergy
    This exergy property is based on the exergy content of the product.
  property true value relation 0.1842; name E_th_prod_MSWI_true_value_relation
    property to calculate "true value" from
  property price 0.0106 EUR2005; name E_th_prod_MSWI_price_EUR2005
    Average European district heat price from Ecoheatcool and Euroheat 2005-2006, Ecoheat Work package 1: The European heat market. Final report. 10.6 EUR/GJ i s the price of district heat. http://www.solarthermalworld.org/files/Ecoheatcool%20WP1%20Web.pdf?download
  property true value 9.37769e-5
    allocation property applied in "true value" allocation // value calculated from true value relation
- iron scrap, sorted, pressed: 0 kg; By-product classification Recyclable; CPC 39310: Slag, dross, scalings and other waste from the manufacture of iron or steel; pedigree (1,1,1,1,1)
  Iron scrap recovered from this waste.
  Uncertainty: uncertainty calculated from uncertainty in waste composition, uncertainty of share of recyclable metal, uncertainty of transfer coefficient to bottom ash, uncertainty of the efficiency of scrap removal in MSWI plant.
  production volume 4.86547e-5 kg
  property price 0.175 EUR2005
    Temporary price data. Calculated as 90% of purchasers price based on: 2005 import and export prices (total trades (USD) divided by total weight (kg) in biggest economies of the world: EU27, USA, Brasil, China, India, Japan and Russia) from UN Commodity Trade Statistics Database (http://data.un.org/Explorer.aspxDatabase [Accessed 2011.06.20]). Commodity: Waste or scrap, of cast iron
  property carbon content 0
    carbon content on a dry matter basis (reserved; not for manual entry)
  property true value 8.51456e-6
    allocation property applied in "true value" allocation // value calculated from revenue
  properties: dry mass 1 kg, water content 0, carbon content, non-fossil 0, water in wet mass 0 kg, carbon content, fossil 0, wet mass 1 kg, carbon allocation 0 kg
- electricity, for reuse in municipal waste incineration only: 0 kWh; CPC 17100: Electrical energy; By-product classification allocatable product; pedigree (1,1,1,1,1)
  (same comment as for heat, for reuse in municipal waste incineration only)
  production volume 0.00191747 kWh
  property exergy 3.6 MJ; name E_el_prod_MSWI_exergy
    This exergy property is based on the exergy content of the product.
  property true value relation 3.6; name E_el_prod_MSWI_true_value_relation
    property to calculate "true value" from
  property price 0.1 EUR2005; name E_el_prod_MSWI_price_EUR2005
    Estimated to be the same price as in case of electricity, medium voltage.
  property true value 0.000248111
    (same comment as for heat, for reuse in municipal waste incineration only)
- iron scrap, unsorted: 0 kg; source European Aluminium Association 2008; CPC 39310: Slag, dross, scalings and other waste from the manufacture of iron or steel; By-product classification Recyclable; pedigree (1,1,1,1,1)
  production volume 6.8688e-9 kg
  property price 0.149 EUR2005; name ironScrapAmount_price_EUR2005
    Temporary price data. Calculated as 90% of purchasers price based on: estimated at 85% of sorted scrap
  property carbon content 0
    carbon content on a dry matter basis (reserved; not for manual entry)
  property true value 1.02345e-9
    allocation property applied in "true value" allocation // value calculated from revenue
  properties: water in wet mass 0 kg, water content 0, carbon content, fossil 0, carbon content, non-fossil 0, dry mass 1 kg, wet mass 1 kg, carbon allocation 0 kg
- aluminium oxide, non-metallurgical: 0 kg; source European Aluminium Association 2008; CPC 41432: Alumina (aluminium oxide), except artificial corundum; By-product classification allocatable product; CAS 1344-28-1; pedigree (1,1,1,1,1)
  production volume 4.32227e-7 kg
  property carbon content, non-fossil 0; name C_content_non_fossil
  property price 0.28 EUR2005; name Al2O3Amount_price_EUR2005
    From UN trade database. http://data.un.org/ Import data from the largest economies of the world are used (Brazil, India, USA, China, Japan and EU-27).
  property dry mass 1 kg; name DM
  property water content 0; name water_content
  property wet mass 1 kg; name WM
  property water in wet mass 0 kg; name WWM
  property carbon content, fossil 0; name C_content_fossil
  property carbon content 0
    carbon content on a dry matter basis (reserved; not for manual entry)
  property true value 1.21024e-7
    allocation property applied in "true value" allocation // value calculated from revenue
  properties: carbon allocation 0 kg
- aluminium, cast alloy: 0 kg; source European Aluminium Association 2008; By-product classification allocatable product; CPC 41431: Unwrought aluminium; pedigree (1,1,1,1,1)
  EcoSpold01Location=RER
  production volume 4.04037e-6 kg
  property price 1.3 EUR2005; name castAlloyAmount_price_EUR2005
    Temporary price data. Calculated as 90% of purchasers price based on: Source: London Metal Exchange, Aluminium alloy price for 2005
  property carbon content 0
    carbon content on a dry matter basis (reserved; not for manual entry)
  property true value 5.25248e-6
    allocation property applied in "true value" allocation // value calculated from revenue
  properties: water in wet mass 0 kg, carbon content, non-fossil 0, water content 0, dry mass 1 kg, carbon content, fossil 0, wet mass 1 kg, carbon allocation 0 kg
- aluminium, wrought alloy: 0 kg; source European Aluminium Association 2008; By-product classification allocatable product; CPC 4153: Semi-finished products of aluminium or aluminium alloys; pedigree (1,1,1,1,1)
  production volume 1.7688e-6 kg
  property price 1.44 EUR2005; name secondaryAluminiumOutput_price_EUR2005
    Estimated based on literature values and expert judgement. Aluminium ccast alloys are about 90% of the price of aluminium wrought alloys.
  property carbon content 0
    carbon content on a dry matter basis (reserved; not for manual entry)
  property true value 2.54707e-6
    allocation property applied in "true value" allocation // value calculated from revenue
  properties: wet mass 1 kg, water content 0, carbon content, fossil 0, water in wet mass 0 kg, carbon content, non-fossil 0, dry mass 1 kg, carbon allocation 0 kg
- copper: 0 kg; source Rentz O. 1999; By-product classification allocatable product; CPC 41413: Refined copper and copper alloys, unwrought; master alloys of copper
  Literature value. Copper uses: Before end-use copper is manufactured into semi fabricated products, such as shapes and ingots (known as 'semis'). These manufacturing processes are subdivided into hot working, cold working and, if necessary, process annealing. Few of the semis are ready for use as such. They more typically travel to first-stage manufacturers, who make metal rods, wire, and casting, and then to component manufacturers who produce such things as motors, valves, and insulated cables The components in turn are incorporated by final-stage manufacturers into a variety of finished products - automobiles, commercial buildings, residential housing, and so forth. These uses account for about 79% of the world-wide consumption of copper.
  production volume 4.67462e-7 kg
  property price 5.52 EUR2005
    Literature value (http://www.economist.com/news/business/21576714-mining-industry-has-enriched-chile-its-future-precarious-copper-solution). Average price between 20015 and 2013.
  property carbon content 0
    carbon content on a dry matter basis (reserved; not for manual entry)
  property true value 2.58039e-6
    allocation property applied in "true value" allocation // value calculated from revenue
  properties: dry mass 1 kg, water in wet mass 0 kg, wet mass 1 kg, carbon content, non-fossil 0, water content 0, carbon content, fossil 0, carbon allocation 0 kg
- zinc concentrate: 0 kg; CPC 14290: Other non-ferrous metal ores and concentrates (other than uranium or thorium ores and concentrates); By-product classification allocatable product
  Calculated value from the knowledge of the properties of both products.
  production volume 3.71038e-16 kg
  property price 0.38 EUR2005; name ByP_price_EUR2005
    Temporary price data. Calculated as 90% of purchasers price based on: Zinc content in concentrate 53%. Concentrate price per kg Zn 86.5% of refined Zn price (13.5% treatment charges according to CHR Metals Limited 2005: Dynamic cost curves. http://www.minecost.com/dynamic.pdf). 2004 zinc price from USGS (2007) Mineral commodity summaries 2007. <http://minerals.usgs.gov/minerals/pubs/mcs/2007/mcs2007.pdf> [Accessed 25 May 2010]
  property zinc content 0.53; name zinc_C_zinc_concentrate
    Zinc content on a dry matter basis. Value taken from teh "zinc mine operation" /GLO dataset.
  property dry mass 1 kg; name DM_zinc_concentrate
  property carbon content 0
    carbon content on a dry matter basis (reserved; not for manual entry)
  property true value 1.40994e-16
    allocation property applied in "true value" allocation // value calculated from revenue
  properties: wet mass 1 kg, water content 0, carbon content, non-fossil 0, carbon content, fossil 0, water in wet mass 0 kg, carbon allocation 0 kg

## Inputs from technosphere
- clay pit infrastructure: 1.99896e-11 unit; lognormal variance with pedigree 0.3981, pedigree (1,5,5,3,4)
  Proxy. Clay pit infrastructure is used as proxy. The amount has been copied from land-use "brick production". A production volume of 1.000.000 kg/year and a production time of 50 years are assumed.
  EcoSpold01Location=CH
- electricity, medium voltage: 0.128933 kWh; lognormal variance with pedigree 0.0526, pedigree (2,4,5,1,1)
  Estimation, based on personal communication from one company in Germany for the year 1999.
  EcoSpold01Location=DE
- packing, clay product: 0.999479 kg; lognormal variance with pedigree 0.0507, pedigree (3,5,5,3,1)
  EcoSpold01Location=CH
  Estimation. The packing of 1 kg of product is considered.
- bauxite: 1.03946 kg; lognormal variance with pedigree 0.052625, pedigree (2,4,5,2,1)
  EcoSpold01Location=GLO
  Estimation, based on personal communication from one company in Germany for the year 1999. Bauxite is used as raw material.
  properties: wet mass 1 kg, dry mass 1 kg
- heat, district or industrial, natural gas: 5.12733 MJ; lognormal variance with pedigree 0.052625, pedigree (2,4,5,2,1)
  EcoSpold01Location=RER
  Estimation, based on personal communication from one company in Germany for the year 1999. A low-NOx furnace is assumed.
- lubricating oil: 1.30932e-5 kg; source Bruck, M. 1996; lognormal variance with pedigree 0.088625, pedigree (1,5,5,2,4)
  EcoSpold01Location=RER
  Literature value. Data was obtained from the "brick production" dataset.
  properties: carbon content, fossil 0.75, wet mass 1 kg, dry mass 1 kg
  note on carbon content, fossil: Lubricating oil is produced from diesel. C-content/dry mass of fats and oils considered 75%, from: ecoinvent v2.2 report, n 15a, pg 40
- diesel, burned in building machine: 2.63863 MJ; lognormal variance with pedigree 0.052625, pedigree (2,4,5,2,1)
  Estimation, based on personal communication from one company in Germany for the year 1999. It is assumed that diesel is used for internal tranports.
  EcoSpold01Location=GLO
- industrial machine, heavy, unspecified: 0.000166913 kg; lognormal variance with pedigree 0.572025, pedigree (5,4,5,2,1)
  EcoSpold01Location=RER
  Estimation. The infrastructure of all machines are considered. A production volume of 1.000.000 kg/year, a weight of 50t and a lifetime of 30 years are assumed.
- municipal solid waste: -0.0049974 kg; lognormal variance with pedigree 0.0527, pedigree (2,4,5,3,1)
  Estimation. Primarily wood pallets and used oil are treated.
  EcoSpold01Location=CH
  production volume 0.005 kg
    Calculated from the production volume of refractory, high aluminium oxide, packed in proportion to the respective output amounts.
  properties: water content 0.297017, carbon content, fossil 0.171549, dry mass 0.771 kg, wet mass 1 kg, carbon content, non-fossil 0.261655
  note on carbon content, fossil: MSW composition in tab 4.1, ecoinvent v2.2 report 13_I. C content referred to 1 kg DM
- clay: 0.0549714 kg; lognormal variance with pedigree 0.0527, pedigree (2,4,5,3,1)
  Estimation, based on personal communication from one company in Germany for the year 1999. Clay is used as raw material.
  EcoSpold01Location=CH
  properties: water content 0.0362694, wet mass 1 kg, dry mass 0.965 kg
- lime, hydrated, packed: 0.0149922 kg; lognormal variance with pedigree 0.0527, pedigree (2,4,5,3,1)
  Estimation, based on personal communication from one company in Germany for the year 1999.
  EcoSpold01Location=CH
  properties: dry mass 0.997 kg, wet mass 1 kg, water content 0.00300903

## Inputs from nature
- Water, unspecified natural origin [natural resource, in water]: 1.99896e-5 m3; name water_UNO_input; source EAA - European Aluminium Association 2008; lognormal variance with pedigree 0.0527, pedigree (2,4,5,3,1)
  Estimation, based on personal communication from one company in Germany for the year 1999.

## Emissions to nature
- Water [water, unspecified]: 1.69912e-5 m3; name water_to_water_unspecified; = water_UNO_input*(1-fraction_PW_to_air); lognormal variance with pedigree 0.0807, pedigree (2,2,5,1,1)
  Calculated value based on literature values and expert opinion. See comments in the parametres' comment field.
  property fraction, origin: unspecified 1; name fraction_origin_unspecified_Ww
  property fraction, origin: fresh water 0; name fraction_origin_fresh_water_Ww
  property carbon content, non-fossil 0; name C_content_non_fossil
  property water in wet mass 1000 kg; name WWM
  property dry mass 0 kg; name DM
  property wet mass 1000 kg; name WM
  property carbon content, fossil 0; name C_content_fossil
  property fraction, origin: salt water 0; name fraction_origin_salt_water_Ww
- Water [air, unspecified]: 2.99844e-6 m3; name water_to_air_unspecified; = (water_UNO_input*fraction_PW_to_air); lognormal variance with pedigree 0.0807, pedigree (2,2,5,1,1)
  (same comment as for Water)
  property fraction, origin: unspecified 1; name fraction_origin_unspecified
  property fraction, origin: fresh water 0; name fraction_origin_fresh_water
  property fraction, origin: salt water 0; name fraction_origin_salt_water

## Sampling procedure
Measured data of one German plant

## Review by Roland Hischier 2011-09-22
Transfer of documentation done.

## Review by Roberto Dones 2004-04-14
passed
