# housing system construction, pig, label-certified

Dataset: EcoSpold 2, unit process
Geography: CH
Time period: 1994-01-01 to 2019-12-31
Technology level: current
Classification: EcoSpold01Categories: agricultural means of production/buildings
Classification: ISIC rev.4 ecoinvent: 4100:Construction of buildings
Tags: ConvertedDataset
Scenario: Business-as-Usual
System model: Allocation at the point of substitution
Generated by: Dunja Dux
Published in: Nemecek, T. 2007
Database: ecoinvent
isCopyrightProtected: true
accessRestrictedTo: 1

## General comment
This dataset represents an example of a typical agricultural building for pigs. The module includes a pen for fattening pigs with animal-friendly housing system with multispace pens and exercise area, fittings, slurry store, concentrate silo, wet mix feeding system and straw storage area. Size: 300 pig places. Lifetime of the building is 50 years. The Functional Unit is one fattening pig place during entire service life.
[This dataset was already contained in the ecoinvent database version 2. It was not individually updated during the transfer to ecoinvent version 3. Life Cycle Impact Assessment results may still have changed, as they are affected by changes in the supply chain, i.e. in other datasets. This dataset was generated following the ecoinvent quality guidelines for version 2. It may have been subject to central changes described in the ecoinvent version 3 change report (http://www.ecoinvent.org/database/ecoinvent-version-3/reports-of-changes/), and the results of the central updates were reviewed extensively. The changes added e.g. consistent water flows and other information throughout the database. The documentation of this dataset can be found in the ecoinvent reports of version 2, which are still available via the ecoinvent website. The change report linked above covers all central changes that were made during the conversion process.]
Obs: The following limitation on the use of individual modules should be noted: to obtain realistic values when applying the modules, building sizes should not differ too widely from the sizes on which the module calcula-tions were based. An acceptable approximation can be achieved for building sizes within a range of about half to twice the value of the calculated size of the modules. A wider difference would not be reasonable, since the type of construction would be too different from the calculated module.
Construction plan for label housing for fattening pigs, 300 pig places.

## Included activities start
From unoccupied land foreseen for a pig housing system.

## Included activities end
This acitivity ends with the final treatment and disposal of the building. The dataset includes the use of construction materials and building machines (hydraulic diggers, skid-steer loaders) for construction and also materials for repair and replacement. Waste disposal is inlcuded for repair, replacement and dismantling materials from the building infrastructure. The dataset doesn't include direct emissions from construction, waste disposal of production and the resources used during utilization phase of the building. Disposal of construction waste such as packing materials and remnants of construction materials were not considered because it represents only a small proportion of the overall disposal quantity.

## Geography
The inventory applies for Swiss agricultural buildings only, because of the solid method of construction.

## Technology
Based on selected examples of this type of housing and buildings commonly found in Switzerland in the year 2000; but not conform to an “average Swiss building style”.

## Reference product
- housing system, pig, label-certified, per pig place: 1 unit; CPC 53269: Other constructions for manufacturing; By-product classification allocatable product
  EcoSpold01Location=CH
  production volume 0.0336675 unit
    This is a placeholder value that does not reflect real-world production volumes. This dataset does not currently require a real-world production volume to work in the database framework, and no actual data were collected yet. This has no negative effect on the results of the ecoinvent database. The placeholder value of this activity was scaled according to the nominal GDP of 2005 (source: United Nations, http://data.un.org/Glossary.aspx?q=GDP+%28current+US%24%29, accessed 20130726) to reflect an appropriate share of the global production volume, which is also a placeholder value.
  property price 643.414 EUR2005
    Calculated based on inputs: The price of the product has been calculated as a sum of the values of the material and energy inputs for this product. This value is therefore a rough estimation. It may underestimate the real price since there are additional expenses when producing any product. These expences can include for example labour costs, treatment of waste materials and profit for the producer. Please consider carefully whether this level of data quality is acceptable for your application.
  property true value 643.414
    allocation property applied in "true value" allocation // value calculated from revenue

## By-products
- iron scrap, sorted, pressed: 0 kg; By-product classification Recyclable; CPC 39310: Slag, dross, scalings and other waste from the manufacture of iron or steel; pedigree (1,1,1,1,1)
  Iron scrap recovered from this waste.
  Uncertainty: uncertainty calculated from uncertainty in waste composition, uncertainty of share of recyclable metal, uncertainty of transfer coefficient to bottom ash, uncertainty of the efficiency of scrap removal in MSWI plant.
  production volume 1.04083 kg
  property price 0.175 EUR2005
    Temporary price data. Calculated as 90% of purchasers price based on: 2005 import and export prices (total trades (USD) divided by total weight (kg) in biggest economies of the world: EU27, USA, Brasil, China, India, Japan and Russia) from UN Commodity Trade Statistics Database (http://data.un.org/Explorer.aspxDatabase [Accessed 2011.06.20]). Commodity: Waste or scrap, of cast iron
  property carbon content 0
    carbon content on a dry matter basis (reserved; not for manual entry)
  property true value 0.182146
    allocation property applied in "true value" allocation // value calculated from revenue
  properties: wet mass 1 kg, water in wet mass 0 kg, carbon content, non-fossil 0, carbon content, fossil 0, dry mass 1 kg, water content 0, carbon allocation 0 kg
- electricity, for reuse in municipal waste incineration only: 0 kWh; CPC 17100: Electrical energy; By-product classification allocatable product; pedigree (1,1,1,1,1)
  Net electricity generated from this waste and used in internal MSWI plant energy redistribution.
  Uncertainty: uncertainty is calculated from uncertainties in waste composition and uncertainties in energy efficiency and the uncertainty in internal energy demand
  production volume 146.061 kWh
  property exergy 3.6 MJ; name E_el_prod_MSWI_exergy
    This exergy property is based on the exergy content of the product.
  property true value relation 3.6; name E_el_prod_MSWI_true_value_relation
    property to calculate "true value" from
  property price 0.1 EUR2005; name E_el_prod_MSWI_price_EUR2005
    Estimated to be the same price as in case of electricity, medium voltage.
  property true value 18.7699
    allocation property applied in "true value" allocation // value calculated from true value relation
- heat, for reuse in municipal waste incineration only: 0 MJ; CPC 17300: Steam and hot water; By-product classification allocatable product; pedigree (1,1,1,1,1)
  Net useful heat generated from this waste and used in internal MSWI plant energy redistribution.
  Uncertainty: uncertainty is calculated from uncertainties in waste composition and uncertainties in energy efficiency and the uncertainty in internal energy demand
  production volume 1034.55 MJ
  property true value relation 0.1842; name E_th_prod_MSWI_true_value_relation
    property to calculate "true value" from
  property exergy 0.1842 MJ; name E_th_prod_MSWI_exergy
    This exergy property is based on the exergy content of the product.
  property price 0.0106 EUR2005; name E_th_prod_MSWI_price_EUR2005
    Average European district heat price from Ecoheatcool and Euroheat 2005-2006, Ecoheat Work package 1: The European heat market. Final report. 10.6 EUR/GJ i s the price of district heat. http://www.solarthermalworld.org/files/Ecoheatcool%20WP1%20Web.pdf?download
  property true value 6.80249
    (same comment as for electricity, for reuse in municipal waste incineration only)
- zinc concentrate: 0 kg; CPC 14290: Other non-ferrous metal ores and concentrates (other than uranium or thorium ores and concentrates); By-product classification allocatable product
  Calculated value from the knowledge of the properties of both products.
  production volume 0.0122534 kg
  property price 0.38 EUR2005; name ByP_price_EUR2005
    Temporary price data. Calculated as 90% of purchasers price based on: Zinc content in concentrate 53%. Concentrate price per kg Zn 86.5% of refined Zn price (13.5% treatment charges according to CHR Metals Limited 2005: Dynamic cost curves. http://www.minecost.com/dynamic.pdf). 2004 zinc price from USGS (2007) Mineral commodity summaries 2007. <http://minerals.usgs.gov/minerals/pubs/mcs/2007/mcs2007.pdf> [Accessed 25 May 2010]
  property zinc content 0.53; name zinc_C_zinc_concentrate
    Zinc content on a dry matter basis. Value taken from teh "zinc mine operation" /GLO dataset.
  property dry mass 1 kg; name DM_zinc_concentrate
  property carbon content 0
    carbon content on a dry matter basis (reserved; not for manual entry)
  property true value 0.00465629
    allocation property applied in "true value" allocation // value calculated from revenue
  properties: wet mass 1 kg, water content 0, carbon content, non-fossil 0, carbon content, fossil 0, water in wet mass 0 kg, carbon allocation 0 kg

## Inputs from technosphere
All rows: lognormal variance with pedigree 0.0401, pedigree (1,2,5,1,1)
- waste reinforced concrete: -3086.43 kg
  Modelled, based on "Agricultural Buildings" - pdf-document on the dedicated talk page of ecoinvent (www.ecoinvent.org/talk-pages)
  EcoSpold01Location=CH
  production volume 3210 kg
    Calculated from the production volume of housing system, pig, label-certified, per pig place in proportion to the respective output amounts.
  properties: water content 0.00585407, wet mass 1 kg, dry mass 0.99418 kg
- pitch: 0.4596 kg
  (same comment as for waste reinforced concrete)
  properties: carbon content, fossil 0.83, wet mass 1 kg, dry mass 1 kg
- waste brick: -280.76 kg
  (same comment as for waste reinforced concrete)
  production volume 292 kg
    (same comment as for waste reinforced concrete)
  properties: dry mass 1 kg, wet mass 1 kg
- waste glass sheet: -1.26919 kg
  (same comment as for waste reinforced concrete)
  production volume 1.32 kg
    (same comment as for waste reinforced concrete)
  properties: wet mass 1 kg, dry mass 1 kg
- polyurethane, rigid foam: 0.0846125 kg
  Modelled, based on "Agricultural Buildings" - pdf-document on the dedicated talk page of ecoinvent (www.ecoinvent.org/talk-pages)
  EcoSpold01Location=RER
  properties: carbon content, fossil 0.69089, dry mass 1 kg, wet mass 1 kg
  note on carbon content, fossil: Polyurethanes (PUR) is the collective name for an extensive group of polymers with very different compositions and correspondingly varied property profiles, though their molecule chain contains all a urethane group (-NH-CO-O-). All PURs are built on a common principle : they are produced by the diisocyanate polyaddition process, that links polyols and (di)isocyanates. In this dataset, an example of typical polyurethane mixture is described (Ullmann, Polyurethanes, Dieterich et al. & ecoinvent v2 report 11_II). C content was calculated as an addition of C contents in its components.
- polypropylene, granulate: 0.0309605 kg
  EcoSpold01Location=RER
  Modelled, based on "Agricultural Buildings" - pdf-document on the dedicated talk page of ecoinvent (www.ecoinvent.org/talk-pages)
  properties: carbon content, fossil 0.857143, wet mass 1 kg, dry mass 1 kg
  note on carbon content, fossil: Polypropylene is formed by the polymerisation of propylene, C3H6 (ecoinvent v2.2 report 11_II)
- cast iron: 31.6335 kg
  (same comment as for polyurethane, rigid foam)
  properties: carbon content, fossil 0.04, dry mass 1 kg, wet mass 1 kg
  note on carbon content, fossil: Cast iron is made by remelting pig iron in small furnaces (e.g. cupola furnaces or electric arc furnaces) and poured into moulds to make castings. It usually contains 2% to 6% carbon (ecoinvent v2.2 report 10_partII). An average content of 4% was considered
- kraft paper, unbleached: 24.8069 kg
  (same comment as for polypropylene, granulate)
  properties: water content 0.0582011, carbon content, fossil 0.00202191, carbon content, non-fossil 0.416625, dry mass 0.945 kg, wet mass 1 kg
  note on carbon content, fossil: Fossil C content was calculated after fossil C contents of chemicals used in the production of the paper (in Tab 9.4 ecoinvent v2.2 report 11_III, part 9).
  note on carbon content, non-fossil: Biogenic C content was calculated after biogenic C contents of chemicals used in the production of the paper (in Tab 9.4 ecoinvent v2.2 report 11_III, part 9). The cellulose content in 1 kg of paper (on a wet mas basis) was estimated as (1-chemical content), C content of cellulose was considered 0.44 kgC/kg dry mass (ecoinvent v2.2 report, n 15a, pg 40)
- waste polyethylene/polypropylene product: -43.3639 kg
  (same comment as for waste reinforced concrete)
  production volume 45.1 kg
    (same comment as for waste reinforced concrete)
  properties: water content 0.180638, carbon content, fossil 0.748045, wet mass 1 kg, dry mass 0.847 kg
  note on carbon content, fossil: Mixed various plastics was used to estimate the C content of this waste (Tab A.2, ecoinvent v2.2 report 13_I)
- waste wood, untreated: -145.187 kg
  (same comment as for waste reinforced concrete)
  production volume 151 kg
    (same comment as for waste reinforced concrete)
  properties: wet mass 1 kg, dry mass 0.8 kg, water content 0.25, carbon content, non-fossil 0.48632
  note on carbon content, non-fossil: Tab A.4, ecoinvent v2.2 report 13_I. C content has been referred to 1 kg DM,
- gravel, round: 474.022 kg
  EcoSpold01Location=CH
  Modelled, based on "Agricultural Buildings" - pdf-document on the dedicated talk page of ecoinvent (www.ecoinvent.org/talk-pages)
  properties: wet mass 1 kg, dry mass 1 kg
- copper: 2.6826 kg
  (same comment as for polyurethane, rigid foam)
  properties: dry mass 1 kg, wet mass 1 kg
- steel, chromium steel 18/8, hot rolled: 55.575 kg
  (same comment as for polyurethane, rigid foam)
  properties: wet mass 1 kg, carbon content, fossil 0.0008, dry mass 1 kg
  note on carbon content, fossil: Stainless steel model is the grade 304 steel (18/8 stainless, 18% chromium 8% nickel; max. 0.08% C)
- reinforcing steel: 75.3821 kg
  (same comment as for polypropylene, granulate)
  properties: carbon content, fossil 0.004, dry mass 1 kg, wet mass 1 kg
- lean concrete: 0.124996 m3
  (same comment as for waste reinforced concrete)
  properties: dry mass 2080 kg, water content 0.0528846, wet mass 2190 kg
- waste bitumen sheet: -0.4596 kg
  (same comment as for gravel, round)
  production volume 0.478 kg
    (same comment as for waste reinforced concrete)
  properties: water content 0.0152284, carbon content, fossil 0.643207, dry mass 0.985 kg, wet mass 1 kg
  note on carbon content, fossil: The bitumen sheet is made of 63% bitumen, 24% surface spread and filler (assumed to be pure SiO2), 6% carrier fleece (assumed to be PE) and 7% elastomer (assumed to be PS) (ecoinvent v2.2 report 13_I, pg 40). C content of bitumen, PE and PS from Tab A.6 and A.1 (ecoinvent v2.2 report 13_I, pg 40), respectively. C content of waste also given in the dataset
- epoxy resin, liquid: 17.9802 kg
  (same comment as for polyurethane, rigid foam)
  properties: carbon content, fossil 0.42325, wet mass 1 kg, dry mass 1 kg
- polyethylene, high density, granulate: 0.487484 kg
  (same comment as for polypropylene, granulate)
  properties: dry mass 1 kg, carbon content, fossil 0.857143, wet mass 1 kg
  note on carbon content, fossil: Polyethylene is formed out of a huge amount of ethylene monomers (C2H4) (ecoinvent v2.2 report 11_II). MW=28 g/mol
- cement, Portland: 14.2303 kg
  (same comment as for gravel, round)
  properties: dry mass 1 kg, wet mass 1 kg
- cement mortar: 55.575 kg
  (same comment as for waste reinforced concrete)
  properties: wet mass 1 kg, dry mass 1 kg
- waste polyvinylchloride product: -0.622094 kg
  (same comment as for gravel, round)
  production volume 0.647 kg
    (same comment as for waste reinforced concrete)
  properties: dry mass 0.998 kg, carbon content, fossil 0.440882, water content 0.00200401, wet mass 1 kg
- excavation, skid-steer loader: 3.30758 m3
  EcoSpold01Location=RER
  Modelled, based on "Agricultural Buildings" - pdf-document on the dedicated talk page of ecoinvent (www.ecoinvent.org/talk-pages);activityLink introduced to establish a direct link to the corresponding regional supply of this product
- sawnwood, softwood, dried (u=20%), planed: 0.281721 m3
  (same comment as for polypropylene, granulate)
  properties: wet mass 540 kg, water content 0.2, dry mass 450 kg, carbon content, non-fossil 0.494
  note on carbon content, non-fossil: C content of dry mass is 0.494 kgC/kg dry wood (ecoinvent v2.2 report 9)
- clay brick: 221.146 kg
  (same comment as for polyurethane, rigid foam)
  properties: dry mass 1 kg, wet mass 1 kg
- flat glass, uncoated: 1.26919 kg
  (same comment as for polyurethane, rigid foam)
  properties: wet mass 1 kg, dry mass 1 kg
- aluminium, cast alloy: 0.393833 kg
  (same comment as for polypropylene, granulate)
  properties: wet mass 1 kg, dry mass 1 kg
- waste polystyrene isolation, flame-retardant: -3.22105 kg
  (same comment as for waste reinforced concrete)
  production volume 3.35 kg
    (same comment as for waste reinforced concrete)
  properties: carbon content, fossil 0.918145, water content 0.00199232, dry mass 0.998012 kg, wet mass 1 kg
  note on carbon content, fossil: Polystyrene isolation (EPS) is flame-retarded with hexa-bromo-cyclo-dodecan (C12H18Br6) and contains 0.67 w% bromine (ecoinvent v2.2 report 13_I, pg 39). The rest is polystyrene: (C8H8)n.
- excavation, hydraulic digger: 6.01903 m3
  (same comment as for polyurethane, rigid foam)
- aluminium, wrought alloy: 0.836895 kg
  (same comment as for polypropylene, granulate)
  properties: dry mass 1 kg, wet mass 1 kg
- fibre cement facing tile: 51.2483 kg
  (same comment as for waste reinforced concrete)
  properties: carbon content, fossil 0.0201818, carbon content, non-fossil 0.0115, dry mass 1 kg, wet mass 1 kg
  note on carbon content, fossil: Tab 5.1, ecoinvent v2.2 report 7, part IX. Fibres (pulp) 2.5%. Fibres (polyvinyl alcohol) 3.7%. C-content/dry mass of natural fibres was considered 46% (from "Evolutionary and Biochemical Aspects", A.D. Kay and T. Vrede (in Global Ecology, 2010, Elsevier B.V., S.E. Jørgensen Ed.)). C-content/dry mass of polyvinyl alcohol ((C2H4O)x) was considered =24/44.
- extrusion, plastic film: 1.14419 kg
  (same comment as for polyurethane, rigid foam)
- waste cement in concrete and mortar: -67.1131 kg
  (same comment as for waste reinforced concrete)
  production volume 69.8 kg
    (same comment as for waste reinforced concrete)
  properties: water content 0.00502513, dry mass 0.995 kg, wet mass 1 kg
- waste bulk iron, excluding reinforcement: -99.0351 kg
  (same comment as for gravel, round)
  production volume 103 kg
    (same comment as for waste reinforced concrete)
  properties: dry mass 1 kg, wet mass 1 kg
- zinc coat, coils: 1.60571 m2
  (same comment as for polypropylene, granulate)
- waste concrete, not reinforced: -274.991 kg
  (same comment as for gravel, round)
  production volume 286 kg
    (same comment as for waste reinforced concrete)
  properties: wet mass 1 kg, dry mass 1 kg
- waste mineral wool: -0.990351 kg
  (same comment as for gravel, round)
  production volume 1.03 kg
    (same comment as for waste reinforced concrete)
  properties: dry mass 1 kg, wet mass 1 kg
- fibre cement corrugated slab: 8.99008 kg
  (same comment as for waste reinforced concrete)
  properties: carbon content, non-fossil 0.01656, wet mass 1 kg, dry mass 1 kg, carbon content, fossil 0.00981818
  note on carbon content, non-fossil: Tab 5.1, ecoinvent v2.2 report 7, part IX. Fibres (pulp) 3.6%. Fibres (polyvinyl alcohol) 1.8%. C-content/dry mass of natural fibres was considered 46% (from "Evolutionary and Biochemical Aspects", A.D. Kay and T. Vrede (in Global Ecology, 2010, Elsevier B.V., S.E. Jørgensen Ed.)). C-content/dry mass of polyvinyl alcohol ((C2H4O)x) was considered =24/44.
- polyvinylchloride, bulk polymerised: 0.622094 kg
  (same comment as for polypropylene, granulate)
  properties: dry mass 1 kg, carbon content, fossil 0.387097, wet mass 1 kg
  note on carbon content, fossil: Monomer is vynyl chloride, C2H3Cl (ecoinvent v2.2 report 11_II). MW=62 g/mol
- polystyrene foam slab: 0.42787 kg
  (same comment as for polyurethane, rigid foam)
  properties: carbon content, fossil 0.859091, dry mass 1 kg, wet mass 1 kg
  note on carbon content, fossil: XPS consists in 91% of polystyrene, 7% of blowing agent and the re-maining 2% are flame retardants (bromine compounds) and other additives (ecoinvent v2.2 report 7, part XIV, pg69). The chemical formula of polystyrene is (C8H8)n. Here, the blowing agent is CO2.
- sheet rolling, steel: 7.56705 kg
  (same comment as for polyurethane, rigid foam)
- steel, low-alloyed, hot rolled: 7.56705 kg
  (same comment as for polypropylene, granulate)
  properties: dry mass 1 kg, carbon content, fossil 0.005, wet mass 1 kg
  note on carbon content, fossil: Low alloyed steel composition given in Tab. 3.2 ecoinvent v2.2 report 10_partII. Steel assumed to have a C content of 0.5%
- glued laminated timber, for indoor use: 0.00865355 m3
  (same comment as for polyurethane, rigid foam)
  properties: carbon content, non-fossil 0.478422, wet mass 430 kg, dry mass 380.531 kg, carbon content, fossil 0.0128964, water content 0.13
  note on carbon content, non-fossil: The laminated timber is composed of wood and glue. The weight of the wood is assumed to be the DM minus 12 kg glue. C content of wood is 0.494 kgC/kg dry wood (ecoinvent v2.2 report 9)
  note on carbon content, fossil: C content of 12 kg Urea formaldehyde resin (C3H8N2O) used for glueing
- zinc coat, pieces: 1.67302 m2
  (same comment as for polypropylene, granulate)
- electricity, low voltage: 6.00941 kWh
  (same comment as for waste reinforced concrete)
- stone wool: 0.990351 kg
  (same comment as for gravel, round)
  properties: wet mass 1 kg, carbon content, fossil 0.015401, dry mass 1 kg
  note on carbon content, fossil: The chemical composition of the glass fibres used in the rock wool production is similar to the composition of naturally cooled volcano basalt and has a composition listed in Tab. 3.1 and 3.2 in ecoinvent v2.2 report 16, part XIV. Rock wool contains: a minimum of 96% mineral fibres,between 0.5 and 3.0 weight percent of phenolic resin depending on the specific product characteristics, and about 0.2 percent mineral oil (ecoinvent v2.2 report 16, part XIV). An average composition of 1.8% phenolic resin, 0.2% mineral oil, and 98% mineral fibres has been assumed and used to calculate C content of the rock wool
- concrete, normal: 1.36534 m3
  (same comment as for gravel, round)
  properties: water content 0.086758, wet mass 2380 kg, dry mass 2190 kg
- waste polyurethane foam: -0.0846125 kg
  (same comment as for gravel, round)
  production volume 0.088 kg
    (same comment as for waste reinforced concrete)
  properties: wet mass 1 kg, dry mass 0.998 kg, carbon content, fossil 0.641283, water content 0.00200401
  note on carbon content, fossil: Tab A.2, ecoinvent v2.2 report 13_I. Then C content was referred to 1 kg DM

## Inputs from nature
- Transformation, from pasture, man made [natural resource, land]: 3.63449 m2; lognormal variance with pedigree 0.1601, pedigree (1,2,5,1,1)
  Modelled, based on "Agricultural Buildings" - pdf-document on the dedicated talk page of ecoinvent (www.ecoinvent.org/talk-pages)
- Occupation, urban, discontinuously built [natural resource, land]: 181.725 m2*year; lognormal variance with pedigree 0.0801, pedigree (1,2,5,1,1)
  (same comment as for Transformation, from pasture, man made)
- Occupation, construction site [natural resource, land]: 7.26899 m2*year; lognormal variance with pedigree 0.0801, pedigree (1,2,5,1,1)
  (same comment as for Transformation, from pasture, man made)
- Transformation, to urban, discontinuously built [natural resource, land]: 3.63449 m2; lognormal variance with pedigree 0.1601, pedigree (1,2,5,1,1)
  (same comment as for Transformation, from pasture, man made)

## Sampling procedure
The inventory is calculated based on a solid database of agricultural buildings.

## Review by Roland Hischier 2003-08-06
Passed.

## Review by Roland Hischier 2011-09-28
Transfer of documentation done.
