# glass production, for liquid crystal display

Dataset: EcoSpold 2, unit process
Geography: GLO
Time period: 2001-01-01 to 2019-12-31
Technology level: current
Classification: EcoSpold01Categories: electronics/component
Classification: ISIC rev.4 ecoinvent: 2310:Manufacture of glass and glass products
Tags: ConvertedDataset
Scenario: Business-as-Usual
System model: Allocation at the point of substitution
Generated by: Roland Hischier
Published in: Hischier R. 2007
Database: ecoinvent
isCopyrightProtected: true
accessRestrictedTo: 1

## General comment
This dataset represents the production of 1 kg of an estimated glass used in LCD screens. It is based on data for the current CRT production technologies. Main data are taken from a US LCA study of CRT and LCD screens.
[This dataset was already contained in the ecoinvent database version 2. It was not individually updated during the transfer to ecoinvent version 3. Life Cycle Impact Assessment results may still have changed, as they are affected by changes in the supply chain, i.e. in other datasets. This dataset was generated following the ecoinvent quality guidelines for version 2. It may have been subject to central changes described in the ecoinvent version 3 change report (http://www.ecoinvent.org/database/ecoinvent-version-3/reports-of-changes/), and the results of the central updates were reviewed extensively. The changes added e.g. consistent water flows and other information throughout the database. The documentation of this dataset can be found in the ecoinvent reports of version 2, which are still available via the ecoinvent website. The change report linked above covers all central changes that were made during the conversion process.]

## Included activities start
From reception of raw materials and auxiliaries at the factory gate.

## Included activities end
This dataset includes raw materials, auxiliaries, energy and water consumption, infrastructure and land-use, emissions to air and water, waste. Packaging is not included.

## Geography
Data from literature – used as data for a global production

## Technology
The included production steps are: preparation and sorting of cullet, melting, forming of LCD flat glass parts, cooling down and palletisting until the glass parts are ready for the next process step. Included are as well direct emissions to air, waste water, and waste. Infrastructure and transport efforts of the input materials are estimated based on packaging glass production.

## Parameters
- fraction, process water, to air: 0.061 dimensionless; name fraction_PW_to_air; lognormal variance with pedigree 0.092025, pedigree (4,4,3,2,4)
  Literature value (Statistics Canada, 2007 & Shaffer, K.H., 2008, Consumptive water use in the Great Lakes Basin, USGS) (Vionnet, S., Quantis Water Database - Technical Report, 2012).

## Reference product
- glass, for liquid crystal display: 0 kg; By-product classification allocatable product; CPC 3719: Other glass articles
  EcoSpold01Location=GLO
  Computer monitors or displays are the visual interface between a computer and the user / operator. The CRT technology has been invented by the German physicist Karl Ferdinand Braun in 1897. It is the display technology that has been for a long time used in almost all computer displays, video monitors, televisions, radar displays and oscilloscopes. The CRT technically refers to any electronic vacuum tube employing a focused beam of electrons. Cathode rays work thereby in the form of streams of high speed electrons emitted from the heating of a cathode inside a vacuum tube, at its rear end. The emitted electrons form a beam within the tube due to the voltage difference applied across the two electrodes (the CRT screen typically forms the anode). The beam is then perturbed (deflected), either by a magnetic or an electric field, to trace over ('scan') the inside surface of the screen (anode). The screen is covered with a phosphorescent coating (often transition metals or rare earth elements), which emits visible light when excited by the electrons. Early computer displays used so-called vector monitors, a type of CRT similar to an oscilloscope but typically using magnetic, rather than electrostatic, deflection. Here, the beam traces straight lines between arbitrary points, repeatedly refreshing the display as quickly as possible. Vector displays for computers were limited in that they could display only a shape's outline (advanced vector systems could provide a limited amount of shading), and only a limited amount of crudely-drawn text (the number of shapes and/or textual characters drawn was severely limited, because the speed of refresh was roughly inversely proportional to how many vectors needed to be drawn). Other graphical displays used 'storage tubes'. Such CRTs inherently stored the image, and did not require periodic refreshing. Furthermore, displays for early computers that needed to display more text than was practical by using vectors, or that required high speed for photographic output, used a so-called Charactron CRT. This type incorporates a perforated metal character mask (stencil), which shapes a wide electron beam to form a character on the screen. The system selects a character on the mask using one set of deflection circuits, and selects the position to draw the character at using a second set. The beam is activated briefly to draw the character at that position. Many of these early computer displays used "slow", or long-persistence, phosphors to reduce flicker for the operator. While it reduces eyestrain for relatively static displays, the drawback of long-persistence phosphor is that when the display is changed, it produces a visible afterimage that can take up to several seconds to fade. This makes all these technologies inappropriate for animation, or for real-time dynamic information displays.
  Modern colour tubes use three different phosphors which emit red, green, and blue light respectively. They are packed either in strips or clusters. Such colour CRTs have thus three electron guns, one for each primary colour, arranged either in a straight line or in a triangular configuration (the guns are usually constructed as a single unit). The beam of each gun reaches the dots of exactly one colour; a grille or mask absorbs those electrons that would otherwise hit the wrong phosphor. Since each beam starts at a slightly different location within the tube, and all three beams are perturbed in essentially the same way, a particular deflection charge will cause the beams to hit a slightly different location on the screen (called a 'subpixel'). The so-called dot pitch defines thereby the "native resolution" of such displays. Despite all the advantages that new, flat display technologies seem to have, colour CRTs still find adherents in computer gaming due to their high refresh rates and higher resolution per initial cost. CRT's are also still popular in the printing and broadcasting industries as well as in the profe
  production volume 0 kg
    525'000 t (CRT total, 1997)
    Dummy value to be replaced by measured, estimated or calculated value
  property carbon content, non-fossil 0
    (ecoinvent v2.2 report 18_III-part6). Glass final composition was assumed using information in http://glassproperties.com/glasses/
  property carbon content, fossil 0
    (same comment as for glass, for liquid crystal display)
  property carbon content 0
    carbon content on a dry matter basis (reserved; not for manual entry)
  properties: price 0.802 EUR2005, wet mass 1 kg, water content 0, water in wet mass 0 kg, dry mass 1 kg, carbon allocation 0 kg
- waste packaging glass, unsorted: 0 kg; By-product classification Recyclable; CPC 37111: Glass in the mass, in balls (except microspheres), rods or tubes, unworked; waste and scrap of glass; pedigree (1,1,1,1,1)
  EcoSpold01Location=RER
  Estimation. The total amount for panel and funnel glass of about 1.082 kg/kg screen glass is used. The composition is based on literature. It stands for glass cullet input from outside into the glass production site.
  Uncertainty: data from an US-EPA LCA study
- glass, for liquid crystal display: 1 kg; By-product classification allocatable product; CPC 3719: Other glass articles
  (same comment as for glass, for liquid crystal display)
  production volume 1 kg

## By-products
- glass, for liquid crystal display: 0 kg; By-product classification allocatable product; CPC 3719: Other glass articles
  (same comment as for glass, for liquid crystal display)
  properties: price 0.802 EUR2005, wet mass 1 kg, carbon content, non-fossil 0, water content 0, water in wet mass 0 kg, carbon content, fossil 0, dry mass 1 kg, carbon content 0, carbon allocation 0 kg
- iron scrap, sorted, pressed: 0 kg; By-product classification Recyclable; CPC 39310: Slag, dross, scalings and other waste from the manufacture of iron or steel; pedigree (1,1,1,1,1)
  metallic iron scrap removed from ash reamains and recycled.
  Uncertainty: uncertainty is calculated from uncertainties in waste composition and transfer coefficients to soild residues
  property price 0.175 EUR2005
    Temporary price data. Calculated as 90% of purchasers price based on: 2005 import and export prices (total trades (USD) divided by total weight (kg) in biggest economies of the world: EU27, USA, Brasil, China, India, Japan and Russia) from UN Commodity Trade Statistics Database (http://data.un.org/Explorer.aspxDatabase [Accessed 2011.06.20]). Commodity: Waste or scrap, of cast iron
  property carbon content 0
    carbon content on a dry matter basis (reserved; not for manual entry)
  properties: carbon content, non-fossil 0, wet mass 1 kg, dry mass 1 kg, water content 0, carbon content, fossil 0, water in wet mass 0 kg, carbon allocation 0 kg
- copper: 0 kg; source Rentz O. 1999; By-product classification allocatable product; CPC 41413: Refined copper and copper alloys, unwrought; master alloys of copper
  Literature value. Copper uses: Before end-use copper is manufactured into semi fabricated products, such as shapes and ingots (known as 'semis'). These manufacturing processes are subdivided into hot working, cold working and, if necessary, process annealing. Few of the semis are ready for use as such. They more typically travel to first-stage manufacturers, who make metal rods, wire, and casting, and then to component manufacturers who produce such things as motors, valves, and insulated cables The components in turn are incorporated by final-stage manufacturers into a variety of finished products - automobiles, commercial buildings, residential housing, and so forth. These uses account for about 79% of the world-wide consumption of copper.
  property price 5.52 EUR2005
    Literature value (http://www.economist.com/news/business/21576714-mining-industry-has-enriched-chile-its-future-precarious-copper-solution). Average price between 20015 and 2013.
  property carbon content 0
    carbon content on a dry matter basis (reserved; not for manual entry)
  properties: dry mass 1 kg, water in wet mass 0 kg, wet mass 1 kg, carbon content, non-fossil 0, water content 0, carbon content, fossil 0, carbon allocation 0 kg
- electricity, for reuse in municipal waste incineration only: 0 kWh; CPC 17100: Electrical energy; By-product classification allocatable product; pedigree (1,1,1,1,1)
  Net electricity generated from this waste and used in internal MSWI plant energy redistribution.
  Uncertainty: uncertainty is calculated from uncertainties in waste composition and uncertainties in energy efficiency and the uncertainty in internal energy demand
  property exergy 3.6 MJ; name E_el_prod_MSWI_exergy
    This exergy property is based on the exergy content of the product.
  property true value relation 3.6; name E_el_prod_MSWI_true_value_relation
    property to calculate "true value" from
  property price 0.1 EUR2005; name E_el_prod_MSWI_price_EUR2005
    Estimated to be the same price as in case of electricity, medium voltage.
- heat, for reuse in municipal waste incineration only: 0 MJ; CPC 17300: Steam and hot water; By-product classification allocatable product; pedigree (1,1,1,1,1)
  Net useful heat generated from this waste and used in internal MSWI plant energy redistribution.
  Uncertainty: uncertainty is calculated from uncertainties in waste composition and uncertainties in energy efficiency and the uncertainty in internal energy demand
  property true value relation 0.1842; name E_th_prod_MSWI_true_value_relation
    property to calculate "true value" from
  property exergy 0.1842 MJ; name E_th_prod_MSWI_exergy
    This exergy property is based on the exergy content of the product.
  property price 0.0106 EUR2005; name E_th_prod_MSWI_price_EUR2005
    Average European district heat price from Ecoheatcool and Euroheat 2005-2006, Ecoheat Work package 1: The European heat market. Final report. 10.6 EUR/GJ i s the price of district heat. http://www.solarthermalworld.org/files/Ecoheatcool%20WP1%20Web.pdf?download
- zinc concentrate: 0 kg; CPC 14290: Other non-ferrous metal ores and concentrates (other than uranium or thorium ores and concentrates); By-product classification allocatable product
  Calculated value from the knowledge of the properties of both products.
  property price 0.38 EUR2005; name ByP_price_EUR2005
    Temporary price data. Calculated as 90% of purchasers price based on: Zinc content in concentrate 53%. Concentrate price per kg Zn 86.5% of refined Zn price (13.5% treatment charges according to CHR Metals Limited 2005: Dynamic cost curves. http://www.minecost.com/dynamic.pdf). 2004 zinc price from USGS (2007) Mineral commodity summaries 2007. <http://minerals.usgs.gov/minerals/pubs/mcs/2007/mcs2007.pdf> [Accessed 25 May 2010]
  property zinc content 0.53; name zinc_C_zinc_concentrate
    Zinc content on a dry matter basis. Value taken from teh "zinc mine operation" /GLO dataset.
  property dry mass 1 kg; name DM_zinc_concentrate
  property carbon content 0
    carbon content on a dry matter basis (reserved; not for manual entry)
  properties: wet mass 1 kg, water content 0, carbon content, non-fossil 0, carbon content, fossil 0, water in wet mass 0 kg, carbon allocation 0 kg
- iron scrap, unsorted: 0 kg; source European Aluminium Association 2008; CPC 39310: Slag, dross, scalings and other waste from the manufacture of iron or steel; By-product classification Recyclable; pedigree (1,1,1,1,1)
  property price 0.149 EUR2005; name ironScrapAmount_price_EUR2005
    Temporary price data. Calculated as 90% of purchasers price based on: estimated at 85% of sorted scrap
  property carbon content 0
    carbon content on a dry matter basis (reserved; not for manual entry)
  properties: water in wet mass 0 kg, water content 0, carbon content, fossil 0, carbon content, non-fossil 0, dry mass 1 kg, wet mass 1 kg, carbon allocation 0 kg
- aluminium oxide, non-metallurgical: 0 kg; source European Aluminium Association 2008; CPC 41432: Alumina (aluminium oxide), except artificial corundum; By-product classification allocatable product; CAS 1344-28-1; pedigree (1,1,1,1,1)
  property carbon content, non-fossil 0; name C_content_non_fossil
  property price 0.28 EUR2005; name Al2O3Amount_price_EUR2005
  property dry mass 1 kg; name DM
  property water content 0; name water_content
  property wet mass 1 kg; name WM
  property water in wet mass 0 kg; name WWM
  property carbon content, fossil 0; name C_content_fossil
  properties: carbon content 0, carbon allocation 0 kg
- aluminium, cast alloy: 0 kg; source European Aluminium Association 2008; By-product classification allocatable product; CPC 41431: Unwrought aluminium; pedigree (1,1,1,1,1)
  EcoSpold01Location=RER
  property price 1.3 EUR2005; name castAlloyAmount_price_EUR2005
    Temporary price data. Calculated as 90% of purchasers price based on: Source: London Metal Exchange, Aluminium alloy price for 2005
  property carbon content 0
    carbon content on a dry matter basis (reserved; not for manual entry)
  properties: water in wet mass 0 kg, carbon content, non-fossil 0, water content 0, dry mass 1 kg, carbon content, fossil 0, wet mass 1 kg, carbon allocation 0 kg
- aluminium, wrought alloy: 0 kg; source European Aluminium Association 2008; By-product classification allocatable product; CPC 4153: Semi-finished products of aluminium or aluminium alloys; pedigree (1,1,1,1,1)
  property price 1.44 EUR2005; name secondaryAluminiumOutput_price_EUR2005
    Estimated based on literature values and expert judgement. Aluminium ccast alloys are about 90% of the price of aluminium wrought alloys.
  property carbon content 0
    carbon content on a dry matter basis (reserved; not for manual entry)
  properties: wet mass 1 kg, water content 0, carbon content, fossil 0, water in wet mass 0 kg, carbon content, non-fossil 0, dry mass 1 kg, carbon allocation 0 kg

## Inputs from technosphere
- spent solvent mixture: 0 kg; source Socolof M. L. 2005; pedigree (1,1,1,1,1)
  Literature Value.
  EcoSpold01Location=CH
  Uncertainty: data from an US-EPA LCA study
  production volume 0 kg
    Calculated from the production volume of glass, for liquid crystal display in proportion to the respective output amounts.
  properties: wet mass 1 kg, carbon content, fossil 0.571257, water content 0.197605, dry mass 0.835 kg
  note on carbon content, fossil: Tab A.7, ecoinvent v2.2 report 13_I. C content has been calculated after data in the tables, and then referred to 1 kg DM
- inert waste, for final disposal: 0 kg; source Socolof M. L. 2005; pedigree (1,1,1,1,1)
  EcoSpold01Location=CH
  Literature Value.
  Uncertainty: data from an US-EPA LCA study - approximated with existing waste process
  production volume 0 kg
    (same comment as for spent solvent mixture)
  properties: wet mass 1 kg, water content 0.00502513, dry mass 0.995 kg
- municipal solid waste: 0 kg; source Socolof M. L. 2005; pedigree (1,1,1,1,1)
  Literature Value.
  EcoSpold01Location=CH
  Uncertainty: data from an US-EPA LCA study - approximated with existing waste process
  production volume 0 kg
    (same comment as for spent solvent mixture)
  properties: carbon content, fossil 0.171549, carbon content, non-fossil 0.261655, water content 0.297017, wet mass 1 kg, dry mass 0.771 kg
  note on carbon content, fossil: MSW composition in tab 4.1, ecoinvent v2.2 report 13_I. C content referred to 1 kg DM
- soda ash, light, crystalline, heptahydrate: 0 kg; pedigree (1,1,1,1,1)
  EcoSpold01Location=RER
  Estimation based on CRT panel glass production.
  Uncertainty: data from an US-EPA LCA study
  properties: carbon content, fossil 0.0517241, wet mass 1 kg, dry mass 1 kg
- silica sand: 0 kg; source Socolof M. L. 2005; pedigree (1,1,1,1,1)
  Literature Value.
  EcoSpold01Location=DE
  Uncertainty: data from an US-EPA LCA study
  properties: wet mass 1 kg, water content 0.010101, dry mass 0.99 kg
- oxygen, liquid: 0, 0, 0 kg (3 entries); pedigree (1,1,1,1,1)
  EcoSpold01Location=RER
  Estimation based on CRT panel glass production.
  Uncertainty: estimation, based on CRT panel glass production
  properties: dry mass 1 kg, wet mass 1 kg
- electricity, medium voltage: 0 kWh; pedigree (1,1,1,1,1)
  EcoSpold01Location=CN
  Estimation, based on companies information and own assumptions.
  Uncertainty: data from an US-EPA LCA study
- chemical, organic: 0 kg; source Socolof M. L. 2005; pedigree (1,1,1,1,1)
  EcoSpold01Location=GLO
  Literature Value.
  Uncertainty: data from an US-EPA LCA study
  properties: wet mass 1 kg, dry mass 1 kg, carbon content, fossil 0.628
  note on carbon content, fossil: This dataset is an unweighted average of 20 organic substances (listed in Tab 88.1, ecoinvent v2.2 report 8, part II), being part of the top100 chemicals included in this database. The C-content has also been calculated as an unweighted average of the C content of the substances composing this dataset.
- cerium concentrate, 60% cerium oxide: 0 kg; source Socolof M. L. 2005; pedigree (1,1,1,1,1)
  Estimation. The total amount for panel and funnel glass of about 1.082 kg/kg screen glass is used. The composition is based on literature.
  EcoSpold01Location=CN
  Uncertainty: data from an US-EPA LCA study
  properties: dry mass 1 kg, wet mass 1 kg
- lead in car shredder residue: 0 kg; source Socolof M. L. 2005; pedigree (1,1,1,1,1)
  (same comment as for inert waste, for final disposal)
  production volume 0 kg
    (same comment as for spent solvent mixture)
  properties: dry mass 1 kg, wet mass 1 kg
- zirconium oxide: 0 kg; source Socolof M. L. 2005; pedigree (1,1,1,1,1)
  EcoSpold01Location=AU
  Proxy with estimation, to represent zircon sand, copper zircon oxide is used. The total amount for panel and funnel glass of about 1.082 kg/kg screen glass is used. The composition is based on literature
  Uncertainty: data from an US-EPA LCA study
  properties: wet mass 1 kg, dry mass 1 kg
- potassium carbonate: 0 kg; source Socolof M. L. 2005; pedigree (1,1,1,1,1)
  Literature Value.
  EcoSpold01Location=GLO
  Uncertainty: data from an US-EPA LCA study
  properties: dry mass 1 kg, carbon content, fossil 0.0869565, wet mass 1 kg
- heat, district or industrial, other than natural gas: 0 MJ; pedigree (1,1,1,1,1)
  EcoSpold01Location=RER
  Proxy, due to a lack of information about combustion emissions the respective the heat from natural gas value is used.
  Uncertainty: data from an US-EPA LCA study
- packaging glass factory: 0 unit; pedigree (1,1,1,1,1)
  EcoSpold01Location=RER
  Proxy, due to a lack of specific information, the infrastructure module established for packaging glass is used.
  Uncertainty: Estimation from packaging glass production
- aluminium oxide, non-metallurgical: 0, 0, 0 kg (3 entries); source Socolof M. L. 2005; pedigree (1,1,1,1,1)
  EcoSpold01Location=RER
  Literature Value.
  Uncertainty: data from an US-EPA LCA study
  properties: wet mass 1 kg, dry mass 1 kg
- solvent, organic: 0 kg; pedigree (1,1,1,1,1)
  Estimation based on CRT panel glass production.
  EcoSpold01Location=GLO
  Uncertainty: estimation, based on CRT panel glass production
  properties: carbon content, fossil 0.63072, dry mass 1 kg, wet mass 1 kg
  note on carbon content, fossil: Mixture of 15 of the most often used solvents (list in ecoinvent v2.2 report 11-III, pg 293). C content was calculated as an unweighted average of C content of the different solvents
- heat, district or industrial, natural gas: 0 MJ; pedigree (1,1,1,1,1)
  EcoSpold01Location=RER
  Estimation, the amount of natural gas, is assumed, based on the gas consumption in the CRT glass production.
  Uncertainty: analogy conclusion - from CRT glass production data
- ammonia, liquid: 0, 0, 0 kg (3 entries); pedigree (1,1,1,1,1)
  (same comment as for oxygen, liquid)
  properties: dry mass 1 kg, wet mass 1 kg
- copper carbonate: 0 kg; pedigree (1,1,1,1,1)
  EcoSpold01Location=RER
  Proxy with estimation, to represent strontium carbonate, copper carbonate is used. The total amount for panel and funnel glass of about 1.082 kg/kg screen glass is used. The composition is based on literature.
  Uncertainty: data from an US-EPA LCA study
  properties: wet mass 1 kg, carbon content, fossil 0.097561, dry mass 1 kg
- waste glass: 0 kg; source Socolof M. L. 2005; pedigree (1,1,1,1,1)
  (same comment as for municipal solid waste)
  production volume 0 kg
    (same comment as for spent solvent mixture)
  properties: wet mass 1 kg, dry mass 1 kg
- waste packaging glass, unsorted: 0 kg; pedigree (1,1,1,1,1)
  (same comment as for waste packaging glass, unsorted)
- barite: 0 kg; source Socolof M. L. 2005; pedigree (1,1,1,1,1)
  EcoSpold01Location=RER
  Proxy with estimation, to represent barium carbonate, barite is used. The total amount for panel and funnel glass of about 1.082 kg/kg screen glass is used. The composition is based on literature.
  Uncertainty: data from an US-EPA LCA study
  properties: dry mass 1 kg, wet mass 1 kg
- chromium oxide, flakes: 0 kg; source Socolof M. L. 2005; pedigree (1,1,1,1,1)
  Literature Value.
  EcoSpold01Location=RER
  Uncertainty: data from an US-EPA LCA study
  properties: wet mass 1 kg, dry mass 1 kg
- hydrogen fluoride: 0, 0, 0 kg (3 entries); source Socolof M. L. 2005; pedigree (1,1,1,1,1)
  Literature Value.
  EcoSpold01Location=GLO
  Uncertainty: data from an US-EPA LCA study
  properties: wet mass 1 kg, dry mass 1 kg
- spent solvent mixture: 0, 0, 0 kg (3 entries); source Socolof M. L. 2005; pedigree (1,1,1,1,1)
  Literature Value.
  EcoSpold01Location=CH
  Uncertainty: data from an US-EPA LCA study
- inert waste, for final disposal: 0, 0 kg (2 entries); source Socolof M. L. 2005; pedigree (1,1,1,1,1)
  (same comment as for inert waste, for final disposal)
- municipal solid waste: 0, 0, 0, 0, 0 kg (5 entries); source Socolof M. L. 2005; pedigree (1,1,1,1,1)
  (same comment as for municipal solid waste)
- lead in car shredder residue: 0, 0 kg (2 entries); source Socolof M. L. 2005; pedigree (1,1,1,1,1)
  (same comment as for inert waste, for final disposal)
- waste glass: 0, 0, 0, 0, 0, 0, 0, 0 kg (8 entries); source Socolof M. L. 2005; pedigree (1,1,1,1,1)
  (same comment as for municipal solid waste)
- waste polyethylene, for recycling, unsorted: -0.00696965 kg; source Avadí, A. 2018
  Waste PET from barrels and packaging
  production volume 696857 kg
- sheet rolling, aluminium: 0.0379001 kg; source Angel Avadí 2014
  Aluminium cans
- scrap aluminium: -0.0189499 kg; source Avadí, A. 2018
  Waste aluminium cans
  production volume 1.89469e6 kg
- sodium chloride, powder: 0.911882 kg; source Angel Avadí 2014; triangular min 0.911882, mostLikely 0.911882, max 0.911882, pedigree (2,3,3,1,1)
  Salt for brine and fish salting
  Uncertainty: Data from 1 plant, assumptions for larger plants
- waste packaging glass, unsorted: -0.0997371 kg; source Avadí, A. 2018
  Waste packaging glass
  production volume 4.98603e6 kg
- heat, district or industrial, natural gas: 0.255514 MJ; source Angel Avadí 2014; triangular min 0.255514, mostLikely 0.255514, max 0.255514, pedigree (2,3,3,1,1)
  Industrial heat, for sterilisation
  Uncertainty: Data from 1 plant, assumptions for larger plants
- fish curing plant: 1.29576e-8 unit; source Angel Avadí 2014
  One unit of plant represents the installed capacity required to process 1 t of raw material;activityLink introduced to establish a direct link to the corresponding regional supply of this product
- wastewater from vegetable oil refinery: -0.00378735 m3; source Avadí, A. 2018
  Proxy for wastewater from fish processing plant. Asumed 20% of the water is either incorporated into the product or lost
  production volume 189336 m3
- thermoforming of plastic sheets: 0.0134835 kg; source Angel Avadí 2014
  Plastic barrels
- aluminium, cast alloy: 0.0379001 kg; source Angel Avadí 2014; triangular min 0.0379001, mostLikely 0.0379001, max 0.0379001, pedigree (2,3,3,1,1)
  Aluminium cans
  Uncertainty: Data from 1 plant, assumptions for larger plants
- nitrogen, liquid: 6.64907e-5 kg; source Angel Avadí 2014; triangular min 6.64907e-5, mostLikely 6.64907e-5, max 6.64907e-5, pedigree (2,3,3,1,1)
  Nitrogen for process
  Uncertainty: Data from 1 plant, assumptions for larger plants
- vegetable oil, refined: 0.346705 kg; source Angel Avadí 2014; triangular min 0.346705, mostLikely 0.346705, max 0.346705, pedigree (2,3,3,1,1)
  Oil for canned fish
  Uncertainty: Data from 1 plant, assumptions for larger plants
- polyethylene terephthalate, granulate, amorphous: 0.0134835 kg; source Angel Avadí 2014; triangular min 0.0134835, mostLikely 0.0134835, max 0.0134835, pedigree (2,3,3,1,1)
  Plastic barrels
  Uncertainty: Data from 1 plant, assumptions for larger plants
- water, completely softened: 2.36707 kg; source Angel Avadí 2014; triangular min 2.36707, mostLikely 2.36707, max 2.36707, pedigree (2,3,3,1,1)
  Soft water for process
  Uncertainty: Data from 1 plant, assumptions for larger plants
- extrusion, plastic film: 0.000455941 kg; source Angel Avadí 2014
  Packaging plastic
- scrap tin sheet: -0.108838 kg; source Avadí, A. 2018
  Waste tinplate cans, area of sheets times weight of a sheet
  production volume 1.08821e7 kg
- polyethylene, high density, granulate: 0.000455941 kg; source Angel Avadí 2014; triangular min 0.000455941, mostLikely 0.000455941, max 0.000455941, pedigree (2,3,3,1,1)
  Packaging plastic
  Uncertainty: Data from 1 plant, assumptions for larger plants
- electricity, medium voltage: 0.139156 kWh; source Angel Avadí 2014; triangular min 0.139156, mostLikely 0.139156, max 0.139156, pedigree (2,3,3,1,1)
  Electricity use along the whole process, including processing, maturing and cold storage
  Uncertainty: Data from 1 plant, assumptions for larger plants
- packaging film, low density polyethylene: 0.00205648 kg; source Angel Avadí 2014; triangular min 0.00205648, mostLikely 0.00205648, max 0.00205648, pedigree (2,3,3,1,1)
  Plastic bags
  Uncertainty: Data from 1 plant, assumptions for larger plants
- packaging glass, white: 0.0997371 kg; source Angel Avadí 2014; triangular min 0.0997371, mostLikely 0.0997371, max 0.0997371, pedigree (2,3,3,1,1)
  Glass containers
  Uncertainty: Data from 1 plant, assumptions for larger plants
- metal working, average for chromium steel product manufacturing: 0.0139537 kg; source Angel Avadí 2014
  Tinplate can
- tin plated chromium steel sheet, 2 mm: 0.0139537 m2; source Angel Avadí 2014; triangular min 0.0139537, mostLikely 0.0139537, max 0.0139537, pedigree (2,3,3,1,1)
  Tinplate can
  Uncertainty: Data from 1 plant, assumptions for larger plants
- nitrogen, liquid: 6.64921e-5 kg; source Angel Avadí 2014; triangular min 6.64921e-5, mostLikely 6.64921e-5, max 6.64921e-5, pedigree (2,3,3,5,1)
  Nitrogen for process
  Uncertainty: Data from 1 plant, assumptions for larger plants
- scrap tin sheet: -0.10884 kg; source Avadí, A. 2018
  Waste tinplate cans, area of sheets times weight of a sheet
  production volume 9.79387e7 kg
- fish curing plant: 1.29579e-8 unit; source Angel Avadí 2014
  One unit of plant represents the installed capacity required to process 1 t of raw material
- scrap aluminium: -0.000849256, -0.018101 kg (2 entries); source Avadí, A. 2018
  Waste aluminium cans
  production volume 1.70522e7 kg
- water, completely softened: 0.989887 kg; source Angel Avadí 2014; triangular min 0.989887, mostLikely 0.989887, max 0.989887, pedigree (2,3,3,5,1)
  Soft water for process
  Uncertainty: Data from 1 plant, assumptions for larger plants
- water, completely softened: 1.37723 kg; source Angel Avadí 2014; triangular min 1.37723, mostLikely 1.37723, max 1.37723, pedigree (2,3,3,5,1)
  Soft water for process
  Uncertainty: Data from 1 plant, assumptions for larger plants
- electricity, medium voltage: 0.000874605 kWh; source Angel Avadí 2014; triangular min 0.000874605, mostLikely 0.000874605, max 0.000874605, pedigree (2,3,3,5,1)
  (same comment as for electricity, medium voltage)
- electricity, medium voltage: 0.000433464 kWh; source Angel Avadí 2014; triangular min 0.000433464, mostLikely 0.000433464, max 0.000433464, pedigree (2,3,3,5,1)
  (same comment as for electricity, medium voltage)
- electricity, medium voltage: 0.00410391 kWh; source Angel Avadí 2014; triangular min 0.00410391, mostLikely 0.00410391, max 0.00410391, pedigree (2,3,3,5,1)
  (same comment as for electricity, medium voltage)
- electricity, medium voltage: 0.00146627 kWh; source Angel Avadí 2014; triangular min 0.00146627, mostLikely 0.00146627, max 0.00146627, pedigree (2,3,3,5,1)
  (same comment as for electricity, medium voltage)
- electricity, medium voltage: 5.52956e-5 kWh; source Angel Avadí 2014; triangular min 5.52956e-5, mostLikely 5.52956e-5, max 5.52956e-5, pedigree (2,3,3,5,1)
  (same comment as for electricity, medium voltage)
- electricity, medium voltage: 0.000453916 kWh; source Angel Avadí 2014; triangular min 0.000453916, mostLikely 0.000453916, max 0.000453916, pedigree (2,3,3,5,1)
  (same comment as for electricity, medium voltage)
- electricity, medium voltage: 6.93216e-5 kWh; source Angel Avadí 2014; triangular min 6.93216e-5, mostLikely 6.93216e-5, max 6.93216e-5, pedigree (2,3,3,5,1)
  (same comment as for electricity, medium voltage)
- electricity, medium voltage: 0.000114962 kWh; source Angel Avadí 2014; triangular min 0.000114962, mostLikely 0.000114962, max 0.000114962, pedigree (2,3,3,5,1)
  (same comment as for electricity, medium voltage)
- electricity, medium voltage: 2.30935e-6 kWh; source Angel Avadí 2014; triangular min 2.30935e-6, mostLikely 2.30935e-6, max 2.30935e-6, pedigree (2,3,3,5,1)
  (same comment as for electricity, medium voltage)
- electricity, medium voltage: 9.3738e-5 kWh; source Angel Avadí 2014; triangular min 9.3738e-5, mostLikely 9.3738e-5, max 9.3738e-5, pedigree (2,3,3,5,1)
  (same comment as for electricity, medium voltage)
- electricity, medium voltage: 0.00013352 kWh; source Angel Avadí 2014; triangular min 0.00013352, mostLikely 0.00013352, max 0.00013352, pedigree (2,3,3,5,1)
  (same comment as for electricity, medium voltage)
- electricity, medium voltage: 6.57837e-5 kWh; source Angel Avadí 2014; triangular min 6.57837e-5, mostLikely 6.57837e-5, max 6.57837e-5, pedigree (2,3,3,5,1)
  (same comment as for electricity, medium voltage)
- electricity, medium voltage: 4.46274e-5 kWh; source Angel Avadí 2014; triangular min 4.46274e-5, mostLikely 4.46274e-5, max 4.46274e-5, pedigree (2,3,3,5,1)
  (same comment as for electricity, medium voltage)
- electricity, medium voltage: 4.01773e-6 kWh; source Angel Avadí 2014; triangular min 4.01773e-6, mostLikely 4.01773e-6, max 4.01773e-6, pedigree (2,3,3,5,1)
  (same comment as for electricity, medium voltage)
- electricity, medium voltage: 1.35475e-5 kWh; source Angel Avadí 2014; triangular min 1.35475e-5, mostLikely 1.35475e-5, max 1.35475e-5, pedigree (2,3,3,5,1)
  (same comment as for electricity, medium voltage)
- electricity, medium voltage: 0.00165346 kWh; source Angel Avadí 2014; triangular min 0.00165346, mostLikely 0.00165346, max 0.00165346, pedigree (2,3,3,5,1)
  (same comment as for electricity, medium voltage)
- electricity, medium voltage: 2.4262e-5 kWh; source Angel Avadí 2014; triangular min 2.4262e-5, mostLikely 2.4262e-5, max 2.4262e-5, pedigree (2,3,3,5,1)
  (same comment as for electricity, medium voltage)
- electricity, medium voltage: 0.0002668 kWh; source Angel Avadí 2014; triangular min 0.0002668, mostLikely 0.0002668, max 0.0002668, pedigree (2,3,3,5,1)
  (same comment as for electricity, medium voltage)
- electricity, medium voltage: 6.4246e-5 kWh; source Angel Avadí 2014; triangular min 6.4246e-5, mostLikely 6.4246e-5, max 6.4246e-5, pedigree (2,3,3,5,1)
  (same comment as for electricity, medium voltage)
- electricity, medium voltage: 8.81559e-5 kWh; source Angel Avadí 2014; triangular min 8.81559e-5, mostLikely 8.81559e-5, max 8.81559e-5, pedigree (2,3,3,5,1)
  (same comment as for electricity, medium voltage)
- electricity, medium voltage: 0.00615852 kWh; source Angel Avadí 2014; triangular min 0.00615852, mostLikely 0.00615852, max 0.00615852, pedigree (2,3,3,5,1)
  (same comment as for electricity, medium voltage)
- electricity, medium voltage: 3.80933e-5 kWh; source Angel Avadí 2014; triangular min 3.80933e-5, mostLikely 3.80933e-5, max 3.80933e-5, pedigree (2,3,3,5,1)
  (same comment as for electricity, medium voltage)
- electricity, medium voltage: 6.7257e-5 kWh; source Angel Avadí 2014; triangular min 6.7257e-5, mostLikely 6.7257e-5, max 6.7257e-5, pedigree (2,3,3,5,1)
  (same comment as for electricity, medium voltage)
- electricity, medium voltage: 6.77952e-5 kWh; source Angel Avadí 2014; triangular min 6.77952e-5, mostLikely 6.77952e-5, max 6.77952e-5, pedigree (2,3,3,5,1)
  (same comment as for electricity, medium voltage)
- electricity, medium voltage: 0.000613023 kWh; source Angel Avadí 2014; triangular min 0.000613023, mostLikely 0.000613023, max 0.000613023, pedigree (2,3,3,5,1)
  (same comment as for electricity, medium voltage)
- electricity, medium voltage: 0.00452452 kWh; source Angel Avadí 2014; triangular min 0.00452452, mostLikely 0.00452452, max 0.00452452, pedigree (2,3,3,5,1)
  (same comment as for electricity, medium voltage)
- electricity, medium voltage: 0.0656008 kWh; source Angel Avadí 2014; triangular min 0.0656008, mostLikely 0.0656008, max 0.0656008, pedigree (2,3,3,5,1)
  (same comment as for electricity, medium voltage)
- electricity, medium voltage: 0.0213009 kWh; source Angel Avadí 2014; triangular min 0.0213009, mostLikely 0.0213009, max 0.0213009, pedigree (2,3,3,5,1)
  (same comment as for electricity, medium voltage)
- electricity, medium voltage: 0.0307613 kWh; source Angel Avadí 2014; triangular min 0.0307613, mostLikely 0.0307613, max 0.0307613, pedigree (2,3,3,5,1)
  (same comment as for electricity, medium voltage)
- heat, district or industrial, natural gas: 0.0107342 MJ; source Angel Avadí 2014; triangular min 0.0107342, mostLikely 0.0107342, max 0.0107342, pedigree (2,3,3,5,1)
  (same comment as for heat, district or industrial, natural gas)
- heat, district or industrial, natural gas: 0.244785 MJ; source Angel Avadí 2014; triangular min 0.244785, mostLikely 0.244785, max 0.244785, pedigree (2,3,3,5,1)
  (same comment as for heat, district or industrial, natural gas)
- waste polyethylene, for recycling, unsorted: -1.60594e-5, -0.00533618, -0.00161756 kg (3 entries); source Avadí, A. 2018
  Waste PET from barrels and packaging
  production volume 6.27171e6 kg

## Inputs from nature
- Water, unspecified natural origin [natural resource, in water]: 0 m3; name water_UNO_input; source Socolof M. L. 2005; pedigree (1,1,1,1,1)
  Literature Value.
  Uncertainty: data from an US-EPA LCA study

## Emissions to nature
- Water [water, unspecified]: 0 m3; name water_to_water_unspecified; = water_UNO_input*(1-fraction_PW_to_air); pedigree (1,1,1,1,1)
  Calculated value based on literature values and expert opinion. See comments in the parametres' comment field.
  property wet mass 1000 kg; name WM
  property dry mass 0 kg; name DM
  property carbon content, non-fossil 0; name C_content_non_fossil
  property fraction, origin: fresh water 0; name fraction_origin_fresh_water_Ww
  property fraction, origin: salt water 0; name fraction_origin_salt_water_Ww
  property fraction, origin: unspecified 1; name fraction_origin_unspecified_Ww
  property water in wet mass 1000 kg; name WWM
  property carbon content, fossil 0; name C_content_fossil
- Solids, inorganic [water, surface water]: 0 kg; source Socolof M. L. 2005; pedigree (1,1,1,1,1)
  Literature Value.
  Uncertainty: data from an US-EPA LCA study
- Iron, ion [water, surface water]: 0 kg; source Socolof M. L. 2005; pedigree (1,1,1,1,1)
  Literature Value.
  Uncertainty: data from an US-EPA LCA study
- DOC, Dissolved Organic Carbon [water, surface water]: 0 kg; pedigree (1,1,1,1,1)
  Calculated Value,as equal to TOC.
  Uncertainty: data from an US-EPA LCA study
- Lead [water, surface water]: 0 kg; source Socolof M. L. 2005; pedigree (1,1,1,1,1)
  Literature Value.
  Uncertainty: data from an US-EPA LCA study
- COD, Chemical Oxygen Demand [water, surface water]: 0 kg; source Socolof M. L. 2005; pedigree (1,1,1,1,1)
  Literature Value.
  Uncertainty: data from an US-EPA LCA study
- Oils, unspecified [water, surface water]: 0 kg; source Socolof M. L. 2005; pedigree (1,1,1,1,1)
  Literature Value.
  Uncertainty: data from an US-EPA LCA study
- Chromium [air, urban air close to ground]: 0 kg; source Socolof M. L. 2005; pedigree (1,1,1,1,1)
  Literature Value.
  Uncertainty: data from an US-EPA LCA study
- TOC, Total Organic Carbon [water, surface water]: 0 kg; pedigree (1,1,1,1,1)
  Calculated Value, by default as TOC (gC) = COD/2.7 (COD measured in g O2). Should more correctly be calculated from the carbon content of the specified emissions to water.
  Uncertainty: data from an US-EPA LCA study
- Nickel, ion [water, surface water]: 0 kg; source Socolof M. L. 2005; pedigree (1,1,1,1,1)
  Literature Value.
  Uncertainty: data from an US-EPA LCA study
- Chloride [water, surface water]: 0 kg; source Socolof M. L. 2005; pedigree (1,1,1,1,1)
  Literature Value.
  Uncertainty: data from an US-EPA LCA study
- Chromium, ion [water, surface water]: 0 kg; source Socolof M. L. 2005; pedigree (1,1,1,1,1)
  Literature Value.
  Uncertainty: data from an US-EPA LCA study
- Fluoride [water, surface water]: 0 kg; source Socolof M. L. 2005; pedigree (1,1,1,1,1)
  Literature Value.
  Uncertainty: data from an US-EPA LCA study
- BOD5, Biological Oxygen Demand [water, surface water]: 0 kg; source Socolof M. L. 2005; pedigree (1,1,1,1,1)
  Literature Value.
  Uncertainty: data from an US-EPA LCA study
- Water [air, unspecified]: 0 m3; name water_to_air_unspecified; = (water_UNO_input*fraction_PW_to_air); pedigree (1,1,1,1,1)
  (same comment as for Water)
  property fraction, origin: salt water 0; name fraction_origin_salt_water
  property fraction, origin: unspecified 1; name fraction_origin_unspecified
  property fraction, origin: fresh water 0; name fraction_origin_fresh_water
- Suspended solids, unspecified [water, surface water]: 0 kg; source Socolof M. L. 2005; pedigree (1,1,1,1,1)
  Literature Value.
  Uncertainty: data from an US-EPA LCA study
- Nitrate [water, surface water]: 0 kg; source Socolof M. L. 2005; pedigree (1,1,1,1,1)
  Literature Value.
  Uncertainty: data from an US-EPA LCA study
- Nitrogen [water, unspecified]: 0.00752778 kg; source Avadí, A. 2018; triangular min 0.00752778, mostLikely 0.00752778, max 0.00752778, pedigree (2,3,3,1,1)
  Emissions to water from process waters
  Uncertainty: Data from 1 plant, assumptions for larger plants
- Phosphorus [water, unspecified]: 0.00156255 kg; source Angel Avadí 2014; triangular min 0.00156255, mostLikely 0.00156255, max 0.00156255, pedigree (2,3,3,1,1)
  (same comment as for Nitrogen)

## Sampling procedure
literature

## Review by Jürgen Sutter 2007-11-08
passed.

## Review by Roland Hischier 2011-09-22
Transfer of Documentation done.
