# treatment of lead in car shredder residue, municipal incineration

Dataset: EcoSpold 2, unit process
Geography: RoW
Time period: 2006-01-01 to 2019-12-31
Technology level: current
Classification: ISIC rev.4 ecoinvent: 3821:Treatment and disposal of non-hazardous waste
Synonyms: Siedlungsabfallverbrennung; municipal waste incineration; Kehrichtverbrennung
Scenario: Business-as-Usual
System model: Allocation at the point of substitution
Share of production covered: 1.8 %
Generated by: Gabor Doka
Published in: Doka G. 2013
Database: ecoinvent
isCopyrightProtected: true
accessRestrictedTo: 1

## General comment
This dataset represents the activity of waste disposal of lead in car shredder residue in a municipal solid waste incinerator (MSWI) // Recommended use of this dataset: For disposal of rather fine or dusty lead, which goes to incineration as part of Automotive Shredder Residue (ASR). Due to fine grain size of the particles, 50% burnability is assumed, therefore not suited for less fine lead parts in waste. Pure, isolated lead fractions will not be disposed in incinerators, but rather go to recycling. // Inventoried waste contains 50% Pb in ASR burnable; 50% Pb in ASR inert; . // Waste composition (wet, in ppm): H2O n.a.; O n.a.; H n.a.; C n.a.; S n.a.; N n.a.; P n.a.; B n.a.; Cl n.a.; Br n.a.; F n.a.; I n.a.; Ag n.a.; As n.a.; Ba n.a.; Cd n.a.; Co n.a.; Cr n.a.; Cu n.a.; Hg n.a.; Mn n.a.; Mo n.a.; Ni n.a.; Pb 1000000; Sb n.a.; Se n.a.; Sn n.a.; V n.a.; Zn n.a.; Be n.a.; Sc n.a.; Sr n.a.; Ti n.a.; Tl n.a.; W n.a.; Si n.a.; Fe n.a.; Ca n.a.; Al n.a.; K n.a.; Mg n.a.; Na n.a.; // Share of carbon in waste that is biogenic 60.4%. // Share of metals in waste not oxidised and bulk-recyclable (exclude very small or thin parts) Iron: 0%; Alu: 0%; Copper: 0%. // One kg of this waste produces 0.9591 kg of slag and 0.2796 kg of residues, which are landfilled. Additional solidification with 0.1118 kg of cement. // Net energy production: 0MJ/kg electric energy and 0MJ/kg thermal energy. // Recovery of metal scrap to recycling: 0g iron scrap, 0g aluminium scrap, 0g copper scrap.

## Included activities start
waste incineration from waste reception gate and delivery into waste bunker at incinerator plant site (without transports to the incinerator)

## Included activities end
Waste-specific short-term emissions to water from leachate. Long-term emissions from landfill to ground water.

## Geography
Specific to the technology mix encountered in Switzerland in 2010. Well applicable to modern incineration practices in Europe, North America or Japan.

## Technology
average Swiss MSWI plants in 2010 (grate incinerators) with electrostatic precipitator for fly ash (ESP), wet flue gas scrubber and 25% SNCR , 42.77% SCR-high dust , 32.68% SCR-low dust -DeNOx facilities and 0% without Denox (weighted according to mass of burnt waste, representing Swiss average). Efficiency of iron scrap separation from slag : 58%. Efficiency of non-ferrous scrap separation from slag : 31%. Gross electric efficiency technology mix 15.84% and Gross thermal efficiency technology mix 28.51%

## Time period
Waste composition as given in literature reference, theoretical data or other source. Transfer coefficients for modern MSWI.

## Reference product
- lead in car shredder residue: -1 kg; By-product classification Waste; CPC 39364: Waste and scrap of lead; CAS 7439-92-1
  Main reference product of this activity (supply of disposal service).
  production volume 8.7936e6 kg
    based on estimate on MSW in WTE globally and share of lead metal from shredder residue composition in Swiss MSW
  property price 0 EUR2005
    Waste products are assigned a price of zero as they are assumed to require further treatment.
  property carbon content 0
    carbon content on a dry matter basis (reserved; not for manual entry)
  properties: carbon content, fossil 0, water content 0, carbon content, non-fossil 0, water in wet mass 0 kg, dry mass 1 kg, wet mass 1 kg, carbon allocation 0 kg

## Inputs from technosphere
- cement, unspecified: 0 kg; pedigree (1,1,1,1,1)
  Cement required for solidification of landfilled residual material.
  Uncertainty: Uncertainty calculated from uncertainty of the waste composition of this waste, of transfer coefficients in the incinerator and of the solidification recipe.
  properties: dry mass 1 kg, wet mass 1 kg
- chemical, inorganic: 0.00018432 kg; lognormal variance with pedigree 0.015901, pedigree (1,1,3,1,1)
  Auxilliary inputs for the wastewater treatment stage of the incinerator plant. Proxy for Polyelectrolyte.
  Uncertainty: uncertainty calculated from uncertainty in average Polyelectrolyte input, of transfer coefficients in the incinerator, and the uncertainty of the waste composition of this waste
  properties: dry mass 1 kg, carbon content, fossil 0.003, wet mass 1 kg
- process-specific burdens, residual material landfill: 0 kg; pedigree (1,1,1,1,1)
  Mass-specific expenditures required for landfilling of incineration residues.
  Uncertainty: uncertainty is calculated from uncertainties in waste composition and transfer coefficients in incinerator
- ammonia, liquid: 2.5093e-5 kg; lognormal variance with pedigree 0.14442, pedigree (1,1,3,1,1)
  Input to DeNOx stage (100% NH3).
  Uncertainty: uncertainty calculated from uncertainty in average DeNOx input, uncertainty in the share of thermal NOx, uncertainty of nitrogen content in average municipal waste and the uncertainty in nitrogen content in *this* waste.
  properties: wet mass 1 kg, dry mass 1 kg
- chromium oxide, flakes: 3.2084e-8 kg; lognormal variance with pedigree 0.4893, pedigree (1,1,3,1,1)
  Input to DeNOx stage.
  Uncertainty: uncertainty calculated from uncertainty in average DeNOx input, uncertainty in the share of thermal NOx, uncertainty of nitrogen content in average municipal waste and the uncertainty in nitrogen content in *this* waste.
  properties: dry mass 1 kg, wet mass 1 kg
- titanium dioxide: 1.5721e-6 kg; lognormal variance with pedigree 0.4893, pedigree (1,1,3,1,1)
  Input to DeNOx stage (TiO2 catalyst carrier)
  Uncertainty: uncertainty calculated from uncertainty in average DeNOx input, uncertainty in the share of thermal NOx, uncertainty of nitrogen content in average municipal waste and the uncertainty in nitrogen content in *this* waste.
  properties: dry mass 1 kg, wet mass 1 kg
- residual material landfill: 5.824e-10 unit; lognormal variance with pedigree 0.00273344, pedigree (1,1,3,1,1)
  Landfill infrastructure required for landfilling of incineration residues.
  Uncertainty: uncertainty is calculated from uncertainties in waste composition and transfer coefficients in incinerator
- iron (III) chloride, without water, in 40% solution state: 0.0091838 kg; lognormal variance with pedigree 0.015901, pedigree (1,1,3,1,1)
  Auxilliary inputs for the wastewater treatment stage of the incinerator plant.
  Uncertainty: uncertainty calculated from uncertainty in average FeCl3 input, of transfer coefficients in the incinerator, and the uncertainty of the waste composition of this waste
  properties: dry mass 1 kg, wet mass 1 kg
- process-specific burdens, slag landfill: 0 kg; pedigree (1,1,1,1,1)
  Mass-specific expenditures required for landfilling of bottom ash.
  Uncertainty: uncertainty is calculated from uncertainties in waste composition and transfer coefficients in incinerator
- waste cement, hydrated: 0 kg; pedigree (1,1,1,1,1)
  Hydrated cement output for solidification of landfilled residual material.
  Uncertainty: Uncertainty calculated from uncertainty of the waste composition of this waste and transfer coefficients in the incinerator and of the solidification recipe.
  production volume 0 kg
    calculated in proportion to reference product waste input to incinerator
  properties: dry mass 1 kg, wet mass 1 kg
- municipal waste incineration facility: 2.5e-10 unit
  Demands per kilogram waste.
- slag landfill: 1.7051e-9 unit; lognormal variance with pedigree 0.0057505, pedigree (1,1,3,1,1)
  Landfill infrastructure required for landfilling of bottom ash.
  Uncertainty: uncertainty is calculated from uncertainties in waste composition and transfer coefficients in incinerator
- water, decarbonised: 0 kg; pedigree (1,1,1,1,1)
  Incinerator process water used in flue gas scrubber stage.
  Uncertainty: uncertainty calculated from uncertainty in average water input, and the uncertainty of the waste composition of this waste
  properties: wet mass 1 kg
- heat, for reuse in municipal waste incineration only: 0 MJ; name E_th_prod_MSWI; pedigree (1,1,1,1,1)
  Net heat required to incinerate this waste (subsidiesed from high-calorific waste fractions).
  Uncertainty: uncertainty is calculated from uncertainties in waste composition and uncertainties in energy efficiency and the uncertainty in internal energy demand
- electricity, for reuse in municipal waste incineration only: 0 kWh; name E_el_prod_MSWI; pedigree (1,1,1,1,1)
  Net electricity required to incinerate this waste (subsidiesed from high-calorific waste fractions).
  Uncertainty: uncertainty is calculated from uncertainties in waste composition and uncertainties in energy efficiency and the uncertainty in internal energy demand
- transport, freight, lorry, unspecified: 0 metric ton*km; pedigree (1,1,1,1,1)
  Transport services to transport incineration residues to landfills.
  Uncertainty: uncertainty calculated from uncertainty of the waste composition of this waste, uncertainty of transfer coefficients and the uncertainty in generic transportation distances
- hydrochloric acid, without water, in 30% solution state: 4.8446e-5 kg; lognormal variance with pedigree 0.015901, pedigree (1,1,3,1,1)
  Auxilliary inputs for the wastewater treatment stage of the incinerator plant.
  Uncertainty: uncertainty calculated from uncertainty in average HCl input, of transfer coefficients in the incinerator, and the uncertainty of the waste composition of this waste
  properties: dry mass 1 kg, wet mass 1 kg
- heat, district or industrial, natural gas: 0 MJ; pedigree (1,1,1,1,1)
  Input to DeNOx stage, to heat up flue gas in low-dust SCR.
  Uncertainty: uncertainty calculated from uncertainty in average DeNOx input, uncertainty in the share of thermal NOx, uncertainty of nitrogen content in average municipal waste and the uncertainty in nitrogen content in *this* waste.
- cement, unspecified: 0.00335957, 0.000246066, 0.000701367, 0.0161463, 0.0158617, 0.000466855, 0.00512745, 0.000620364, 0.0692903 kg (9 entries); lognormal variance with pedigree 0.0118175, pedigree (1,1,3,1,1)
  (same comment as for cement, unspecified)
- process-specific burdens, residual material landfill: 0.0790776, 0.200472 kg (2 entries); lognormal variance with pedigree 0.00273344, pedigree (1,1,3,1,1)
  (same comment as for process-specific burdens, residual material landfill)
- process-specific burdens, slag landfill: 0.271311, 0.687809 kg (2 entries); lognormal variance with pedigree 0.0057505, pedigree (1,1,3,1,1)
  (same comment as for process-specific burdens, slag landfill)
- waste cement, hydrated: -0.0790776, -0.200472 kg (2 entries); lognormal variance with pedigree 0.0118175, pedigree (1,1,3,1,1)
  (same comment as for waste cement, hydrated)
  production volume 2.4583e6 kg
- water, decarbonised: 0.0197023, 0.0512654, 0.206765, 0.050491, 0.0101787, 0.0334696, 0.00184772, 0.0263297, 0.0613326, 0.384723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 kg (12 entries); lognormal variance with pedigree 0.015901, pedigree (1,1,3,1,1)
  (same comment as for water, decarbonised)
- heat, for reuse in municipal waste incineration only: 0.000107195, 0.000212092, 0.0048466, 3.119e-6, 0.0013896, 0.000288754, 0.000238193, 7.28861e-5, 0.000554689, 0.000434197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 MJ (20 entries); lognormal variance with pedigree 0.00259512, pedigree (1,1,3,1,1)
  (same comment as for heat, for reuse in municipal waste incineration only)
- heat, for reuse in municipal waste incineration only: 0, 0, 0, 0, 0 MJ (5 entries); pedigree (1,1,1,1,1)
  (same comment as for heat, for reuse in municipal waste incineration only)
- electricity, for reuse in municipal waste incineration only: 8.97816e-5, 0.000177638, 1.92487e-6, 2.61233e-6, 0.00116386, 0.000241846, 0.000199499, 6.1046e-5, 0.000464582, 0.000363663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 kWh (20 entries); lognormal variance with pedigree 0.00259512, pedigree (1,1,3,1,1)
  (same comment as for electricity, for reuse in municipal waste incineration only)
- electricity, for reuse in municipal waste incineration only: 0, 0, 0, 0, 0 kWh (5 entries); pedigree (1,1,1,1,1)
  (same comment as for electricity, for reuse in municipal waste incineration only)
- transport, freight, lorry, unspecified: 0.00336018, 0.0461868 metric ton*km (2 entries); lognormal variance with pedigree 0.004289, pedigree (1,1,3,1,1)
  (same comment as for transport, freight, lorry, unspecified)
- heat, district or industrial, natural gas: 8.15555e-5, 0.00461074 MJ (2 entries); lognormal variance with pedigree 0.14442, pedigree (1,1,3,1,1)
  (same comment as for heat, district or industrial, natural gas)

## Inputs from nature
- Oxygen [natural resource, in air]: 0.077221 kg; lognormal variance with pedigree 0.002, pedigree (1,1,3,1,1)
  Oxygen from ambient air needed to combust and oxidise this waste. Net demand, i.e. without O2 leaving the plant in flue gas uncombusted.
  Uncertainty: uncertainty is calculated from uncertainties in waste composition and transfer coefficients to flue gas and soild residues in incinerator

## Emissions to nature
- Water [water, surface water]: 0.00042119 m3; lognormal variance with pedigree 0.155, pedigree (1,1,3,1,1)
  Process water released to surface water.
  Uncertainty: uncertainty calculated from uncertainty in process water input and the uncertainty of fraction to surface water.
- Lead [water, surface water]: 5.6955e-5 kg; lognormal variance with pedigree 0.25866, pedigree (1,1,3,1,1)
  Emissions to water from waste composition and transfer coefficients in incinerator and landfills.
  Uncertainty: uncertainty is calculated from uncertainties in waste composition and transfer coefficients in incinerator and landfills
- NMVOC, non-methane volatile organic compounds, unspecified origin [air, urban air close to ground]: 2.2325e-6 kg; lognormal variance with pedigree 0.100962, pedigree (1,1,3,1,1)
  Incomplete combustion product emitted to air.
  Uncertainty: uncertainty calculated from uncertainty in average operation emissions, and the uncertainty of the flue gas volume from this waste.
- Toluene [air, urban air close to ground]: 9.8113e-8 kg; lognormal variance with pedigree 0.100962, pedigree (1,1,3,1,1)
  (same comment as for NMVOC, non-methane volatile organic compounds, unspecified origin)
- Water [air, urban air close to ground]: 0.00080727 m3; lognormal variance with pedigree 0.16616, pedigree (1,1,3,1,1)
  Water vapour from waste humidity, hydrogen oxidation and part of the process water.
  Uncertainty: Uncertainty calculated from uncertainty in waste composition, process water input and the uncertainty of fraction to air.
- Heat, waste [air, urban air close to ground]: 0.08637 MJ; lognormal variance with pedigree 0.00298726, pedigree (1,1,3,1,1)
  Waste heat generated from heating value of this waste plus any electricity required to process it.
  Uncertainty: uncertainty is calculated from uncertainties in waste composition and uncertainties in energy efficiency and the uncertainty in internal energy demand
- Benzene, hexachloro- [air, urban air close to ground]: 1.0257e-10 kg; lognormal variance with pedigree 0.100962, pedigree (1,1,3,1,1)
  (same comment as for NMVOC, non-methane volatile organic compounds, unspecified origin)
- Carbon monoxide, fossil [air, urban air close to ground]: 3.3014e-5 kg; lognormal variance with pedigree 0.8421, pedigree (1,1,3,1,1)
  (same comment as for NMVOC, non-methane volatile organic compounds, unspecified origin)
- Phenol, pentachloro- [air, urban air close to ground]: 2.1363e-11 kg; lognormal variance with pedigree 0.100962, pedigree (1,1,3,1,1)
  (same comment as for NMVOC, non-methane volatile organic compounds, unspecified origin)
- Lead [air, urban air close to ground]: 4.1193e-5 kg; lognormal variance with pedigree 0.041542, pedigree (1,1,3,1,1)
  Emission to air from waste composition and transfer coefficients.
  Uncertainty: uncertainty is calculated from uncertainties in waste composition and transfer coefficients in incinerator
- Benzo(a)pyrene [air, urban air close to ground]: 1.0917e-12 kg; lognormal variance with pedigree 0.43913, pedigree (1,1,3,1,1)
  (same comment as for NMVOC, non-methane volatile organic compounds, unspecified origin)
- Lead [water, ground-, long-term]: 0.74174 kg; lognormal variance with pedigree 1.3971, pedigree (1,1,3,1,1)
  Long-term emissions from landfilling of incineration residues.
  Uncertainty: uncertainty is calculated from uncertainties in waste composition and transfer coefficients in incinerator and landfills.
- Dioxins, measured as 2,3,7,8-tetrachlorodibenzo-p-dioxin [air, urban air close to ground]: 9.8106e-14 kg; lognormal variance with pedigree 0.43913, pedigree (1,1,3,1,1)
  (same comment as for NMVOC, non-methane volatile organic compounds, unspecified origin)
- Ammonia [air, urban air close to ground]: 2.9502e-8 kg; lognormal variance with pedigree 0.19004, pedigree (1,1,3,1,1)
  Nitrogen species emitted to air after DeNOx stage.
  Uncertainty: uncertainty calculated from uncertainty in average N-emissions and uncertainty in the share of thermal NOx and the uncertainty in nitrogen content in *this* waste.
- Particulates, < 2.5 um [air, urban air close to ground]: 5.8569e-6 kg; lognormal variance with pedigree 0.43913, pedigree (1,1,3,1,1)
  (same comment as for NMVOC, non-methane volatile organic compounds, unspecified origin)
- Methane, fossil [air, urban air close to ground]: 2.9132e-7 kg; lognormal variance with pedigree 0.100962, pedigree (1,1,3,1,1)
  (same comment as for NMVOC, non-methane volatile organic compounds, unspecified origin)
- Benzene [air, urban air close to ground]: 4.9056e-8 kg; lognormal variance with pedigree 0.100962, pedigree (1,1,3,1,1)
  (same comment as for NMVOC, non-methane volatile organic compounds, unspecified origin)
- Heat, waste [water, surface water]: 0.019748 MJ; lognormal variance with pedigree 0.00298726, pedigree (1,1,3,1,1)
  (same comment as for Heat, waste)
- Nitrogen oxides [air, urban air close to ground]: 9.3424e-6 kg; lognormal variance with pedigree 0.19004, pedigree (1,1,3,1,1)
  Sum of fuel-Nox and thermal-NOx emitted to air after DeNOx stage.
  Uncertainty: uncertainty calculated from uncertainty in average N-emissions and uncertainty in the share of thermal NOx and the uncertainty in nitrogen content in *this* waste.
- Particulates, > 2.5 um, and < 10um [air, urban air close to ground]: 2.9432e-8 kg; lognormal variance with pedigree 0.21215, pedigree (1,1,3,1,1)
  (same comment as for NMVOC, non-methane volatile organic compounds, unspecified origin)
- Benzene, pentachloro- [air, urban air close to ground]: 2.5918e-10 kg; lognormal variance with pedigree 0.100962, pedigree (1,1,3,1,1)
  (same comment as for NMVOC, non-methane volatile organic compounds, unspecified origin)
- Carbon monoxide, non-fossil [air, urban air close to ground]: 5.0376e-5 kg; lognormal variance with pedigree 0.8421, pedigree (1,1,3,1,1)
  (same comment as for NMVOC, non-methane volatile organic compounds, unspecified origin)
- Methane, non-fossil [air, urban air close to ground]: 4.4452e-7 kg; lognormal variance with pedigree 0.100962, pedigree (1,1,3,1,1)
  (same comment as for NMVOC, non-methane volatile organic compounds, unspecified origin)
