# treatment of waste polyurethane, open dump, wet infiltration class (500mm)

Dataset: EcoSpold 2, unit process
Geography: GLO
Time period: 2006-01-01 to 2019-12-31
Technology level: current
Classification: ISIC rev.4 ecoinvent: 3821:Treatment and disposal of non-hazardous waste
Synonyms: municipal waste landfill
Scenario: Business-as-Usual
System model: Allocation at the point of substitution
Share of production covered: 1 %
Generated by: Avraam Symeonidis
Database: ecoinvent
isCopyrightProtected: true
accessRestrictedTo: 1

## General comment
This dataset represents the activity of waste disposal of waste polyurethane in a open dump. Recommended use of this dataset: For PU, which goes to disposal as part of unmanaged communal waste mixture. // Waste composition (wet, in ppm): upper heating value 30.9 MJ/kg; lower heating value 30.67 MJ/kg; H2O 2000; O 178700; H 84276; C 640700; S 203.07; N 60922; P n.a.; B n.a.; Cl 24369; Br 70.934; F 14.896; I n.a.; Ag n.a.; As 1.9253; Ba 188.99; Cd 82.301; Co 32.011; Cr 41.41; Cu 321.89; Hg 0.86045; Mn 80.984; Mo n.a.; Ni 20.874; Pb 473.27; Sb 43.54; Se 2.128; Sn 26.555; V 291.99; Zn 566.54; Be 0.50667; Sc n.a.; Sr 89.68; Ti 1013.3; Tl 0.40534; W n.a.; Si n.a.; Fe 3775.4; Ca n.a.; Al 202.67; K n.a.; Mg n.a.; Na 1485; . // Share of carbon in waste that is biogenic 0%. Share of metals in waste not oxidised and bulk-recyclable (exclude very small or thin parts) Iron: 0%; Alu: 0%; Copper: 0%. Overall degradability of waste during 100 years: 1%.

## Included activities start
from final waste deposition (without transports to the site)

## Included activities end
Waste-specific short-term emissions to air via landfill gas and landfill leachate. Waste-specific long-term emissions from landfill.

## Geography
Given name of landfill location is 'infiltration class 4 wet (2018)'. Landfill site with mean annual temperature (MAT) of 8 degC, mean annual precipitation (MAP) of 1100 mm/year, and net infiltration of 500 mm/year.
Climate adjustments result in an alpha t (temperature) for permafrost areas of 0.999. Total climate adjustments with alpha pt of 0.999.

## Technology
This is an inventory for an open, uncontrolled waste dump for municipal solid waste. Ultimate average landfill height is 7 meters. Operation phase duration is 15 years.Percentage of landfill gas directly emitted is 100w%. A Methane Correction Factor (MCF) for landfill air emissions of 0.7057 is employed.
Leachate of the landfill is not treated. Based on average waste composition and climate data the end of carbonate phase is estimated to be reached 1632 years after waste deposition.

## Reference product
- waste polyurethane: -1 kg; CPC 39270: Waste, parings and scrap of plastics; By-product classification Waste; CAS 9009-54-5; pedigree (1,1,1,1,1)
  main reference product of this activity (supply of disposal service).
  Uncertainty: Uncertainty is not adjusted, as this is the refence product
  production volume 1 kg
    The amount of the annual production volume is a placeholder value. The contribution of this technology to the different local markets can be found in the markets themselves.
  property price 0 EUR2005
    Waste products are assigned a price of zero as they are assumed to require further treatment.
  property carbon content 0.64198
    carbon content on a dry matter basis (reserved; not for manual entry)
  properties: heating value, gross 30.896 MJ, heating value, net 30.671 MJ, bromine content 7.1076e-5, cadmium content 8.2466e-5, barium content 0.00018937, oxygen content 0.17906, sulfur content 0.00020348, selenium content 2.1323e-6, mercury content 8.6217e-7, aluminium content 0.00020307, lead content 0.00047422, tin content 2.6608e-5, chromium content 4.1493e-5, thallium content 4.0615e-7, iron content 0.0037829, titanium content 0.0010154, cobalt content 3.2075e-5, wet mass 1 kg, manganese content 8.1146e-5, nickel content 2.0916e-5, vanadium content 0.00029258, sodium content 0.001488, water in wet mass 0.002 kg, antimony content 4.3627e-5, zinc content 0.00056767, copper content 0.00032253, strontium content 8.986e-5, water content 0.002004, beryllium content 5.0768e-7, carbon content, fossil 0.64198, dry mass 0.998 kg, fluorine content 1.4926e-5, arsenic content 1.9292e-6, nitrogen content 0.061044, chlorine content 0.024418, hydrogen content 0.084444, carbon allocation 0.640696 kg

## Emissions to nature
- Copper, ion [water, ground-]: 1.5744e-8 kg; lognormal variance with pedigree 0.46624, pedigree (1,1,3,1,1)
  burden from short-term leachate to groundwater in uncontrolled landfill in moist cimate.
  Uncertainty: Uncertainty calculated from unertainty of the waste composition of this waste, uncertainty in waste decomposition and short-term leaching in landfill
- Hydrogen sulfide [water, ground-, long-term]: 1.4727e-5 kg; lognormal variance with pedigree 0.21895, pedigree (1,1,3,1,1)
  Emissions from long-term leachate (>100a) directly from MSW landfill and indirectly via incineration of treatement sludge from leachate treatement.
  Uncertainty: Uncertainty calculated depending on waste input and uncertainty of long-term transfer coefficents in landfill.
- Barium [air, non-urban air or from high stacks]: 5.4047e-10 kg; lognormal variance with pedigree 0.57728, pedigree (1,1,3,1,1)
  burden from direct release or incineration of landfill biogas; or windblown leachate evaporite in arid climates.
  Uncertainty: Uncertainty calculated from unertainty of the waste composition of this waste, uncertainty in waste decomposition and short-term leaching in landfill
- Mercury [water, ground-]: 5.8871e-10 kg; lognormal variance with pedigree 0.57477, pedigree (1,1,3,1,1)
  (same comment as for Copper, ion)
- Nitrogen, organic bound [water, ground-, long-term]: 0.039587 kg; lognormal variance with pedigree 0.043978, pedigree (1,1,3,1,1)
  (same comment as for Hydrogen sulfide)
- Cadmium [air, non-urban air or from high stacks]: 9.6429e-10 kg; lognormal variance with pedigree 0.55874, pedigree (1,1,3,1,1)
  (same comment as for Barium)
- Cadmium, ion [water, ground-]: 1.4464e-7 kg; lognormal variance with pedigree 0.39403, pedigree (1,1,3,1,1)
  (same comment as for Copper, ion)
- Ammonium, ion [water, ground-, long-term]: 0.024221 kg; lognormal variance with pedigree 0.043978, pedigree (1,1,3,1,1)
  (same comment as for Hydrogen sulfide)
- Cobalt [air, non-urban air or from high stacks]: 2.5692e-11 kg; lognormal variance with pedigree 0.67748, pedigree (1,1,3,1,1)
  (same comment as for Barium)
- Cobalt [water, ground-]: 1.0277e-7 kg; lognormal variance with pedigree 0.40634, pedigree (1,1,3,1,1)
  (same comment as for Copper, ion)
- TOC, Total Organic Carbon [water, ground-, long-term]: 0.6343 kg; lognormal variance with pedigree 0.003504, pedigree (1,1,3,1,1)
  (same comment as for Hydrogen sulfide)
- Arsenic [air, non-urban air or from high stacks]: 4.8422e-11 kg; lognormal variance with pedigree 0.65763, pedigree (1,1,3,1,1)
  (same comment as for Barium)
- Chromium VI [water, ground-]: 4.7146e-9 kg; lognormal variance with pedigree 0.50644, pedigree (1,1,3,1,1)
  (same comment as for Copper, ion)
- Sulfate [water, ground-, long-term]: 0.00056497 kg; lognormal variance with pedigree 0.21895, pedigree (1,1,3,1,1)
  (same comment as for Hydrogen sulfide)
- Hydrogen chloride [air, non-urban air or from high stacks]: 8.8349e-6 kg; lognormal variance with pedigree 0.26535, pedigree (1,1,3,1,1)
  (same comment as for Barium)
- Fluoride [water, ground-]: 1.093e-8 kg; lognormal variance with pedigree 0.47907, pedigree (1,1,3,1,1)
  (same comment as for Copper, ion)
- COD, Chemical Oxygen Demand [water, ground-, long-term]: 0.69376 kg; lognormal variance with pedigree 0.003504, pedigree (1,1,3,1,1)
  (same comment as for Hydrogen sulfide)
- Hydrogen fluoride [air, non-urban air or from high stacks]: 5.9307e-8 kg; lognormal variance with pedigree 0.42659, pedigree (1,1,3,1,1)
  (same comment as for Barium)
- Barium [water, ground-]: 2.1619e-6 kg; lognormal variance with pedigree 0.30849, pedigree (1,1,3,1,1)
  (same comment as for Copper, ion)
- DOC, Dissolved Organic Carbon [water, ground-, long-term]: 0.6343 kg; lognormal variance with pedigree 0.003504, pedigree (1,1,3,1,1)
  (same comment as for Hydrogen sulfide)
- Bromine [air, non-urban air or from high stacks]: 2.5012e-8 kg; lognormal variance with pedigree 0.45121, pedigree (1,1,3,1,1)
  (same comment as for Barium)
- Arsenic, ion [water, ground-]: 3.4541e-9 kg; lognormal variance with pedigree 0.51745, pedigree (1,1,3,1,1)
  (same comment as for Copper, ion)
- BOD5, Biological Oxygen Demand [water, ground-, long-term]: 0.16424 kg; lognormal variance with pedigree 0.003504, pedigree (1,1,3,1,1)
  (same comment as for Hydrogen sulfide)
- Nitrogen oxides [air, non-urban air or from high stacks]: 8.3456e-7 kg; lognormal variance with pedigree 0.20291, pedigree (1,1,3,1,1)
  burden from direct release or incineration of landfill biogas.
  Uncertainty: Uncertainty calculated from unertainty of the waste composition of this waste, uncertainty in waste decomposition and short-term leaching in landfill
- Nitrate [water, ground-]: 6.0975e-5 kg; lognormal variance with pedigree 0.11069, pedigree (1,1,3,1,1)
  (same comment as for Copper, ion)
- Sulfur dioxide [air, non-urban air or from high stacks]: 2.647e-7 kg; lognormal variance with pedigree 0.39609, pedigree (1,1,3,1,1)
  (same comment as for Nitrogen oxides)
- Bromine [water, ground-]: 1.7842e-6 kg; lognormal variance with pedigree 0.3186, pedigree (1,1,3,1,1)
  (same comment as for Copper, ion)
- Carbon dioxide, fossil [air, non-urban air or from high stacks]: 0.013787 kg; lognormal variance with pedigree 0.096428, pedigree (1,1,3,1,1)
  (same comment as for Nitrogen oxides)
- Chloride [water, ground-]: 0.00061294 kg; lognormal variance with pedigree 0.13274, pedigree (1,1,3,1,1)
  (same comment as for Copper, ion)
- Occupation, dump site [natural resource, land]: 0.0035714 m2*year; lognormal variance with pedigree 0.082256, pedigree (1,1,3,1,1)
  for landfill operation phase and spontaneous renaturation.
  Uncertainty: Uncertainty calculated from uncertainty in base parameters.
- Ammonium, ion [water, ground-]: 0.00057979 kg; lognormal variance with pedigree 0.11069, pedigree (1,1,3,1,1)
  (same comment as for Copper, ion)
- Methane, fossil [air, non-urban air or from high stacks]: 0.0032707 kg; lognormal variance with pedigree 0.10656, pedigree (1,1,3,1,1)
  (same comment as for Nitrogen oxides)
- Nitrogen, organic bound [water, ground-]: 0.00094764 kg; lognormal variance with pedigree 0.11069, pedigree (1,1,3,1,1)
  (same comment as for Copper, ion)
- Iron, ion [water, ground-, long-term]: 0.0037748 kg; lognormal variance with pedigree 0.12378, pedigree (1,1,3,1,1)
  (same comment as for Hydrogen sulfide)
- Nitrite [water, ground-]: 3.1557e-5 kg; lognormal variance with pedigree 0.11069, pedigree (1,1,3,1,1)
  (same comment as for Copper, ion)
- Aluminium [water, ground-, long-term]: 0.00020257 kg; lognormal variance with pedigree 0.21902, pedigree (1,1,3,1,1)
  (same comment as for Hydrogen sulfide)
- Sulfate [water, ground-]: 2.1107e-6 kg; lognormal variance with pedigree 0.34027, pedigree (1,1,3,1,1)
  (same comment as for Copper, ion)
- Sodium, ion [water, ground-, long-term]: 0.0014236 kg; lognormal variance with pedigree 0.1536, pedigree (1,1,3,1,1)
  (same comment as for Hydrogen sulfide)
- Hydrogen sulfide [water, ground-]: 5.502e-8 kg; lognormal variance with pedigree 0.34027, pedigree (1,1,3,1,1)
  (same comment as for Copper, ion)
- Thallium [water, ground-, long-term]: 4.051e-7 kg; lognormal variance with pedigree 0.42346, pedigree (1,1,3,1,1)
  (same comment as for Hydrogen sulfide)
- DOC, Dissolved Organic Carbon [water, ground-]: 0.00018639 kg; lognormal variance with pedigree 0.20711, pedigree (1,1,3,1,1)
  (same comment as for Copper, ion)
- Titanium, ion [water, ground-, long-term]: 0.0010128 kg; lognormal variance with pedigree 0.16597, pedigree (1,1,3,1,1)
  (same comment as for Hydrogen sulfide)
- Heat, waste [water, ground-, long-term]: 30.587 MJ; lognormal variance with pedigree 0.014651, pedigree (1,1,3,1,1)
  burden from long-term decomposition of waste (>100a).
  Uncertainty: Uncertainty calculated from unertainty of the waste composition of this waste, uncertainty in waste decomposition and short-term leaching in landfill
- Strontium [water, ground-, long-term]: 8.9628e-5 kg; lognormal variance with pedigree 0.24613, pedigree (1,1,3,1,1)
  (same comment as for Hydrogen sulfide)
- TOC, Total Organic Carbon [water, ground-]: 0.00018639 kg; lognormal variance with pedigree 0.20711, pedigree (1,1,3,1,1)
  (same comment as for Copper, ion)
- Beryllium [water, ground-, long-term]: 5.0637e-7 kg; lognormal variance with pedigree 0.41629, pedigree (1,1,3,1,1)
  (same comment as for Hydrogen sulfide)
- COD, Chemical Oxygen Demand [water, ground-]: 0.00020386 kg; lognormal variance with pedigree 0.20711, pedigree (1,1,3,1,1)
  (same comment as for Copper, ion)
- Vanadium, ion [water, ground-, long-term]: 3.8195e-5 kg; lognormal variance with pedigree 0.46543, pedigree (1,1,3,1,1)
  (same comment as for Hydrogen sulfide)
- BOD5, Biological Oxygen Demand [water, ground-]: 4.8262e-5 kg; lognormal variance with pedigree 0.20711, pedigree (1,1,3,1,1)
  (same comment as for Copper, ion)
- Zinc, ion [water, ground-, long-term]: 0.00056627 kg; lognormal variance with pedigree 0.18502, pedigree (1,1,3,1,1)
  (same comment as for Hydrogen sulfide)
- Heat, waste [soil, industrial]: 0.25694 MJ; lognormal variance with pedigree 0.056267, pedigree (1,1,3,1,1)
  burden from short-term decomposition of waste (0-100a).
  Uncertainty: Uncertainty calculated from unertainty of the waste composition of this waste, uncertainty in waste decomposition and short-term leaching in landfill
- Selenium [water, ground-, long-term]: 2.6852e-7 kg; lognormal variance with pedigree 0.63756, pedigree (1,1,3,1,1)
  (same comment as for Hydrogen sulfide)
- Sodium [air, non-urban air or from high stacks]: 1.5346e-8 kg; lognormal variance with pedigree 0.46744, pedigree (1,1,3,1,1)
  (same comment as for Barium)
- Antimony [water, ground-, long-term]: 1.8343e-6 kg; lognormal variance with pedigree 0.89696, pedigree (1,1,3,1,1)
  (same comment as for Hydrogen sulfide)
- Aluminium [air, non-urban air or from high stacks]: 2.5297e-11 kg; lognormal variance with pedigree 0.67533, pedigree (1,1,3,1,1)
  (same comment as for Barium)
- Tin, ion [water, ground-, long-term]: 2.6553e-5 kg; lognormal variance with pedigree 0.28661, pedigree (1,1,3,1,1)
  (same comment as for Hydrogen sulfide)
- Iron [air, non-urban air or from high stacks]: 1.2949e-10 kg; lognormal variance with pedigree 0.62045, pedigree (1,1,3,1,1)
  (same comment as for Barium)
- Sodium, ion [water, ground-]: 6.1383e-5 kg; lognormal variance with pedigree 0.20493, pedigree (1,1,3,1,1)
  (same comment as for Copper, ion)
- Lead [water, ground-, long-term]: 0.00047325 kg; lognormal variance with pedigree 0.19094, pedigree (1,1,3,1,1)
  (same comment as for Hydrogen sulfide)
- Thallium [air, non-urban air or from high stacks]: 5.8843e-14 kg; lognormal variance with pedigree 0.87501, pedigree (1,1,3,1,1)
  (same comment as for Barium)
- Thallium [water, ground-]: 2.3537e-10 kg; lognormal variance with pedigree 0.60437, pedigree (1,1,3,1,1)
  (same comment as for Copper, ion)
- Manganese [water, ground-, long-term]: 8.0057e-5 kg; lognormal variance with pedigree 0.24953, pedigree (1,1,3,1,1)
  (same comment as for Hydrogen sulfide)
- Beryllium [air, non-urban air or from high stacks]: 7.3554e-14 kg; lognormal variance with pedigree 0.86784, pedigree (1,1,3,1,1)
  (same comment as for Barium)
- Titanium, ion [water, ground-]: 5.0594e-7 kg; lognormal variance with pedigree 0.35183, pedigree (1,1,3,1,1)
  (same comment as for Copper, ion)
- Nickel, ion [water, ground-, long-term]: 2.0862e-5 kg; lognormal variance with pedigree 0.29461, pedigree (1,1,3,1,1)
  (same comment as for Hydrogen sulfide)
- Titanium [air, non-urban air or from high stacks]: 1.2649e-10 kg; lognormal variance with pedigree 0.62228, pedigree (1,1,3,1,1)
  (same comment as for Barium)
- Aluminium [water, ground-]: 1.0119e-7 kg; lognormal variance with pedigree 0.40488, pedigree (1,1,3,1,1)
  (same comment as for Copper, ion)
- Mercury [water, ground-, long-term]: 8.5963e-7 kg; lognormal variance with pedigree 0.39922, pedigree (1,1,3,1,1)
  (same comment as for Hydrogen sulfide)
- Strontium [air, non-urban air or from high stacks]: 1.3019e-11 kg; lognormal variance with pedigree 0.69768, pedigree (1,1,3,1,1)
  (same comment as for Barium)
- Iron, ion [water, ground-]: 5.1794e-7 kg; lognormal variance with pedigree 0.3522, pedigree (1,1,3,1,1)
  (same comment as for Copper, ion)
- Copper, ion [water, ground-, long-term]: 0.00032187 kg; lognormal variance with pedigree 0.20368, pedigree (1,1,3,1,1)
  (same comment as for Hydrogen sulfide)
- Vanadium [air, non-urban air or from high stacks]: 7.6888e-11 kg; lognormal variance with pedigree 0.63961, pedigree (1,1,3,1,1)
  (same comment as for Barium)
- Zinc, ion [water, ground-]: 2.6807e-7 kg; lognormal variance with pedigree 0.37264, pedigree (1,1,3,1,1)
  (same comment as for Copper, ion)
- Chromium VI [water, ground-, long-term]: 7.6567e-8 kg; lognormal variance with pedigree 2.747, pedigree (1,1,3,1,1)
  (same comment as for Hydrogen sulfide)
- Zinc [air, non-urban air or from high stacks]: 5.957e-11 kg; lognormal variance with pedigree 0.64673, pedigree (1,1,3,1,1)
  (same comment as for Barium)
- Beryllium [water, ground-]: 2.9421e-10 kg; lognormal variance with pedigree 0.59721, pedigree (1,1,3,1,1)
  (same comment as for Copper, ion)
- Cadmium, ion [water, ground-, long-term]: 8.2155e-5 kg; lognormal variance with pedigree 0.24899, pedigree (1,1,3,1,1)
  (same comment as for Hydrogen sulfide)
- Selenium [air, non-urban air or from high stacks]: 5.6035e-13 kg; lognormal variance with pedigree 0.8025, pedigree (1,1,3,1,1)
  (same comment as for Barium)
- Strontium [water, ground-]: 5.2076e-8 kg; lognormal variance with pedigree 0.42704, pedigree (1,1,3,1,1)
  (same comment as for Copper, ion)
- Cobalt [water, ground-, long-term]: 3.1909e-5 kg; lognormal variance with pedigree 0.28041, pedigree (1,1,3,1,1)
  (same comment as for Hydrogen sulfide)
- Antimony [air, non-urban air or from high stacks]: 1.1465e-11 kg; lognormal variance with pedigree 0.70288, pedigree (1,1,3,1,1)
  (same comment as for Barium)
- Selenium [water, ground-]: 2.2414e-9 kg; lognormal variance with pedigree 0.53133, pedigree (1,1,3,1,1)
  (same comment as for Copper, ion)
- Barium [water, ground-, long-term]: 0.00018683 kg; lognormal variance with pedigree 0.22134, pedigree (1,1,3,1,1)
  (same comment as for Hydrogen sulfide)
- Tin [air, non-urban air or from high stacks]: 3.9073e-13 kg; lognormal variance with pedigree 0.80936, pedigree (1,1,3,1,1)
  (same comment as for Barium)
- Vanadium, ion [water, ground-]: 3.0755e-7 kg; lognormal variance with pedigree 0.36844, pedigree (1,1,3,1,1)
  (same comment as for Copper, ion)
- Arsenic, ion [water, ground-, long-term]: 1.9218e-6 kg; lognormal variance with pedigree 0.37307, pedigree (1,1,3,1,1)
  (same comment as for Hydrogen sulfide)
- Manganese [air, non-urban air or from high stacks]: 2.316e-10 kg; lognormal variance with pedigree 0.60546, pedigree (1,1,3,1,1)
  (same comment as for Barium)
- Tin, ion [water, ground-]: 1.5629e-9 kg; lognormal variance with pedigree 0.54305, pedigree (1,1,3,1,1)
  (same comment as for Copper, ion)
- Fluoride [water, ground-, long-term]: 1.4829e-5 kg; lognormal variance with pedigree 0.30579, pedigree (1,1,3,1,1)
  (same comment as for Hydrogen sulfide)
- Lead [air, non-urban air or from high stacks]: 9.2843e-12 kg; lognormal variance with pedigree 0.70486, pedigree (1,1,3,1,1)
  (same comment as for Barium)
- Lead [water, ground-]: 2.7853e-8 kg; lognormal variance with pedigree 0.44738, pedigree (1,1,3,1,1)
  (same comment as for Copper, ion)
- Bromine [water, ground-, long-term]: 6.9124e-5 kg; lognormal variance with pedigree 0.25395, pedigree (1,1,3,1,1)
  (same comment as for Hydrogen sulfide)
- Mercury [air, non-urban air or from high stacks]: 2.3549e-10 kg; lognormal variance with pedigree 0.60484, pedigree (1,1,3,1,1)
  (same comment as for Barium)
- Nickel, ion [water, ground-]: 1.2121e-8 kg; lognormal variance with pedigree 0.47552, pedigree (1,1,3,1,1)
  (same comment as for Copper, ion)
- Nitrite [water, ground-, long-term]: 0.0013183 kg; lognormal variance with pedigree 0.043978, pedigree (1,1,3,1,1)
  (same comment as for Hydrogen sulfide)
- Nickel [air, non-urban air or from high stacks]: 3.0303e-12 kg; lognormal variance with pedigree 0.74616, pedigree (1,1,3,1,1)
  (same comment as for Barium)
- Antimony [water, ground-]: 4.586e-8 kg; lognormal variance with pedigree 0.43171, pedigree (1,1,3,1,1)
  (same comment as for Copper, ion)
- Nitrate [water, ground-, long-term]: 0.0025472 kg; lognormal variance with pedigree 0.043978, pedigree (1,1,3,1,1)
  (same comment as for Hydrogen sulfide)
- Chromium [air, non-urban air or from high stacks]: 1.1786e-12 kg; lognormal variance with pedigree 0.77428, pedigree (1,1,3,1,1)
  (same comment as for Barium)
- Manganese [water, ground-]: 9.264e-7 kg; lognormal variance with pedigree 0.33667, pedigree (1,1,3,1,1)
  (same comment as for Copper, ion)
- Chloride [water, ground-, long-term]: 0.023747 kg; lognormal variance with pedigree 0.068095, pedigree (1,1,3,1,1)
  (same comment as for Hydrogen sulfide)
- Copper [air, non-urban air or from high stacks]: 4.4982e-12 kg; lognormal variance with pedigree 0.72801, pedigree (1,1,3,1,1)
  (same comment as for Barium)

## Extrapolations
This dataset has been extrapolated from year 2012 to the year of the calculation (2019). The uncertainty has been adjusted accordingly.
