# tower silo production, plastic

Dataset: EcoSpold 2, unit process
Geography: CH
Time period: 1994-01-01 to 2019-12-31
Technology level: current
Classification: ISIC rev.4 ecoinvent: 4100:Construction of buildings
Classification: EcoSpold01Categories: agricultural means of production/buildings
Tags: ConvertedDataset
Scenario: Business-as-Usual
System model: Allocation at the point of substitution
Generated by: Dunja Dux
Published in: Nemecek, T. 2007
Database: ecoinvent
isCopyrightProtected: true
accessRestrictedTo: 1

## General comment
This dataset represents an example of a typical tower silo. The module includes a foundation made of concrete and a tower silo made of glass fibre reinforced polyester. Size: 105 m3. Lifetime of the building is 25 years. The Functional Unit is one m3 of tower silo storage during entire service life.
This dataset represents an example of a typical tower silo. The module includes a foundation made of concrete and a tower silo made of glass fibre reinforced polyester. Size: 105 m3. Lifetime of the building is 25 years. The Functional Unit is one m3 of tower silo storage during entire service life..
Obs: The following limitation on the use of individual modules should be noted: to obtain realistic values when applying the modules, building sizes should not differ too widely from the sizes on which the module calculations were based. An acceptable approximation can be achieved for building sizes within a range of about half to twice the value of the calculated size of the modules. A wider difference would not be reasonable, since the type of construction would be too different from the calculated module.

## Included activities start
From unoccupied land foreseen for a tower silo installation.

## Included activities end
This acitivity ends with the final treatment and disposal of the building. The dataset includes the use of construction materials and building machines (hydraulic diggers, skid-steer loaders) for construction and also materials for repair and replacement. Waste disposal is inlcuded for repair, replacement and dismantling materials from the building infrastructure. The dataset doesn't include direct emissions from construction, waste disposal of production and the resources used during utilization phase of the building. Disposal of construction waste such as packing materials and remnants of construction materials were not considered because it represents only a small proportion of the overall disposal quantity.

## Geography
The inventory applies for Swiss agricultural buildings only, because of the solid method of construction.

## Technology
Based on selected examples of this type of housing and buildings commonly found in Switzerland in the year 2000; but not conform to an “average Swiss building style”.

## Reference product
- tower silo, plastic: 1 m3; CPC 53269: Other constructions for manufacturing; By-product classification allocatable product
  EcoSpold01Location=CH
  production volume 0.0336675 m3
    This is a placeholder value that does not reflect real-world production volumes. This dataset does not currently require a real-world production volume to work in the database framework, and no actual data were collected yet. This has no negative effect on the results of the ecoinvent database. The placeholder value of this activity was scaled according to the nominal GDP of 2005 (source: United Nations, http://data.un.org/Glossary.aspx?q=GDP+%28current+US%24%29, accessed 20130726) to reflect an appropriate share of the global production volume, which is also a placeholder value.
  property price 326 EUR2005
    Converted from Dk price to US price by PPP. Multiplied bu 0.83 to convert to world price.
  property true value 326
    allocation property applied in "true value" allocation // value calculated from revenue

## By-products
- iron scrap, sorted, pressed: 0 kg; By-product classification Recyclable; CPC 39310: Slag, dross, scalings and other waste from the manufacture of iron or steel; pedigree (1,1,1,1,1)
  Iron scrap recovered from this waste.
  Uncertainty: uncertainty calculated from uncertainty in waste composition, uncertainty of share of recyclable metal, uncertainty of transfer coefficient to bottom ash, uncertainty of the efficiency of scrap removal in MSWI plant.
  production volume 0.053825 kg
  property price 0.175 EUR2005
    Temporary price data. Calculated as 90% of purchasers price based on: 2005 import and export prices (total trades (USD) divided by total weight (kg) in biggest economies of the world: EU27, USA, Brasil, China, India, Japan and Russia) from UN Commodity Trade Statistics Database (http://data.un.org/Explorer.aspxDatabase [Accessed 2011.06.20]). Commodity: Waste or scrap, of cast iron
  property carbon content 0
    carbon content on a dry matter basis (reserved; not for manual entry)
  property true value 0.00941938
    allocation property applied in "true value" allocation // value calculated from revenue
  properties: wet mass 1 kg, water in wet mass 0 kg, carbon content, non-fossil 0, carbon content, fossil 0, dry mass 1 kg, water content 0, carbon allocation 0 kg
- heat, for reuse in municipal waste incineration only: 0 MJ; CPC 17300: Steam and hot water; By-product classification allocatable product; pedigree (1,1,1,1,1)
  Net useful heat generated from this waste and used in internal MSWI plant energy redistribution.
  Uncertainty: uncertainty is calculated from uncertainties in waste composition and uncertainties in energy efficiency and the uncertainty in internal energy demand
  production volume 69.4714 MJ
  property true value relation 0.1842; name E_th_prod_MSWI_true_value_relation
    property to calculate "true value" from
  property exergy 0.1842 MJ; name E_th_prod_MSWI_exergy
    This exergy property is based on the exergy content of the product.
  property price 0.0106 EUR2005; name E_th_prod_MSWI_price_EUR2005
    Average European district heat price from Ecoheatcool and Euroheat 2005-2006, Ecoheat Work package 1: The European heat market. Final report. 10.6 EUR/GJ i s the price of district heat. http://www.solarthermalworld.org/files/Ecoheatcool%20WP1%20Web.pdf?download
  property true value 0.456208
    allocation property applied in "true value" allocation // value calculated from true value relation
- electricity, for reuse in municipal waste incineration only: 0 kWh; CPC 17100: Electrical energy; By-product classification allocatable product; pedigree (1,1,1,1,1)
  Net electricity generated from this waste and used in internal MSWI plant energy redistribution.
  Uncertainty: uncertainty is calculated from uncertainties in waste composition and uncertainties in energy efficiency and the uncertainty in internal energy demand
  production volume 9.88582 kWh
  property true value relation 3.6; name E_el_prod_MSWI_true_value_relation
    property to calculate "true value" from
  property price 0.1 EUR2005; name E_el_prod_MSWI_price_EUR2005
    Estimated to be the same price as in case of electricity, medium voltage.
  property exergy 3.6 MJ; name E_el_prod_MSWI_exergy
    This exergy property is based on the exergy content of the product.
  property true value 1.26877
    (same comment as for heat, for reuse in municipal waste incineration only)
- zinc concentrate: 0 kg; CPC 14290: Other non-ferrous metal ores and concentrates (other than uranium or thorium ores and concentrates); By-product classification allocatable product
  Calculated value from the knowledge of the properties of both products.
  production volume 0.00252993 kg
  property price 0.38 EUR2005; name ByP_price_EUR2005
    Temporary price data. Calculated as 90% of purchasers price based on: Zinc content in concentrate 53%. Concentrate price per kg Zn 86.5% of refined Zn price (13.5% treatment charges according to CHR Metals Limited 2005: Dynamic cost curves. http://www.minecost.com/dynamic.pdf). 2004 zinc price from USGS (2007) Mineral commodity summaries 2007. <http://minerals.usgs.gov/minerals/pubs/mcs/2007/mcs2007.pdf> [Accessed 25 May 2010]
  property zinc content 0.53; name zinc_C_zinc_concentrate
    Zinc content on a dry matter basis. Value taken from teh "zinc mine operation" /GLO dataset.
  property dry mass 1 kg; name DM_zinc_concentrate
  property carbon content 0
    carbon content on a dry matter basis (reserved; not for manual entry)
  property true value 0.000961372
    allocation property applied in "true value" allocation // value calculated from revenue
  properties: wet mass 1 kg, water content 0, carbon content, non-fossil 0, carbon content, fossil 0, water in wet mass 0 kg, carbon allocation 0 kg

## Inputs from technosphere
All rows: lognormal variance with pedigree 0.0401, pedigree (1,2,5,1,1)
- reinforcing steel: 2.59618 kg
  EcoSpold01Location=RER
  Modelled, based on "Agricultural Buildings" - pdf-document on the dedicated talk page of ecoinvent (www.ecoinvent.org/talk-pages)
  properties: wet mass 1 kg, carbon content, fossil 0.004, dry mass 1 kg
- excavation, hydraulic digger: 0.117375 m3
  (same comment as for reinforcing steel)
- waste cement in concrete and mortar: -11.1407 kg
  Modelled, based on "Agricultural Buildings" - pdf-document on the dedicated talk page of ecoinvent (www.ecoinvent.org/talk-pages)
  EcoSpold01Location=CH
  production volume 11.2 kg
    Calculated from the production volume of tower silo, plastic in proportion to the respective output amounts.
  properties: wet mass 1 kg, dry mass 0.995 kg, water content 0.00502513
- glass fibre: 13.6275 kg
  (same comment as for reinforcing steel)
  properties: wet mass 1 kg, dry mass 1 kg
- gravel, round: 46.0548 kg
  (same comment as for waste cement in concrete and mortar)
  properties: dry mass 1 kg, wet mass 1 kg
- zinc coat, pieces: 0.147216 m2
  Modelled, based on "Agricultural Buildings" - pdf-document on the dedicated talk page of ecoinvent (www.ecoinvent.org/talk-pages)
  EcoSpold01Location=RER
- lean concrete: 0.00593839 m3
  EcoSpold01Location=CH
  Modelled, based on "Agricultural Buildings" - pdf-document on the dedicated talk page of ecoinvent (www.ecoinvent.org/talk-pages)
  properties: dry mass 2080 kg, water content 0.0528846, wet mass 2190 kg
- waste reinforced concrete: -165.121 kg
  (same comment as for waste cement in concrete and mortar)
  production volume 166 kg
    (same comment as for waste cement in concrete and mortar)
  properties: water content 0.00585407, wet mass 1 kg, dry mass 0.99418 kg
- cast iron: 2.56634 kg
  (same comment as for zinc coat, pieces)
  properties: carbon content, fossil 0.04, dry mass 1 kg, wet mass 1 kg
  note on carbon content, fossil: Cast iron is made by remelting pig iron in small furnaces (e.g. cupola furnaces or electric arc furnaces) and poured into moulds to make castings. It usually contains 2% to 6% carbon (ecoinvent v2.2 report 10_partII). An average content of 4% was considered
- electricity, low voltage: 0.458559 kWh
  (same comment as for waste cement in concrete and mortar)
- glass fibre reinforced plastic, polyester resin, hand lay-up: 9.07171 kg
  (same comment as for reinforcing steel)
  properties: carbon content, fossil 0.246639, wet mass 1 kg, dry mass 1 kg
  note on carbon content, fossil: C content was calculated as an addition of C content in the product components (60% glass fibre, 40% polyester resin)
- cement, Portland: 11.1407 kg
  (same comment as for lean concrete)
  properties: dry mass 1 kg, wet mass 1 kg
- waste wood, untreated: -0.0378983 kg
  (same comment as for waste cement in concrete and mortar)
  production volume 0.0381 kg
    (same comment as for waste cement in concrete and mortar)
  properties: dry mass 0.8 kg, wet mass 1 kg, water content 0.25, carbon content, non-fossil 0.48632
  note on carbon content, non-fossil: Tab A.4, ecoinvent v2.2 report 13_I. C content has been referred to 1 kg DM,
- waste concrete, not reinforced: -13.0306 kg
  (same comment as for lean concrete)
  production volume 13.1 kg
    (same comment as for waste cement in concrete and mortar)
  properties: dry mass 1 kg, wet mass 1 kg
- waste glass: -13.6275 kg
  (same comment as for waste cement in concrete and mortar)
  production volume 13.7 kg
    (same comment as for waste cement in concrete and mortar)
  properties: dry mass 1 kg, wet mass 1 kg
- concrete, normal: 0.0739066 m3
  (same comment as for lean concrete)
  properties: water content 0.086758, dry mass 2190 kg, wet mass 2380 kg
- sawnwood, softwood, dried (u=20%), planed: 7.57965e-5 m3
  (same comment as for reinforcing steel)
  properties: water content 0.2, carbon content, non-fossil 0.494, dry mass 450 kg, wet mass 540 kg
  note on carbon content, non-fossil: C content of dry mass is 0.494 kgC/kg dry wood (ecoinvent v2.2 report 9)
- waste plastic, mixture: -9.07171 kg
  (same comment as for waste cement in concrete and mortar)
  production volume 9.12 kg
    (same comment as for waste cement in concrete and mortar)
  properties: water content 0.180638, carbon content, fossil 0.747344, dry mass 0.847 kg, wet mass 1 kg
  note on carbon content, fossil: C content in 1 kg DM was calculated using data in Tab A.2, ecoinvent v2.2 report 13_I
- waste bulk iron, excluding reinforcement: -2.7056 kg
  (same comment as for waste cement in concrete and mortar)
  production volume 2.72 kg
    (same comment as for waste cement in concrete and mortar)
  properties: dry mass 1 kg, wet mass 1 kg

## Inputs from nature
- Occupation, construction site [natural resource, land]: 0.33621 m2*year; lognormal variance with pedigree 0.0801, pedigree (1,2,5,1,1)
  Modelled, based on "Agricultural Buildings" - pdf-document on the dedicated talk page of ecoinvent (www.ecoinvent.org/talk-pages)
- Transformation, to urban, discontinuously built [natural resource, land]: 0.671426 m2; lognormal variance with pedigree 0.1601, pedigree (1,2,5,1,1)
  (same comment as for Occupation, construction site)
- Transformation, from pasture, man made [natural resource, land]: 0.671426 m2; lognormal variance with pedigree 0.1601, pedigree (1,2,5,1,1)
  (same comment as for Occupation, construction site)
- Occupation, urban, discontinuously built [natural resource, land]: 16.8105 m2*year; lognormal variance with pedigree 0.0801, pedigree (1,2,5,1,1)
  (same comment as for Occupation, construction site)

## Sampling procedure
The inventory is calculated based on a solid database of agricultural buildings.

## Review by Roland Hischier 2011-09-28
Transfer of documentation done.

## Review by Roland Hischier 2003-08-06
Passed.
