# treatment of used desktop computer, mechanical treatment

Dataset: EcoSpold 2, unit process
Geography: GLO
Time period: 2005-01-01 to 2019-12-31
Technology level: current
Classification: ISIC rev.4 ecoinvent: 3830:Materials recovery
Classification: EcoSpold01Categories: waste management/recycling
Tags: Treatment; ConvertedDataset
Scenario: Business-as-Usual
System model: Allocation at the point of substitution
Generated by: Roland Hischier
Published in: Hischier R. 2007
Database: ecoinvent
isCopyrightProtected: true
accessRestrictedTo: 1

## General comment
manual dismantling plus subsequent shredding/separation procedure, based on common transfer coefficients for both steps. Data from literature and from own experiences in Switzerland.
[This dataset was already contained in the ecoinvent database version 2. It was not individually updated during the transfer to ecoinvent version 3. Life Cycle Impact Assessment results may still have changed, as they are affected by changes in the supply chain, i.e. in other datasets. This dataset was generated following the ecoinvent quality guidelines for version 2. It may have been subject to central changes described in the ecoinvent version 3 change report (http://www.ecoinvent.org/database/ecoinvent-version-3/reports-of-changes/), and the results of the central updates were reviewed extensively. The changes added e.g. consistent water flows and other information throughout the database. The documentation of this dataset can be found in the ecoinvent reports of version 2, which are still available via the ecoinvent website. The change report linked above covers all central changes that were made during the conversion process.]

## Included activities end
This dataset represents the mechanical treatment of a WEEE devices in Switzerland. Two process steps are included: manual depollution and the mechanical treatment (shredder) of the remaining part.

## Geography
European data, used as average for global situation

## Technology
4-step-procedure (shredder - separation - shredder - separation) as used currently often in Europe

## Reference product
- used desktop computer: 0 kg; CPC 39990: Other wastes n.e.c.; By-product classification Waste
  EcoSpold01Location=GLO
  production volume 0 kg; = 0.77*1.304E+08
    Calculated based on literature value (http://www.etforecasts.com/products/ES_pcww1203.htm). 1.304E+08 is a number of computers (desktop, units) sold in 2005 in the whole world. The proportion between manual and mechanical dismantling of 23%/77%; source: Hischier 2005; value to be replaced by value to be calculated from the demand for this treatment activity.
  property price 0 EUR2005
    Waste products are assigned a price of zero as they are assumed to require further treatment.
  property carbon content, non-fossil 0.000485011
    Composition data from desktop computer, divided by ist weight 11.3 kg (Tab 4.15, ecoinvent v2.2 report 18_V)
  property carbon content, fossil 0.0877555
    (same comment as for used desktop computer)
  property carbon content 0.0882405
    carbon content on a dry matter basis (reserved; not for manual entry)
  properties: wet mass 1 kg, water in wet mass 0 kg, dry mass 1 kg, water content 0, carbon allocation 0.0882405 kg
- iron scrap, sorted, pressed: 1 kg; By-product classification Recyclable; CPC 39310: Slag, dross, scalings and other waste from the manufacture of iron or steel; pedigree (1,1,1,1,1)
  replaces the original flow "Fe fraction of used desktop computer from mechanical treatment"
  production volume 5.80908e7 kg

## By-products
- iron scrap, sorted, pressed: 0 kg; By-product classification Recyclable; CPC 39310: Slag, dross, scalings and other waste from the manufacture of iron or steel; pedigree (1,1,1,1,1)
  (same comment as for iron scrap, sorted, pressed)
  production volume 0 kg; = ABS( Ref('65928fad-9850-4682-9690-0531002b7c52')/ Ref('027e7a80-6cc3-4eae-be4d-dd4717809153')* Ref('027e7a80-6cc3-4eae-be4d-dd4717809153', 'ProductionVolume'))
    Unknown
    Calculated from the production volume of used desktop computer in proportion to the respective output amounts.
  property price 0.175 EUR2005
    Temporary price data. Calculated as 90% of purchasers price based on: 2005 import and export prices (total trades (USD) divided by total weight (kg) in biggest economies of the world: EU27, USA, Brasil, China, India, Japan and Russia) from UN Commodity Trade Statistics Database (http://data.un.org/Explorer.aspxDatabase [Accessed 2011.06.20]). Commodity: Waste or scrap, of cast iron
  property carbon content 0
    carbon content on a dry matter basis (reserved; not for manual entry)
  properties: carbon content, fossil 0, water content 0, water in wet mass 0 kg, wet mass 1 kg, carbon content, non-fossil 0, dry mass 1 kg, carbon allocation 0 kg
- copper: 0 kg; By-product classification allocatable product; CPC 41413: Refined copper and copper alloys, unwrought; master alloys of copper
  property price 5.52 EUR2005
    Literature value (http://www.economist.com/news/business/21576714-mining-industry-has-enriched-chile-its-future-precarious-copper-solution). Average price between 20015 and 2013.
  property carbon content 0
    carbon content on a dry matter basis (reserved; not for manual entry)
  properties: water in wet mass 0 kg, water content 0, carbon content, non-fossil 0, dry mass 1 kg, carbon content, fossil 0, wet mass 1 kg, carbon allocation 0 kg
- electricity, for reuse in municipal waste incineration only: 0 kWh; CPC 17100: Electrical energy; By-product classification allocatable product; pedigree (1,1,1,1,1)
  Net electricity generated from this waste and used in internal MSWI plant energy redistribution.
  Uncertainty: uncertainty is calculated from uncertainties in waste composition and uncertainties in energy efficiency and the uncertainty in internal energy demand
  property price 0.1 EUR2005; name E_el_prod_MSWI_price_EUR2005
    Estimated to be the same price as in case of electricity, medium voltage.
  property exergy 3.6 MJ; name E_el_prod_MSWI_exergy
    This exergy property is based on the exergy content of the product.
  property true value relation 3.6; name E_el_prod_MSWI_true_value_relation
    property to calculate "true value" from
- heat, for reuse in municipal waste incineration only: 0 MJ; CPC 17300: Steam and hot water; By-product classification allocatable product; pedigree (1,1,1,1,1)
  Net useful heat generated from this waste and used in internal MSWI plant energy redistribution.
  Uncertainty: uncertainty is calculated from uncertainties in waste composition and uncertainties in energy efficiency and the uncertainty in internal energy demand
  property true value relation 0.1842; name E_th_prod_MSWI_true_value_relation
    property to calculate "true value" from
  property exergy 0.1842 MJ; name E_th_prod_MSWI_exergy
    This exergy property is based on the exergy content of the product.
  property price 0.0106 EUR2005; name E_th_prod_MSWI_price_EUR2005
    Average European district heat price from Ecoheatcool and Euroheat 2005-2006, Ecoheat Work package 1: The European heat market. Final report. 10.6 EUR/GJ i s the price of district heat. http://www.solarthermalworld.org/files/Ecoheatcool%20WP1%20Web.pdf?download
- zinc concentrate: 0 kg; CPC 14290: Other non-ferrous metal ores and concentrates (other than uranium or thorium ores and concentrates); By-product classification allocatable product
  Calculated value from the knowledge of the properties of both products.
  property price 0.38 EUR2005; name ByP_price_EUR2005
    Temporary price data. Calculated as 90% of purchasers price based on: Zinc content in concentrate 53%. Concentrate price per kg Zn 86.5% of refined Zn price (13.5% treatment charges according to CHR Metals Limited 2005: Dynamic cost curves. http://www.minecost.com/dynamic.pdf). 2004 zinc price from USGS (2007) Mineral commodity summaries 2007. <http://minerals.usgs.gov/minerals/pubs/mcs/2007/mcs2007.pdf> [Accessed 25 May 2010]
  property zinc content 0.53; name zinc_C_zinc_concentrate
    Zinc content on a dry matter basis. Value taken from teh "zinc mine operation" /GLO dataset.
  property dry mass 1 kg; name DM_zinc_concentrate
  property carbon content 0
    carbon content on a dry matter basis (reserved; not for manual entry)
  properties: wet mass 1 kg, water content 0, carbon content, non-fossil 0, carbon content, fossil 0, water in wet mass 0 kg, carbon allocation 0 kg
- lead: 0 kg; CPC 41441: Lead, unwrought; By-product classification allocatable product
  EcoSpold01Location=SE
  property price 0.744 EUR2005
    Temporary price data. Calculated as 90% of purchasers price based on: Source: ecoinvent v2 report 10-part IX, Tab 5.10 & 2.5
  property carbon content 0
    carbon content on a dry matter basis (reserved; not for manual entry)
  properties: wet mass 1 kg, water content 0, carbon content, non-fossil 0, carbon content, fossil 0, dry mass 1 kg, water in wet mass 0 kg, carbon allocation 0 kg
- nickel, 99.5%: 0 kg; CPC 41422: Unwrought nickel; By-product classification allocatable product
  EcoSpold01Location=SE
  property price 10.4 EUR2005
    Temporary price data. Calculated as 90% of purchasers price based on: 2004 nickel price from USGS (2007) Mineral commodity summaries 2007. <http://minerals.usgs.gov/minerals/pubs/mcs/2007/mcs2007.pdf> [Accessed 25 May 2010]
  property carbon content 0
    carbon content on a dry matter basis (reserved; not for manual entry)
  properties: water in wet mass 0 kg, wet mass 1 kg, carbon content, non-fossil 0, dry mass 1 kg, water content 0, carbon content, fossil 0, carbon allocation 0 kg
- silver: 0 kg; CPC 41310: Silver (including silver plated with gold or platinum), unwrought or in semi-manufactured forms, or in powder […]; By-product classification allocatable product; CAS 7440-22-4
  EcoSpold01Location=SE
  property price 178 EUR2005
    (same comment as for lead)
  property carbon content 0
    carbon content on a dry matter basis (reserved; not for manual entry)
  properties: wet mass 1 kg, carbon content, non-fossil 0, dry mass 1 kg, water content 0, carbon content, fossil 0, water in wet mass 0 kg, carbon allocation 0 kg
- palladium: 0 kg; CPC 4160: Other non-ferrous metals and articles thereof (including waste and scrap of some metals); cermets and articles […]; By-product classification allocatable product
  EcoSpold01Location=SE
  property price 5640 EUR2005
    Temporary price data. Calculated as 90% of purchasers price based on: 2004 price from USGS (2007) Mineral commodity summaries 2007. <http://minerals.usgs.gov/minerals/pubs/mcs/2007/mcs2007.pdf> [Accessed 25 May 2010]
  property carbon content 0
    carbon content on a dry matter basis (reserved; not for manual entry)
  properties: wet mass 1 kg, carbon content, fossil 0, water in wet mass 0 kg, water content 0, carbon content, non-fossil 0, dry mass 1 kg, carbon allocation 0 kg
- gold: 0 kg; CPC 41320: Gold (including gold plated with platinum), unwrought or in semi-manufactured forms, or in powder form; By-product classification allocatable product; CAS 7440-57-5
  EcoSpold01Location=SE
  property price 10600 EUR2005
    Temporary price data. Calculated as 90% of purchasers price based on: Source: ecoinvent v2 report 10-part IX, Tab 2.5
  property carbon content 0
    carbon content on a dry matter basis (reserved; not for manual entry)
  properties: wet mass 1 kg, carbon content, fossil 0, dry mass 1 kg, carbon content, non-fossil 0, water content 0, water in wet mass 0 kg, carbon allocation 0 kg
- iron scrap, unsorted: 0 kg; source European Aluminium Association 2008; CPC 39310: Slag, dross, scalings and other waste from the manufacture of iron or steel; By-product classification Recyclable; pedigree (1,1,1,1,1)
  property price 0.149 EUR2005; name ironScrapAmount_price_EUR2005
    Temporary price data. Calculated as 90% of purchasers price based on: estimated at 85% of sorted scrap
  property carbon content 0
    carbon content on a dry matter basis (reserved; not for manual entry)
  properties: water in wet mass 0 kg, water content 0, carbon content, fossil 0, carbon content, non-fossil 0, dry mass 1 kg, wet mass 1 kg, carbon allocation 0 kg
- aluminium oxide, non-metallurgical: 0 kg; source European Aluminium Association 2008; CPC 41432: Alumina (aluminium oxide), except artificial corundum; By-product classification allocatable product; CAS 1344-28-1; pedigree (1,1,1,1,1)
  property carbon content, non-fossil 0; name C_content_non_fossil
  property price 0.28 EUR2005; name Al2O3Amount_price_EUR2005
    From UN trade database. http://data.un.org/ Import data from the largest economies of the world are used (Brazil, India, USA, China, Japan and EU-27).
  property dry mass 1 kg; name DM
  property water content 0; name water_content
  property wet mass 1 kg; name WM
  property water in wet mass 0 kg; name WWM
  property carbon content, fossil 0; name C_content_fossil
  property carbon content 0
    carbon content on a dry matter basis (reserved; not for manual entry)
  properties: carbon allocation 0 kg
- aluminium, cast alloy: 0 kg; source European Aluminium Association 2008; By-product classification allocatable product; CPC 41431: Unwrought aluminium; pedigree (1,1,1,1,1)
  EcoSpold01Location=RER
  property price 1.3 EUR2005; name castAlloyAmount_price_EUR2005
    Temporary price data. Calculated as 90% of purchasers price based on: Source: London Metal Exchange, Aluminium alloy price for 2005
  property carbon content 0
    carbon content on a dry matter basis (reserved; not for manual entry)
  properties: water in wet mass 0 kg, carbon content, non-fossil 0, water content 0, dry mass 1 kg, carbon content, fossil 0, wet mass 1 kg, carbon allocation 0 kg
- aluminium, wrought alloy: 0 kg; source European Aluminium Association 2008; By-product classification allocatable product; CPC 4153: Semi-finished products of aluminium or aluminium alloys; pedigree (1,1,1,1,1)
  property price 1.44 EUR2005; name secondaryAluminiumOutput_price_EUR2005
    Estimated based on literature values and expert judgement. Aluminium ccast alloys are about 90% of the price of aluminium wrought alloys.
  property carbon content 0
    carbon content on a dry matter basis (reserved; not for manual entry)
  properties: wet mass 1 kg, water content 0, carbon content, fossil 0, water in wet mass 0 kg, carbon content, non-fossil 0, dry mass 1 kg, carbon allocation 0 kg
- heat, district or industrial, other than natural gas: 0 MJ; CPC 17300: Steam and hot water; By-product classification allocatable product; pedigree (1,1,1,1,1)
  net production of heat from landfill gas utilisation.
  Uncertainty: U
  property price 0.0106 EUR2005
    (same comment as for heat, for reuse in municipal waste incineration only)
  property carbon content 0
    carbon content on a dry matter basis (reserved; not for manual entry)
  properties: wet mass 1 kg, water content 0, water in wet mass 0 kg, true value relation 0.1842, dry mass 1 kg, carbon content, non-fossil 0, carbon content, fossil 0, carbon allocation 0 kg
- electricity, medium voltage: 0 kWh; By-product classification allocatable product; CPC 17100: Electrical energy; pedigree (1,1,1,1,1)
  net production of electricity from landfill gas utilisation (minus electricity demand for landfill gas pumping).
  Uncertainty: U
  property price 0.1 EUR2005
    Calculated to be between the price of electricity, high voltage and electricity, low voltage.
  properties: true value relation 3.6

## Inputs from technosphere
- residue from mechanical treatment, desktop computer: 0 kg; pedigree (1,1,1,1,1)
  EcoSpold01Location=CH
  Calculated - based on composition data
  Uncertainty: calculated - based on composition data
  production volume 0 kg; = ABS( Ref('3743def8-a61d-4291-bcea-df40edda968c')/ Ref('027e7a80-6cc3-4eae-be4d-dd4717809153')* Ref('027e7a80-6cc3-4eae-be4d-dd4717809153', 'ProductionVolume'))
    Calculated from the production volume of used desktop computer in proportion to the respective output amounts.
  properties: carbon content, fossil 0.616224, dry mass 1 kg, wet mass 1 kg
  note on carbon content, fossil: Tab 4.14, ecoinvent v2.2 report 18_V, for details in fraction composition. Carbon content in plastic was calculated using data in Tab A.2, ecoinvent v2.2 report 13_I. Others was also considered plastic, and calculated the same way (from pg 70, ecoinvent v2.2 report 18_V). Ferro was assumed to have a C content of 0.012 kg C/ kg (C content of steel, calculated out of emission factors published in Commission Decision of 18 July 2007 establishing guidelines for the monitoring and reporting of greenhouse gas emissions pursuant to Directive 2003/87/EC of the European Parliament and of the Council (notified under document number C(2007) 3416)). The other component of the fraction were considered to content no C.
- used cable: 0 kg; pedigree (1,1,1,1,1)
  Calculated - based on composition data
  Uncertainty: calculated - based on composition data
  production volume 0 kg; = ABS(Ref('027e7a80-6cc3-4eae-be4d-dd4717809153', 'ProductionVolume') * (Ref('472bc0d6-6126-4597-b3c7-720bc58f2e3f') / Ref('027e7a80-6cc3-4eae-be4d-dd4717809153')))
    Calculated from production volume of reference product using the relative outputs.
  properties: carbon content, fossil 183.274, wet mass 1 kg, dry mass 1 kg
- waste electric and electronic equipment: 0 kg; pedigree (1,1,1,1,1)
  EcoSpold01Location=GLO
  Rough estimation
  Uncertainty: rough estimation
  production volume 0 kg; = ABS( Ref('53247738-8eec-49f6-904e-b095b222396e')/ Ref('027e7a80-6cc3-4eae-be4d-dd4717809153')* Ref('027e7a80-6cc3-4eae-be4d-dd4717809153', 'ProductionVolume'))
    (same comment as for residue from mechanical treatment, desktop computer)
  properties: carbon content, fossil 0.0877555, dry mass 1 kg, wet mass 1 kg, carbon content, non-fossil 0.000485011
- used Ni-metal hydride battery: 0 kg; pedigree (1,1,1,1,1)
  Calculated - based on composition data
  EcoSpold01Location=GLO
  Uncertainty: calculated - based on composition data
  production volume 0 kg; = ABS( Ref('33f0c0a6-79f0-46bb-8675-8a112b59056f')/ Ref('027e7a80-6cc3-4eae-be4d-dd4717809153')* Ref('027e7a80-6cc3-4eae-be4d-dd4717809153', 'ProductionVolume'))
    (same comment as for residue from mechanical treatment, desktop computer)
  properties: dry mass 1 kg, wet mass 1 kg, carbon content, fossil 0.328011
- used capacitor: 0 kg; pedigree (1,1,1,1,1)
  (same comment as for residue from mechanical treatment, desktop computer)
  production volume 0 kg; = ABS( Ref('c4caa146-3b30-4cbf-9c04-757c99fd582b')/ Ref('027e7a80-6cc3-4eae-be4d-dd4717809153')* Ref('027e7a80-6cc3-4eae-be4d-dd4717809153', 'ProductionVolume'))
    (same comment as for residue from mechanical treatment, desktop computer)
  properties: dry mass 1 kg, carbon content, non-fossil 0.0306706, wet mass 1 kg, carbon content, fossil 0.179153
  note on carbon content, non-fossil: Mix of different types of capacitor (ecoinvent v2.2 report 18_V, pg 113 for details)
- used printed wiring boards: 0 kg; pedigree (1,1,1,1,1)
  EcoSpold01Location=GLO
  Calculated - based on composition data
  Uncertainty: calculated - based on composition data
  production volume 0 kg; = ABS( Ref('55906e52-3004-47ff-8e5f-e7632e49c746')/ Ref('027e7a80-6cc3-4eae-be4d-dd4717809153')* Ref('027e7a80-6cc3-4eae-be4d-dd4717809153', 'ProductionVolume'))
    (same comment as for residue from mechanical treatment, desktop computer)
  properties: wet mass 1 kg, carbon content, non-fossil 0.000960142, carbon content, fossil 0.193742, dry mass 1 kg
  note on carbon content, non-fossil: Composition of printed wiring boards used to calculate C content
- waste plastic, consumer electronics: 0 kg; pedigree (1,1,1,1,1)
  Calculated - based on composition data
  EcoSpold01Location=CH
  Uncertainty: calculated - based on composition data
  production volume 0 kg; = ABS( Ref('c0d65d42-fa12-4af7-afeb-e3a2e4150049')/ Ref('027e7a80-6cc3-4eae-be4d-dd4717809153')* Ref('027e7a80-6cc3-4eae-be4d-dd4717809153', 'ProductionVolume'))
    (same comment as for residue from mechanical treatment, desktop computer)
  properties: dry mass 0.847 kg, water content 0.180638, carbon content, fossil 0.830215, wet mass 1 kg
  note on carbon content, fossil: C content in 1 kg DM was calculated using data in Tab A.2, ecoinvent v2.2 report 13_I
- aluminium scrap, post-consumer, prepared for melting: 0 kg; pedigree (1,1,1,1,1)
  replaces the original flow "Al fraction of used desktop computer from mechanical treatment"
  production volume 0 kg; = ABS(Ref('a3094ab1-a209-43c2-a8d9-3b2aa75c5f4d')/ Ref('027e7a80-6cc3-4eae-be4d-dd4717809153')* Ref('027e7a80-6cc3-4eae-be4d-dd4717809153', 'ProductionVolume'))
    (same comment as for iron scrap, sorted, pressed)
  property wet mass 1 kg; name WM
  property carbon content, non-fossil 0; name C_content_non_fossil
  property carbon content, fossil 0; name C_content_fossil
  property water content 0; name water_content
  property water in wet mass 0 kg; name WWM
  property dry mass 1 kg; name DM
  properties: price 0.806 EUR2005
- electronics scrap: 0 kg; pedigree (1,1,1,1,1)
  replaces the original flow "Cu fraction of used desktop computer from mechanical treatment"
  production volume 0 kg; = ABS( Ref('14e3fc56-b145-4d0a-88ef-cc853e325956')/ Ref('027e7a80-6cc3-4eae-be4d-dd4717809153')* Ref('027e7a80-6cc3-4eae-be4d-dd4717809153', 'ProductionVolume'))
    (same comment as for iron scrap, sorted, pressed)
  properties: price 16.1 EUR2005, wet mass 1 kg, dry mass 1 kg
- residue from mechanical treatment, desktop computer: 0, 0 kg (2 entries); pedigree (1,1,1,1,1)
  (same comment as for residue from mechanical treatment, desktop computer)
- waste plastic, consumer electronics: 0, 0 kg (2 entries); pedigree (1,1,1,1,1)
  (same comment as for waste plastic, consumer electronics)
- printed wiring board, mounted mainboard, desktop computer, Pb containing: 5.002e-5 kg; lognormal variance with pedigree 0.0701, pedigree (1,4,5,3,3)
  EcoSpold01Location=GLO
  Measured Value.
- steel, chromium steel 18/8, hot rolled: 1.06157e-5 kg; lognormal variance with pedigree 0.0701, pedigree (1,4,5,3,3)
  Measured Value.
  EcoSpold01Location=RER
- printed wiring board, surface mounted, unspecified, Pb free: 4.72102e-5 kg; lognormal variance with pedigree 0.0701, pedigree (1,4,5,3,3)
  Measured Value. This original value from production mix has been replaced by 2 flows. Pb-containing has a share of 0.3, Pb-free has a share of 0.7.
- printed wiring board, for surface mounting, Pb containing surface: 1.29379e-6 m2; lognormal variance with pedigree 0.0701, pedigree (1,4,5,3,3)
  Measured Value.
  This original value from production mix has been replaced by 2 flows. Each has 50% share in the production mix.
- disk drive, CD/DVD, ROM, for desktop computer: 0.000331742 unit; lognormal variance with pedigree 0.0701, pedigree (1,4,5,3,3)
  EcoSpold01Location=GLO
  Measured Value.
- cable, network cable, category 5, without plugs: 0.000995225 m; lognormal variance with pedigree 0.0701, pedigree (1,4,5,3,3)
  EcoSpold01Location=GLO
  Measured Value.
- sheet rolling, steel: 0.00206088 kg; lognormal variance with pedigree 0.0701, pedigree (1,4,5,3,3)
  EcoSpold01Location=RER
  Measured Value.
- acrylonitrile-butadiene-styrene copolymer: 1.05826e-5 kg; lognormal variance with pedigree 0.0701, pedigree (1,4,5,3,3)
  Measured Value.
  EcoSpold01Location=RER
- powder coat, steel: 0.000131934 m2; lognormal variance with pedigree 0.0701, pedigree (1,4,5,3,3)
  Measured Value.
  EcoSpold01Location=RER
- steel, low-alloyed, hot rolled: 0.00206088 kg; lognormal variance with pedigree 0.0701, pedigree (1,4,5,3,3)
  EcoSpold01Location=RER
  Measured Value.
- plug, inlet and outlet, for network cable: 0.000331742 unit; lognormal variance with pedigree 0.0701, pedigree (1,4,5,3,3)
  EcoSpold01Location=GLO
  Measured Value.
- electricity, medium voltage: 0.000902802 kWh; source Stachura 2006; lognormal variance with pedigree 0.0701, pedigree (1,4,5,3,3)
  EcoSpold01Location=UCTE
  Estimation, based on literature, OGIP basic datasheet and own calculations.
- battery, Li-ion, rechargeable, prismatic: 9.62051e-7 kg; lognormal variance with pedigree 0.0701, pedigree (1,4,5,3,3)
  EcoSpold01Location=GLO
  Measured Value.
- polymer foaming: 5.30787e-5 kg; source Atlantic Consulting 1998; lognormal variance with pedigree 0.0701, pedigree (1,4,5,3,3)
  Literature Value.
  EcoSpold01Location=RER
- aluminium, cast alloy: 2.90213e-6 kg; lognormal variance with pedigree 0.0701, pedigree (1,4,5,3,3)
  Measured Value.
  EcoSpold01Location=RER
- printed wiring board, surface mounted, unspecified, Pb containing: 2.02329e-5 kg; lognormal variance with pedigree 0.0701, pedigree (1,4,5,3,3)
  (same comment as for printed wiring board, surface mounted, unspecified, Pb free)
- hot rolling, steel: 1.06157e-5 kg; lognormal variance with pedigree 0.0701, pedigree (1,4,5,3,3)
  Measured Value.
  EcoSpold01Location=RER
- power supply unit, for desktop computer: 0.000331742 unit; lognormal variance with pedigree 0.0701, pedigree (1,4,5,3,3)
  EcoSpold01Location=CN
  Measured Value.
- integrated circuit, memory type: 4.97612e-6 kg; lognormal variance with pedigree 0.0701, pedigree (1,4,5,3,3)
  EcoSpold01Location=GLO
  Measured Value.
- copper: 2.07256e-5 kg; lognormal variance with pedigree 0.0701, pedigree (1,4,5,3,3)
  EcoSpold01Location=RER
  Measured Value.
- section bar extrusion, aluminium: 0.000130885 kg; lognormal variance with pedigree 0.0701, pedigree (1,4,5,3,3)
  Measured Value.
  EcoSpold01Location=RER
- aluminium, wrought alloy: 0.000127983 kg; lognormal variance with pedigree 0.0701, pedigree (1,4,5,3,3)
  Measured Value.
  EcoSpold01Location=RER
- polypropylene, granulate: 6.78743e-5 kg; source Atlantic Consulting 1998; lognormal variance with pedigree 0.0701, pedigree (1,4,5,3,3)
  EcoSpold01Location=RER
  Measured and literature Value.
  Further references:
  Hewlett Packard (2002) Environmental Profile: Embedded & Personal Systems. Download of 070213 from <http://www.hp.com/hpinfo/globalcitizenship/environment/productdata/edsembedded--.html>.
- hard disk drive, for desktop computer: 0.000331742 unit; lognormal variance with pedigree 0.0701, pedigree (1,4,5,3,3)
  Measured Value.
  EcoSpold01Location=GLO
- plug, inlet and outlet, for computer cable: 0.000331742 unit; lognormal variance with pedigree 0.0701, pedigree (1,4,5,3,3)
  Measured Value.
  EcoSpold01Location=GLO
- cable, ribbon cable, 20-pin, with plugs: 1.67861e-5 kg; lognormal variance with pedigree 0.0701, pedigree (1,4,5,3,3)
  Measured Value.
  EcoSpold01Location=GLO
- printed wiring board, for surface mounting, Pb free surface: 1.29379e-6 m2; lognormal variance with pedigree 0.0701, pedigree (1,4,5,3,3)
  (same comment as for printed wiring board, for surface mounting, Pb containing surface)
- photovoltaic cell factory: 4.42311e-12 unit; lognormal variance with pedigree 0.3701, pedigree (1,4,5,3,3)
  EcoSpold01Location=DE
  Proxy, due to a lack of data of the infrastructure for the computer production the photovoltaic cell factory was used. It was assumed a life-time of 25 years, and a annual production volume of 3’000’000 pieces.
- cable, connector for computer, without plugs: 0.000829354 m; lognormal variance with pedigree 0.0701, pedigree (1,4,5,3,3)
  EcoSpold01Location=GLO
  Measured Value.
- stretch blow moulding: 3.36685e-5 kg; lognormal variance with pedigree 0.0701, pedigree (1,4,5,3,3)
  Measured Value.
  EcoSpold01Location=RER
- tap water: 0.537421 kg; source Fujitsu L. 2003; lognormal variance with pedigree 0.0701, pedigree (1,4,5,3,3)
  Estimation, based on literature.
  EcoSpold01Location=RER
- polyethylene, high density, granulate: 8.29022e-6 kg; lognormal variance with pedigree 0.0701, pedigree (1,4,5,3,3)
  Measured Value.
  EcoSpold01Location=RER
- wire drawing, copper: 2.07256e-5 kg; lognormal variance with pedigree 0.0701, pedigree (1,4,5,3,3)
  EcoSpold01Location=RER
  Measured Value.
- used desktop computer: -0.00374868 kg; lognormal variance with pedigree 0.0701, pedigree (1,4,5,3,3)
  Measured Value.
  EcoSpold01Location=CH
  production volume 11.3 kg
- corrugated board box: 0.000150012, 6.70714e-6, 0.000569795 kg (3 entries); source Atlantic Consulting 1998; lognormal variance with pedigree 0.0701, pedigree (1,4,5,3,3)
  Literature Value.
  EcoSpold01Location=RER
- waste polypropylene: -5.10907e-6, -3.93879e-7, -1.62686e-7, -1.54486e-7, -5.89497e-6, -6.57234e-8, -2.97884e-8, -4.12681e-5 kg (8 entries); source Atlantic Consulting 1998; lognormal variance with pedigree 0.0701, pedigree (1,4,5,3,3)
  Literature Value. Disposed of via a municipal incineration plant.
  EcoSpold01Location=CH
  production volume 0.16 kg
- wastewater, unpolluted: -4.29937e-6, -0.000533122 m3 (2 entries); source Fujitsu L. 2003; lognormal variance with pedigree 0.0701, pedigree (1,4,5,3,3)
  EcoSpold01Location=CH
  Estimation, based on literature.
  production volume 1.62 m3

## Emissions to nature
- Water [air, unspecified]: 3.27827e-5 m3; lognormal variance with pedigree 0.0807, pedigree (2,2,5,1,1)
  Calculated value based on literature values and expert opinion. See comments in the parametres' comment field.

## Sampling procedure
literature and own experiences

## Review by Jürgen Sutter 2007-08-31
passed.

## Review by Bo Weidema 2012-05-31
Passed. This dataset is based on an earlier ecoinvent dataset. The outputs are now specified in terms of materials that can be treated by existing treatment activities.
