# furnace production, pellets, 25kW

Dataset: EcoSpold 2, unit process
Geography: RoW
Time period: 2010-01-01 to 2019-12-31
Technology level: modern
Classification: ISIC rev.4 ecoinvent: 2815:Manufacture of ovens, furnaces and furnace burners
Classification: EcoSpold01Categories: wood energy/heating systems
Synonyms: wood pellets boiler production; wood fired boiler production
Tags: biomass power
Scenario: Business-as-Usual
System model: Allocation at the point of substitution
Generated by: Christian Bauer
Database: ecoinvent
isCopyrightProtected: true
accessRestrictedTo: 1

## General comment
This dataset represent the production and the disposal of a wood-pellets burning furnace for domestic heating system.

## Included activities start
From reception of furnace components at the factory gate

## Included activities end
This activity ends with the disposal of the device in the end of its lifetime. The dataset includes the most important materials used for the fabrication of the furnace, the accumulator hot water tank (800 liters), the automatic screw conveyor and the chimney flue pipes: steel, rock wool, concrete, polystyrene, plastics, electronic components, lubricating oil, paint. The dataset includes the concrete basement for the furnace, the land transformation and occupation and the energy and heat for the construction and the disposal of the device. The dataset doesn't include the storage silo for pellets, since this boiler is has an internal pellet hopper

## Technology
Boiler of modern technology available on the European and Swiss market. The model of reference is a wood pellets boiler, mod.SL-P from Austrian brand Lindner&Sommerauer. It was compared with other similar models from brands Oekofen and Hargassner. Represent the typical pellets boiler for a single house central heating.
Source of image: http://www.sl-heizung.at/

## Time period
This model of furnace is commercialized since 2010 in Europe and Switzerland and is still available on the market (end 2011)

## Reference product
- furnace, pellets, 25kW: 1 unit; CPC 43420: Industrial or laboratory furnaces and ovens, except non-electric bakery ovens; other industrial or laboratory […]; By-product classification allocatable product
  EcoSpold01Location=GLO
  production volume 300184 unit
    extrapolated with proportions (population) from the local dataset of Switzerland (from which value comes from an estimation of the wood pellets boiler<50kW produced within the country) - high uncertainty
  property lifetime capacity [kWh] 4.38e6 kWh; name lifetime_capacity_kWh; = (lifetime*8760)*capacity_MW*1000
    calculated value.
  property price 5918 EUR2005
    UNDATA "Industrial furnace, oven, incinerator non-electric ne" (http://data.un.org/Data.aspx?q=industrial+furnace&d=ComTrade&f=_l1Code%3a84%3bcmdCode%3a841780; EU I/E average price is 6.133EUR/kg). The prices are per kg and converted to per unit by summed weight of material concumption of the process in existing ecoinvent documentation from ecoinvent v.2.2 (about 760kg). For weight of concrete, it is separately added for from price per m3 used of each unit (14 m3; 'furnace production, pellet, 50kW') and apply EU&DK input output database 2003 (0.08 Euro2003/kg DS; density 2380 kg/m3<#concrete production, normal' in ecoinvent).
  property capacity [MW] 0.025 MW; name capacity_MW
  property lifetime 20 year; name lifetime
  property true value 5918
    allocation property applied in "true value" allocation // value calculated from revenue

## By-products
- electricity, for reuse in municipal waste incineration only: 0 kWh; CPC 17100: Electrical energy; By-product classification allocatable product; pedigree (1,1,1,1,1)
  Net electricity generated from this waste and used in internal MSWI plant energy redistribution.
  Uncertainty: uncertainty is calculated from uncertainties in waste composition and uncertainties in energy efficiency and the uncertainty in internal energy demand
  production volume 1.30607e7 kWh
  property true value relation 3.6; name E_el_prod_MSWI_true_value_relation
    property to calculate "true value" from
  property exergy 3.6 MJ; name E_el_prod_MSWI_exergy
    This exergy property is based on the exergy content of the product.
  property price 0.1 EUR2005; name E_el_prod_MSWI_price_EUR2005
    Estimated to be the same price as in case of electricity, medium voltage.
  property true value 2.94064
    allocation property applied in "true value" allocation // value calculated from true value relation
- heat, for reuse in municipal waste incineration only: 0 MJ; CPC 17300: Steam and hot water; By-product classification allocatable product; pedigree (1,1,1,1,1)
  Net useful heat generated from this waste and used in internal MSWI plant energy redistribution.
  Uncertainty: uncertainty is calculated from uncertainties in waste composition and uncertainties in energy efficiency and the uncertainty in internal energy demand
  production volume 9.11097e7 MJ
  property true value relation 0.1842; name E_th_prod_MSWI_true_value_relation
    property to calculate "true value" from
  property exergy 0.1842 MJ; name E_th_prod_MSWI_exergy
    This exergy property is based on the exergy content of the product.
  property price 0.0106 EUR2005; name E_th_prod_MSWI_price_EUR2005
    Average European district heat price from Ecoheatcool and Euroheat 2005-2006, Ecoheat Work package 1: The European heat market. Final report. 10.6 EUR/GJ i s the price of district heat. http://www.solarthermalworld.org/files/Ecoheatcool%20WP1%20Web.pdf?download
  property true value 1.04977
    (same comment as for electricity, for reuse in municipal waste incineration only)
- zinc concentrate: 0 kg; CPC 14290: Other non-ferrous metal ores and concentrates (other than uranium or thorium ores and concentrates); By-product classification allocatable product
  Calculated value from the knowledge of the properties of both products.
  production volume 31.4415 kg
  property price 0.38 EUR2005; name ByP_price_EUR2005
    Temporary price data. Calculated as 90% of purchasers price based on: Zinc content in concentrate 53%. Concentrate price per kg Zn 86.5% of refined Zn price (13.5% treatment charges according to CHR Metals Limited 2005: Dynamic cost curves. http://www.minecost.com/dynamic.pdf). 2004 zinc price from USGS (2007) Mineral commodity summaries 2007. <http://minerals.usgs.gov/minerals/pubs/mcs/2007/mcs2007.pdf> [Accessed 25 May 2010]
  property zinc content 0.53; name zinc_C_zinc_concentrate
    Zinc content on a dry matter basis. Value taken from teh "zinc mine operation" /GLO dataset.
  property dry mass 1 kg; name DM_zinc_concentrate
  property carbon content 0
    carbon content on a dry matter basis (reserved; not for manual entry)
  property true value 3.98015e-5
    allocation property applied in "true value" allocation // value calculated from revenue
  properties: wet mass 1 kg, water content 0, carbon content, non-fossil 0, carbon content, fossil 0, water in wet mass 0 kg, carbon allocation 0 kg
- copper: 0 kg; By-product classification allocatable product; CPC 41413: Refined copper and copper alloys, unwrought; master alloys of copper
  production volume 144569 kg
  properties: water in wet mass 0 kg, water content 0, carbon content, non-fossil 0, dry mass 1 kg, carbon content, fossil 0, price 5.52 EUR2005, wet mass 1 kg, carbon content 0, carbon allocation 0 kg, true value 2.39719
- lead: 0 kg; CPC 41441: Lead, unwrought; By-product classification allocatable product
  EcoSpold01Location=SE
  production volume 3026.31 kg
  property price 0.744 EUR2005
    Temporary price data. Calculated as 90% of purchasers price based on: Source: ecoinvent v2 report 10-part IX, Tab 5.10 & 2.5
  property carbon content 0
    carbon content on a dry matter basis (reserved; not for manual entry)
  property true value 0.00750066
    allocation property applied in "true value" allocation // value calculated from revenue
  properties: wet mass 1 kg, water content 0, carbon content, non-fossil 0, carbon content, fossil 0, dry mass 1 kg, water in wet mass 0 kg, carbon allocation 0 kg
- nickel, 99.5%: 0 kg; CPC 41422: Unwrought nickel; By-product classification allocatable product
  EcoSpold01Location=SE
  production volume 6317.35 kg
  property price 10.4 EUR2005
    Temporary price data. Calculated as 90% of purchasers price based on: 2004 nickel price from USGS (2007) Mineral commodity summaries 2007. <http://minerals.usgs.gov/minerals/pubs/mcs/2007/mcs2007.pdf> [Accessed 25 May 2010]
  property carbon content 0
    carbon content on a dry matter basis (reserved; not for manual entry)
  property true value 0.218867
    allocation property applied in "true value" allocation // value calculated from revenue
  properties: water in wet mass 0 kg, wet mass 1 kg, carbon content, non-fossil 0, dry mass 1 kg, water content 0, carbon content, fossil 0, carbon allocation 0 kg
- silver: 0 kg; CPC 41310: Silver (including silver plated with gold or platinum), unwrought or in semi-manufactured forms, or in powder […]; By-product classification allocatable product; CAS 7440-22-4
  EcoSpold01Location=SE
  production volume 1043.25 kg
  property price 178 EUR2005
    (same comment as for lead)
  property carbon content 0
    carbon content on a dry matter basis (reserved; not for manual entry)
  property true value 0.618614
    allocation property applied in "true value" allocation // value calculated from revenue
  properties: wet mass 1 kg, carbon content, non-fossil 0, dry mass 1 kg, water content 0, carbon content, fossil 0, water in wet mass 0 kg, carbon allocation 0 kg
- palladium: 0 kg; CPC 4160: Other non-ferrous metals and articles thereof (including waste and scrap of some metals); cermets and articles […]; By-product classification allocatable product
  EcoSpold01Location=SE
  production volume 57.7505 kg
  property price 5640 EUR2005
    Temporary price data. Calculated as 90% of purchasers price based on: 2004 price from USGS (2007) Mineral commodity summaries 2007. <http://minerals.usgs.gov/minerals/pubs/mcs/2007/mcs2007.pdf> [Accessed 25 May 2010]
  property carbon content 0
    carbon content on a dry matter basis (reserved; not for manual entry)
  property true value 1.08504
    allocation property applied in "true value" allocation // value calculated from revenue
  properties: wet mass 1 kg, carbon content, fossil 0, water in wet mass 0 kg, water content 0, carbon content, non-fossil 0, dry mass 1 kg, carbon allocation 0 kg
- gold: 0 kg; CPC 41320: Gold (including gold plated with platinum), unwrought or in semi-manufactured forms, or in powder form; By-product classification allocatable product; CAS 7440-57-5
  EcoSpold01Location=SE
  production volume 31.6702 kg
  property price 10600 EUR2005
    Temporary price data. Calculated as 90% of purchasers price based on: Source: ecoinvent v2 report 10-part IX, Tab 2.5
  property carbon content 0
    carbon content on a dry matter basis (reserved; not for manual entry)
  property true value 1.11833
    allocation property applied in "true value" allocation // value calculated from revenue
  properties: wet mass 1 kg, carbon content, fossil 0, dry mass 1 kg, carbon content, non-fossil 0, water content 0, water in wet mass 0 kg, carbon allocation 0 kg
- iron scrap, sorted, pressed: 0 kg; By-product classification Recyclable; CPC 39310: Slag, dross, scalings and other waste from the manufacture of iron or steel; pedigree (1,1,1,1,1)
  Iron scrap recovered from this waste.
  production volume 435689 kg
  property price 0.175 EUR2005
    Temporary price data. Calculated as 90% of purchasers price based on: 2005 import and export prices (total trades (USD) divided by total weight (kg) in biggest economies of the world: EU27, USA, Brasil, China, India, Japan and Russia) from UN Commodity Trade Statistics Database (http://data.un.org/Explorer.aspxDatabase [Accessed 2011.06.20]). Commodity: Waste or scrap, of cast iron
  property carbon content 0
    carbon content on a dry matter basis (reserved; not for manual entry)
  property true value 0.0621442
    allocation property applied in "true value" allocation // value calculated from revenue
  properties: water content 0, water in wet mass 0 kg, carbon content, fossil 0, dry mass 1 kg, carbon content, non-fossil 0, wet mass 1 kg, carbon allocation 0 kg

## Inputs from technosphere
- electricity, low voltage: 0 kWh; source Ecoenergie srl/L&S Heizanlagenbau 2011; pedigree (1,1,1,1,1)
  estimation - data derives from comparison between old dataset value, energy required for steel manufacturing (similar weight device) and personal comunication form a specialized technician
  EcoSpold01Location=CH
- waste concrete: 0 kg; pedigree (1,1,1,1,1)
  disposal of the concrete for the furnace basement - around 0,04 m3 of concrete * 2350 kg/m3 (concrete density) = around 98 kg
  EcoSpold01Location=CH
  production volume 0 kg
    Calculated from production volume of reference product using the relative outputs.
  properties: wet mass 1 kg, dry mass 0.5 kg, water content 1, lifetime 20 year
- electronics, for control units: 4.49279 kg; source Ecoenergie srl/L&S Heizanlagenbau 2011; lognormal variance with pedigree 0.0284, pedigree (2,3,4,5,1)
  estimation
  EcoSpold01Location=RER
  properties: carbon content, non-fossil 0.00013442, carbon content, fossil 0.337146, dry mass 1 kg, wet mass 1 kg
  note on carbon content, non-fossil: The control unit has a composition of 46% steel (housing), 32% plastics, 14% printed wiring boards and 8% cables (various types).;
- scrap steel: 0 kg; pedigree (1,1,1,1,1)
  EcoSpold01Location=CH
  disposal of steel and chromium steel in the furnace
  production volume 0 kg
    Calculated from production volume of reference product using the relative outputs.
  properties: dry mass 1 kg, wet mass 1 kg, lifetime 20 year
- polystyrene foam slab: 17.9712 kg; source Ecoenergie srl/L&S Heizanlagenbau 2011; lognormal variance with pedigree 0.0278, pedigree (1,3,4,5,1)
  calculated value - insulation of the accumulator hot water tanks
  EcoSpold01Location=RER
  properties: carbon content, fossil 0.859091, wet mass 1 kg, dry mass 1 kg
  note on carbon content, fossil: XPS consists in 91% of polystyrene, 7% of blowing agent and the re-maining 2% are flame retardants (bromine compounds) and other additives (ecoinvent v2.2 report 7, part XIV, pg69). The chemical formula of polystyrene is (C8H8)n. Here, the blowing agent is CO2.
- lubricating oil: 0.698878 kg; source Ecoenergie srl/L&S Heizanlagenbau 2011; lognormal variance with pedigree 0.0312, pedigree (3,4,4,5,1)
  estimation - used for the manufacturing of the furnace and for the maintenance. It is just added to the internal part of the furnace
  EcoSpold01Location=RER
  properties: wet mass 1 kg, dry mass 1 kg, carbon content, fossil 0.75
  note on carbon content, fossil: Lubricating oil is produced from diesel. C-content/dry mass of fats and oils considered 75%, from: ecoinvent v2.2 report, n 15a, pg 40
- polyethylene, high density, granulate: 5.49119 kg; source Ecoenergie srl/L&S Heizanlagenbau 2011; lognormal variance with pedigree 0.0312, pedigree (3,4,4,5,1)
  estimation
  EcoSpold01Location=RER
  properties: dry mass 1 kg, carbon content, fossil 0.857143, wet mass 1 kg
  note on carbon content, fossil: Polyethylene is formed out of a huge amount of ethylene monomers (C2H4) (ecoinvent v2.2 report 11_II). MW=28 g/mol
- waste mineral wool, for final disposal: 0 kg; pedigree (1,1,1,1,1)
  EcoSpold01Location=CH
  disposal of the insulation for the chimney flue pipes
  production volume 0 kg
    Calculated from production volume of reference product using the relative outputs.
  properties: lifetime 20 year, dry mass 1 kg, wet mass 1 kg
- stone wool: 52.9151 kg; source Ecoenergie srl/L&S Heizanlagenbau 2011; lognormal variance with pedigree 0.0312, pedigree (3,4,4,5,1)
  calculated value - summa of rock wool for the insulation of the chimney flue pipes (11 kg: 3m height, 25 cm diameter, thickness rockwool 3cm) and rockwool inside the furnace (42 kg = 324 dm3 * 0.13 kg/m3)
  EcoSpold01Location=CH
  properties: carbon content, fossil 0.015401, dry mass 1 kg, wet mass 1 kg
  note on carbon content, fossil: The chemical composition of the glass fibres used in the rock wool production is similar to the composition of naturally cooled volcano basalt and has a composition listed in Tab. 3.1 and 3.2 in ecoinvent v2.2 report 16, part XIV. Rock wool contains: a minimum of 96% mineral fibres,between 0.5 and 3.0 weight percent of phenolic resin depending on the specific product characteristics, and about 0.2 percent mineral oil (ecoinvent v2.2 report 16, part XIV). An average composition of 1.8% phenolic resin, 0.2% mineral oil, and 98% mineral fibres has been assumed and used to calculate C content of the rock wool
- sheet rolling, steel: 37.9391 kg; source Ecoenergie srl/L&S Heizanlagenbau 2011; lognormal variance with pedigree 0.0312, pedigree (3,4,4,5,1)
  estimation
  EcoSpold01Location=RER
- waste polyethylene: 0 kg; pedigree (1,1,1,1,1)
  disposal of the plastic components
  EcoSpold01Location=CH
  production volume 0 kg
    Calculated from production volume of reference product using the relative outputs.
  properties: lifetime 20 year, water content 0.00401606, dry mass 0.996 kg, wet mass 1 kg, carbon content, fossil 0.825301
  note on carbon content, fossil: C content in 1 kg DM was calculated using data in Tab A.1, ecoinvent v2.2 report 13_I
- steel, chromium steel 18/8, hot rolled: 29.9519 kg; source Ecoenergie srl/L&S Heizanlagenbau 2011; lognormal variance with pedigree 0.0312, pedigree (3,4,4,5,1)
  estimation of the various components inside the furnace
  EcoSpold01Location=RER
  properties: wet mass 1 kg, dry mass 1 kg, carbon content, fossil 0.0008
  note on carbon content, fossil: Stainless steel model is the grade 304 steel (18/8 stainless, 18% chromium 8% nickel; max. 0.08% C)
- waste mineral oil: 0 kg; pedigree (1,1,1,1,1)
  disposal of lubricating oil
  production volume 0 kg
    Calculated from production volume of reference product using the relative outputs.
  properties: carbon content, fossil 0.864444, water content 0.111111, wet mass 1 kg, dry mass 0.9 kg
  note on carbon content, fossil: Tab A.6, ecoinvent v2.2 report 13_I. C content has been calculated after data in the tables, and then referred to 1 kg DM
- alkyd paint, white, without solvent, in 60% solution state: 0.798718 kg; source Ecoenergie srl/L&S Heizanlagenbau 2011; lognormal variance with pedigree 0.0312, pedigree (3,4,4,5,1)
  EcoSpold01Location=RER
  calculated value for the furnace cladding
  properties: dry mass 1 kg, carbon content, non-fossil 0.199629, carbon content, fossil 0.140367, wet mass 1 kg
  note on carbon content, non-fossil: C content was calculated as an addition of C content in the raw materials.
- scrap copper: 0 kg; pedigree (1,1,1,1,1)
  disposal of copper
  production volume 0 kg
    Calculated from production volume of reference product using the relative outputs.
  properties: dry mass 1 kg, wet mass 1 kg
- heat, central or small-scale, other than natural gas: 0 MJ; source Ecoenergie srl/L&S Heizanlagenbau 2011; pedigree (1,1,1,1,1)
  EcoSpold01Location=CH
  estimation - data comes from a comparison between old dataset value and communication with technician (total annual heating value in factory/production)
- waste polystyrene isolation, flame-retardant: 0 kg; pedigree (1,1,1,1,1)
  disposal of the insulation of the water storage
  production volume 0 kg
    Calculated from production volume of reference product using the relative outputs.
  properties: wet mass 1 kg, dry mass 0.998012 kg, carbon content, fossil 0.918145, water content 0.00199232
  note on carbon content, fossil: Polystyrene isolation (EPS) is flame-retarded with hexa-bromo-cyclo-dodecan (C12H18Br6) and contains 0.67 w% bromine (ecoinvent v2.2 report 13_I, pg 39). The rest is polystyrene: (C8H8)n.
- concrete, normal: 0 m3; source Ecoenergie srl/L&S Heizanlagenbau 2011; pedigree (1,1,1,1,1)
  EcoSpold01Location=CH
  calculated value - basing on the space required for the furnace basement (about 0.8m2) the amount of concrete was calculated
  properties: wet mass 2380 kg, dry mass 2190 kg, water content 0.086758
- steel, low-alloyed, hot rolled: 462.258 kg; source Ecoenergie srl/L&S Heizanlagenbau 2011; lognormal variance with pedigree 0.0612, pedigree (3,4,5,1,1)
  calculated value - difference of summa of all other material from the total weight of the furnace
  EcoSpold01Location=RER
  properties: dry mass 1 kg, carbon content, fossil 0.005, wet mass 1 kg
  note on carbon content, fossil: Low alloyed steel composition given in Tab. 3.2 ecoinvent v2.2 report 10_partII. Steel assumed to have a C content of 0.5%
- copper: 0.19968 kg; source Ecoenergie srl/L&S Heizanlagenbau 2011; lognormal variance with pedigree 0.0612, pedigree (3,1,5,5,1)
  EcoSpold01Location=RER
  estimation
  properties: wet mass 1 kg, dry mass 1 kg
- electronics scrap from control units: -4.49279 kg; lognormal variance with pedigree 0.0107, pedigree (1,2,4,5,1)
  disposal of the electronic parts
  EcoSpold01Location=RER
  production volume 1.35083e6 kg; = Ref('18d6a41e-f7ae-42c3-abbc-a78c977506e4', 'ProductionVolume')* (Ref('f083bca6-7e5d-40a8-b576-a93dcf11cc24')*-1)
    Calculated from production volume of reference product using the relative outputs.
  properties: wet mass 1 kg, carbon content, non-fossil 0.00013442, carbon content, fossil 0.337146, dry mass 1 kg, lifetime 20 year
- electricity, low voltage: 5.63308, 0.987972, 22.4073, 80.3357, 16.2462, 245.69, 40.4976, 115.356 kWh (8 entries); source Ecoenergie srl/L&S Heizanlagenbau 2011; lognormal variance with pedigree 0.127, pedigree (3,3,5,5,1)
  (same comment as for electricity, low voltage)
- waste concrete: -6.68698, -91.156 kg (2 entries); lognormal variance with pedigree 0.0107, pedigree (1,2,4,5,1)
  (same comment as for waste concrete)
  production volume 2.94213e7 kg
- scrap steel: -119.888, -372.322 kg (2 entries); lognormal variance with pedigree 0.0107, pedigree (1,2,4,5,1)
  EcoSpold01Location=CH
  disposal of steel and chromium steel in the furnace
  production volume 1.47991e8 kg
- waste mineral wool, for final disposal: -22.7929, -30.1222 kg (2 entries); lognormal variance with pedigree 0.0107, pedigree (1,2,4,5,1)
  EcoSpold01Location=CH
  disposal of the insulation for the chimney flue pipes
  production volume 1.59098e7 kg
- waste polyethylene: -0.61085, -0.0408146, -0.00308674, -0.0168579, -0.0068104, -0.0160082, -0.520472, -4.27629 kg (8 entries); lognormal variance with pedigree 0.0107, pedigree (1,2,4,5,1)
  disposal of the plastic components
  EcoSpold01Location=CH
  production volume 1.65101e6 kg
- waste mineral oil: -0.175807, -0.523071 kg (2 entries); lognormal variance with pedigree 0.0107, pedigree (1,2,4,5,1)
  disposal of lubricating oil
  production volume 210129 kg
- scrap copper: -0.0642968, -0.135383 kg (2 entries); lognormal variance with pedigree 0.0107, pedigree (1,2,4,5,1)
  disposal of copper
  production volume 60036.8 kg
- heat, central or small-scale, other than natural gas: 22.5121, 1574.92 MJ (2 entries); source Ecoenergie srl/L&S Heizanlagenbau 2011; lognormal variance with pedigree 0.127, pedigree (3,3,5,5,1)
  (same comment as for heat, central or small-scale, other than natural gas)
- waste polystyrene isolation, flame-retardant: -5.08358, -12.8876 kg (2 entries); lognormal variance with pedigree 0.0107, pedigree (1,2,4,5,1)
  disposal of the insulation of the water storage
  production volume 5.40331e6 kg
- concrete, normal: 0.000916929, 9.55428e-5, 0.000773486, 0.000435086, 0.00184247, 6.21453e-5, 0.0358102 m3 (7 entries); source Ecoenergie srl/L&S Heizanlagenbau 2011; lognormal variance with pedigree 0.0298, pedigree (3,3,4,5,1)
  (same comment as for concrete, normal)

## Inputs from nature
- Transformation, to industrial area [natural resource, land]: 8.73598 m2; source Ecoenergie srl/L&S Heizanlagenbau 2011; lognormal variance with pedigree 0.0738, pedigree (4,5,5,4,1)
  calculated value - space required for the boiler from the furnace manual
- Transformation, from unspecified [natural resource, land]: 8.73598 m2; name land_use; source Ecoenergie srl/L&S Heizanlagenbau 2011; lognormal variance with pedigree 0.0752, pedigree (4,5,5,5,1)
  calculated value - space required for the boiler from the furnace manual
- Occupation, industrial area [natural resource, land]: 174.72 m2*year; = land_use*lifetime; source Ecoenergie srl/L&S Heizanlagenbau 2011; lognormal variance with pedigree 0.0732, pedigree (4,5,5,1,1)
  calculated value

## Sampling procedure
literature, furnace manual available for customers, investigation and personal communication from producer and technician

## Extrapolations
extrapolated from Austrian data

## Review by Bo Weidema 2012-02-16
Passed. Documentation adequate, inputs relevant, mass balance correct, and correct handling of capacity utilisation.

## Review by Bo Weidema 2012-02-16
As an exception, this dataset has only been reviewed by one reviewer. As an infraqstructure dataset, this exception is reasonable.
