# treatment of sulfidic tailings, from gold mine operation, tailings impoundment

Dataset: EcoSpold 2, unit process
Geography: RoW
Time period: 2015-01-01 to 2019-12-31
Technology level: current
Classification: ISIC rev.4 ecoinvent: 3822:Treatment and disposal of hazardous waste
Synonyms: sulphidic; tailing; tails; pond
Scenario: Business-as-Usual
System model: Allocation at the point of substitution
Share of production covered: 80 %
Generated by: David Turner
Database: ecoinvent
isCopyrightProtected: true
accessRestrictedTo: 1

## General comment
This dataset represents the activity of waste disposal of sulfidic tailings, from gold mine operation in a tailings impoundment.
Background: Tailings, a waste material produced during mineral concentration (beneficiation), often contain significant quantities of mobile toxic metals and are typically produced in large quantities. To manage these wastes, tailings are commonly stored behind dammed impoundments, known as tailings ponds. These ponds pose a significant long-term pollution risk as metals may leach out into the surrounding environment, potentially over very long timeframes.
Modelling approach: This dataset was produced using a model developed specifically for assessing the long-term emissions of tailings disposal (see Doka, 2017). The tailings disposal model is based on the modelling framework applied in existing landfill process models used in ecoinvent and is based on a top-down approach. Literature data on measurements of deposited tailings compositions (solids) and measured current concentrations in leachate (liquid) form the basis of the model and are used to characterise pollutant mobility and calculate the currently occurring rate of emissions of the landfill. Heeding chief parameters, such as hydrology, pH development and elemental chemistry, these emissions are then projected into the future. Tailings composition is based on the typical composition of tailings at gold mine sites worldwide; i.e. composition is not region-specific. Land use was calculated following the approach described by Doka (2008). Based on an assumed generic final height of a tailings impoundment of 60 m and an assumed tailings density of 2200 kg/m3, a land area of 7.58E-06 m2 is required per kilogram of sulfidic tailings. The land is assumed to be converted from unknown origin to a disposal site. After an operational phase of 30 years, spontaneous restoration of a consolidated state is assumed to be reached after one hundred years. The total occupation time is therefore 130 years and the land occupation per kilogram tailings is 9.85E-04 m2.
Waste composition (wet, in ppm): H2O 300000; O 621300; H na; C 6145; S 305.88; N 5.0454; P 192.55; B 54.583; Cl 102.61; Br 0.22894; F 772.88; I na; Ag 9.7097; As 61.447; Ba 356.57; Cd 3.9592; Co 10.634; Cr 46.594; Cu 489.41; Hg 0.40262; Mn 142.11; Mo 10.949; Ni 17.077; Pb 155.09; Sb 34.059; Se 4.2887; Sn 26.979; V 142.69; Zn 190.19; Be 1.9806; Sc 13.343; Sr 100.02; Ti 122.75; Tl 2.6154; W 9.3995; Si 39700; Fe 10240; Ca 2631.2; Al 11955; K 2187; Mg 1408.9; Na 1044.1. // Share of carbon in waste that is biogenic 0%.
Activity extent: The dataset includes all potential emissions to the environment and land use changes. Input exchanges of infrastructure, materials, energy, and water are not included here but are accounted for in the activity, gold mine operation.
References
Doka, G. (2008). Life Cycle Inventory data of mining waste: Emissions from sulfidic tailings disposal. Zürich, Switzerland: Doka Life Cycle Assessments.
Doka, G. (2017). A model for waste-specific and climate-specific life cycle inventories of tailings impoundments. Zürich, Switzerland: Doka Life Cycle Assessments.

## Included activities start
The activity starts at the point of waste deposition in the impoundment. All upstream activities, including the pumping of tailings to the site, any dewatering or treatment, or other transport-related activities are excluded.

## Included activities end
Waste-specific short- and long-term emissions to the environment via impoundment leachate; land transformation and occupation. Note that the structural integrity of the site is assumed to be unwavering during the entie modelled time horizon; i.e. accidental releases of leachate (due to impoundment failure) are not considered.

## Geography
Given name of site is 'Gold deposits; Global'. Impoundment site with mean annual temperature (MAT) of 11.5488718087177 degC, mean annual precipitation (MAP) of 1218.22781426197 mm/year, mean annual actual evaporation (EAT) of 580.647365158709 mm/year, and net infiltration of 927.904131682617 mm/year (using half of natural surface evapotranspiration).

## Technology
This is an inventory for an impoundment of copper ore beneficiation tailings waste. The following assumptions were made concerning technology: final impoundment height is 60 meters; operation phase duration is 30 years; and impoundment leachates are released into the environment untreated.

## Time period
'Data on average composition of tailings and tailings-derived leachates from literature sources published between 1994 and 2017 (mean publication date: 2009±6). Mean annual temperature and precipitation data for 1970-2000 (source: Fick and Hijmans, 2017); mean annual evapotranspiration for 1950-2000 (source: Fekete et al., 2002). Production volume based on world mine production data from the USGS Minerals Yearbook 2015. Transfer coefficients from prospective, tailings-specific model.
References:
Fekete, B. M., Vorosmarty, C. J. & Grabs, W. (2002). High-resolution fields of global runoff combining observed river discharge and simulated water balances. Global Biogeochemical Cycles, 16, 15-1 - 15-10.
Fick, S. E. & Hijmans, R. J. (2017). Worldclim 2: New 1-km spatial resolution climate surfaces for global land areas. International Journal of Climatology, 37, 4302-4315.'

## Reference product
- sulfidic tailings, from gold mine operation: -1 kg; By-product classification Waste
  main reference product of this activity (supply of disposal service).
  production volume 1.7793e7 kg
    Estimate of the national tailings production volume from the mining and concentration of sulfidic gold ores, based on world mine production of gold from sulfide mineral deposits (kg) multiplied by an estimated tailings generation rate per kg of mined gold (6328 kg per kg mined gold).
  property price 0 EUR2005
    Waste products are assigned a price of zero as they are assumed to require further treatment.
  property carbon content 0.0087785
    carbon content on a dry matter basis (reserved; not for manual entry)
  properties: tungsten content 1.3428e-5, silicon content 0.056714, iron content 0.014628, aluminium content 0.017079, zinc content 0.0002717, nitrogen content 7.2076e-6, titanium content 0.00017536, potassium content 0.0031243, sodium content 0.0014916, carbon content, non-fossil 0, strontium content 0.00014288, water in wet mass 0.3 kg, calcium content 0.0037589, scandium content 1.9061e-5, thallium content 3.7362e-6, wet mass 1 kg, magnesium content 0.0020127, beryllium content 2.8295e-6, water content 0.42857, bromine content 3.2706e-7, carbon content, fossil 0.0087785, boron content 7.7976e-5, copper content 0.00069916, barium content 0.00050938, lead content 0.00022156, chlorine content 0.00014659, manganese content 0.00020301, fluorine content 0.0011041, dry mass 0.7 kg, silver content 1.3871e-5, phosphorus content 0.00027508, molybdenum content 1.5641e-5, selenium content 6.1267e-6, cobalt content 1.5191e-5, vanadium content 0.00020384, cadmium content 5.656e-6, sulfur content 0.00043697, tin content 3.8541e-5, mercury content 5.7517e-7, arsenic content 8.7781e-5, nickel content 2.4396e-5, oxygen content 0.88758, chromium content 6.6562e-5, antimony content 4.8655e-5, carbon allocation 0.00614495 kg

## Emissions to nature
- Silicon [water, ground-]: 8.054e-6 kg; lognormal variance with pedigree 0.26836, pedigree (1,1,1,1,1)
  burden from short-term leachate to groundwater in uncontrolled impoundment in moist cimate.
  Uncertainty: U
- Cadmium, ion [water, ground-, long-term]: 3.9307e-6 kg; lognormal variance with pedigree 0.34749, pedigree (1,1,1,1,1)
  Emissions from long-term leachate (>100a) directly from tailings impoundment.
  Uncertainty: U
- Selenium [water, ground-, long-term]: 1.9051e-7 kg; lognormal variance with pedigree 0.9508, pedigree (1,1,1,1,1)
  (same comment as for Cadmium, ion)
- Calcium, ion [water, ground-, long-term]: 0.0025371 kg; lognormal variance with pedigree 0.13323, pedigree (1,1,1,1,1)
  (same comment as for Cadmium, ion)
- Selenium [water, ground-]: 7.0572e-9 kg; lognormal variance with pedigree 0.49202, pedigree (1,1,1,1,1)
  (same comment as for Silicon)
- Calcium, ion [water, ground-]: 9.4088e-5 kg; lognormal variance with pedigree 0.18836, pedigree (1,1,1,1,1)
  (same comment as for Silicon)
- Scandium [water, ground-, long-term]: 1.3259e-5 kg; lognormal variance with pedigree 0.30744, pedigree (1,1,1,1,1)
  (same comment as for Cadmium, ion)
- Cadmium, ion [water, ground-]: 2.8471e-8 kg; lognormal variance with pedigree 0.44851, pedigree (1,1,1,1,1)
  (same comment as for Silicon)
- Potassium, ion [water, ground-, long-term]: 0.00075119 kg; lognormal variance with pedigree 0.21046, pedigree (1,1,1,1,1)
  (same comment as for Cadmium, ion)
- Boron [water, ground-, long-term]: 1.0899e-6 kg; lognormal variance with pedigree 1.2179, pedigree (1,1,1,1,1)
  (same comment as for Cadmium, ion)
- Scandium [water, ground-]: 8.4131e-8 kg; lognormal variance with pedigree 0.41245, pedigree (1,1,1,1,1)
  (same comment as for Silicon)
- Bromine [water, ground-]: 5.2022e-10 kg; lognormal variance with pedigree 0.57657, pedigree (1,1,1,1,1)
  (same comment as for Silicon)
- Phosphate [water, ground-, long-term]: 0.00052108 kg; lognormal variance with pedigree 0.21896, pedigree (1,1,1,1,1)
  (same comment as for Cadmium, ion)
- Bromine [water, ground-, long-term]: 1.6995e-7 kg; lognormal variance with pedigree 0.44525, pedigree (1,1,1,1,1)
  (same comment as for Cadmium, ion)
- Potassium, ion [water, ground-]: 1.5372e-6 kg; lognormal variance with pedigree 0.31378, pedigree (1,1,1,1,1)
  (same comment as for Silicon)
- Boron [water, ground-]: 3.9848e-8 kg; lognormal variance with pedigree 0.4341, pedigree (1,1,1,1,1)
  (same comment as for Silicon)
- Phosphate [water, ground-]: 6.9004e-5 kg; lognormal variance with pedigree 0.24539, pedigree (1,1,1,1,1)
  (same comment as for Silicon)
- BOD5, Biological Oxygen Demand [water, ground-, long-term]: 2.3138e-6 kg; lognormal variance with pedigree 0.26196, pedigree (1,1,1,1,1)
  (same comment as for Cadmium, ion)
- Occupation, dump site [natural resource, land]: 0.00098485 m2*year; lognormal variance with pedigree 0.14966, pedigree (1,1,1,1,1)
  for impoundment operation phase and 100 year renaturation phase.
  Uncertainty: U
- BOD5, Biological Oxygen Demand [water, ground-]: 3.8628e-9 kg; lognormal variance with pedigree 0.30462, pedigree (1,1,1,1,1)
  (same comment as for Silicon)
- Nickel, ion [water, ground-]: 1.0917e-7 kg; lognormal variance with pedigree 0.40386, pedigree (1,1,1,1,1)
  (same comment as for Silicon)
- Barium [water, ground-]: 4.3773e-9 kg; lognormal variance with pedigree 0.50651, pedigree (1,1,1,1,1)
  (same comment as for Silicon)
- Molybdenum [water, ground-, long-term]: 4.9587e-6 kg; lognormal variance with pedigree 0.35241, pedigree (1,1,1,1,1)
  (same comment as for Cadmium, ion)
- Beryllium [water, ground-]: 1.0627e-8 kg; lognormal variance with pedigree 0.4801, pedigree (1,1,1,1,1)
  (same comment as for Silicon)
- Nickel, ion [water, ground-, long-term]: 1.6968e-5 kg; lognormal variance with pedigree 0.29927, pedigree (1,1,1,1,1)
  (same comment as for Cadmium, ion)
- Beryllium [water, ground-, long-term]: 1.97e-6 kg; lognormal variance with pedigree 0.37015, pedigree (1,1,1,1,1)
  (same comment as for Cadmium, ion)
- Molybdenum [water, ground-]: 2.4372e-7 kg; lognormal variance with pedigree 0.38202, pedigree (1,1,1,1,1)
  (same comment as for Silicon)
- Barium [water, ground-, long-term]: 0.00035656 kg; lognormal variance with pedigree 0.1983, pedigree (1,1,1,1,1)
  (same comment as for Cadmium, ion)
- Mercury [water, ground-, long-term]: 4.0184e-7 kg; lognormal variance with pedigree 0.42167, pedigree (1,1,1,1,1)
  (same comment as for Cadmium, ion)
- Zinc, ion [water, ground-, long-term]: 0.00018847 kg; lognormal variance with pedigree 0.21913, pedigree (1,1,1,1,1)
  (same comment as for Cadmium, ion)
- Antimony [water, ground-, long-term]: 7.8886e-7 kg; lognormal variance with pedigree 1.1623, pedigree (1,1,1,1,1)
  (same comment as for Cadmium, ion)
- Mercury [water, ground-]: 7.7699e-10 kg; lognormal variance with pedigree 0.56373, pedigree (1,1,1,1,1)
  (same comment as for Silicon)
- Zinc, ion [water, ground-]: 1.7181e-6 kg; lognormal variance with pedigree 0.31328, pedigree (1,1,1,1,1)
  (same comment as for Silicon)
- Antimony [water, ground-]: 2.8892e-8 kg; lognormal variance with pedigree 0.4449, pedigree (1,1,1,1,1)
  (same comment as for Silicon)
- Magnesium [water, ground-, long-term]: 0.0013576 kg; lognormal variance with pedigree 0.15329, pedigree (1,1,1,1,1)
  (same comment as for Cadmium, ion)
- Vanadium, ion [water, ground-]: 6.9634e-9 kg; lognormal variance with pedigree 0.49132, pedigree (1,1,1,1,1)
  (same comment as for Silicon)
- Aluminium [water, ground-, long-term]: 0.011939 kg; lognormal variance with pedigree 0.08654, pedigree (1,1,1,1,1)
  (same comment as for Cadmium, ion)
- Manganese [water, ground-]: 1.9962e-6 kg; lognormal variance with pedigree 0.30996, pedigree (1,1,1,1,1)
  (same comment as for Silicon)
- Vanadium, ion [water, ground-, long-term]: 1.9231e-7 kg; lognormal variance with pedigree 2.9589, pedigree (1,1,1,1,1)
  (same comment as for Cadmium, ion)
- Nitrate [water, ground-, long-term]: 7.3522e-6 kg; lognormal variance with pedigree 0.34245, pedigree (1,1,1,1,1)
  (same comment as for Cadmium, ion)
- Manganese [water, ground-, long-term]: 0.00014011 kg; lognormal variance with pedigree 0.22882, pedigree (1,1,1,1,1)
  (same comment as for Cadmium, ion)
- Tungsten [water, ground-, long-term]: 1.0523e-6 kg; lognormal variance with pedigree 0.61839, pedigree (1,1,1,1,1)
  (same comment as for Cadmium, ion)
- Aluminium [water, ground-]: 1.6407e-5 kg; lognormal variance with pedigree 0.23952, pedigree (1,1,1,1,1)
  (same comment as for Silicon)
- Lead [water, ground-]: 3.5412e-8 kg; lognormal variance with pedigree 0.4375, pedigree (1,1,1,1,1)
  (same comment as for Silicon)
- Transformation, from unspecified [natural resource, land]: 7.5758e-6 m2; lognormal variance with pedigree 0.030596, pedigree (1,1,1,1,1)
  conversion of impoundment area.
  Uncertainty: U
- Nitrate [water, ground-]: 1.0989e-5 kg; lognormal variance with pedigree 0.34147, pedigree (1,1,1,1,1)
  (same comment as for Silicon)
- Magnesium [water, ground-]: 5.1269e-5 kg; lognormal variance with pedigree 0.20796, pedigree (1,1,1,1,1)
  (same comment as for Silicon)
- Tungsten [water, ground-]: 4.0478e-8 kg; lognormal variance with pedigree 0.43578, pedigree (1,1,1,1,1)
  (same comment as for Silicon)
- Ammonium, ion [water, ground-, long-term]: 4.6579e-7 kg; lognormal variance with pedigree 0.34245, pedigree (1,1,1,1,1)
  (same comment as for Cadmium, ion)
- Lead [water, ground-, long-term]: 0.00015506 kg; lognormal variance with pedigree 0.22591, pedigree (1,1,1,1,1)
  (same comment as for Cadmium, ion)
- Transformation, to dump site [natural resource, land]: 7.5758e-6 m2; lognormal variance with pedigree 0.030596, pedigree (1,1,1,1,1)
  conversion to impoundment area.
  Uncertainty: U
- Arsenic, ion [water, ground-, long-term]: 8.9737e-7 kg; lognormal variance with pedigree 1.3731, pedigree (1,1,1,1,1)
  (same comment as for Cadmium, ion)
- Hydrogen sulfide [water, ground-, long-term]: 6.5011e-6 kg; lognormal variance with pedigree 0.20861, pedigree (1,1,1,1,1)
  (same comment as for Cadmium, ion)
- TOC, Total Organic Carbon [water, ground-, long-term]: 0.0012701 kg; lognormal variance with pedigree 0.26196, pedigree (1,1,1,1,1)
  (same comment as for Cadmium, ion)
- Ammonium, ion [water, ground-]: 6.962e-7 kg; lognormal variance with pedigree 0.34147, pedigree (1,1,1,1,1)
  (same comment as for Silicon)
- Iron, ion [water, ground-]: 1.0112e-5 kg; lognormal variance with pedigree 0.25476, pedigree (1,1,1,1,1)
  (same comment as for Silicon)
- Titanium, ion [water, ground-]: 9.6e-9 kg; lognormal variance with pedigree 0.48071, pedigree (1,1,1,1,1)
  (same comment as for Silicon)
- Arsenic, ion [water, ground-]: 3.2718e-8 kg; lognormal variance with pedigree 0.44047, pedigree (1,1,1,1,1)
  (same comment as for Silicon)
- Iron, ion [water, ground-, long-term]: 0.01023 kg; lognormal variance with pedigree 0.091142, pedigree (1,1,1,1,1)
  (same comment as for Cadmium, ion)
- TOC, Total Organic Carbon [water, ground-]: 2.1204e-6 kg; lognormal variance with pedigree 0.30462, pedigree (1,1,1,1,1)
  (same comment as for Silicon)
- Fluoride [water, ground-, long-term]: 0.00057373 kg; lognormal variance with pedigree 0.17835, pedigree (1,1,1,1,1)
  (same comment as for Cadmium, ion)
- Titanium, ion [water, ground-, long-term]: 0.00012274 kg; lognormal variance with pedigree 0.23369, pedigree (1,1,1,1,1)
  (same comment as for Cadmium, ion)
- Fluoride [water, ground-]: 1.7562e-6 kg; lognormal variance with pedigree 0.30967, pedigree (1,1,1,1,1)
  (same comment as for Silicon)
- Tin, ion [water, ground-, long-term]: 2.6921e-5 kg; lognormal variance with pedigree 0.28409, pedigree (1,1,1,1,1)
  (same comment as for Cadmium, ion)
- Hydrogen sulfide [water, ground-]: 6.9235e-5 kg; lognormal variance with pedigree 0.20343, pedigree (1,1,1,1,1)
  (same comment as for Silicon)
- Thallium [water, ground-, long-term]: 2.6144e-6 kg; lognormal variance with pedigree 0.36107, pedigree (1,1,1,1,1)
  (same comment as for Cadmium, ion)
- DOC, Dissolved Organic Carbon [water, ground-, long-term]: 0.0012701 kg; lognormal variance with pedigree 0.26196, pedigree (1,1,1,1,1)
  (same comment as for Cadmium, ion)
- Tin, ion [water, ground-]: 5.7964e-8 kg; lognormal variance with pedigree 0.42272, pedigree (1,1,1,1,1)
  (same comment as for Silicon)
- DOC, Dissolved Organic Carbon [water, ground-]: 2.1204e-6 kg; lognormal variance with pedigree 0.30462, pedigree (1,1,1,1,1)
  (same comment as for Silicon)
- Sulfate [water, ground-]: 0.00064339 kg; lognormal variance with pedigree 0.20343, pedigree (1,1,1,1,1)
  (same comment as for Silicon)
- Copper, ion [water, ground-, long-term]: 0.00048893 kg; lognormal variance with pedigree 0.18784, pedigree (1,1,1,1,1)
  (same comment as for Cadmium, ion)
- Sulfate [water, ground-, long-term]: 6.0414e-5 kg; lognormal variance with pedigree 0.20861, pedigree (1,1,1,1,1)
  (same comment as for Cadmium, ion)
- COD, Chemical Oxygen Demand [water, ground-]: 1.9314e-7 kg; lognormal variance with pedigree 0.30462, pedigree (1,1,1,1,1)
  (same comment as for Silicon)
- Thallium [water, ground-]: 1.0033e-9 kg; lognormal variance with pedigree 0.55557, pedigree (1,1,1,1,1)
  (same comment as for Silicon)
- Cobalt [water, ground-, long-term]: 1.0427e-5 kg; lognormal variance with pedigree 0.31496, pedigree (1,1,1,1,1)
  (same comment as for Cadmium, ion)
- Strontium [water, ground-, long-term]: 9.9729e-5 kg; lognormal variance with pedigree 0.2405, pedigree (1,1,1,1,1)
  (same comment as for Cadmium, ion)
- COD, Chemical Oxygen Demand [water, ground-, long-term]: 0.00011569 kg; lognormal variance with pedigree 0.26196, pedigree (1,1,1,1,1)
  (same comment as for Cadmium, ion)
- Strontium [water, ground-]: 2.8923e-7 kg; lognormal variance with pedigree 0.36972, pedigree (1,1,1,1,1)
  (same comment as for Silicon)
- Copper, ion [water, ground-]: 4.8716e-7 kg; lognormal variance with pedigree 0.3512, pedigree (1,1,1,1,1)
  (same comment as for Silicon)
- Sodium, ion [water, ground-, long-term]: 0.0010235 kg; lognormal variance with pedigree 0.163, pedigree (1,1,1,1,1)
  (same comment as for Cadmium, ion)
- Cobalt [water, ground-]: 2.0633e-7 kg; lognormal variance with pedigree 0.38684, pedigree (1,1,1,1,1)
  (same comment as for Silicon)
- Silver, ion [water, ground-, long-term]: 9.7073e-6 kg; lognormal variance with pedigree 0.31795, pedigree (1,1,1,1,1)
  (same comment as for Cadmium, ion)
- Chromium VI [water, ground-, long-term]: 3.9128e-7 kg; lognormal variance with pedigree 1.6938, pedigree (1,1,1,1,1)
  (same comment as for Cadmium, ion)
- Sodium, ion [water, ground-]: 2.0631e-5 kg; lognormal variance with pedigree 0.23438, pedigree (1,1,1,1,1)
  (same comment as for Silicon)
- Chromium VI [water, ground-]: 1.422e-8 kg; lognormal variance with pedigree 0.46795, pedigree (1,1,1,1,1)
  (same comment as for Silicon)
- Silver, ion [water, ground-]: 2.3575e-9 kg; lognormal variance with pedigree 0.52751, pedigree (1,1,1,1,1)
  (same comment as for Silicon)
- Chloride [water, ground-, long-term]: 6.8828e-5 kg; lognormal variance with pedigree 0.24087, pedigree (1,1,1,1,1)
  (same comment as for Cadmium, ion)
- Silicon [water, ground-, long-term]: 0.00022259 kg; lognormal variance with pedigree 1.7323, pedigree (1,1,1,1,1)
  (same comment as for Cadmium, ion)
- Chloride [water, ground-]: 3.3782e-5 kg; lognormal variance with pedigree 0.24796, pedigree (1,1,1,1,1)
  (same comment as for Silicon)

## Sampling procedure
Tailings model based on observed leachate concentrations in literature. Extrapolated to 60'000 years heeding chemical characteristics. Initial waste composition from various literature sources. Climate information for national copper deposits (identified from the USGS Major Mineral Deposits database) from literature as follows: global mean annual temperature and precipitation data from Fick and Hijmans (2017); global mean annual evapotranspiration data from Fekete et al. (2002).

References:
Fekete, B. M., Vorosmarty, C. J. & Grabs, W. (2002). High-resolution fields of global runoff combining observed river discharge and simulated water balances. Global Biogeochemical Cycles, 16, 15-1 - 15-10.
Fick, S. E. & Hijmans, R. J. (2017). Worldclim 2: New 1-km spatial resolution climate surfaces for global land areas. International Journal of Climatology, 37, 4302-4315.

## Extrapolations
Climate data collected for gold deposits globally and aggregated to reflect average climatic conditions of gold deposits worldwide. Initial tailings composition based on global average gold tailings composition, derived from literature data. Initial leachate concentration based on generic global average data also obtained from the literature.
