# explosive production, tovex

Dataset: EcoSpold 2, unit process
Geography: CH
Time period: 1997-01-01 to 2019-12-31
Technology level: current
Classification: EcoSpold01Categories: chemicals/inorganics
Classification: ISIC rev.4 ecoinvent: 2029:Manufacture of other chemical products n.e.c.
Synonyms: agent; blasting
Tags: ConvertedDataset
Scenario: Business-as-Usual
System model: Allocation at the point of substitution
Generated by: Daniel Kellenberger (obsolete)
Published in: Kellenberger D. 2007
Database: ecoinvent
isCopyrightProtected: true
accessRestrictedTo: 1

## General comment
As almost no data are available most information is assumed. Only the information on the raw material is handed over in written form. This module should not be used if its relative importance would be high in a certain environmental inventory.
[This dataset was already contained in the ecoinvent database version 2. It was not individually updated during the transfer to ecoinvent version 3. Life Cycle Impact Assessment results may still have changed, as they are affected by changes in the supply chain, i.e. in other datasets. This dataset was generated following the ecoinvent quality guidelines for version 2. It may have been subject to central changes described in the ecoinvent version 3 change report (http://www.ecoinvent.org/database/ecoinvent-version-3/reports-of-changes/), and the results of the central updates were reviewed extensively. The changes added e.g. consistent water flows and other information throughout the database. The documentation of this dataset can be found in the ecoinvent reports of version 2, which are still available via the ecoinvent website. The change report linked above covers all central changes that were made during the conversion process.]

## Included activities end
includes the whole manufacturing process to produce Tovex (raw material provision, mixing process, packing, internal processes (transport, etc.) and infrastructure.

## Geography
For some exchanges RER- and DE-modules have been used as proxy

## Technology
The basic materials are poured by gravity in a mixer. When filled with 1'500kg the mixing procedure starts and lasts about 15min. To keep it warm it's filled in a hot basin from where it is put in sausages by a cartridging machine and then packed in card board boxes. A conveyor belt transports the boxes and puts it on paletts for storing

## Parameters
- fraction, tap water, to air: 0.205; name fraction_TW_to_air; = fraction_PW_to_air; lognormal variance with pedigree 0.092025, pedigree (4,4,3,2,4)
  Calculated value. See comment in the other parametres present in this dataset. Tap water is considered to be always used as process water, thus process water fractions to air are applied to all tap water input flows to calculate the amount of water consumed in the processes.
- fraction, process water, to air: 0.205 dimensionless; name fraction_PW_to_air; lognormal variance with pedigree 0.092025, pedigree (4,4,3,2,4)
  Literature value (Statistics Canada, 2007 & Shaffer, K.H., 2008, Consumptive water use in the Great Lakes Basin, USGS) (Vionnet, S., Quantis Water Database - Technical Report, 2012).

## Reference product
- explosive, tovex: 1 kg; CPC 35450: Prepared explosives; safety fuses; detonating fuses; percussion or detonating caps; igniters; electric detonat[…]; By-product classification allocatable product
  EcoSpold01Location=CH
  production volume 0.0336675 kg
    This is a placeholder value that does not reflect real-world production volumes. This dataset does not currently require a real-world production volume to work in the database framework, and no actual data were collected yet. This has no negative effect on the results of the ecoinvent database. The placeholder value of this activity was scaled according to the nominal GDP of 2005 (source: United Nations, http://data.un.org/Glossary.aspx?q=GDP+%28current+US%24%29, accessed 20130726) to reflect an appropriate share of the global production volume, which is also a placeholder value.
  property carbon content, non-fossil 0
    Composition in Tab 4.1, ecoinvent v2.2 report n 7-part XVIII. 23% of wet mass consists of CH6N2O3
  property carbon content, fossil 0.0483756
    (same comment as for explosive, tovex)
  property carbon content 0.0483756
    carbon content on a dry matter basis (reserved; not for manual entry)
  property true value 0.964
    allocation property applied in "true value" allocation // value calculated from revenue
  properties: dry mass 0.92 kg, wet mass 1 kg, price 0.964 EUR2005, water in wet mass 0.08 kg, water content 0.0869565, carbon allocation 0.0445056 kg

## By-products
- electricity, for reuse in municipal waste incineration only: 0 kWh; CPC 17100: Electrical energy; By-product classification allocatable product; pedigree (1,1,1,1,1)
  Net electricity generated from this waste and used in internal MSWI plant energy redistribution.
  Uncertainty: uncertainty is calculated from uncertainties in waste composition and uncertainties in energy efficiency and the uncertainty in internal energy demand
  production volume 0.00246986 kWh
  property exergy 3.6 MJ; name E_el_prod_MSWI_exergy
    This exergy property is based on the exergy content of the product.
  property true value relation 3.6; name E_el_prod_MSWI_true_value_relation
    property to calculate "true value" from
  property price 0.1 EUR2005; name E_el_prod_MSWI_price_EUR2005
    Estimated to be the same price as in case of electricity, medium voltage.
  property true value 0.000319302
    allocation property applied in "true value" allocation // value calculated from true value relation
- iron scrap, sorted, pressed: 0 kg; By-product classification Recyclable; CPC 39310: Slag, dross, scalings and other waste from the manufacture of iron or steel; pedigree (1,1,1,1,1)
  Iron scrap recovered from this waste.
  Uncertainty: uncertainty calculated from uncertainty in waste composition, uncertainty of share of recyclable metal, uncertainty of transfer coefficient to bottom ash, uncertainty of the efficiency of scrap removal in MSWI plant.
  production volume 5.87941e-5 kg
  property price 0.175 EUR2005
    Temporary price data. Calculated as 90% of purchasers price based on: 2005 import and export prices (total trades (USD) divided by total weight (kg) in biggest economies of the world: EU27, USA, Brasil, China, India, Japan and Russia) from UN Commodity Trade Statistics Database (http://data.un.org/Explorer.aspxDatabase [Accessed 2011.06.20]). Commodity: Waste or scrap, of cast iron
  property carbon content 0
    carbon content on a dry matter basis (reserved; not for manual entry)
  property true value 1.0289e-5
    allocation property applied in "true value" allocation // value calculated from revenue
  properties: carbon content, fossil 0, dry mass 1 kg, carbon content, non-fossil 0, water in wet mass 0 kg, wet mass 1 kg, water content 0, carbon allocation 0 kg
- heat, for reuse in municipal waste incineration only: 0 MJ; CPC 17300: Steam and hot water; By-product classification allocatable product; pedigree (1,1,1,1,1)
  Net useful heat generated from this waste and used in internal MSWI plant energy redistribution.
  Uncertainty: uncertainty is calculated from uncertainties in waste composition and uncertainties in energy efficiency and the uncertainty in internal energy demand
  production volume 0.018146 MJ
  property exergy 0.1842 MJ; name E_th_prod_MSWI_exergy
    This exergy property is based on the exergy content of the product.
  property true value relation 0.1842; name E_th_prod_MSWI_true_value_relation
    property to calculate "true value" from
  property price 0.0106 EUR2005; name E_th_prod_MSWI_price_EUR2005
    Average European district heat price from Ecoheatcool and Euroheat 2005-2006, Ecoheat Work package 1: The European heat market. Final report. 10.6 EUR/GJ i s the price of district heat. http://www.solarthermalworld.org/files/Ecoheatcool%20WP1%20Web.pdf?download
  property true value 0.000120032
    (same comment as for electricity, for reuse in municipal waste incineration only)
- iron scrap, unsorted: 0 kg; source European Aluminium Association 2008; CPC 39310: Slag, dross, scalings and other waste from the manufacture of iron or steel; By-product classification Recyclable; pedigree (1,1,1,1,1)
  production volume 8.29344e-9 kg
  property price 0.149 EUR2005; name ironScrapAmount_price_EUR2005
    Temporary price data. Calculated as 90% of purchasers price based on: estimated at 85% of sorted scrap
  property carbon content 0
    carbon content on a dry matter basis (reserved; not for manual entry)
  property true value 1.23572e-9
    allocation property applied in "true value" allocation // value calculated from revenue
  properties: water in wet mass 0 kg, water content 0, carbon content, fossil 0, carbon content, non-fossil 0, dry mass 1 kg, wet mass 1 kg, carbon allocation 0 kg
- aluminium oxide, non-metallurgical: 0 kg; source European Aluminium Association 2008; CPC 41432: Alumina (aluminium oxide), except artificial corundum; By-product classification allocatable product; CAS 1344-28-1; pedigree (1,1,1,1,1)
  production volume 5.21875e-7 kg
  property carbon content, non-fossil 0; name C_content_non_fossil
  property price 0.28 EUR2005; name Al2O3Amount_price_EUR2005
    From UN trade database. http://data.un.org/ Import data from the largest economies of the world are used (Brazil, India, USA, China, Japan and EU-27).
  property dry mass 1 kg; name DM
  property water content 0; name water_content
  property wet mass 1 kg; name WM
  property water in wet mass 0 kg; name WWM
  property carbon content, fossil 0; name C_content_fossil
  property carbon content 0
    carbon content on a dry matter basis (reserved; not for manual entry)
  property true value 1.46125e-7
    allocation property applied in "true value" allocation // value calculated from revenue
  properties: carbon allocation 0 kg
- aluminium, cast alloy: 0 kg; source European Aluminium Association 2008; By-product classification allocatable product; CPC 41431: Unwrought aluminium; pedigree (1,1,1,1,1)
  EcoSpold01Location=RER
  production volume 4.87838e-6 kg
  property price 1.3 EUR2005; name castAlloyAmount_price_EUR2005
  properties: water in wet mass 0 kg, carbon content, non-fossil 0, water content 0, dry mass 1 kg, carbon content, fossil 0, wet mass 1 kg, carbon content 0, carbon allocation 0 kg, true value 6.34189e-6
- aluminium, wrought alloy: 0 kg; source European Aluminium Association 2008; By-product classification allocatable product; CPC 4153: Semi-finished products of aluminium or aluminium alloys; pedigree (1,1,1,1,1)
  production volume 2.13566e-6 kg
  property price 1.44 EUR2005; name secondaryAluminiumOutput_price_EUR2005
  properties: wet mass 1 kg, water content 0, carbon content, fossil 0, water in wet mass 0 kg, carbon content, non-fossil 0, dry mass 1 kg, carbon content 0, carbon allocation 0 kg, true value 3.07535e-6
- copper: 0 kg; source Rentz O. 1999; By-product classification allocatable product; CPC 41413: Refined copper and copper alloys, unwrought; master alloys of copper
  Literature value. Copper uses: Before end-use copper is manufactured into semi fabricated products, such as shapes and ingots (known as 'semis'). These manufacturing processes are subdivided into hot working, cold working and, if necessary, process annealing. Few of the semis are ready for use as such. They more typically travel to first-stage manufacturers, who make metal rods, wire, and casting, and then to component manufacturers who produce such things as motors, valves, and insulated cables The components in turn are incorporated by final-stage manufacturers into a variety of finished products - automobiles, commercial buildings, residential housing, and so forth. These uses account for about 79% of the world-wide consumption of copper.
  production volume 5.66216e-7 kg
  property price 5.52 EUR2005
    Literature value (http://www.economist.com/news/business/21576714-mining-industry-has-enriched-chile-its-future-precarious-copper-solution). Average price between 20015 and 2013.
  property carbon content 0
    carbon content on a dry matter basis (reserved; not for manual entry)
  property true value 3.12551e-6
    allocation property applied in "true value" allocation // value calculated from revenue
  properties: dry mass 1 kg, water in wet mass 0 kg, wet mass 1 kg, carbon content, non-fossil 0, water content 0, carbon content, fossil 0, carbon allocation 0 kg
- zinc concentrate: 0 kg; CPC 14290: Other non-ferrous metal ores and concentrates (other than uranium or thorium ores and concentrates); By-product classification allocatable product
  Calculated value from the knowledge of the properties of both products.
  production volume 1.45564e-6 kg
  property price 0.38 EUR2005; name ByP_price_EUR2005
    Temporary price data. Calculated as 90% of purchasers price based on: Zinc content in concentrate 53%. Concentrate price per kg Zn 86.5% of refined Zn price (13.5% treatment charges according to CHR Metals Limited 2005: Dynamic cost curves. http://www.minecost.com/dynamic.pdf). 2004 zinc price from USGS (2007) Mineral commodity summaries 2007. <http://minerals.usgs.gov/minerals/pubs/mcs/2007/mcs2007.pdf> [Accessed 25 May 2010]
  property zinc content 0.53; name zinc_C_zinc_concentrate
    Zinc content on a dry matter basis. Value taken from teh "zinc mine operation" /GLO dataset.
  property dry mass 1 kg; name DM_zinc_concentrate
  property carbon content 0
    carbon content on a dry matter basis (reserved; not for manual entry)
  property true value 5.53144e-7
    allocation property applied in "true value" allocation // value calculated from revenue
  properties: wet mass 1 kg, water content 0, carbon content, non-fossil 0, carbon content, fossil 0, water in wet mass 0 kg, carbon allocation 0 kg
- waste paperboard, sorted: 0 kg; CPC 39240: Waste and scrap of paper or paperboard; By-product classification Recyclable; pedigree (1,1,1,1,1)
  It is assumed that 86.3% (wet weight) of waste paperboard, unsorted is segregated to waste paperboard, sorted. Waste paper, sorted is later used in recycling industry where maximum 79% of it, is transformed into new paperboard.
  production volume 0.0012945 kg
  property price 0.0436 EUR2005; name ByP_waste_paperboard_sorted_price_EUR200
    Estimated value; three different sources were used to determine the price for waste paperboard, sorted. 35 AUD/tonne (http://larimer.org/solidwaste/charts/Current.htm, accessed 20130328), 70 GBP/tonne (http://www.letsrecycle.com/prices/waste%20paper, accessed 20130328) and 20 USD/tonne (http://www.oxpaperboard.com/1/post/2013/03/ox-paperboard-announces-price-adjustment-to-uncoated-recycled-paperboard.html, accessed 20130328).
  property water content 0.243781; = WWM_waste_paperboard_sorted/ DM_waste_paperboard_sorted
  property water in wet mass 0.196 kg; name WWM_waste_paperboard_sorted; = WM_waste_paperboard_sorted- DM_waste_paperboard_sorted
  property dry mass 0.804 kg; name DM_waste_paperboard_sorted
  property wet mass 1 kg; name WM_waste_paperboard_sorted
  property carbon content 0.483259
    carbon content on a dry matter basis (reserved; not for manual entry)
  property true value 5.64402e-5
    allocation property applied in "true value" allocation // value calculated from revenue
  properties: carbon content, non-fossil 0.483259, carbon content, fossil 0, carbon allocation 0.38854 kg

## Inputs from technosphere
- tap water: 5.63696 kg; name tap_water_input; lognormal variance with pedigree 0.348, pedigree (5,5,5,1,5)
  EcoSpold01Location=RER
  properties: wet mass 1 kg, water content 2962.17, carbon content, fossil 0.00178991, dry mass 0.000337476 kg
  note on carbon content, fossil: Bicarbonate content is 2.93 mol/m3. CO2 content is 0.1 mol/m3 (ecoinvent v2.2 report 8, Tab 93.1).
- municipal solid waste: -0.00605674 kg; lognormal variance with pedigree 0.138, pedigree (5,5,5,1,1)
  EcoSpold01Location=CH
  production volume 0.00606 kg
    Calculated from the production volume of explosive, tovex in proportion to the respective output amounts.
  properties: dry mass 0.771 kg, carbon content, fossil 0.171549, carbon content, non-fossil 0.261655, wet mass 1 kg, water content 0.297017
  note on carbon content, fossil: MSW composition in tab 4.1, ecoinvent v2.2 report 13_I. C content referred to 1 kg DM
- aluminium, wrought alloy: 0.0543707 kg; lognormal variance with pedigree 0.106, pedigree (4,5,5,1,1)
  EcoSpold01Location=RER
  properties: wet mass 1 kg, dry mass 1 kg
- explosives factory: 6.66641e-9 unit; lognormal variance with pedigree 0.638, pedigree (5,5,5,1,5)
  EcoSpold01Location=CH
  activityLink introduced to establish a direct link to the corresponding regional supply of this product
- flat glass, uncoated: 0.0299838 kg; lognormal variance with pedigree 0.106, pedigree (4,5,5,1,1)
  EcoSpold01Location=RER
  properties: wet mass 1 kg, dry mass 1 kg
- heat, central or small-scale, other than natural gas: 0.146561 MJ; lognormal variance with pedigree 0.146, pedigree (4,5,5,1,4)
  EcoSpold01Location=CH
- municipal waste collection service by 21 metric ton lorry: 0.0755593 metric ton*km; lognormal variance with pedigree 0.248, pedigree (5,5,5,1,1)
  activityLink introduced to establish a direct link to the corresponding regional supply of this product
  EcoSpold01Location=CH
- corrugated board box: 0.00199892 kg; lognormal variance with pedigree 0.138, pedigree (5,5,5,1,1)
  EcoSpold01Location=RER
  properties: wet mass 1 kg, dry mass 0.945 kg, water content 0.0582011, carbon content, fossil 0.000656085, carbon content, non-fossil 0.432275
  note on carbon content, fossil: Fossil C content was calculated after fossil C contents of chemicals used in the production of board (Tab 10-15 & 10.16 ecoinvent v2.2 report 11_III, part 10)
  note on carbon content, non-fossil: Biogenic C content was calculated after biogenic C contents of chemicals used in the production of board (Tab 10.15 & 10.16, ecoinvent v2.2 report 11_III, part 10).
- wastewater, average: -0.00555701 m3; lognormal variance with pedigree 0.138, pedigree (5,5,5,1,1)
  (same comment as for explosives factory)
  production volume 0.00556 m3
    (same comment as for municipal solid waste)
  properties: carbon content, non-fossil 0.194039, water content 2882.2, dry mass 0.346837 kg, wet mass 1000 kg
  note on carbon content, non-fossil: 0.0673 kg TOC/m3 (Tab A.17, ecoinvent v2.2 report 13_I). TOC was considered as Total Carbon.
- ammonium nitrate, as N: 0.160913 kg; lognormal variance with pedigree 0.106, pedigree (4,5,5,1,1)
  EcoSpold01Location=RER
  properties: dry mass 1 kg, wet mass 1 kg
- electricity, medium voltage: 0.0862535 kWh; lognormal variance with pedigree 0.286, pedigree (4,5,5,1,5)
  EcoSpold01Location=CH
- industrial machine, heavy, unspecified: 0.00016691 kg; lognormal variance with pedigree 0.438, pedigree (5,5,5,1,1)
  EcoSpold01Location=RER
  activityLink introduced to establish a direct link to the corresponding regional supply of this product
- waste paperboard, unsorted: -0.00149919 kg; lognormal variance with pedigree 0.138, pedigree (5,5,5,1,1)
  EcoSpold01Location=CH
  production volume 0.0015 kg
    (same comment as for municipal solid waste)
  properties: price 0.03924 EUR2005, carbon content, non-fossil 0.483259, dry mass 0.804 kg, water content 0.243781, wet mass 1 kg
  note on carbon content, non-fossil: C content was calculated for 1 kg DM, using data in Tab A.3, ecoinvent v2.2 report 13_I.
- potato starch: 0.00899515 kg; lognormal variance with pedigree 0.106, pedigree (4,5,5,1,1)
  EcoSpold01Location=DE
  properties: water content 0.25, dry mass 0.8 kg, carbon content, non-fossil 0.46, wet mass 1 kg
  note on carbon content, non-fossil: C-content of starch is considered 46% on dry mass basis (from "Evolutionary and Biochemical Aspects", A.D. Kay and T. Vrede (in Global Ecology, 2010, Elsevier B.V., S.E. Jørgensen Ed.)).
- paper, woodcontaining, lightweight coated: 0.022188 kg; lognormal variance with pedigree 0.348, pedigree (5,5,5,1,5)
  EcoSpold01Location=RER
  properties: carbon content, non-fossil 0.247213, wet mass 1 kg, dry mass 0.945 kg, water content 0.0582011, carbon content, fossil 0.032531
  note on carbon content, non-fossil: Biogenic C content was calculated after biogenic C contents of chemicals used in the production of the paper (in Tab 8.39 ecoinvent v2.2 report 11_III, part 8). The cellulose content in 1 kg of paper (on a wet mas basis) was estimated as (1-chemical content), C content of cellulose was considered 0.44 kgC/kg dry mass (ecoinvent v2.2 report, n 15a, pg 40)
  note on carbon content, fossil: Fossil C content was calculated after fossil C contents of chemicals used in the production of the paper (in Tab 8.39 ecoinvent v2.2 report 11_III, part 8).
- diesel, burned in building machine: 0.0213885 MJ; lognormal variance with pedigree 0.286, pedigree (4,5,5,1,5)
  EcoSpold01Location=GLO
- calcium nitrate: 0.4768 kg; = 0.0566*(164+72)/28; lognormal variance with pedigree 0.106, pedigree (4,5,5,1,1)
  calculated from the original input measured as N (molar masses N2)
  property water content 0.439024; name water_content
  property water in wet mass 0.305085 kg; name WWM
  property carbon content, non-fossil 0; name C_content_non_fossil
  property carbon content, fossil 0; name C_content_fossil
  property dry mass 0.694915 kg; name DM
  property wet mass 1 kg; name WM
- EUR-flat pallet: 0.000399785 unit; lognormal variance with pedigree 0.146, pedigree (4,5,5,1,4)
  EcoSpold01Location=RER
  properties: carbon content, fossil 0.0311351, dry mass 18.3333 kg, carbon content, non-fossil 0.58833, wet mass 22 kg, water content 0.2
  note on carbon content, fossil: C content in components of the pallet (ecoinvent v2.2 report 7_part XVIII)
- aluminium, cast alloy: 0.0255862 kg; lognormal variance with pedigree 0.106, pedigree (4,5,5,1,1)
  EcoSpold01Location=RER
  properties: dry mass 1 kg, wet mass 1 kg
- nitrogen fertiliser, as N: 0.0565695 kg; lognormal variance with pedigree 0.106, pedigree (4,5,5,1,1)
  EcoSpold01Location=RER
  properties: wet mass 1 kg, dry mass 1 kg

## Emissions to nature
- Water [air, unspecified]: 0.00115558 m3; name water_to_air_unspecified; = (tap_water_input/1000*fraction_TW_to_air); lognormal variance with pedigree 0.0807, pedigree (2,2,5,1,1)
  Calculated value based on literature values and expert opinion. See comments in the parametres' comment field.
  property fraction, origin: unspecified 0; name fraction_origin_unspecified
  property fraction, origin: fresh water 1; name fraction_origin_fresh_water
  property fraction, origin: salt water 0; name fraction_origin_salt_water

## Sampling procedure
Share of basic material by personal communication. All other In- and Output modules are estimations

## Extrapolations
See geography

## Review by Roberto Dones 2003-07-23
passed
