# treatment of non-Fe-Co-metals, from used Li-ion battery, hydrometallurgical processing

Dataset: EcoSpold 2, unit process
Geography: GLO
Time period: 2000-01-01 to 2019-12-31
Technology level: current
Classification: ISIC rev.4 ecoinvent: 2420:Manufacture of basic precious and other non-ferrous metals
Classification: EcoSpold01Categories: metals/extraction
Scenario: Business-as-Usual
System model: Allocation at the point of substitution
Generated by: Sofia Parada Tur
Database: ecoinvent
isCopyrightProtected: true
accessRestrictedTo: 1

## General comment
The treatment of non-Fe-Co-metals fraction from used Li-ion battery, hydrometallurgical processing is based on the proxy "copper production, solvent-extraction electro-winning". This proxy has been chosen because of the higher composition of copper (21%) and the nature of the process, namely hydrometallurgy. The original flows related to the mining infrastructure and mining processes have been deleted. They are only relevant for the primary winning of copper from ore. The extraction of Aluminium and Manganese has been reflected with the addition of byproducts in the process. The composition of the non-Fe-Co-metals is 21% Copper, 14.4% Aluminium and 12.4% Manganese. This composition is calculated from the Li-Ion battery production, including cathode and anode components. The rest of flows have not been adapted. No emissions are considered in this activity due to the lack of data. The uncertainty has been adjusted accordingly.

## Included activities start
The activity starts with the reception of non-Fe-Co-metals fraction from the treatment of Li-Ion battery for further hydrometallurgical winning.

## Included activities end
The activity ends with the refining of Copper, The dataset includes the pretreatment of the ore prior to hydrometallurgy, the dump leaching step for copper recovery, the solution cleaning step, and the separation step

## Geography
average world-wide process

## Technology
The technique SX-EW is used mainly for oxide ores and supergene sulphide ores (i.e. ores not containing iron). It is assumed to be used for the treatment of the non-Fe-Co-metals fraction. The process includes a leaching stage followed by cementation or electro-winning. A general description of the process steps is given below.
In the dump leaching step, copper is recovered from large quantities (millions of tonnes) of strip oxide ores with a very low grade. Dilute sulphuric acid is trickled through the material. Once the process starts it continues naturally if water and air are circulated through the heap. The time required is typically measured in years. Sulphur dioxide is emitted during such operations. Soluble copper is then recovered from drainage tunnels and ponds. Copper recovery rates vary from 30% to 70%. Cconsiderable amounts of sulphuric acid and leaching agents emit into water and air. No figures are currently available on the dimension of such emissions. After the solvent-solvent extraction, considerable amounts of leaching residues remain, which consist of undissolved minerals and the remainders of leaching chemicals.
In the solution cleaning step occur precipitation of impurities and filtration or selective enrichment of copper by solvent extraction or ion exchange. The solvent extraction process comprises two steps: selective extraction of copper from an aqueous leach solution into an organic phase (extraction circuit) and the re-extraction or stripping of the copper into dilute sulphuric acid to give a solution suitable for electro winning (stripping circuit).
In the separation step occurs precipitation of copper metal or copper compounds such as Cu2O, CuS, CuCl, CuI, CuCN, or CuSO4 • 5 H2O (crystallisation)
Waste: Like in the pyrometallurgical step, considerable quantities of solid residuals are generated, which are mostly recycled within the process or sent to other specialists to recover any precious metals. Final residues generally comprise hydroxide filter cakes (iron hydroxide, 60% water, cat I industrial waste).

## Time period
time validity of dataset "treatment of used li-ion battery, hydrometallurgical processing"

## Parameters
- fraction, process water, to air: 0.15 dimensionless; name fraction_PW_to_air; lognormal variance with pedigree 0.092025, pedigree (4,4,3,2,4)
  Literature value. In case when no industry/process specific data are available, default evaporation fraction value is used. This value is 15% and is based on literature (Statistics Canada, 2007 & Shaffer, K.H., 2008, Consumptive water use in the Great Lakes Basin, USGS & Shiklomanov, 2003, World Water Resources at the Beginning of the 21st Century) and has been approved by an expert.

## Reference product
- non-Fe-Co-metals, from Li-ion battery, hydrometallurgical processing: 0 kg; By-product classification Waste; CPC 393: Metal wastes or scraps
  this flow substitutes the input of "copper, 0.99% in sulfide, Cu 0.36% and Mo8.2E-3 in crude ore, in ground". The efficiency of Cu, Al and Manganese recovery is estimated 70% based on the estimations of the original process for Cu recovery.
  production volume 0 kg; name non_fe_co_pv
    the production volume represents the non-Fe-Co-metals production in the treatment of used Li-ion battery, hydrometallurgical processing. For further information, refer to dataset "treatment of used Li-ion battery, hydrometallurgical processing".
  property price 10.4 EUR2005
    Temporary price data. Calculated as 90% of purchasers price based on: Assumed as same price as nickel: 2004 nickel price from USGS (2007) Mineral commodity summaries 2007. <http://minerals.usgs.gov/minerals/pubs/mcs/2007/mcs2007.pdf> [Accessed 25 May 2010]
  property carbon content 0
    carbon content on a dry matter basis (reserved; not for manual entry)
  properties: wet mass 1 kg, water content 0, dry mass 1 kg, water in wet mass 0 kg, carbon content, non-fossil 0, carbon content, fossil 0, carbon allocation 0 kg
- sulfuric acid: 1 kg; source Althaus H.-J. 2004; CPC 34231: Chemical elements n.e.c.; inorganic acids except phosphoric, nitric and sulphonitric; inorganic oxygen compoun[…]; By-product classification allocatable product; pedigree (1,1,1,1,1)
  production volume 255000 kg

## By-products
- sulfuric acid: 0 kg; source Althaus H.-J. 2004; CPC 34231: Chemical elements n.e.c.; inorganic acids except phosphoric, nitric and sulphonitric; inorganic oxygen compoun[…]; By-product classification allocatable product; pedigree (1,1,1,1,1)
  production volume 0 kg; = non_fe_co_pv * (Ref('fd9af4d3-3ec8-430f-a8b2-cc85fe9bb96d') / Ref('a440a359-b6bb-4567-9d31-e1eed2f03fe1'))*-1
    Calculated from production volume of reference product using the relative outputs.
  property price 0.031 EUR2005
    Temporary price data. Calculated as 90% of purchasers price based on: 2004 Import/Export data (total trades (USD) divided by total weight (kg) in EU27, USA, China, Japan and India) from UN Commodity Trade Statistics Database (http://data.un.org/Explorer.aspxDatabase [Accessed 2 July 2010]). Commodity: 'Sulphuric acid, oleum'
  property carbon content 0
    carbon content on a dry matter basis (reserved; not for manual entry)
  properties: carbon content, non-fossil 0, dry mass 1 kg, carbon content, fossil 0, wet mass 1 kg, water content 0, water in wet mass 0 kg, carbon allocation 0 kg
- copper: 0 kg; name copper_bp; = 0.21*0.7; By-product classification allocatable product; CPC 41413: Refined copper and copper alloys, unwrought; master alloys of copper; pedigree (1,1,1,1,1)
  Calculated value. Based on Li-ioin battery composition and hydrometallurgical treatment process outputs. The efficiency of Cu, Al and Manganese recovery is estimated 70% based on the estimations of the original process for Cu recovery.
  production volume 0 kg; = copper_bp* non_fe_co_pv
    Calculated from production volume of reference product using the relative outputs.
  property price 5.52 EUR2005; name copper_bp_price_EUR2005
    Literature value (http://www.economist.com/news/business/21576714-mining-industry-has-enriched-chile-its-future-precarious-copper-solution). Average price between 20015 and 2013.
  property carbon content 0
    carbon content on a dry matter basis (reserved; not for manual entry)
  properties: carbon content, non-fossil 0, water in wet mass 0 kg, wet mass 1 kg, water content 0, dry mass 1 kg, carbon content, fossil 0, carbon allocation 0 kg
- manganese: 0 kg; name manganese_bp; = 0.124*0.7; CPC 41603: Bismuth, antimony, manganese, chromium and articles thereof; including waste and scrap of bismuth or manganese; By-product classification allocatable product; pedigree (1,1,1,1,1)
  (same comment as for copper)
  production volume 0 kg; = manganese_bp* non_fe_co_pv
    Calculated from production volume of reference product using the relative outputs.
  property price 1.24 EUR2005; name manganese_bp_price_EUR2005
    Literature value (USGS,http://minerals.usgs.gov/minerals/pubs/commodity/manganese/myb1-2009-manga.pdf, accessed 20160222). The price for manganese ore (48% manganese) is reported to be 6.61 USD/metric ton unit (MTU) = 10kg. The resulting price is (1/0.48*0.661=) 1.38 USD. Cross reference; in 2005 manganese was traded on the markets for 1.5 USD/kg (http://www.infomine.com/investment/metal-prices/manganese/all/, accessed 20160704).
  property carbon content 0
    carbon content on a dry matter basis (reserved; not for manual entry)
  properties: dry mass 1 kg, water in wet mass 0 kg, carbon content, fossil 0, wet mass 1 kg, carbon content, non-fossil 0, water content 0, carbon allocation 0 kg
- iron scrap, unsorted: 0 kg; source European Aluminium Association 2008; CPC 39310: Slag, dross, scalings and other waste from the manufacture of iron or steel; By-product classification Recyclable; pedigree (1,1,1,1,1)
  Reported as "Iron scrap"
  property price 0.149 EUR2005; name ironScrapAmount_price_EUR2005
    Temporary price data. Calculated as 90% of purchasers price based on: estimated at 85% of sorted scrap
  property carbon content 0
    carbon content on a dry matter basis (reserved; not for manual entry)
  properties: water content 0, water in wet mass 0 kg, dry mass 1 kg, carbon content, non-fossil 0, wet mass 1 kg, carbon content, fossil 0, carbon allocation 0 kg
- aluminium oxide, non-metallurgical: 0 kg; source European Aluminium Association 2008; CPC 41432: Alumina (aluminium oxide), except artificial corundum; By-product classification allocatable product; CAS 1344-28-1; pedigree (1,1,1,1,1)
  property carbon content, non-fossil 0; name C_content_non_fossil
  property price 0.28 EUR2005; name Al2O3Amount_price_EUR2005
    From UN trade database. http://data.un.org/ Import data from the largest economies of the world are used (Brazil, India, USA, China, Japan and EU-27).
  property dry mass 1 kg; name DM
  property water content 0; name water_content
  property wet mass 1 kg; name WM
  property water in wet mass 0 kg; name WWM
  property carbon content, fossil 0; name C_content_fossil
  property carbon content 0
    carbon content on a dry matter basis (reserved; not for manual entry)
  properties: carbon allocation 0 kg
- aluminium, cast alloy: 0 kg; source European Aluminium Association 2008; By-product classification allocatable product; CPC 41431: Unwrought aluminium; pedigree (1,1,1,1,1)
  EcoSpold01Location=RER
  property price 1.3 EUR2005; name castAlloyAmount_price_EUR2005
    Temporary price data. Calculated as 90% of purchasers price based on: Source: London Metal Exchange, Aluminium alloy price for 2005
  property carbon content 0
    carbon content on a dry matter basis (reserved; not for manual entry)
  properties: water in wet mass 0 kg, carbon content, non-fossil 0, water content 0, dry mass 1 kg, carbon content, fossil 0, wet mass 1 kg, carbon allocation 0 kg
- heat, for reuse in municipal waste incineration only: 0 MJ; CPC 17300: Steam and hot water; By-product classification allocatable product; pedigree (1,1,1,1,1)
  Net electricity generated from this waste and used in internal MSWI plant energy redistribution.
  Uncertainty: uncertainty is calculated from uncertainties in waste composition and uncertainties in energy efficiency and the uncertainty in internal energy demand
  property exergy 0.1842 MJ; name E_th_prod_MSWI_exergy
    This exergy property is based on the exergy content of the product.
  property true value relation 0.1842; name E_th_prod_MSWI_true_value_relation
    property to calculate "true value" from
  property price 0.0106 EUR2005; name E_th_prod_MSWI_price_EUR2005
    Average European district heat price from Ecoheatcool and Euroheat 2005-2006, Ecoheat Work package 1: The European heat market. Final report. 10.6 EUR/GJ i s the price of district heat. http://www.solarthermalworld.org/files/Ecoheatcool%20WP1%20Web.pdf?download
- electricity, for reuse in municipal waste incineration only: 0 kWh; CPC 17100: Electrical energy; By-product classification allocatable product; pedigree (1,1,1,1,1)
  (same comment as for heat, for reuse in municipal waste incineration only)
  property exergy 3.6 MJ; name E_el_prod_MSWI_exergy
    This exergy property is based on the exergy content of the product.
  property true value relation 3.6; name E_el_prod_MSWI_true_value_relation
    property to calculate "true value" from
  property price 0.1 EUR2005; name E_el_prod_MSWI_price_EUR2005
    Estimated to be the same price as in case of electricity, medium voltage.
- aluminium, wrought alloy: 0 kg; source European Aluminium Association 2008; By-product classification allocatable product; CPC 4153: Semi-finished products of aluminium or aluminium alloys; pedigree (1,1,1,1,1)
  property price 1.44 EUR2005; name secondaryAluminiumOutput_price_EUR2005
    Estimated based on literature values and expert judgement. Aluminium ccast alloys are about 90% of the price of aluminium wrought alloys.
  property carbon content 0
    carbon content on a dry matter basis (reserved; not for manual entry)
  properties: wet mass 1 kg, water content 0, carbon content, fossil 0, water in wet mass 0 kg, carbon content, non-fossil 0, dry mass 1 kg, carbon allocation 0 kg
- zinc concentrate: 0 kg; CPC 14290: Other non-ferrous metal ores and concentrates (other than uranium or thorium ores and concentrates); By-product classification allocatable product
  Calculated value from the knowledge of the properties of both products.
  property price 0.38 EUR2005; name ByP_price_EUR2005
    Temporary price data. Calculated as 90% of purchasers price based on: Zinc content in concentrate 53%. Concentrate price per kg Zn 86.5% of refined Zn price (13.5% treatment charges according to CHR Metals Limited 2005: Dynamic cost curves. http://www.minecost.com/dynamic.pdf). 2004 zinc price from USGS (2007) Mineral commodity summaries 2007. <http://minerals.usgs.gov/minerals/pubs/mcs/2007/mcs2007.pdf> [Accessed 25 May 2010]
  property zinc content 0.53; name zinc_C_zinc_concentrate
    Zinc content on a dry matter basis. Value taken from teh "zinc mine operation" /GLO dataset.
  property dry mass 1 kg; name DM_zinc_concentrate
  property carbon content 0
    carbon content on a dry matter basis (reserved; not for manual entry)
  properties: wet mass 1 kg, water content 0, carbon content, non-fossil 0, carbon content, fossil 0, water in wet mass 0 kg, carbon allocation 0 kg
- iron scrap, sorted, pressed: 0 kg; By-product classification Recyclable; CPC 39310: Slag, dross, scalings and other waste from the manufacture of iron or steel; pedigree (1,1,1,1,1)
  metallic iron scrap removed from ash reamains and recycled.
  Uncertainty: uncertainty is calculated from uncertainties in waste composition and transfer coefficients to soild residues
  property price 0.175 EUR2005
    Temporary price data. Calculated as 90% of purchasers price based on: 2005 import and export prices (total trades (USD) divided by total weight (kg) in biggest economies of the world: EU27, USA, Brasil, China, India, Japan and Russia) from UN Commodity Trade Statistics Database (http://data.un.org/Explorer.aspxDatabase [Accessed 2011.06.20]). Commodity: Waste or scrap, of cast iron
  property carbon content 0
    carbon content on a dry matter basis (reserved; not for manual entry)
  properties: carbon content, non-fossil 0, wet mass 1 kg, dry mass 1 kg, water content 0, carbon content, fossil 0, water in wet mass 0 kg, carbon allocation 0 kg

## Inputs from technosphere
- electricity, high voltage: 0 kWh; source Althaus H.-J. 2004; pedigree (1,1,1,1,1)
  Literature value.
- electricity, high voltage: 0 kWh; source Althaus H.-J. 2004; pedigree (1,1,1,1,1)
  Estimated value: Non mining step electricity consumption was estimated to be 40% from grid and 60% from hydropower.
  Estimated value: Crushing and grinding operations of the material have been estimated with additional energy and mechanical wear (milling equipment) as compared to the conventional copper mine operation dataset.
  Proxy: Base mining data corresponds to "copper mine operation" process.
- electricity, medium voltage: 0 kWh; source Althaus H.-J. 2004; pedigree (1,1,1,1,1)
  (same comment as for electricity, high voltage)
- aluminium scrap, post-consumer: 0 kg; name aluminium_bp; = 0.144*0.7; pedigree (1,1,1,1,1)
  (same comment as for copper)
  production volume 0 kg; = aluminium_bp* non_fe_co_pv
    Calculated from production volume of reference product using the relative outputs.
  property price 0.685 EUR2005; name aluminium_bp_price_EUR2005
  properties: wet mass 1 kg, dry mass 1 kg
- ammonia, liquid: 0, 0, 0 kg (3 entries); source Althaus H.-J. 2004; pedigree (1,1,1,1,1)
  Proxy: "ammonia, liquid" is used as a proxy for leaching agents.
  Estimation from dataset author.
  properties: dry mass 1 kg, wet mass 1 kg
- chemical factory, organics: 1.55928e-13 unit; source Althaus H.-J. 2004; lognormal variance with pedigree 0.408, pedigree (4,5,5,5,4)
  Proxy: "chemical factory, organics" is used as a proxy for leaching infrastructure.
  Estimation from dataset author.
- chemical, inorganic: 5.79947e-7 kg; lognormal variance with pedigree 0.0521, pedigree (1,4,5,3,1)
  EcoSpold01Location=GLO
  Data of 1 European plant - reported in Fisher (2006)
  Uncertainty: data of 1 European plant - reported in Fisher (2006)
- lime, hydrated, packed: 2.2613e-9, 2.66401e-7 kg (2 entries); lognormal variance with pedigree 0.0521, pedigree (1,4,5,3,1)
  EcoSpold01Location=CH
  Data of 1 European plant - reported in Fisher (2006)
  Uncertainty: data of 1 European plant - reported in Fisher (2006)
- waste plastic, mixture: -3.6547e-7, -1.50952e-7, -1.43343e-7, -5.46978e-6, -6.09829e-8, -2.76399e-8, -3.82915e-5 kg (7 entries); lognormal variance with pedigree 0.0521, pedigree (1,4,5,3,1)
  Data of 1 European plant - reported in Fisher (2006)
  EcoSpold01Location=CH
  Uncertainty: data of 1 European plant - reported in Fisher (2006)
- sulfuric acid: 2.29444e-6, 3.55441e-6 kg (2 entries); lognormal variance with pedigree 0.0521, pedigree (1,4,5,3,1)
  Data of 1 European plant - reported in Fisher (2006)
  EcoSpold01Location=RER
  Uncertainty: data of 1 European plant - reported in Fisher (2006)
- hazardous waste, for underground deposit: -3.19003e-7 kg; lognormal variance with pedigree 0.0032, pedigree (1,3,3,1,1)
  Amount and activity link based on primary data collected from participating companies.
  production volume 1.75109e6 kg
- light fuel oil: 5.55952e-6 kg; lognormal variance with pedigree 0.0032, pedigree (1,3,3,1,1)
  Amount and activity link based on primary data collected from participating companies. Emissions from fuel combustion included in dataset.
- copper: 7.75102e-6 kg; lognormal variance with pedigree 0.0032, pedigree (1,3,3,1,1)
  Amount and activity link based on primary data collected from participating companies.
- blasting: 6.1788e-6 kg; lognormal variance with pedigree 0.0032, pedigree (1,3,3,1,1)
  Amount and activity link based on primary data collected from participating companies.
- mine infrastructure, underground, non-ferrous metal: 8.56971e-13 unit; lognormal variance with pedigree 0.0887, pedigree (5,5,5,3,1)
  Estimation from author of 'zinc mine operation, GLO, 1994-2003' dataset. No primary data on infrastructure included.
- heat, district or industrial, other than natural gas: 7.31567e-6, 3.7928e-6, 0.000161776 MJ (3 entries); lognormal variance with pedigree 0.0032, pedigree (1,3,3,1,1)
  Amount and activity link based on primary data collected from participating companies.
- conveyor belt: 5.83648e-10 m; lognormal variance with pedigree 0.0587, pedigree (4,4,5,3,3)
  Estimation from author of 'zinc mine operation, GLO, 1994-2003' dataset: 2000 m conveyor belts are assumed to have a capacity of 2000 t/h which yields 2*10-5 m conveyor belt required per tonne mined raw ore. No primary data on infrastructure included.
- maize starch: 2.91965e-7 kg; lognormal variance with pedigree 0.0032, pedigree (1,3,3,1,1)
  Amount and activity link based on primary data collected from participating companies.
- electricity, medium voltage: 0.000579446, 0.000705467, 0.000226592, 3.23649e-8, 8.63751e-5, 6.84692e-5, 0.000547869 kWh (7 entries); lognormal variance with pedigree 0.0032, pedigree (1,3,3,1,1)
  Amount and activity link based on primary data collected from participating companies.
- zinc slag: -3.92894e-7 kg; lognormal variance with pedigree 0.0032, pedigree (1,3,3,1,1)
  Amount and activity link based on primary data collected from participating companies.
  production volume 2.1567e6 kg
- copper sulfate: 4.2529e-5 kg; lognormal variance with pedigree 0.0032, pedigree (1,3,3,1,1)
  Amount and activity link based on primary data collected from participating companies.
- heavy fuel oil: 2.1733e-6 kg; lognormal variance with pedigree 0.0032, pedigree (1,3,3,1,1)
  (same comment as for light fuel oil)
- electricity, high voltage: 0.000332685 kWh; lognormal variance with pedigree 0.0032, pedigree (1,3,3,1,1)
  Amount and activity link based on primary data collected from participating companies.
- diesel: 2.41253e-5, 8.91722e-5 kg (2 entries); lognormal variance with pedigree 0.0032, pedigree (1,3,3,1,1)
  Amount and activity link based on primary data collected from participating companies. Emissions from diesel combustion included in dataset.
- tap water: 0.0212109 kg; lognormal variance with pedigree 0.0032, pedigree (1,3,3,1,1)
  Amount and activity link based on primary data collected from participating companies.
- aluminium chloride: 4.77888e-10 kg; lognormal variance with pedigree 0.0032, pedigree (1,3,3,1,1)
  Amount and activity link based on primary data collected from participating companies.
- steel, low-alloyed: 8.99086e-6 kg; lognormal variance with pedigree 0.0032, pedigree (1,3,3,1,1)
  Amount and activity link based on primary data collected from participating companies.
- chemical, organic: 1.13623e-5 kg; lognormal variance with pedigree 0.0032, pedigree (1,3,3,1,1)
  Amount and activity link based on primary data collected from participating companies.
- concrete, normal: 1.36795e-8 m3; lognormal variance with pedigree 0.0032, pedigree (1,3,3,1,1)
  Amount and activity link based on primary data collected from participating companies.
- waste wood, post-consumer: -9.60636e-8 kg; lognormal variance with pedigree 0.0032, pedigree (1,3,3,1,1)
  Amount and activity link based on primary data collected from participating companies.
  production volume 527319 kg
- acetic acid, without water, in 98% solution state: 8.15165e-8 kg; lognormal variance with pedigree 0.0032, pedigree (1,3,3,1,1)
  Amount and activity link based on primary data collected from participating companies.
- transport, freight, sea, bulk carrier for dry goods: 8.57141e-7 metric ton*km; lognormal variance with pedigree 0.1226, pedigree (1,3,3,1,1)
  Inbound transport of materials to sites. Amount and activity link based on primary data collected from participating companies.
- cement, unspecified: 8.27968e-7 kg; lognormal variance with pedigree 0.0032, pedigree (1,3,3,1,1)
  Amount and activity link based on primary data collected from participating companies.
- sodium dichromate: 2.09785e-8 kg; lognormal variance with pedigree 0.0032, pedigree (1,3,3,1,1)
  Amount and activity link based on primary data collected from participating companies.
- polyacrylamide: 2.03811e-7 kg; lognormal variance with pedigree 0.0032, pedigree (1,3,3,1,1)
  Amount and activity link based on primary data collected from participating companies.
- used Li-ion battery: -0.000189705 kg; lognormal variance with pedigree 0.0032, pedigree (1,3,3,1,1)
  Amount and activity link based on primary data collected from participating companies.
  production volume 30057 kg
- sodium sulfide: 3.89236e-7 kg; lognormal variance with pedigree 0.0032, pedigree (1,3,3,1,1)
  Amount and activity link based on primary data collected from participating companies.
- sodium hydrogen sulfite: 1.47781e-7 kg; lognormal variance with pedigree 0.0032, pedigree (1,3,3,1,1)
  Amount and activity link based on primary data collected from participating companies.
- soda ash, dense: 7.46223e-6 kg; lognormal variance with pedigree 0.0032, pedigree (1,3,3,1,1)
  Amount and activity link based on primary data collected from participating companies.
- non-sulfidic overburden, off-site: -0.0607921 kg; lognormal variance with pedigree 0.0032, pedigree (1,3,3,1,1)
  Amount and activity link based on primary data collected from participating companies.
  production volume 3.33704e11 kg
- propane: 4.94309e-6 kg; lognormal variance with pedigree 0.0032, pedigree (1,3,3,1,1)
  Amount and activity link based on primary data collected from participating companies.
- pig iron: 1.51409e-6 kg; lognormal variance with pedigree 0.0032, pedigree (1,3,3,1,1)
  Amount and activity link based on primary data collected from participating companies.
- natural gas, high pressure: 1.69371e-7 m3; lognormal variance with pedigree 0.0032, pedigree (1,3,3,1,1)
  (same comment as for light fuel oil)
- petrol, unleaded: 2.91178e-8, 1.29252e-9, 5.34172e-9, 1.28833e-9, 4.81962e-9, 2.65385e-10, 1.48345e-7 kg (7 entries); lognormal variance with pedigree 0.0032, pedigree (1,3,3,1,1)
  Amount and activity link based on primary data collected from participating companies.
- inert waste: -3.67578e-7, -3.16584e-9, -1.29567e-6 kg (3 entries); lognormal variance with pedigree 0.0032, pedigree (1,3,3,1,1)
  Amount and activity link based on primary data collected from participating companies.
  production volume 9.14737e6 kg
- lubricating oil: 4.43898e-7, 2.10729e-6 kg (2 entries); lognormal variance with pedigree 0.0032, pedigree (1,3,3,1,1)
  Amount and activity link based on primary data collected from participating companies.
- limestone, crushed, washed: 3.42399e-11, 4.01566e-9 kg (2 entries); lognormal variance with pedigree 0.0032, pedigree (1,3,3,1,1)
  Amount and activity link based on primary data collected from participating companies.
- bilge oil: -4.16259e-9, -1.08807e-10, -8.65589e-9 kg (3 entries); lognormal variance with pedigree 0.0032, pedigree (1,3,3,1,1)
  Amount and activity link based on primary data collected from participating companies.
  production volume 70961.3 kg
- lime: 8.84143e-8, 1.02369e-6 kg (2 entries); lognormal variance with pedigree 0.0032, pedigree (1,3,3,1,1)
  Amount and activity link based on primary data collected from participating companies.
- hazardous waste, for incineration: -3.86219e-6, -1.00955e-7, -8.03122e-6 kg (3 entries); lognormal variance with pedigree 0.0032, pedigree (1,3,3,1,1)
  Amount and activity link based on primary data collected from participating companies.
  production volume 6.58402e7 kg
- limestone, unprocessed: 3.81655e-7, 3.95109e-9, 9.66273e-6 kg (3 entries); lognormal variance with pedigree 0.0032, pedigree (1,3,3,1,1)
  Amount and activity link based on primary data collected from participating companies.
- hydrogen cyanide: 5.49086e-8, 1.20799e-7 kg (2 entries); lognormal variance with pedigree 0.0032, pedigree (1,3,3,1,1)
  Amount and activity link based on primary data collected from participating companies.
- sulfidic tailings, from zinc-lead mine operation: -0.00774822, -0.00109077, -0.000955363, -0.00202356, -0.000395686, -0.00262537, -0.00139167, -0.00445635 kg (8 entries); lognormal variance with pedigree 0.0032, pedigree (1,3,3,1,1)
  Amount and activity link based on primary data collected from participating companies.
  production volume 1.13556e11 kg
- iron sulfate: 6.48011e-8, 1.31214e-7 kg (2 entries); lognormal variance with pedigree 0.0032, pedigree (1,3,3,1,1)
  Amount and activity link based on primary data collected from participating companies.
- nylon 6: 1.5895e-8, 3.21853e-8 kg (2 entries); lognormal variance with pedigree 0.0032, pedigree (1,3,3,1,1)
  Amount and activity link based on primary data collected from participating companies.
- zinc monosulfate: 1.5575e-6, 8.22776e-6 kg (2 entries); lognormal variance with pedigree 0.0032, pedigree (1,3,3,1,1)
  Amount and activity link based on primary data collected from participating companies.
- concrete, 35MPa: 3.10446e-10, 1.94128e-12, 1.24082e-11, 2.56174e-9 m3 (4 entries); lognormal variance with pedigree 0.0032, pedigree (1,3,3,1,1)
  Amount and activity link based on primary data collected from participating companies.
- transport, freight, lorry 16-32 metric ton, EURO3: 2.18394e-6, 5.37295e-6 metric ton*km (2 entries); lognormal variance with pedigree 0.1226, pedigree (1,3,3,1,1)
  (same comment as for transport, freight, sea, bulk carrier for dry goods)
- acrylic acid: 1.27253e-8, 6.04085e-8 kg (2 entries); lognormal variance with pedigree 0.0032, pedigree (1,3,3,1,1)
  Amount and activity link based on primary data collected from participating companies.
- sulfur dioxide, liquid: 6.16335e-7, 1.53416e-6 kg (2 entries); lognormal variance with pedigree 0.0032, pedigree (1,3,3,1,1)
  Amount and activity link based on primary data collected from participating companies.
- waste paper, unsorted: -1.04615e-10, -3.18853e-12, -7.02178e-10 kg (3 entries); lognormal variance with pedigree 0.0032, pedigree (1,3,3,1,1)
  Amount and activity link based on primary data collected from participating companies.
  production volume 4446.2 kg
- sodium cyanide: 1.41668e-7, 2.86861e-7 kg (2 entries); lognormal variance with pedigree 0.0032, pedigree (1,3,3,1,1)
  Amount and activity link based on primary data collected from participating companies.
- waste mineral oil: -8.73291e-8, -2.02071e-9, -2.59827e-7 kg (3 entries); lognormal variance with pedigree 0.0032, pedigree (1,3,3,1,1)
  Amount and activity link based on primary data collected from participating companies.
  production volume 1.91672e6 kg
- calcium chloride: 2.66794e-8, 9.23875e-8 kg (2 entries); lognormal variance with pedigree 0.0032, pedigree (1,3,3,1,1)
  Amount and activity link based on primary data collected from participating companies.
- municipal solid waste: -3.73726e-7, -2.29067e-9, -1.60292e-9, -6.36143e-9, -4.49906e-6 kg (5 entries); lognormal variance with pedigree 0.0032, pedigree (1,3,3,1,1)
  Amount and activity link based on primary data collected from participating companies.
  production volume 2.68043e7 kg
- quicklime, milled, loose: 3.92712e-9, 4.69912e-7 kg (2 entries); lognormal variance with pedigree 0.0032, pedigree (1,3,3,1,1)
  Amount and activity link based on primary data collected from participating companies.
- waste rubber, unspecified: -0.000270923, -0.000539821, -0.000270923 kg (3 entries); lognormal variance with pedigree 0.0032, pedigree (1,3,3,1,1)
  Amount and activity link based on primary data collected from participating companies.
  production volume 7904.23 kg
- polyol: 9.42071e-8, 1.90757e-7 kg (2 entries); lognormal variance with pedigree 0.0032, pedigree (1,3,3,1,1)
  Amount and activity link based on primary data collected from participating companies.
- scrap copper: -6.30254e-8, -2.95702e-9, -1.32706e-7 kg (3 entries); lognormal variance with pedigree 0.0032, pedigree (1,3,3,1,1)
  Amount and activity link based on primary data collected from participating companies.
  production volume 1.09065e6 kg
- quicklime, in pieces, loose: 3.13381e-10, 1.89365e-5 kg (2 entries); lognormal variance with pedigree 0.0032, pedigree (1,3,3,1,1)
  Amount and activity link based on primary data collected from participating companies.
- oxygen, liquid: 6.40036e-10, 2.33259e-9 kg (2 entries); lognormal variance with pedigree 0.0032, pedigree (1,3,3,1,1)
  Amount and activity link based on primary data collected from participating companies.
- nitrogen, liquid: 1.9491e-6 kg; lognormal variance with pedigree 0.0381, pedigree (4,4,4,3,1)
  EcoSpold01Location=RER
- battery separator: 2.09158e-5 kg; lognormal variance with pedigree 0.0207, pedigree (2,4,4,3,1)
  EcoSpold01Location=CN
- aluminium, wrought alloy: 0.000148164 kg; lognormal variance with pedigree 0.0207, pedigree (2,4,4,3,1)
  EcoSpold01Location=RER
- ethylene carbonate: 6.22035e-5 kg; lognormal variance with pedigree 0.0207, pedigree (2,4,4,3,1)
  EcoSpold01Location=CN
- lithium hexafluorophosphate: 7.421e-6 kg; lognormal variance with pedigree 0.0207, pedigree (2,4,4,3,1)
  EcoSpold01Location=CN
- extrusion, plastic film: 2.85699e-5 kg; lognormal variance with pedigree 0.0207, pedigree (2,4,4,3,1)
  EcoSpold01Location=RER
- anode, graphite, for lithium-ion battery: 0.000156357 kg; lognormal variance with pedigree 0.0207, pedigree (2,4,4,3,1)
  EcoSpold01Location=CN
- polyethylene, low density, granulate: 2.85699e-5 kg; lognormal variance with pedigree 0.0207, pedigree (2,4,4,3,1)
  EcoSpold01Location=RER
- sheet rolling, aluminium: 6.42618e-6 kg; lognormal variance with pedigree 0.3207, pedigree (2,4,4,3,1)
  EcoSpold01Location=RER
- heat, district or industrial, natural gas: 0.000425758 MJ; lognormal variance with pedigree 0.0381, pedigree (4,4,4,3,1)
  EcoSpold01Location=RER
- electricity, medium voltage: 2.05825e-5 kWh; lognormal variance with pedigree 0.048, pedigree (1,1,4,1,1)
  composite
  EcoSpold01Location=CN
- cathode, LiMn2O4, for lithium-ion battery: 0.000127416 kg; lognormal variance with pedigree 0.0207, pedigree (2,4,4,3,1)
  EcoSpold01Location=CN
- printed wiring board, surface mounted, unspecified, Pb free: 1.12578e-7 kg; lognormal variance with pedigree 0.0101, pedigree (1,4,4,3,1)
  This original value from production mix has been replaced by 2 flows. Pb-containing has a share of 0.3, Pb-free has a share of 0.7.
- printed wiring board, surface mounted, unspecified, Pb containing: 4.82478e-8 kg; lognormal variance with pedigree 0.0101, pedigree (1,4,4,3,1)
  (same comment as for printed wiring board, surface mounted, unspecified, Pb free)
- metal working factory: 2.17647e-14 unit; lognormal variance with pedigree 0.4461, pedigree (5,5,5,3,3)
  EcoSpold01Location=RER
- cable, data cable in infrastructure: 1.77206e-5 m; lognormal variance with pedigree 0.0221, pedigree (3,4,4,3,1)
  EcoSpold01Location=GLO
- battery cell, Li-ion: 3.7987e-5 kg; lognormal variance with pedigree 0.0101, pedigree (1,4,4,3,1)
  EcoSpold01Location=CN
- reinforcing steel: 0.000369429 kg; lognormal variance with pedigree 0.0287, pedigree (2,4,4,3,3)
  EcoSpold01Location=RER
- sheet rolling, steel: 0.000116965 kg; lognormal variance with pedigree 0.0287, pedigree (2,4,4,3,3)
  EcoSpold01Location=RER
- electricity, low voltage: 5.1109e-6 kWh; lognormal variance with pedigree 0.096, pedigree (4,5,5,5,3)
  EcoSpold01Location=UCTE
- cable, three-conductor cable: 1.18589e-6 m; lognormal variance with pedigree 0.0221, pedigree (3,4,4,3,1)
  EcoSpold01Location=GLO
- metal working, average for steel product manufacturing: 9.0728e-5 kg; lognormal variance with pedigree 0.0186, pedigree (4,5,3,1,1)
  Calculated.
- battery, Li-ion, rechargeable, prismatic: 9.91159e-5 kg; source Carrier 2014; lognormal variance with pedigree 0.0186, pedigree (4,5,3,1,1)
  Literature value (Carrier, 2014, Operation and service for 69RG15 generator set units, http://dms.hvacpartners.com//docs/2000/Public/04/T-361.pdf, accessed 20141218).
- zinc coat, pieces: 1.21388e-6 m2; lognormal variance with pedigree 0.0186, pedigree (4,5,3,1,1)
  Calculated value based on estimates.
  The dimentions of the genset are approximatelly 2.4*1*0.7m.
- steel, low-alloyed, hot rolled: 0.00019569 kg; lognormal variance with pedigree 0.0186, pedigree (4,5,3,1,1)
  Calculated value.
- used diesel-electric generating set, 18.5kW: -1.95788e-7 unit
  production volume 50000 unit
- metal working, average for aluminium product manufacturing: 5.87363e-5 kg; lognormal variance with pedigree 0.0186, pedigree (4,5,3,1,1)
  Calculated.
- welding, arc, steel: 1.95788e-6 m; lognormal variance with pedigree 0.0186, pedigree (4,5,3,1,1)
  Estimated.
- electronics, for control units: 2.93681e-6 kg; source Carrier 2014; lognormal variance with pedigree 0.0186, pedigree (4,5,3,1,1)
  Estimated based on literature.
- aluminium alloy, AlMg3: 7.30205e-5 kg; lognormal variance with pedigree 0.0267, pedigree (2,2,4,1,3)
  EcoSpold01Location=RER
  Estimation:5% of aluminium parts replaced
  Uncertainty: Estimation:5% of aluminium parts replaced
- polyethylene, high density, granulate: 0.000222286 kg; lognormal variance with pedigree 0.0267, pedigree (2,2,4,1,3)
  Estimation: Bicycle: 50% of plastic parts once replaced, Scooter 15% replaced
  EcoSpold01Location=RER
  Uncertainty: Estimation: Bicycle: 50% of plastic parts once replaced, Scooter 15% replaced
- waste plastic, mixture: -4.90062e-5 kg; lognormal variance with pedigree 0.0341, pedigree (4,2,4,1,3)
  Plastics to municipal incineration
  EcoSpold01Location=CH
  Uncertainty: plastics to municipal incineration
  production volume 1.0088 kg
- section bar extrusion, aluminium: 3.64454e-5 kg; lognormal variance with pedigree 0.0961, pedigree (4,2,4,1,4)
  EcoSpold01Location=RER
  Assumption for pipe drawing
  Uncertainty: Assumption for pipe drawing
- tap water: 0.000780739 kg; lognormal variance with pedigree 0.0092, pedigree (2,3,4,1,1)
  Assumption based on: Cherry, C.R. 2007, 1488 liters waste water for all production phases (incl. Battery manufacturing --> 50%)
  EcoSpold01Location=RER
  Uncertainty: Assumption based on: Cherry, C.R. 2007, 1488 liters waste water for all production phases (incl. Battery manufacturing --> 50%)
- chromium steel removed by turning, average, conventional: 2.54821e-5 kg; lognormal variance with pedigree 0.0961, pedigree (4,2,4,1,4)
  Assumption
  EcoSpold01Location=RER
  Uncertainty: Assumption
- polyurethane, flexible foam: 1.96134e-7 kg; lognormal variance with pedigree 0.0267, pedigree (2,2,4,1,3)
  Estimation: saddle once replaced, Scooter: no replacement
  EcoSpold01Location=RER
  Uncertainty: Estimation: saddle once replaced, Scooter: no replacement
- synthetic rubber: 0.00218734 kg; lognormal variance with pedigree 0.0267, pedigree (2,2,4,1,3)
  EcoSpold01Location=RER
  Estimation: 3.75 (bike)/3 (scooter) tyre-sets use in life-time
  Uncertainty: Estimation: 3.75 (bike)/3 (scooter) tyre-sets use in life-time
- injection moulding: 0.000111061 kg; lognormal variance with pedigree 0.0961, pedigree (4,2,4,1,4)
  EcoSpold01Location=RER
  Assumption
  Uncertainty: Assumption
- lead: 6.6094e-5 kg; lognormal variance with pedigree 0.0341, pedigree (4,2,4,1,3)
  Estimation: 2 batteries per 50000km
  EcoSpold01Location=RER
  Uncertainty: Estimation: 2 batteries per 50000km
- used Ni-metal hydride battery: -3.44509e-5 kg; lognormal variance with pedigree 0.0267, pedigree (2,2,4,1,3)
  EcoSpold01Location=GLO
  Amount of S-Pb batteries replaced
  Uncertainty: Amount of S-Pb batteries replaced
  production volume 0.341561 kg
- alkyd paint, white, without solvent, in 60% solution state: 1.69258e-6 kg; lognormal variance with pedigree 0.1287, pedigree (4,3,5,3,4)
  EcoSpold01Location=RER
  Uncertainty: weight ratio scooter:passenger car
- palladium: 1.63351e-10 kg; lognormal variance with pedigree 0.1287, pedigree (4,3,5,3,4)
  EcoSpold01Location=RER
  Uncertainty: weight ratio scooter:passenger car
- aluminium, cast alloy: 3.90597e-5 kg; lognormal variance with pedigree 0.1287, pedigree (4,3,5,3,4)
  15 kg aluminium, production mix.
  0.32: part of aluminium cast alloy in aluminium, production mix. Based on the aluminium, production mix in ecoinvent v2.2.
  Uncertainty: 15 kg
- chromium: 1.30679e-6 kg; lognormal variance with pedigree 0.1287, pedigree (4,3,5,3,4)
  EcoSpold01Location=RER
  Uncertainty: weight ratio scooter:passenger car
- polyvinylchloride, suspension polymerised: 1.70366e-5 kg; lognormal variance with pedigree 0.0446, pedigree (4,3,4,1,3)
  EcoSpold01Location=RER
  Uncertainty: 15% of passenger car
- tap water: 0.000876645 kg; lognormal variance with pedigree 0.1287, pedigree (4,3,5,3,4)
  EcoSpold01Location=RER
  Uncertainty: weight ratio scooter:passenger car
- platinum: 8.71193e-10 kg; lognormal variance with pedigree 0.1287, pedigree (4,3,5,3,4)
  EcoSpold01Location=RER
  Uncertainty: weight ratio scooter:passenger car
- road vehicle factory: 7.9226e-14 unit; lognormal variance with pedigree 0.4287, pedigree (4,3,5,3,4)
  activityLink introduced to establish a direct link to the corresponding regional supply of this product
  Uncertainty: weight ratio scooter:passenger car
- used motor scooter: -8.13743e-6 unit; lognormal variance with pedigree 0.3086, pedigree (2,1,4,1,1)
  Uncertainty: Estimation: Scooter 50'000km
  production volume 1.32237 unit
- wire drawing, copper: 2.7498e-6 kg; lognormal variance with pedigree 0.1287, pedigree (4,3,5,3,4)
  (same comment as for road vehicle factory)
- heat, district or industrial, natural gas: 0.00043253 MJ; lognormal variance with pedigree 0.0346, pedigree (4,3,4,1,3)
  EcoSpold01Location=RER
  Uncertainty: 50% of Environmental report Honda, 2008
- section bar rolling, steel: 5.52694e-5 kg; lognormal variance with pedigree 0.1287, pedigree (4,3,5,3,4)
  (same comment as for road vehicle factory)
- polyvinylchloride, emulsion polymerised: 2.49318e-6 kg; lognormal variance with pedigree 0.0446, pedigree (4,3,4,1,3)
  EcoSpold01Location=RER
  Uncertainty: 15% of passenger car
- nickel, 99.5%: 7.62314e-7 kg; lognormal variance with pedigree 0.1287, pedigree (4,3,5,3,4)
  EcoSpold01Location=GLO
  Uncertainty: weight ratio scooter:passenger car
- electricity, medium voltage: 7.91722e-5 kWh; lognormal variance with pedigree 0.0346, pedigree (4,3,4,1,3)
  EcoSpold01Location=JP
  Uncertainty: 50% of Environmental report Honda, 2008
- zinc: 3.2072e-6 kg; lognormal variance with pedigree 0.1287, pedigree (4,3,5,3,4)
  EcoSpold01Location=RER
  Uncertainty: weight ratio scooter:passenger car
- polypropylene, granulate: 5.98101e-5 kg; lognormal variance with pedigree 0.0446, pedigree (4,3,4,1,3)
  EcoSpold01Location=RER
  Uncertainty: 15% of passenger car
- heat, district or industrial, other than natural gas: 1.55384e-5 MJ; lognormal variance with pedigree 0.0346, pedigree (4,3,4,1,3)
  EcoSpold01Location=RER
  Uncertainty: 50% of Environmental report Honda, 2008
- ethylene, average: 5.03666e-6 kg; lognormal variance with pedigree 0.1287, pedigree (4,3,5,3,4)
  EcoSpold01Location=RER
  Uncertainty: weight ratio scooter:passenger car
- sheet rolling, steel: 0.000110059 kg; lognormal variance with pedigree 0.0446, pedigree (4,3,4,1,3)
  activityLink introduced to establish a direct link to the corresponding regional supply of this product
  Uncertainty: 5% of passenger car
- wire drawing, copper: 2.7498e-6 kg; lognormal variance with pedigree 0.1306, pedigree (4,3,5,5,4)
  EcoSpold01Location=RER
  Uncertainty: weight ratio scooter:passenger car
- section bar rolling, steel: 5.52694e-5 kg; lognormal variance with pedigree 0.1306, pedigree (4,3,5,5,4)
  EcoSpold01Location=RER
  Uncertainty: weight ratio scooter:passenger car
- injection moulding: 0.000111225 kg; lognormal variance with pedigree 0.1306, pedigree (4,3,5,5,4)
  EcoSpold01Location=RER
  Uncertainty: All HDPE
- alkyd paint, white, without solvent, in 60% solution state: 1.69258e-6 kg; lognormal variance with pedigree 0.1306, pedigree (4,3,5,5,4)
  EcoSpold01Location=RER
  Uncertainty: weight ratio scooter:passenger car
- road vehicle factory: 7.9226e-14 unit; lognormal variance with pedigree 0.4306, pedigree (4,3,5,5,4)
  EcoSpold01Location=RER
  Uncertainty: weight ratio scooter:passenger car
- heat, district or industrial, natural gas: 7.8401e-6 MJ; lognormal variance with pedigree 0.0366, pedigree (4,3,4,5,3)
  EcoSpold01Location=RER
  Uncertainty: 50% of Environmental report Honda, 2008
- heat, district or industrial, other than natural gas: 6.96281e-9, 1.55315e-5 MJ (2 entries); lognormal variance with pedigree 0.0366, pedigree (4,3,4,5,3)
  EcoSpold01Location=RER
  Uncertainty: 50% of Environmental report Honda, 2008
- tap water: 2.52408e-6, 2.09688e-5, 4.17145e-6, 0.000105188, 2.73643e-6, 7.78372e-6, 0.00120371 kg (7 entries); lognormal variance with pedigree 0.1306, pedigree (4,3,5,5,4)
  EcoSpold01Location=RER
  Uncertainty: weight ratio scooter:passenger car
- electricity, medium voltage: 2.48789e-7, 4.21909e-6, 4.28932e-5, 8.75493e-6 kWh (4 entries); lognormal variance with pedigree 0.0366, pedigree (4,3,4,5,3)
  EcoSpold01Location=JP
  Uncertainty: 50% of Environmental report Honda, 2008
- ethylene, average: 7.95358e-8, 4.95712e-6 kg (2 entries); lognormal variance with pedigree 0.1306, pedigree (4,3,5,5,4)
  EcoSpold01Location=RER
  Uncertainty: weight ratio scooter:passenger car
- decommissioned road: -2.62415e-6 m*year; lognormal variance with pedigree 0.428, pedigree (4,1,5,1,4)
  Allocation of road use according to gross ton kilometre performance
  EcoSpold01Location=RER
  Uncertainty: allocation of road use according to gross ton kilometre performance
  production volume 1.781e-6 m*year
- road: 1.31208e-6 m*year; lognormal variance with pedigree 0.428, pedigree (4,1,5,1,4)
  Allocation of road use according to gross ton kilometre performance
  EcoSpold01Location=CH
  Uncertainty: allocation of road use according to gross ton kilometre performance
- used electric bicycle: -3.30714e-6 unit; lognormal variance with pedigree 0.3086, pedigree (2,1,4,1,1)
  Estimation: eBike 15'000km
  EcoSpold01Location=CH
  Uncertainty: Estimation: eBike 15'000km
  production volume 2.24454e-6 unit
- energy use and operation emissions, electric bicycle, label-certified electricity: 0.0124166 km; lognormal variance with pedigree 0.128, pedigree (1,1,4,1,1)
  EcoSpold01Location=CH
  Defined by laws and physics;activityLink introduced to establish a direct link to the corresponding regional supply of this product
  Uncertainty: defined by laws and physics
- maintenance, electric bicycle: 1.65357e-6 unit; lognormal variance with pedigree 0.3086, pedigree (2,1,4,1,1)
  Estimation: eBike 15'000km
  EcoSpold01Location=CH
  Uncertainty: Estimation: eBike 15'000km
- electric bicycle: 3.30714e-6 unit; lognormal variance with pedigree 0.3086, pedigree (2,1,4,1,1)
  Estimation: eBike 15'000km
  EcoSpold01Location=RER
  Uncertainty: Estimation: eBike 15'000km
- energy use and operation emissions, electric bicycle: 0.0123868 km; lognormal variance with pedigree 0.128, pedigree (1,1,4,1,1)
  Defined by laws and physics;activityLink introduced to establish a direct link to the corresponding regional supply of this product
  EcoSpold01Location=CH
  Uncertainty: defined by laws and physics
- energy use and operation emissions, electric bicycle, label-certified electricity: 0.0124166 km; lognormal variance with pedigree 0.13, pedigree (1,1,4,5,1)
  EcoSpold01Location=CH
  Defined by laws and physics
  Uncertainty: defined by laws and physics
- maintenance, electric bicycle: 1.65357e-6 unit; lognormal variance with pedigree 0.3106, pedigree (2,1,4,5,1)
  EcoSpold01Location=CH
  Estimation: eBike 15'000km
  Uncertainty: Estimation: eBike 15'000km
- road: 1.31208e-6 m*year; lognormal variance with pedigree 0.43, pedigree (4,1,5,5,4)
  EcoSpold01Location=CH
  Allocation of road use according to gross ton kilometre performance
  Uncertainty: allocation of road use according to gross ton kilometre performance
- energy use and operation emissions, electric bicycle: 0.0123868 km; lognormal variance with pedigree 0.13, pedigree (1,1,4,5,1)
  Defined by laws and physics
  EcoSpold01Location=CH
  Uncertainty: defined by laws and physics
- nitrogen, liquid: 1.9491e-6 kg; lognormal variance with pedigree 0.04, pedigree (4,4,4,5,1)
  EcoSpold01Location=RER
- electricity, medium voltage: 1.71602e-6 kWh; lognormal variance with pedigree 0.05, pedigree (1,1,4,5,1)
  composite
  EcoSpold01Location=CN
- section bar extrusion, aluminium: 3.65752e-5 kg; lognormal variance with pedigree 0.0981, pedigree (4,2,4,5,4)
  Assumption for pipe drawing
  EcoSpold01Location=RER
  Uncertainty: Assumption for pipe drawing
- chromium steel removed by turning, average, conventional: 2.55736e-5 kg; lognormal variance with pedigree 0.0981, pedigree (4,2,4,5,4)
  Assumption
  EcoSpold01Location=RER
  Uncertainty: Assumption
- polyurethane, flexible foam: 1.96242e-7 kg; lognormal variance with pedigree 0.0287, pedigree (2,2,4,5,3)
  EcoSpold01Location=RER
  Estimation: saddle once replaced, Scooter: no replacement
  Uncertainty: Estimation: saddle once replaced, Scooter: no replacement
- waste plastic, mixture: -4.66051e-6 kg; lognormal variance with pedigree 0.0361, pedigree (4,2,4,5,3)
  EcoSpold01Location=CH
  Plastics to municipal incineration
  Uncertainty: plastics to municipal incineration
  production volume 3.0264 kg
- tap water: 0.000313247 kg; lognormal variance with pedigree 0.0112, pedigree (2,3,4,5,1)
  (same comment as for tap water)

## Inputs from nature
- Water, river [natural resource, in water]: 3.23992e-7 m3; name water_river_input; source Althaus H.-J. 2004; lognormal variance with pedigree 0.098, pedigree (4,5,5,5,4)
  Literature value.
  property water in wet mass 999.89 kg; name WWM
  property water content 9081.65; name water_content
  property carbon content, non-fossil 0; name C_content_non_fossil
  property wet mass 1000 kg; name WM
  property carbon content, fossil 0.0104329; name C_content_fossil
  property dry mass 0.1101 kg; name DM
- Water, unspecified natural origin [natural resource, in water]: 0.000178123 m3; lognormal variance with pedigree 0.0521, pedigree (1,4,5,3,1)
  Data of 1 European plant - reported in Fisher (2006)
  Uncertainty: data of 1 European plant - reported in Fisher (2006)
- Dolomite, in ground [natural resource, in ground]: 8.90977e-9 kg; lognormal variance with pedigree 0.0032, pedigree (1,3,3,1,1)
  Amount and activity link based on primary data collected from participating companies.
- Water, lake [natural resource, in water]: 2.86931e-6 m3; lognormal variance with pedigree 0.0032, pedigree (1,3,3,1,1)
  Amount and activity link based on primary data collected from participating companies.
- Sulfur, in ground [natural resource, in ground]: 2.76354e-5 kg; lognormal variance with pedigree 0.0032, pedigree (1,3,3,1,1)
  Amount and activity link based on primary data collected from participating companies.
- Water, cooling, unspecified natural origin [natural resource, in water]: 1.62128e-5 m3; lognormal variance with pedigree 0.0032, pedigree (1,3,3,1,1)
  Amount and activity link based on primary data collected from participating companies.
- Strontium, in ground [natural resource, in ground]: 1.13142e-7 kg; lognormal variance with pedigree 0.0032, pedigree (1,3,3,1,1)
  Amount and activity link based on primary data collected from participating companies.
- Copper, in ground [natural resource, in ground]: 6.49614e-5 kg; lognormal variance with pedigree 0.0032, pedigree (1,3,3,1,1)
  Amount and activity link based on primary data collected from participating companies.
- Aluminium, in ground [natural resource, in ground]: 8.39334e-6 kg; lognormal variance with pedigree 0.0032, pedigree (1,3,3,1,1)
  Amount and activity link based on primary data collected from participating companies.
- Gangue, in ground [natural resource, in ground]: 0.0785769 kg; lognormal variance with pedigree 0.0032, pedigree (1,3,3,1,1)
  Amount and activity link based on primary data collected from participating companies.
- Gold, in ground [natural resource, in ground]: 5.40342e-6 kg; lognormal variance with pedigree 0.0032, pedigree (1,3,3,1,1)
  Amount and activity link based on primary data collected from participating companies.
- Vanadium, in ground [natural resource, in ground]: 1.07364e-8 kg; lognormal variance with pedigree 0.0032, pedigree (1,3,3,1,1)
  Amount and activity link based on primary data collected from participating companies.
- Zinc, in ground [natural resource, in ground]: 0.00234861 kg; lognormal variance with pedigree 0.0032, pedigree (1,3,3,1,1)
  Amount and activity link based on primary data collected from participating companies.
- Titanium, in ground [natural resource, in ground]: 3.96398e-7 kg; lognormal variance with pedigree 0.0032, pedigree (1,3,3,1,1)
  Amount and activity link based on primary data collected from participating companies.
- Sodium, in ground [natural resource, in ground]: 3.20969e-7 kg; lognormal variance with pedigree 0.0032, pedigree (1,3,3,1,1)
  Amount and activity link based on primary data collected from participating companies.
- Nickel, in ground [natural resource, in ground]: 6.32307e-9 kg; lognormal variance with pedigree 0.0032, pedigree (1,3,3,1,1)
  Amount and activity link based on primary data collected from participating companies.
- Silver, in ground [natural resource, in ground]: 8.57687e-7 kg; lognormal variance with pedigree 0.0032, pedigree (1,3,3,1,1)
  Amount and activity link based on primary data collected from participating companies.
- Potassium, in ground [natural resource, in ground]: 1.05117e-5 kg; lognormal variance with pedigree 0.0032, pedigree (1,3,3,1,1)
  Amount and activity link based on primary data collected from participating companies.
- Manganese, in ground [natural resource, in ground]: 6.07159e-7 kg; lognormal variance with pedigree 0.0032, pedigree (1,3,3,1,1)
  Amount and activity link based on primary data collected from participating companies.
- Magnesium, in ground [natural resource, in ground]: 0.000166743 kg; lognormal variance with pedigree 0.0032, pedigree (1,3,3,1,1)
  Amount and activity link based on primary data collected from participating companies.
- Phosphorus, in ground [natural resource, in ground]: 7.17368e-8 kg; lognormal variance with pedigree 0.0032, pedigree (1,3,3,1,1)
  Amount and activity link based on primary data collected from participating companies.
- Iron, in ground [natural resource, in ground]: 1.05278e-5 kg; lognormal variance with pedigree 0.0032, pedigree (1,3,3,1,1)
  Amount and activity link based on primary data collected from participating companies.
- Mercury, in ground [natural resource, in ground]: 8.55382e-11 kg; lognormal variance with pedigree 0.0032, pedigree (1,3,3,1,1)
  Amount and activity link based on primary data collected from participating companies.
- Lead, in ground [natural resource, in ground]: 0.000502165 kg; lognormal variance with pedigree 0.0032, pedigree (1,3,3,1,1)
  Amount and activity link based on primary data collected from participating companies.
- Sand, unspecified, in ground [natural resource, in ground]: 4.22001e-7 kg; lognormal variance with pedigree 0.0032, pedigree (1,3,3,1,1)
  Amount and activity link based on primary data collected from participating companies.
- Cadmium, in ground [natural resource, in ground]: 2.76033e-7 kg; lognormal variance with pedigree 0.0032, pedigree (1,3,3,1,1)
  Amount and activity link based on primary data collected from participating companies.
- Calcium, in ground [natural resource, in ground]: 0.000291697 kg; lognormal variance with pedigree 0.0032, pedigree (1,3,3,1,1)
  Amount and activity link based on primary data collected from participating companies.
- Barium, in ground [natural resource, in ground]: 4.46149e-8 kg; lognormal variance with pedigree 0.0032, pedigree (1,3,3,1,1)
  Amount and activity link based on primary data collected from participating companies.
- Water, well, in ground [natural resource, in water]: 7.84703e-6 m3; lognormal variance with pedigree 0.0032, pedigree (1,3,3,1,1)
  Amount and activity link based on primary data collected from participating companies.
- Chromium, in ground [natural resource, in ground]: 1.03673e-8 kg; lognormal variance with pedigree 0.0032, pedigree (1,3,3,1,1)
  Amount and activity link based on primary data collected from participating companies.

## Emissions to nature
- Water [air, unspecified]: 3.44861e-5 m3; name water_to_air_unspecified; = water_river_input*fraction_PW_to_air; lognormal variance with pedigree 0.130025, pedigree (4,4,5,2,4)
  Calculated value based on literature values and expert opinion. See comments in the parametres' comment field.
  property fraction, origin: unspecified 0; name fraction_origin_unspecified
  property fraction, origin: fresh water 1; name fraction_origin_fresh_water
  property fraction, origin: salt water 0; name fraction_origin_salt_water
- Water [water, unspecified]: 0.000195421 m3; name water_to_water_unspecified; = water_river_input*(1-fraction_PW_to_air); lognormal variance with pedigree 0.130025, pedigree (4,4,5,2,4)
  (same comment as for Water)
  property fraction, origin: salt water 0; name fraction_origin_salt_water_Ww
  property fraction, origin: unspecified 0; name fraction_origin_unspecified_Ww
  property fraction, origin: fresh water 1; name fraction_origin_fresh_water_Ww
- Fluoride [water, surface water]: 7.36984e-9 kg; lognormal variance with pedigree 0.7021, pedigree (1,4,5,3,1)
  (same comment as for Water, unspecified natural origin)
- Nickel, ion [water, surface water]: 1.07713e-9 kg; lognormal variance with pedigree 0.7021, pedigree (1,4,5,3,1)
  (same comment as for Water, unspecified natural origin)
- DOC, Dissolved Organic Carbon [water, surface water]: 3.96743e-8 kg; lognormal variance with pedigree 0.0921, pedigree (1,4,5,3,1)
  Calculated as equal to TOC.
  Uncertainty: data of 1 European plant - reported in Fisher (2006)
- TOC, Total Organic Carbon [water, surface water]: 3.96743e-8 kg; lognormal variance with pedigree 0.0921, pedigree (1,4,5,3,1)
  Calculated by default as TOC (gC) = COD/2.7 (COD measured in g O2). Should more correctly be calculated from the carbon content of the specified emissions to water.
  Uncertainty: data of 1 European plant - reported in Fisher (2006)
- BOD5, Biological Oxygen Demand [water, surface water]: 1.85085e-8 kg; lognormal variance with pedigree 0.0921, pedigree (1,4,5,3,1)
  Calculated as 0.5*COD.
  Uncertainty: data of 1 European plant - reported in Fisher (2006)
- Suspended solids, unspecified [water, surface water]: 9.66871e-7 kg; lognormal variance with pedigree 0.0921, pedigree (1,4,5,3,1)
  (same comment as for Water, unspecified natural origin)
- COD, Chemical Oxygen Demand [water, surface water]: 1.33395e-7 kg; lognormal variance with pedigree 0.0921, pedigree (1,4,5,3,1)
  (same comment as for Water, unspecified natural origin)
- Copper, ion [water, surface water]: 3.56136e-8 kg; lognormal variance with pedigree 0.7021, pedigree (1,4,5,3,1)
  (same comment as for Water, unspecified natural origin)
- Lead [soil, industrial]: 7.91349e-11 kg; lognormal variance with pedigree 0.0426, pedigree (1,3,3,1,1)
  Amount and activity link based on primary data collected from participating companies.
- Sulfur dioxide [air, unspecified]: 3.16136e-7 kg; lognormal variance with pedigree 0.0032, pedigree (1,3,3,1,1)
  Amount and activity link based on primary data collected from participating companies.
- Ammonia [air, unspecified]: 4.96358e-9 kg; lognormal variance with pedigree 0.0426, pedigree (1,3,3,1,1)
  Amount and activity link based on primary data collected from participating companies.
- Hydrogen chloride [air, unspecified]: 8.08878e-10 kg; lognormal variance with pedigree 0.0426, pedigree (1,3,3,1,1)
  Amount and activity link based on primary data collected from participating companies.
- Suspended solids, unspecified [water, ocean]: 5.65728e-7 kg; lognormal variance with pedigree 0.0426, pedigree (1,3,3,1,1)
  Amount and activity link based on primary data collected from participating companies.
- Ammonium, ion [water, surface water]: 1.25505e-8 kg; lognormal variance with pedigree 0.0426, pedigree (1,3,3,1,1)
  Amount and activity link based on primary data collected from participating companies.
- Hydrocarbons, unspecified [soil, unspecified]: 2.58014e-9 kg; lognormal variance with pedigree 0.0426, pedigree (1,3,3,1,1)
  Amount and activity link based on primary data collected from participating companies.
- Selenium [air, unspecified]: 1.25182e-10 kg; lognormal variance with pedigree 0.6526, pedigree (1,3,3,1,1)
  Amount and activity link based on primary data collected from participating companies.
- Antimony [water, surface water]: 3.44242e-10 kg; lognormal variance with pedigree 0.6526, pedigree (1,3,3,1,1)
  Amount and activity link based on primary data collected from participating companies.
- Fluoride [soil, industrial]: 5.18548e-9 kg; lognormal variance with pedigree 0.0426, pedigree (1,3,3,1,1)
  Amount and activity link based on primary data collected from participating companies.
- Sodium [soil, industrial]: 3.24654e-12 kg; lognormal variance with pedigree 0.0426, pedigree (1,3,3,1,1)
  Amount and activity link based on primary data collected from participating companies.
- Benzene [air, unspecified]: 4.04441e-9 kg; lognormal variance with pedigree 0.0426, pedigree (1,3,3,1,1)
  Amount and activity link based on primary data collected from participating companies.
- Lead [air, unspecified]: 2.29997e-7 kg; lognormal variance with pedigree 0.6526, pedigree (1,3,3,1,1)
  Amount and activity link based on primary data collected from participating companies.
- Sulfate [soil, unspecified]: 5.52846e-11 kg; lognormal variance with pedigree 0.0426, pedigree (1,3,3,1,1)
  Amount and activity link based on primary data collected from participating companies.
- Aluminium [water, surface water]: 1.99316e-10 kg; lognormal variance with pedigree 0.6526, pedigree (1,3,3,1,1)
  Amount and activity link based on primary data collected from participating companies.
- Fluorine [air, unspecified]: 9.30688e-9 kg; lognormal variance with pedigree 0.0426, pedigree (1,3,3,1,1)
  Amount and activity link based on primary data collected from participating companies.
- Zinc [soil, industrial]: 2.27117e-8 kg; lognormal variance with pedigree 0.0426, pedigree (1,3,3,1,1)
  Amount and activity link based on primary data collected from participating companies.
- Sulfate [water, surface water]: 1.64489e-5 kg; lognormal variance with pedigree 0.0426, pedigree (1,3,3,1,1)
  Amount and activity link based on primary data collected from participating companies.
- Arsenic, ion [water, ocean]: 5.95337e-13 kg; lognormal variance with pedigree 0.6526, pedigree (1,3,3,1,1)
  Amount and activity link based on primary data collected from participating companies.
- Dissolved solids [water, surface water]: 1.78745e-5 kg; lognormal variance with pedigree 0.0426, pedigree (1,3,3,1,1)
  Amount and activity link based on primary data collected from participating companies.
- Zinc, ion [water, ocean]: 2.09016e-8 kg; lognormal variance with pedigree 0.6526, pedigree (1,3,3,1,1)
  Amount and activity link based on primary data collected from participating companies.
- Selenium [water, surface water]: 1.44321e-11 kg; lognormal variance with pedigree 0.6526, pedigree (1,3,3,1,1)
  Amount and activity link based on primary data collected from participating companies.
- Antimony [air, unspecified]: 1.43841e-9 kg; lognormal variance with pedigree 0.6526, pedigree (1,3,3,1,1)
  Amount and activity link based on primary data collected from participating companies.
- Fluoride [water, ocean]: 3.64807e-10 kg; lognormal variance with pedigree 0.0426, pedigree (1,3,3,1,1)
  Amount and activity link based on primary data collected from participating companies.
- Particulates, < 2.5 um [air, unspecified]: 5.14997e-8 kg; lognormal variance with pedigree 0.3026, pedigree (1,3,3,1,1)
  Amount and activity link based on primary data collected from participating companies.
- Particulates, > 2.5 um, and < 10um [air, unspecified]: 1.15328e-6 kg; lognormal variance with pedigree 0.1226, pedigree (1,3,3,1,1)
  Amount and activity link based on primary data collected from participating companies.
- Aldehydes, unspecified [air, unspecified]: 2.3175e-10 kg; lognormal variance with pedigree 0.0426, pedigree (1,3,3,1,1)
  Amount and activity link based on primary data collected from participating companies.
- Formaldehyde [air, unspecified]: 1.74645e-8 kg; lognormal variance with pedigree 0.0426, pedigree (1,3,3,1,1)
  Amount and activity link based on primary data collected from participating companies.
- Zinc, ion [water, surface water]: 1.6793e-6 kg; lognormal variance with pedigree 0.6526, pedigree (1,3,3,1,1)
  Amount and activity link based on primary data collected from participating companies.
- Phosphorus [water, surface water]: 5.07975e-9 kg; lognormal variance with pedigree 0.0426, pedigree (1,3,3,1,1)
  Amount and activity link based on primary data collected from participating companies.
- Sodium, ion [water, surface water]: 5.19149e-7 kg; lognormal variance with pedigree 0.0426, pedigree (1,3,3,1,1)
  Amount and activity link based on primary data collected from participating companies.
- Dioxins, measured as 2,3,7,8-tetrachlorodibenzo-p-dioxin [air, unspecified]: 0 kg; pedigree (1,1,1,1,1)
  Amount and activity link based on primary data collected from participating companies.
- Potassium, ion [water, surface water]: 2.14212e-7 kg; lognormal variance with pedigree 0.0426, pedigree (1,3,3,1,1)
  Amount and activity link based on primary data collected from participating companies.
- Cyanide [water, surface water]: 1.56201e-10 kg; lognormal variance with pedigree 0.0426, pedigree (1,3,3,1,1)
  Amount and activity link based on primary data collected from participating companies.
- Particulates, > 10 um [air, unspecified]: 4.20462e-6 kg; lognormal variance with pedigree 0.0426, pedigree (1,3,3,1,1)
  Amount and activity link based on primary data collected from participating companies.
- COD, Chemical Oxygen Demand [water, ocean]: 2.9738e-11 kg; source Weidema B P 2013; lognormal variance with pedigree 0.25, pedigree (5,5,5,5,5)
  Calculated value. The amount of COD is assumed to be five times that of BOD5, based on the estimates provided in section 5.9.7 of Weidema et al. (2013).
- Copper, ion [water, ocean]: 4.39007e-13 kg; lognormal variance with pedigree 0.6526, pedigree (1,3,3,1,1)
  Amount and activity link based on primary data collected from participating companies.
- Nitrogen oxides [air, unspecified]: 5.00317e-6 kg; lognormal variance with pedigree 0.0426, pedigree (1,3,3,1,1)
  Amount and activity link based on primary data collected from participating companies.
- Cobalt [air, unspecified]: 3.08578e-9 kg; lognormal variance with pedigree 0.6526, pedigree (1,3,3,1,1)
  Amount and activity link based on primary data collected from participating companies.
- Nitrogen, organic bound [water, surface water]: 8.01879e-8 kg; lognormal variance with pedigree 0.0426, pedigree (1,3,3,1,1)
  Amount and activity link based on primary data collected from participating companies.
- DOC, Dissolved Organic Carbon [water, ocean]: 1.10141e-11 kg; lognormal variance with pedigree 0.25, pedigree (5,5,5,5,5)
  Calculated value. The amount of DOC is assumed to be equal to the amount of TOC
- Chromium VI [water, surface water]: 4.44638e-7 kg; lognormal variance with pedigree 0.6526, pedigree (1,3,3,1,1)
  Amount and activity link based on primary data collected from participating companies.
- Nitrogen [water, surface water]: 4.03709e-8 kg; lognormal variance with pedigree 0.0426, pedigree (1,3,3,1,1)
  Amount and activity link based on primary data collected from participating companies.
- TOC, Total Organic Carbon [water, ocean]: 1.10141e-11 kg; source Weidema B P 2013; lognormal variance with pedigree 0.25, pedigree (5,5,5,5,5)
  Calculated value. The relation between COD and TOC is assumed to be COD (g O2) = 2.7*TOC (g C), based on the estimates provided in section 5.9.7 of Weidema et al. (2013).
- Chromium [soil, industrial]: 1.45796e-13 kg; lognormal variance with pedigree 0.0426, pedigree (1,3,3,1,1)
  Amount and activity link based on primary data collected from participating companies.
- Nitric acid [soil, industrial]: 1.73002e-10 kg; lognormal variance with pedigree 0.0426, pedigree (1,3,3,1,1)
  Amount and activity link based on primary data collected from participating companies.
- NMVOC, non-methane volatile organic compounds, unspecified origin [air, unspecified]: 2.84479e-6 kg; lognormal variance with pedigree 0.0426, pedigree (1,3,3,1,1)
  Amount and activity link based on primary data collected from participating companies.
- Copper [soil, industrial]: 8.79245e-9 kg; lognormal variance with pedigree 0.0426, pedigree (1,3,3,1,1)
  Amount and activity link based on primary data collected from participating companies.
- PAH, polycyclic aromatic hydrocarbons [air, unspecified]: 3.62652e-12 kg; lognormal variance with pedigree 0.3026, pedigree (1,3,3,1,1)
  Amount and activity link based on primary data collected from participating companies.
- Chromium VI [air, unspecified]: 3.56391e-11 kg; lognormal variance with pedigree 0.6526, pedigree (1,3,3,1,1)
  Amount and activity link based on primary data collected from participating companies.
- Nickel [soil, industrial]: 3.3922e-11 kg; lognormal variance with pedigree 0.0426, pedigree (1,3,3,1,1)
  Amount and activity link based on primary data collected from participating companies.
- Chromium [air, unspecified]: 4.32902e-10 kg; lognormal variance with pedigree 0.6526, pedigree (1,3,3,1,1)
  Amount and activity link based on primary data collected from participating companies.
- Nitrogen [soil, industrial]: 6.57705e-9 kg; lognormal variance with pedigree 0.0426, pedigree (1,3,3,1,1)
  Amount and activity link based on primary data collected from participating companies.
- Copper [air, unspecified]: 2.43906e-7 kg; lognormal variance with pedigree 0.6526, pedigree (1,3,3,1,1)
  Amount and activity link based on primary data collected from participating companies.
- Nickel [air, unspecified]: 2.4407e-9 kg; lognormal variance with pedigree 0.6526, pedigree (1,3,3,1,1)
  Amount and activity link based on primary data collected from participating companies.
- Ammonia [soil, industrial]: 2.13881e-9 kg; lognormal variance with pedigree 0.0426, pedigree (1,3,3,1,1)
  Amount and activity link based on primary data collected from participating companies.
- Carbon dioxide, non-fossil [air, unspecified]: 6.83875e-6 kg; lognormal variance with pedigree 0.0032, pedigree (1,3,3,1,1)
  Amount and activity link based on primary data collected from participating companies.
- Nitrate [water, surface water]: 5.07141e-7 kg; lognormal variance with pedigree 0.0426, pedigree (1,3,3,1,1)
  Amount and activity link based on primary data collected from participating companies.
- Chlorine [water, surface water]: 2.56972e-7 kg; lognormal variance with pedigree 0.0426, pedigree (1,3,3,1,1)
  Amount and activity link based on primary data collected from participating companies.
- Nickel, ion [water, ocean]: 3.13462e-13 kg; lognormal variance with pedigree 0.6526, pedigree (1,3,3,1,1)
  Amount and activity link based on primary data collected from participating companies.
- Carbon monoxide, fossil [air, unspecified]: 9.28635e-7 kg; lognormal variance with pedigree 0.6526, pedigree (1,3,3,1,1)
  Amount and activity link based on primary data collected from participating companies.
- Methane, fossil [air, unspecified]: 2.69911e-8 kg; lognormal variance with pedigree 0.0426, pedigree (1,3,3,1,1)
  Amount and activity link based on primary data collected from participating companies.
- Calcium, ion [water, surface water]: 5.76972e-6 kg; lognormal variance with pedigree 0.0426, pedigree (1,3,3,1,1)
  Amount and activity link based on primary data collected from participating companies.
- Methanol [air, unspecified]: 1.05076e-7 kg; lognormal variance with pedigree 0.0426, pedigree (1,3,3,1,1)
  Amount and activity link based on primary data collected from participating companies.
- Chloride [water, surface water]: 8.01879e-8 kg; lognormal variance with pedigree 0.0426, pedigree (1,3,3,1,1)
  Amount and activity link based on primary data collected from participating companies.
- Mercury [air, unspecified]: 1.36057e-10 kg; lognormal variance with pedigree 0.6526, pedigree (1,3,3,1,1)
  Amount and activity link based on primary data collected from participating companies.
- Mercury [water, surface water]: 5.5504e-10 kg; lognormal variance with pedigree 0.6526, pedigree (1,3,3,1,1)
  Amount and activity link based on primary data collected from participating companies.
- Calcium [soil, industrial]: 9.75491e-11 kg; lognormal variance with pedigree 0.0426, pedigree (1,3,3,1,1)
  Amount and activity link based on primary data collected from participating companies.
- Mercury [soil, industrial]: 1.37697e-12 kg; lognormal variance with pedigree 0.0426, pedigree (1,3,3,1,1)
  Amount and activity link based on primary data collected from participating companies.
- Cadmium, ion [water, surface water]: 8.52444e-9 kg; lognormal variance with pedigree 0.6526, pedigree (1,3,3,1,1)
  Amount and activity link based on primary data collected from participating companies.
- Magnesium [water, surface water]: 3.98937e-7 kg; lognormal variance with pedigree 0.0426, pedigree (1,3,3,1,1)
  Amount and activity link based on primary data collected from participating companies.
- Beryllium [air, unspecified]: 9.53143e-11 kg; lognormal variance with pedigree 0.0426, pedigree (1,3,3,1,1)
  Amount and activity link based on primary data collected from participating companies.
- Manganese [soil, industrial]: 4.90767e-9 kg; lognormal variance with pedigree 0.0426, pedigree (1,3,3,1,1)
  Amount and activity link based on primary data collected from participating companies.
- Cadmium [air, unspecified]: 2.38348e-9 kg; lognormal variance with pedigree 0.6526, pedigree (1,3,3,1,1)
  Amount and activity link based on primary data collected from participating companies.
- Manganese [water, ocean]: 3.9365e-11 kg; lognormal variance with pedigree 0.6526, pedigree (1,3,3,1,1)
  Amount and activity link based on primary data collected from participating companies.
- BOD5, Biological Oxygen Demand [water, ocean]: 5.94759e-12 kg; lognormal variance with pedigree 0.0426, pedigree (1,3,3,1,1)
  Amount and activity link based on primary data collected from participating companies.
- Mercury [water, ocean]: 3.5028e-14 kg; lognormal variance with pedigree 0.6526, pedigree (1,3,3,1,1)
  Amount and activity link based on primary data collected from participating companies.
- Carbon dioxide, fossil [air, unspecified]: 0.00046979 kg; lognormal variance with pedigree 0.0032, pedigree (1,3,3,1,1)
  Amount and activity link based on primary data collected from participating companies. Accounts for on-site combustion of diesel at mine. Some companies provided emissions on the combustion of natural gas, diesel, propane, or other fuels, which are included here. If no emissions were provided for these other fuels then input is reflected as a an input of heat instead of a direct fuel input.
- Lead [water, surface water]: 1.1406e-8 kg; lognormal variance with pedigree 0.6526, pedigree (1,3,3,1,1)
  Amount and activity link based on primary data collected from participating companies.
- Cadmium [soil, industrial]: 3.39624e-11 kg; lognormal variance with pedigree 0.0426, pedigree (1,3,3,1,1)
  Amount and activity link based on primary data collected from participating companies.
- Manganese [air, unspecified]: 1.65722e-8 kg; lognormal variance with pedigree 0.6526, pedigree (1,3,3,1,1)
  Amount and activity link based on primary data collected from participating companies.
- Water [water, surface water]: 6.4054e-7 m3; lognormal variance with pedigree 0.0426, pedigree (1,3,3,1,1)
  Amount and activity link based on primary data collected from participating companies.
- Arsenic [soil, industrial]: 9.42815e-12 kg; lognormal variance with pedigree 0.0426, pedigree (1,3,3,1,1)
  Amount and activity link based on primary data collected from participating companies.
- Manganese [water, surface water]: 5.84459e-8 kg; lognormal variance with pedigree 0.6526, pedigree (1,3,3,1,1)
  Amount and activity link based on primary data collected from participating companies.
- VOC, volatile organic compounds, unspecified origin [air, unspecified]: 1.11655e-8 kg; lognormal variance with pedigree 0.0426, pedigree (1,3,3,1,1)
  Amount and activity link based on primary data collected from participating companies.
- Cadmium, ion [water, ocean]: 1.85049e-10 kg; lognormal variance with pedigree 0.6526, pedigree (1,3,3,1,1)
  Amount and activity link based on primary data collected from participating companies.
- Lead [water, ocean]: 3.78366e-9 kg; lognormal variance with pedigree 0.6526, pedigree (1,3,3,1,1)
  Amount and activity link based on primary data collected from participating companies.
- Benzo(a)pyrene [air, unspecified]: 2.59209e-13 kg; lognormal variance with pedigree 0.3026, pedigree (1,3,3,1,1)
  Amount and activity link based on primary data collected from participating companies.
- Hydrogen fluoride [air, unspecified]: 6.22066e-10 kg; lognormal variance with pedigree 0.0426, pedigree (1,3,3,1,1)
  Amount and activity link based on primary data collected from participating companies.
- Sulfur oxides [air, unspecified]: 7.61689e-9 kg; lognormal variance with pedigree 0.0426, pedigree (1,3,3,1,1)
  Amount and activity link based on primary data collected from participating companies.
- Arsenic, ion [water, surface water]: 9.83012e-8 kg; lognormal variance with pedigree 0.6526, pedigree (1,3,3,1,1)
  Amount and activity link based on primary data collected from participating companies.
- Iron, ion [water, surface water]: 4.88916e-7 kg; lognormal variance with pedigree 0.6526, pedigree (1,3,3,1,1)
  Amount and activity link based on primary data collected from participating companies.
- Zinc [air, unspecified]: 2.27585e-7 kg; lognormal variance with pedigree 0.6526, pedigree (1,3,3,1,1)
  Amount and activity link based on primary data collected from participating companies.
- Arsenic [air, unspecified]: 1.2646e-8 kg; lognormal variance with pedigree 0.6526, pedigree (1,3,3,1,1)
  Amount and activity link based on primary data collected from participating companies.
- Phosphate [water, surface water]: 5.44508e-10 kg; lognormal variance with pedigree 0.1287, pedigree (4,3,5,3,4)
  Uncertainty: weight ratio scooter:passenger car

## Extrapolations
this dataset is based on a proxy. The byproducts have been adapted to the composition of the treated product. The inputs have not been left unchanged.

## Review by Hans-Jörg Althaus 2012-05-02
This is a proxy dataset that has to be used with appropriate care

## Review by Bo Weidema 2012-05-02
Passed
Signs of exchanges were checked and corrected

## Review by Bo Weidema 2012-09-28
replaced "electricity, high voltage, hydro, run-of-river" with "electricity, high voltage" + activity link to "electricity production, hydro, run-of-river"
