# treatment of waste building wood, chrome preserved, municipal incineration with fly ash extraction

Dataset: EcoSpold 2, unit process
Geography: CH
Time period: 2006-01-01 to 2019-12-31
Technology level: current
Classification: ISIC rev.4 ecoinvent: 3821:Treatment and disposal of non-hazardous waste
Synonyms: municipal waste incineration
Scenario: Business-as-Usual
System model: Allocation at the point of substitution
Share of production covered: 1.8 %
Generated by: Gabor Doka
Published in: Doka G. 2015
Database: ecoinvent
isCopyrightProtected: true
accessRestrictedTo: 1

## General comment
This dataset represents the activity of waste disposal of waste building wood, chrome preserved in a municipal solid waste incinerator (MSWI) // Recommended use of this dataset: For disposal of bulk or small parts of chrome preserved wood (waste building product). Please note there is another, slightly different chrome preserved wood for wood poles in electricity grids. // // Waste composition (wet, in ppm): upper heating value 15.36 MJ/kg; lower heating value 13.99 MJ/kg; H2O 173800; O 371580; H 50083; C 400820; S 198; N 985.41; P 108.79; B 27.33; Cl 330.42; Br n.a.; F 21.073; I n.a.; Ag n.a.; As 0.42145; Ba n.a.; Cd 0.20019; Co 0.086633; Cr 1013.2; Cu 351.4; Hg 0.31925; Mn 53.034; Mo 0.82887; Ni 0.55492; Pb 27.823; Sb n.a.; Se n.a.; Sn n.a.; V n.a.; Zn 17.778; Be n.a.; Sc n.a.; Sr n.a.; Ti n.a.; Tl n.a.; W n.a.; Si n.a.; Fe 15.454; Ca 130.68; Al 6.322; K 65.307; Mg 197.24; Na 156.13; // Share of carbon in waste that is biogenic 100%. // Share of metals in waste not oxidised and bulk-recyclable (exclude very small or thin parts) Iron: 0%; Alu: 0%; Copper: 0%. // Recovery of metal scrap from bottom ash to recycling: 0g iron scrap, 0g aluminium scrap, 0g copper scrap. From this waste, the FLUWA process in the technology mix recovers 0.000128kg (DM) of a hydroxide sludge to be recycled in zinc furnaces. // Ultimately one kg of this waste produces 0.01256 kg of bottom ash (can include some washed ash) and 0.001757 kg of residues, which are landfilled (technology mix). Additional solidification of residues with 0.0007026 kg of cement.Net energy production: 1.74MJ/kg electric energy and 3.5MJ/kg thermal energy. //

## Included activities start
waste incineration from waste reception gate and delivery into waste bunker at incinerator plant site (without transports to the incinerator)

## Included activities end
Waste-specific short-term emissions to water from leachate. Long-term emissions from landfill to ground water.

## Geography
Specific to the technology mix encountered in Switzerland in 2012.

## Technology
average Swiss MSWI plants in 2010 (grate incinerators) with electrostatic precipitator for fly ash (ESP), wet flue gas scrubber and 25% SNCR , 42.77% SCR-high dust , 32.68% SCR-low dust -DeNOx facilities and 0% without Denox (weighted according to mass of burnt waste, representing Swiss average). Efficiency of iron scrap separation from slag : 58%. Efficiency of non-ferrous scrap separation from slag : 31%. The technology mix for this dataset includes a filter ash treatment (FLUWA) of a share of 46.22%. Gross electric efficiency technology mix 15.84% and Gross thermal efficiency technology mix 28.51%

## Time period
Waste composition as given in literature reference, theoretical data or other source. Transfer coefficients for modern MSWI.

## Reference product
- waste building wood, chrome preserved: 0 kg; CPC 39: Wastes or scraps; By-product classification Waste
  Main reference product of this activity (supply of disposal service).
  production volume 0 kg
    based on corresponding global production volume of MSW fraction in conventional MSWI (wo fly ash extraction) and scaled down to annual Swiss incinerated MSW mass of 3.02 mio. tonnes.
  property price 0 EUR2005
    Waste products are assigned a price of zero as they are assumed to require further treatment.
  property carbon content 0.48514
    carbon content on a dry matter basis (reserved; not for manual entry)
  properties: phosphorus content 0.00013168, fluorine content 2.5506e-5, sulfur content 0.00023965, arsenic content 5.1011e-7, hydrogen content 0.060619, boron content 3.3079e-5, oxygen content 0.44975, cadmium content 2.423e-7, nitrogen content 0.0011927, chlorine content 0.00039993, molybdenum content 1.0032e-6, manganese content 6.419e-5, chromium content 0.0012263, cobalt content 1.0486e-7, nickel content 6.7165e-7, copper content 0.00042532, mercury content 3.8641e-7, magnesium content 0.00023873, iron content 1.8705e-5, sodium content 0.00018898, potassium content 7.9046e-5, calcium content 0.00015817, carbon content, non-fossil 0.48514, zinc content 2.1518e-5, wet mass 1 kg, water in wet mass 0.1738 kg, water content 0.21036, dry mass 0.8262 kg, aluminium content 7.6519e-6, lead content 3.3676e-5, carbon allocation 0.400823 kg
- electricity, for reuse in municipal waste incineration only: 1 kWh; CPC 17100: Electrical energy; By-product classification allocatable product; pedigree (1,1,1,1,1)
  Net electricity generated from this waste and used in internal MSWI plant energy redistribution.
  Uncertainty: uncertainty is calculated from uncertainties in waste composition and uncertainties in energy efficiency and the uncertainty in internal energy demand
  production volume 2.3081e6 kWh

## By-products
- electricity, for reuse in municipal waste incineration only: 0 kWh; name E_el_prod_MSWI; CPC 17100: Electrical energy; By-product classification allocatable product; pedigree (1,1,1,1,1)
  (same comment as for electricity, for reuse in municipal waste incineration only)
  production volume 0 kWh
    calculated in proportion to reference product waste input to incinerator
  property true value relation 3.6; name E_el_prod_MSWI_true_value_relation
    property to calculate "true value" from
  property price 0.1 EUR2005; name E_el_prod_MSWI_price_EUR2005
    Estimated to be the same price as in case of electricity, medium voltage.
  property exergy 3.6 MJ; name E_el_prod_MSWI_exergy
    This exergy property is based on the exergy content of the product.
- heat, for reuse in municipal waste incineration only: 0 MJ; name E_th_prod_MSWI; CPC 17300: Steam and hot water; By-product classification allocatable product; pedigree (1,1,1,1,1)
  Net useful heat generated from this waste and used in internal MSWI plant energy redistribution.
  Uncertainty: uncertainty is calculated from uncertainties in waste composition and uncertainties in energy efficiency and the uncertainty in internal energy demand
  production volume 0 MJ
    calculated in proportion to reference product waste input to incinerator
  property true value relation 0.1842; name E_th_prod_MSWI_true_value_relation
    property to calculate "true value" from
  property exergy 0.1842 MJ; name E_th_prod_MSWI_exergy
    This exergy property is based on the exergy content of the product.
  property price 0.0106 EUR2005; name E_th_prod_MSWI_price_EUR2005
    Average European district heat price from Ecoheatcool and Euroheat 2005-2006, Ecoheat Work package 1: The European heat market. Final report. 10.6 EUR/GJ i s the price of district heat. http://www.solarthermalworld.org/files/Ecoheatcool%20WP1%20Web.pdf?download
- zinc concentrate: 0 kg; CPC 14290: Other non-ferrous metal ores and concentrates (other than uranium or thorium ores and concentrates); By-product classification allocatable product
  Calculated value from the knowledge of the properties of both products.
  property price 0.38 EUR2005; name ByP_price_EUR2005
    Temporary price data. Calculated as 90% of purchasers price based on: Zinc content in concentrate 53%. Concentrate price per kg Zn 86.5% of refined Zn price (13.5% treatment charges according to CHR Metals Limited 2005: Dynamic cost curves. http://www.minecost.com/dynamic.pdf). 2004 zinc price from USGS (2007) Mineral commodity summaries 2007. <http://minerals.usgs.gov/minerals/pubs/mcs/2007/mcs2007.pdf> [Accessed 25 May 2010]
  property zinc content 0.53; name zinc_C_zinc_concentrate
    Zinc content on a dry matter basis. Value taken from teh "zinc mine operation" /GLO dataset.
  property dry mass 1 kg; name DM_zinc_concentrate
  property carbon content 0
    carbon content on a dry matter basis (reserved; not for manual entry)
  properties: wet mass 1 kg, water content 0, carbon content, non-fossil 0, carbon content, fossil 0, water in wet mass 0 kg, carbon allocation 0 kg

## Inputs from technosphere
- iron (III) chloride, without water, in 40% solution state: 0 kg; pedigree (1,1,1,1,1)
  Auxilliary inputs for the wastewater treatment stage of the incinerator plant.
  Uncertainty: uncertainty calculated from uncertainty in average FeCl3 input, of transfer coefficients in the incinerator, and the uncertainty of the waste composition of this waste
  properties: wet mass 1 kg, dry mass 1 kg
- slag landfill: 0 unit; pedigree (1,1,1,1,1)
  Landfill infrastructure required for landfilling of bottom ash.
  Uncertainty: uncertainty is calculated from uncertainties in waste composition and transfer coefficients in incinerator
- spent activated carbon with mercury: 0 kg; pedigree (1,1,1,1,1)
  Spent ion exchanger charged with mercury, from FLUWA filter ash treatment, approximated here with Spent activated carbon with mercury, deposited undergound in a polyethylene Big Bag.
  Uncertainty: uncertainty calculated from uncertainty in of transfer coefficients in the incinerator, and the uncertainty of the waste composition of this waste.
  production volume 0 kg; = ABS(Ref('0423e508-6886-4d3b-88a8-abfa110063b5', 'ProductionVolume') * (Ref('1d05e7fa-4ee5-4ac0-8dc2-886fdd37086c') / Ref('0423e508-6886-4d3b-88a8-abfa110063b5')))
    Calculated from production volume of reference product using the relative outputs.
  properties: wet mass 1 kg, dry mass 1 kg, carbon content, fossil 0.6
- chemical, organic: 1.48857e-7 kg; lognormal variance with pedigree 1.7016, pedigree (1,1,3,1,1)
  Auxilliary inputs for the wastewater treatment stage of the incinerator plant. Proxy for (pure) Trisodium-trimercapto-s-triazine (CAS 17766-26-6), used as 15% diluted solution, aka TMT15.
  Uncertainty: uncertainty calculated from uncertainty in average TMT15 input, of transfer coefficients in the incinerator, and the uncertainty of the waste composition of this waste
  properties: carbon content, fossil 0.628, dry mass 1 kg, wet mass 1 kg
- residual material landfill: 0 unit; pedigree (1,1,1,1,1)
  Landfill infrastructure required for landfilling of incineration residues.
  Uncertainty: uncertainty is calculated from uncertainties in waste composition and transfer coefficients in incinerator
- heat, district or industrial, natural gas: 0 MJ; pedigree (1,1,1,1,1)
  Input to DeNOx stage, to heat up flue gas in low-dust SCR.
  Uncertainty: uncertainty calculated from uncertainty in average DeNOx input, uncertainty in the share of thermal NOx, uncertainty of nitrogen content in average municipal waste and the uncertainty in nitrogen content in *this* waste.
- chemical, inorganic: 7.64145e-11 kg; lognormal variance with pedigree 0.099731, pedigree (1,1,3,1,1)
  Auxilliary inputs for the wastewater treatment stage of the incinerator plant. Proxy for Polyelectrolyte.
  Uncertainty: uncertainty calculated from uncertainty in average Polyelectrolyte input, of transfer coefficients in the incinerator, and the uncertainty of the waste composition of this waste
  properties: wet mass 1 kg, dry mass 1 kg, carbon content, fossil 0.003
- metalliferous hydroxide sludge: 0 kg; pedigree (1,1,1,1,1)
  Metalliferous hydroxide sludge from filter ash leaching (FLUWA).
  Uncertainty: uncertainty is calculated from uncertainties in waste composition and transfer coefficients to filter ash in incinerator and the uncertainty of the transfer coefficients of the FLUWA process.
  production volume 0 kg
    calculated in proportion to reference product waste input to incinerator
  properties: sulfur content 0.09511, carbon content, non-fossil 0.16284, calcium content 0.010296, zinc content 0.024492, water content 3, sodium content 0.010017, wet mass 1 kg, dry mass 0.25 kg, chlorine content 0.062224, phosphorus content 0.01668, oxygen content 0.56229, chromium content 0.037931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
- process-specific burdens, residual material landfill: 0 kg; pedigree (1,1,1,1,1)
  Mass-specific expenditures required for landfilling of incineration residues.;activityLink introduced to establish a direct link to the corresponding regional supply of this product
  Uncertainty: uncertainty is calculated from uncertainties in waste composition and transfer coefficients in incinerator
- cement, unspecified: 0 kg; pedigree (1,1,1,1,1)
  Cement required for solidification of landfilled residual material.
  Uncertainty: Uncertainty calculated from uncertainty of the waste composition of this waste, of transfer coefficients in the incinerator and of the solidification recipe.
  properties: dry mass 1 kg, wet mass 1 kg
- titanium dioxide: 0 kg; pedigree (1,1,1,1,1)
  Input to DeNOx stage (TiO2 catalyst carrier)
  Uncertainty: uncertainty calculated from uncertainty in average DeNOx input, uncertainty in the share of thermal NOx, uncertainty of nitrogen content in average municipal waste and the uncertainty in nitrogen content in *this* waste.
  properties: wet mass 1 kg, dry mass 1 kg
- cationic resin: 0 kg; pedigree (1,1,1,1,1)
  Auxilliary input for mercury removal in filter ash treatment (FLUWA).
  Uncertainty: uncertainty calculated from uncertainty in of transfer coefficients in the incinerator, and the uncertainty of the waste composition of this waste
  properties: wet mass 1 kg, carbon content, fossil 0.521606, water content 1, dry mass 0.5 kg
- transport, freight, lorry, unspecified: 0 metric ton*km; pedigree (1,1,1,1,1)
  Transport services to transport incineration residues to landfills and filter ash to external treatments (FLUWA).
  Uncertainty: uncertainty calculated from uncertainty of the waste composition of this waste, uncertainty of transfer coefficients and the uncertainty in generic transportation distances
- municipal waste incineration facility: 0 unit
  Demands per kilogram waste.
- sodium hydroxide, without water, in 50% solution state: 0 kg; pedigree (1,1,1,1,1)
  Auxilliary inputs for the flue gas treatment stage of the incinerator plant, and partially in the filter ash treatment (FLUWA).
  Uncertainty: uncertainty calculated from uncertainty in average NaOH input, of transfer coefficients in the incinerator, and the uncertainty of the waste composition of this waste
  properties: dry mass 1 kg, wet mass 1 kg
- waste cement, hydrated: 0 kg; pedigree (1,1,1,1,1)
  Hydrated cement output for solidification of landfilled residual material.
  Uncertainty: Uncertainty calculated from uncertainty of the waste composition of this waste and transfer coefficients in the incinerator and of the solidification recipe.
  production volume 0 kg
    calculated in proportion to reference product waste input to incinerator
  properties: dry mass 1 kg, wet mass 1 kg
- water, decarbonised: 0 kg; pedigree (1,1,1,1,1)
  Incinerator process water used in flue gas scrubber stage.
  Uncertainty: uncertainty calculated from uncertainty in average water input, and the uncertainty of the waste composition of this waste
  properties: wet mass 1 kg
- quicklime, milled, packed: 0 kg; pedigree (1,1,1,1,1)
  Auxilliary inputs for the flue gas treatment stage of the incinerator plant.
  Uncertainty: uncertainty calculated from uncertainty in average CaO input, of transfer coefficients in the incinerator, and the uncertainty of the waste composition of this waste
  properties: water content 0.010101, wet mass 1 kg, dry mass 0.99 kg
- ammonia, liquid: 0 kg; pedigree (1,1,1,1,1)
  Input to DeNOx stage (100% NH3).
  Uncertainty: uncertainty calculated from uncertainty in average DeNOx input, uncertainty in the share of thermal NOx, uncertainty of nitrogen content in average municipal waste and the uncertainty in nitrogen content in *this* waste.
  properties: dry mass 1 kg, wet mass 1 kg
- chromium oxide, flakes: 0 kg; pedigree (1,1,1,1,1)
  Input to DeNOx stage. Active component in SCR catalyst (vanadium pentoxide, V2O5), here approximated with the available chromium trioxide.
  Uncertainty: uncertainty calculated from uncertainty in average DeNOx input, uncertainty in the share of thermal NOx, uncertainty of nitrogen content in average municipal waste and the uncertainty in nitrogen content in *this* waste.
  properties: wet mass 1 kg, dry mass 1 kg
- hydrochloric acid, without water, in 30% solution state: 0 kg; pedigree (1,1,1,1,1)
  Auxilliary inputs for the wastewater treatment stage of the incinerator plant.
  Uncertainty: uncertainty calculated from uncertainty in average HCl input, of transfer coefficients in the incinerator, and the uncertainty of the waste composition of this waste
  properties: dry mass 1 kg, wet mass 1 kg
- process-specific burdens, slag landfill: 0 kg; pedigree (1,1,1,1,1)
  Mass-specific expenditures required for landfilling of bottom ash.;activityLink introduced to establish a direct link to the corresponding regional supply of this product
  Uncertainty: uncertainty is calculated from uncertainties in waste composition and transfer coefficients in incinerator
- hydrogen peroxide, without water, in 50% solution state: 0 kg; pedigree (1,1,1,1,1)
  Auxilliary oxidising agent for filter ash treatment (FLUWA).
  Uncertainty: uncertainty calculated from uncertainty in of transfer coefficients in the incinerator, and the uncertainty of the waste composition of this waste
  properties: dry mass 1 kg, wet mass 1 kg
- wire drawing, copper: 9.24093e-7 kg; source Pierre Fréon 2014; triangular min 9.24093e-7, mostLikely 9.24093e-7, max 9.24093e-7, pedigree (3,3,1,1,1)
  Manufacture of copper wire, 1 replacement over lifetime
  Uncertainty: Assumptions on replacement rates
- lead in car shredder residue: -1.87682e-6 kg; source Pierre Fréon 2014
  Waste lead
  production volume 0.00125822 kg
- copper scrap, sorted, pressed: -9.24093e-7 kg; source Pierre Fréon 2014
  Waste copper wire
  production volume 0.000535414 kg
- nylon 6-6: 9.58374e-6 kg; source Pierre Fréon 2014; triangular min 9.58374e-6, mostLikely 9.58374e-6, max 9.58374e-6, pedigree (2,3,1,1,1)
  Fishing net maintenance, 10% replacement every 2 years
  Uncertainty: Data from 10 vessels
- waste wood, post-consumer: -0.00178299 kg; source Pierre Fréon 2014
  Waste wood. Density of wood: 640 kg/m3, ecoinvent dataset information (UPR): planing, board, hardwood, u=20%, GLO
  production volume 0.068533 kg
- steel, low-alloyed, hot rolled: 0.0012112 kg; source Pierre Fréon 2014; triangular min 0.0012112, mostLikely 0.0012112, max 0.0012112, pedigree (2,3,1,1,1)
  Structural steel, keel lining, bolts, rigging
  Uncertainty: Data from 10 vessels
- copper: 0.000696477 kg; source Pierre Fréon 2014
  Copper wire for electric circuit construction, 50% recycled
- marine engine: 2.17162e-9 unit; source Pierre Fréon 2014; triangular min 2.17162e-9, mostLikely 2.17162e-9, max 2.17162e-9, pedigree (3,3,1,1,1)
  Marine diesel engine maintenance, 1 replacement over lifetime
  Uncertainty: Data from 10 vessels, assumptions on replacement/maintenance
- waste paint on wood: -2.83519e-6 kg; source Pierre Fréon 2014
  Waste paint, 2/3 of solids emitted to ocean
  production volume 0.00190072 kg
- alkyd paint, white, without solvent, in 60% solution state: 8.50557e-6 kg; source Pierre Fréon 2014; triangular min 8.50557e-6, mostLikely 8.50557e-6, max 8.50557e-6, pedigree (1,3,1,1,1)
  Hull and deck paint, including antifouling, maintenance, every 2 years
  Uncertainty: Data from 10 vessels
- sawnwood, board, hardwood, dried (u=20%), planed: 1.84819e-7 m3; source Pierre Fréon 2014; triangular min 1.84819e-7, mostLikely 1.84819e-7, max 1.84819e-7, pedigree (3,3,1,1,1)
  Hull, 30% replacement
  Uncertainty: Data from 10 vessels
- lead: 2.17162e-6 kg; source Pierre Fréon 2014; triangular min 2.17162e-6, mostLikely 2.17162e-6, max 2.17162e-6, pedigree (2,3,1,1,1)
  Fishing net maintenance, 10% replacement every 2 years
  Uncertainty: Data from 10 vessels
- waste plastic, mixture: -5.94034e-7, -8.89058e-6, -9.91216e-8 kg (3 suppliers, which the file names only by identifier); sum of these -9.58374e-6 kg; source Pierre Fréon 2014
  Waste nylon
  production volume 0.00642496 kg
- hazardous waste, for underground deposit: -4.20323e-11 kg; lognormal variance with pedigree 0.0032, pedigree (1,3,3,1,1)
  Amount and activity link based on primary data collected from participating companies.
  production volume 1.75109e6 kg
- light fuel oil: 7.32529e-10 kg; lognormal variance with pedigree 0.0032, pedigree (1,3,3,1,1)
  Amount and activity link based on primary data collected from participating companies. Emissions from fuel combustion included in dataset.
- blasting: 8.14125e-10 kg; lognormal variance with pedigree 0.0032, pedigree (1,3,3,1,1)
  Amount and activity link based on primary data collected from participating companies.
- mine infrastructure, underground, non-ferrous metal: 0 unit; pedigree (1,1,1,1,1)
  Estimation from author of 'zinc mine operation, GLO, 1994-2003' dataset. No primary data on infrastructure included.
- heat, district or industrial, other than natural gas: 9.63921e-10, 4.99744e-10, 2.13158e-8 MJ (3 suppliers, which the file names only by identifier); sum of these 2.27794e-8 MJ; lognormal variance with pedigree 0.0032, pedigree (1,3,3,1,1)
  Amount and activity link based on primary data collected from participating companies.
- conveyor belt: 7.69022e-14 m; lognormal variance with pedigree 0.0587, pedigree (4,4,5,3,3)
  Estimation from author of 'zinc mine operation, GLO, 1994-2003' dataset: 2000 m conveyor belts are assumed to have a capacity of 2000 t/h which yields 2*10-5 m conveyor belt required per tonne mined raw ore. No primary data on infrastructure included.
- maize starch: 3.84697e-11 kg; lognormal variance with pedigree 0.0032, pedigree (1,3,3,1,1)
  Amount and activity link based on primary data collected from participating companies.
- electricity, medium voltage: 7.25689e-8, 9.29531e-8, 2.98561e-8, 4.26444e-12, 1.13809e-8, 9.02158e-9, 7.20077e-8 kWh (7 suppliers, which the file names only by identifier); sum of these 2.87792e-7 kWh; lognormal variance with pedigree 0.0032, pedigree (1,3,3,1,1)
  Amount and activity link based on primary data collected from participating companies.
- zinc slag: -5.17681e-11 kg; lognormal variance with pedigree 0.0032, pedigree (1,3,3,1,1)
  Amount and activity link based on primary data collected from participating companies.
  production volume 2.1567e6 kg
- copper sulfate: 5.60367e-9 kg; lognormal variance with pedigree 0.0032, pedigree (1,3,3,1,1)
  Amount and activity link based on primary data collected from participating companies.
- heavy fuel oil: 2.86356e-10 kg; lognormal variance with pedigree 0.0032, pedigree (1,3,3,1,1)
  (same comment as for light fuel oil)
- electricity, high voltage: 4.38349e-8 kWh; lognormal variance with pedigree 0.0032, pedigree (1,3,3,1,1)
  Amount and activity link based on primary data collected from participating companies.
- diesel: 3.17877e-9, 1.17494e-8 kg (2 suppliers, which the file names only by identifier); sum of these 1.49282e-8 kg; lognormal variance with pedigree 0.0032, pedigree (1,3,3,1,1)
  Amount and activity link based on primary data collected from participating companies. Emissions from diesel combustion included in dataset.
- tap water: 0.000706256 kg; lognormal variance with pedigree 0.0032, pedigree (1,3,3,1,1)
  Amount and activity link based on primary data collected from participating companies.
- aluminium chloride: 6.29671e-14 kg; lognormal variance with pedigree 0.0032, pedigree (1,3,3,1,1)
  Amount and activity link based on primary data collected from participating companies.
- steel, low-alloyed: 0.000102983 kg; lognormal variance with pedigree 0.0032, pedigree (1,3,3,1,1)
  Amount and activity link based on primary data collected from participating companies.
- concrete, normal: 1.80242e-12 m3; lognormal variance with pedigree 0.0032, pedigree (1,3,3,1,1)
  Amount and activity link based on primary data collected from participating companies.
- acetic acid, without water, in 98% solution state: 1.07407e-11 kg; lognormal variance with pedigree 0.0032, pedigree (1,3,3,1,1)
  Amount and activity link based on primary data collected from participating companies.
- transport, freight, sea, bulk carrier for dry goods: 1.12938e-10 metric ton*km; lognormal variance with pedigree 0.1226, pedigree (1,3,3,1,1)
  Inbound transport of materials to sites. Amount and activity link based on primary data collected from participating companies.
- cement, unspecified: 1.09094e-10 kg; lognormal variance with pedigree 0.0032, pedigree (1,3,3,1,1)
  Amount and activity link based on primary data collected from participating companies.
- sodium dichromate: 2.76415e-12 kg; lognormal variance with pedigree 0.0032, pedigree (1,3,3,1,1)
  Amount and activity link based on primary data collected from participating companies.
- polyacrylamide: 2.68544e-11 kg; lognormal variance with pedigree 0.0032, pedigree (1,3,3,1,1)
  Amount and activity link based on primary data collected from participating companies.
- used Li-ion battery: -7.2147e-13 kg; lognormal variance with pedigree 0.0032, pedigree (1,3,3,1,1)
  Amount and activity link based on primary data collected from participating companies.
  production volume 30057 kg
- sodium sulfide: 5.12861e-11 kg; lognormal variance with pedigree 0.0032, pedigree (1,3,3,1,1)
  Amount and activity link based on primary data collected from participating companies.
- sodium hydrogen sulfite: 1.94718e-11 kg; lognormal variance with pedigree 0.0032, pedigree (1,3,3,1,1)
  Amount and activity link based on primary data collected from participating companies.
- soda ash, dense: 9.83231e-10 kg; lognormal variance with pedigree 0.0032, pedigree (1,3,3,1,1)
  Amount and activity link based on primary data collected from participating companies.
- non-sulfidic overburden, off-site: -8.01004e-6 kg; lognormal variance with pedigree 0.0032, pedigree (1,3,3,1,1)
  Amount and activity link based on primary data collected from participating companies.
  production volume 3.33704e11 kg
- propane: 6.51307e-10 kg; lognormal variance with pedigree 0.0032, pedigree (1,3,3,1,1)
  Amount and activity link based on primary data collected from participating companies.
- pig iron: 1.99499e-10 kg; lognormal variance with pedigree 0.0032, pedigree (1,3,3,1,1)
  Amount and activity link based on primary data collected from participating companies.
- natural gas, high pressure: 2.23166e-11 m3; lognormal variance with pedigree 0.0032, pedigree (1,3,3,1,1)
  (same comment as for light fuel oil)
- petrol, unleaded: 3.83659e-12, 1.70304e-13, 7.03831e-13, 1.69751e-13, 6.35038e-13, 3.49674e-14, 1.95461e-11 kg (7 suppliers, which the file names only by identifier); sum of these 2.50966e-11 kg; lognormal variance with pedigree 0.0032, pedigree (1,3,3,1,1)
  Amount and activity link based on primary data collected from participating companies.
- inert waste: -4.84325e-11, -4.17134e-13, -1.70718e-10 kg (3 suppliers, which the file names only by identifier); sum of these -2.19568e-10 kg; lognormal variance with pedigree 0.0032, pedigree (1,3,3,1,1)
  Amount and activity link based on primary data collected from participating companies.
  production volume 9.14737e6 kg
- lubricating oil: 5.96945e-7, 2.83384e-6 kg (2 suppliers, which the file names only by identifier); sum of these 3.43078e-6 kg; lognormal variance with pedigree 0.0032, pedigree (1,3,3,1,1)
  Amount and activity link based on primary data collected from participating companies.
- lime, hydrated, packed: 2.97951e-13, 3.51013e-11 kg (2 suppliers, which the file names only by identifier); sum of these 3.53992e-11 kg; lognormal variance with pedigree 0.0032, pedigree (1,3,3,1,1)
  Amount and activity link based on primary data collected from participating companies.
- limestone, crushed, washed: 4.51149e-15, 5.29108e-13 kg (2 suppliers, which the file names only by identifier); sum of these 5.3362e-13 kg; lognormal variance with pedigree 0.0032, pedigree (1,3,3,1,1)
  Amount and activity link based on primary data collected from participating companies.
- bilge oil: -5.48467e-13, -1.43366e-14, -1.14051e-12 kg (3 suppliers, which the file names only by identifier); sum of these -1.70331e-12 kg; lognormal variance with pedigree 0.0032, pedigree (1,3,3,1,1)
  Amount and activity link based on primary data collected from participating companies.
  production volume 70961.3 kg
- lime: 1.16496e-11, 1.34882e-10 kg (2 suppliers, which the file names only by identifier); sum of these 1.46532e-10 kg; lognormal variance with pedigree 0.0032, pedigree (1,3,3,1,1)
  Amount and activity link based on primary data collected from participating companies.
- hazardous waste, for incineration: -5.08886e-10, -1.3302e-11, -1.0582e-9 kg (3 suppliers, which the file names only by identifier); sum of these -1.58039e-9 kg; lognormal variance with pedigree 0.0032, pedigree (1,3,3,1,1)
  Amount and activity link based on primary data collected from participating companies.
  production volume 6.58402e7 kg
- limestone, unprocessed: 5.02873e-11, 5.206e-13, 1.27317e-9 kg (3 suppliers, which the file names only by identifier); sum of these 1.32398e-9 kg; lognormal variance with pedigree 0.0032, pedigree (1,3,3,1,1)
  Amount and activity link based on primary data collected from participating companies.
- hydrogen cyanide: 7.23481e-12, 1.59166e-11 kg (2 suppliers, which the file names only by identifier); sum of these 2.31514e-11 kg; lognormal variance with pedigree 0.0032, pedigree (1,3,3,1,1)
  Amount and activity link based on primary data collected from participating companies.
- sulfidic tailings, from zinc-lead mine operation: -1.02091e-6, -1.43721e-7, -1.2588e-7, -2.66627e-7, -5.2136e-8, -3.45921e-7, -1.83368e-7, -5.87174e-7 kg (8 suppliers, which the file names only by identifier); sum of these -2.72574e-6 kg; lognormal variance with pedigree 0.0032, pedigree (1,3,3,1,1)
  Amount and activity link based on primary data collected from participating companies.
  production volume 1.13556e11 kg
- iron sulfate: 8.53827e-12, 1.72889e-11 kg (2 suppliers, which the file names only by identifier); sum of these 2.58272e-11 kg; lognormal variance with pedigree 0.0032, pedigree (1,3,3,1,1)
  Amount and activity link based on primary data collected from participating companies.
- nylon 6: 2.09434e-12, 4.24077e-12 kg (2 suppliers, which the file names only by identifier); sum of these 6.33511e-12 kg; lognormal variance with pedigree 0.0032, pedigree (1,3,3,1,1)
  Amount and activity link based on primary data collected from participating companies.
- zinc monosulfate: 2.05218e-10, 1.0841e-9 kg (2 suppliers, which the file names only by identifier); sum of these 1.28932e-9 kg; lognormal variance with pedigree 0.0032, pedigree (1,3,3,1,1)
  Amount and activity link based on primary data collected from participating companies.
- concrete, 35MPa: 4.09047e-14, 1.63492e-15, 3.37538e-13 m3 (3 suppliers, which the file names only by identifier); sum of these 3.80078e-13 m3; lognormal variance with pedigree 0.0032, pedigree (1,3,3,1,1)
  Amount and activity link based on primary data collected from participating companies.
- concrete, 35MPa: 0 m3; pedigree (1,1,1,1,1)
  Amount and activity link based on primary data collected from participating companies.
- transport, freight, lorry 16-32 metric ton, EURO3: 2.87758e-10, 7.07946e-10 metric ton*km (2 suppliers, which the file names only by identifier); sum of these 9.95704e-10 metric ton*km; lognormal variance with pedigree 0.1226, pedigree (1,3,3,1,1)
  (same comment as for transport, freight, sea, bulk carrier for dry goods)
- acrylic acid: 1.6767e-12, 7.95949e-12 kg (2 suppliers, which the file names only by identifier); sum of these 9.63619e-12 kg; lognormal variance with pedigree 0.0032, pedigree (1,3,3,1,1)
  Amount and activity link based on primary data collected from participating companies.
- sulfuric acid: 3.48109e-11, 1.99924e-10 kg (2 suppliers, which the file names only by identifier); sum of these 2.34735e-10 kg; lognormal variance with pedigree 0.0032, pedigree (1,3,3,1,1)
  Amount and activity link based on primary data collected from participating companies.
- sulfur dioxide, liquid: 8.1209e-11, 2.02143e-10 kg (2 suppliers, which the file names only by identifier); sum of these 2.83352e-10 kg; lognormal variance with pedigree 0.0032, pedigree (1,3,3,1,1)
  Amount and activity link based on primary data collected from participating companies.
- waste paper, unsorted: -1.37842e-14, -9.25197e-14 kg (2 suppliers, which the file names only by identifier); sum of these -1.06304e-13 kg; lognormal variance with pedigree 0.0032, pedigree (1,3,3,1,1)
  Amount and activity link based on primary data collected from participating companies.
  production volume 4446.2 kg
- waste paper, unsorted: 0 kg; pedigree (1,1,1,1,1)
  Amount and activity link based on primary data collected from participating companies.
- sodium cyanide: 1.86664e-11, 3.77971e-11 kg (2 suppliers, which the file names only by identifier); sum of these 5.64635e-11 kg; lognormal variance with pedigree 0.0032, pedigree (1,3,3,1,1)
  Amount and activity link based on primary data collected from participating companies.
- waste mineral oil: -7.72172e-7, -1.78673e-8, -2.29741e-6 kg (3 suppliers, which the file names only by identifier); sum of these -3.08745e-6 kg; lognormal variance with pedigree 0.0032, pedigree (1,3,3,1,1)
  Amount and activity link based on primary data collected from participating companies.
  production volume 1.91672e6 kg
- calcium chloride: 3.51531e-12, 1.21731e-11 kg (2 suppliers, which the file names only by identifier); sum of these 1.56884e-11 kg; lognormal variance with pedigree 0.0032, pedigree (1,3,3,1,1)
  Amount and activity link based on primary data collected from participating companies.
- municipal solid waste: -4.92426e-11, -3.01821e-13, -2.11203e-13, -8.3819e-13, -5.92801e-10 kg (5 suppliers, which the file names only by identifier); sum of these -6.43395e-10 kg; lognormal variance with pedigree 0.0032, pedigree (1,3,3,1,1)
  Amount and activity link based on primary data collected from participating companies.
  production volume 2.68043e7 kg
- quicklime, milled, loose: 5.17442e-13, 6.19161e-11 kg (2 suppliers, which the file names only by identifier); sum of these 6.24336e-11 kg; lognormal variance with pedigree 0.0032, pedigree (1,3,3,1,1)
  Amount and activity link based on primary data collected from participating companies.
- waste rubber, unspecified: -3.19481e-7, -1.34118e-8, -3.19481e-7 kg (3 suppliers, which the file names only by identifier); sum of these -6.52374e-7 kg; lognormal variance with pedigree 0.0032, pedigree (1,3,3,1,1)
  Amount and activity link based on primary data collected from participating companies.
  production volume 7904.23 kg
- polyol: 1.24128e-11, 2.51344e-11 kg (2 suppliers, which the file names only by identifier); sum of these 3.75473e-11 kg; lognormal variance with pedigree 0.0032, pedigree (1,3,3,1,1)
  Amount and activity link based on primary data collected from participating companies.
- scrap copper: -8.3043e-12, -0.000142679, -1.74855e-11 kg (3 suppliers, which the file names only by identifier); sum of these -0.000142679 kg; lognormal variance with pedigree 0.0032, pedigree (1,3,3,1,1)
  Amount and activity link based on primary data collected from participating companies.
  production volume 1.09065e6 kg
- quicklime, in pieces, loose: 4.12914e-14, 2.49509e-9 kg (2 suppliers, which the file names only by identifier); sum of these 2.49514e-9 kg; lognormal variance with pedigree 0.0032, pedigree (1,3,3,1,1)
  Amount and activity link based on primary data collected from participating companies.
- oxygen, liquid: 8.43319e-14, 3.07345e-13 kg (2 suppliers, which the file names only by identifier); sum of these 3.91677e-13 kg; lognormal variance with pedigree 0.0032, pedigree (1,3,3,1,1)
  Amount and activity link based on primary data collected from participating companies.
- polypropylene, granulate: 2.06889e-6 kg; lognormal variance with pedigree 0.0246, pedigree (2,5,4,5,1)
  Literature value. The value derived from the average of the three pieces of furniture from González-García et al. 2011 is 0.022kg. The value represents "Plastics", Polypropylene is here used as a proxy as a plastic often used in the produciton of furniture (information retrieved from FurnitureLink https://www.furniturelinkca.com/plastics.htm, accessed 20171207)
- wooden board factory, organic bonded boards: 0 unit; pedigree (1,1,1,1,1)
  Estimated value. This infrastructure is taken as a proxy. According to the general comment of the dataset "wooden board factory construction, organic bonded boards, GLO" accessed 20170712: "The service life is assumed to be 50 years. Thus the life time output is 30'000'000 m3 board." Assuming an average density of 647 kg/m3, this density was calculated based on the weighted average of the sawnwood, laminated timber, MDF and particle board based on their inputs per kg of final product.
- heat, district or industrial, other than natural gas: 6.04177e-6 MJ; lognormal variance with pedigree 0.0246, pedigree (2,5,4,5,1)
  Calculated value. The value derived from the average of the three pieces of furniture from González-García et al. 2011 is 0.017kg of fuel oil. Assuming a heating value of 41MJ/kg based on the reference http://www.globalcombustion.com/oil-fuel-properties/.
- polyethylene terephthalate, granulate, amorphous: 5.20095e-8 kg; lognormal variance with pedigree 0.0246, pedigree (2,5,4,5,1)
  Literature value. The value derived from the average of the three pieces of furniture from González-García et al. 2011 is 0.006kg. The value represents "Fabrics" (0.006kg). PET is here used as a proxy for "Fabrics", which in the description for "textiles" are mentioned as "polyester and polyurethane".
- medium density fibreboard: 1.64474e-9 m3; lognormal variance with pedigree 0.0246, pedigree (2,5,4,5,1)
  Calculated value. The value derived from the average of the three pieces of furniture from González-García et al. 2011 is 0.15kg. This is multiplied by the product density (see the properties section).
- heat, district or industrial, natural gas: 7.77542e-6 MJ; lognormal variance with pedigree 0.0246, pedigree (2,5,4,5,1)
  Calculated value. The value derived from the average of the three pieces of furniture from González-García et al. 2011 is 0.023m3 of natural gas. Assuming a heating value of 39MJ/m3.
- glued laminated timber, for indoor use: 8.97034e-6 m3; lognormal variance with pedigree 0.0246, pedigree (2,5,4,5,1)
  Calculated value. The value derived from the average of the three pieces of furniture from González-García et al. 2011 is 0.17kg (proxy for high pressure laminate board). This is multiplied by the product density (see the properties section).
- electricity, medium voltage: 5.47833e-6 kWh; lognormal variance with pedigree 0.0246, pedigree (2,5,4,5,1)
  Literature value. The value derived from the average of the three pieces of furniture from González-García et al. 2011 is 0.632kWh.
- diesel, burned in diesel-electric generating set, 18.5kW: 1.30024e-7 MJ; lognormal variance with pedigree 0.0246, pedigree (2,5,4,5,1)
  Calculated value. The value derived from the average of the three pieces of furniture from González-García et al. 2011 is 0.001kg diesel. The amount of MJ has been calculated accordingly to the input of diesel per MJ for the ecoinvent activity producing "diesel, burned in diesel-electric generating set, 18.5kW", activity name "market for diesel, burned in diesel-electric generating set, 18.5kW, GLO" accessed 20171207.
- cast iron: 0.00266899 kg; lognormal variance with pedigree 0.0192, pedigree (2,5,4,5,1)
  Calculated value. The value derived from the average of the three pieces of furniture from González-García et al. 2011 is 0.230kg. The value represents "Metals", as in the product description, iron, steel and aluminium are mentioned for the production of screws, nail and part of the furniture, it is here assumed that the three metals are used in equal weight share.
- aluminium, cast alloy: 3.96945e-5 kg; lognormal variance with pedigree 0.0192, pedigree (2,5,4,5,1)
  (same comment as for cast iron)
- particle board, for indoor use: 8.38891e-6 m3; lognormal variance with pedigree 0.0246, pedigree (2,5,4,5,1)
  Calculated value. The value derived from the average of the three pieces of furniture from González-García et al. 2011 is 0.49kg. This is multiplied by the product density (see the properties section).
- extrusion of plastic sheets and thermoforming, inline: 2.42711e-7 kg; lognormal variance with pedigree 0.0246, pedigree (2,5,4,5,1)
  Calculated value. The value derived from the average of the three pieces of furniture from González-García et al. 2011 of "Plastics" (0.022kg) and . "Fabrics" (0.006kg). PET is here used as a proxy for "Fabrics", which in the description for "textiles" are mentioned as "polyester and polyurethane". Polypropylene is here used as a proxy as a plastic often used in the produciton of furniture (information retrieved from FurnitureLink https://www.furniturelinkca.com/plastics.htm, accessed 20171207).
- waste paperboard: -1.76597e-8, -1.09807e-9, -3.9678e-9, -7.16179e-10, -7.19082e-9, -3.86893e-10, -9.60164e-11, -1.33581e-7 kg (8 suppliers, which the file names only by identifier); sum of these -1.64697e-7 kg; lognormal variance with pedigree 0.216, pedigree (5,5,5,5,5)
  The amount is set equal to the input amount for the respectives materials.
  production volume 2.59809e8 kg
- waste polyethylene/polypropylene product: -6.80788e-8, -0.000287724, -1.72589e-7 kg (3 suppliers, which the file names only by identifier); sum of these -0.000287964 kg; lognormal variance with pedigree 0.216, pedigree (5,5,5,5,5)
  The amount is set equal to the input amount for the respectives materials.
  production volume 3.82876e8 kg
- scrap aluminium: -2.10805e-7, -9.8905e-9, -4.4387e-7 kg (3 suppliers, which the file names only by identifier); sum of these -6.64566e-7 kg; lognormal variance with pedigree 0.216, pedigree (5,5,5,5,5)
  The amount is set equal to the input amount for the respective material
  production volume 1.04835e9 kg
- sawnwood, hardwood, dried (u=10%), planed: 3.82734e-11, 9.50842e-11 m3 (2 suppliers, which the file names only by identifier); sum of these 1.33358e-10 m3; lognormal variance with pedigree 0.0246, pedigree (2,5,4,5,1)
  Calculated value. The value derived from the average of the three pieces of furniture from González-García et al. 2011 is 0.01kg. This is multiplied by the product density (see the properties section).
- corrugated board box: 3.40068e-8, 1.52047e-9, 1.29169e-7 kg (3 suppliers, which the file names only by identifier); sum of these 1.64697e-7 kg; lognormal variance with pedigree 0.0246, pedigree (2,5,4,5,1)
  Literature value. The value derived from the average of the three pieces of furniture from González-García et al. 2011 is 0.019kg of corrugated board (used as part of the product, not as packaging).
- scrap steel: -9.93144e-7, -1.25558e-9, -3.0843e-6 kg (3 suppliers, which the file names only by identifier); sum of these -4.0787e-6 kg; lognormal variance with pedigree 0.216, pedigree (5,5,5,5,5)
  The amount is set equal to the input amount for the respective material
  production volume 1.04835e9 kg
- building, hall: 7.76873e-10 m2; lognormal variance with pedigree 0.318, pedigree (4,5,3,1,1)
  Calculated value based on estimates.
  1m2 of hall is available every day for 50 years
  1 container occupies during the dismantling the area of its based for the period of 2 days
- metal working, average for steel product manufacturing: 9.96546e-5 kg; lognormal variance with pedigree 0.0038, pedigree (2,3,3,1,1)
  Calculated value.
  This exchange represent general metal working of the steel to form it into all the individual components needed for the assemby of the container.
- used intermodal shipping container, 20-foot: -5.11174e-9 unit; lognormal variance with pedigree 0.00206, pedigree (1,1,3,1,1)
  Calculated value.
  production volume 432000 unit
- zinc coat, pieces: 1.10459e-5 m2; lognormal variance with pedigree 0.0038, pedigree (2,3,3,1,1)
  Calculated value.
  The "zinc coating, pieces" dataset is created for the thickess of the coat of 65mm. While the interior coating of the container should be approximatelly 65mm the exterior should be at least double (Steinecker, 2012). So the additional amount of coating is added to assure the correct thickness of the exterior coat.
- synthetic rubber: 0.000194144 kg; lognormal variance with pedigree 0.0038, pedigree (2,3,3,1,1)
  Calculated value. The seal gasket is made of EPDM synthetic rubber. It cover all the edges of the container door.
- metal working, average for chromium steel product manufacturing: 3.05433e-7 kg; lognormal variance with pedigree 0.0038, pedigree (2,3,3,1,1)
  Calculated value.
- welding, arc, steel: 1.86058e-6 m; lognormal variance with pedigree 0.0038, pedigree (2,3,3,1,1)
  Calculated value based on estimates.
- chromium steel pipe: 3.05433e-7 kg; lognormal variance with pedigree 0.0038, pedigree (2,3,3,1,1)
  Industrial value (Jost, Products for Container Equipment and Intermodal transports, http://www.jost-world.com/workflow/pdfanleitungen/kataloge/JOST_CT_ZDE180000039E_0910.pdf, accessed 20141014).
  There are 4 locking bars on the container.
- plywood, for outdoor use: 3.77171e-9, 3.38791e-8 m3 (2 suppliers, which the file names only by identifier); sum of these 3.76508e-8 m3; lognormal variance with pedigree 0.0038, pedigree (2,3,3,1,1)
  Calculated value.
  This exchange represent the amount of wood needed for the wooden floor of the container.
- used intermodal shipping container, 40-foot, high-cube: -7.5368e-9 unit; lognormal variance with pedigree 0.0026, pedigree (1,1,3,1,1)
  Calculated value.
  production volume 264000 unit
- used intermodal shipping container, 40-foot: -8.22771e-9 unit; lognormal variance with pedigree 0.0026, pedigree (1,1,3,1,1)
  Calculated value.
  production volume 192000 unit
- used intermodal shipping container, 45-foot, high-cube: -6.89544e-9 unit; lognormal variance with pedigree 0.0026, pedigree (1,1,3,1,1)
  Calculated value.
  production volume 40000 unit
- wastewater, unpolluted: -4.78354e-9, -5.93158e-7 m3 (2 suppliers, which the file names only by identifier); sum of these -5.97942e-7 m3; lognormal variance with pedigree 0.0186, pedigree (4,5,3,1,1)
  Calculated value.
  production volume 2.54831e7 m3
- agricultural trailer: 1.16035e-5 kg; lognormal variance with pedigree 1.30152, pedigree (3,3,4,1,3)
  Corresponds to 79.9 kg/ha related to the life time (20 years). Calculations base on tyre trailers of 1500 kg weight, 1200 hours useful life and 0.22 repair factor.
- shed, large, wood, non-insulated, fire-unprotected: 2.19485e-8 m2; lognormal variance with pedigree 0.0969451, pedigree (3,3,4,1,3)
  Storrage of diverse material related to the trellis system. Corresponds to 0.302 m2/ha related to the life time of the trellissystem (20 years).
- sawlog and veneer log, softwood, measured as solid wood under bark: 9.96741e-7 m3; lognormal variance with pedigree 0.0887633, pedigree (2,3,4,2,2)
- heat, district or industrial, other than natural gas: 0.000538838 MJ; lognormal variance with pedigree 0.0872491, pedigree (1,3,4,1,2)
  Heat used for tar impragnation of wooden poles. Corresponds to 371 MJ/ha related to the life time (20 years)
- wood preservation, pressure vessel, creosote, outdoor use, ground contact: 0.000114625 kg; lognormal variance with pedigree 0.0881633, pedigree (1,3,4,2,2)
  Tar oil used for impragnation of the wooden poles. Corresponds to 1579 kg/ha related to the life time (20 years).
- diesel, burned in agricultural machinery: 0.00741323 MJ; lognormal variance with pedigree 0.0969451, pedigree (3,3,4,1,3)
  Corresponds to 1134 MJ/ha related to the life time (20 years). 45 MJ = 1 kg Diesel
- residual softwood, wet: 1.63467e-7 m3; lognormal variance with pedigree 0.0881633, pedigree (1,3,4,2,2)
  From manuafacturing poles from raw round wood under bark. Corresponds to 1.126 m3/ha related to the life time (20 years)
- tractor, 4-wheel, agricultural: 1.40754e-5 kg; lognormal variance with pedigree 1.30152, pedigree (3,3,4,1,3)
  Corresponds to 96.9 kg/ha related to the life time (20 years). Culationsfor were made based on a tractor of 3000 kg, with a useful life of 7000 hours and a repair factor of 0.74.
- steel in car shredder residue: -5.14909e-5 kg
  Disposal of wires and anchor after deconstraction of the trellis system. Corresponds to 709.24 kg/ha related to the life time of the trellis system (20 years).
  production volume 1.55973e6 kg
- lead in car shredder residue: -2.94804e-7 kg; source Pierre Fréon 2014
  Waste lead
  production volume 0.0131767 kg
- alkyd paint, white, without solvent, in 60% solution state: 1.33603e-6 kg; source Pierre Fréon 2014; triangular min 1.33603e-6, mostLikely 1.33603e-6, max 1.33603e-6, pedigree (1,3,1,5,1)
  (same comment as for alkyd paint, white, without solvent, in 60% solution state)
- nylon 6-6: 1.50538e-6 kg; source Pierre Fréon 2014; triangular min 1.50538e-6, mostLikely 1.50538e-6, max 1.50538e-6, pedigree (2,3,1,5,1)
  Fishing net maintenance, 10% replacement every 2 years
  Uncertainty: Data from 10 vessels
- waste paint on wood: -4.45343e-7 kg; source Pierre Fréon 2014
  Waste paint, 2/3 of solids emitted to ocean
  production volume 0.0199052 kg
- waste plastic, mixture: -9.59742e-10, -5.24152e-9, -4.97731e-9, -1.64607e-7, -1.3296e-6 kg (5 suppliers, which the file names only by identifier); sum of these -1.50538e-6 kg; source Pierre Fréon 2014
  Waste nylon
  production volume 0.0672851 kg
- shed, large, wood, non-insulated, fire-unprotected: 2.19485e-8 m2; lognormal variance with pedigree 0.0989451, pedigree (3,3,4,5,3)
  (same comment as for shed, large, wood, non-insulated, fire-unprotected)
- wood preservation, pressure vessel, creosote, outdoor use, ground contact: 0.000114626 kg; lognormal variance with pedigree 0.0901383, pedigree (1,3,4,5,2)
  (same comment as for wood preservation, pressure vessel, creosote, outdoor use, ground cont)
- steel in car shredder residue: -5.1491e-5 kg
  (same comment as for steel in car shredder residue)
- heat, district or industrial, other than natural gas: 2.35166e-7, 1.40353e-5, 0.000524569 MJ (3 suppliers, which the file names only by identifier); sum of these 0.000538839 MJ; lognormal variance with pedigree 0.0892491, pedigree (1,3,4,5,2)
  (same comment as for heat, district or industrial, other than natural gas)
- sawlog and veneer log, softwood, measured as solid wood under bark: 4.68636e-9, 1.30922e-8, 9.78965e-7 m3 (3 suppliers, which the file names only by identifier); sum of these 9.96743e-7 m3; lognormal variance with pedigree 0.0907383, pedigree (2,3,4,5,2)
- inert waste, for final disposal: -0.255774 kg; lognormal variance with pedigree 0.0512, pedigree (2,3,5,1,1)
  EcoSpold01Location=CH
  production volume 2.16e7 kg
- gravel, crushed: 0.255774 kg; lognormal variance with pedigree 0.0512, pedigree (2,3,5,1,1)
  EcoSpold01Location=CH
- reinforcing steel: 0.00450451 kg; lognormal variance with pedigree 0.0512, pedigree (2,3,5,1,1)
  EcoSpold01Location=RER
- sand: 0.0142374 kg; lognormal variance with pedigree 0.0512, pedigree (2,3,5,1,1)
  EcoSpold01Location=CH
- pitch: 0.0029819 kg; lognormal variance with pedigree 0.0512, pedigree (2,3,5,1,1)
  EcoSpold01Location=CH
- waste concrete, not reinforced: -0.0247309 kg; lognormal variance with pedigree 0.0512, pedigree (2,3,5,1,1)
  EcoSpold01Location=CH
  production volume 807000 kg
- waste reinforcement steel: -0.000251038 kg; lognormal variance with pedigree 0.0512, pedigree (2,3,5,1,1)
  EcoSpold01Location=CH
  production volume 21200 kg
- glued laminated timber, for outdoor use: 3.29191e-6 m3; lognormal variance with pedigree 0.0512, pedigree (2,3,5,1,1)
  EcoSpold01Location=RER
- waste building wood, chrome preserved: -0.0150413 kg; lognormal variance with pedigree 0.0512, pedigree (2,3,5,1,1)
  EcoSpold01Location=CH
  production volume 125000 kg
- concrete, sole plate and foundation: 4.3458e-6 m3; lognormal variance with pedigree 0.0512, pedigree (2,3,5,1,1)
  EcoSpold01Location=CH
- waste fibreboard: -0.00544475 kg; lognormal variance with pedigree 0.0401, pedigree (1,2,5,1,1)
  Modelled, based on "Agricultural Buildings" - pdf-document on the dedicated talk page of ecoinvent (www.ecoinvent.org/talk-pages)
  EcoSpold01Location=CH
  production volume 36.1 kg
- sawnwood, softwood, dried (u=20%), planed: 9.44447e-5 m3; lognormal variance with pedigree 0.0401, pedigree (1,2,5,1,1)
  Modelled, based on "Agricultural Buildings" - pdf-document on the dedicated talk page of ecoinvent (www.ecoinvent.org/talk-pages)
  EcoSpold01Location=RER
- zinc coat, coils: 0.00014066 m2; lognormal variance with pedigree 0.0401, pedigree (1,2,5,1,1)
  (same comment as for sawnwood, softwood, dried (u=20%), planed)
- excavation, hydraulic digger: 0.000222339 m3; lognormal variance with pedigree 0.0401, pedigree (1,2,5,1,1)
  (same comment as for sawnwood, softwood, dried (u=20%), planed)
- concrete, normal: 0.00013162 m3; lognormal variance with pedigree 0.0401, pedigree (1,2,5,1,1)
  EcoSpold01Location=CH
  Modelled, based on "Agricultural Buildings" - pdf-document on the dedicated talk page of ecoinvent (www.ecoinvent.org/talk-pages)
- extrusion, plastic film: 5.59386e-5 kg; lognormal variance with pedigree 0.0401, pedigree (1,2,5,1,1)
  EcoSpold01Location=RER
  Modelled, based on "Agricultural Buildings" - pdf-document on the dedicated talk page of ecoinvent (www.ecoinvent.org/talk-pages)
- polyethylene, high density, granulate: 6.02021e-5 kg; lognormal variance with pedigree 0.0401, pedigree (1,2,5,1,1)
  (same comment as for sawnwood, softwood, dried (u=20%), planed)
- fibre cement corrugated slab: 0.00131842 kg; lognormal variance with pedigree 0.0401, pedigree (1,2,5,1,1)
  (same comment as for concrete, normal)
- waste wood, untreated: -0.039043 kg; lognormal variance with pedigree 0.0401, pedigree (1,2,5,1,1)
  (same comment as for waste fibreboard)
  production volume 37 kg
- waste reinforced concrete: -0.302111 kg; lognormal variance with pedigree 0.0401, pedigree (1,2,5,1,1)
  (same comment as for waste fibreboard)
  production volume 151 kg
- electricity, low voltage: 0.00118496 kWh; lognormal variance with pedigree 0.0401, pedigree (1,2,5,1,1)
  (same comment as for waste fibreboard)
- lean concrete: 6.58269e-6 m3; lognormal variance with pedigree 0.0401, pedigree (1,2,5,1,1)
  (same comment as for concrete, normal)
- zinc coat, pieces: 5.72184e-5 m2; lognormal variance with pedigree 0.0401, pedigree (1,2,5,1,1)
  (same comment as for extrusion, plastic film)
- fibre cement facing tile: 0.0162609 kg; lognormal variance with pedigree 0.0401, pedigree (1,2,5,1,1)
  (same comment as for concrete, normal)
- waste bulk iron, excluding reinforcement: -0.00351273 kg; lognormal variance with pedigree 0.0401, pedigree (1,2,5,1,1)
  (same comment as for waste fibreboard)
  production volume 5.52 kg
- waste brick: -0.0248317 kg; lognormal variance with pedigree 0.0401, pedigree (1,2,5,1,1)
  (same comment as for concrete, normal)
  production volume 12.2 kg
- sheet rolling, steel: 0.000660864 kg; lognormal variance with pedigree 0.0401, pedigree (1,2,5,1,1)
  (same comment as for extrusion, plastic film)
- aluminium, wrought alloy: 8.29387e-5 kg; lognormal variance with pedigree 0.0401, pedigree (1,2,5,1,1)
  (same comment as for sawnwood, softwood, dried (u=20%), planed)
- excavation, skid-steer loader: 3.82637e-5 m3; lognormal variance with pedigree 0.0401, pedigree (1,2,5,1,1)
  Modelled, based on "Agricultural Buildings" - pdf-document on the dedicated talk page of ecoinvent (www.ecoinvent.org/talk-pages);activityLink introduced to establish a direct link to the corresponding regional supply of this product
  EcoSpold01Location=RER
- gravel, round: 0.161204 kg; lognormal variance with pedigree 0.0401, pedigree (1,2,5,1,1)
  (same comment as for concrete, normal)
- waste polyethylene: -6.1715e-6 kg; lognormal variance with pedigree 0.0381216, pedigree (1,2,3,1,1)
  Corresponds to 154.78kg from the whole building with 50 years life time, 111 m2 usable space and 630 m3 volume.
  production volume 3600 kg
- extrusion, plastic pipes: 6.1715e-6 kg; lognormal variance with pedigree 0.0381216, pedigree (1,2,3,1,1)
  Corresponds to 154.78kg for the whole building with 50 years life time, 111 m2 usable space and 630 m3 volume.
- fibre cement roof slate: 0.00153294 kg; lognormal variance with pedigree 0.0381216, pedigree (1,2,3,1,1)
  Corresponds to 37'638.99kg for the whole building with 50 years life time, 111 m2 usable space and 630 m3 volume.
- cement, Portland: 0.00754541 kg; lognormal variance with pedigree 0.0381216, pedigree (1,2,3,1,1)
  Corresponds to 325'435.35kg for the whole building with 50 years life time, 111 m2 usable space and 630 m3 volume.
- sheet rolling, copper: 0.000142679 kg; lognormal variance with pedigree 0.0381216, pedigree (1,2,3,1,1)
  Corresponds to 3'568.15kg for the whole building with 50 years life time, 111 m2 usable space and 630 m3 volume.
- waste cement in concrete and mortar: -0.0126996 kg; lognormal variance with pedigree 0.0381216, pedigree (1,2,3,1,1)
  Corresponds to 570'928.5kg from the whole building with 50 years life time, 111 m2 usable space and 630 m3 volume.
  production volume 1.33e7 kg
- waste mineral wool: -0.000113304 kg; lognormal variance with pedigree 0.0401, pedigree (1,2,5,1,1)
  (same comment as for concrete, normal)
  production volume 14.3 kg
- polyurethane, rigid foam: 2.46059e-5 kg; lognormal variance with pedigree 0.0401, pedigree (1,2,5,1,1)
  (same comment as for extrusion, plastic film)
- waste polystyrene isolation, flame-retardant: -0.000166592 kg; lognormal variance with pedigree 0.0401, pedigree (1,2,5,1,1)
  (same comment as for concrete, normal)
  production volume 46.1 kg
- glass fibre: 8.15427e-6 kg; lognormal variance with pedigree 0.0401, pedigree (1,2,5,1,1)
  (same comment as for sawnwood, softwood, dried (u=20%), planed)
- kraft paper, unbleached: 3.97904e-6 kg; lognormal variance with pedigree 0.0401, pedigree (1,2,5,1,1)
  (same comment as for extrusion, plastic film)
- glass fibre reinforced plastic, polyester resin, hand lay-up: 5.42141e-5 kg; lognormal variance with pedigree 0.0401, pedigree (1,2,5,1,1)
  (same comment as for extrusion, plastic film)
- waste polyurethane foam: -2.46059e-5 kg; lognormal variance with pedigree 0.0401, pedigree (1,2,5,1,1)
  (same comment as for waste fibreboard)
  production volume 5.43 kg
- epoxy resin, liquid: 2.88138e-6 kg; lognormal variance with pedigree 0.0401, pedigree (1,2,5,1,1)
  (same comment as for extrusion, plastic film)
- steel, chromium steel 18/8, hot rolled: 0.000183517 kg; lognormal variance with pedigree 0.0401, pedigree (1,2,5,1,1)
  (same comment as for extrusion, plastic film)
- waste glass: -8.13314e-6 kg; lognormal variance with pedigree 0.0401, pedigree (1,2,5,1,1)
  (same comment as for waste fibreboard)
  production volume 8.79 kg
- polystyrene foam slab: 2.23883e-5 kg; lognormal variance with pedigree 0.0401, pedigree (1,2,5,1,1)
  (same comment as for sawnwood, softwood, dried (u=20%), planed)
- cement mortar: 0.00133413 kg; lognormal variance with pedigree 0.0401, pedigree (1,2,5,1,1)
  (same comment as for concrete, normal)
- waste bitumen sheet: -5.56434e-6 kg; lognormal variance with pedigree 0.0401, pedigree (1,2,5,1,1)
  (same comment as for waste fibreboard)
  production volume 1.18 kg
- waste bitumen: -0.00153286 kg; lognormal variance with pedigree 0.0401, pedigree (1,2,5,1,1)
  (same comment as for waste fibreboard)
  production volume 1080 kg
- waste glass sheet: -0.000672191 kg; lognormal variance with pedigree 0.0401, pedigree (1,2,5,1,1)
  (same comment as for concrete, normal)
  production volume 238 kg
- sanitary ceramics: 0.000635292 kg; lognormal variance with pedigree 0.0401, pedigree (1,2,5,1,1)
  (same comment as for concrete, normal)
- waste plastic, mixture: -5.42209e-6 kg; lognormal variance with pedigree 0.0401, pedigree (1,2,5,1,1)
  (same comment as for concrete, normal)
  production volume 5.86 kg
- flat glass, uncoated: 3.72312e-5 kg; lognormal variance with pedigree 0.0401, pedigree (1,2,5,1,1)
  (same comment as for extrusion, plastic film)
- clay brick: 0.00541073 kg; lognormal variance with pedigree 0.0401, pedigree (1,2,5,1,1)
  (same comment as for extrusion, plastic film)
- stone wool: 0.000113304 kg; lognormal variance with pedigree 0.0401, pedigree (1,2,5,1,1)
  (same comment as for concrete, normal)
- roof tile: 0.000313207 kg; lognormal variance with pedigree 0.0401, pedigree (1,2,5,1,1)
  (same comment as for extrusion, plastic film)
- calendering, rigid sheets: 3.27418e-6 kg; lognormal variance with pedigree 0.0401, pedigree (1,2,5,1,1)
  (same comment as for extrusion, plastic film)
- waste sealing sheet, polyvinylchloride: -3.27418e-6 kg; lognormal variance with pedigree 0.0401, pedigree (1,2,5,1,1)
  (same comment as for concrete, normal)
  production volume 1.49 kg
- polyvinylchloride, bulk polymerised: 3.27418e-6 kg; lognormal variance with pedigree 0.0401, pedigree (1,2,5,1,1)
  (same comment as for extrusion, plastic film)

## Inputs from nature
- Oxygen [natural resource, in air]: 0 kg; pedigree (1,1,1,1,1)
  Oxygen from ambient air needed to combust and oxidise this waste. Net demand, i.e. without O2 leaving the plant in flue gas uncombusted.
  Uncertainty: uncertainty is calculated from uncertainties in waste composition and transfer coefficients to flue gas and soild residues in incinerator
- Dolomite, in ground [natural resource, in ground]: 1.17396e-12 kg; lognormal variance with pedigree 0.0032, pedigree (1,3,3,1,1)
  Amount and activity link based on primary data collected from participating companies.
- Water, lake [natural resource, in water]: 3.78063e-10 m3; lognormal variance with pedigree 0.0032, pedigree (1,3,3,1,1)
  Amount and activity link based on primary data collected from participating companies.
- Sulfur, in ground [natural resource, in ground]: 3.64128e-9 kg; lognormal variance with pedigree 0.0032, pedigree (1,3,3,1,1)
  Amount and activity link based on primary data collected from participating companies.
- Water, cooling, unspecified natural origin [natural resource, in water]: 2.13622e-9 m3; lognormal variance with pedigree 0.0032, pedigree (1,3,3,1,1)
  Amount and activity link based on primary data collected from participating companies.
- Water, unspecified natural origin [natural resource, in water]: 2.34697e-8 m3; lognormal variance with pedigree 0.0032, pedigree (1,3,3,1,1)
  Amount and activity link based on primary data collected from participating companies.
- Strontium, in ground [natural resource, in ground]: 1.49077e-11 kg; lognormal variance with pedigree 0.0032, pedigree (1,3,3,1,1)
  Amount and activity link based on primary data collected from participating companies.
- Copper, in ground [natural resource, in ground]: 8.55939e-9 kg; lognormal variance with pedigree 0.0032, pedigree (1,3,3,1,1)
  Amount and activity link based on primary data collected from participating companies.
- Aluminium, in ground [natural resource, in ground]: 1.10592e-9 kg; lognormal variance with pedigree 0.0032, pedigree (1,3,3,1,1)
  Amount and activity link based on primary data collected from participating companies.
- Gangue, in ground [natural resource, in ground]: 1.03534e-5 kg; lognormal variance with pedigree 0.0032, pedigree (1,3,3,1,1)
  Amount and activity link based on primary data collected from participating companies.
- Gold, in ground [natural resource, in ground]: 7.11961e-10 kg; lognormal variance with pedigree 0.0032, pedigree (1,3,3,1,1)
  Amount and activity link based on primary data collected from participating companies.
- Vanadium, in ground [natural resource, in ground]: 1.41464e-12 kg; lognormal variance with pedigree 0.0032, pedigree (1,3,3,1,1)
  Amount and activity link based on primary data collected from participating companies.
- Zinc, in ground [natural resource, in ground]: 3.09456e-7 kg; lognormal variance with pedigree 0.0032, pedigree (1,3,3,1,1)
  Amount and activity link based on primary data collected from participating companies.
- Titanium, in ground [natural resource, in ground]: 5.22299e-11 kg; lognormal variance with pedigree 0.0032, pedigree (1,3,3,1,1)
  Amount and activity link based on primary data collected from participating companies.
- Sodium, in ground [natural resource, in ground]: 4.22912e-11 kg; lognormal variance with pedigree 0.0032, pedigree (1,3,3,1,1)
  Amount and activity link based on primary data collected from participating companies.
- Nickel, in ground [natural resource, in ground]: 8.33135e-13 kg; lognormal variance with pedigree 0.0032, pedigree (1,3,3,1,1)
  Amount and activity link based on primary data collected from participating companies.
- Silver, in ground [natural resource, in ground]: 1.1301e-10 kg; lognormal variance with pedigree 0.0032, pedigree (1,3,3,1,1)
  Amount and activity link based on primary data collected from participating companies.
- Potassium, in ground [natural resource, in ground]: 1.38504e-9 kg; lognormal variance with pedigree 0.0032, pedigree (1,3,3,1,1)
  Amount and activity link based on primary data collected from participating companies.
- Manganese, in ground [natural resource, in ground]: 8e-11 kg; lognormal variance with pedigree 0.0032, pedigree (1,3,3,1,1)
  Amount and activity link based on primary data collected from participating companies.
- Magnesium, in ground [natural resource, in ground]: 2.19703e-8 kg; lognormal variance with pedigree 0.0032, pedigree (1,3,3,1,1)
  Amount and activity link based on primary data collected from participating companies.
- Phosphorus, in ground [natural resource, in ground]: 9.45212e-12 kg; lognormal variance with pedigree 0.0032, pedigree (1,3,3,1,1)
  Amount and activity link based on primary data collected from participating companies.
- Iron, in ground [natural resource, in ground]: 1.38715e-9 kg; lognormal variance with pedigree 0.0032, pedigree (1,3,3,1,1)
  Amount and activity link based on primary data collected from participating companies.
- Mercury, in ground [natural resource, in ground]: 1.12706e-14 kg; lognormal variance with pedigree 0.0032, pedigree (1,3,3,1,1)
  Amount and activity link based on primary data collected from participating companies.
- Lead, in ground [natural resource, in ground]: 6.61658e-8 kg; lognormal variance with pedigree 0.0032, pedigree (1,3,3,1,1)
  Amount and activity link based on primary data collected from participating companies.
- Sand, unspecified, in ground [natural resource, in ground]: 5.56033e-11 kg; lognormal variance with pedigree 0.0032, pedigree (1,3,3,1,1)
  Amount and activity link based on primary data collected from participating companies.
- Cadmium, in ground [natural resource, in ground]: 3.63705e-11 kg; lognormal variance with pedigree 0.0032, pedigree (1,3,3,1,1)
  Amount and activity link based on primary data collected from participating companies.
- Calcium, in ground [natural resource, in ground]: 3.84343e-8 kg; lognormal variance with pedigree 0.0032, pedigree (1,3,3,1,1)
  Amount and activity link based on primary data collected from participating companies.
- Barium, in ground [natural resource, in ground]: 5.8785e-12 kg; lognormal variance with pedigree 0.0032, pedigree (1,3,3,1,1)
  Amount and activity link based on primary data collected from participating companies.
- Water, well, in ground [natural resource, in water]: 1.03393e-9 m3; lognormal variance with pedigree 0.0032, pedigree (1,3,3,1,1)
  Amount and activity link based on primary data collected from participating companies.
- Water, river [natural resource, in water]: 4.26895e-11 m3; lognormal variance with pedigree 0.0032, pedigree (1,3,3,1,1)
  Amount and activity link based on primary data collected from participating companies.
- Chromium, in ground [natural resource, in ground]: 1.36601e-12 kg; lognormal variance with pedigree 0.0032, pedigree (1,3,3,1,1)
  Amount and activity link based on primary data collected from participating companies.
- Occupation, industrial area [natural resource, land]: 0.000222618 m2*year; lognormal variance with pedigree 0.0912, pedigree (2,3,5,1,1)
- Occupation, construction site [natural resource, land]: 0.000666824 m2*year; lognormal variance with pedigree 0.0912, pedigree (2,3,5,1,1)
- Transformation, from unspecified [natural resource, land]: 8.88105e-6 m2; lognormal variance with pedigree 0.1712, pedigree (2,3,5,1,1)
- Transformation, to industrial area [natural resource, land]: 8.88105e-6 m2; lognormal variance with pedigree 0.1712, pedigree (2,3,5,1,1)
- Occupation, urban, discontinuously built [natural resource, land]: 0.0291776 m2*year; lognormal variance with pedigree 0.0801, pedigree (1,2,5,1,1)
  Modelled, based on "Agricultural Buildings" - pdf-document on the dedicated talk page of ecoinvent (www.ecoinvent.org/talk-pages)
- Transformation, from pasture, man made [natural resource, land]: 0.000583028 m2; lognormal variance with pedigree 0.1601, pedigree (1,2,5,1,1)
  (same comment as for Occupation, urban, discontinuously built)
- Transformation, to urban, discontinuously built [natural resource, land]: 0.000583028 m2; lognormal variance with pedigree 0.1601, pedigree (1,2,5,1,1)
  (same comment as for Occupation, urban, discontinuously built)
## Emissions to nature
- Thallium [water, ground-, long-term]: 0 kg; pedigree (1,1,1,1,1)
  Long-term emissions from landfilling of incineration residues.
  Uncertainty: uncertainty is calculated from uncertainties in waste composition and transfer coefficients in incinerator and landfills.
- Aluminium [water, surface water]: 2.62621e-14 kg; lognormal variance with pedigree 1.7309, pedigree (1,1,3,1,1)
  Emissions to water from waste composition and transfer coefficients in incinerator and landfills.
  Uncertainty: uncertainty is calculated from uncertainties in waste composition and transfer coefficients in incinerator and landfills
- Manganese [air, urban air close to ground]: 0 kg; pedigree (1,1,1,1,1)
  Emission to air from waste composition and transfer coefficients.
  Uncertainty: uncertainty is calculated from uncertainties in waste composition and transfer coefficients in incinerator
- Silicon [water, ground-, long-term]: 0 kg; pedigree (1,1,1,1,1)
  (same comment as for Thallium)
- Potassium, ion [water, surface water]: 2.82249e-11 kg; lognormal variance with pedigree 0.41047, pedigree (1,1,3,1,1)
  (same comment as for Aluminium)
- Molybdenum [air, urban air close to ground]: 0 kg; pedigree (1,1,1,1,1)
  (same comment as for Manganese)
- Iron, ion [water, ground-, long-term]: 0 kg; pedigree (1,1,1,1,1)
  (same comment as for Thallium)
- Magnesium [water, surface water]: 5.25644e-11 kg; lognormal variance with pedigree 0.7231, pedigree (1,1,3,1,1)
  (same comment as for Aluminium)
- Nickel [air, urban air close to ground]: 0 kg; pedigree (1,1,1,1,1)
  (same comment as for Manganese)
- Calcium, ion [water, ground-, long-term]: 0 kg; pedigree (1,1,1,1,1)
  (same comment as for Thallium)
- Sodium, ion [water, surface water]: 6.84037e-11 kg; lognormal variance with pedigree 0.30331, pedigree (1,1,3,1,1)
  (same comment as for Aluminium)
- Lead [air, urban air close to ground]: 0 kg; pedigree (1,1,1,1,1)
  (same comment as for Manganese)
- Aluminium [water, ground-, long-term]: 0 kg; pedigree (1,1,1,1,1)
  (same comment as for Thallium)
- Chromium, ion [water, surface water]: 0 kg; pedigree (1,1,1,1,1)
  (same comment as for Aluminium)
- Zinc [air, urban air close to ground]: 0 kg; pedigree (1,1,1,1,1)
  (same comment as for Manganese)
- Potassium, ion [water, ground-, long-term]: 0 kg; pedigree (1,1,1,1,1)
  (same comment as for Thallium)
- BOD5, Biological Oxygen Demand [water, ground-, long-term]: 0 kg; pedigree (1,1,1,1,1)
  (same comment as for Thallium)
- Iron [air, urban air close to ground]: 0 kg; pedigree (1,1,1,1,1)
  (same comment as for Manganese)
- Magnesium [water, ground-, long-term]: 0 kg; pedigree (1,1,1,1,1)
  (same comment as for Thallium)
- COD, Chemical Oxygen Demand [water, ground-, long-term]: 0 kg; pedigree (1,1,1,1,1)
  (same comment as for Thallium)
- Calcium [air, urban air close to ground]: 0 kg; pedigree (1,1,1,1,1)
  (same comment as for Manganese)
- Sodium, ion [water, ground-, long-term]: 0 kg; pedigree (1,1,1,1,1)
  (same comment as for Thallium)
- TOC, Total Organic Carbon [water, ground-, long-term]: 0 kg; pedigree (1,1,1,1,1)
  (same comment as for Thallium)
- Aluminium [air, urban air close to ground]: 0 kg; pedigree (1,1,1,1,1)
  (same comment as for Manganese)
- NMVOC, non-methane volatile organic compounds, unspecified origin [air, urban air close to ground]: 0 kg; pedigree (1,1,1,1,1)
  Incomplete combustion product emitted to air.
  Uncertainty: uncertainty calculated from uncertainty in average operation emissions, and the uncertainty of the flue gas volume from this waste.
- Sulfate [water, ground-, long-term]: 0 kg; pedigree (1,1,1,1,1)
  (same comment as for Thallium)
- Potassium [air, urban air close to ground]: 0 kg; pedigree (1,1,1,1,1)
  (same comment as for Manganese)
- Particulates, < 2.5 um [air, urban air close to ground]: 0 kg; pedigree (1,1,1,1,1)
  (same comment as for NMVOC, non-methane volatile organic compounds, unspecified origin)
- DOC, Dissolved Organic Carbon [water, ground-, long-term]: 0 kg; pedigree (1,1,1,1,1)
  (same comment as for Thallium)
- Magnesium [air, urban air close to ground]: 0 kg; pedigree (1,1,1,1,1)
  (same comment as for Manganese)
- Particulates, > 2.5 um, and < 10um [air, urban air close to ground]: 0 kg; pedigree (1,1,1,1,1)
  (same comment as for NMVOC, non-methane volatile organic compounds, unspecified origin)
- Nitrate [water, ground-, long-term]: 0 kg; pedigree (1,1,1,1,1)
  (same comment as for Thallium)
- TOC, Total Organic Carbon [water, surface water]: 9.92534e-14 kg; lognormal variance with pedigree 0.034484, pedigree (1,1,3,1,1)
  (same comment as for Aluminium)
- Dioxins, measured as 2,3,7,8-tetrachlorodibenzo-p-dioxin [air, urban air close to ground]: 0 kg; pedigree (1,1,1,1,1)
  (same comment as for NMVOC, non-methane volatile organic compounds, unspecified origin)
- Phosphate [water, ground-, long-term]: 0 kg; pedigree (1,1,1,1,1)
  (same comment as for Thallium)
- Sodium [air, urban air close to ground]: 0 kg; pedigree (1,1,1,1,1)
  (same comment as for Manganese)
- Benzene [air, urban air close to ground]: 0 kg; pedigree (1,1,1,1,1)
  (same comment as for NMVOC, non-methane volatile organic compounds, unspecified origin)
- Boron [water, ground-, long-term]: 0 kg; pedigree (1,1,1,1,1)
  (same comment as for Thallium)
- BOD5, Biological Oxygen Demand [water, surface water]: 5.73299e-13 kg; lognormal variance with pedigree 0.035355, pedigree (1,1,3,1,1)
  (same comment as for Aluminium)
- Toluene [air, urban air close to ground]: 0 kg; pedigree (1,1,1,1,1)
  (same comment as for NMVOC, non-methane volatile organic compounds, unspecified origin)
- Chloride [water, ground-, long-term]: 0 kg; pedigree (1,1,1,1,1)
  (same comment as for Thallium)
- COD, Chemical Oxygen Demand [water, surface water]: 3.72991e-12 kg; lognormal variance with pedigree 0.034403, pedigree (1,1,3,1,1)
  (same comment as for Aluminium)
- Benzene, pentachloro- [air, urban air close to ground]: 0 kg; pedigree (1,1,1,1,1)
  (same comment as for NMVOC, non-methane volatile organic compounds, unspecified origin)
- Fluoride [water, ground-, long-term]: 0 kg; pedigree (1,1,1,1,1)
  (same comment as for Thallium)
- Sulfate [water, surface water]: 2.16733e-9 kg; lognormal variance with pedigree 0.45319, pedigree (1,1,3,1,1)
  (same comment as for Aluminium)
- Benzene, hexachloro- [air, urban air close to ground]: 0 kg; pedigree (1,1,1,1,1)
  (same comment as for NMVOC, non-methane volatile organic compounds, unspecified origin)
- DOC, Dissolved Organic Carbon [water, surface water]: 9.92534e-14 kg; lognormal variance with pedigree 0.034484, pedigree (1,1,3,1,1)
  (same comment as for Aluminium)
- Phenol, pentachloro- [air, urban air close to ground]: 0 kg; pedigree (1,1,1,1,1)
  (same comment as for NMVOC, non-methane volatile organic compounds, unspecified origin)
- Phosphate [water, surface water]: 0 kg; pedigree (1,1,1,1,1)
  (same comment as for Aluminium)
- Benzo(a)pyrene [air, urban air close to ground]: 0 kg; pedigree (1,1,1,1,1)
  (same comment as for NMVOC, non-methane volatile organic compounds, unspecified origin)
- Nitrate [water, surface water]: 6.68214e-11 kg; lognormal variance with pedigree 0.44657, pedigree (1,1,3,1,1)
  (same comment as for Aluminium)
- Heat, waste [air, urban air close to ground]: 0 MJ; pedigree (1,1,1,1,1)
  Waste heat generated from heating value of this waste plus any electricity required to process it.
  Uncertainty: uncertainty is calculated from uncertainties in waste composition and uncertainties in energy efficiency and the uncertainty in internal energy demand
- Boron [water, surface water]: 0 kg; pedigree (1,1,1,1,1)
  (same comment as for Aluminium)
- Heat, waste [water, surface water]: 0 MJ; pedigree (1,1,1,1,1)
  (same comment as for Heat, waste)
- Chloride [water, surface water]: 1.05656e-11 kg; lognormal variance with pedigree 0.33861, pedigree (1,1,3,1,1)
  (same comment as for Aluminium)
- Water [water, surface water]: 8.43983e-11 m3; lognormal variance with pedigree 1.1748, pedigree (1,1,3,1,1)
  Process water released to surface water.
  Uncertainty: uncertainty calculated from uncertainty in process water input and the uncertainty of fraction to surface water.
- Fluoride [water, surface water]: 9.71059e-13 kg; lognormal variance with pedigree 0.78094, pedigree (1,1,3,1,1)
  (same comment as for Aluminium)
- Water [air, urban air close to ground]: 0 m3; pedigree (1,1,1,1,1)
  Water vapour from waste humidity, hydrogen oxidation and part of the process water.
  Uncertainty: Uncertainty calculated from uncertainty in waste composition, process water input and the uncertainty of fraction to air.
- Arsenic, ion [water, surface water]: 1.29523e-11 kg; lognormal variance with pedigree 1.5591, pedigree (1,1,3,1,1)
  (same comment as for Aluminium)
- Cobalt [water, surface water]: 0 kg; pedigree (1,1,1,1,1)
  (same comment as for Aluminium)
- Carbon monoxide, non-fossil [air, urban air close to ground]: 0 kg; pedigree (1,1,1,1,1)
  (same comment as for NMVOC, non-methane volatile organic compounds, unspecified origin)
- Cadmium, ion [water, surface water]: 1.12319e-12 kg; lognormal variance with pedigree 1.6665, pedigree (1,1,3,1,1)
  (same comment as for Aluminium)
- Carbon dioxide, non-fossil [air, urban air close to ground]: 0 kg; pedigree (1,1,1,1,1)
  (same comment as for Manganese)
- Chromium VI [water, surface water]: 5.8586e-11 kg; lognormal variance with pedigree 0.76052, pedigree (1,1,3,1,1)
  (same comment as for Aluminium)
- Methane, non-fossil [air, urban air close to ground]: 0 kg; pedigree (1,1,1,1,1)
  (same comment as for NMVOC, non-methane volatile organic compounds, unspecified origin)
- Arsenic, ion [water, ground-, long-term]: 0 kg; pedigree (1,1,1,1,1)
  (same comment as for Thallium)
- Copper, ion [water, surface water]: 4.69249e-12 kg; lognormal variance with pedigree 0.98078, pedigree (1,1,3,1,1)
  (same comment as for Aluminium)
- Sulfur dioxide [air, urban air close to ground]: 0 kg; pedigree (1,1,1,1,1)
  (same comment as for Manganese)
- Cadmium, ion [water, ground-, long-term]: 0 kg; pedigree (1,1,1,1,1)
  (same comment as for Thallium)
- Mercury [water, surface water]: 7.31328e-14 kg; lognormal variance with pedigree 1.8851, pedigree (1,1,3,1,1)
  (same comment as for Aluminium)
- Nitrogen oxides [air, urban air close to ground]: 0 kg; pedigree (1,1,1,1,1)
  Sum of fuel-Nox and thermal-NOx emitted to air after DeNOx stage.
  Uncertainty: uncertainty calculated from uncertainty in average N-emissions and uncertainty in the share of thermal NOx and the uncertainty in nitrogen content in *this* waste.
- Cobalt [water, ground-, long-term]: 0 kg; pedigree (1,1,1,1,1)
  (same comment as for Thallium)
- Manganese [water, surface water]: 7.7009e-12 kg; lognormal variance with pedigree 1.0714, pedigree (1,1,3,1,1)
  (same comment as for Aluminium)
- Ammonia [air, urban air close to ground]: 0 kg; pedigree (1,1,1,1,1)
  Nitrogen species emitted to air after DeNOx stage.
  Uncertainty: uncertainty calculated from uncertainty in average N-emissions and uncertainty in the share of thermal NOx and the uncertainty in nitrogen content in *this* waste.
- Chromium VI [water, ground-, long-term]: 0 kg; pedigree (1,1,1,1,1)
  (same comment as for Thallium)
- Nickel, ion [water, surface water]: 1.41924e-13 kg; lognormal variance with pedigree 2.219, pedigree (1,1,3,1,1)
  (same comment as for Aluminium)
- Dinitrogen monoxide [air, urban air close to ground]: 0 kg; pedigree (1,1,1,1,1)
  (same comment as for Ammonia)
- Copper, ion [water, ground-, long-term]: 0 kg; pedigree (1,1,1,1,1)
  (same comment as for Thallium)
- Molybdenum [water, surface water]: 0 kg; pedigree (1,1,1,1,1)
  (same comment as for Aluminium)
- Cyanide [air, urban air close to ground]: 0 kg; pedigree (1,1,1,1,1)
  (same comment as for Ammonia)
- Mercury [water, ground-, long-term]: 0 kg; pedigree (1,1,1,1,1)
  (same comment as for Thallium)
- Lead [water, surface water]: 1.50287e-12 kg; lognormal variance with pedigree 0.93033, pedigree (1,1,3,1,1)
  (same comment as for Aluminium)
- Phosphorus [air, urban air close to ground]: 0 kg; pedigree (1,1,1,1,1)
  (same comment as for Manganese)
- Manganese [water, ground-, long-term]: 0 kg; pedigree (1,1,1,1,1)
  (same comment as for Thallium)
- Antimony [water, surface water]: 4.53577e-14 kg; lognormal variance with pedigree 0.031563, pedigree (1,1,3,1,1)
  (same comment as for Aluminium)
- Hydrogen chloride [air, urban air close to ground]: 0 kg; pedigree (1,1,1,1,1)
  (same comment as for Manganese)
- Molybdenum [water, ground-, long-term]: 0 kg; pedigree (1,1,1,1,1)
  (same comment as for Thallium)
- Tin, ion [water, surface water]: 0 kg; pedigree (1,1,1,1,1)
  (same comment as for Aluminium)
- Hydrogen fluoride [air, urban air close to ground]: 0 kg; pedigree (1,1,1,1,1)
  (same comment as for Manganese)
- Nickel, ion [water, ground-, long-term]: 0 kg; pedigree (1,1,1,1,1)
  (same comment as for Thallium)
- Vanadium, ion [water, surface water]: 0 kg; pedigree (1,1,1,1,1)
  (same comment as for Aluminium)
- Arsenic [air, urban air close to ground]: 0 kg; pedigree (1,1,1,1,1)
  (same comment as for Manganese)
- Lead [water, ground-, long-term]: 0 kg; pedigree (1,1,1,1,1)
  (same comment as for Thallium)
- Zinc, ion [water, surface water]: 2.21267e-10 kg; lognormal variance with pedigree 0.99094, pedigree (1,1,3,1,1)
  (same comment as for Aluminium)
- Cadmium [air, urban air close to ground]: 0 kg; pedigree (1,1,1,1,1)
  (same comment as for Manganese)
- Antimony [water, ground-, long-term]: 0 kg; pedigree (1,1,1,1,1)
  (same comment as for Thallium)
- Thallium [water, surface water]: 0 kg; pedigree (1,1,1,1,1)
  (same comment as for Aluminium)
- Cobalt [air, urban air close to ground]: 0 kg; pedigree (1,1,1,1,1)
  (same comment as for Manganese)
- Tin, ion [water, ground-, long-term]: 0 kg; pedigree (1,1,1,1,1)
  (same comment as for Thallium)
- Silicon [water, surface water]: 0 kg; pedigree (1,1,1,1,1)
  (same comment as for Aluminium)
- Chromium [air, urban air close to ground]: 0 kg; pedigree (1,1,1,1,1)
  (same comment as for Manganese)
- Vanadium, ion [water, ground-, long-term]: 0 kg; pedigree (1,1,1,1,1)
  (same comment as for Thallium)
- Iron, ion [water, surface water]: 6.44201e-11 kg; lognormal variance with pedigree 1.4298, pedigree (1,1,3,1,1)
  (same comment as for Aluminium)
- Copper [air, urban air close to ground]: 0 kg; pedigree (1,1,1,1,1)
  (same comment as for Manganese)
- Zinc, ion [water, ground-, long-term]: 0 kg; pedigree (1,1,1,1,1)
  (same comment as for Thallium)
- Calcium, ion [water, surface water]: 7.60225e-10 kg; lognormal variance with pedigree 0.40681, pedigree (1,1,3,1,1)
  (same comment as for Aluminium)
- Mercury [air, urban air close to ground]: 0 kg; pedigree (1,1,1,1,1)
  (same comment as for Manganese)
- Water [water, unspecified]: 2.53773e-8 m3
- Water [air, unspecified]: 1.09998e-7 m3
- Solids, inorganic [water, ocean]: 6.56106e-6 kg; source Avadí, A. 2018
  Waste paint, 2/3 of solids emitted to ocean
- Lead [soil, industrial]: 1.04269e-14 kg; lognormal variance with pedigree 0.0426, pedigree (1,3,3,1,1)
  Amount and activity link based on primary data collected from participating companies.
- Sulfur dioxide [air, unspecified]: 4.16545e-11 kg; lognormal variance with pedigree 0.0032, pedigree (1,3,3,1,1)
  Amount and activity link based on primary data collected from participating companies.
- Ammonia [air, unspecified]: 6.54007e-13 kg; lognormal variance with pedigree 0.0426, pedigree (1,3,3,1,1)
  Amount and activity link based on primary data collected from participating companies.
- Hydrogen chloride [air, unspecified]: 1.06579e-13 kg; lognormal variance with pedigree 0.0426, pedigree (1,3,3,1,1)
  Amount and activity link based on primary data collected from participating companies.
- Suspended solids, unspecified [water, ocean]: 7.4541e-11 kg; lognormal variance with pedigree 0.0426, pedigree (1,3,3,1,1)
  Amount and activity link based on primary data collected from participating companies.
- Ammonium, ion [water, surface water]: 1.65367e-12 kg; lognormal variance with pedigree 0.0426, pedigree (1,3,3,1,1)
  Amount and activity link based on primary data collected from participating companies.
- Hydrocarbons, unspecified [soil, unspecified]: 3.39962e-13 kg; lognormal variance with pedigree 0.0426, pedigree (1,3,3,1,1)
  Amount and activity link based on primary data collected from participating companies.
- Selenium [air, unspecified]: 1.64942e-14 kg; lognormal variance with pedigree 0.6526, pedigree (1,3,3,1,1)
  Amount and activity link based on primary data collected from participating companies.
- Fluoride [soil, industrial]: 6.83245e-13 kg; lognormal variance with pedigree 0.0426, pedigree (1,3,3,1,1)
  Amount and activity link based on primary data collected from participating companies.
- Sodium [soil, industrial]: 0 kg; pedigree (1,1,1,1,1)
  Amount and activity link based on primary data collected from participating companies.
- Benzene [air, unspecified]: 5.32896e-13 kg; lognormal variance with pedigree 0.0426, pedigree (1,3,3,1,1)
  Amount and activity link based on primary data collected from participating companies.
- Lead [air, unspecified]: 3.03046e-11 kg; lognormal variance with pedigree 0.6526, pedigree (1,3,3,1,1)
  Amount and activity link based on primary data collected from participating companies.
- Sulfate [soil, unspecified]: 7.28436e-15 kg; lognormal variance with pedigree 0.0426, pedigree (1,3,3,1,1)
  Amount and activity link based on primary data collected from participating companies.
- Fluorine [air, unspecified]: 1.22628e-12 kg; lognormal variance with pedigree 0.0426, pedigree (1,3,3,1,1)
  Amount and activity link based on primary data collected from participating companies.
- Zinc [soil, industrial]: 2.99252e-12 kg; lognormal variance with pedigree 0.0426, pedigree (1,3,3,1,1)
  Amount and activity link based on primary data collected from participating companies.
- Arsenic, ion [water, ocean]: 0 kg; pedigree (1,1,1,1,1)
  Amount and activity link based on primary data collected from participating companies.
- Dissolved solids [water, surface water]: 2.35516e-9 kg; lognormal variance with pedigree 0.0426, pedigree (1,3,3,1,1)
  Amount and activity link based on primary data collected from participating companies.
- Zinc, ion [water, ocean]: 2.75402e-12 kg; lognormal variance with pedigree 0.6526, pedigree (1,3,3,1,1)
  Amount and activity link based on primary data collected from participating companies.
- Selenium [water, surface water]: 1.90159e-15 kg; lognormal variance with pedigree 0.6526, pedigree (1,3,3,1,1)
  Amount and activity link based on primary data collected from participating companies.
- Antimony [air, unspecified]: 1.89526e-13 kg; lognormal variance with pedigree 0.6526, pedigree (1,3,3,1,1)
  Amount and activity link based on primary data collected from participating companies.
- Fluoride [water, ocean]: 4.80674e-14 kg; lognormal variance with pedigree 0.0426, pedigree (1,3,3,1,1)
  Amount and activity link based on primary data collected from participating companies.
- Particulates, < 2.5 um [air, unspecified]: 6.78566e-12 kg; lognormal variance with pedigree 0.3026, pedigree (1,3,3,1,1)
  Amount and activity link based on primary data collected from participating companies.
- Particulates, > 2.5 um, and < 10um [air, unspecified]: 1.51957e-10 kg; lognormal variance with pedigree 0.1226, pedigree (1,3,3,1,1)
  Amount and activity link based on primary data collected from participating companies.
- Aldehydes, unspecified [air, unspecified]: 3.05357e-14 kg; lognormal variance with pedigree 0.0426, pedigree (1,3,3,1,1)
  Amount and activity link based on primary data collected from participating companies.
- Formaldehyde [air, unspecified]: 2.30114e-12 kg; lognormal variance with pedigree 0.0426, pedigree (1,3,3,1,1)
  Amount and activity link based on primary data collected from participating companies.
- Phosphorus [water, surface water]: 6.69313e-13 kg; lognormal variance with pedigree 0.0426, pedigree (1,3,3,1,1)
  Amount and activity link based on primary data collected from participating companies.
- Dioxins, measured as 2,3,7,8-tetrachlorodibenzo-p-dioxin [air, unspecified]: 0 kg; pedigree (1,1,1,1,1)
  Amount and activity link based on primary data collected from participating companies.
- Cyanide [water, surface water]: 2.05813e-14 kg; lognormal variance with pedigree 0.0426, pedigree (1,3,3,1,1)
  Amount and activity link based on primary data collected from participating companies.
- Particulates, > 10 um [air, unspecified]: 5.54005e-10 kg; lognormal variance with pedigree 0.0426, pedigree (1,3,3,1,1)
  Amount and activity link based on primary data collected from participating companies.
- COD, Chemical Oxygen Demand [water, ocean]: 3.91831e-15 kg; source Weidema B P 2013; lognormal variance with pedigree 0.25, pedigree (5,5,5,5,5)
  Calculated value. The amount of COD is assumed to be five times that of BOD5, based on the estimates provided in section 5.9.7 of Weidema et al. (2013).
- Copper, ion [water, ocean]: 0 kg; pedigree (1,1,1,1,1)
  Amount and activity link based on primary data collected from participating companies.
- Nitrogen oxides [air, unspecified]: 6.59223e-10 kg; lognormal variance with pedigree 0.0426, pedigree (1,3,3,1,1)
  Amount and activity link based on primary data collected from participating companies.
- Cobalt [air, unspecified]: 4.06586e-13 kg; lognormal variance with pedigree 0.6526, pedigree (1,3,3,1,1)
  Amount and activity link based on primary data collected from participating companies.
- Nitrogen, organic bound [water, surface water]: 1.05656e-11 kg; lognormal variance with pedigree 0.0426, pedigree (1,3,3,1,1)
  Amount and activity link based on primary data collected from participating companies.
- DOC, Dissolved Organic Carbon [water, ocean]: 1.45123e-15 kg; lognormal variance with pedigree 0.25, pedigree (5,5,5,5,5)
  Calculated value. The amount of DOC is assumed to be equal to the amount of TOC
- Nitrogen [water, surface water]: 5.31932e-12 kg; lognormal variance with pedigree 0.0426, pedigree (1,3,3,1,1)
  Amount and activity link based on primary data collected from participating companies.
- TOC, Total Organic Carbon [water, ocean]: 1.45123e-15 kg; source Weidema B P 2013; lognormal variance with pedigree 0.25, pedigree (5,5,5,5,5)
  Calculated value. The relation between COD and TOC is assumed to be COD (g O2) = 2.7*TOC (g C), based on the estimates provided in section 5.9.7 of Weidema et al. (2013).
- Chromium [soil, industrial]: 0 kg; pedigree (1,1,1,1,1)
  Amount and activity link based on primary data collected from participating companies.
- Nitric acid [soil, industrial]: 2.27949e-14 kg; lognormal variance with pedigree 0.0426, pedigree (1,3,3,1,1)
  Amount and activity link based on primary data collected from participating companies.
- NMVOC, non-methane volatile organic compounds, unspecified origin [air, unspecified]: 3.04535e-11 kg; lognormal variance with pedigree 0.0426, pedigree (1,3,3,1,1)
  Amount and activity link based on primary data collected from participating companies.
- Copper [soil, industrial]: 1.1585e-12 kg; lognormal variance with pedigree 0.0426, pedigree (1,3,3,1,1)
  Amount and activity link based on primary data collected from participating companies.
- PAH, polycyclic aromatic hydrocarbons [air, unspecified]: 0 kg; pedigree (1,1,1,1,1)
  Amount and activity link based on primary data collected from participating companies.
- Chromium VI [air, unspecified]: 4.69585e-15 kg; lognormal variance with pedigree 0.6526, pedigree (1,3,3,1,1)
  Amount and activity link based on primary data collected from participating companies.
- Nickel [soil, industrial]: 4.4696e-15 kg; lognormal variance with pedigree 0.0426, pedigree (1,3,3,1,1)
  Amount and activity link based on primary data collected from participating companies.
- Chromium [air, unspecified]: 5.70397e-14 kg; lognormal variance with pedigree 0.6526, pedigree (1,3,3,1,1)
  Amount and activity link based on primary data collected from participating companies.
- Nitrogen [soil, industrial]: 8.66599e-13 kg; lognormal variance with pedigree 0.0426, pedigree (1,3,3,1,1)
  Amount and activity link based on primary data collected from participating companies.
- Copper [air, unspecified]: 3.21373e-11 kg; lognormal variance with pedigree 0.6526, pedigree (1,3,3,1,1)
  Amount and activity link based on primary data collected from participating companies.
- Nickel [air, unspecified]: 3.2159e-13 kg; lognormal variance with pedigree 0.6526, pedigree (1,3,3,1,1)
  Amount and activity link based on primary data collected from participating companies.
- Ammonia [soil, industrial]: 2.81812e-13 kg; lognormal variance with pedigree 0.0426, pedigree (1,3,3,1,1)
  Amount and activity link based on primary data collected from participating companies.
- Carbon dioxide, non-fossil [air, unspecified]: 9.01081e-10 kg; lognormal variance with pedigree 0.0032, pedigree (1,3,3,1,1)
  Amount and activity link based on primary data collected from participating companies.
- Chlorine [water, surface water]: 3.38589e-11 kg; lognormal variance with pedigree 0.0426, pedigree (1,3,3,1,1)
  Amount and activity link based on primary data collected from participating companies.
- Nickel, ion [water, ocean]: 0 kg; pedigree (1,1,1,1,1)
  Amount and activity link based on primary data collected from participating companies.
- Carbon monoxide, fossil [air, unspecified]: 1.22358e-10 kg; lognormal variance with pedigree 0.6526, pedigree (1,3,3,1,1)
  Amount and activity link based on primary data collected from participating companies.
- Methane, fossil [air, unspecified]: 3.55638e-12 kg; lognormal variance with pedigree 0.0426, pedigree (1,3,3,1,1)
  Amount and activity link based on primary data collected from participating companies.
- Methanol [air, unspecified]: 1.3845e-11 kg; lognormal variance with pedigree 0.0426, pedigree (1,3,3,1,1)
  Amount and activity link based on primary data collected from participating companies.
- Mercury [air, unspecified]: 1.79271e-14 kg; lognormal variance with pedigree 0.6526, pedigree (1,3,3,1,1)
  Amount and activity link based on primary data collected from participating companies.
- Calcium [soil, industrial]: 1.28532e-14 kg; lognormal variance with pedigree 0.0426, pedigree (1,3,3,1,1)
  Amount and activity link based on primary data collected from participating companies.
- Mercury [soil, industrial]: 0 kg; pedigree (1,1,1,1,1)
  Amount and activity link based on primary data collected from participating companies.
- Beryllium [air, unspecified]: 1.25587e-14 kg; lognormal variance with pedigree 0.0426, pedigree (1,3,3,1,1)
  Amount and activity link based on primary data collected from participating companies.
- Manganese [soil, industrial]: 6.4664e-13 kg; lognormal variance with pedigree 0.0426, pedigree (1,3,3,1,1)
  Amount and activity link based on primary data collected from participating companies.
- Cadmium [air, unspecified]: 3.1405e-13 kg; lognormal variance with pedigree 0.6526, pedigree (1,3,3,1,1)
  Amount and activity link based on primary data collected from participating companies.
- Manganese [water, ocean]: 5.18678e-15 kg; lognormal variance with pedigree 0.6526, pedigree (1,3,3,1,1)
  Amount and activity link based on primary data collected from participating companies.
- BOD5, Biological Oxygen Demand [water, ocean]: 0 kg; pedigree (1,1,1,1,1)
  Amount and activity link based on primary data collected from participating companies.
- Mercury [water, ocean]: 0 kg; pedigree (1,1,1,1,1)
  Amount and activity link based on primary data collected from participating companies.
- Carbon dioxide, fossil [air, unspecified]: 6.19001e-8 kg; lognormal variance with pedigree 0.0032, pedigree (1,3,3,1,1)
  Amount and activity link based on primary data collected from participating companies. Accounts for on-site combustion of diesel at mine. Some companies provided emissions on the combustion of natural gas, diesel, propane, or other fuels, which are included here. If no emissions were provided for these other fuels then input is reflected as a an input of heat instead of a direct fuel input.
- Cadmium [soil, industrial]: 4.47493e-15 kg; lognormal variance with pedigree 0.0426, pedigree (1,3,3,1,1)
  Amount and activity link based on primary data collected from participating companies.
- Manganese [air, unspecified]: 2.18357e-12 kg; lognormal variance with pedigree 0.6526, pedigree (1,3,3,1,1)
  Amount and activity link based on primary data collected from participating companies.
- Arsenic [soil, industrial]: 1.24226e-15 kg; lognormal variance with pedigree 0.0426, pedigree (1,3,3,1,1)
  Amount and activity link based on primary data collected from participating companies.
- VOC, volatile organic compounds, unspecified origin [air, unspecified]: 1.47117e-12 kg; lognormal variance with pedigree 0.0426, pedigree (1,3,3,1,1)
  Amount and activity link based on primary data collected from participating companies.
- Cadmium, ion [water, ocean]: 2.43822e-14 kg; lognormal variance with pedigree 0.6526, pedigree (1,3,3,1,1)
  Amount and activity link based on primary data collected from participating companies.
- Lead [water, ocean]: 4.98539e-13 kg; lognormal variance with pedigree 0.6526, pedigree (1,3,3,1,1)
  Amount and activity link based on primary data collected from participating companies.
- Suspended solids, unspecified [water, surface water]: 1.27396e-10 kg; lognormal variance with pedigree 0.0426, pedigree (1,3,3,1,1)
  Amount and activity link based on primary data collected from participating companies.
- Benzo(a)pyrene [air, unspecified]: 0 kg; pedigree (1,1,1,1,1)
  Amount and activity link based on primary data collected from participating companies.
- Hydrogen fluoride [air, unspecified]: 8.19642e-14 kg; lognormal variance with pedigree 0.0426, pedigree (1,3,3,1,1)
  Amount and activity link based on primary data collected from participating companies.
- Sulfur oxides [air, unspecified]: 1.00361e-12 kg; lognormal variance with pedigree 0.0426, pedigree (1,3,3,1,1)
  Amount and activity link based on primary data collected from participating companies.
- Zinc [air, unspecified]: 2.99868e-11 kg; lognormal variance with pedigree 0.6526, pedigree (1,3,3,1,1)
  Amount and activity link based on primary data collected from participating companies.
- Arsenic [air, unspecified]: 1.66625e-12 kg; lognormal variance with pedigree 0.6526, pedigree (1,3,3,1,1)
  Amount and activity link based on primary data collected from participating companies.
- Oils, unspecified [soil, unspecified]: 3.43045e-7 kg; lognormal variance with pedigree 0.0186, pedigree (4,5,3,1,1)
  Estimated value.
- Heat, waste [air, non-urban air or from high stacks]: 0.00202514 MJ; lognormal variance with pedigree 0.0872491, pedigree (1,3,4,1,2)
  Heat used from tar impragnation of wooden poles. Corresponds to 213 MJ/ha related to the life time (20 years)
