# electricity production, natural gas, combined cycle power plant

Dataset: EcoSpold 2, unit process
Geography: PE
Time period: 2012-01-01 to 2019-12-31
Technology level: current
Classification: ISIC rev.4 ecoinvent: 3510:Electric power generation, transmission and distribution
Classification: EcoSpold01Categories: natural gas/power plants
Synonyms: CCGT; GuD; GCC; CCPP
Tags: natural gas power; fossil fuels
Scenario: Business-as-Usual
System model: Allocation at the point of substitution
Generated by: Alfredo Pro Castaneyra
Published in: Suppen, N. 2017
Database: ecoinvent
isCopyrightProtected: true
accessRestrictedTo: 1

## General comment
This dataset represents the production of high voltage electricity in a natural gas, combined cycle power plant without CHP in Peru. This dataset is based on the dataset "electricity production, natural gas, combined cycle power plant, GLO" (accessed November 2017) and adapted using regional data. The regional data was obtained from power plants that represent 100% of the natural gas combined cycle, electricity production in Peru in 2014. These four power plants are Ventanilla, Chilca, Kallpa and Fenix Power GN CC. The production of combined cycle natural gas power plants in Peru represents 39.8 % of total production in the country. Data was obtained from the Committee of Economic Operations of the National Interconnected System (COES), the national peruvian entity that regulates the dispatch and generation of energy from the electricity sector. The COES publishes the statistics of operations of the National Interconnected System (SEIN) in an annual basis. In addition, public access information was requested from the General Directorate of Environmental Energy Affairs (DGAAE) of the Ministry of Energy and Mines on Environmental Impact Studies (EIA) of the plants in operation in 2014; as well as, the Environmental Monitoring Reports (IMA) presented by the power plants quarterly, the reports and studies were obtained for Kalpa, Ventanilla, and Chilca. Following the OSINERGMIN, supervisory body for energy and mining investment (OSINERGMIN, 2015) and aspects of the peruvian natural gas as described in MINEM,2017, the natural gas emissions were calculated considering US Evironmental Protection Agency emission factors, the emissions of NOx, CO, CO2, SO2, were estimated using these factors. Organic compound emissions are estimated on the basis of EPA 1998 (as reported in dataset, "electricity production, natural gas, combined cycle power plant, PE, 2008-2008" (accessed November 2017).
In a combined cycle power plant, a gas turbine is followed by a steam turbine. The dataset refers to a combined cycle power plant of 400MWe class with a gas turbine 260MWe and a steam turbine 140MWe.
Sources:
['text', '-\tEPA 1998. US Environmental Protection Agency (1998). Compilation of Air Pollutant Emission Factors, AP-42, Fifth Edition, Volume I: Chapter 1: External Combustion Sources, Natural Gas Combustion - Final Section - Supplement D , July 1998. CHIEF (Clearinghouse for Inventories and Emission Factors). Research Triangle Park, North Carolina. http://www.epa.gov/ttn/chief/ap42/.']
MINEM, 2014. Ministerio de Energía y Minas (2014). Anuario Ejecutivo de Electricidad 2014. Dirección General de Electricidad. Retrieved online from http://www.minem.gob.pe/_estadisticaSector.php?idSector=6, 24 august 2017.
COES, 2014. Sub Dirección de Gestión de la Información. RA-SGI-0115. ESTADISTICA RELEVANTE DEL SISTEMA ELÉCTRICO INTERCONECTADO NACIONAL, (2014). Cap. 06 PRODUCCIÓN TERMOELÉCTRICA Y CONSUMO DE COMBUSTIBLE. Retrieved online from http://www.coes.org.pe/Portal/Publicaciones/Estadisticas/ 2014/PDF/06_PRODUCCION TERMOELECTRICA Y CONSUMO DE COMBUSTIBLE, CUADRO N° 6.3 CONSUMO DE COMBUSTIBLE EN LAS CENTRALES TERMOELÉCTRICAS 2014,CUADRO N° 6.2 RENDIMIENTO PROMEDIO ANUAL - 2014. November 14, 2017.
MINEM, 2017. Ministerio de Energía y Minas (20147).Preguntas Frecuentes en Relación al Gas Natural en el Perú http://www.minem.gob.pe/minem/archivos/gasnatural.pdf. Retrieved online 24 august 2017.
OSINERGMIN, 2015. Oganismo Supervisor de la Energía y Mineria. La industria de los hidrocarburos líquidos en el Perú: 20 años de aporte al desarrollo del país (2015 )http://www.osinergmin.gob.pe/seccion/centro_documental/Institucional/Estudios_Economicos/Libros/anexo-industria-hidrocarburos-liquidos-Peru.pdf. Retrieved online 24 august 2017.
EPA, 1998. US Environmental Protection Agency (1998). AP 42 -Compilation of Air Pollutant Emission Factors, Volume 1: Stationary Point and Area Sources Compilation of Air Pollutant Emission Factors, AP-42, AP 42, Fifth Edition. Natural Gas Combustion
Final Section - Supplement D , July 1998. https://www3.epa.gov/ttn/chief/ap42/ch01/index.html. Retrieved online 24 august 2017.
The split of the natural gas power plants by technology was performed using the data reported by (COES, 2014).
Technology “Turbina a Gas” = Natural gas, conventional
Technology “CC TG-TV” = Natural gas, combined cycle

Source: Estadisticas Anuales 2014 02_Estadistica 02_EXCEL 06_PRODUCCIÓN TERMOELECTRICA Y CONSUMO DE COMBUSTIBLE DEL SEIN, CUADRO N° 6.8 _COSTOS VARIABLES DE LAS CENTRALES TERMOELÉCTRICAS DEL COES.xlsx URL: http://www.coes.org.pe/Portal/Publicaciones/Estadisticas/ accessed on November 14, 2017.

## Included activities start
From the constructed combined cycle natural gas power plant ready to produce electricity.

From reception of natural gas and operating materials at power plant/factory gate

## Included activities end
This activity ends with 1kWh of high voltage electricity produced at the power plant and arrived at the busbar.

This dataset includes:
- all operation and maintenance activities and materials of the power plants.
- Cooling: It is a assumed that all plants use wet cooling with a cooling tower. No cooling tower is included in this dataset (will be implemented in future versions)
- decarbonised water use for reduction of NOx emissions

This dataset doesn't include
- raw materials extraction, decommissioning and waste treatment as these activities are already included in the infrastructure datasets.
- transformation of the electricity produced.

## Geography
In Peru, the Economic Operation Committee of the National Interconnected System (COES) is divided in three operation areas, north, central and south. The four natural gas combined cycle power plants considered in this dataset are located in the central operation area.

## Technology
Combined cycle power plant of 400MWe class with a gas turbine 265MWe and a steam turbine 140MWe. The plant is used for middle load with 5000 hours of operation at full capacity per year. The plant is assumed to operate 180000 hours during its lifetime.

## Time period
The Annual Production Volume is valid for the year 2014

## Parameters
- water consumption, electricity production from NG, recirculating CS: 0.0018 m3/kWh; name WConsumption_EP_NG_onceT_andCP_CS; lognormal variance with pedigree 0.092025, pedigree (4,4,3,2,4)
  Estimated as per "electricity production, natural gas, combined cycle power plant, PE, 2008-2008" (accessed November 2017), based on literature (Scown, 2011, Water Footprint of U.S. Transportation Fuels, SI).
- fraction, water, decarbonised, to air: 0.0344828; name fraction_WDC_to_air; = fraction_CW_to_air; lognormal variance with pedigree 0.092025, pedigree (4,4,3,2,4)
  Calculated value as repored in dataset: "electricity production, natural gas, combined cycle power plant, PE, 2008-2008" (accessed November 2017), See comments in the other parametres present in this dataset. Decarbonised water is considered to be always used as cooling water, thus cooling water fractions to air are applied to all carbonised water input flows to calculate the amount of water consumed in the processes.
- efficiency: 0.5079 dimensionless; lognormal variance with pedigree 0.017225, pedigree (4,3,1,2,3)
  Literature value/calculated value. Net electrical efficiency based on the lower heating value (LHV).
  Low heating value of natural gas 9030 kcal/m3
  Source: http://www.minem.gob.pe/minem/archivos/gasnatural.pdf accessed on November 14, 2017.
  Density of natural gas: 0.65 kg/m3
  Source: http://www.minem.gob.pe/minem/archivos/gasnatural.pdf accessed on November 14, 2017.
  Data on net electricity production (kWh) and natural gas consumption (MBTU) for the year 2014 in Peru were used for the calculations (COES, 2014).
  Power plant Net electricity production (GWh) Natural gas (ft3 10E+3)
  TV Ventanilla GN CC 3.35 10E+03 2.26 10E+07
  TV Chilca GN CC 5.98 10E+03 3.92 10E+07
  TV Kallpa GN CC 5.80 10E+03 3.81 10E+07
  TV Fénix Power GN CC 1.51 10E+03 1.03 10E+07
  Source for electricity production and fuel consumption:
  COES, 2014. Sub Dirección de Gestión de la Información. RA-SGI-0115. ESTADISTICA RELEVANTE DEL SISTEMA ELÉCTRICO INTERCONECTADO NACIONAL, (2014). Cap. 06 PRODUCCIÓN TERMOELÉCTRICA Y CONSUMO DE COMBUSTIBLE. Retrieved online from http://www.coes.org.pe/Portal/Publicaciones/Estadisticas/ 2014/PDF/06_PRODUCCION TERMOELECTRICA Y CONSUMO DE COMBUSTIBLE, CUADRO N° 6.3 CONSUMO DE COMBUSTIBLE EN LAS CENTRALES TERMOELÉCTRICAS 2014,CUADRO N° 6.2 RENDIMIENTO PROMEDIO ANUAL - 2014. accessed on November 14, 2017.
  Source for allocation in combined cycle and conventional cycle technology:
  COES, 2014. Sub Dirección de Gestión de la Información. RA-SGI-0115. ESTADISTICA RELEVANTE DEL SISTEMA ELÉCTRICO INTERCONECTADO NACIONAL, (2014). Cap. 06 PRODUCCIÓN TERMOELÉCTRICA Y CONSUMO DE COMBUSTIBLE. Retrieved online from http://www.coes.org.pe/Portal/Publicaciones/Estadisticas/ 2014/PDF/06_PRODUCCION TERMOELECTRICA Y CONSUMO DE COMBUSTIBLE, CUADRO, No 6.8_COSTOS VARIABLES DE LAS CENTRALES TERMOELÉCTRICAS DEL COES. accessed on November 14, 2017.
- once-through and cooling pond cooling systems as a fraction of all cooling syste: 0.625 dimensionless; name once_through_andCP_CS_fractio_from_allCS; lognormal variance with pedigree 0.092025, pedigree (4,4,3,2,4)
  Calculated as per "electricity production, natural gas, combined cycle power plant, PE, 2008-2008" (accessed November 2017), as an average of data available for Europe (Floerke, 2008, Future changes of freshwater needs in the electricity production sector) and USA (NERL, 2011, Estimating freshwater needs to meet future thermoelectric generation requirements).
- water consumption, electricity production from NG, once-T and coolingP CS: 0.0005 m3/kWh; name WConsumption_EP_NG_recirculatingCS; lognormal variance with pedigree 0.092025, pedigree (4,4,3,2,4)
  (same comment as for water consumption, electricity production from NG, recirculating CS)
- recirculating cooling system as a fraction of all cooling systems: 0.375 dimensionless; name recirculating_CS_fraction_from_allCS; lognormal variance with pedigree 0.092025, pedigree (4,4,3,2,4)
  (same comment as for once-through and cooling pond cooling systems as a fraction of all coo)
- fraction, water, completely softened, to air: 0.15; name fraction_WCS_to_air; = fraction_PW_to_air; lognormal variance with pedigree 0.092025, pedigree (4,4,3,2,4)
  Calculated value as per "electricity production, natural gas, combined cycle power plant, PE, 2008-2008" (accessed November 2017), See comment in the other parametres present in this dataset. Water, completely softened is considered to be always used as process water, thus process water fractions to air are applied to all water, completely softened input flows to calculate the amount of water consumed in the processes"
- water withdrawal, electricity production from NG, once-T and coolingP CS: 0.098 m3/kWh; name WWithdrawal_EP_NG_recirculating_CS; lognormal variance with pedigree 0.092025, pedigree (4,4,3,2,4)
  (same comment as for water consumption, electricity production from NG, recirculating CS)
- fraction, process water, to air: 0.15 dimensionless; name fraction_PW_to_air; lognormal variance with pedigree 0.092025, pedigree (4,4,3,2,4)
  Literature value as reported in "electricity production, natural gas, combined cycle power plant, PE, 2008-2008" (accessed November 2017), where it states that in case when no industry/process specific data are available, default evaporation fraction value is used. This value is 15% and is based on literature (Statistics Canada, 2007 & Shaffer, K.H., 2008, Consumptive water use in the Great Lakes Basin, USGS & Shiklomanov, 2003, World Water Resources at the Beginning of the 21st Century) and has been approved by an expert.
- water withdrawal, electricity production from NG, recirculating CS: 0.0021 m3/kWh; name WWithdrawal_EP_NG_onceT_andCP_CS; lognormal variance with pedigree 0.092025, pedigree (4,4,3,2,4)
  (same comment as for water consumption, electricity production from NG, recirculating CS)
- fraction, cooling water, to air: 0.0344828; name fraction_CW_to_air; = (WConsumption_EP_NG_recirculatingCS*recirculating_CS_fraction_from_allCS+WConsumption_EP_NG_onceT_andCP_CS*once_through_andCP_CS_fractio_from_allCS)/(WWithdrawal_EP_NG_recirculating_CS*recirculating_CS_fraction_from_allCS+WWithdrawal_EP_NG_onceT_andCP_CS*once_through_andCP_CS_fractio_from_allCS); lognormal variance with pedigree 0.092025, pedigree (4,4,3,2,4)
  Calculated as per "electricity production, natural gas, combined cycle power plant, PE, 2008-2008" (accessed November 2017),
- factor: input of MJ for the production of 1 kWh: 7.08801 MJ/kWh; name factor_MJ_kWh; = 1*3.6/efficiency; lognormal variance with pedigree 0.0532, pedigree (4,4,3,4,4)
  Calculated value. 3.6 MJ = 1kWh.

## Reference product
- electricity, high voltage: 1 kWh; name electricity; CPC 17100: Electrical energy; By-product classification allocatable product
  production volume 1.66452e10 kWh; name electricity_apv
    For electricity production with natural gas in a combined cycle, the data from four power plants was considered (Ventanilla, Chilca, Kallpa and TV Fenix Power) . Source: COES, 2014. Sub Dirección de Gestión de la Información. RA-SGI-0115. ESTADISTICA RELEVANTE DEL SISTEMA ELÉCTRICO INTERCONECTADO NACIONAL, (2014). Cap. 06 PRODUCCIÓN TERMOELÉCTRICA Y CONSUMO DE COMBUSTIBLE. Retrieved online from http://www.coes.org.pe/Portal/Publicaciones/Estadisticas/ 2014/PDF/06_PRODUCCION TERMOELECTRICA Y CONSUMO DE COMBUSTIBLE, CUADRO N° 6.3 CONSUMO DE COMBUSTIBLE EN LAS CENTRALES TERMOELÉCTRICAS 2014,CUADRO N° 6.2 RENDIMIENTO PROMEDIO ANUAL - 2014. November 14, 2017.
  property price 0.0977 EUR2005
    Temporary price data. Calculated as 90% of purchasers price based on: 94% of the average price (to account for a 6% loss in transformation and transmission) for electricity for industrial consumersin 2005 (excluded taxes). From IEA.
  property true value 0.0977; name electricity_true_value
    allocation property applied in "true value" allocation // value calculated from revenue

## By-products
- heat, for reuse in municipal waste incineration only: 0 MJ; CPC 17300: Steam and hot water; By-product classification allocatable product; pedigree (1,1,1,1,1)
  Net electricity generated from this waste and used in internal MSWI plant energy redistribution.
  Uncertainty: uncertainty is calculated from uncertainties in waste composition and uncertainties in energy efficiency and the uncertainty in internal energy demand
  production volume 4.59127 MJ
  property exergy 0.1842 MJ; name E_th_prod_MSWI_exergy
    This exergy property is based on the exergy content of the product.
  property price 0.0106 EUR2005; name E_th_prod_MSWI_price_EUR2005
    Average European district heat price from Ecoheatcool and Euroheat 2005-2006, Ecoheat Work package 1: The European heat market. Final report. 10.6 EUR/GJ i s the price of district heat. http://www.solarthermalworld.org/files/Ecoheatcool%20WP1%20Web.pdf?download
  property true value relation 0.1842; name E_th_prod_MSWI_true_value_relation
    property to calculate "true value" from
  property true value 1.8144e-12
    allocation property applied in "true value" allocation // value calculated from true value relation
- electricity, for reuse in municipal waste incineration only: 0 kWh; CPC 17100: Electrical energy; By-product classification allocatable product; pedigree (1,1,1,1,1)
  (same comment as for heat, for reuse in municipal waste incineration only)
  production volume 0.646626 kWh
  property true value relation 3.6; name E_el_prod_MSWI_true_value_relation
    property to calculate "true value" from
  property price 0.1 EUR2005; name E_el_prod_MSWI_price_EUR2005
    Estimated to be the same price as in case of electricity, medium voltage.
  property exergy 3.6 MJ; name E_el_prod_MSWI_exergy
    This exergy property is based on the exergy content of the product.
  property true value 4.99419e-12
    (same comment as for heat, for reuse in municipal waste incineration only)

## Inputs from technosphere
- residue from cooling tower: -7.08801e-6 kg; name cooling_tower_residue; = (factor_MJ_kWh*0.000001)*-1; lognormal variance with pedigree 1.1067, pedigree (4,3,5,3,3)
  Literature value/calculated value. Value taken over from the dataset of natural gas burned in a normal power plant (electricity production, natural gas, GLO 2008).
  Mass share of cooling tower needed for producing 1kWh of electricity, based on the value for burning 1MJ of natural gas. Weighted average with electricity production data (Itten&Frischknecht 2012) and values of 11 countries
  (AT, BE, DE, ES, FR, GB, IT, JP, LU, NL, US) (Faist Emmenegger et al. 2007, JP and US in the appendix)
  Source:
  Itten R. and Frischknecht R. (2012) Life Cycle Inventories of Electricity Mixes and Grid. ESU-services Ltd., Uster, Switzerland.
  production volume 117981 kg; = electricity_apv*cooling_tower_residue
    Calculated from the production volume of electricity produced.
  property price 0 EUR2005; name cooling_tower_residue_price_EUR2005
  properties: wet mass 1 kg, water content 0.428571, dry mass 0.7 kg, carbon content, fossil 0.0544233
- gas power plant, combined cycle, 400MW electrical: 1.38889e-11 unit; name gas_power_plant; = 1/(400*1000*180000); lognormal variance with pedigree 0.1392, pedigree (3,3,4,4,3)
  Amount of power plant infrastructure input calculated based on expected full load hours during power plant lifetime (180000h) and power plant capacity (400MW). See "gas power plant construction, combined cycle, 400MW electrical" dataset and corresponding documentation.
- water, completely softened: 0.0412214 kg; name water_completely_softened; lognormal variance with pedigree 0.234625, pedigree (4,3,4,2,3)
  Literature value. Value taken from PE dataset, "electricity production, natural gas, combined cycle power plant, PE, 2008-2008"
  properties: wet mass 1 kg
- water, decarbonised: 1.37405 kg; name water_decarbonised_user; lognormal variance with pedigree 0.2352, pedigree (4,3,4,4,3)
  Literature value. Value taken from the dataset of natural gas burned in a combined cycle power plant ("electricity production, natural gas, combined cycle power plant, PE, 2008-2008").
  properties: wet mass 1 kg
- natural gas, high pressure: 0.186705 m3; name natural_gas; = factor_MJ_kWh*0.026341; lognormal variance with pedigree 0.0022, pedigree (1,1,2,5,1)
  Calculated weighted average (with electricity production data) for 4 power plants from peruvian statistics (Subdirección de Gestión de la Información. COES, 2014).
  Power plant Net electricity production (GWh) Natural gas (ft3 10E+3)
  TV Ventanilla GN CC 3.35 10E+03 2.26 10E+07
  TV Chilca GN CC 5.98 10E+03 3.92 10E+07
  TV Kallpa GN CC 5.80 10E+03 3.81 10E+07
  TV Fénix Power GN CC 1.51 10E+03 1.03 10E+07
  Source for electricity production and fuel consumption:
  COES, 2014. Sub Dirección de Gestión de la Información. RA-SGI-0115. ESTADISTICA RELEVANTE DEL SISTEMA ELÉCTRICO INTERCONECTADO NACIONAL, (2014). Cap. 06 PRODUCCIÓN TERMOELÉCTRICA Y CONSUMO DE COMBUSTIBLE. Retrieved online from http://www.coes.org.pe/Portal/Publicaciones/Estadisticas/ 2014/PDF/06_PRODUCCION TERMOELECTRICA Y CONSUMO DE COMBUSTIBLE, CUADRO N° 6.3 CONSUMO DE COMBUSTIBLE EN LAS CENTRALES TERMOELÉCTRICAS 2014,CUADRO N° 6.2 RENDIMIENTO PROMEDIO ANUAL - 2014. accessed on November 14, 2017.
  Low heating value of natural gas 9030 kcal/m3
  Source: http://www.minem.gob.pe/minem/archivos/gasnatural.pdf accessed on November 14, 2017.
  Density of natural gas: 0.65 kg/m3
  Source: http://www.minem.gob.pe/minem/archivos/gasnatural.pdf accessed on November 14, 2017.
  property heating value, net 39 MJ; name natural_gas_Net_Heat_Value
  properties: carbon content, fossil 0.602381, dry mass 0.84 kg, wet mass 0.84 kg
  note on heating value, net: Net (lower) heating (calorific) value at norm conditions (0°C, 101.325 kPa). Literature value.
  note on carbon content, fossil: An average C content of 0.506 kg C/ m3 has been assumed (this average has been calculated using data in Tab 3.5, ecoinvent v2.2 report 6_V

## Inputs from nature
- Water, cooling, unspecified natural origin [natural resource, in water]: 0.025694 m3; name water_cooling_UNO_input; = ((recirculating_CS_fraction_from_allCS*WWithdrawal_EP_NG_recirculating_CS)+(once_through_andCP_CS_fractio_from_allCS*WWithdrawal_EP_NG_onceT_andCP_CS))/10.5*factor_MJ_kWh; lognormal variance with pedigree 0.098025, pedigree (4,4,4,2,4)
  Calculated based on literature data.

## Emissions to nature
- Propane [air, non-urban air or from high stacks]: 4.99705e-6 kg; name propane; = factor_MJ_kWh*0.000000705; lognormal variance with pedigree 0.6807, pedigree (3,3,5,3,3)
  Literature value/calculated value. Value taken over from the dataset of natural gas burned in a normal power plant (electricity production, natural gas, GLO 2008).
  Emissions when producing 1kWh of electricity, based on the value for burning 1MJ of natural gas. Weighted average with electricity production data (Itten&Frischknecht 2012) and emission values of 11 countries
  (AT, BE, DE, ES, FR, GB, IT, JP, LU, NL, US) (Faist Emmenegger et al. 2007, JP and US in the appendix)
  Country emissions values estimate from range of values from different references. See Tab. 11.19, p. 138 in Faist Emmenegger et al. 2007.
  Source:
  Itten R. and Frischknecht R. (2012) Life Cycle Inventories of Electricity Mixes and Grid. ESU-services Ltd., Uster, Switzerland.
- Propionic acid [air, non-urban air or from high stacks]: 1.13408e-7 kg; name propionic_acid; = factor_MJ_kWh*0.000000016; lognormal variance with pedigree 1.1067, pedigree (4,3,5,3,3)
  (same comment as for Propane)
- Acetic acid [air, non-urban air or from high stacks]: 8.57649e-7 kg; name acetic_acid; = factor_MJ_kWh*0.000000121; lognormal variance with pedigree 1.1007, pedigree (3,3,5,3,3)
  (same comment as for Propane)
- Acenaphthene [air, non-urban air or from high stacks]: 5.62079e-12 kg; name acenaphthene; = factor_MJ_kWh*0.000000000000793; lognormal variance with pedigree 0.6807, pedigree (3,3,5,3,3)
  (same comment as for Propane)
- Water [air, unspecified]: 0.000939565 m3; name water_to_air_unspecified; = (water_completely_softened/1000)*fraction_WCS_to_air+(water_decarbonised_user/1000)*fraction_WDC_to_air+water_cooling_UNO_input*fraction_CW_to_air; lognormal variance with pedigree 0.098025, pedigree (4,4,4,2,4)
  Calculated value based on literature values and expert opinion. See comments in the parametres' comment field.
  property fraction, origin: unspecified 0.958386; name fraction_origin_unspecified
  property fraction, origin: fresh water 0.0416136; name fraction_origin_fresh_water
  property fraction, origin: salt water 0; name fraction_origin_salt_water
- Arsenic [air, non-urban air or from high stacks]: 2.91317e-10 kg; name arsenic; = factor_MJ_kWh*0.0000000000411; lognormal variance with pedigree 0.066, pedigree (3,5,4,5,4)
  Literature value/calculated value. Value taken over from the dataset of natural gas burned in a normal power plant (electricity production, natural gas, GLO 2008).
  Emissions when producing 1kWh of electricity, based on the value for burning 1MJ of natural gas. Weighted average with electricity production data (Itten&Frischknecht 2012) and emission values of 11 countries
  (AT, BE, DE, ES, FR, GB, IT, JP, LU, NL, US) (Faist Emmenegger et al. 2007, JP and US in the appendix. Only the US dataset contains heavy metals emissions - see Tab. 16.10)
  Source:
  Itten R. and Frischknecht R. (2012) Life Cycle Inventories of Electricity Mixes and Grid. ESU-services Ltd., Uster, Switzerland.
- Cadmium [air, non-urban air or from high stacks]: 1.60189e-9 kg; name cadmium; = factor_MJ_kWh*0.000000000226; lognormal variance with pedigree 0.066, pedigree (3,5,4,5,4)
  (same comment as for Arsenic)
- Chromium [air, non-urban air or from high stacks]: 2.03426e-9 kg; name chromium; = factor_MJ_kWh*0.000000000287; lognormal variance with pedigree 0.034, pedigree (3,5,4,5,3)
  (same comment as for Arsenic)
- Formaldehyde [air, non-urban air or from high stacks]: 2.28943e-7 kg; name formaldehyde; = factor_MJ_kWh*0.0000000323; lognormal variance with pedigree 0.6807, pedigree (3,3,5,3,3)
  (same comment as for Propane)
- Butane [air, non-urban air or from high stacks]: 6.5635e-6 kg; name butane; = factor_MJ_kWh*0.000000926; lognormal variance with pedigree 0.6807, pedigree (3,3,5,3,3)
  (same comment as for Propane)
- Nitrogen oxides [air, non-urban air or from high stacks]: 0.000419891 kg; name nitrogen_oxides; = factor_MJ_kWh*0.0000592396; lognormal variance with pedigree 0.3412, pedigree (3,3,4,4,4)
  Calculated emissions when producing 1kWh of electricity by burning natural gas in a combined cycle power plant. Weighted average based on the fuel consumption and net electricity production of four combined cycle natural gas power plants in Peru (COES, 2014) and emission factor from (EPA, 1998).
  Power plant Net electricity production (GWh) Natural gas (ft3 10E+3)
  TV Ventanilla GN CC 3.35 10E+03 2.26 10E+07
  TV Chilca GN CC 5.98 10E+03 3.92 10E+07
  TV Kallpa GN CC 5.80 10E+03 3.81 10E+07
  TV Fénix Power GN CC 1.51 10E+03 1.03 10E+07
  Source for electricity production and fuel consumption:
  COES, 2014. Sub Dirección de Gestión de la Información. RA-SGI-0115. ESTADISTICA RELEVANTE DEL SISTEMA ELÉCTRICO INTERCONECTADO NACIONAL, (2014). Cap. 06 PRODUCCIÓN TERMOELÉCTRICA Y CONSUMO DE COMBUSTIBLE. Retrieved online from http://www.coes.org.pe/Portal/Publicaciones/Estadisticas/ 2014/PDF/06_PRODUCCION TERMOELECTRICA Y CONSUMO DE COMBUSTIBLE, CUADRO N° 6.3 CONSUMO DE COMBUSTIBLE EN LAS CENTRALES TERMOELÉCTRICAS 2014,CUADRO N° 6.2 RENDIMIENTO PROMEDIO ANUAL - 2014. accessed on November 14, 2017.
  Low heating value of natural gas 9030 kcal/m3
  Source: http://www.minem.gob.pe/minem/archivos/gasnatural.pdf accessed on November 14, 2017.
  Density of natural gas: 0.65 kg/m3
  Source: http://www.minem.gob.pe/minem/archivos/gasnatural.pdf accessed on November 14, 2017.
  Substance Emission factor lb/(scf 10E+6)
  Óxidos de nitrógeno (NOx) 140
  Monoxido de carbono (CO) 84
  Dióxido de carbono (CO2) 120000
  Dióxido de azufre (SO2) 0.6
  Metano (CH4) 2.3
  Source:
  EPA AP 42, Fifth Edition, Volume I Chapter 1: External Combustion, 1.4 NATURAL GAS COMBUSTION. Retrieved online from URL: <https://www3.epa.gov/ttn/chief/ap42/ch01/final/c01s04.pdf> accessed on 24 august 2017.
- Acetaldehyde [air, non-urban air or from high stacks]: 5.67041e-9 kg; name acetaldehyde; = factor_MJ_kWh*0.0000000008; lognormal variance with pedigree 1.1067, pedigree (4,3,5,3,3)
  (same comment as for Propane)
- Mercury [air, non-urban air or from high stacks]: 4.87655e-10 kg; name mercury; = factor_MJ_kWh*0.0000000000688; lognormal variance with pedigree 0.6807, pedigree (3,3,5,3,3)
  (same comment as for Arsenic)
- Hexane [air, non-urban air or from high stacks]: 5.62079e-6 kg; name hexane; = factor_MJ_kWh*0.000000793; lognormal variance with pedigree 0.6807, pedigree (3,3,5,3,3)
  (same comment as for Propane)
- Particulates, < 2.5 um [air, non-urban air or from high stacks]: 3.37329e-6 kg; name particulates_lt_2_5um; = factor_MJ_kWh*3.37328244274809E-06/7.088; lognormal variance with pedigree 0.3407, pedigree (3,3,4,3,4)
  (same comment as for water, decarbonised)
- Sulfur dioxide [air, non-urban air or from high stacks]: 1.79953e-6 kg; name sulfur_dioxide; = factor_MJ_kWh*2.53884E-07; lognormal variance with pedigree 0.0517, pedigree (3,3,5,3,3)
  (same comment as for Nitrogen oxides)
- PAH, polycyclic aromatic hydrocarbons [air, non-urban air or from high stacks]: 5.67041e-8 kg; name pah; = factor_MJ_kWh*0.000000008; lognormal variance with pedigree 1.1067, pedigree (4,3,5,3,3)
  Literature value/calculated value. Value taken over from the dataset of natural gas burned in a normal power plant (electricity production, natural gas, GLO 2008).
  Emissions when producing 1kWh of electricity, based on the value for burning 1MJ of natural gas. Weighted average with electricity production data (Itten&Frischknecht 2012) and emission values of 11 countries
  (AT, BE, DE, ES, FR, GB, IT, JP, LU, NL, US) (Faist Emmenegger et al. 2007)
  Country emissions values estimate from range of values from different references. See Tab. 11.19, p. 138 in Faist Emmenegger et al. 2007.
  Source:
  Itten R. and Frischknecht R. (2012) Life Cycle Inventories of Electricity Mixes and Grid. ESU-services Ltd., Uster, Switzerland.
- Toluene [air, non-urban air or from high stacks]: 1.0632e-8 kg; name toluene; = factor_MJ_kWh*0.0000000015; lognormal variance with pedigree 0.6807, pedigree (3,3,5,3,3)
  (same comment as for Propane)
- Lead [air, non-urban air or from high stacks]: 7.30065e-10 kg; name lead; = factor_MJ_kWh*0.000000000103; lognormal variance with pedigree 0.066, pedigree (3,5,4,5,4)
  (same comment as for Arsenic)
- Manganese [air, non-urban air or from high stacks]: 5.53574e-10 kg; name manganese; = factor_MJ_kWh*0.0000000000781; lognormal variance with pedigree 0.066, pedigree (3,5,4,5,4)
  (same comment as for Arsenic)
- Carbon dioxide, fossil [air, non-urban air or from high stacks]: 0.359906 kg; name carbon_dioxide_fossil; = factor_MJ_kWh*0.050776787; lognormal variance with pedigree 0.0513, pedigree (3,3,5,3,3)
  (same comment as for Nitrogen oxides)
- Benzo(a)pyrene [air, non-urban air or from high stacks]: 3.74956e-12 kg; name benzo_a_pyrene; = factor_MJ_kWh*0.000000000000529; lognormal variance with pedigree 0.6807, pedigree (3,3,5,3,3)
  (same comment as for Propane)
- Selenium [air, non-urban air or from high stacks]: 3.48021e-11 kg; name selenium; = factor_MJ_kWh*0.00000000000491; lognormal variance with pedigree 0.6807, pedigree (3,3,5,3,3)
  (same comment as for Arsenic)
- Ethane [air, non-urban air or from high stacks]: 9.71057e-6 kg; name ethane; = factor_MJ_kWh*0.00000137; lognormal variance with pedigree 0.6807, pedigree (3,3,5,3,3)
  (same comment as for Propane)
- Dinitrogen monoxide [air, non-urban air or from high stacks]: 6.92499e-6 kg; name dinitrogen_monoxide; = factor_MJ_kWh*0.000000977; lognormal variance with pedigree 0.3407, pedigree (3,3,5,3,3)
  Literature value/calculated value. Value taken over from the dataset of natural gas burned in a normal power plant (electricity production, natural gas, GLO 2008).
  Emissions when producing 1kWh of electricity, based on the value for burning 1MJ of natural gas. Weighted average with electricity production data (Itten&Frischknecht 2012) and emission values of 11 countries
  (AT, BE, DE, ES, FR, GB, IT, JP, LU, NL, US) (Faist Emmenegger et al. 2007)
  Country emissions values estimate from range of values from different references. See Tab. 11.15, p. 133f in Faist Emmenegger et al. 2007.
  Source:
  Itten R. and Frischknecht R. (2012) Life Cycle Inventories of Electricity Mixes and Grid. ESU-services Ltd., Uster, Switzerland.
- Pentane [air, non-urban air or from high stacks]: 8.15121e-6 kg; name pentane; = factor_MJ_kWh*0.00000115; lognormal variance with pedigree 0.6807, pedigree (3,3,5,3,3)
  (same comment as for Propane)
- Beryllium [air, non-urban air or from high stacks]: 1.75074e-11 kg; name beryllium; = factor_MJ_kWh*0.00000000000247; lognormal variance with pedigree 0.066, pedigree (3,5,4,5,4)
  (same comment as for Arsenic)
- Methane, fossil [air, non-urban air or from high stacks]: 6.89821e-6 kg; name methane_fossil; = factor_MJ_kWh*9.73222E-07; lognormal variance with pedigree 0.6807, pedigree (3,3,5,3,3)
  (same comment as for Nitrogen oxides)
- Carbon monoxide, fossil [air, non-urban air or from high stacks]: 0.000251935 kg; name carbon_monoxide_fossil; = factor_MJ_kWh*0.0000355438; lognormal variance with pedigree 0.3092, pedigree (3,3,4,4,3)
  (same comment as for Nitrogen oxides)
- Benzene [air, non-urban air or from high stacks]: 6.39338e-9 kg; name benzene; = factor_MJ_kWh*0.000000000902; lognormal variance with pedigree 0.6807, pedigree (3,3,5,3,3)
  (same comment as for Propane)
- Nickel [air, non-urban air or from high stacks]: 3.05493e-9 kg; name nickel; = factor_MJ_kWh*0.000000000431; lognormal variance with pedigree 0.066, pedigree (3,5,4,5,4)
  (same comment as for Arsenic)
- Cobalt [air, non-urban air or from high stacks]: 1.21914e-10 kg; name cobalt; = factor_MJ_kWh*0.0000000000172; lognormal variance with pedigree 0.066, pedigree (3,5,4,5,4)
  (same comment as for Arsenic)
- Water [water, unspecified]: 0.0261697 m3; name water_to_water_unspecified; = (water_completely_softened/1000)*(1-fraction_WCS_to_air)+(water_decarbonised_user/1000)*(1-fraction_WDC_to_air)+water_cooling_UNO_input*(1-fraction_CW_to_air); lognormal variance with pedigree 0.098025, pedigree (4,4,4,2,4)
  (same comment as for Water)
  property fraction, origin: salt water 0; name fraction_origin_salt_water_Ww
  property fraction, origin: unspecified 0.966438; name fraction_origin_unspecified_Ww
  property fraction, origin: fresh water 0.0335624; name fraction_origin_fresh_water_Ww
- Dioxins, measured as 2,3,7,8-tetrachlorodibenzo-p-dioxin [air, non-urban air or from high stacks]: 0 kg; name dioxins; = factor_MJ_kWh*2.9E-17; pedigree (1,1,1,1,1)
  (same comment as for PAH, polycyclic aromatic hydrocarbons)

## Sampling procedure
Literature and 2014 statistical data from four combined cycle plants operating in Peru.

## Extrapolations
This dataset is based on the dataset "electricity production, natural gas, combined cycle power plant, PE, 2008-2008" (accessed November 2017) and adapted using some regional data. Data from Peruvian power plants that account for 100% of the natural gas combined cycle, electricity production in Peru in 2014, were considered. Net electricity production and effficiency were regionalized. Emissions of NOx, CO, CO2, SO2, and CH4 were estimated using emission factors from EPA, 1998., as per the OSINERGMIN, supervisory body for energy and mining investment (http://www.osinergmin.gob.pe/seccion/centro_documental/Institucional/Estudios_Economicos/Libros/anexo-industria-hidrocarburos-liquidos-Peru.pdf retrieved 24 august 2017) and the characteristics of the peruvian natural gas as described in http://www.minem.gob.pe/minem/archivos/gasnatural.pdf retrieved 24 august 2017.

## Review by Christopher Oberschelp 2018-01-16
Documentation, key values and data format seem reasonable. Individual deviations may be spotted by comparison with reference datasets. Uncertainties might have to be adjusted later (as agreed upon with ecoinvent).
