# yogurt production, from cow milk

Dataset: EcoSpold 2, unit process
Geography: CA-QC
Time period: 2010-01-01 to 2019-12-31
Technology level: current
Classification: ISIC rev.4 ecoinvent: 1050:Manufacture of dairy products
Scenario: Business-as-Usual
System model: Allocation at the point of substitution
Share of production covered: 75 %
Generated by: François Saunier
Database: ecoinvent
isCopyrightProtected: true
accessRestrictedTo: 1

## General comment
This dataset represents the production of yogurt made from cow milk in Quebec (Canada). The product is an aggregation of various types of yogurt (standard, greek yogurt, yogurt to drink) and various fat content and flavourings (fruits, aroma). An average of data from three producers in the region of Quebec has been made.
The packaging in which the yogurt is sold is not included. Here are some information on an average composition (for 1 kg of yogurt) of the packaginig used by the sites covered by the data collection process :
- low-density polyethylene : 3,577E-03 kg
- paper : 4,541E-03 kg
- aluminium paper : 1,295E-03 kg
- paperboard : 7,281E-02 kg
- polyethylene : 9,522E-03 kg
- polystyrene : 2,166E-02 kg
- expanded polystyrene : 1,997E-02 kg
- polypropylene : 1,520E-02 kg

## Included activities start
From reception of milk and other inputs at the factory gate.

## Included activities end
This activity ends with yogurt at factory gate.
The dataset includes yogurt production, refrigeration (energy and losses) on site, energy for primary and secondary packaging and infrastruture for the plant.
The dataset doesn't include packaging materials.

## Geography
Data from three producers located on four sites in the region of Québec.

## Technology
Average of present used technology

## Time period
Collected data for Quebec industry for the years 2010-2012

## Reference product
- cheese, from cow milk, fresh, unripened: 1 kg; name cheese; By-product classification allocatable product; CPC 22251: Cheese from milk of cattle, fresh or processed; pedigree (1,1,1,1,1)
  Calculated Value. The cheese co-product is a mix of fresh cheese (approximately 85% of quark and 15% of cottage).
  production volume 76092 kg; = Ref_PV*cheese/Ref
    Calculated from production volume of reference product using the relative outputs.
  property price 3.34 EUR2005; name cheese_price_EUR2005
    Calculated based on data from FAOSTAT (accessed 20140428). The price is calculated by using data on total world import quantity (tonnes) and import value (1000 USD), year 2005. 3544090 tonnes of Cheese, whole, cow milk was imported in the world in 2005. The import value was 14276166000 USD. The calculated price is thus (14276166/3544090=4.028*0.8=) 3.249 Euro. Using the same approach the calculated price for 2010 was 3.84 Euro.
  property dry mass 0.1752 kg; name cheese_DM; = cheese_WM-cheese_WWM
  property water in wet mass 0.8248 kg; name cheese_WWM
  property carbon content, fossil 0; name cheese_C_content_fossil
    fossil carbon content on a dry matter basis. Proxy value, calculated from the chemical composition of an average fresh cheese from data published by Health Canada (http://webprod3.hc-sc.gc.ca/cnf-fce/report-rapport.do?lang=eng).
  property carbon content, non-fossil 0.4899; name cheese_C_content_non_fossil
    biogene carbon content on a dry matter basis. Proxy value, calculated from the chemical composition of an average fresh cheese from data published by Health Canada (http://webprod3.hc-sc.gc.ca/cnf-fce/report-rapport.do?lang=eng).
  property fat content 0.014; name cheese_fat_content
    Fat content, on a wet mass basis. Average value calculated from a fat mass balance on the collected data.
  property wet mass 1 kg; name cheese_WM
  property water content 4.70776; name cheese_water_content; = cheese_WWM/cheese_DM
  property carbon content 0.4899
    carbon content on a dry matter basis (reserved; not for manual entry)
  property true value 0.00134402; name cheese_true_value
    allocation property applied in "true value" allocation // value calculated from revenue
  properties: carbon allocation 0.0858305 kg
- yogurt, from cow milk: 0 kg; name Ref; CPC 22230: Yoghurt and other fermented or acidified milk and cream; By-product classification allocatable product
  production volume 1.89096e8 kg; name Ref_PV; = 142421000*(309589/233173)
    Estimation based on production volume of yogurt in Quebec in 2005 (142421 t, data from AGECO, Les faits saillants laitiers 2012) and on the evolution of production in Canada between 2005 (233173 t) and 2010-2012 (average of 309589 t per year) (data from Dairyinfo : http://www.dairyinfo.gc.ca).
  property dry mass 0.2148 kg; name Ref_DM; = Ref_WM-Ref_WWM
  property price 1.07 EUR2005; name Ref_price_EUR2005
    Calculated based on data from FAOSTAT (accessed 20140428). The price is calculated by using data on total world import quantity (tonnes) and import value (1000 USD), year 2005. 1225007 tonnes of Yoghurt, concentrated or not was imported in the world in 2005. The import value was 1580836000 USD. The calculated price is thus (1580836/1225007=1.29*0.8=) 1.041 Euro. Using the same approach the calculated price for 2010 was 1.206 Euro.
  property water content 3.65549; name Ref_water_content; = Ref_WWM/Ref_DM
  property fat content 0.032; name Ref_fat_content
    (same comment as for cheese, from cow milk, fresh, unripened)
  property carbon content, non-fossil 0.4964; name Ref_C_content_non_fossil
    biogene carbon content on a dry matter basis. Proxy value, calculated from the chemical composition of an average yogurt from data published by Health Canada (http://webprod3.hc-sc.gc.ca/cnf-fce/report-rapport.do?lang=eng).
  property wet mass 1 kg; name Ref_WM
  property carbon content, fossil 0; name Ref_C_content_fossil
    fossil carbon content on a dry matter basis. Proxy value, calculated from the chemical composition of an average yogurt from data published by Health Canada (http://webprod3.hc-sc.gc.ca/cnf-fce/report-rapport.do?lang=eng).
  property water in wet mass 0.7852 kg; name Ref_WWM
  property carbon content 0.4964
    carbon content on a dry matter basis (reserved; not for manual entry)
  property true value 1.07; name Ref_true_value
    allocation property applied in "true value" allocation // value calculated from revenue
  properties: carbon allocation 0.106627 kg

## By-products
- cream, from cow milk: 0 kg; name cream; By-product classification allocatable product; CPC 22241: Butter and other fats and oils derived from milk of cattle; pedigree (1,1,1,1,1)
  Calculated Value. The cream co-product is a mix of cream with several fat contents.
  production volume 4.75008e6 kg; = Ref_PV*cream/Ref
    Calculated from production volume of reference product using the relative outputs.
  property carbon content, fossil 0; name cream_C_content_fossil
    fossil carbon content on a dry matter basis. Proxy value, calculated from the chemical composition of an average cream from data published by Health Canada (http://webprod3.hc-sc.gc.ca/cnf-fce/report-rapport.do?lang=eng).
  property wet mass 1 kg; name cream_WM
  property dry mass 0.3001 kg; name cream_DM; = cream_WM-cream_WWM
  property carbon content, non-fossil 0.6847; name cream_C_content_non_fossil
    biogene carbon content on a dry matter basis. Proxy value, calculated from the chemical composition of an average cream from data published by Health Canada (http://webprod3.hc-sc.gc.ca/cnf-fce/report-rapport.do?lang=eng).
  property water content 2.33222; name cream_water_content; = cream_WWM/cream_DM
  property fat content 0.241; name cream_fat_content
    (same comment as for cheese, from cow milk, fresh, unripened)
  property water in wet mass 0.6999 kg; name cream_WWM
  property price 1.48 EUR2005; name cream_price_EUR2005
    Calculated based on data from FAOSTAT (accessed 20140428). The price is calculated by using data on total world import quantity (tonnes) and import value (1000 USD), year 2005. 762210 tonnes of Cream fresh was imported in the world in 2005. The import value was 1356140000 USD. The calculated price is thus (1356140/762210=1.779*0.8=) 1.435 Euro. Using the same approach the calculated price for 2010 was 1.606 Euro.
  property carbon content 0.6847
    carbon content on a dry matter basis (reserved; not for manual entry)
  property true value 0.0371776; name cream_true_value
    allocation property applied in "true value" allocation // value calculated from revenue
  properties: carbon allocation 0.205478 kg
- electricity, for reuse in municipal waste incineration only: 0 kWh; CPC 17100: Electrical energy; By-product classification allocatable product; pedigree (1,1,1,1,1)
  Net electricity generated from this waste and used in internal MSWI plant energy redistribution.
  Uncertainty: uncertainty is calculated from uncertainties in waste composition and uncertainties in energy efficiency and the uncertainty in internal energy demand
  production volume 6924.69 kWh
  property exergy 3.6 MJ; name E_el_prod_MSWI_exergy
    This exergy property is based on the exergy content of the product.
  property true value relation 3.6; name E_el_prod_MSWI_true_value_relation
    property to calculate "true value" from
  property price 0.1 EUR2005; name E_el_prod_MSWI_price_EUR2005
    Estimated to be the same price as in case of electricity, medium voltage.
  property true value 4.71824e-6
    allocation property applied in "true value" allocation // value calculated from true value relation
- heat, for reuse in municipal waste incineration only: 0 MJ; CPC 17300: Steam and hot water; By-product classification allocatable product; pedigree (1,1,1,1,1)
  Net useful heat generated from this waste and used in internal MSWI plant energy redistribution.
  Uncertainty: uncertainty is calculated from uncertainties in waste composition and uncertainties in energy efficiency and the uncertainty in internal energy demand
  production volume 49838.3 MJ
  property true value relation 0.1842; name E_th_prod_MSWI_true_value_relation
    property to calculate "true value" from
  property exergy 0.1842 MJ; name E_th_prod_MSWI_exergy
    This exergy property is based on the exergy content of the product.
  property price 0.0106 EUR2005; name E_th_prod_MSWI_price_EUR2005
    Average European district heat price from Ecoheatcool and Euroheat 2005-2006, Ecoheat Work package 1: The European heat market. Final report. 10.6 EUR/GJ i s the price of district heat. http://www.solarthermalworld.org/files/Ecoheatcool%20WP1%20Web.pdf?download
  property true value 1.73752e-6
    (same comment as for electricity, for reuse in municipal waste incineration only)
- zinc concentrate: 0 kg; CPC 14290: Other non-ferrous metal ores and concentrates (other than uranium or thorium ores and concentrates); By-product classification allocatable product
  Calculated value from the knowledge of the properties of both products.
  production volume 0.0392686 kg
  property price 0.38 EUR2005; name ByP_price_EUR2005
    Temporary price data. Calculated as 90% of purchasers price based on: Zinc content in concentrate 53%. Concentrate price per kg Zn 86.5% of refined Zn price (13.5% treatment charges according to CHR Metals Limited 2005: Dynamic cost curves. http://www.minecost.com/dynamic.pdf). 2004 zinc price from USGS (2007) Mineral commodity summaries 2007. <http://minerals.usgs.gov/minerals/pubs/mcs/2007/mcs2007.pdf> [Accessed 25 May 2010]
  property zinc content 0.53; name zinc_C_zinc_concentrate
    Zinc content on a dry matter basis. Value taken from teh "zinc mine operation" /GLO dataset.
  property dry mass 1 kg; name DM_zinc_concentrate
  property carbon content 0
    carbon content on a dry matter basis (reserved; not for manual entry)
  property true value 7.89128e-11
    allocation property applied in "true value" allocation // value calculated from revenue
  properties: wet mass 1 kg, water content 0, carbon content, non-fossil 0, carbon content, fossil 0, water in wet mass 0 kg, carbon allocation 0 kg

## Inputs from technosphere
- evaporation of milk: 0.246675 kg; lognormal variance with pedigree 0.0027, pedigree (1,2,3,1,1)
  Calculated Value. This flow represents the production of concentrated milk and milk powder used as input. Concentrated milk and milk powder are expressed in cow milk equivalent and their production is approximated with the "evaporation of milk" and "spary-drying of milk" flows.;activityLink introduced to establish a direct link to the corresponding regional supply of this product
- refrigerant R134a: 1.64148e-8 kg; lognormal variance with pedigree 0.0027, pedigree (1,2,3,1,1)
  Calculated Value. This flow is used as proxy and represents input of HCFC-22 refrigerant lossed at plant.
  properties: dry mass 1 kg, wet mass 1 kg, carbon content, fossil 0.235294
- ammonia, liquid: 4.17904e-7 kg; lognormal variance with pedigree 0.0027, pedigree (1,2,3,1,1)
  Calculated Value. This flow represents input of refrigerant lossed at plant.
  properties: wet mass 1 kg, dry mass 1 kg
- wastewater from potato starch production: -0.0122019 m3; name wastewater; lognormal variance with pedigree 0.0027, pedigree (1,2,3,1,1)
  Calculated Value. Wastewater from factories with almost no information on composition (only data is an average COD = 2.5) have been approximated with wastewater from potato starch production (COD = 2)
  production volume 765787 m3; = Ref_PV*wastewater/Ref
    Calculated from production volume of reference product using the relative outputs.
  property price 0 EUR2005; name wastewater_price_EUR2005
  properties: water content 1146.05, carbon content, non-fossil 0.993118, wet mass 1000 kg, dry mass 0.871801 kg
- propylene glycol, liquid: 1.46763e-5 kg; lognormal variance with pedigree 0.0027, pedigree (1,2,3,1,1)
  Calculated Value. Ingredient in the composition of cleaning agents. Active agent only, water for dillution is included in the flow "water, deionised, from tap water, at user".
  properties: wet mass 1 kg, carbon content, fossil 0.473684, dry mass 1 kg
- municipal solid waste: -0.00832493 kg; name municipal_waste; lognormal variance with pedigree 0.0027, pedigree (1,2,3,1,1)
  Calculated Value. Waste from factories with unknown composition have been approximated with municipal solid waste.
  production volume 522471 kg; = Ref_PV*municipal_waste/Ref
    Calculated from production volume of reference product using the relative outputs.
  property price 0 EUR2005; name municipal_waste_price_EUR2005
  properties: carbon content, non-fossil 0.261655, carbon content, fossil 0.171549, dry mass 0.771 kg, wet mass 1 kg, water content 0.297017
  note on carbon content, non-fossil: MSW composition in tab 4.1, ecoinvent v2.2 report 13_I. C content referred to 1 kg DM
- hydrogen peroxide, without water, in 50% solution state: 0.000376626 kg; lognormal variance with pedigree 0.0027, pedigree (1,2,3,1,1)
  (same comment as for propylene glycol, liquid)
  properties: dry mass 1 kg, wet mass 1 kg
- electricity, medium voltage: 0.595671 kWh; lognormal variance with pedigree 0.0027, pedigree (1,2,3,1,1)
  Calculated Value. Energy used on site.
- soda ash, light, crystalline, heptahydrate: 7.10768e-6 kg; lognormal variance with pedigree 0.0027, pedigree (1,2,3,1,1)
  (same comment as for propylene glycol, liquid)
  properties: carbon content, fossil 0.0517241, wet mass 1 kg, dry mass 1 kg
- heat, district or industrial, natural gas: 2.18889 MJ; = MJfuel_input/fuel_use; lognormal variance with pedigree 0.002, pedigree (1,1,3,1,1)
  Calculated Value. Energy used on site. The mathematicle relation is based on reported fuel input (in MJ) and efficiency (1/Fuel_use). See variable's comments.
  Uncertainty: No uncertainty added - uncertainty based on propagation of the uncertainty of the underlying parameters
  property heat of fuel used 0.8072 MJ; name MJfuel_input
  property Corresponding fuel use 1.11111 MJ; name fuel_use; = 1/0.9
  note on Corresponding fuel use: Lower heating value of the fuel input related to the heat output. An efficiency of 0.9 is supposed.
- sugar, from sugar beet: 0.11826 kg; lognormal variance with pedigree 0.0027, pedigree (1,2,3,1,1)
  Calculated Value. Ingredient used in the yogurt production.
  properties: carbon content, non-fossil 0.44, dry mass 1 kg, wet mass 1 kg
- water, deionised: 0.00267886 kg; lognormal variance with pedigree 0.0047, pedigree (3,2,3,1,1)
  Calculated Value. Water for dillution of chemicals used as cleaning agents.
  Uncertainty: Water for dillution of chemicals used as cleaning agents. Calculated estimate based on chemical composition of cleaning agents.
  properties: wet mass 1 kg
- sodium hypochlorite, without water, in 15% solution state: 1.0883e-6 kg; lognormal variance with pedigree 0.0027, pedigree (1,2,3,1,1)
  (same comment as for propylene glycol, liquid)
  properties: dry mass 1 kg, wet mass 1 kg
- EDTA, ethylenediaminetetraacetic acid: 0.000419712 kg; lognormal variance with pedigree 0.0027, pedigree (1,2,3,1,1)
  (same comment as for propylene glycol, liquid)
  properties: dry mass 1 kg, wet mass 1 kg, carbon content, fossil 0.410959
- sodium hydroxide, without water, in 50% solution state: 0.00619474 kg; lognormal variance with pedigree 0.0027, pedigree (1,2,3,1,1)
  (same comment as for propylene glycol, liquid)
  properties: wet mass 1 kg, dry mass 1 kg
- transport, freight, lorry, unspecified: 0.258817 metric ton*km; = milk_input_kg/1000*100
  Calculated value. Transport of cow milk is added because of the activity link used to link the "cow milk" exchange to the "milk production, Quebec" dataset. If a market is used instead of the activity link, the transport should be transfered to the market dataset and be removed from this dataset.
  The distance of 100 km is the average distance between milk farmers and milk transformation plants in Quebec (Source : Quantis, CIRAIG and AGECO (2012). Environmental and Socioeconomic Life Cycle Assessment of Canadian Milk. Report for Dairy Farmers of Canada).
- nitric acid, without water, in 50% solution state: 0.000471535 kg; lognormal variance with pedigree 0.0027, pedigree (1,2,3,1,1)
  (same comment as for propylene glycol, liquid)
  properties: dry mass 1 kg, wet mass 1 kg
- chemical, organic: 0.0155682 kg; lognormal variance with pedigree 0.0027, pedigree (1,2,3,1,1)
  Calculated Value. Ingredient used in the yogurt production. As no better data were available, this flow is used as an approximation for inuline (23% in mass of the amount), gelatin (41%), food colour (26%) and flavour (10%).
  properties: dry mass 1 kg, wet mass 1 kg, carbon content, fossil 0.628
  note on carbon content, fossil: This dataset is an unweighted average of 20 organic substances (listed in Tab 88.1, ecoinvent v2.2 report 8, part II), being part of the top100 chemicals included in this database. The C-content has also been calculated as an unweighted average of the C content of the substances composing this dataset.
- maize starch: 0.0555297 kg; lognormal variance with pedigree 0.0027, pedigree (1,2,3,1,1)
  Calculated Value. Ingredient used in the yogurt production.
  properties: dry mass 0.86 kg, water content 0.162791, wet mass 1 kg, carbon content, non-fossil 0.46
  note on carbon content, non-fossil: C-content of starch is considered 46% on dry mass basis (from "Evolutionary and Biochemical Aspects", A.D. Kay and T. Vrede (in Global Ecology, 2010, Elsevier B.V., S.E. Jørgensen Ed.)).
- strawberry: 0.109462 kg; lognormal variance with pedigree 0.0027, pedigree (1,2,3,1,1)
  Calculated Value. Ingredient used in the yogurt production. Approximation for fruits used as ingredients (strawberry is the most popular fruit in yogurt; other popular fruits in Quebec yogurt are bilberry and raspberry).
  properties: dry mass 0.101 kg, water content 8.90099, wet mass 1 kg, carbon content, non-fossil 0.04617
- cow milk: 0.323898 kg
  Calculated Value (in kg of Fat and Protein Corrected Milk). This flow represents the input of concentrated milk and milk powder used at plant. Concentrated milk and milk powder are expressed in cow milk equivalent and their production is approximated with the "evaporation of milk" and "spary-drying of milk" flows. Milk for concentrated milk and milk powder do not necessary come from Quebec milk market (so no activity link to the Quebec milk dataset is made).
  FPCM is 4.0% fat and 3.3% true protein content. Conversion to FPCM is as follow, according to the International Dairy Federation: FPCM (kg/yr) = Production (kg/yr) x [0.1226 x Fat% + 0.0776 x Protein% + 0.2534]
- whey: 0.0221938 kg; lognormal variance with pedigree 0.0027, pedigree (1,2,3,1,1)
  Calculated Value. Ingredient used in the yogurt production. Approximation for whey (dry) and ferments.
  properties: dry mass 0.064 kg, wet mass 1 kg, water content 14.625, carbon content, non-fossil 0.340757
- sugar, from sugarcane: 0.066497 kg; lognormal variance with pedigree 0.0027, pedigree (1,2,3,1,1)
  Calculated Value. Ingredient used in the yogurt production.
  properties: wet mass 1 kg, dry mass 1 kg, carbon content, non-fossil 0.44
- wheat grain: 0.00515224 kg; lognormal variance with pedigree 0.0027, pedigree (1,2,3,1,1)
  Calculated Value. Ingredient used in the yogurt production. Approximation for cereals, nuts, cofee or others ingredients used in preparation.
  properties: carbon content, non-fossil 0.464601, water content 0.176471, wet mass 1 kg, dry mass 0.85 kg
- tap water: 0.0423327 kg; lognormal variance with pedigree 0.0027, pedigree (1,2,3,1,1)
  Calculated Value. Ingredient used in the yogurt production.
  properties: water content 2962.17, carbon content, fossil 0.00178991, dry mass 0.000337476 kg, wet mass 1 kg
  note on carbon content, fossil: Bicarbonate content is 2.93 mol/m3. CO2 content is 0.1 mol/m3 (ecoinvent v2.2 report 8, Tab 93.1).
- cow milk: 2.58817 kg; name milk_input_kg; lognormal variance with pedigree 0.0027, pedigree (1,2,3,1,1)
  Calculated Value (in kg of Fat and Protein Corrected Milk). This flow represents the input of cow milk.
  FPCM is 4.0% fat and 3.3% true protein content. Conversion to FPCM is as follow, according to the International Dairy Federation: FPCM (kg/yr) = Production (kg/yr) x [0.1226 x Fat% + 0.0776 x Protein% + 0.2534]
  properties: dry mass 0.1231 kg, wet mass 1 kg, water content 7.12348, carbon content, non-fossil 0.53797
  note on carbon content, non-fossil: biogene carbon content on a dry matter basis. See cow milk dataset for more information.
- spray-drying of milk: 0.0171922 kg; lognormal variance with pedigree 0.0027, pedigree (1,2,3,1,1)
  Calculated Value. This flow represents the production of milk powder used as input. Milk powder is expressed in cow milk equivalent and its production is approximated with the "evaporation of milk" and "spary-drying of milk" flows.;activityLink introduced to establish a direct link to the corresponding regional supply of this product
- chemical factory, organics: 7.34879e-10 unit; = 1/(factory_annual_production*factory_lifetime); lognormal variance with pedigree 0.002, pedigree (1,1,3,1,1)
  Calculated value. Based on production volume (82 kt) and lifetime (50 years) of an average factory.
  Uncertainty: No uncertainty added - uncertainty based on propagation of the uncertainty of the underlying variables.
  property lifetime 50 year; name factory_lifetime
  property chemical factory annual production 8.2e7 kg/year; name factory_annual_production
  note on lifetime: Hypothetical lifetime. Based on the ecoinvent 2.0 report : Life Cycle Inventories of Chemicals
  note on chemical factory annual production: Average annual production of the yogurt production plant under study

## Inputs from nature
- Water, unspecified natural origin [natural resource, in water]: 0.0122117 m3; lognormal variance with pedigree 0.0027, pedigree (1,2,3,1,1)
  Calculated Value. Process water used on site.

## Emissions to nature
- Ammonia [air, unspecified]: 4.17904e-7 kg; lognormal variance with pedigree 0.0027, pedigree (1,2,3,1,1)
  Calculated Value. This flow represents refrigerant losses at plant
- Methane, chlorodifluoro-, HCFC-22 [air, unspecified]: 1.64148e-8 kg; lognormal variance with pedigree 0.0027, pedigree (1,2,3,1,1)
  Calculated Value. This flow represents refrigerant losses at plant

## Sampling procedure
Measured values for inputs and outputs based on data survey from three yogurt producers (total of 4 production sites) in Québec.
The inventory is estimated to be representative of over 75% of overall Quebec production

## Extrapolations
Concentrated milk et milk powder used as ingredients for yogurt production are approximated with the addition of milk equivalent to the milk input and with the two operations "evaporation of milk" and "spray-drying of milk".
Wastewater from factories with almost no information on composition (only data is an average COD = 2.5 kg/m³) has been approximated with wastewater from potato starch production (COD = 2 kg/m³).
