# sawnwood production, hardwood, raw, dried (u=10%)

Dataset: EcoSpold 2, unit process
Geography: RER
Time period: 2014-01-01 to 2019-12-31
Technology level: current
Classification: EcoSpold01Categories: wooden materials/extraction
Classification: ISIC rev.4 ecoinvent: 1610:Sawmilling and planing of wood
Scenario: Business-as-Usual
System model: Allocation at the point of substitution
Generated by: Emilia Moreno Ruiz
Database: ecoinvent
isCopyrightProtected: false
accessRestrictedTo: 1

## General comment
[Dataset to be replaced by 'sawnwood production, hardwood, raw, dried (u=10%), CH, 2014 - 2014']
[Dataset to be replaced by 'sawnwood production, hardwood, raw, dried (u=10%), Europe without Switzerland, 2014 - 2014']

## Included activities start
Entry of the specific products issued of the drying activity

## Included activities end
Delivery of the generic planed product

## Reference product
- sawnwood, hardwood, raw, dried (u=10%): 1 m3; By-product classification allocatable product; CPC 31102: Wood, sawn or chipped lengthwise, sliced or peeled, of a thickness exceeding 6 mm, of non-coniferous wood
  production volume 3.7089e6 m3; = 0.287*1.2923E+07
    10% of the Production Volume issued from the drying has been made accesible as this generic product.
    The Production Volumes have been downscaled from GLO to RER using the relative GDP values 2011 (source: United Nations, <http://data.un.org/Glossary.aspx?q=GDP+%28current+US%24%29>, accessed 20130726).
  property price 265 EUR2005
    Expert judgement (Urs Luginbühl, Swiss Sawmilling industry, personal communication in June 2014). Cross-reference; FAOSTAT (accessed 20140428). The price is calculated by using data on total world import quantity (m3) and import value (1000 USD), year 2005. 25656806 m3 of Sawnwood (NC) - coniferous was imported in the world in 2005. The import value was 9652714000 USD. The calculated price is thus (9652714000/25656806=376*0.8=) 303 Euro.
  property carbon content 0.494
    carbon content on a dry matter basis (reserved; not for manual entry)
  properties: carbon content, non-fossil 0.494, carbon content, fossil 0, dry mass 650 kg, wet mass 715 kg, water in wet mass 65 kg, water content 0.1, carbon allocation 321.1 kg

## Inputs from technosphere
- sawnwood, board, hardwood, raw, dried (u=10%): 0.4 m3; name board_raw
  The input share has been calculated using data from the drying activity
  property dry mass 563.2 kg; name board_raw_DM
  property water in wet mass 56.32 kg; name board_raw_WWM; = board_raw_DM* board_raw_water_content
  property wet mass 619.52 kg; name board_raw_WM; = board_raw_DM*(1+ board_raw_water_content)
  property carbon content, fossil 0; name board_raw_C_content_fossil
  property carbon content, non-fossil 0.494; name board_raw_C_content_non_fossil
  property water content 0.1; name board_raw_water_content
- sawnwood, beam, hardwood, raw, dried (u=10%): 0.2 m3; name beam_raw
  The input share has been calculated using data from the drying activity
  property water content 0.1; name beam_raw_water_content
  property carbon content, fossil 0; name beam_raw_C_content_fossil
  property water in wet mass 56.32 kg; name beam_raw_WWM; = beam_raw_DM* beam_raw_water_content
  property carbon content, non-fossil 0.494; name beam_raw_C_content_non_fossil
  property dry mass 563.2 kg; name beam_raw_DM
  property wet mass 619.52 kg; name beam_raw_WM; = beam_raw_DM*(1+ beam_raw_water_content)
- sawnwood, lath, hardwood, raw, dried (u=10%): 0.4 m3; name lath_raw
  The input share has been calculated using data from the drying activity
  property dry mass 563.2 kg; name lath_raw_DM
  property wet mass 619.52 kg; name lath_raw_WM; = lath_raw_DM*(1+ lath_raw_water_content)
  property carbon content, non-fossil 0.494; name lath_raw_C_content_non_fossil
  property carbon content, fossil 0; name lath_raw_C_content_fossil
  property water content 0.1; name lath_raw_water_content
  property water in wet mass 56.32 kg; name lath_raw_WWM; = lath_raw_DM* lath_raw_water_content

## Extrapolations
This dataset has been extrapolated from year 2014 to the year of the calculation (2019). The uncertainty has been adjusted accordingly.
