# treatment of waste polyvinylchloride, open burning

Dataset: EcoSpold 2, unit process
Geography: GLO
Time period: 2006-01-01 to 2019-12-31
Technology level: current
Classification: ISIC rev.4 ecoinvent: 3821:Treatment and disposal of non-hazardous waste
Synonyms: open, uncontrolled burning
Scenario: Business-as-Usual
System model: Allocation at the point of substitution
Share of production covered: 1 %
Generated by: Avraam Symeonidis
Database: ecoinvent
isCopyrightProtected: true
accessRestrictedTo: 1

## General comment
This dataset represents the activity of waste disposal of waste polyvinylchloride in uncontrolled, open burning. Recommended use of this dataset: For PVC, which goes to disposal as part of unmanaged communal waste mixture.Waste composition (wet, in ppm): upper heating value 21.67 MJ/kg; lower heating value 21.51 MJ/kg; H2O 2000; O 16911; H 54921; C 440610; S 1057; N 1057; P n.a.; B n.a.; Cl 475290; Br 73.839; F 15.506; I n.a.; Ag n.a.; As 2.0042; Ba 196.73; Cd 2.7546; Co 33.322; Cr 43.106; Cu 28.223; Hg 0.89569; Mn 84.301; Mo n.a.; Ni 21.729; Pb 16.002; Sb 45.323; Se 2.2152; Sn 391.41; V 303.95; Zn 59.775; Be 0.52742; Sc n.a.; Sr 93.353; Ti 1054.8; Tl 0.42194; W n.a.; Si n.a.; Fe 3930; Ca n.a.; Al 210.97; K n.a.; Mg n.a.; Na 1545.9; . Share of carbon in waste that is biogenic 0%. // Recycling rates for metallic iron = 0% for metallic aluminium = 0% for metallic copper = 0% . A mass of 0.25kg residues are left on ground.

## Included activities start
open burning starting from waste placement on burning site (without transports to the site)

## Included activities end
Waste-specific emissions to air and soil from open burning.

## Geography
Generic open burning without any geographical distinction.

## Technology
This is an inventory for open burning of solid waste. Informal or uncontrolled burning. No flue gas treatment. Suitable for informal recycling (e.g. burning of e-waste). Based on Municipal waste incineration without any pollution control. Residues (minus any actually recycled metals) are left on site. Assumption of share of thermal NOx to total NOx in average waste burning process is 30%. Contribution from thermal NOx is 810mg per kg waste. Recycling rates for metallic iron = 0% for metallic aluminium = 0% for metallic copper = 0% .

## Time period
generic open burning without any temporal distinction

## Reference product
- waste polyvinylchloride: -1 kg; By-product classification Waste; CPC 39270: Waste, parings and scrap of plastics; CAS 9002-86-2; pedigree (1,1,1,1,1)
  main reference product of this activity (supply of disposal service).
  Uncertainty: Uncertainty is not adjusted, as this is the refence product
  production volume 1 kg
    The amount of the annual production volume is a placeholder value. The contribution of this technology to the different local markets can be found in the markets themselves.
  property price 0 EUR2005
    Waste products are assigned a price of zero as they are assumed to require further treatment.
  property carbon content 0.44149
    carbon content on a dry matter basis (reserved; not for manual entry)
  properties: carbon content, fossil 0.44149, heating value, net 21.513 MJ, copper content 2.828e-5, aluminium content 0.00021139, strontium content 9.354e-5, iron content 0.0039379, wet mass 1 kg, cobalt content 3.3389e-5, hydrogen content 0.055031, selenium content 2.2196e-6, heating value, gross 21.673 MJ, water in wet mass 0.002 kg, titanium content 0.001057, manganese content 8.447e-5, water content 0.002004, fluorine content 1.5537e-5, lead content 1.6034e-5, vanadium content 0.00030456, oxygen content 0.016945, arsenic content 2.0082e-6, thallium content 4.2278e-7, mercury content 8.9749e-7, cadmium content 2.7601e-6, nitrogen content 0.0010591, chlorine content 0.47624, barium content 0.00019712, beryllium content 5.2848e-7, nickel content 2.1772e-5, zinc content 5.9894e-5, sodium content 0.001549, bromine content 7.3987e-5, sulfur content 0.0010591, chromium content 4.3192e-5, dry mass 0.998 kg, antimony content 4.5414e-5, tin content 0.0003922, carbon allocation 0.440607 kg

## Inputs from nature
- Oxygen [natural resource, in air]: 1.4418 kg; lognormal variance with pedigree 0.027892, pedigree (1,1,3,1,1)
  oxygen from ambient air needed to combust and oxidise this waste. Net demand, i.e. without air O2 leaving the process uncombusted.
  Uncertainty: uncertainty is calculated from uncertainties in waste composition and transfer coefficients to flue gas and soild residues

## Emissions to nature
- Nickel [air, urban air close to ground]: 3.1e-8 kg; lognormal variance with pedigree 1.2606, pedigree (1,1,3,1,1)
  Emissions to air from open burning.
  Uncertainty: Uncertainty calculated depending on waste input and uncertainty of transfer coefficents in incineration model.
- Cobalt [soil, industrial]: 3.1978e-5 kg; lognormal variance with pedigree 1.1103, pedigree (1,1,3,1,1)
  Emissions from open burning to residues left on ground.
  Uncertainty: Uncertainty calculated depending on waste input and uncertainty of transfer coefficents in incineration model.
- Cobalt [air, urban air close to ground]: 1.344e-6 kg; lognormal variance with pedigree 1.1364, pedigree (1,1,3,1,1)
  (same comment as for Nickel)
- Barium [soil, industrial]: 0.00018862 kg; lognormal variance with pedigree 0.87403, pedigree (1,1,3,1,1)
  (same comment as for Cobalt)
- Chromium [air, urban air close to ground]: 6.4279e-8 kg; lognormal variance with pedigree 1.1685, pedigree (1,1,3,1,1)
  (same comment as for Nickel)
- Cadmium [soil, industrial]: 2.739e-6 kg; lognormal variance with pedigree 1.4395, pedigree (1,1,3,1,1)
  (same comment as for Cobalt)
- Barium [air, urban air close to ground]: 8.1084e-6 kg; lognormal variance with pedigree 0.89979, pedigree (1,1,3,1,1)
  (same comment as for Nickel)
- Arsenic [soil, industrial]: 1.9871e-6 kg; lognormal variance with pedigree 1.481, pedigree (1,1,3,1,1)
  (same comment as for Cobalt)
- Arsenic [air, urban air close to ground]: 1.7082e-8 kg; lognormal variance with pedigree 1.5345, pedigree (1,1,3,1,1)
  (same comment as for Nickel)
- Bromine [soil, industrial]: 5.016e-5 kg; lognormal variance with pedigree 1.0048, pedigree (1,1,3,1,1)
  (same comment as for Cobalt)
- Cadmium [air, urban air close to ground]: 1.5585e-8 kg; lognormal variance with pedigree 1.5014, pedigree (1,1,3,1,1)
  (same comment as for Nickel)
- Fluoride [soil, industrial]: 1.3853e-5 kg; lognormal variance with pedigree 1.2119, pedigree (1,1,3,1,1)
  (same comment as for Cobalt)
- Hydrogen fluoride [air, urban air close to ground]: 1.7401e-6 kg; lognormal variance with pedigree 1.2251, pedigree (1,1,3,1,1)
  (same comment as for Nickel)
- Nitrogen [soil, industrial]: 1.0582e-5 kg; lognormal variance with pedigree 0.70267, pedigree (1,1,3,1,1)
  (same comment as for Cobalt)
- Hydrogen chloride [air, urban air close to ground]: 0.32601 kg; lognormal variance with pedigree 0.018425, pedigree (1,1,3,1,1)
  (same comment as for Nickel)
- Sulfur [soil, industrial]: 0.00090521 kg; lognormal variance with pedigree 0.65246, pedigree (1,1,3,1,1)
  (same comment as for Cobalt)
- Bromine [air, urban air close to ground]: 2.3679e-5 kg; lognormal variance with pedigree 1.008, pedigree (1,1,3,1,1)
  (same comment as for Nickel)
- Chloride [soil, industrial]: 0.15822 kg; lognormal variance with pedigree 0.021349, pedigree (1,1,3,1,1)
  (same comment as for Cobalt)
- Nitrogen oxides [air, urban air close to ground]: 0.0020953 kg; lognormal variance with pedigree 0.36773, pedigree (1,1,3,1,1)
  (same comment as for Nickel)
- Carbon [soil, industrial]: 0.0022097 kg; lognormal variance with pedigree 0.085622, pedigree (1,1,3,1,1)
  (same comment as for Cobalt)
- Dinitrogen monoxide [air, urban air close to ground]: 0.00011625 kg; lognormal variance with pedigree 0.0431, pedigree (1,1,3,1,1)
  (same comment as for Nickel)
- Polychlorinated biphenyls [air, urban air close to ground]: 1.1189e-7 kg; lognormal variance with pedigree 0.0431, pedigree (1,1,3,1,1)
  Process-specific (constant) emissions to air from open burning.
  Uncertainty: uncertainty generic estimate
- Sulfur dioxide [air, urban air close to ground]: 0.00045523 kg; lognormal variance with pedigree 0.66253, pedigree (1,1,3,1,1)
  (same comment as for Nickel)
- PAH, polycyclic aromatic hydrocarbons [air, urban air close to ground]: 0.0003443 kg; lognormal variance with pedigree 0.30374, pedigree (1,1,3,1,1)
  (same comment as for Polychlorinated biphenyls)
- Methane, fossil [air, urban air close to ground]: 0.0059 kg; lognormal variance with pedigree 0.0431, pedigree (1,1,3,1,1)
  (same comment as for Polychlorinated biphenyls)
- Benzene, ethyl- [air, urban air close to ground]: 0.00032746 kg; lognormal variance with pedigree 0.0431, pedigree (1,1,3,1,1)
  (same comment as for Polychlorinated biphenyls)
- Carbon dioxide, fossil [air, urban air close to ground]: 1.5306 kg; lognormal variance with pedigree 0.022829, pedigree (1,1,3,1,1)
  Emissions to air from open burning.
  Uncertainty: Uncertainty calculated depending on waste input, uncertainty of transfer coefficents in incineration model,and uncertainty in CO and CH4 emissions.
- Formaldehyde [air, urban air close to ground]: 0.00044365 kg; lognormal variance with pedigree 0.0431, pedigree (1,1,3,1,1)
  (same comment as for Polychlorinated biphenyls)
- Carbon monoxide, fossil [air, urban air close to ground]: 0.0386 kg; lognormal variance with pedigree 0.64957, pedigree (1,1,3,1,1)
  (same comment as for Polychlorinated biphenyls)
- Acetaldehyde [air, urban air close to ground]: 0.0004284 kg; lognormal variance with pedigree 0.0431, pedigree (1,1,3,1,1)
  (same comment as for Polychlorinated biphenyls)
- Phenol [air, urban air close to ground]: 1.4799e-5 kg; lognormal variance with pedigree 0.0431, pedigree (1,1,3,1,1)
  (same comment as for Polychlorinated biphenyls)
- Styrene [air, urban air close to ground]: 0.0005275 kg; lognormal variance with pedigree 0.0431, pedigree (1,1,3,1,1)
  (same comment as for Polychlorinated biphenyls)
- Toluene [air, urban air close to ground]: 0.000372 kg; lognormal variance with pedigree 0.0431, pedigree (1,1,3,1,1)
  (same comment as for Polychlorinated biphenyls)
- Dioxins, measured as 2,3,7,8-tetrachlorodibenzo-p-dioxin [air, urban air close to ground]: 3.8763e-8 kg; lognormal variance with pedigree 0.4984, pedigree (1,1,3,1,1)
  Process-specific (constant) emissions to air from open burning.
  Uncertainty: Uncertainty calculated from uncetainty in Chlorine content in waste and estimation formula
- Particulates, < 2.5 um [air, urban air close to ground]: 0.23937 kg; lognormal variance with pedigree 0.018408, pedigree (1,1,3,1,1)
  (same comment as for Nickel)
- Water [air, urban air close to ground]: 0.00044137 m3; lognormal variance with pedigree 0.17837, pedigree (1,1,3,1,1)
  water vapour from waste humidity, hydrogen oxidation.
  Uncertainty: Uncertainty calculated from uncertainty in waste composition and the uncertainty of fraction to air.
- Benzene [air, urban air close to ground]: 0.00097975 kg; lognormal variance with pedigree 0.0431, pedigree (1,1,3,1,1)
  (same comment as for Polychlorinated biphenyls)
- Sodium [soil, industrial]: 0.0015078 kg; lognormal variance with pedigree 0.60305, pedigree (1,1,3,1,1)
  (same comment as for Cobalt)
- Particulates, > 2.5 um, and < 10um [air, urban air close to ground]: 0.12889 kg; lognormal variance with pedigree 0.018408, pedigree (1,1,3,1,1)
  (same comment as for Nickel)
- Dioxins, measured as 2,3,7,8-tetrachlorodibenzo-p-dioxin [soil, industrial]: 1.0768e-8 kg; lognormal variance with pedigree 0.97885, pedigree (1,1,3,1,1)
  (same comment as for Dioxins, measured as 2,3,7,8-tetrachlorodibenzo-p-dioxin)
- Particulates, > 10 um [air, urban air close to ground]: 0.092066 kg; lognormal variance with pedigree 0.018408, pedigree (1,1,3,1,1)
  (same comment as for Nickel)
- Aluminium [soil, industrial]: 0.00021079 kg; lognormal variance with pedigree 0.86475, pedigree (1,1,3,1,1)
  (same comment as for Cobalt)
- Sodium [air, urban air close to ground]: 3.8076e-5 kg; lognormal variance with pedigree 0.63696, pedigree (1,1,3,1,1)
  (same comment as for Nickel)
- Thallium [soil, industrial]: 4.2109e-7 kg; lognormal variance with pedigree 1.6827, pedigree (1,1,3,1,1)
  (same comment as for Cobalt)
- Aluminium [air, urban air close to ground]: 1.739e-7 kg; lognormal variance with pedigree 0.97211, pedigree (1,1,3,1,1)
  (same comment as for Nickel)
- Iron [soil, industrial]: 0.0039229 kg; lognormal variance with pedigree 0.48407, pedigree (1,1,3,1,1)
  (same comment as for Cobalt)
- Iron [air, urban air close to ground]: 7.1206e-6 kg; lognormal variance with pedigree 0.5718, pedigree (1,1,3,1,1)
  (same comment as for Nickel)
- Beryllium [soil, industrial]: 5.2642e-7 kg; lognormal variance with pedigree 1.654, pedigree (1,1,3,1,1)
  (same comment as for Cobalt)
- Thallium [air, urban air close to ground]: 8.4387e-10 kg; lognormal variance with pedigree 1.768, pedigree (1,1,3,1,1)
  (same comment as for Nickel)
- Titanium [soil, industrial]: 0.0010437 kg; lognormal variance with pedigree 0.65265, pedigree (1,1,3,1,1)
  (same comment as for Cobalt)
- Titanium [air, urban air close to ground]: 1.1185e-5 kg; lognormal variance with pedigree 0.70181, pedigree (1,1,3,1,1)
  (same comment as for Nickel)
- Strontium [soil, industrial]: 9.326e-5 kg; lognormal variance with pedigree 0.97318, pedigree (1,1,3,1,1)
  (same comment as for Cobalt)
- Strontium [air, urban air close to ground]: 9.3353e-8 kg; lognormal variance with pedigree 1.0756, pedigree (1,1,3,1,1)
  (same comment as for Nickel)
- Zinc [soil, industrial]: 5.933e-5 kg; lognormal variance with pedigree 1.0325, pedigree (1,1,3,1,1)
  (same comment as for Cobalt)
- Beryllium [air, urban air close to ground]: 9.9685e-10 kg; lognormal variance with pedigree 1.7407, pedigree (1,1,3,1,1)
  (same comment as for Nickel)
- Tin [soil, industrial]: 0.00039141 kg; lognormal variance with pedigree 0.78285, pedigree (1,1,3,1,1)
  (same comment as for Cobalt)
- Zinc [air, urban air close to ground]: 4.4472e-7 kg; lognormal variance with pedigree 1.0888, pedigree (1,1,3,1,1)
  (same comment as for Nickel)
- Vanadium [soil, industrial]: 0.00028048 kg; lognormal variance with pedigree 0.81633, pedigree (1,1,3,1,1)
  (same comment as for Cobalt)
- Vanadium [air, urban air close to ground]: 2.3468e-5 kg; lognormal variance with pedigree 0.83345, pedigree (1,1,3,1,1)
  (same comment as for Nickel)
- Selenium [soil, industrial]: 2.0232e-6 kg; lognormal variance with pedigree 1.468, pedigree (1,1,3,1,1)
  (same comment as for Cobalt)
- Selenium [air, urban air close to ground]: 1.9198e-7 kg; lognormal variance with pedigree 1.4837, pedigree (1,1,3,1,1)
  (same comment as for Nickel)
- Lead [soil, industrial]: 1.5868e-5 kg; lognormal variance with pedigree 1.2077, pedigree (1,1,3,1,1)
  (same comment as for Cobalt)
- Tin [air, urban air close to ground]: 7.6702e-10 kg; lognormal variance with pedigree 1.0755, pedigree (1,1,3,1,1)
  (same comment as for Nickel)
- Antimony [soil, industrial]: 4.5323e-5 kg; lognormal variance with pedigree 1.0694, pedigree (1,1,3,1,1)
  (same comment as for Cobalt)
- Lead [air, urban air close to ground]: 1.3447e-7 kg; lognormal variance with pedigree 1.2614, pedigree (1,1,3,1,1)
  (same comment as for Nickel)
- Nickel [soil, industrial]: 2.1698e-5 kg; lognormal variance with pedigree 1.1671, pedigree (1,1,3,1,1)
  (same comment as for Cobalt)
- Antimony [air, urban air close to ground]: 1.0892e-10 kg; lognormal variance with pedigree 1.355, pedigree (1,1,3,1,1)
  (same comment as for Nickel)
- Mercury [soil, industrial]: 3.5285e-7 kg; lognormal variance with pedigree 1.5881, pedigree (1,1,3,1,1)
  (same comment as for Cobalt)
- Mercury [air, urban air close to ground]: 5.4284e-7 kg; lognormal variance with pedigree 1.5864, pedigree (1,1,3,1,1)
  (same comment as for Nickel)
- Manganese [soil, industrial]: 8.3583e-5 kg; lognormal variance with pedigree 0.98676, pedigree (1,1,3,1,1)
  (same comment as for Cobalt)
- Manganese [air, urban air close to ground]: 7.1758e-7 kg; lognormal variance with pedigree 1.0403, pedigree (1,1,3,1,1)
  (same comment as for Nickel)
- Chromium [soil, industrial]: 4.3042e-5 kg; lognormal variance with pedigree 1.076, pedigree (1,1,3,1,1)
  (same comment as for Cobalt)
- Copper [air, urban air close to ground]: 3.102e-8 kg; lognormal variance with pedigree 1.2324, pedigree (1,1,3,1,1)
  (same comment as for Nickel)
- Copper [soil, industrial]: 2.8192e-5 kg; lognormal variance with pedigree 1.1324, pedigree (1,1,3,1,1)
  (same comment as for Cobalt)

## Extrapolations
This dataset has been extrapolated from year 2012 to the year of the calculation (2019). The uncertainty has been adjusted accordingly.
