# potassium chloride production

Dataset: EcoSpold 2, unit process
Geography: RER
Time period: 2000-01-01 to 2019-12-31
Technology level: current
Classification: ISIC rev.4 ecoinvent: 2012:Manufacture of fertilizers and nitrogen compounds
Classification: EcoSpold01Categories: agricultural means of production/mineral fertiliser
Tags: ConvertedDataset
Scenario: Business-as-Usual
System model: Allocation at the point of substitution
Share of production covered: 27 %
Generated by: Thomas Nemecek
Published in: Nemecek, T. 2007
Database: ecoinvent
isCopyrightProtected: true
accessRestrictedTo: 1

## General comment
Refers to 1 kg K2O, resp. 1.67 kg potassium chloride with a K2O-content of 60.0%
[This dataset was already contained in the ecoinvent database version 2. It was not individually updated during the transfer to ecoinvent version 3. Life Cycle Impact Assessment results may still have changed, as they are affected by changes in the supply chain, i.e. in other datasets. This dataset was generated following the ecoinvent quality guidelines for version 2. It may have been subject to central changes described in the ecoinvent version 3 change report (http://www.ecoinvent.org/database/ecoinvent-version-3/reports-of-changes/), and the results of the central updates were reviewed extensively. The changes added e.g. consistent water flows and other information throughout the database. The documentation of this dataset can be found in the ecoinvent reports of version 2, which are still available via the ecoinvent website. The change report linked above covers all central changes that were made during the conversion process.]

## Included activities end
Starting from mining of potash salts, the processes of concentration of the potassium chloride, conditioning, drying and transport to the regional storage were included. The use of the resource sylvinite was accounted for as well as the disposal of the salt residues on heaps and to rivers. Treatment of other wastes was included. Coating and packaging of the final fertiliser products were not included. Infrastructure was included by means of a proxy module.

## Geography
The data refer to Germany.

## Technology
The potash salts stem from underground mines. Three different technologies are used to concentrate the salt: solution in hot water, flotation and electrostatic separation. The inventory describes a mixture of these processes.

## Time period
Data come from an environmental report for the year 2000.

## Parameters
- fraction, cooling water, recirculating system, to air: 0.771; name fraction_CW_R_to_air; lognormal variance with pedigree 0.0413, pedigree (2,3,1,3,1)
  Calculated based on literature value (Scown, C.D., 2011, Water Footprint of U.S. Transportation Fuels and supplying information of the article) (Vionnet, S., Quantis Water Database - Technical Report, 2012).
- fraction, cooling water, to air: 0.3875; name fraction_CW_to_air; = (0.5*fraction_CW_OT_to_air)+(0.5*fraction_CW_R_to_air); lognormal variance with pedigree 0.092025, pedigree (4,4,3,2,4)
  Calculated value based on literature value (see comments of the other parametres present in this dataset) and expert opinion. In the case when no industry/literature data are available about the type of cooling or directly fraction, cooling water, to air specific for the process a default assumption is applied. It is assumed that the once-through cooling system is used in 50% of all cases and recirculating system is used in another 50% of all cases.
- fraction, process water, to air: 0.36 dimensionless; name fraction_PW_to_air; lognormal variance with pedigree 0.092025, pedigree (4,4,3,2,4)
  Literature value (Statistics Canada, 2007 & Shaffer, K.H., 2008, Consumptive water use in the Great Lakes Basin, USGS) (Vionnet, S., Quantis Water Database - Technical Report, 2012).
- fraction, cooling water, once-through system, to air: 0.004; name fraction_CW_OT_to_air; lognormal variance with pedigree 0.0413, pedigree (2,3,1,3,1)
  (same comment as for fraction, cooling water, recirculating system, to air)
- fraction, cooling water, cooling pond system, to air: 0.032; name fraction_CW_CP_to_air; lognormal variance with pedigree 0.0413, pedigree (2,3,1,3,1)
  (same comment as for fraction, cooling water, recirculating system, to air)

## Reference product
- potassium chloride, as K2O: 1 kg; By-product classification allocatable product; CPC 34631: Potassium chloride (muriate of potash)
  EcoSpold01Location=RER
  production volume 1.58e10 kg
    3.1 mio t in Germany, 11.6 mio t in Europe in 2000
    Source: IFA production and trade statistics http://www.fertilizer.org/ifa/Home-Page/STATISTICS/Production-and-trade
  property price 0.184 EUR2005
    Prices are calculated on basis of Import/Export data (tonnes and US$) from UN Trade Statistics Database (http://data.un.org/Browse.aspx?d=ComTrade, accessed 7/7-2010). N, P2O5, or K2O content (http://www.fertilizer.org/ifa/Home-Page/STATISTICS/Conversions-factors)
  property carbon content 0
    carbon content on a dry matter basis (reserved; not for manual entry)
  properties: water in wet mass 0 kg, dry mass 1 kg, carbon content, non-fossil 0, water content 0, wet mass 1 kg, carbon content, fossil 0, carbon allocation 0 kg

## Inputs from technosphere
- chemical, inorganic: 0.0101 kg; lognormal variance with pedigree 0.0413, pedigree (2,3,5,3,1)
  EcoSpold01Location=GLO
  properties: wet mass 1 kg, dry mass 1 kg, carbon content, fossil 0.003
  note on carbon content, fossil: This dataset is an unweighted average of 20 inorganic substances (listed in Tab 88.1, ecoinvent v2.2 report 8, part II), being part of the top100 chemicals included in this database. The C-content has also been calculated as an unweighted average of the C content of the substances composing this dataset.
- heat, central or small-scale, natural gas: 3.23 MJ; lognormal variance with pedigree 0.0413, pedigree (2,3,5,3,1)
  This exchange replaces the old flow "natural gas, burned in cogen 1MWe lean burn"
- hazardous waste, for incineration: 0 kg; pedigree (1,1,1,1,1)
  EcoSpold01Location=CH
  production volume 0 kg
    Calculated from the production volume of potassium chloride, as K2O in proportion to the respective output amounts.
  properties: water content 0.333333, wet mass 1 kg, dry mass 0.75 kg, carbon content, fossil 0.554667
  note on carbon content, fossil: Tab A.6, ecoinvent v2.2 report 13_I. C content has been calculated after data in the tables, and then referred to 1 kg DM
- chemical factory, organics: 6.67e-10 unit; lognormal variance with pedigree 0.3413, pedigree (2,3,5,3,1)
  activityLink introduced to establish a direct link to the corresponding regional supply of this product
  EcoSpold01Location=RER
- salt tailing from potash mine: -4.58 kg; lognormal variance with pedigree 0.0413, pedigree (2,3,5,3,1)
  EcoSpold01Location=CH
  production volume 7.2364e10 kg
    (same comment as for hazardous waste, for incineration)
  properties: wet mass 1 kg, dry mass 1 kg
- heat, district or industrial, natural gas: 0.49875 MJ; lognormal variance with pedigree 0.0413, pedigree (2,3,5,3,1)
  EcoSpold01Location=RER
- municipal solid waste: -0.000717 kg; lognormal variance with pedigree 0.0413, pedigree (2,3,5,3,1)
  EcoSpold01Location=CH
  production volume 1.13286e7 kg
    (same comment as for hazardous waste, for incineration)
  properties: carbon content, fossil 0.171549, dry mass 0.771 kg, wet mass 1 kg, water content 0.297017, carbon content, non-fossil 0.261655
  note on carbon content, fossil: MSW composition in tab 4.1, ecoinvent v2.2 report 13_I. C content referred to 1 kg DM
- diesel, burned in building machine: 0.139 MJ; lognormal variance with pedigree 0.0413, pedigree (2,3,5,3,1)
  EcoSpold01Location=GLO
- hazardous waste, for incineration: -0.00030795, -8.04964e-6 kg (2 entries); lognormal variance with pedigree 0.0413, pedigree (2,3,5,3,1)
  EcoSpold01Location=CH
  production volume 4.9928e6 kg

## Inputs from nature
- Water, cooling, unspecified natural origin [natural resource, in water]: 0.013 m3; name water_cooling_UNO_input; lognormal variance with pedigree 0.0413, pedigree (2,3,5,3,1)
- Water, river [natural resource, in water]: 0.0035 m3; name water_river_input; lognormal variance with pedigree 0.0413, pedigree (2,3,5,3,1)
- Sylvite, in ground [natural resource, in ground]: 1.89 kg; lognormal variance with pedigree 0.0413, pedigree (2,3,5,3,1)
  25% Sylvite in sylvinite

## Emissions to nature
- Potassium, ion [water, surface water]: 0.00161 kg; lognormal variance with pedigree 0.1093, pedigree (2,3,5,3,3)
- Particulates, > 2.5 um, and < 10um [air, urban air close to ground]: 6.16e-7 kg; lognormal variance with pedigree 0.1793, pedigree (2,3,5,3,3)
- Calcium, ion [water, surface water]: 0.00209 kg; lognormal variance with pedigree 0.1093, pedigree (2,3,5,3,3)
- Particulates, > 10 um [air, urban air close to ground]: 1.4e-5 kg; lognormal variance with pedigree 0.1093, pedigree (2,3,5,3,3)
- Magnesium [water, surface water]: 0.0121 kg; lognormal variance with pedigree 0.1093, pedigree (2,3,5,3,3)
- Water [air, unspecified]: 0.0062975 m3; name water_to_air_unspecified; = (water_cooling_UNO_input*fraction_CW_to_air)+(water_river_input*fraction_PW_to_air); lognormal variance with pedigree 0.0807, pedigree (2,2,5,1,1)
  Calculated value based on literature values and expert opinion. See comments in the parametres' comment field.
  property fraction, origin: unspecified 0.799921; name fraction_origin_unspecified
  property fraction, origin: salt water 0; name fraction_origin_salt_water
  property fraction, origin: fresh water 0.200079; name fraction_origin_fresh_water
- Hydrogen chloride [air, urban air close to ground]: 9.28e-6 kg; lognormal variance with pedigree 0.1093, pedigree (2,3,5,3,3)
- Water [water, unspecified]: 0.0102025 m3; name water_to_water_unspecified; = water_cooling_UNO_input*(1-fraction_CW_to_air)+water_river_input*(1-fraction_PW_to_air); lognormal variance with pedigree 0.0807, pedigree (2,2,5,1,1)
  (same comment as for Water)
  property fraction, origin: salt water 0; name fraction_origin_salt_water_Ww
  property fraction, origin: unspecified 0.780446; name fraction_origin_unspecified_Ww
  property fraction, origin: fresh water 0.219554; name fraction_origin_fresh_water_Ww
  property carbon content, fossil 0; name C_content_fossil
  property wet mass 1000 kg; name WM
  property carbon content, non-fossil 0; name C_content_non_fossil
  property water in wet mass 1000 kg; name WWM
  property dry mass 0 kg; name DM
- Sulfur [water, surface water]: 0.0125 kg; lognormal variance with pedigree 0.1093, pedigree (2,3,5,3,3)
- Chloride [water, surface water]: 0.126 kg; lognormal variance with pedigree 0.1093, pedigree (2,3,5,3,3)
- Particulates, < 2.5 um [air, urban air close to ground]: 7.7e-7 kg; lognormal variance with pedigree 0.3693, pedigree (2,3,5,3,3)
- Sodium, ion [water, surface water]: 0.0736 kg; lognormal variance with pedigree 0.1093, pedigree (2,3,5,3,3)

## Sampling procedure
The data base on an environmental report of Kali & Salz (2001). They were supplemented by literature data.

## Extrapolations
This dataset has been extrapolated from year 2000 to the year of the calculation (2019). The uncertainty has been adjusted accordingly.

## Review by Maggie Osses 2003-09-22
Passed.
