# insulated gate bipolar transistor production, for electric vehicle applications

Dataset: EcoSpold 2, unit process
Geography: GLO
Time period: 2005-01-01 to 2019-12-31
Technology level: current
Classification: ISIC rev.4 ecoinvent: 2610:Manufacture of electronic components and boards
Scenario: Business-as-Usual
System model: Allocation at the point of substitution
Generated by: Andrea Del Duce
Database: ecoinvent
isCopyrightProtected: true
accessRestrictedTo: 1

## General comment
This dataset describes the production of an insulated gate bipolar transistor (IGBT) used in the power electronics of electric vehicles. It is based on the direct inspection of a commercial device.

## Included activities start
The dataset takes as input the various electronic components required to build the transistor and includes the components' production efforts. Assembly energy not included due to lack of data.

## Included activities end
The dataset returns the assembled device and production waste as a by-product.

## Reference product
- insulated gate bipolar transistor, electric vehicle application: 1 kg; By-product classification allocatable product; CPC 47150: Diodes, transistors and similar semi-conductor devices; photosensitive semi-conductor devices; light emitting […]
  production volume 3.44e6 kg
    Rough estimate based on 1% electric scooters out of 466E6 world two wheeler production projection between 2010 and 2016.(www.electric-bicycle-guide.com)
  property price 14 EUR2005
    Calculated based on literature values and estimates. The producer's price of a bicycle in Europe is approximatelly 100 Euro (UN Commodity trade database). The average purchaser's price of a bicycle in Europe is approximatelly 300 Euro (estimated based on; Association of the European Two-Wheeler Parts' & Acessories' Industry, http://www.ziv-zweirad.de/public/european-bicycle-market-industry-profile-2010.pdf). The purchaser's price of an electric scooter is app. 4600 Euro (estimated based on producer's information; http://vespino.ch/?page_id=6) for electric scooter which weight 110kg. The purchaser's price is thus (1/110*4600=) 41.8 Euro/kg. The producer's price is calculated as 1/3 of the purchaser's price (based on the information on bicycles) (1/3*41.8=) 14 Euro/kg.
  property true value 3.444
    allocation property applied in "true value" allocation // value calculated from revenue

## By-products
- aluminium, cast alloy: 0 kg; source European Aluminium Association 2008; By-product classification allocatable product; CPC 41431: Unwrought aluminium; pedigree (1,1,1,1,1)
  EcoSpold01Location=RER
  production volume 71161.7 kg
  property price 1.3 EUR2005; name castAlloyAmount_price_EUR2005
  properties: carbon content, fossil 0, dry mass 1 kg, wet mass 1 kg, water content 0, water in wet mass 0 kg, carbon content, non-fossil 0, carbon content 0, carbon allocation 0 kg, true value 0.00314306
- iron scrap, unsorted: 0 kg; source European Aluminium Association 2008; CPC 39310: Slag, dross, scalings and other waste from the manufacture of iron or steel; By-product classification Recyclable; pedigree (1,1,1,1,1)
  production volume 120.979 kg
  property price 0.149 EUR2005; name ironScrapAmount_price_EUR2005
    Temporary price data. Calculated as 90% of purchasers price based on: estimated at 85% of sorted scrap
  property carbon content 0
    carbon content on a dry matter basis (reserved; not for manual entry)
  property true value 6.12435e-7
    allocation property applied in "true value" allocation // value calculated from revenue
  properties: wet mass 1 kg, water content 0, water in wet mass 0 kg, dry mass 1 kg, carbon content, fossil 0, carbon content, non-fossil 0, carbon allocation 0 kg
- aluminium oxide, non-metallurgical: 0 kg; source European Aluminium Association 2008; CPC 41432: Alumina (aluminium oxide), except artificial corundum; By-product classification allocatable product; CAS 1344-28-1; pedigree (1,1,1,1,1)
  production volume 7612.68 kg
  property dry mass 1 kg; name DM
  property wet mass 1 kg; name WM
  property carbon content, fossil 0; name C_content_fossil
  property water in wet mass 0 kg; name WWM
  property water content 0; name water_content
  property price 0.28 EUR2005; name Al2O3Amount_price_EUR2005
    From UN trade database. http://data.un.org/ Import data from the largest economies of the world are used (Brazil, India, USA, China, Japan and EU-27).
  property carbon content, non-fossil 0; name C_content_non_fossil
  property carbon content 0
    carbon content on a dry matter basis (reserved; not for manual entry)
  property true value 7.242e-5
    allocation property applied in "true value" allocation // value calculated from revenue
  properties: carbon allocation 0 kg
- heat, for reuse in municipal waste incineration only: 0 MJ; CPC 17300: Steam and hot water; By-product classification allocatable product; pedigree (1,1,1,1,1)
  Net electricity generated from this waste and used in internal MSWI plant energy redistribution.
  Uncertainty: uncertainty is calculated from uncertainties in waste composition and uncertainties in energy efficiency and the uncertainty in internal energy demand
  production volume 19009.1 MJ
  property exergy 0.1842 MJ; name E_th_prod_MSWI_exergy
    This exergy property is based on the exergy content of the product.
  property true value relation 0.1842; name E_th_prod_MSWI_true_value_relation
    property to calculate "true value" from
  property price 0.0106 EUR2005; name E_th_prod_MSWI_price_EUR2005
    Average European district heat price from Ecoheatcool and Euroheat 2005-2006, Ecoheat Work package 1: The European heat market. Final report. 10.6 EUR/GJ i s the price of district heat. http://www.solarthermalworld.org/files/Ecoheatcool%20WP1%20Web.pdf?download
  property true value 4.23229e-6
    allocation property applied in "true value" allocation // value calculated from true value relation
- electricity, for reuse in municipal waste incineration only: 0 kWh; CPC 17100: Electrical energy; By-product classification allocatable product; pedigree (1,1,1,1,1)
  (same comment as for heat, for reuse in municipal waste incineration only)
  production volume 2740.09 kWh
  property exergy 3.6 MJ; name E_el_prod_MSWI_exergy
    This exergy property is based on the exergy content of the product.
  property true value relation 3.6; name E_el_prod_MSWI_true_value_relation
    property to calculate "true value" from
  property price 0.1 EUR2005; name E_el_prod_MSWI_price_EUR2005
    Estimated to be the same price as in case of electricity, medium voltage.
  property true value 1.19232e-5
    (same comment as for heat, for reuse in municipal waste incineration only)
- aluminium, wrought alloy: 0 kg; source European Aluminium Association 2008; By-product classification allocatable product; CPC 4153: Semi-finished products of aluminium or aluminium alloys; pedigree (1,1,1,1,1)
  production volume 60465.6 kg
  property price 1.44 EUR2005; name secondaryAluminiumOutput_price_EUR2005
    Estimated based on literature values and expert judgement. Aluminium ccast alloys are about 90% of the price of aluminium wrought alloys.
  property carbon content 0
    carbon content on a dry matter basis (reserved; not for manual entry)
  property true value 0.0033023
    allocation property applied in "true value" allocation // value calculated from revenue
  properties: dry mass 1 kg, wet mass 1 kg, carbon content, fossil 0, water content 0, carbon content, non-fossil 0, water in wet mass 0 kg, carbon allocation 0 kg
- copper: 0 kg; By-product classification allocatable product; CPC 41413: Refined copper and copper alloys, unwrought; master alloys of copper; pedigree (1,1,1,1,1)
  Measured value. Based on reported copper waste send to recycling.
  production volume 0.000109675 kg
  property price 5.52 EUR2005; name copper_price_EUR2005
  properties: dry mass 1 kg, carbon content, non-fossil 0, water in wet mass 0 kg, water content 0, carbon content, fossil 0, wet mass 1 kg, carbon content 0, carbon allocation 0 kg, true value 3.81891e-11
- aluminium alloy, AlLi: 0 kg; By-product classification allocatable product; CPC 41431: Unwrought aluminium
  reference flow
  production volume 12.8872 kg
  property price 3.6 EUR2005; name ref_price_EUR2005
    Literature value (http://www.economist.com/news/business/21576714-mining-industry-has-enriched-chile-its-future-precarious-copper-solution). Average price between 20015 and 2013.
  property carbon content 0
    carbon content on a dry matter basis (reserved; not for manual entry)
  property true value 2.92653e-6
    allocation property applied in "true value" allocation // value calculated from revenue
  properties: carbon content, non-fossil 0, carbon content, fossil 0, dry mass 1 kg, wet mass 1 kg, water in wet mass 0 kg, carbon allocation 0 kg
- ground granulated blast furnace slag: 0 kg; By-product classification allocatable product; CPC 37440: Portland cement, aluminous cement, slag cement and similar hydraulic cements, except in the form of clinkers
  Functional unit of LCI by Marceau & VanGeem (2003) was 1 short ton of slag cement (GGBFS) output which was converted to 907.18 kg for the present inventory.
  production volume 1.47587 kg
  property water content 0; name GGBFS_water_content
  property carbon content, non-fossil 0; name GGBFS_C_content_non_fossil
  property water in wet mass 0 kg; name GGBFS_WWM
  property carbon content, fossil 0; name GGBFS_C_content_fossil
    Industry value; Arcelor Mittal, chemical composition of blast furnace slag (http://www.cst.com.br/english/products/co_products/catalog_products/blast_slag/blast_slag.asp, accessed: 20121003).
  property price 0.0615 EUR2005; name GGBFS_price_EUR2005
    2005 import and export prices (total trades (USD) divided by total weight (kg) in China, India, USA, Japan, Russia and Europe, major producers and consumers (http://www.cementchina.net/freport/showfre.asp?id=749) from UN Commodity Trade Statistics Database (http://data.un.org/Explorer.aspxDatabase [Accessed 2 July 2010]). Commodity: Cement (portland, aluminious, slag or hydraulic)
  property carbon content 0
    carbon content on a dry matter basis (reserved; not for manual entry)
  property true value 5.72553e-9
    allocation property applied in "true value" allocation // value calculated from revenue
  properties: wet mass 1 kg, dry mass 1 kg, carbon allocation 0 kg
- zinc concentrate: 0 kg; CPC 14290: Other non-ferrous metal ores and concentrates (other than uranium or thorium ores and concentrates); By-product classification allocatable product
  Calculated value from the knowledge of the properties of both products.
  production volume 2.26614e-7 kg
  property price 0.38 EUR2005; name ByP_price_EUR2005
    Temporary price data. Calculated as 90% of purchasers price based on: Zinc content in concentrate 53%. Concentrate price per kg Zn 86.5% of refined Zn price (13.5% treatment charges according to CHR Metals Limited 2005: Dynamic cost curves. http://www.minecost.com/dynamic.pdf). 2004 zinc price from USGS (2007) Mineral commodity summaries 2007. <http://minerals.usgs.gov/minerals/pubs/mcs/2007/mcs2007.pdf> [Accessed 25 May 2010]
  property zinc content 0.53; name zinc_C_zinc_concentrate
    Zinc content on a dry matter basis. Value taken from teh "zinc mine operation" /GLO dataset.
  property dry mass 1 kg; name DM_zinc_concentrate
  property carbon content 0
    carbon content on a dry matter basis (reserved; not for manual entry)
  property true value 5.43203e-15
    allocation property applied in "true value" allocation // value calculated from revenue
  properties: wet mass 1 kg, water content 0, carbon content, non-fossil 0, carbon content, fossil 0, water in wet mass 0 kg, carbon allocation 0 kg
- granulated blast furnace slag: 0 kg; By-product classification allocatable product
  production volume 6.10994 kg
  property wet mass 1 kg; name GBFS_WM
  property dry mass 1 kg; name GBFS_DM
  property price 0.0615 EUR2005; name GBFS_price_EUR2005
    (same comment as for ground granulated blast furnace slag)
  property water in wet mass 0 kg; name GBFS_WWM
  property carbon content, non-fossil 0; name GBFS_C_content_non_fossil
    biogene carbon content on a dry matter basis
  property carbon content, fossil 0; name GBFS_C_content_fossil
    fossil carbon content on a dry matter basis
  property water content 0; name GBFS_water_content
  property carbon content 0
    carbon content on a dry matter basis (reserved; not for manual entry)
  property true value 2.3703e-8
    allocation property applied in "true value" allocation // value calculated from revenue
  properties: carbon allocation 0 kg
- aluminium alloy, metal matrix composite: 0 kg; CPC 41431: Unwrought aluminium; By-product classification allocatable product
  reference flow
  production volume 10.4193 kg
  property water content 0; name Al_MMC_water_content
  property carbon content, non-fossil 0; name Al_MMC_C_content_non_fossil
    biogene carbon content on a dry matter basis
  property price 6.2 EUR2005; name ref_price_EUR2005
    (same comment as for aluminium alloy, AlLi)
  property carbon content, fossil 0.0475; name Al_MMC_C_content_fossil
    fossil carbon content on a dry matter basis
  property dry mass 1 kg; name Al_MMC_DM
  property water in wet mass 0 kg; name Al_MMC_WWM
  property wet mass 1 kg; name Al_MMC_WM
  property carbon content 0.0475
    carbon content on a dry matter basis (reserved; not for manual entry)
  property true value 4.07495e-6
    allocation property applied in "true value" allocation // value calculated from revenue
  properties: carbon allocation 0.0475 kg
- aluminium, primary, cast alloy slab from continuous casting: 0 kg; CPC 41431: Unwrought aluminium; By-product classification allocatable product
  reference flow
  production volume 667.685 kg
  property price 3.67 EUR2005; name ref_price_EUR2005
    Estimated to be the same as in case of aluminium, primary, liquid.
  property carbon content 0
    carbon content on a dry matter basis (reserved; not for manual entry)
  property true value 0.000154572
    allocation property applied in "true value" allocation // value calculated from revenue
  properties: wet mass 1 kg, carbon content, fossil 0, water content 0, carbon content, non-fossil 0, water in wet mass 0 kg, dry mass 1 kg, carbon allocation 0 kg

## Inputs from technosphere
- aluminium, cast alloy: 0.217058 kg; lognormal variance with pedigree 0.0444, pedigree (2,4,5,4,2)
  Based on the direct inspection of a commercial device.
  properties: dry mass 1 kg, wet mass 1 kg
- tin: 0.00884459 kg; lognormal variance with pedigree 0.0444, pedigree (2,4,5,4,2)
  Based on the direct inspection of a commercial device.
  properties: dry mass 1 kg, wet mass 1 kg
- resistor, surface-mounted: 0.00162286 kg; lognormal variance with pedigree 0.0444, pedigree (2,4,5,4,2)
  Based on the direct inspection of a commercial device.
  properties: carbon content, fossil 0.00893558, wet mass 1 kg, dry mass 1 kg
- copper: 0.157174 kg; lognormal variance with pedigree 0.0444, pedigree (2,4,5,4,2)
  Based on the direct inspection of a commercial device.
  properties: dry mass 1 kg, wet mass 1 kg
- epoxy resin insulator, Al2O3: 0.296984 kg; lognormal variance with pedigree 0.0444, pedigree (2,4,5,4,2)
  Based on the direct inspection of a commercial device.
  properties: wet mass 1 kg, dry mass 1 kg, carbon content, fossil 0.1693
- aluminium scrap, new: 0 kg; pedigree (1,1,1,1,1)
  Based on the direct inspection of a commercial device.
  production volume 0 kg
    Calculated from production volume of reference product using the relative outputs.
  properties: price 0.806 EUR2005, dry mass 1 kg, wet mass 1 kg
- transistor, auxilliaries and energy use: 0.00263715 kg; lognormal variance with pedigree 0.0444, pedigree (2,4,5,4,2)
  Based on the direct inspection of a commercial device.
- silicone product: 0 kg; pedigree (1,1,1,1,1)
  Based on the direct inspection of a commercial device.
  properties: carbon content, fossil 0.324324, wet mass 1 kg, dry mass 1 kg
- polyethylene, high density, granulate: 0.263715 kg; lognormal variance with pedigree 0.0444, pedigree (2,4,5,4,2)
  Based on the direct inspection of a commercial device.
  properties: dry mass 1 kg, carbon content, fossil 0.857143, wet mass 1 kg
  note on carbon content, fossil: Polyethylene is formed out of a huge amount of ethylene monomers (C2H4) (ecoinvent v2.2 report 11_II). MW=28 g/mol
- silicon, electronics grade: 0.079155 kg; lognormal variance with pedigree 0.0444, pedigree (2,4,5,4,2)
  Based on the direct inspection of a commercial device.
  properties: wet mass 1 kg, dry mass 1 kg
- aluminium scrap, new: -0.00232703, -0.0174094 kg (2 entries); lognormal variance with pedigree 0.0444, pedigree (2,4,5,4,2)
  Based on the direct inspection of a commercial device.
  production volume 68025.3 kg
- silicone product: 0.025484, 0.0516019 kg (2 entries); lognormal variance with pedigree 0.0444, pedigree (2,4,5,4,2)
  Based on the direct inspection of a commercial device.

## Sampling procedure
Direct inspection of a typical device of common technology.

## Extrapolations
No extrapolations.

## Review by Christian Bauer 2012-06-25
passed
