# treatment of waste sealing sheet, polyethylene, municipal incineration with fly ash extraction

Dataset: EcoSpold 2, unit process
Geography: CH
Time period: 2006-01-01 to 2019-12-31
Technology level: current
Classification: ISIC rev.4 ecoinvent: 3821:Treatment and disposal of non-hazardous waste
Synonyms: municipal waste incineration
Scenario: Business-as-Usual
System model: Allocation at the point of substitution
Share of production covered: 1.8 %
Generated by: Gabor Doka
Published in: Doka G. 2015
Database: ecoinvent
isCopyrightProtected: true
accessRestrictedTo: 1

## General comment
This dataset represents the activity of waste disposal of waste sealing sheet, polyethylene in a municipal solid waste incinerator (MSWI) // Recommended use of this dataset: For disposal of bulk or small parts of PE sealing sheet (waste building product) // Inventoried waste contains 1.2% Glass; 85.3% PE sealing sheet; 13.5% Filler (lime); . // Waste composition (wet, in ppm): upper heating value 36.33 MJ/kg; lower heating value 36.03 MJ/kg; H2O 3633.1; O 103200; H 103910; C 713520; S 362.12; N 1100.4; P n.a.; B n.a.; Cl 1242.1; Br 8.1346; F 12.202; I n.a.; Ag n.a.; As 1.7547; Ba 203.36; Cd 28.803; Co 1.4236; Cr 14.81; Cu 35.185; Hg 0.044723; Mn 25.488; Mo n.a.; Ni 1.2663; Pb 19.94; Sb 8.5413; Se 1.7083; Sn 3.2353; V 1871; Zn 5020.8; Be 0.40673; Sc n.a.; Sr 71.991; Ti 813.46; Tl 0.32538; W n.a.; Si 4309.1; Fe 1301.5; Ca 57070; Al 162.69; K n.a.; Mg 81.346; Na 1965.8; // Share of carbon in waste that is biogenic 0%. // Share of metals in waste not oxidised and bulk-recyclable (exclude very small or thin parts) Iron: 0%; Alu: 0%; Copper: 0%. // Recovery of metal scrap from bottom ash to recycling: 0g iron scrap, 0g aluminium scrap, 0g copper scrap. From this waste, the FLUWA process in the technology mix recovers 0.00139kg (DM) of a hydroxide sludge to be recycled in zinc furnaces. // Ultimately one kg of this waste produces 0.1944 kg of bottom ash (can include some washed ash) and 0.0068 kg of residues, which are landfilled (technology mix). Additional solidification of residues with 0.00272 kg of cement.Net energy production: 4.71MJ/kg electric energy and 9.11MJ/kg thermal energy. //

## Included activities start
waste incineration from waste reception gate and delivery into waste bunker at incinerator plant site (without transports to the incinerator)

## Included activities end
Waste-specific short-term emissions to water from leachate. Long-term emissions from landfill to ground water.

## Geography
Specific to the technology mix encountered in Switzerland in 2012.

## Technology
average Swiss MSWI plants in 2010 (grate incinerators) with electrostatic precipitator for fly ash (ESP), wet flue gas scrubber and 25% SNCR , 42.77% SCR-high dust , 32.68% SCR-low dust -DeNOx facilities and 0% without Denox (weighted according to mass of burnt waste, representing Swiss average). Efficiency of iron scrap separation from slag : 58%. Efficiency of non-ferrous scrap separation from slag : 31%. The technology mix for this dataset includes a filter ash treatment (FLUWA) of a share of 46.22%. Gross electric efficiency technology mix 15.84% and Gross thermal efficiency technology mix 28.51%

## Time period
Waste composition as given in literature reference, theoretical data or other source. Transfer coefficients for modern MSWI.

## Reference product
- waste sealing sheet, polyethylene: 0 kg; By-product classification Waste; CPC 39270: Waste, parings and scrap of plastics; CAS 9002-88-4
  Main reference product of this activity (supply of disposal service).
  production volume 0 kg
    based on corresponding global production volume of MSW fraction in conventional MSWI (wo fly ash extraction) and scaled down to annual Swiss incinerated MSW mass of 3.02 mio. tonnes.
  property price 0 EUR2005
    Waste products are assigned a price of zero as they are assumed to require further treatment.
  property carbon content 0.71612
    carbon content on a dry matter basis (reserved; not for manual entry)
  properties: oxygen content 0.10358, nitrogen content 0.0011044, sulfur content 0.00036344, hydrogen content 0.10429, arsenic content 1.7611e-6, fluorine content 1.2246e-5, cadmium content 2.8908e-5, chlorine content 0.0012467, selenium content 1.7145e-6, cobalt content 1.4287e-6, copper content 3.5313e-5, barium content 0.00020411, mercury content 4.4886e-8, chromium content 1.4864e-5, bromine content 8.1642e-6, nickel content 1.2709e-6, strontium content 7.2253e-5, aluminium content 0.00016328, iron content 0.0013063, vanadium content 0.0018778, magnesium content 8.1642e-5, tin content 3.2471e-6, manganese content 2.5581e-5, antimony content 8.5724e-6, lead content 2.0012e-5, silicon content 0.0043248, titanium content 0.00081642, carbon content, fossil 0.71612, beryllium content 4.0821e-7, calcium content 0.057278, thallium content 3.2657e-7, zinc content 0.0050391, dry mass 0.99637 kg, wet mass 1 kg, water content 0.0036463, water in wet mass 0.0036331 kg, sodium content 0.0019729, carbon allocation 0.71352 kg
- electricity, for reuse in municipal waste incineration only: 1 kWh; CPC 17100: Electrical energy; By-product classification allocatable product; pedigree (1,1,1,1,1)
  Net electricity generated from this waste and used in internal MSWI plant energy redistribution.
  Uncertainty: uncertainty is calculated from uncertainties in waste composition and uncertainties in energy efficiency and the uncertainty in internal energy demand
  production volume 3.569e6 kWh

## By-products
- heat, for reuse in municipal waste incineration only: 0 MJ; name E_th_prod_MSWI; CPC 17300: Steam and hot water; By-product classification allocatable product; pedigree (1,1,1,1,1)
  Net useful heat generated from this waste and used in internal MSWI plant energy redistribution.
  Uncertainty: uncertainty is calculated from uncertainties in waste composition and uncertainties in energy efficiency and the uncertainty in internal energy demand
  production volume 0 MJ
    calculated in proportion to reference product waste input to incinerator
  property exergy 0.1842 MJ; name E_th_prod_MSWI_exergy
    This exergy property is based on the exergy content of the product.
  property true value relation 0.1842; name E_th_prod_MSWI_true_value_relation
    property to calculate "true value" from
  property price 0.0106 EUR2005; name E_th_prod_MSWI_price_EUR2005
    Average European district heat price from Ecoheatcool and Euroheat 2005-2006, Ecoheat Work package 1: The European heat market. Final report. 10.6 EUR/GJ i s the price of district heat. http://www.solarthermalworld.org/files/Ecoheatcool%20WP1%20Web.pdf?download
- electricity, for reuse in municipal waste incineration only: 0 kWh; name E_el_prod_MSWI; CPC 17100: Electrical energy; By-product classification allocatable product; pedigree (1,1,1,1,1)
  (same comment as for electricity, for reuse in municipal waste incineration only)
  production volume 0 kWh
    calculated in proportion to reference product waste input to incinerator
  property exergy 3.6 MJ; name E_el_prod_MSWI_exergy
    This exergy property is based on the exergy content of the product.
  property price 0.1 EUR2005; name E_el_prod_MSWI_price_EUR2005
    Estimated to be the same price as in case of electricity, medium voltage.
  property true value relation 3.6; name E_el_prod_MSWI_true_value_relation
    property to calculate "true value" from
- zinc concentrate: 0 kg; CPC 14290: Other non-ferrous metal ores and concentrates (other than uranium or thorium ores and concentrates); By-product classification allocatable product
  Calculated value from the knowledge of the properties of both products.
  property price 0.38 EUR2005; name ByP_price_EUR2005
    Temporary price data. Calculated as 90% of purchasers price based on: Zinc content in concentrate 53%. Concentrate price per kg Zn 86.5% of refined Zn price (13.5% treatment charges according to CHR Metals Limited 2005: Dynamic cost curves. http://www.minecost.com/dynamic.pdf). 2004 zinc price from USGS (2007) Mineral commodity summaries 2007. <http://minerals.usgs.gov/minerals/pubs/mcs/2007/mcs2007.pdf> [Accessed 25 May 2010]
  property zinc content 0.53; name zinc_C_zinc_concentrate
    Zinc content on a dry matter basis. Value taken from teh "zinc mine operation" /GLO dataset.
  property dry mass 1 kg; name DM_zinc_concentrate
  property carbon content 0
    carbon content on a dry matter basis (reserved; not for manual entry)
  properties: wet mass 1 kg, water content 0, carbon content, non-fossil 0, carbon content, fossil 0, water in wet mass 0 kg, carbon allocation 0 kg

## Inputs from technosphere
- slag landfill: 0 unit; pedigree (1,1,1,1,1)
  Landfill infrastructure required for landfilling of bottom ash.
  Uncertainty: uncertainty is calculated from uncertainties in waste composition and transfer coefficients in incinerator
- chemical, inorganic: 0 kg; pedigree (1,1,1,1,1)
  Auxilliary inputs for the wastewater treatment stage of the incinerator plant. Proxy for Polyelectrolyte.
  Uncertainty: uncertainty calculated from uncertainty in average Polyelectrolyte input, of transfer coefficients in the incinerator, and the uncertainty of the waste composition of this waste
  properties: carbon content, fossil 0.003, wet mass 1 kg, dry mass 1 kg
- iron (III) chloride, without water, in 40% solution state: 0 kg; pedigree (1,1,1,1,1)
  Auxilliary inputs for the wastewater treatment stage of the incinerator plant.
  Uncertainty: uncertainty calculated from uncertainty in average FeCl3 input, of transfer coefficients in the incinerator, and the uncertainty of the waste composition of this waste
  properties: wet mass 1 kg, dry mass 1 kg
- sodium hydroxide, without water, in 50% solution state: 0 kg; pedigree (1,1,1,1,1)
  Auxilliary inputs for the flue gas treatment stage of the incinerator plant, and partially in the filter ash treatment (FLUWA).
  Uncertainty: uncertainty calculated from uncertainty in average NaOH input, of transfer coefficients in the incinerator, and the uncertainty of the waste composition of this waste
  properties: wet mass 1 kg, dry mass 1 kg
- process-specific burdens, residual material landfill: 0 kg; pedigree (1,1,1,1,1)
  Mass-specific expenditures required for landfilling of incineration residues.;activityLink introduced to establish a direct link to the corresponding regional supply of this product
  Uncertainty: uncertainty is calculated from uncertainties in waste composition and transfer coefficients in incinerator
- chemical, organic: 0 kg; pedigree (1,1,1,1,1)
  Auxilliary inputs for the wastewater treatment stage of the incinerator plant. Proxy for (pure) Trisodium-trimercapto-s-triazine (CAS 17766-26-6), used as 15% diluted solution, aka TMT15.
  Uncertainty: uncertainty calculated from uncertainty in average TMT15 input, of transfer coefficients in the incinerator, and the uncertainty of the waste composition of this waste
  properties: wet mass 1 kg, dry mass 1 kg, carbon content, fossil 0.628
- spent activated carbon with mercury: 0 kg; pedigree (1,1,1,1,1)
  Spent ion exchanger charged with mercury, from FLUWA filter ash treatment, approximated here with Spent activated carbon with mercury, deposited undergound in a polyethylene Big Bag.
  Uncertainty: uncertainty calculated from uncertainty in of transfer coefficients in the incinerator, and the uncertainty of the waste composition of this waste.
  production volume 0 kg; = ABS(Ref('0423e508-6886-4d3b-88a8-abfa11007355', 'ProductionVolume') * (Ref('8c512d12-bf07-4d4b-a723-bc3bfddebc22') / Ref('0423e508-6886-4d3b-88a8-abfa11007355')))
    Calculated from production volume of reference product using the relative outputs.
  properties: wet mass 1 kg, carbon content, fossil 0.6, dry mass 1 kg
- chromium oxide, flakes: 0 kg; pedigree (1,1,1,1,1)
  Input to DeNOx stage. Active component in SCR catalyst (vanadium pentoxide, V2O5), here approximated with the available chromium trioxide.
  Uncertainty: uncertainty calculated from uncertainty in average DeNOx input, uncertainty in the share of thermal NOx, uncertainty of nitrogen content in average municipal waste and the uncertainty in nitrogen content in *this* waste.
  properties: wet mass 1 kg, dry mass 1 kg
- ammonia, liquid: 0 kg; pedigree (1,1,1,1,1)
  Input to DeNOx stage (100% NH3).
  Uncertainty: uncertainty calculated from uncertainty in average DeNOx input, uncertainty in the share of thermal NOx, uncertainty of nitrogen content in average municipal waste and the uncertainty in nitrogen content in *this* waste.
  properties: wet mass 1 kg, dry mass 1 kg
- heat, district or industrial, natural gas: 0 MJ; pedigree (1,1,1,1,1)
  Input to DeNOx stage, to heat up flue gas in low-dust SCR.
  Uncertainty: uncertainty calculated from uncertainty in average DeNOx input, uncertainty in the share of thermal NOx, uncertainty of nitrogen content in average municipal waste and the uncertainty in nitrogen content in *this* waste.
- metalliferous hydroxide sludge: 0 kg; pedigree (1,1,1,1,1)
  Metalliferous hydroxide sludge from filter ash leaching (FLUWA).
  Uncertainty: uncertainty is calculated from uncertainties in waste composition and transfer coefficients to filter ash in incinerator and the uncertainty of the transfer coefficients of the FLUWA process.
  production volume 0 kg
    calculated in proportion to reference product waste input to incinerator
  properties: water content 3, dry mass 0.25 kg, carbon content, fossil 0.026174, wet mass 1 kg, cadmium content 0.00708, oxygen content 0.25875, chlorine content 0.02157, sulfur content 0.016071, vanadium content 0.0076904, calcium content 0.015988, sodium content 0.0070662, zinc content 0.63863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
- cationic resin: 0 kg; pedigree (1,1,1,1,1)
  Auxilliary input for mercury removal in filter ash treatment (FLUWA).
  Uncertainty: uncertainty calculated from uncertainty in of transfer coefficients in the incinerator, and the uncertainty of the waste composition of this waste
  properties: water content 1, wet mass 1 kg, dry mass 0.5 kg, carbon content, fossil 0.521606
- waste cement, hydrated: 0 kg; pedigree (1,1,1,1,1)
  Hydrated cement output for solidification of landfilled residual material.
  Uncertainty: Uncertainty calculated from uncertainty of the waste composition of this waste and transfer coefficients in the incinerator and of the solidification recipe.
  production volume 0 kg
    calculated in proportion to reference product waste input to incinerator
  properties: dry mass 1 kg, wet mass 1 kg
- residual material landfill: 0 unit; pedigree (1,1,1,1,1)
  Landfill infrastructure required for landfilling of incineration residues.
  Uncertainty: uncertainty is calculated from uncertainties in waste composition and transfer coefficients in incinerator
- titanium dioxide: 0 kg; pedigree (1,1,1,1,1)
  Input to DeNOx stage (TiO2 catalyst carrier)
  Uncertainty: uncertainty calculated from uncertainty in average DeNOx input, uncertainty in the share of thermal NOx, uncertainty of nitrogen content in average municipal waste and the uncertainty in nitrogen content in *this* waste.
  properties: wet mass 1 kg, dry mass 1 kg
- water, decarbonised: 0 kg; pedigree (1,1,1,1,1)
  Incinerator process water used in flue gas scrubber stage.
  Uncertainty: uncertainty calculated from uncertainty in average water input, and the uncertainty of the waste composition of this waste
  properties: wet mass 1 kg
- transport, freight, lorry, unspecified: 0 metric ton*km; pedigree (1,1,1,1,1)
  Transport services to transport incineration residues to landfills and filter ash to external treatments (FLUWA).
  Uncertainty: uncertainty calculated from uncertainty of the waste composition of this waste, uncertainty of transfer coefficients and the uncertainty in generic transportation distances
- quicklime, milled, packed: 0 kg; pedigree (1,1,1,1,1)
  Auxilliary inputs for the flue gas treatment stage of the incinerator plant.
  Uncertainty: uncertainty calculated from uncertainty in average CaO input, of transfer coefficients in the incinerator, and the uncertainty of the waste composition of this waste
  properties: wet mass 1 kg, dry mass 0.99 kg, water content 0.010101
- municipal waste incineration facility: 0 unit
  Demands per kilogram waste.
- cement, unspecified: 0 kg; pedigree (1,1,1,1,1)
  Cement required for solidification of landfilled residual material.
  Uncertainty: Uncertainty calculated from uncertainty of the waste composition of this waste, of transfer coefficients in the incinerator and of the solidification recipe.
  properties: wet mass 1 kg, dry mass 1 kg
- process-specific burdens, slag landfill: 0 kg; pedigree (1,1,1,1,1)
  Mass-specific expenditures required for landfilling of bottom ash.;activityLink introduced to establish a direct link to the corresponding regional supply of this product
  Uncertainty: uncertainty is calculated from uncertainties in waste composition and transfer coefficients in incinerator
- hydrochloric acid, without water, in 30% solution state: 0 kg; pedigree (1,1,1,1,1)
  Auxilliary inputs for the wastewater treatment stage of the incinerator plant.
  Uncertainty: uncertainty calculated from uncertainty in average HCl input, of transfer coefficients in the incinerator, and the uncertainty of the waste composition of this waste
  properties: wet mass 1 kg, dry mass 1 kg
- hydrogen peroxide, without water, in 50% solution state: 0 kg; pedigree (1,1,1,1,1)
  Auxilliary oxidising agent for filter ash treatment (FLUWA).
  Uncertainty: uncertainty calculated from uncertainty in of transfer coefficients in the incinerator, and the uncertainty of the waste composition of this waste
  properties: dry mass 1 kg, wet mass 1 kg
- polyvinylchloride, emulsion polymerised: 5.87955e-5 kg; lognormal variance with pedigree 0.1387, pedigree (2,5,5,3,4)
  EcoSpold01Location=RER
  Uncertainty: ;
- clay brick: 0.0886273 kg; lognormal variance with pedigree 0.1387, pedigree (2,5,5,3,4)
  EcoSpold01Location=RER
  Uncertainty: ;
- stone wool, packed: 0.000647278 kg; lognormal variance with pedigree 0.1387, pedigree (2,5,5,3,4)
  EcoSpold01Location=CH
  Uncertainty: ;
- flat glass, coated: 0.00153355 kg; lognormal variance with pedigree 0.1387, pedigree (2,5,5,3,4)
  EcoSpold01Location=RER
  Uncertainty: ;
- sawnwood, softwood, dried (u=10%), planed: 3.07208e-5 m3; lognormal variance with pedigree 0.1387, pedigree (2,5,5,3,4)
  EcoSpold01Location=RER
  Uncertainty: ;
- packaging film, low density polyethylene: 0.00100167 kg; lognormal variance with pedigree 0.1387, pedigree (2,5,5,3,4)
  EcoSpold01Location=RER
  Uncertainty: ;
- electricity, medium voltage: 0.000149372 kWh; lognormal variance with pedigree 0.1387, pedigree (2,5,5,3,4)
  EcoSpold01Location=UCTE
  Uncertainty: ;
- copper: 0.00422225 kg; lognormal variance with pedigree 0.1387, pedigree (2,5,5,3,4)
  EcoSpold01Location=RER
  Uncertainty: ;
- polyvinylchloride, suspension polymerised: 0.000401768 kg; lognormal variance with pedigree 0.1387, pedigree (2,5,5,3,4)
  EcoSpold01Location=RER
  Uncertainty: ;
- reinforcing steel: 0.00356999 kg; lognormal variance with pedigree 0.1387, pedigree (2,5,5,3,4)
  EcoSpold01Location=RER
  Uncertainty: ;
- cement mortar: 0.0307208 kg; lognormal variance with pedigree 0.1387, pedigree (2,5,5,3,4)
  EcoSpold01Location=CH
  Uncertainty: ;
- waste sealing sheet, polyethylene: -0.000980549 kg; lognormal variance with pedigree 0.1387, pedigree (2,5,5,3,4)
  EcoSpold01Location=CH
  Uncertainty: ;
  production volume 0.925 kg
- waste wood, untreated: -0.0168413 kg; lognormal variance with pedigree 0.1387, pedigree (2,5,5,3,4)
  EcoSpold01Location=CH
  Uncertainty: ;
  production volume 30.8 kg
- extrusion, plastic film: 0.000460563 kg; lognormal variance with pedigree 0.1387, pedigree (2,5,5,3,4)
  activityLink introduced to establish a direct link to the corresponding regional supply of this product
  EcoSpold01Location=RER
  Uncertainty: ;
- diesel, burned in building machine: 0.0110355 MJ; lognormal variance with pedigree 0.1387, pedigree (2,5,5,3,4)
  EcoSpold01Location=GLO
  Uncertainty: ;
- concrete, normal: 4.61559e-5 m3; lognormal variance with pedigree 0.1387, pedigree (2,5,5,3,4)
  EcoSpold01Location=CH
  Uncertainty: ;
- aluminium, wrought alloy: 0.00422225 kg; lognormal variance with pedigree 0.1387, pedigree (2,5,5,3,4)
  EcoSpold01Location=RER
  Uncertainty: ;
- waste reinforced concrete: -0.117752, -0.00124767 kg (2 suppliers, which the file names only by identifier); sum of these -0.119 kg; lognormal variance with pedigree 0.1387, pedigree (2,5,5,3,4)
  EcoSpold01Location=CH
  Uncertainty: ;
  production volume 239 kg
- waste glass sheet: -0.00149548, -3.80749e-5 kg (2 suppliers, which the file names only by identifier); sum of these -0.00153355 kg; lognormal variance with pedigree 0.1387, pedigree (2,5,5,3,4)
  EcoSpold01Location=CH
  Uncertainty: ;
  production volume 3.08 kg
- waste cement in concrete and mortar: -0.0298258, -0.000894996 kg (2 suppliers, which the file names only by identifier); sum of these -0.0307208 kg; lognormal variance with pedigree 0.1387, pedigree (2,5,5,3,4)
  EcoSpold01Location=CH
  Uncertainty: ;
  production volume 61.7 kg
- waste mineral wool: -0.000639976, -7.3026e-6 kg (2 suppliers, which the file names only by identifier); sum of these -0.000647278 kg; lognormal variance with pedigree 0.1387, pedigree (2,5,5,3,4)
  EcoSpold01Location=CH
  Uncertainty: ;
  production volume 1.3 kg
- waste bulk iron, excluding reinforcement: -0.00824879, -0.000215618 kg (2 suppliers, which the file names only by identifier); sum of these -0.00846441 kg; lognormal variance with pedigree 0.1387, pedigree (2,5,5,3,4)
  EcoSpold01Location=CH
  Uncertainty: ;
  production volume 17 kg
- waste brick: -0.0770278, -0.0115996 kg (2 suppliers, which the file names only by identifier); sum of these -0.0886273 kg; lognormal variance with pedigree 0.1387, pedigree (2,5,5,3,4)
  EcoSpold01Location=CH
  Uncertainty: ;
  production volume 178 kg
- waste polyvinylchloride product: -0.000447005, -1.35582e-5 kg (2 suppliers, which the file names only by identifier); sum of these -0.000460563 kg; lognormal variance with pedigree 0.1387, pedigree (2,5,5,3,4)
  EcoSpold01Location=CH
  Uncertainty: ;
  production volume 0.925 kg
- heat, district or industrial, natural gas: 0.392782 MJ; lognormal variance with pedigree 0.040625, pedigree (1,3,5,2,1)
  EcoSpold01Location=RER
- feldspar: 0.00957913 kg; lognormal variance with pedigree 0.040625, pedigree (1,3,5,2,1)
  EcoSpold01Location=RER
- corrugated board box: 0.000262323 kg; lognormal variance with pedigree 0.040625, pedigree (1,3,5,2,1)
  EcoSpold01Location=RER
- aluminium hydroxide: 0.000237199 kg; lognormal variance with pedigree 0.040625, pedigree (1,3,5,2,1)
  EcoSpold01Location=RER
- tap water: 0.00131422 kg; lognormal variance with pedigree 0.040625, pedigree (1,3,5,2,1)
  EcoSpold01Location=RER
- steel, chromium steel 18/8, hot rolled: 4.71099e-5 kg; lognormal variance with pedigree 0.040625, pedigree (1,3,5,2,1)
  EcoSpold01Location=RER
- waste paperboard, unsorted: -0.00027084 kg; lognormal variance with pedigree 0.040625, pedigree (1,3,5,2,1)
  EcoSpold01Location=CH
  production volume 2237.99 kg
- soda ash, light, crystalline, heptahydrate: 0.00188769 kg; lognormal variance with pedigree 0.040625, pedigree (1,3,5,2,1)
  EcoSpold01Location=RER
- electricity, medium voltage, label-certified: 0.054163 kWh; lognormal variance with pedigree 0.0426, pedigree (1,3,5,5,1)
- EUR-flat pallet: 5.91589e-5 unit; lognormal variance with pedigree 0.040625, pedigree (1,3,5,2,1)
  EcoSpold01Location=RER
  26.4 kg per pallet
- foam glass factory: 1.89092e-11 unit; lognormal variance with pedigree 0.350125, pedigree (1,2,5,2,1)
  EcoSpold01Location=BE
- heat, central or small-scale, other than natural gas: 0.00141514 MJ; lognormal variance with pedigree 0.040625, pedigree (1,3,5,2,1)
  EcoSpold01Location=CH
- potassium nitrate: 9.1277e-5 kg; lognormal variance with pedigree 0.040625, pedigree (1,3,5,2,1)
  calculated from original value given as kg N
- sinter, iron: 1.48249e-5 kg; lognormal variance with pedigree 0.040625, pedigree (1,3,5,2,1)
  EcoSpold01Location=GLO
- clay: 1.24304e-5 kg; lognormal variance with pedigree 0.040625, pedigree (1,3,5,2,1)
  EcoSpold01Location=CH
- manganese concentrate: 0.000969328 kg; lognormal variance with pedigree 0.040625, pedigree (1,3,5,2,1)
  EcoSpold01Location=GLO
- glass cullet, sorted: 0.0293663 kg
- carbon black: 0.000228074 kg; lognormal variance with pedigree 0.040625, pedigree (1,3,5,2,1)
  EcoSpold01Location=GLO
- molybdenum: 2.85095e-6 kg; lognormal variance with pedigree 0.040625, pedigree (1,3,5,2,1)
  EcoSpold01Location=RER
- iron ore, beneficiated, 65% Fe: 0.00102633 kg; lognormal variance with pedigree 0.040625, pedigree (1,3,5,2,1)
  EcoSpold01Location=GLO
- sodium sulfate, anhydrite: 0.000192924 kg; lognormal variance with pedigree 0.040625, pedigree (1,3,5,2,1)
  EcoSpold01Location=RER
- wastewater, average: -6.76609e-6, -7.31964e-7 m3 (2 suppliers, which the file names only by identifier); sum of these -7.49806e-6 m3; lognormal variance with pedigree 0.040125, pedigree (1,2,5,2,1)
  EcoSpold01Location=CH
  production volume 63.6054 m3
- heat, central or small-scale, other than natural gas: 5.83952e-5 MJ; lognormal variance with pedigree 0.0426, pedigree (1,3,5,5,1)
  EcoSpold01Location=CH
- silica sand: 0.00044724 kg; lognormal variance with pedigree 0.0426, pedigree (1,3,5,5,1)
  Calculated as residual raw material requirement.
- tap water: 5.42309e-5 kg; lognormal variance with pedigree 0.0426, pedigree (1,3,5,5,1)
  EcoSpold01Location=RER
- heat, district or industrial, natural gas: 0.016208 MJ; lognormal variance with pedigree 0.0426, pedigree (1,3,5,5,1)
  EcoSpold01Location=RER
- clay: 5.12855e-7 kg; lognormal variance with pedigree 0.0426, pedigree (1,3,5,5,1)
  EcoSpold01Location=CH
- corrugated board box: 9.90886e-8, 8.41793e-6 kg (2 suppliers, which the file names only by identifier); sum of these 8.51702e-6 kg; lognormal variance with pedigree 0.0426, pedigree (1,3,5,5,1)
  EcoSpold01Location=RER
- lime: 1.18791e-5, 0.000137539 kg (2 suppliers, which the file names only by identifier); sum of these 0.000149418 kg; lognormal variance with pedigree 0.1, pedigree (1,5,5,5,1)
  Calculated to correspond to give same composition of foam glass as foam glass with cullet from packaging glass. Molar mass of lime (CaCO3) to CaO:100 to 56.
  Uncertainty: ;
- wastewater, average: -1.9942e-7 m3; lognormal variance with pedigree 0.0421, pedigree (1,2,5,5,1)
  EcoSpold01Location=CH
  production volume 0.00083076 m3
- sodium sulfate, anhydrite: 6.64204e-6 kg; lognormal variance with pedigree 0.0426, pedigree (1,3,5,5,1)
  EcoSpold01Location=RER
- waste sealing sheet, polyethylene: -2.11247e-5 kg; lognormal variance with pedigree 0.0426, pedigree (1,3,5,5,1)
  EcoSpold01Location=CH
  production volume 0.0584 kg
- waste wood, untreated: -4.66779e-7, -1.31104e-6, -3.13127e-7, -3.75935e-6, -1.98067e-7, -3.41268e-8, -4.98751e-5 kg (7 suppliers, which the file names only by identifier); sum of these -5.59575e-5 kg; lognormal variance with pedigree 0.0426, pedigree (1,3,5,5,1)
  26.4 kg per pallet
  EcoSpold01Location=CH
  production volume 0.168552 kg
- electricity, medium voltage: 0.00161582 kWh; lognormal variance with pedigree 0.0426, pedigree (1,3,5,5,1)
  Calculated from original electricity input and cullet fraction and the reduction in energy requirement per % cullet (EU commission 2012: Best Available Techniques (BAT) Reference Document for the Manufacture of Glass)
  EcoSpold01Location=BE

## Inputs from nature
- Oxygen [natural resource, in air]: 0 kg; pedigree (1,1,1,1,1)
  Oxygen from ambient air needed to combust and oxidise this waste. Net demand, i.e. without O2 leaving the plant in flue gas uncombusted.
  Uncertainty: uncertainty is calculated from uncertainties in waste composition and transfer coefficients to flue gas and soild residues in incinerator
- Water, well, in ground [natural resource, in water]: 8.78081e-6 m3; lognormal variance with pedigree 0.040625, pedigree (1,3,5,2,1)

## Emissions to nature
- Phenol, pentachloro- [air, urban air close to ground]: 0 kg; pedigree (1,1,1,1,1)
  Incomplete combustion product emitted to air.
  Uncertainty: uncertainty calculated from uncertainty in average operation emissions, and the uncertainty of the flue gas volume from this waste.
- DOC, Dissolved Organic Carbon [water, ground-, long-term]: 0 kg; pedigree (1,1,1,1,1)
  Long-term emissions from landfilling of incineration residues.
  Uncertainty: uncertainty is calculated from uncertainties in waste composition and transfer coefficients in incinerator and landfills.
- COD, Chemical Oxygen Demand [water, surface water]: 0 kg; pedigree (1,1,1,1,1)
  Emissions to water from waste composition and transfer coefficients in incinerator and landfills.
  Uncertainty: uncertainty is calculated from uncertainties in waste composition and transfer coefficients in incinerator and landfills
- Heat, waste [air, urban air close to ground]: 0 MJ; pedigree (1,1,1,1,1)
  Waste heat generated from heating value of this waste plus any electricity required to process it.
  Uncertainty: uncertainty is calculated from uncertainties in waste composition and uncertainties in energy efficiency and the uncertainty in internal energy demand
- Sulfate [water, ground-, long-term]: 0 kg; pedigree (1,1,1,1,1)
  (same comment as for DOC, Dissolved Organic Carbon)
- Sodium [air, urban air close to ground]: 0 kg; pedigree (1,1,1,1,1)
  Emission to air from waste composition and transfer coefficients.
  Uncertainty: uncertainty is calculated from uncertainties in waste composition and transfer coefficients in incinerator
- Benzo(a)pyrene [air, urban air close to ground]: 0 kg; pedigree (1,1,1,1,1)
  (same comment as for Phenol, pentachloro-)
- Chloride [water, ground-, long-term]: 0 kg; pedigree (1,1,1,1,1)
  (same comment as for DOC, Dissolved Organic Carbon)
- BOD5, Biological Oxygen Demand [water, surface water]: 0 kg; pedigree (1,1,1,1,1)
  (same comment as for COD, Chemical Oxygen Demand)
- Heat, waste [water, surface water]: 0 MJ; pedigree (1,1,1,1,1)
  (same comment as for Heat, waste)
- Nitrate [water, ground-, long-term]: 0 kg; pedigree (1,1,1,1,1)
  (same comment as for DOC, Dissolved Organic Carbon)
- TOC, Total Organic Carbon [water, surface water]: 0 kg; pedigree (1,1,1,1,1)
  (same comment as for COD, Chemical Oxygen Demand)
- Water [air, urban air close to ground]: 0 m3; pedigree (1,1,1,1,1)
  Water vapour from waste humidity, hydrogen oxidation and part of the process water.
  Uncertainty: Uncertainty calculated from uncertainty in waste composition, process water input and the uncertainty of fraction to air.
- Bromine [water, ground-, long-term]: 0 kg; pedigree (1,1,1,1,1)
  (same comment as for DOC, Dissolved Organic Carbon)
- DOC, Dissolved Organic Carbon [water, surface water]: 0 kg; pedigree (1,1,1,1,1)
  (same comment as for COD, Chemical Oxygen Demand)
- Fluoride [water, ground-, long-term]: 0 kg; pedigree (1,1,1,1,1)
  (same comment as for DOC, Dissolved Organic Carbon)
- Sulfate [water, surface water]: 0 kg; pedigree (1,1,1,1,1)
  (same comment as for COD, Chemical Oxygen Demand)
- Water [water, surface water]: 0 m3; pedigree (1,1,1,1,1)
  Process water released to surface water.
  Uncertainty: uncertainty calculated from uncertainty in process water input and the uncertainty of fraction to surface water.
- Arsenic, ion [water, ground-, long-term]: 0 kg; pedigree (1,1,1,1,1)
  (same comment as for DOC, Dissolved Organic Carbon)
- Nitrate [water, surface water]: 0 kg; pedigree (1,1,1,1,1)
  (same comment as for COD, Chemical Oxygen Demand)
- Carbon monoxide, fossil [air, urban air close to ground]: 0 kg; pedigree (1,1,1,1,1)
  (same comment as for Phenol, pentachloro-)
- Barium [water, ground-, long-term]: 0 kg; pedigree (1,1,1,1,1)
  (same comment as for DOC, Dissolved Organic Carbon)
- Chloride [water, surface water]: 0 kg; pedigree (1,1,1,1,1)
  (same comment as for COD, Chemical Oxygen Demand)
- Carbon dioxide, fossil [air, urban air close to ground]: 0 kg; pedigree (1,1,1,1,1)
  (same comment as for Sodium)
- Cobalt [water, ground-, long-term]: 0 kg; pedigree (1,1,1,1,1)
  (same comment as for DOC, Dissolved Organic Carbon)
- Bromine [water, surface water]: 0 kg; pedigree (1,1,1,1,1)
  (same comment as for COD, Chemical Oxygen Demand)
- Methane, fossil [air, urban air close to ground]: 0 kg; pedigree (1,1,1,1,1)
  (same comment as for Phenol, pentachloro-)
- Cadmium, ion [water, ground-, long-term]: 0 kg; pedigree (1,1,1,1,1)
  (same comment as for DOC, Dissolved Organic Carbon)
- Arsenic, ion [water, surface water]: 0 kg; pedigree (1,1,1,1,1)
  (same comment as for COD, Chemical Oxygen Demand)
- Sulfur dioxide [air, urban air close to ground]: 0 kg; pedigree (1,1,1,1,1)
  (same comment as for Sodium)
- Chromium VI [water, ground-, long-term]: 0 kg; pedigree (1,1,1,1,1)
  (same comment as for DOC, Dissolved Organic Carbon)
- Fluoride [water, surface water]: 0 kg; pedigree (1,1,1,1,1)
  (same comment as for COD, Chemical Oxygen Demand)
- Nitrogen oxides [air, urban air close to ground]: 0 kg; pedigree (1,1,1,1,1)
  Sum of fuel-Nox and thermal-NOx emitted to air after DeNOx stage.
  Uncertainty: uncertainty calculated from uncertainty in average N-emissions and uncertainty in the share of thermal NOx and the uncertainty in nitrogen content in *this* waste.
- Mercury [water, ground-, long-term]: 0 kg; pedigree (1,1,1,1,1)
  (same comment as for DOC, Dissolved Organic Carbon)
- Barium [water, surface water]: 0 kg; pedigree (1,1,1,1,1)
  (same comment as for COD, Chemical Oxygen Demand)
- Ammonia [air, urban air close to ground]: 0 kg; pedigree (1,1,1,1,1)
  Nitrogen species emitted to air after DeNOx stage.
  Uncertainty: uncertainty calculated from uncertainty in average N-emissions and uncertainty in the share of thermal NOx and the uncertainty in nitrogen content in *this* waste.
- Copper, ion [water, ground-, long-term]: 0 kg; pedigree (1,1,1,1,1)
  (same comment as for DOC, Dissolved Organic Carbon)
- Cadmium, ion [water, surface water]: 0 kg; pedigree (1,1,1,1,1)
  (same comment as for COD, Chemical Oxygen Demand)
- Dinitrogen monoxide [air, urban air close to ground]: 0 kg; pedigree (1,1,1,1,1)
  (same comment as for Ammonia)
- Manganese [water, ground-, long-term]: 0 kg; pedigree (1,1,1,1,1)
  (same comment as for DOC, Dissolved Organic Carbon)
- Cobalt [water, surface water]: 0 kg; pedigree (1,1,1,1,1)
  (same comment as for COD, Chemical Oxygen Demand)
- Cyanide [air, urban air close to ground]: 0 kg; pedigree (1,1,1,1,1)
  (same comment as for Ammonia)
- Nickel, ion [water, ground-, long-term]: 0 kg; pedigree (1,1,1,1,1)
  (same comment as for DOC, Dissolved Organic Carbon)
- Chromium VI [water, surface water]: 0 kg; pedigree (1,1,1,1,1)
  (same comment as for COD, Chemical Oxygen Demand)
- Hydrogen chloride [air, urban air close to ground]: 0 kg; pedigree (1,1,1,1,1)
  (same comment as for Sodium)
- Lead [water, ground-, long-term]: 0 kg; pedigree (1,1,1,1,1)
  (same comment as for DOC, Dissolved Organic Carbon)
- Copper, ion [water, surface water]: 0 kg; pedigree (1,1,1,1,1)
  (same comment as for COD, Chemical Oxygen Demand)
- Bromine [air, urban air close to ground]: 0 kg; pedigree (1,1,1,1,1)
  (same comment as for Sodium)
- Antimony [water, ground-, long-term]: 0 kg; pedigree (1,1,1,1,1)
  (same comment as for DOC, Dissolved Organic Carbon)
- Mercury [water, surface water]: 0 kg; pedigree (1,1,1,1,1)
  (same comment as for COD, Chemical Oxygen Demand)
- Hydrogen fluoride [air, urban air close to ground]: 0 kg; pedigree (1,1,1,1,1)
  (same comment as for Sodium)
- Selenium [water, ground-, long-term]: 0 kg; pedigree (1,1,1,1,1)
  (same comment as for DOC, Dissolved Organic Carbon)
- Manganese [water, surface water]: 0 kg; pedigree (1,1,1,1,1)
  (same comment as for COD, Chemical Oxygen Demand)
- Arsenic [air, urban air close to ground]: 0 kg; pedigree (1,1,1,1,1)
  (same comment as for Sodium)
- Tin, ion [water, ground-, long-term]: 0 kg; pedigree (1,1,1,1,1)
  (same comment as for DOC, Dissolved Organic Carbon)
- Nickel, ion [water, surface water]: 0 kg; pedigree (1,1,1,1,1)
  (same comment as for COD, Chemical Oxygen Demand)
- Barium [air, urban air close to ground]: 0 kg; pedigree (1,1,1,1,1)
  (same comment as for Sodium)
- Vanadium, ion [water, ground-, long-term]: 0 kg; pedigree (1,1,1,1,1)
  (same comment as for DOC, Dissolved Organic Carbon)
- Lead [water, surface water]: 0 kg; pedigree (1,1,1,1,1)
  (same comment as for COD, Chemical Oxygen Demand)
- Cadmium [air, urban air close to ground]: 0 kg; pedigree (1,1,1,1,1)
  (same comment as for Sodium)
- Zinc, ion [water, ground-, long-term]: 0 kg; pedigree (1,1,1,1,1)
  (same comment as for DOC, Dissolved Organic Carbon)
- Antimony [water, surface water]: 0 kg; pedigree (1,1,1,1,1)
  (same comment as for COD, Chemical Oxygen Demand)
- Cobalt [air, urban air close to ground]: 0 kg; pedigree (1,1,1,1,1)
  (same comment as for Sodium)
- Beryllium [water, ground-, long-term]: 0 kg; pedigree (1,1,1,1,1)
  (same comment as for DOC, Dissolved Organic Carbon)
- Selenium [water, surface water]: 0 kg; pedigree (1,1,1,1,1)
  (same comment as for COD, Chemical Oxygen Demand)
- Chromium [air, urban air close to ground]: 0 kg; pedigree (1,1,1,1,1)
  (same comment as for Sodium)
- Strontium [water, ground-, long-term]: 0 kg; pedigree (1,1,1,1,1)
  (same comment as for DOC, Dissolved Organic Carbon)
- Tin, ion [water, surface water]: 0 kg; pedigree (1,1,1,1,1)
  (same comment as for COD, Chemical Oxygen Demand)
- Copper [air, urban air close to ground]: 0 kg; pedigree (1,1,1,1,1)
  (same comment as for Sodium)
- Titanium, ion [water, ground-, long-term]: 0 kg; pedigree (1,1,1,1,1)
  (same comment as for DOC, Dissolved Organic Carbon)
- Vanadium, ion [water, surface water]: 0 kg; pedigree (1,1,1,1,1)
  (same comment as for COD, Chemical Oxygen Demand)
- Mercury [air, urban air close to ground]: 0 kg; pedigree (1,1,1,1,1)
  (same comment as for Sodium)
- Thallium [water, ground-, long-term]: 0 kg; pedigree (1,1,1,1,1)
  (same comment as for DOC, Dissolved Organic Carbon)
- Zinc, ion [water, surface water]: 0 kg; pedigree (1,1,1,1,1)
  (same comment as for COD, Chemical Oxygen Demand)
- Manganese [air, urban air close to ground]: 0 kg; pedigree (1,1,1,1,1)
  (same comment as for Sodium)
- Silicon [water, ground-, long-term]: 0 kg; pedigree (1,1,1,1,1)
  (same comment as for DOC, Dissolved Organic Carbon)
- Beryllium [water, surface water]: 0 kg; pedigree (1,1,1,1,1)
  (same comment as for COD, Chemical Oxygen Demand)
- Nickel [air, urban air close to ground]: 0 kg; pedigree (1,1,1,1,1)
  (same comment as for Sodium)
- Iron, ion [water, ground-, long-term]: 0 kg; pedigree (1,1,1,1,1)
  (same comment as for DOC, Dissolved Organic Carbon)
- Strontium [water, surface water]: 0 kg; pedigree (1,1,1,1,1)
  (same comment as for COD, Chemical Oxygen Demand)
- Lead [air, urban air close to ground]: 0 kg; pedigree (1,1,1,1,1)
  (same comment as for Sodium)
- Calcium, ion [water, ground-, long-term]: 0 kg; pedigree (1,1,1,1,1)
  (same comment as for DOC, Dissolved Organic Carbon)
- Titanium, ion [water, surface water]: 0 kg; pedigree (1,1,1,1,1)
  (same comment as for COD, Chemical Oxygen Demand)
- Antimony [air, urban air close to ground]: 0 kg; pedigree (1,1,1,1,1)
  (same comment as for Sodium)
- Aluminium [water, ground-, long-term]: 0 kg; pedigree (1,1,1,1,1)
  (same comment as for DOC, Dissolved Organic Carbon)
- Thallium [water, surface water]: 0 kg; pedigree (1,1,1,1,1)
  (same comment as for COD, Chemical Oxygen Demand)
- Selenium [air, urban air close to ground]: 0 kg; pedigree (1,1,1,1,1)
  (same comment as for Sodium)
- Magnesium [water, ground-, long-term]: 0 kg; pedigree (1,1,1,1,1)
  (same comment as for DOC, Dissolved Organic Carbon)
- Silicon [water, surface water]: 0 kg; pedigree (1,1,1,1,1)
  (same comment as for COD, Chemical Oxygen Demand)
- Tin [air, urban air close to ground]: 0 kg; pedigree (1,1,1,1,1)
  (same comment as for Sodium)
- Sodium, ion [water, ground-, long-term]: 0 kg; pedigree (1,1,1,1,1)
  (same comment as for DOC, Dissolved Organic Carbon)
- Iron, ion [water, surface water]: 0 kg; pedigree (1,1,1,1,1)
  (same comment as for COD, Chemical Oxygen Demand)
- Vanadium [air, urban air close to ground]: 0 kg; pedigree (1,1,1,1,1)
  (same comment as for Sodium)
- NMVOC, non-methane volatile organic compounds, unspecified origin [air, urban air close to ground]: 0 kg; pedigree (1,1,1,1,1)
  (same comment as for Phenol, pentachloro-)
- Calcium, ion [water, surface water]: 0 kg; pedigree (1,1,1,1,1)
  (same comment as for COD, Chemical Oxygen Demand)
- Zinc [air, urban air close to ground]: 0 kg; pedigree (1,1,1,1,1)
  (same comment as for Sodium)
- Particulates, < 2.5 um [air, urban air close to ground]: 0 kg; pedigree (1,1,1,1,1)
  (same comment as for Phenol, pentachloro-)
- Aluminium [water, surface water]: 0 kg; pedigree (1,1,1,1,1)
  (same comment as for COD, Chemical Oxygen Demand)
- Strontium [air, urban air close to ground]: 0 kg; pedigree (1,1,1,1,1)
  (same comment as for Sodium)
- Particulates, > 2.5 um, and < 10um [air, urban air close to ground]: 0 kg; pedigree (1,1,1,1,1)
  (same comment as for Phenol, pentachloro-)
- Magnesium [water, surface water]: 0 kg; pedigree (1,1,1,1,1)
  (same comment as for COD, Chemical Oxygen Demand)
- Titanium [air, urban air close to ground]: 0 kg; pedigree (1,1,1,1,1)
  (same comment as for Sodium)
- Dioxins, measured as 2,3,7,8-tetrachlorodibenzo-p-dioxin [air, urban air close to ground]: 0 kg; pedigree (1,1,1,1,1)
  (same comment as for Phenol, pentachloro-)
- Sodium, ion [water, surface water]: 0 kg; pedigree (1,1,1,1,1)
  (same comment as for COD, Chemical Oxygen Demand)
- Thallium [air, urban air close to ground]: 0 kg; pedigree (1,1,1,1,1)
  (same comment as for Sodium)
- Benzene [air, urban air close to ground]: 0 kg; pedigree (1,1,1,1,1)
  (same comment as for Phenol, pentachloro-)
- BOD5, Biological Oxygen Demand [water, ground-, long-term]: 0 kg; pedigree (1,1,1,1,1)
  (same comment as for DOC, Dissolved Organic Carbon)
- Iron [air, urban air close to ground]: 0 kg; pedigree (1,1,1,1,1)
  (same comment as for Sodium)
- Toluene [air, urban air close to ground]: 0 kg; pedigree (1,1,1,1,1)
  (same comment as for Phenol, pentachloro-)
- Chromium, ion [water, surface water]: 0 kg; pedigree (1,1,1,1,1)
  (same comment as for COD, Chemical Oxygen Demand)
- Calcium [air, urban air close to ground]: 0 kg; pedigree (1,1,1,1,1)
  (same comment as for Sodium)
- Benzene, pentachloro- [air, urban air close to ground]: 0 kg; pedigree (1,1,1,1,1)
  (same comment as for Phenol, pentachloro-)
- TOC, Total Organic Carbon [water, ground-, long-term]: 0 kg; pedigree (1,1,1,1,1)
  (same comment as for DOC, Dissolved Organic Carbon)
- Aluminium [air, urban air close to ground]: 0 kg; pedigree (1,1,1,1,1)
  (same comment as for Sodium)
- Benzene, hexachloro- [air, urban air close to ground]: 0 kg; pedigree (1,1,1,1,1)
  (same comment as for Phenol, pentachloro-)
- COD, Chemical Oxygen Demand [water, ground-, long-term]: 0 kg; pedigree (1,1,1,1,1)
  (same comment as for DOC, Dissolved Organic Carbon)
- Magnesium [air, urban air close to ground]: 0 kg; pedigree (1,1,1,1,1)
  (same comment as for Sodium)
- Water [air, unspecified]: 1.52239e-6 m3; lognormal variance with pedigree 0.130025, pedigree (4,4,5,2,4)
  Calculated value based on literature values and expert opinion. See comments in the parametres' comment field.
- Nitrogen oxides [air, non-urban air or from high stacks]: 3.70623e-5 kg; lognormal variance with pedigree 0.082625, pedigree (3,3,5,2,1)
- Sulfur dioxide [air, non-urban air or from high stacks]: 8.55287e-6 kg; lognormal variance with pedigree 0.042625, pedigree (3,3,5,2,1)
- Particulates, < 2.5 um [air, non-urban air or from high stacks]: 1.69375e-6 kg; lognormal variance with pedigree 0.350125, pedigree (1,2,5,2,1)
- Water [water, unspecified]: 9.29395e-7 m3; lognormal variance with pedigree 0.130025, pedigree (4,4,5,2,4)
  (same comment as for Water)
- Carbon dioxide, fossil [air, non-urban air or from high stacks]: 0.00121833 kg; lognormal variance with pedigree 0.042625, pedigree (3,3,5,2,1)
