# barge production

Dataset: EcoSpold 2, unit process
Geography: RER
Time period: 1993-01-01 to 2019-12-31
Technology level: current
Classification: EcoSpold01Categories: transport systems/ship
Classification: ISIC rev.4 ecoinvent: 3011:Building of ships and floating structures
Tags: ConvertedDataset
Scenario: Business-as-Usual
System model: Allocation at the point of substitution
Generated by: Michael Spielmann (obsolete)
Published in: Spielmann M. 2007
Database: ecoinvent
isCopyrightProtected: true
accessRestrictedTo: 1

## General comment
The dataset represents the manufacturing and disposal of one barge with an average total capacity of 1000 t/vessel.
[This dataset was already contained in the ecoinvent database version 2. It was not individually updated during the transfer to ecoinvent version 3. Life Cycle Impact Assessment results may still have changed, as they are affected by changes in the supply chain, i.e. in other datasets. This dataset was generated following the ecoinvent quality guidelines for version 2. It may have been subject to central changes described in the ecoinvent version 3 change report (http://www.ecoinvent.org/database/ecoinvent-version-3/reports-of-changes/), and the results of the central updates were reviewed extensively. The changes added e.g. consistent water flows and other information throughout the database. The documentation of this dataset can be found in the ecoinvent reports of version 2, which are still available via the ecoinvent website. The change report linked above covers all central changes that were made during the conversion process.]

## Included activities start
Barge production starting with material consumption.

## Included activities end
The activity ends with the production of one barge. The dataset includes material consumption, energy consumption, disposal for non metal components and use of paint and emissions of the solvent of paint as NMVOC. The dataset doesn't include the consumption of lubricates.

## Geography
Manufacturing data represents conditions in Europe.

## Technology
The data is derived from an assessment of one barge, with a load capacity of 2800t Bialonski (1990; Engelkamp (1993) as quoted in Maibach et al. (1999). This data was adjusted to model a barge, representing the current average total capacity for a barge (1000 t/vessel). For manufacturing, electricity and heavy oil burned in industrial furnace are included. Energy consumption in manufacturing was estimated as 50% of the cumulative energy of the used materials. The split of energies is 10% electricity and 90% heavy fuel oil Frischknecht et al. (1996). In this project waste treatment processes for non metal components of vessels are accounted for. For inland waterways vessels we assume that they are painted 10 times in their entire life span.
References:
Bialonski W. (1990) Spezifischer Energieeinsatz im Verkehr – Ermittlung und Vergleich der spezifischen Energieverbräuche. Forschungsbericht FE Nr. 90 247/88, im Auftrag des Bundesministers für Verkehr (ausgeführt am Verkehrswissenschaftlichen Institut der Rheinisch-Westfälischen Technischen Hochschule Aachen), Bonn
Engelkamp P. (1993) Stellungnahme des Europäischen Entwicklungszent-rums für die Binnenschifffahrt e.V. Duisburg zum Fragenkatalog für die öffentliche Anhörung der Enquete Komission " Schutz des Menschen und der Umwelt". Enquete Komission zum Thema "Mobilität - Darstellung, Bewertung und Optimierung von Stoffströmen., Bonn
Maibach M., Peter D. and Seiler B. (1999) Ökoinventar Transporte: Grundlagen für den ökologischen Vergleich von Transportsystemen und den Einbezug von Transportsystemen in Ökobilanzen. Technischer Schlussbericht. In: Schweizerischer Nationalfonds zur Förderung der wissenschaftlichen Forschung (ed. SPP Umwelt M.). 2nd Edition. INFRAS, Zürich
Frischknecht R., Bollens U., Bosshart S., Ciot M., Ciseri L., Doka G., Dones R., Gantner U. and Hischier R. (1996) Ökoinventare von Energie-systemen: Grundlagen für den ökologischen Vergleich von Energiesyste-men und den Einbezug von Energiesystemen in Ökobilanzen für die Schweiz. Auflage No. 3. Gruppe Energie - Stoffe - Umwelt (ESU), Eid-genössische Technische Hochschule Zuerich und Sektion Ganzheitliche Systemanalysen, Paul Scherrer Institut, Villigen, Bundesamt für Energie (Hrsg.), Bern

## Reference product
- barge: 1 unit; CPC 49314: Other vessels for the transport of goods and other vessels for the transport of both persons and goods; By-product classification allocatable product
  EcoSpold01Location=RER
  production volume 1.32237 unit
    This is a placeholder value that does not reflect real-world production volumes. This dataset does not currently require a real-world production volume to work in the database framework, and no actual data were collected yet. This has no negative effect on the results of the ecoinvent database. The placeholder value of this activity was scaled according to the nominal GDP of 2005 (source: United Nations, http://data.un.org/Glossary.aspx?q=GDP+%28current+US%24%29, accessed 20130726) to reflect an appropriate share of the global production volume, which is also a placeholder value.
  property price 45720 EUR2005
    Calculated based on knowledge of products entering the activity and their price. Labour costs are not included. This price is likely to be underestimated, since, for example, the costs of waste treatment are not included.
  property true value 45720
    allocation property applied in "true value" allocation // value calculated from revenue

## By-products
- heat, for reuse in municipal waste incineration only: 0 MJ; CPC 17300: Steam and hot water; By-product classification allocatable product; pedigree (1,1,1,1,1)
  Net electricity generated from this waste and used in internal MSWI plant energy redistribution.
  production volume 2113.58 MJ
  property true value relation 0.1842; name E_th_prod_MSWI_true_value_relation
    property to calculate 'true value' from
  property exergy 0.1842 MJ; name E_th_prod_MSWI_exergy
    This exergy property is based on the exergy content of the product.
  property price 0.0106 EUR2005; name E_th_prod_MSWI_price_EUR2005
    Average European district heat price from Ecoheatcool and Euroheat 2005-2006, Ecoheat Work package 1: The European heat market. Final report. 10.6 EUR/GJ i s the price of district heat. http://www.solarthermalworld.org/files/Ecoheatcool%20WP1%20Web.pdf?download
  property true value 3.77341
    allocation property applied in "true value" allocation // value calculated from true value relation
- electricity, for reuse in municipal waste incineration only: 0 kWh; CPC 17100: Electrical energy; By-product classification allocatable product; pedigree (1,1,1,1,1)
  (same comment as for heat, for reuse in municipal waste incineration only)
  production volume 273.068 kWh
  property price 0.1 EUR2005; name E_el_prod_MSWI_price_EUR2005
    Estimated to be the same price as in case of electricity, medium voltage.
  property exergy 3.6 MJ; name E_el_prod_MSWI_exergy
    This exergy property is based on the exergy content of the product.
  property true value relation 3.6; name E_el_prod_MSWI_true_value_relation
    property to calculate 'true value' from
  property true value 9.28866
    (same comment as for heat, for reuse in municipal waste incineration only)
- zinc concentrate: 0 kg; CPC 14290: Other non-ferrous metal ores and concentrates (other than uranium or thorium ores and concentrates); By-product classification allocatable product
  Calculated value from the knowledge of the properties of both products.
  production volume 0.723199 kg
  property price 0.38 EUR2005; name ByP_price_EUR2005
    Temporary price data. Calculated as 90% of purchasers price based on: Zinc content in concentrate 53%. Concentrate price per kg Zn 86.5% of refined Zn price (13.5% treatment charges according to CHR Metals Limited 2005: Dynamic cost curves. http://www.minecost.com/dynamic.pdf). 2004 zinc price from USGS (2007) Mineral commodity summaries 2007. <http://minerals.usgs.gov/minerals/pubs/mcs/2007/mcs2007.pdf> [Accessed 25 May 2010]
  property zinc content 0.53; name zinc_C_zinc_concentrate
    Zinc content on a dry matter basis. Value taken from teh "zinc mine operation" /GLO dataset.
  property dry mass 1 kg; name DM_zinc_concentrate
  property carbon content 0
    carbon content on a dry matter basis (reserved; not for manual entry)
  property true value 9.3158e-5
    allocation property applied in "true value" allocation // value calculated from revenue
  properties: wet mass 1 kg, water content 0, carbon content, non-fossil 0, carbon content, fossil 0, water in wet mass 0 kg, carbon allocation 0 kg

## Inputs from technosphere
- polyethylene, high density, granulate: 783.776 kg; source Bialonski W. 1990; lognormal variance with pedigree 0.0721, pedigree (3,4,5,3,3)
  Literature value. The exchanges of the barge manufacturing are derived from an assessment of one barge, with a load capacity of 2800t Bialonski (1990; Engelkamp (1993) as quoted in Maibach et al. (1999). This data was adjusted to model a barge, representing the current average total capacity for a barge (1000 t/vessel).
  References:
  Engelkamp P. (1993) Stellungnahme des Europäischen Entwicklungszentrums für die Binnenschifffahrt e.V. Duisburg zum Fragenkatalog für die öffentliche Anhörung der Enquete Komission " Schutz des Menschen und der Umwelt". Enquete Komission zum Thema "Mobilität - Darstellung, Bewertung und Optimierung von Stoffströmen., Bonn
  Maibach M., Peter D. and Seiler B. (1999) Ökoinventar Transporte: Grundlagen für den ökologischen Vergleich von Transportsystemen und den Einbezug von Transportsystemen in Ökobilanzen. Technischer Schlussbericht. In: Schweizerischer Nationalfonds zur Förderung der wissenschaftlichen Forschung (ed. SPP Umwelt M.). 2nd Edition. INFRAS, Zürich
  EcoSpold01Location=RER
  Uncertainty: literatures studies
  properties: carbon content, fossil 0.857143, wet mass 1 kg, dry mass 1 kg
  note on carbon content, fossil: Polyethylene is formed out of a huge amount of ethylene monomers (C2H4) (ecoinvent v2.2 report 11_II). MW=28 g/mol
- reinforcing steel: 264924 kg; source Bialonski W. 1990; lognormal variance with pedigree 0.0721, pedigree (3,4,5,3,3)
  EcoSpold01Location=RER
  Literature value. The exchanges of the barge manufacturing are derived from an assessment of one barge, with a load capacity of 2800t Bialonski (1990; Engelkamp (1993) as quoted in Maibach et al. (1999). This data was adjusted to model a barge, representing the current average total capacity for a barge (1000 t/vessel).
  References:
  Engelkamp P. (1993) Stellungnahme des Europäischen Entwicklungszentrums für die Binnenschifffahrt e.V. Duisburg zum Fragenkatalog für die öffentliche Anhörung der Enquete Komission " Schutz des Menschen und der Umwelt". Enquete Komission zum Thema "Mobilität - Darstellung, Bewertung und Optimierung von Stoffströmen., Bonn
  Maibach M., Peter D. and Seiler B. (1999) Ökoinventar Transporte: Grundlagen für den ökologischen Vergleich von Transportsystemen und den Einbezug von Transportsystemen in Ökobilanzen. Technischer Schlussbericht. In: Schweizerischer Nationalfonds zur Förderung der wissenschaftlichen Forschung (ed. SPP Umwelt M.). 2nd Edition. INFRAS, Zürich
  Uncertainty: literatures studies
  properties: wet mass 1 kg, carbon content, fossil 0.004, dry mass 1 kg
- electricity, medium voltage: 104970 kWh; source Frischknecht R. 1996; lognormal variance with pedigree 0.2461, pedigree (4,5,5,3,5)
  EcoSpold01Location=UCTE
  Estimation. Energy consumption in manufacturing was estimated as 50% of the cumulative energy of the used materials. The split of energies is 10% electricity and 90% heavy fuel oil Frischknecht et al. (1996).
  Uncertainty: literatures studies
- synthetic rubber: 470.865 kg; source Bialonski W. 1990; lognormal variance with pedigree 0.0721, pedigree (3,4,5,3,3)
  (same comment as for polyethylene, high density, granulate)
  properties: carbon content, fossil 0.871949, wet mass 1 kg, dry mass 1 kg
  note on carbon content, fossil: EPDM (Ethylene-propene-diene terpolymer) rubber is a terpolymer of ethylene, propene, and a diene with the residual unsaturated portion of the diene in the side chain (ecoinvent v2.2 report 7-part XX & Ullmann). Chemical formula (deduced from Evidences of Solvent-Induced Miscibility in Polychloroprene-co-Ethylene-Propene Diene Terpolymer Blends, Dubey et al., Journal of Applied Polymer Science, 2009, 111:1884–1891): C20H35
- heat, district or industrial, other than natural gas: 3.22908e6 MJ; lognormal variance with pedigree 0.2461, pedigree (4,5,5,3,5)
  Literatures studies
  EcoSpold01Location=RER
  Uncertainty: literatures studies
- cast iron: 17295.1 kg; source Bialonski W. 1990; lognormal variance with pedigree 0.0721, pedigree (3,4,5,3,3)
  (same comment as for reinforcing steel)
  properties: carbon content, fossil 0.04, wet mass 1 kg, dry mass 1 kg
  note on carbon content, fossil: Cast iron is made by remelting pig iron in small furnaces (e.g. cupola furnaces or electric arc furnaces) and poured into moulds to make castings. It usually contains 2% to 6% carbon (ecoinvent v2.2 report 10_partII). An average content of 4% was considered
- ceramic tile: 1099.69 kg; source Bialonski W. 1990; lognormal variance with pedigree 0.0721, pedigree (3,4,5,3,3)
  Literature value. The exchanges of the barge manufacturing are derived from an assessment of one barge, with a load capacity of 2800t Bialonski (1990; Engelkamp (1993) as quoted in Maibach et al. (1999). This data was adjusted to model a barge, representing the current average total capacity for a barge (1000 t/vessel).
  References:
  Engelkamp P. (1993) Stellungnahme des Europäischen Entwicklungszentrums für die Binnenschifffahrt e.V. Duisburg zum Fragenkatalog für die öffentliche Anhörung der Enquete Komission " Schutz des Menschen und der Umwelt". Enquete Komission zum Thema "Mobilität - Darstellung, Bewertung und Optimierung von Stoffströmen., Bonn
  Maibach M., Peter D. and Seiler B. (1999) Ökoinventar Transporte: Grundlagen für den ökologischen Vergleich von Transportsystemen und den Einbezug von Transportsystemen in Ökobilanzen. Technischer Schlussbericht. In: Schweizerischer Nationalfonds zur Förderung der wissenschaftlichen Forschung (ed. SPP Umwelt M.). 2nd Edition. INFRAS, Zürich
  EcoSpold01Location=CH
  Uncertainty: literatures studies
  properties: dry mass 1 kg, wet mass 1 kg
- waste emulsion paint: 0 kg; pedigree (1,1,1,1,1)
  EcoSpold01Location=CH
  Estimation based on material composition.
  Uncertainty: own estimate, based on material composition
  production volume 0 kg
    Calculated from the production volume of barge in proportion to the respective output amounts.
  properties: wet mass 1 kg, dry mass 1 kg, carbon content, fossil 0.27
  note on carbon content, fossil: Tab A.4, ecoinvent v2.2 report 13_I. C content has been calculated after data in the tables, and then referred to 1 kg DM
- stone wool, packed: 2829.19 kg; source Bialonski W. 1990; lognormal variance with pedigree 0.0721, pedigree (3,4,5,3,3)
  EcoSpold01Location=CH
  Literature value. The exchanges of the barge manufacturing are derived from an assessment of one barge, with a load capacity of 2800t Bialonski (1990; Engelkamp (1993) as quoted in Maibach et al. (1999). This data was adjusted to model a barge, representing the current average total capacity for a barge (1000 t/vessel).
  References:
  Engelkamp P. (1993) Stellungnahme des Europäischen Entwicklungszentrums für die Binnenschifffahrt e.V. Duisburg zum Fragenkatalog für die öffentliche Anhörung der Enquete Komission " Schutz des Menschen und der Umwelt". Enquete Komission zum Thema "Mobilität - Darstellung, Bewertung und Optimierung von Stoffströmen., Bonn
  Maibach M., Peter D. and Seiler B. (1999) Ökoinventar Transporte: Grundlagen für den ökologischen Vergleich von Transportsystemen und den Einbezug von Transportsystemen in Ökobilanzen. Technischer Schlussbericht. In: Schweizerischer Nationalfonds zur Förderung der wissenschaftlichen Forschung (ed. SPP Umwelt M.). 2nd Edition. INFRAS, Zürich
  Uncertainty: literatures studies
  properties: carbon content, fossil 0.015401, wet mass 1 kg, dry mass 1 kg
  note on carbon content, fossil: The chemical composition of the glass fibres used in the rock wool production is similar to the composition of naturally cooled volcano basalt and has a composition listed in Tab. 3.1 and 3.2 in ecoinvent v2.2 report 16, part XIV. Rock wool contains: a minimum of 96% mineral fibres,between 0.5 and 3.0 weight percent of phenolic resin depending on the specific product characteristics, and about 0.2 percent mineral oil (ecoinvent v2.2 report 16, part XIV). An average composition of 1.8% phenolic resin, 0.2% mineral oil, and 98% mineral fibres has been assumed and used to calculate C content of the rock wool
- copper: 2199.37 kg; source Bialonski W. 1990; lognormal variance with pedigree 0.0721, pedigree (3,4,5,3,3)
  (same comment as for reinforcing steel)
  properties: dry mass 1 kg, wet mass 1 kg
- alkyd paint, white, without solvent, in 60% solution state: 1569.55 kg; source Bialonski W. 1990; lognormal variance with pedigree 0.0721, pedigree (3,4,5,3,3)
  (same comment as for reinforcing steel)
  properties: dry mass 1 kg, carbon content, non-fossil 0.199629, carbon content, fossil 0.140367, wet mass 1 kg
  note on carbon content, non-fossil: C content was calculated as an addition of C content in the raw materials.
- waste plastic, mixture: -2349.33 kg; lognormal variance with pedigree 0.2341, pedigree (3,4,5,3,5)
  (same comment as for waste emulsion paint)
  production volume 2350 kg
    (same comment as for waste emulsion paint)
  properties: water content 0.180638, carbon content, fossil 0.747344, dry mass 0.847 kg, wet mass 1 kg
  note on carbon content, fossil: C content in 1 kg DM was calculated using data in Tab A.2, ecoinvent v2.2 report 13_I
- polyethylene, low density, granulate: 1569.55 kg; source Bialonski W. 1990; lognormal variance with pedigree 0.0721, pedigree (3,4,5,3,3)
  (same comment as for polyethylene, high density, granulate)
  properties: carbon content, fossil 0.857143, wet mass 1 kg, dry mass 1 kg
- glued laminated timber, for outdoor use: 1.16967 m3; source Bialonski W. 1990; lognormal variance with pedigree 0.0721, pedigree (3,4,5,3,3)
  (same comment as for polyethylene, high density, granulate)
  properties: water content 0.13, dry mass 380.531 kg, carbon content, fossil 0.00982967, wet mass 430 kg, carbon content, non-fossil 0.478422
  note on carbon content, fossil: C content of 12 kg Melamine formaldehyde resin (C4H6N6O) used for glueing
  note on carbon content, non-fossil: The laminated timber is composed of wood and glue. The weight of the wood is assumed to be the DM minus 12 kg glue. C content of wood is 0.494 kgC/kg dry wood (ecoinvent v2.2 report 9)
- aluminium, cast alloy: 156.955 kg; source Bialonski W. 1990; lognormal variance with pedigree 0.0721, pedigree (3,4,5,3,3)
  (same comment as for reinforcing steel)
  properties: wet mass 1 kg, dry mass 1 kg
- waste wood, untreated: -628.82 kg; lognormal variance with pedigree 0.3381, pedigree (5,5,5,3,5)
  Estimation based on material composition.
  EcoSpold01Location=CH
  Uncertainty: own estimate, based on material composition
  production volume 629 kg
    (same comment as for waste emulsion paint)
  properties: water content 0.25, dry mass 0.8 kg, wet mass 1 kg, carbon content, non-fossil 0.48632
  note on carbon content, non-fossil: Tab A.4, ecoinvent v2.2 report 13_I. C content has been referred to 1 kg DM,
- cement, unspecified: 0 kg; source Bialonski W. 1990; pedigree (1,1,1,1,1)
  (same comment as for ceramic tile)
  properties: wet mass 1 kg, dry mass 1 kg
- steel, chromium steel 18/8, hot rolled: 3449.01 kg; source Bialonski W. 1990; lognormal variance with pedigree 0.0721, pedigree (3,4,5,3,3)
  (same comment as for reinforcing steel)
  properties: carbon content, fossil 0.0008, dry mass 1 kg, wet mass 1 kg
  note on carbon content, fossil: Stainless steel model is the grade 304 steel (18/8 stainless, 18% chromium 8% nickel; max. 0.08% C)
- waste emulsion paint: -627.608, -0.212821 kg (2 entries); lognormal variance with pedigree 0.2341, pedigree (3,4,5,3,5)
  (same comment as for waste emulsion paint)
  production volume 628 kg
- cement, unspecified: 3547.78, 61.1918 kg (2 entries); source Bialonski W. 1990; lognormal variance with pedigree 0.0721, pedigree (3,4,5,3,3)
  (same comment as for ceramic tile)

## Emissions to nature
- NMVOC, non-methane volatile organic compounds, unspecified origin [air, unspecified]: 941.731 kg; lognormal variance with pedigree 0.1121, pedigree (3,4,5,3,3)
  Estimation. For inland waterways vessels it's assumed that they are painted 10 times in their entire life span. NMVOC emissions are estimated based on a 60% solvent content in the used paint and assuming that the entire amount of solvents is released as NMVOC.
  Uncertainty: estimated from the used paint (60%B solvent as NMVOC)

## Sampling procedure
literature studies and own calculations.

## Review by Niels Jungbluth 2004-04-02
Passed.

## Review by Roland Hischier 2011-09-23
Transfer of documentation done.
