# coffee green bean production, robusta

Dataset: EcoSpold 2, unit process
Geography: ID
Time period: 2012-01-01 to 2019-12-31
Technology level: current
Classification: ISIC rev.4 ecoinvent: 0127:Growing of beverage crops
Tags: WFLDB
Scenario: Business-as-Usual
System model: Allocation at the point of substitution
Generated by: Laura Peano
Published in: Nemecek T. 2015
Database: ecoinvent
isCopyrightProtected: true
accessRestrictedTo: 1

## General comment
This dataset represents the production of 1 kg of green coffee beans (Robusta). Robusta is a variety of coffee that has a stronger, harsher taste, with a grain-like overtone and peanutty aftertaste. It contains twice as much caffeine as Arabica beans, and is generally considered to be of inferior quality compared to Arabica. Robusta is mostly grown in Africa, South-East Asia, India and Brazil. The reference flow is the average yield per ha and year, from 2012 - 2014: yield (900 kg/ha) obtained under non-irrigated conditions. The data are representative for Robusta green coffee beans production in Indonesia (Lampung province) used for the export market. Mineral NPK fertiliser input is 900-0-0 kg/ha. No organic fertilisers are applied. No pesticides are applied.
The dataset was modelled within the project 'World Food LCA database (WFLDB)'. The aim of this project was to provide inventories of a broad variety of agricultural products and processes and to cover for each product at least 50% of the global export market. The export share of coffee produced in Indonesia amounts to 8.1% of the global export (tonnage exported in 2010). The production system regarded in this dataset aimed at representing Robusta green coffee beans produced in Indonesia for the export market.
PEF-Quality: data quality rating (DQR) = 2.2 (i.e. good quality)
This dataset refers to an average situation; for specific situations exchanges might differ substantially due to site specific parameters

## Included activities start
This activity starts with the nursery producing fruit tree seedlings, i.e.grafted young trees to be planted.

## Included activities end
This activity ends with the waste treatment after the clearing of the orchard (rooting up the trees). The dataset includes all activities during a year in the productive phase of the orchard including the establishment phase per year of lifetime (20 years), the clearing of the orchard including waste treatment.
The establishment phase of the orchard includes tree nursery, soil cultivation, planting trees and installation of trellis system (posts and wires). Fertiliser and pesticide use in a year of the establishment phase is assumed to be half of the amount of a year in the productive phase.
The productive phase of the orchard includes machine operations, corresponding infrastructure, fuel use and sheds. Machine operations in the productive phase are: soil cultivation (mulching, mowing), fertiliser and pesticide application and harvesting. Further, direct field emissions and land use change are included. At the end of the productive phase the orchard is cleared by rooting up the trees.
The inputs of seedlings, fertilisers and pesticides as well as packaging of fertilisers and pesticides are considered. The dataset doesn't include emissions from manure storage because these are within the system boundary of animal production. Green coffee beans as sun-dried. Heavy metal uptake by the crop is considered.

## Technology
Conventional production

## Parameters
- heavyMetalUptakeSwitch: 1
- LUC_crop_specific: 1
  This parameter allows to switch between a 'crop specific' and a 'country specific' approach when calculating the LUC of a crop. By default, the chosen approach is 'crop specific', so the value of the parameter is 1. If you want to apply a 'country specific' approach, turn the parameter to 0.

## Reference product
- coffee, green bean: 1 kg; By-product classification allocatable product; CPC 01610: Coffee, green
  Yield = 900.0 kg/ha
  production volume 6.74108e8 kg
    Source: FAOSTAT. Average, 2009-2012. Assumption: 100% Robusta
  property price 1.6 EUR2005
    Calculated value based on data from United Nations Commodity Trade Statistics Database (comtrade.un.org). UN comtrade category: 90111 Coffee, not roasted, not decaffeinated. Year: 2005. Using exchange rate of 1EURO = 1.209 USD. Average of price of import into 5 main markets (EU, US, JP, IN and CN).
  property carbon content, non-fossil 0.490083
    calculation: C-content of components according to ecoinvent report No. 15a. Source of composition: Souci, S.W., Fachmann, W., Kraut, H. (Hg.: Bundesminsiterium fur Ernahrung, Landwirtschaft und Forsten, Bonn) 'Die Zusammensetzung der Lebensmittel - Nahrwerttabellen', medpharm Scientific Publishers Stuttgart, CRC Press; 2000.
  property carbon content 0.490083
    carbon content on a dry matter basis (reserved; not for manual entry)
  property true value 1.6
    allocation property applied in "true value" allocation // value calculated from revenue
  properties: water content 0.102, carbon content, fossil 0, water in wet mass 0.092559 kg, dry mass 0.907441 kg, wet mass 1 kg, carbon allocation 0.444722 kg

## By-products
- electricity, for reuse in municipal waste incineration only: 0 kWh; CPC 17100: Electrical energy; By-product classification allocatable product; pedigree (1,1,1,1,1)
  Net electricity generated from this waste and used in internal MSWI plant energy redistribution.
  Uncertainty: uncertainty is calculated from uncertainties in waste composition and uncertainties in energy efficiency and the uncertainty in internal energy demand
  production volume 1.21156e8 kWh
  property true value relation 3.6; name E_el_prod_MSWI_true_value_relation
    property to calculate "true value" from
  property price 0.1 EUR2005; name E_el_prod_MSWI_price_EUR2005
    Estimated to be the same price as in case of electricity, medium voltage.
  property exergy 3.6 MJ; name E_el_prod_MSWI_exergy
    This exergy property is based on the exergy content of the product.
  property true value 0.0237357
    allocation property applied in "true value" allocation // value calculated from true value relation
- heat, for reuse in municipal waste incineration only: 0 MJ; CPC 17300: Steam and hot water; By-product classification allocatable product; pedigree (1,1,1,1,1)
  (same comment as for electricity, for reuse in municipal waste incineration only)
  production volume 1.01096e9 MJ
  property exergy 0.1842 MJ; name E_th_prod_MSWI_exergy
    This exergy property is based on the exergy content of the product.
  property price 0.0106 EUR2005; name E_th_prod_MSWI_price_EUR2005
    Average European district heat price from Ecoheatcool and Euroheat 2005-2006, Ecoheat Work package 1: The European heat market. Final report. 10.6 EUR/GJ i s the price of district heat. http://www.solarthermalworld.org/files/Ecoheatcool%20WP1%20Web.pdf?download
  property true value relation 0.1842; name E_th_prod_MSWI_true_value_relation
    property to calculate "true value" from
  property true value 0.010134
    (same comment as for electricity, for reuse in municipal waste incineration only)
- biogas: 0 m3; source Raboni, Massimo 2014; By-product classification allocatable product; CPC 17200: Coal gas, water gas, producer gas and similar gases, other than petroleum gases and other gaseous hydrocarbons; pedigree (1,1,1,1,1)
  An average yield of 100 litres of biogas per kg biowaste is assumed
  production volume 5.48735e6 m3
  property price 0.109 EUR2005; name biogas_yield_price_EUR2005
    Temporary price data. Calculated as 90% of purchasers price based on: Same prices per energy output as natural gas, based on the proportional lower heating value (2/3 that of natural gas)
  property carbon content, non-fossil 0.449939
    Total C content in kg/Nm3 (Tab 12.8, ecoinvent v2.2 report n17), referred to 1kg DM
  property carbon content 0.449939
    carbon content on a dry matter basis (reserved; not for manual entry)
  property true value 0.000887279
    allocation property applied in "true value" allocation // value calculated from revenue
  properties: water in wet mass 0 kg, wet mass 1.15 kg, carbon content, fossil 0, lower heating value 0 MJ/Nm3, water content 0, dry mass 1.15 kg, carbon allocation 0.51743 kg
- zinc concentrate: 0 kg; CPC 14290: Other non-ferrous metal ores and concentrates (other than uranium or thorium ores and concentrates); By-product classification allocatable product
  Calculated value from the knowledge of the properties of both products.
  production volume 216.588 kg
  property price 0.38 EUR2005; name ByP_price_EUR2005
    Temporary price data. Calculated as 90% of purchasers price based on: Zinc content in concentrate 53%. Concentrate price per kg Zn 86.5% of refined Zn price (13.5% treatment charges according to CHR Metals Limited 2005: Dynamic cost curves. http://www.minecost.com/dynamic.pdf). 2004 zinc price from USGS (2007) Mineral commodity summaries 2007. <http://minerals.usgs.gov/minerals/pubs/mcs/2007/mcs2007.pdf> [Accessed 25 May 2010]
  property zinc content 0.53; name zinc_C_zinc_concentrate
    Zinc content on a dry matter basis. Value taken from teh "zinc mine operation" /GLO dataset.
  property dry mass 1 kg; name DM_zinc_concentrate
  property carbon content 0
    carbon content on a dry matter basis (reserved; not for manual entry)
  property true value 1.22092e-7
    allocation property applied in "true value" allocation // value calculated from revenue
  properties: wet mass 1 kg, water content 0, carbon content, non-fossil 0, carbon content, fossil 0, water in wet mass 0 kg, carbon allocation 0 kg
- compost: 0 kg; CPC 391: Wastes from food and tobacco industry; By-product classification allocatable product; pedigree (1,1,1,1,1)
  EcoSpold01Location=CH
  Biowaste is reduced in mass by a factor of 2 during composting
  production volume 4.37132e8 kg
  property water in wet mass 0.472 kg; name Water_in_wet_mass_compost; = 1- DM_compost
  property price 0.03 EUR2005
    Temporary price data. Calculated as 90% of purchasers price based on: Estimation done using the following sources: <http://www.wmaa.asn.au/uploads/documents/MarkWinser_1May2007.pdf>; <http://www.swlf.ait.ac.th/UpdData/International/Composting%20and%20anaerobic%20digestion_%20comparions%20for%20Europe%20and%20Asia.pdf>; <http://www.epa.gov/osw/conserve/rrr/composting/basic.htm>, accessed 2011.06.16
  property carbon content, non-fossil 0.1165
    calculation: dry matter 50%, organic matter 40% of dry matter, C content calculated from organic matter divided by 1.72. Relative to dry matter; relative to fresh matter: divided by 2 => 0.1156
  property dry mass 0.528 kg; name DM_compost
  property water content 0.893939; name Water_content_compost; = Water_in_wet_mass_compost/DM_compost
  property concentration, cadmium 0 kg/kg; name Mass_compost_concentration_Cd; = Mass_biowaste_concentration_Cd*2
    Biowaste mass is reduced by a factor of two during composting, therefore concentration is doubled
  property humus equivalent 0.061 kg
    Humus building fraction expressed in kg per kg product on a FM basis. Humus denotes the converted, primary biomass from plants or animals in the ground. More information can be found in the documentation of the composting itself: "treatment of biowaste, industrial composting".
  property concentration, copper 0 kg/kg; name Mass_compost_concentration_Cu; = Mass_biowaste_concentration_Cu*2
    (same comment as for compost)
  property concentration, calcium 0 kg/kg; name Mass_compost_Ca_concentration; = Mass_biowaste_concentration_Ca*2
    (same comment as for compost)
  property concentration, magnesium 0 kg/kg; name Mass_compost_Mg_concentration; = Mass_biowaste_concentration_Mg*2
    (same comment as for compost)
  property concentration, mercury 0 kg/kg; name Mass_compost_Hg_concentration; = Mass_biowaste_concentration_Hg*2
    (same comment as for compost)
  property concentration, lead 0 kg/kg; name Mass_compost_concentration_Pb; = Mass_biowaste_concentration_Pb*2
    (same comment as for compost)
  property concentration, nickel 0 kg/kg; name Mass_compost_Ni_concentration; = Mass_biowaste_concentration_Ni*2
    (same comment as for compost)
  property concentration, phosphorus 0 kg/kg; name Mass_compost_P_concentration; = Mass_biowaste_concentration_P*2
    (same comment as for compost)
  property concentration, sulfur 0 kg/kg; name Mass_compost_concentration_S; = Mass_biowaste_concentration_S*2
    (same comment as for compost)
  property concentration, potassium 0 kg/kg; name Mass_compost_K_concentration; = Mass_biowaste_concentration_K*2
    (same comment as for compost)
  property nickel content 1.60606e-5; name Mass_compost_Ni_content; = Mass_biowaste_Ni_content/0.5*( DM_biowaste / DM_compost)
    nickel content on a dry matter basis
  property concentration, nitrogen 0 kg/kg; = Mass_biowaste_concentration_N*2
    (same comment as for compost)
  property concentration, zinc 0 kg/kg; name Mass_compost_concentration_Zn; = Mass_biowaste_concentration_Zn*2
    (same comment as for compost)
  property lead content 2.66667e-5; name Mass_compost_Pb_content; = Mass_biowaste_Pb_content/0.5*( DM_biowaste / DM_compost)
    lead content on a dry matter basis
  property copper content 3.81818e-5; name Mass_compost_Cu_content; = Mass_biowaste_Cu_content/0.5*( DM_biowaste / DM_compost)
    copper content on a dry matter basis
  property cadmium content 2.89394e-7; name Mass_compost_Cd_content; = Mass_biowaste_Cd_content/0.5*( DM_biowaste / DM_compost)
    cadmium content on a dry matter basis
  property nitrogen content 0.0136364; name Mass_compost_N_content; = Mass_biowaste_N_content/0.5*( DM_biowaste / DM_compost)
    nitrogen content on a dry matter basis
  property magnesium content 0.00525758; name Mass_compost_Mg_content; = Mass_biowaste_Mg_content/0.5*( DM_biowaste / DM_compost)
    magnesium content on a dry matter basis
  property zinc content 0.000120303; name Mass_compost_Zn_content; = Mass_biowaste_Zn_content/0.5*( DM_biowaste / DM_compost)
    zinc content on a dry matter basis
  property potassium content 0.0099697; name Mass_compost_K_content; = Mass_biowaste_K_content/0.5*( DM_biowaste / DM_compost)
    potassium content on a dry matter basis
  property sulfur content 0.00190909; name Mass_compost_S_content; = Mass_biowaste_S_content/0.5*( DM_biowaste / DM_compost)
    sulfur content on a dry matter basis
  property calcium content 0.0504545; name Mass_compost_Ca_content; = Mass_biowaste_Ca_content/0.5*( DM_biowaste / DM_compost)
    calcium content on a dry matter basis
  property mercury content 1e-7; name Mass_compost_Hg_content; = Mass_biowaste_Hg_content/0.5*( DM_biowaste / DM_compost)
    mercury content on a dry matter basis
  property phosphorus content 0.00275758; name Mass_compost_P_content; = Mass_biowaste_P_content/0.5*( DM_biowaste / DM_compost)
    phosphorus content on a dry matter basis
  property carbon content 0.1165
    carbon content on a dry matter basis (reserved; not for manual entry)
  property true value 0.0194538
    allocation property applied in "true value" allocation // value calculated from revenue
  properties: carbon content, fossil 0, wet mass 1 kg, carbon allocation 0.061512 kg
- iron scrap, sorted, pressed: 0 kg; By-product classification Recyclable; CPC 39310: Slag, dross, scalings and other waste from the manufacture of iron or steel; pedigree (1,1,1,1,1)
  metallic iron scrap removed from ash reamains and recycled.
  Uncertainty: uncertainty is calculated from uncertainties in waste composition and transfer coefficients to soild residues
  production volume 45.9403 kg
  property price 0.175 EUR2005
    Temporary price data. Calculated as 90% of purchasers price based on: 2005 import and export prices (total trades (USD) divided by total weight (kg) in biggest economies of the world: EU27, USA, Brasil, China, India, Japan and Russia) from UN Commodity Trade Statistics Database (http://data.un.org/Explorer.aspxDatabase [Accessed 2011.06.20]). Commodity: Waste or scrap, of cast iron
  property carbon content 0
    carbon content on a dry matter basis (reserved; not for manual entry)
  property true value 1.19262e-8
    allocation property applied in "true value" allocation // value calculated from revenue
  properties: carbon content, non-fossil 0, wet mass 1 kg, dry mass 1 kg, water content 0, carbon content, fossil 0, water in wet mass 0 kg, carbon allocation 0 kg
- copper: 0 kg; source Rentz O. 1999; By-product classification allocatable product; CPC 41413: Refined copper and copper alloys, unwrought; master alloys of copper
  Literature value. Copper uses: Before end-use copper is manufactured into semi fabricated products, such as shapes and ingots (known as 'semis'). These manufacturing processes are subdivided into hot working, cold working and, if necessary, process annealing. Few of the semis are ready for use as such. They more typically travel to first-stage manufacturers, who make metal rods, wire, and casting, and then to component manufacturers who produce such things as motors, valves, and insulated cables The components in turn are incorporated by final-stage manufacturers into a variety of finished products - automobiles, commercial buildings, residential housing, and so forth. These uses account for about 79% of the world-wide consumption of copper.
  production volume 1.46229 kg
  property price 5.52 EUR2005
    Literature value (http://www.economist.com/news/business/21576714-mining-industry-has-enriched-chile-its-future-precarious-copper-solution). Average price between 20015 and 2013.
  property carbon content 0
    carbon content on a dry matter basis (reserved; not for manual entry)
  property true value 1.19741e-8
    allocation property applied in "true value" allocation // value calculated from revenue
  properties: dry mass 1 kg, water in wet mass 0 kg, wet mass 1 kg, carbon content, non-fossil 0, water content 0, carbon content, fossil 0, carbon allocation 0 kg
- iron scrap, unsorted: 0 kg; source European Aluminium Association 2008; CPC 39310: Slag, dross, scalings and other waste from the manufacture of iron or steel; By-product classification Recyclable; pedigree (1,1,1,1,1)
  production volume 0.00130702 kg
  property price 0.149 EUR2005; name ironScrapAmount_price_EUR2005
    Temporary price data. Calculated as 90% of purchasers price based on: estimated at 85% of sorted scrap
  property carbon content 0
    carbon content on a dry matter basis (reserved; not for manual entry)
  property true value 2.88894e-13
    allocation property applied in "true value" allocation // value calculated from revenue
  properties: water in wet mass 0 kg, water content 0, carbon content, fossil 0, carbon content, non-fossil 0, dry mass 1 kg, wet mass 1 kg, carbon allocation 0 kg
- aluminium oxide, non-metallurgical: 0 kg; source European Aluminium Association 2008; CPC 41432: Alumina (aluminium oxide), except artificial corundum; By-product classification allocatable product; CAS 1344-28-1; pedigree (1,1,1,1,1)
  production volume 0.0822456 kg
  property carbon content, non-fossil 0; name C_content_non_fossil
  property price 0.28 EUR2005; name Al2O3Amount_price_EUR2005
    From UN trade database. http://data.un.org/ Import data from the largest economies of the world are used (Brazil, India, USA, China, Japan and EU-27).
  property dry mass 1 kg; name DM
  property water content 0; name water_content
  property wet mass 1 kg; name WM
  property water in wet mass 0 kg; name WWM
  property carbon content, fossil 0; name C_content_fossil
  property carbon content 0
    carbon content on a dry matter basis (reserved; not for manual entry)
  property true value 3.41619e-11
    allocation property applied in "true value" allocation // value calculated from revenue
  properties: carbon allocation 0 kg
- aluminium, cast alloy: 0 kg; source European Aluminium Association 2008; By-product classification allocatable product; CPC 41431: Unwrought aluminium; pedigree (1,1,1,1,1)
  EcoSpold01Location=RER
  production volume 0.768814 kg
  property price 1.3 EUR2005; name castAlloyAmount_price_EUR2005
    Temporary price data. Calculated as 90% of purchasers price based on: Source: London Metal Exchange, Aluminium alloy price for 2005
  property carbon content 0
    carbon content on a dry matter basis (reserved; not for manual entry)
  property true value 1.48264e-9
    allocation property applied in "true value" allocation // value calculated from revenue
  properties: water in wet mass 0 kg, carbon content, non-fossil 0, water content 0, dry mass 1 kg, carbon content, fossil 0, wet mass 1 kg, carbon allocation 0 kg
- aluminium, wrought alloy: 0 kg; source European Aluminium Association 2008; By-product classification allocatable product; CPC 4153: Semi-finished products of aluminium or aluminium alloys; pedigree (1,1,1,1,1)
  production volume 0.336572 kg
  property price 1.44 EUR2005; name secondaryAluminiumOutput_price_EUR2005
    Estimated based on literature values and expert judgement. Aluminium ccast alloys are about 90% of the price of aluminium wrought alloys.
  property carbon content 0
    carbon content on a dry matter basis (reserved; not for manual entry)
  property true value 7.18971e-10
    allocation property applied in "true value" allocation // value calculated from revenue
  properties: wet mass 1 kg, water content 0, carbon content, fossil 0, water in wet mass 0 kg, carbon content, non-fossil 0, dry mass 1 kg, carbon allocation 0 kg

## Inputs from technosphere
- solid manure loading and spreading, by hydraulic loader and spreader: 1.28964 kg; source Nedcoffee 2014; lognormal variance with pedigree 0.118177, pedigree (2,1,3,1,1)
  This amount corresponds the input of solid manure. Personal written communication, Herma Mulder, Nedcoffee., 2014
- waste wood, untreated: -1.07443 kg; lognormal variance with pedigree 0.118177, pedigree (2,1,3,1,1)
  Wood from trees after 1-2 years of sorrage at the field (20% water) per lifetime year (20 years) of the orchard
  production volume 7.48821e8 kg
    Calculated from the reference product amount and production volume
  properties: wet mass 1 kg, carbon content, non-fossil 0.48632, water content 0.25, dry mass 0.8 kg
- glyphosate: 0.000241807 kg; source ECLAC 2014; lognormal variance with pedigree 0.00784984, pedigree (2,2,3,1,1)
  Literature value or expert estimation (ECLAC 2014).
  properties: wet mass 1 kg, dry mass 1 kg, carbon content, fossil 0.214286
- biowaste: -3.24022 kg; lognormal variance with pedigree 0.325577, pedigree (5,5,5,5,5)
  production volume 2.25826e9 kg
    Calculated from the reference product amount and production volume
  properties: wet mass 1 kg, carbon content, non-fossil 0.1624, water content 1.5, dry mass 0.4 kg
- petrol, unleaded, burned in machinery: 0.262893 MJ; source Nedcoffee 2014; lognormal variance with pedigree 0.118177, pedigree (2,1,3,1,1)
  Literature value or expert estimation (Personal written communication, Herma Mulder, Nedcoffee., 2014).
- packaging, for pesticides: 0.000483614 kg; lognormal variance with pedigree 0.0532, pedigree (4,3,3,5,4)
  Total amount of active substance/s of pesticides needed for the production of coffee, green bean is calculated to be circa 2.50E-04 kg. Pesticide/s used in this dataset is/are: 'glyphosate'. The total amount of active substance/s is doubled in order to account for the packaging of the dilluted product of pesticide/s that is/are applied. Therefore, 5.00E-04 kg of packaging for pesticides is justified with this exchange.
  properties: dry mass 1 kg, carbon content, fossil 0.85714, price 0.0642 EUR2005, wet mass 1 kg
- planting tree: 0.0247181 unit; source Nedcoffee 2014
  Literature value expert estimation. This is the number of trees per ha (i.e. 1110 trees/ha) divided by the lifetime years of the orchard (i.e. 20 years).
- establishing orchard: 0.0247181 unit; source Nedcoffee 2014
  Literature value or expert estimation (Personal written communication, Herma Mulder, Nedcoffee., 2014). This is the number of trees per ha divided by the lifetime years of the orchard.
- packaging, for fertilisers: 1.93446 kg; lognormal variance with pedigree 0.0532, pedigree (4,3,3,5,4)
  Total amount of active substance/s of fertilisers needed for the production of 'coffee, green bean' is calculated to be circa 1.00E+00 kg. Fertiliser/s used in this dataset is/are: 'phosphate fertiliser, as P2O5', 'potassium chloride, as K2O', 'potassium fertiliser, as K2O', 'urea, as N'. The total amount of active substance/s is doubled in order to account for the packaging of the dilluted product of fertiliser/s that is/are applied. Therefore, 2.00E+00 kg of packaging for fertilisers is justified with this exchange.
  properties: price 0.0642 EUR2005, wet mass 1 kg, dry mass 1 kg, carbon content, fossil 0.825301
  note on carbon content, fossil: Considering a chemical formula (C2H4)n for polyethylene, carbon content-fossil is calculated to be 0.856286 kg of Carbon per kg of dry mass.
- fruit tree seedling, for planting: 0.0247181 unit; source Nedcoffee 2014
  (same comment as for establishing orchard)
  properties: water content 0.73, dry mass 0.578035 kg, carbon content, non-fossil 0.439481, wet mass 1 kg
  note on carbon content, non-fossil: calculation: C-content of components according to ecoinvent report No. 15a. Source of composition: https://ndb.nal.usda.gov/ndb/search/. Unspecific seedling used as proxy.
- land use change, perennial crop: 0.000448257 ha; = 0.000463444444444*LUC_crop_specific+0.000366444444444*(1-LUC_crop_specific)
  Calculated value. Land use change (LUC) combines land transformation areas calculated with the adapted 'Direct Land Use Change Assessment Tool' version 2014 developed by Blonk Consultants and the carbon losses from soil organic carbon (SOC) and vegetation (VEG) as calculated in ecoinvent v3. See 'WFLDB-Guidelines.pdf', available at https://ecoquery.ecoinvent.org/File/Reports.
- manure, solid, cattle: 0.919984 kg; source Nedcoffee 2014; lognormal variance with pedigree 0.118177, pedigree (2,1,3,1,1)
  Calculated based on literature values: The total amount of manure (Personal written communication, Herma Mulder, Nedcoffee., 2014) multiplied by the country-share of manure per animal category (FAOSTAT 2015). See supporting documentation 'WFLDB-Documentation.pdf' chapter 'Fertiliser application' (https://ecoquery.ecoinvent.org/File/Reports).
  Corresponds to 856.0 kg/ha
  properties: wet mass 1 kg, dry mass 0.22 kg, carbon content, non-fossil 0.441, water content 3.5454
- phosphate fertiliser, as P2O5: 0.429879 kg; source Nedcoffee 2014; lognormal variance with pedigree 0.118177, pedigree (2,1,3,1,1)
  Calculated based on literature values or expert estimation: The total amount of nutrient (Personal written communication, Herma Mulder, Nedcoffee., 2014) multiplied by the share of fertiliser type (Personal written communication, Herma Mulder, Nedcoffee., 2014). See supporting documentation 'WFLDB-Documentation.pdf' chapter 'Fertiliser application' for L3 and L4 data (https://ecoquery.ecoinvent.org/File/Reports).
  Corresponds to 200.0 kg/ha
  properties: dry mass 1 kg, wet mass 1 kg
- potassium fertiliser, as K2O: 0.0537349 kg; source Nedcoffee 2014; lognormal variance with pedigree 0.118177, pedigree (2,1,3,1,1)
  Calculated based on literature values or expert estimation: The total amount of nutrient (Personal written communication, Herma Mulder, Nedcoffee., 2014) multiplied by the share of fertiliser type (Personal written communication, Herma Mulder, Nedcoffee., 2014). See supporting documentation 'WFLDB-Documentation.pdf' chapter 'Fertiliser application' for L3 and L4 data (https://ecoquery.ecoinvent.org/File/Reports).
  Corresponds to 50.0 kg/ha
  properties: wet mass 1 kg, dry mass 1 kg
- poultry manure, dried: 0.369654 kg; source Nedcoffee 2014; lognormal variance with pedigree 0.118177, pedigree (2,1,3,1,1)
  Calculated based on literature values: The total amount of manure (Personal written communication, Herma Mulder, Nedcoffee., 2014) multiplied by the country-share of manure per animal category (FAOSTAT 2015). See supporting documentation 'WFLDB-Documentation.pdf' chapter 'Fertiliser application' (https://ecoquery.ecoinvent.org/File/Reports).
  Corresponds to 344.0 kg/ha
  properties: copper content 4.38e-5, water content 0.156069, carbon content, non-fossil 0.33389, zinc content 0.000349, nitrogen content 0.532, dry mass 0.865 kg, nickel content 4e-5, wet mass 1 kg, phosphorus content 0.0167, lead content 2.92e-6, potassium content 0.024, mercury content 2e-7, cadmium content 2.92e-7
- urea, as N: 0.429879 kg; source Nedcoffee 2014; lognormal variance with pedigree 0.118177, pedigree (2,1,3,1,1)
  Calculated based on literature values or expert estimation: The total amount of nutrient (Personal written communication, Herma Mulder, Nedcoffee., 2014) multiplied by the share of fertiliser type (Personal written communication, Herma Mulder, Nedcoffee., 2014). See supporting documentation 'WFLDB-Documentation.pdf' chapter 'Fertiliser application' for L3 and L4 data (https://ecoquery.ecoinvent.org/File/Reports).
  Corresponds to 400.0 kg/ha
  properties: wet mass 1 kg, carbon content, fossil 0.2, dry mass 1 kg
- trellis system, wooden poles, soft wood, tar impregnated: 0.0010747 ha; lognormal variance with pedigree 0.127577, pedigree (3,1,3,1,3)
  Used to attach trees in orchards with a tree density of more than 500 trees per ha.
- potassium chloride, as K2O: 0.0537349 kg; source Nedcoffee 2014; lognormal variance with pedigree 0.118177, pedigree (2,1,3,1,1)
  (same comment as for potassium fertiliser, as K2O)
  properties: wet mass 1 kg, dry mass 1 kg

## Inputs from nature
- Occupation, permanent crop, irrigated [natural resource, land]: 10.776 m2*year; lognormal variance with pedigree 0.0140616, pedigree (2,1,3,1,1)
  Related to the duration from harvest date of previous crop to harvest date of main crop.
- Transformation, to permanent crop, irrigated [natural resource, land]: 0.537349 m2; = 10000/900/20
  Calculated value: 10000 m2 divided by the yield and the life time of the perennial crop (20 years).
- Carbon dioxide, in air [natural resource, in air]: 1.4661 kg; lognormal variance with pedigree 0.00784984, pedigree (2,2,3,1,1)
  CO2 uptake by biomass
- Energy, gross calorific value, in biomass [natural resource, biotic]: 15.5315 MJ; lognormal variance with pedigree 0.00784984, pedigree (2,2,3,1,1)
- Water, unspecified natural origin [natural resource, in ground]: 0.0110586 m3; lognormal variance with pedigree 0.118177, pedigree (2,1,3,1,1)
  Literature data or expert estimate: water for depulping
- Transformation, from permanent crop, irrigated [natural resource, land]: 0.537349 m2; = 10000/900/20
  (same comment as for Transformation, to permanent crop, irrigated)

## Emissions to nature
- Phosphorus [water, surface water]: 0.000710483 kg; source Prasuhn V.  2006; lognormal variance with pedigree 0.169866, pedigree (2,2,3,1,1)
  Calculated value - Prasuhn (2006) and SQCB-Erosion. See 'WFLDB-Guidelines.pdf', available at https://ecoquery.ecoinvent.org/File/Reports.
- Cadmium [soil, agricultural]: 3.52973e-5 kg; = 3.65844444444e-05 + ( - 9.118292e-08)*heavyMetalUptakeSwitch; source Freiermuth R.  2006
  Comment on mathematicalRelation:
  -9.118292e-08 from Crop, default, heavy metals uptake model
  Heavy metal uptake can be excluded by setting the parameter heavyMetalUptakeSwitch to zero.
- Chromium [soil, agricultural]: 0.000149393 kg; = 0.000154944444444 + ( - 4.8941e-07)*heavyMetalUptakeSwitch; source Freiermuth R.  2006
  Comment on mathematicalRelation:
  0.000154944444444 from Calculated value - Freiermuth (2006). See 'WFLDB-Guidelines.pdf', available at https://ecoquery.ecoinvent.org/File/Reports.
  -4.8941e-07 from Crop, default, heavy metals uptake model
  Heavy metal uptake can be excluded by setting the parameter heavyMetalUptakeSwitch to zero.
- Copper [soil, agricultural]: 1.91416e-5 kg; = 2.57411111111e-05 + ( - 5.9509562e-06)*heavyMetalUptakeSwitch; source Freiermuth R.  2006
  Comment on mathematicalRelation:
  2.57411111111e-05 from Calculated value - Freiermuth (2006). See 'WFLDB-Guidelines.pdf', available at https://ecoquery.ecoinvent.org/File/Reports.
  -5.9509562e-06 from Crop, default, heavy metals uptake model
  Heavy metal uptake can be excluded by setting the parameter heavyMetalUptakeSwitch to zero.
- Nitrate [water, ground-]: 0.696164 kg; source Faist Emmenegger M. 2009; lognormal variance with pedigree 0.169866, pedigree (2,2,3,1,1)
- Lead [soil, agricultural]: 0.000105286 kg; = 0.000109338888889 + ( - 4.8561146e-07)*heavyMetalUptakeSwitch; source Freiermuth R.  2006
  Comment on mathematicalRelation:
  0.000109338888889 from Calculated value - Freiermuth (2006). See 'WFLDB-Guidelines.pdf', available at https://ecoquery.ecoinvent.org/File/Reports.
  -4.8561146e-07 from Crop, default, heavy metals uptake model
  Heavy metal uptake can be excluded by setting the parameter heavyMetalUptakeSwitch to zero.
- Mercury [soil, agricultural]: 3.95255e-7 kg; = 4.45066666667e-07 + ( - 3.6419288e-08)*heavyMetalUptakeSwitch; source Freiermuth R.  2006
  Comment on mathematicalRelation:
  4.45066666667e-07 from Calculated value - Freiermuth (2006). See 'WFLDB-Guidelines.pdf', available at https://ecoquery.ecoinvent.org/File/Reports.
  Heavy metal uptake can be excluded by setting the parameter heavyMetalUptakeSwitch to zero.
- Phosphate [water, ground-]: 0.000198142 kg; source Prasuhn V.  2006; lognormal variance with pedigree 0.169866, pedigree (2,2,3,1,1)
  Calculated value - Prasuhn (2006). See 'WFLDB-Guidelines.pdf', available at https://ecoquery.ecoinvent.org/File/Reports.
- Nickel [soil, agricultural]: 2.88092e-5 kg; = 3.07233333333e-05 + ( - 9.380508e-07)*heavyMetalUptakeSwitch; source Freiermuth R.  2006
  Comment on mathematicalRelation:
  -9.380508e-07 from Crop, default, heavy metals uptake model
  Heavy metal uptake can be excluded by setting the parameter heavyMetalUptakeSwitch to zero.
- Zinc [soil, agricultural]: 0.000360367 kg; = 0.000401333333333 + ( - 2.8756654e-05)*heavyMetalUptakeSwitch; source Freiermuth R.  2006
  Comment on mathematicalRelation:
  0.000401333333333 from Calculated value - Freiermuth (2006). See 'WFLDB-Guidelines.pdf', available at https://ecoquery.ecoinvent.org/File/Reports.
  -2.8756654e-05 from Crop, default, heavy metals uptake model
  Heavy metal uptake can be excluded by setting the parameter heavyMetalUptakeSwitch to zero.
- Glyphosate [soil, agricultural]: 0.000241807 kg; lognormal variance with pedigree 0.0387216, pedigree (2,2,3,1,1)
  Calculated value - 100% emission in soil. See 'WFLDB-Guidelines.pdf', available at https://ecoquery.ecoinvent.org/File/Reports.
- Chromium, ion [water, surface water]: 2.81732e-5 kg; source Freiermuth R.  2006; lognormal variance with pedigree 0.350938, pedigree (2,2,3,1,1)
  Calculated value - Freiermuth (2006). See 'WFLDB-Guidelines.pdf', available at https://ecoquery.ecoinvent.org/File/Reports.
- TOC, Total Organic Carbon [water, ground-]: 0.358233 kg
  Calculated value - Best estimates: DOC = TOC ; COD (g O2) = 2.7*TOC (g C) and BOD5 = 0.5*COD. See 'WFLDB-Guidelines.pdf', available at https://ecoquery.ecoinvent.org/File/Reports.
- Water [water, surface water]: 0.0110586 m3
  Calculated value - Emission calculated from water balance. See 'WFLDB-Guidelines.pdf', available at https://ecoquery.ecoinvent.org/File/Reports.
- Copper, ion [water, surface water]: 4.01518e-5 kg; source Freiermuth R.  2006; lognormal variance with pedigree 0.350938, pedigree (2,2,3,1,1)
  (same comment as for Chromium, ion)
- DOC, Dissolved Organic Carbon [water, ground-]: 0.358233 kg
  (same comment as for TOC, Total Organic Carbon)
- Lead [water, surface water]: 2.29244e-5 kg; source Freiermuth R.  2006; lognormal variance with pedigree 0.350938, pedigree (2,2,3,1,1)
  (same comment as for Chromium, ion)
- Mercury [water, surface water]: 7.39736e-8 kg; source Freiermuth R.  2006; lognormal variance with pedigree 0.350938, pedigree (2,2,3,1,1)
  (same comment as for Chromium, ion)
- Nickel, ion [water, surface water]: 2.37627e-5 kg; source Freiermuth R.  2006; lognormal variance with pedigree 0.350938, pedigree (2,2,3,1,1)
  (same comment as for Chromium, ion)
- Zinc, ion [water, surface water]: 6.19908e-5 kg; source Freiermuth R.  2006; lognormal variance with pedigree 0.350938, pedigree (2,2,3,1,1)
  (same comment as for Chromium, ion)
- Cadmium, ion [water, ground-]: 5.27817e-8 kg; source Freiermuth R.  2006; lognormal variance with pedigree 0.350938, pedigree (2,2,3,1,1)
  (same comment as for Chromium, ion)
- COD, Chemical Oxygen Demand [water, ground-]: 0.967229 kg
  (same comment as for TOC, Total Organic Carbon)
- Chromium, ion [water, ground-]: 2.24075e-5 kg; source Freiermuth R.  2006; lognormal variance with pedigree 0.350938, pedigree (2,2,3,1,1)
  (same comment as for Chromium, ion)
- Cadmium, ion [water, surface water]: 3.19873e-7 kg; source Freiermuth R.  2006; lognormal variance with pedigree 0.350938, pedigree (2,2,3,1,1)
  (same comment as for Chromium, ion)
- Copper, ion [water, ground-]: 3.78541e-6 kg; source Freiermuth R.  2006; lognormal variance with pedigree 0.350938, pedigree (2,2,3,1,1)
  (same comment as for Chromium, ion)
- Carbon dioxide, fossil [air, non-urban air or from high stacks]: 0.674911 kg; lognormal variance with pedigree 0.00784984, pedigree (2,2,3,1,1)
  Calculated value - CO2 emissions from urea and lime. See 'WFLDB-Guidelines.pdf', available at https://ecoquery.ecoinvent.org/File/Reports.
- Lead [water, ground-]: 5.59617e-7 kg; source Freiermuth R.  2006; lognormal variance with pedigree 0.350938, pedigree (2,2,3,1,1)
  (same comment as for Chromium, ion)
- Ammonia [air, non-urban air or from high stacks]: 0.106281 kg; source EEA 2013; lognormal variance with pedigree 0.0387216, pedigree (2,2,3,1,1)
  Calculated value - EMEP/EEA (2013). See 'WFLDB-Guidelines.pdf', available at https://ecoquery.ecoinvent.org/File/Reports.
- Mercury [water, ground-]: 7.35674e-9 kg; source Freiermuth R.  2006; lognormal variance with pedigree 0.350938, pedigree (2,2,3,1,1)
  (same comment as for Chromium, ion)
- Nitrogen oxides [air, non-urban air or from high stacks]: 0.0170942 kg; source EEA 2013; lognormal variance with pedigree 0.118664, pedigree (2,2,3,1,1)
  Calculated value - EEA/EMEP (2013). See 'WFLDB-Guidelines.pdf', available at https://ecoquery.ecoinvent.org/File/Reports.
- Nickel, ion [water, ground-]: 1.25869e-9 kg; source Freiermuth R.  2006; lognormal variance with pedigree 0.350938, pedigree (2,2,3,1,1)
  (same comment as for Chromium, ion)
- Dinitrogen monoxide [air, non-urban air or from high stacks]: 0.0104244 kg; source IPCC 2006; lognormal variance with pedigree 0.118664, pedigree (2,2,3,1,1)
  Calculated value - IPCC (2006). See 'WFLDB-Guidelines.pdf', available at https://ecoquery.ecoinvent.org/File/Reports.
- Zinc, ion [water, ground-]: 2.96026e-5 kg; source Freiermuth R.  2006; lognormal variance with pedigree 0.350938, pedigree (2,2,3,1,1)
  (same comment as for Chromium, ion)
- Phosphate [water, surface water]: 0.00165923 kg; source Prasuhn V.  2006; lognormal variance with pedigree 0.169866, pedigree (2,2,3,1,1)
  (same comment as for Phosphate)
- BOD5, Biological Oxygen Demand [water, ground-]: 0.483614 kg; lognormal variance with pedigree 0.118177, pedigree (2,1,3,1,1)
  Calculated value - Expert estimate for organic matter in waste water (0.5 kg BOD5/kg green coffee). See 'WFLDB-Guidelines.pdf', available at https://ecoquery.ecoinvent.org/File/Reports.

## Sampling procedure
WFLDB Methodological Guidelines for the Life Cycle Inventory of Agricultural Products in the latest version, available at: https://ecoquery.ecoinvent.org/File/Reports. Data sources: Data were categorised from level 0 (L0) to level (L4) as follows: L0 = estimate, proxy; L1 = statistical data (e.g. FAOSTAT); L2 = L1 adapted to crop and country; L3 = literature data or L1 resp. L2 data approved by experts; medium detailing (i.e. kg of total N-fertiliser); L4 = L3 data of high detailing (i.e. portion N-fertiliser types).In this dataset data were obtained for yield: L3; Fertilisers: L4; Pesticides: L1; Machinery: L0; Irrigation: L2. For information regarding the calculation of individual exchanges see supporting documentation WFLDB-Documentation.pdf

## Review by Assumpció ANTON 2016-05-30
Be aware that the use of statistics in input calculations could provide some specific inputs not common for specific crops, this should be corrected if better information is available and better reflexed in DQR . Currently, I would dissent for some of good marks provided, being a revision of criteria applied advisable.

Pesticides will need to be amended periodically checking for update of pesticides' ban.
