# shed construction

Dataset: EcoSpold 2, unit process
Geography: RoW
Time period: 1994-01-01 to 2019-12-31
Technology level: current
Classification: EcoSpold01Categories: agricultural means of production/buildings
Classification: ISIC rev.4 ecoinvent: 4100:Construction of buildings
Synonyms: Maschinenhalle
Tags: ConvertedDataset
Scenario: Business-as-Usual
System model: Allocation at the point of substitution
Generated by: Dunja Dux
Published in: Nemecek, T. 2007
Database: ecoinvent
isCopyrightProtected: true
accessRestrictedTo: 1

## General comment
The module includes a timber construction, closed on three sides. One part of the shed is a fireproofed garage closed with doors. Size: 264 m2 whole shed, 102 m2 fireproofed garage. Lifetime of the building is 50 years.
[This dataset was already contained in the ecoinvent database version 2. It was not individually updated during the transfer to ecoinvent version 3. Life Cycle Impact Assessment results may still have changed, as they are affected by changes in the supply chain, i.e. in other datasets. This dataset was generated following the ecoinvent quality guidelines for version 2. It may have been subject to central changes described in the ecoinvent version 3 change report (http://www.ecoinvent.org/database/ecoinvent-version-3/reports-of-changes/), and the results of the central updates were reviewed extensively. The changes added e.g. consistent water flows and other information throughout the database. The documentation of this dataset can be found in the ecoinvent reports of version 2, which are still available via the ecoinvent website. The change report linked above covers all central changes that were made during the conversion process.]

## Included activities end
The inventory takes into account the use of construction materials and building machines for construction, repair and replacement including waste disposal and the transportation of the materials to the building site. Not taken into account were direct emission of the construction, disposal of production waste and the use of resources during utilization phase.

## Geography
The inventory applies for Swiss agricultural buildings only, because of the solid method of construction.

## Technology
The data of the inventory are based on one example of a typical agricultural building.

## Reference product
- shed: 1 m2; By-product classification allocatable product; CPC 531: Buildings
  EcoSpold01Location=CH
  production volume 3.96633 m2
    This is a placeholder value that does not reflect real-world production volumes. This dataset does not currently require a real-world production volume to work in the database framework, and no actual data were collected yet. This has no negative effect on the results of the ecoinvent database.
  property price 118.322 EUR2005
    Calculated based on inputs: The price of the product has been calculated as a sum of the values of the material and energy inputs for this product. This value is therefore a rough estimation. It may underestimate the real price since there are additional expenses when producing any product. These expences can include for example labour costs, treatment of waste materials and profit for the producer. Please consider carefully whether this level of data quality is acceptable for your application.
  property true value 118.322
    allocation property applied in "true value" allocation // value calculated from revenue

## By-products
- electricity, for reuse in municipal waste incineration only: 0 kWh; CPC 17100: Electrical energy; By-product classification allocatable product; pedigree (1,1,1,1,1)
  Net electricity generated from this waste and used in internal MSWI plant energy redistribution.
  Uncertainty: uncertainty is calculated from uncertainties in waste composition and uncertainties in energy efficiency and the uncertainty in internal energy demand
  production volume 27.818 kWh
  property exergy 3.6 MJ; name E_el_prod_MSWI_exergy
    This exergy property is based on the exergy content of the product.
  property true value relation 3.6; name E_el_prod_MSWI_true_value_relation
    property to calculate "true value" from
  property price 0.1 EUR2005; name E_el_prod_MSWI_price_EUR2005
    Estimated to be the same price as in case of electricity, medium voltage.
  property true value 1.07692
    allocation property applied in "true value" allocation // value calculated from true value relation
- heat, for reuse in municipal waste incineration only: 0 MJ; CPC 17300: Steam and hot water; By-product classification allocatable product; pedigree (1,1,1,1,1)
  (same comment as for electricity, for reuse in municipal waste incineration only)
  production volume 201.26 MJ
  property price 0.0106 EUR2005; name E_th_prod_MSWI_price_EUR2005
    Average European district heat price from Ecoheatcool and Euroheat 2005-2006, Ecoheat Work package 1: The European heat market. Final report. 10.6 EUR/GJ i s the price of district heat. http://www.solarthermalworld.org/files/Ecoheatcool%20WP1%20Web.pdf?download
  property true value relation 0.1842; name E_th_prod_MSWI_true_value_relation
    property to calculate "true value" from
  property exergy 0.1842 MJ; name E_th_prod_MSWI_exergy
    This exergy property is based on the exergy content of the product.
  property true value 0.398659
    (same comment as for electricity, for reuse in municipal waste incineration only)
- iron scrap, sorted, pressed: 0 kg; By-product classification Recyclable; CPC 39310: Slag, dross, scalings and other waste from the manufacture of iron or steel; pedigree (1,1,1,1,1)
  Iron scrap recovered from this waste.
  production volume 0.0486292 kg
  property price 0.175 EUR2005
    Temporary price data. Calculated as 90% of purchasers price based on: 2005 import and export prices (total trades (USD) divided by total weight (kg) in biggest economies of the world: EU27, USA, Brasil, China, India, Japan and Russia) from UN Commodity Trade Statistics Database (http://data.un.org/Explorer.aspxDatabase [Accessed 2011.06.20]). Commodity: Waste or scrap, of cast iron
  property carbon content 0
    carbon content on a dry matter basis (reserved; not for manual entry)
  property true value 0.000185748
    allocation property applied in "true value" allocation // value calculated from revenue
  properties: water content 0, water in wet mass 0 kg, carbon content, fossil 0, dry mass 1 kg, carbon content, non-fossil 0, wet mass 1 kg, carbon allocation 0 kg

## Inputs from technosphere
- lean concrete: 0.00822738 m3; lognormal variance with pedigree 0.0421, pedigree (1,2,5,5,1)
  EcoSpold01Location=CH
  properties: water content 0.0528846, wet mass 2190 kg, dry mass 2080 kg
- cast iron: 0.526434 kg; lognormal variance with pedigree 0.0421, pedigree (1,2,5,5,1)
  EcoSpold01Location=RER
  properties: dry mass 1 kg, carbon content, fossil 0.04, wet mass 1 kg
  note on carbon content, fossil: Cast iron is made by remelting pig iron in small furnaces (e.g. cupola furnaces or electric arc furnaces) and poured into moulds to make castings. It usually contains 2% to 6% carbon (ecoinvent v2.2 report 10_partII). An average content of 4% was considered
- waste cement in concrete and mortar: 0 kg; pedigree (1,1,1,1,1)
  EcoSpold01Location=CH
  production volume 0 kg
    Calculated from the production volume of shed in proportion to the respective output amounts.
  properties: water content 0.00502513, wet mass 1 kg, dry mass 0.995 kg
- waste building wood, chrome preserved: -10.8645 kg; lognormal variance with pedigree 0.0421, pedigree (1,2,5,5,1)
  EcoSpold01Location=CH
  production volume 33 kg
    (same comment as for waste cement in concrete and mortar)
  properties: carbon content, non-fossil 0.484262, dry mass 0.8 kg, wet mass 1 kg, water content 0.25
  note on carbon content, non-fossil: C content per kg DM was calculated using information in Tab A.4, ecoinvent v2.2 report 13_I
- waste polyethylene/polypropylene product: 0 kg; pedigree (1,1,1,1,1)
  EcoSpold01Location=CH
  production volume 0 kg
    (same comment as for waste cement in concrete and mortar)
  properties: wet mass 1 kg, carbon content, fossil 0.748045, water content 0.180638, dry mass 0.847 kg
  note on carbon content, fossil: Mixed various plastics was used to estimate the C content of this waste (Tab A.2, ecoinvent v2.2 report 13_I)
- waste reinforced concrete: 0 kg; pedigree (1,1,1,1,1)
  EcoSpold01Location=CH
  production volume 0 kg
    (same comment as for waste cement in concrete and mortar)
  properties: wet mass 1 kg, water content 0.00585407, dry mass 0.99418 kg
- sawnwood, softwood, dried (u=20%), planed: 0.206425 m3; lognormal variance with pedigree 0.0421, pedigree (1,2,5,5,1)
  EcoSpold01Location=RER
  properties: water content 0.2, carbon content, non-fossil 0.494, wet mass 540 kg, dry mass 450 kg
  note on carbon content, non-fossil: C content of dry mass is 0.494 kgC/kg dry wood (ecoinvent v2.2 report 9)
- waste wood, untreated: 0 kg; pedigree (1,1,1,1,1)
  EcoSpold01Location=CH
  production volume 0 kg
    (same comment as for waste cement in concrete and mortar)
  properties: dry mass 0.8 kg, water content 0.25, wet mass 1 kg, carbon content, non-fossil 0.48632
  note on carbon content, non-fossil: Tab A.4, ecoinvent v2.2 report 13_I. C content has been referred to 1 kg DM,
- electricity, low voltage: 0 kWh; pedigree (1,1,1,1,1)
  EcoSpold01Location=CH
- extrusion, plastic film: 0.0264699 kg; lognormal variance with pedigree 0.0421, pedigree (1,2,5,5,1)
  EcoSpold01Location=RER
- fibre cement facing tile: 37.8282 kg; lognormal variance with pedigree 0.0421, pedigree (1,2,5,5,1)
  EcoSpold01Location=CH
  properties: carbon content, fossil 0.0201818, carbon content, non-fossil 0.0115, dry mass 1 kg, wet mass 1 kg
  note on carbon content, fossil: Tab 5.1, ecoinvent v2.2 report 7, part IX. Fibres (pulp) 2.5%. Fibres (polyvinyl alcohol) 3.7%. C-content/dry mass of natural fibres was considered 46% (from "Evolutionary and Biochemical Aspects", A.D. Kay and T. Vrede (in Global Ecology, 2010, Elsevier B.V., S.E. Jørgensen Ed.)). C-content/dry mass of polyvinyl alcohol ((C2H4O)x) was considered =24/44.
- reinforcing steel: 8.178 kg; lognormal variance with pedigree 0.0421, pedigree (1,2,5,5,1)
  EcoSpold01Location=RER
  properties: dry mass 1 kg, carbon content, fossil 0.004, wet mass 1 kg
- copper: 0.61335 kg; lognormal variance with pedigree 0.0421, pedigree (1,2,5,5,1)
  EcoSpold01Location=RER
  properties: dry mass 1 kg, wet mass 1 kg
- fibre cement corrugated slab: 6.64709 kg; lognormal variance with pedigree 0.0421, pedigree (1,2,5,5,1)
  EcoSpold01Location=CH
  properties: wet mass 1 kg, carbon content, non-fossil 0.01656, carbon content, fossil 0.00981818, dry mass 1 kg
  note on carbon content, non-fossil: Tab 5.1, ecoinvent v2.2 report 7, part IX. Fibres (pulp) 3.6%. Fibres (polyvinyl alcohol) 1.8%. C-content/dry mass of natural fibres was considered 46% (from "Evolutionary and Biochemical Aspects", A.D. Kay and T. Vrede (in Global Ecology, 2010, Elsevier B.V., S.E. Jørgensen Ed.)). C-content/dry mass of polyvinyl alcohol ((C2H4O)x) was considered =24/44.
- excavation, skid-steer loader: 0.0126423 m3; lognormal variance with pedigree 0.0421, pedigree (1,2,5,5,1)
  EcoSpold01Location=RER
- cement, Portland: 0 kg; pedigree (1,1,1,1,1)
  EcoSpold01Location=CH
  properties: dry mass 1 kg, wet mass 1 kg
- excavation, hydraulic digger: 0.347664 m3; lognormal variance with pedigree 0.0421, pedigree (1,2,5,5,1)
  EcoSpold01Location=RER
- concrete, normal: 0 m3; pedigree (1,1,1,1,1)
  EcoSpold01Location=CH
  properties: dry mass 2190 kg, water content 0.086758, wet mass 2380 kg
- waste bulk iron, excluding reinforcement: 0 kg; pedigree (1,1,1,1,1)
  EcoSpold01Location=CH
  production volume 0 kg
    (same comment as for waste cement in concrete and mortar)
  properties: wet mass 1 kg, dry mass 1 kg
- polyethylene, high density, granulate: 0.0264699 kg; lognormal variance with pedigree 0.0421, pedigree (1,2,5,5,1)
  EcoSpold01Location=RER
  properties: wet mass 1 kg, carbon content, fossil 0.857143, dry mass 1 kg
  note on carbon content, fossil: Polyethylene is formed out of a huge amount of ethylene monomers (C2H4) (ecoinvent v2.2 report 11_II). MW=28 g/mol
- waste brick: 0 kg; pedigree (1,1,1,1,1)
  EcoSpold01Location=CH
  production volume 0 kg
    (same comment as for waste cement in concrete and mortar)
  properties: wet mass 1 kg, dry mass 1 kg
- waste concrete, not reinforced: 0 kg; pedigree (1,1,1,1,1)
  EcoSpold01Location=CH
  production volume 0 kg
    (same comment as for waste cement in concrete and mortar)
  properties: dry mass 1 kg, wet mass 1 kg
- zinc coat, pieces: 0.0301243 m2; lognormal variance with pedigree 0.0421, pedigree (1,2,5,5,1)
  EcoSpold01Location=RER
- gravel, round: 305.193 kg; lognormal variance with pedigree 0.0421, pedigree (1,2,5,5,1)
  EcoSpold01Location=CH
  properties: dry mass 1 kg, wet mass 1 kg
- waste cement in concrete and mortar: -10.7565, -27.2692 kg (2 entries); lognormal variance with pedigree 0.0421, pedigree (1,2,5,5,1)
  EcoSpold01Location=CH
  production volume 115.5 kg
- waste polyethylene/polypropylene product: -0.00748765, -0.0189822 kg (2 entries); lognormal variance with pedigree 0.0421, pedigree (1,2,5,5,1)
  EcoSpold01Location=CH
  production volume 0.0804 kg
- waste reinforced concrete: -40.8091, -582.418 kg (2 entries); lognormal variance with pedigree 0.0421, pedigree (1,2,5,5,1)
  EcoSpold01Location=CH
  production volume 1893 kg
- waste wood, untreated: -4.63747, -0.575812, -0.0420984, -1.61728, -0.244332, -0.386269, -7.2206, -61.5251 kg (8 entries); lognormal variance with pedigree 0.0421, pedigree (1,2,5,5,1)
  EcoSpold01Location=CH
  production volume 231.6 kg
- electricity, low voltage: 0.0254356, 0.00446109, 0.101178, 0.362748, 0.0733582, 1.10939, 0.182863, 0.520879 kWh (8 entries); lognormal variance with pedigree 0.0421, pedigree (1,2,5,5,1)
  EcoSpold01Location=CH
- cement, Portland: 2.1968, 0.0708371, 0.122769, 0.100706, 2.12251, 2.45784, 0.103455, 14.4553 kg (8 entries); lognormal variance with pedigree 0.0421, pedigree (1,2,5,5,1)
  EcoSpold01Location=CH
- concrete, normal: 0.00641764, 0.00066871, 0.00541367, 0.00304519, 0.0128955, 0.000434959, 0.250638 m3 (7 entries); lognormal variance with pedigree 0.0421, pedigree (1,2,5,5,1)
  EcoSpold01Location=CH
- waste bulk iron, excluding reinforcement: -0.378465, -0.786999 kg (2 entries); lognormal variance with pedigree 0.0421, pedigree (1,2,5,5,1)
  EcoSpold01Location=CH
  production volume 3.54 kg
- waste brick: -0.578917, -43.9655 kg (2 entries); lognormal variance with pedigree 0.0421, pedigree (1,2,5,5,1)
  EcoSpold01Location=CH
  production volume 135.3 kg
- waste concrete, not reinforced: -1.18353, -16.891 kg (2 entries); lognormal variance with pedigree 0.0421, pedigree (1,2,5,5,1)
  EcoSpold01Location=CH
  production volume 54.9 kg

## Inputs from nature
- Occupation, urban, discontinuously built [natural resource, land]: 122.472 m2*year; lognormal variance with pedigree 0.0821, pedigree (1,2,5,5,1)
- Transformation, to urban, discontinuously built [natural resource, land]: 2.43957 m2; lognormal variance with pedigree 0.1621, pedigree (1,2,5,5,1)
- Transformation, from pasture, man made [natural resource, land]: 2.43957 m2; lognormal variance with pedigree 0.1621, pedigree (1,2,5,5,1)
- Occupation, construction site [natural resource, land]: 2.43957 m2*year; lognormal variance with pedigree 0.0821, pedigree (1,2,5,5,1)

## Sampling procedure
The inventory is calculated based on a solid database of agricultural buildings.

## Extrapolations
This dataset has been copied from an original dataset covering the geography CH. The uncertainty has been adjusted accordingly.

## Review by Roland Hischier 2003-08-06
Passed.
