# heat production, wood pellet, at furnace 9kW, state-of-the-art 2014

Dataset: EcoSpold 2, unit process
Geography: Europe without Switzerland
Time period: 2014-01-01 to 2019-12-31
Technology level: modern
Classification: ISIC rev.4 ecoinvent: 3530:Steam and air conditioning supply
Classification: EcoSpold01Categories: wood energy/heating systems
Scenario: Business-as-Usual
System model: Allocation at the point of substitution
Share of production covered: 2 %
Generated by: Christian Bauer
Published in: Bauer, C. 2007
Database: ecoinvent
isCopyrightProtected: true
accessRestrictedTo: 1

## General comment
Activity represents combustion of wood pellets in new (=installed in 2014) small wood pellet furnaces in Switzerland and can be considered as being representative for Europe. Uncertainty factors were adjusted accordingly. The inventory shall be considered valid for boilers with nominal capacities in the approximate range of 5 to 20 kW. The activity represents average annual operation including start/stop (warm up and cool down), which reduces the efficiency compared to rated values provided by boiler manufacturers and increases some emission factors such as CO. Air emission factors as well as other exchanges correspond to v2.2 except of PM, CO, NOx, CH4 and NMVOC. These key emission factors were updated based on latest available information.

## Included activities start
From reception of wood pellets.

## Included activities end
This activity describes the combustion of wood pellets until heat production at the boiler outlet. Included are the infrastructure, the wood requirements (average pellets, u=10%), the emissions to air, the electricity needed for operation, and the disposal of the ashes.

## Geography
Representative for Europe, based on data from Switzerland

## Technology
Modern boiler technology installed in CH in 2014. Representative also for European boilers

## Time period
Some emission data are from the second half of the 1990´s. However, key emission factors (PM, CO, NOx and CH4, NMVOC) are updated in 2014. Activity can be considered as representative for new installations until 2020.

## Parameters
- scaling factor: 1.33333 dimensionless; name scaling_factor; = 1/0.75
  the scaling factor corresponds to the inverse of the annual use efficiency. This efficiency represents an average annual value including start/stop operation (warm-up and cool down), which reduces the efficiency compared to rated values of the manufacturer. Source: Thomas Nussbaumer, Verenum, January 2014, personal communication.

## Reference product
- heat, central or small-scale, other than natural gas: 1 MJ; = 0.75 * scaling_factor; source T. Nussbaumer 2014; By-product classification allocatable product; CPC 17300: Steam and hot water
  EcoSpold01Location=CH
  Original dataset referred to 1MJ energy input (end energy). Amount was scaled to 1 using annual use efficiency of 0.75 (according to source).
  production volume 6.91686e9 MJ; name heat_apv
    Estimation. This dataset represents heat production with wood in the region "Europe without Switzerland". The production volume is not from reality but lead to shares of heat from biofuels on the heat market which correspond to the information given by IEA for the EU-28.
    Heat production with biofuels in Europe w/o Switzerland is modelled with heat from biogas and from wood,
    50% of the total APV from wood is considered as being current, 50% as modern (in line with information from Switzerland).
    See talk pages for further discussion of the composition and annual production volumes of the heat markets.
    http://www.iea.org/statistics/statisticssearch/report/?country=EU28&product=electricityandheat&year=2012
  property price 0.0106 EUR2005
    Average European district heat price from Ecoheatcool and Euroheat 2005-2006, Ecoheat Work package 1: The European heat market. Final report. 10.6 EUR/GJ i s the price of district heat. http://www.solarthermalworld.org/files/Ecoheatcool%20WP1%20Web.pdf?download
  properties: Corresponding fuel use 1.22 MJ

## Inputs from technosphere
- wood pellet, measured as dry mass: 0.0711533 kg; = 0.053365 * scaling_factor; source Bauer, C. 2007; lognormal variance with pedigree 0.470725, pedigree (2,2,5,2,1)
  EcoSpold01Location=RER
  Literature value. Original amount (from the source, ecoinvent v2.2) was scaled to the amount of the new reference product using the annual efficiency. Corresponds to a LHV of 18.7 MJ/kg.
  properties: carbon content, non-fossil 0.494, wet mass 1.1 kg, water content 0.1, dry mass 1 kg
  note on carbon content, non-fossil: C content of dry mass is 0.494 kgC/kg dry wood (ecoinvent v2.2 report 9).
- electricity, low voltage: 0.00556 kWh; = 0.00417 * scaling_factor; source Bauer, C. 2007; lognormal variance with pedigree 0.470725, pedigree (2,2,5,2,1)
  general assuption
  Amount was scaled to the amount of reference product.
  EcoSpold01Location=CH
- wood ash mixture, pure: -0.000317333 kg; name wood_ash; = (0.000238 * scaling_factor)*-1; source Bauer, C. 2007; lognormal variance with pedigree 0.002, pedigree (1,1,3,1,1)
  EcoSpold01Location=CH
  homogeneous fuel
  Amount was scaled to the amount of reference product.
  production volume 2.19495e6 kg; = heat_apv*wood_ash
    Calculated from the production volume of wood pellet, mixed, burned in furnace 15kW in proportion to the respective output amounts.
  property price 0 EUR2005; name wood_ash_price_EUR2005
  properties: wet mass 1 kg, carbon content, non-fossil 0.012, dry mass 1 kg
- furnace, pellets, 9kW: 1.02881e-6 unit; = 1/(20*2000*9*3.6) * scaling_factor; lognormal variance with pedigree 0.470725, pedigree (2,2,5,2,1)
  Calculated value. Assuming 20 years lifetime, 2000 operational hours per year, 9kW capactiy.

## Emissions to nature
- Sulfur dioxide [air, urban air close to ground]: 3.33333e-6 kg; = 2.5E-06 * scaling_factor; source Bauer, C. 2007; lognormal variance with pedigree 0.472625, pedigree (2,4,5,2,1)
  extrapolation, based on measuring data of other emissions
  Amount was scaled to the amount of reference product.
- Benzene [air, urban air close to ground]: 1.21333e-6 kg; = 9.1E-07 * scaling_factor; source Bauer, C. 2007; lognormal variance with pedigree 0.472625, pedigree (2,4,5,2,1)
  (same comment as for Sulfur dioxide)
- Chlorine [air, urban air close to ground]: 2.4e-7 kg; = 1.8E-07 * scaling_factor; source Bauer, C. 2007; lognormal variance with pedigree 0.472625, pedigree (2,4,5,2,1)
  (same comment as for Sulfur dioxide)
- Dioxins, measured as 2,3,7,8-tetrachlorodibenzo-p-dioxin [air, urban air close to ground]: 4.13333e-14 kg; = 3.1E-14 * scaling_factor; source Bauer, C. 2007; lognormal variance with pedigree 0.472625, pedigree (2,4,5,2,1)
  (same comment as for Sulfur dioxide)
- Chromium VI [air, urban air close to ground]: 5.33333e-11 kg; = 4E-11 * scaling_factor; source Bauer, C. 2007; lognormal variance with pedigree 0.472625, pedigree (2,4,5,2,1)
  range of data
  Amount was scaled to the amount of reference product.
- Dinitrogen monoxide [air, urban air close to ground]: 4e-6 kg; = 3E-06 * scaling_factor; source Bauer, C. 2007; lognormal variance with pedigree 0.472625, pedigree (2,4,5,2,1)
  (same comment as for Sulfur dioxide)
- Methane, non-fossil [air, urban air close to ground]: 1.52e-5 kg; = 11.4e-6 * scaling_factor; source Bauer, C. 2007; lognormal variance with pedigree 0.472625, pedigree (2,4,5,2,1)
  (same comment as for Sulfur dioxide)
- Particulates, > 2.5 um, and < 10um [air, urban air close to ground]: 2.66667e-6 kg; = 2e-6*scaling_factor; source T. Nussbaumer 2014; lognormal variance with pedigree 0.433225, pedigree (2,3,3,2,1)
  estimation
- Benzo(a)pyrene [air, urban air close to ground]: 6.66667e-10 kg; = 5E-10 * scaling_factor; source Bauer, C. 2007; lognormal variance with pedigree 0.472625, pedigree (2,4,5,2,1)
  (same comment as for Sulfur dioxide)
- Water [air, urban air close to ground]: 7.12e-5 m3; lognormal variance with pedigree 0.0083, pedigree (2,2,3,1,2)
  calculated value, supposed to ensure correct water balance
- Toluene [air, urban air close to ground]: 4e-7 kg; = 3E-07 * scaling_factor; source Bauer, C. 2007; lognormal variance with pedigree 0.472625, pedigree (2,4,5,2,1)
  (same comment as for Sulfur dioxide)
- Nickel [air, urban air close to ground]: 8e-9 kg; = 6E-09 * scaling_factor; source Bauer, C. 2007; lognormal variance with pedigree 0.472625, pedigree (2,4,5,2,1)
  (same comment as for Sulfur dioxide)
- Fluorine [air, urban air close to ground]: 6.66667e-8 kg; = 5E-08 * scaling_factor; source Bauer, C. 2007; lognormal variance with pedigree 0.472625, pedigree (2,4,5,2,1)
  (same comment as for Sulfur dioxide)
- Nitrogen oxides [air, urban air close to ground]: 8e-5 kg; = 6E-05 * scaling_factor; source T. Nussbaumer 2014; lognormal variance with pedigree 0.433225, pedigree (2,3,3,2,1)
  estimation
- Mercury [air, urban air close to ground]: 4e-10 kg; = 3E-10 * scaling_factor; source Bauer, C. 2007; lognormal variance with pedigree 0.472625, pedigree (2,4,5,2,1)
  (same comment as for Sulfur dioxide)
- Acetaldehyde [air, urban air close to ground]: 8.13333e-8 kg; = 6.1E-08 * scaling_factor; source Bauer, C. 2007; lognormal variance with pedigree 0.472625, pedigree (2,4,5,2,1)
  (same comment as for Sulfur dioxide)
- Particulates, < 2.5 um [air, urban air close to ground]: 4.8e-5 kg; = 36E-06 * scaling_factor; source T. Nussbaumer 2014; lognormal variance with pedigree 0.433225, pedigree (2,3,3,2,1)
  estimation
- Carbon monoxide, non-fossil [air, urban air close to ground]: 0.000333333 kg; = 2.5E-04 * scaling_factor; source T. Nussbaumer 2014; lognormal variance with pedigree 0.433225, pedigree (2,3,3,2,1)
  estimation
- Calcium [air, urban air close to ground]: 7.8e-6 kg; = 5.85E-06 * scaling_factor; source Bauer, C. 2007; lognormal variance with pedigree 0.472625, pedigree (2,4,5,2,1)
  (same comment as for Sulfur dioxide)
- Benzene, ethyl- [air, urban air close to ground]: 4e-8 kg; = 3E-08 * scaling_factor; source Bauer, C. 2007; lognormal variance with pedigree 0.472625, pedigree (2,4,5,2,1)
  (same comment as for Sulfur dioxide)
- Sodium [air, urban air close to ground]: 1.73333e-6 kg; = 1.3E-06 * scaling_factor; source Bauer, C. 2007; lognormal variance with pedigree 0.472625, pedigree (2,4,5,2,1)
  (same comment as for Sulfur dioxide)
- Manganese [air, urban air close to ground]: 2.26667e-7 kg; = 1.7E-07 * scaling_factor; source Bauer, C. 2007; lognormal variance with pedigree 0.472625, pedigree (2,4,5,2,1)
  (same comment as for Sulfur dioxide)
- Bromine [air, urban air close to ground]: 8e-8 kg; = 6E-08 * scaling_factor; source Bauer, C. 2007; lognormal variance with pedigree 0.472625, pedigree (2,4,5,2,1)
  (same comment as for Sulfur dioxide)
- Copper [air, urban air close to ground]: 2.93333e-8 kg; = 2.2E-08 * scaling_factor; source Bauer, C. 2007; lognormal variance with pedigree 0.472625, pedigree (2,4,5,2,1)
  (same comment as for Sulfur dioxide)
- Potassium [air, urban air close to ground]: 3.12e-5 kg; = 2.34E-05 * scaling_factor; source Bauer, C. 2007; lognormal variance with pedigree 0.472625, pedigree (2,4,5,2,1)
  (same comment as for Sulfur dioxide)
- Cadmium [air, urban air close to ground]: 9.33333e-10 kg; = 7E-10 * scaling_factor; source Bauer, C. 2007; lognormal variance with pedigree 0.472625, pedigree (2,4,5,2,1)
  (same comment as for Sulfur dioxide)
- Arsenic [air, urban air close to ground]: 1.33333e-9 kg; = 1E-09 * scaling_factor; source Bauer, C. 2007; lognormal variance with pedigree 0.472625, pedigree (2,4,5,2,1)
  (same comment as for Sulfur dioxide)
- Formaldehyde [air, urban air close to ground]: 1.73333e-7 kg; = 1.3E-07 * scaling_factor; source Bauer, C. 2007; lognormal variance with pedigree 0.472625, pedigree (2,4,5,2,1)
  (same comment as for Sulfur dioxide)
- NMVOC, non-methane volatile organic compounds, unspecified origin [air, urban air close to ground]: 3.54667e-5 kg; = 26.6E-06 * scaling_factor; source T. Nussbaumer 2014; lognormal variance with pedigree 0.433225, pedigree (2,3,3,2,1)
  estimation
- Ammonia [air, urban air close to ground]: 2.30667e-6 kg; = 1.73E-06 * scaling_factor; source Bauer, C. 2007; lognormal variance with pedigree 0.472625, pedigree (2,4,5,2,1)
  (same comment as for Sulfur dioxide)
- Hydrocarbons, aliphatic, unsaturated [air, urban air close to ground]: 4.13333e-6 kg; = 3.1E-06 * scaling_factor; source Bauer, C. 2007; lognormal variance with pedigree 0.472625, pedigree (2,4,5,2,1)
  (same comment as for Sulfur dioxide)
- Carbon dioxide, non-fossil [air, urban air close to ground]: 0.128667 kg; = 0.0965 * scaling_factor; source Bauer, C. 2007; lognormal variance with pedigree 0.472625, pedigree (2,4,5,2,1)
  uncertainty of carbon content in the wood
  Amount was scaled to the amount of reference product.
- PAH, polycyclic aromatic hydrocarbons [air, urban air close to ground]: 1.48e-8 kg; = 1.11E-08 * scaling_factor; source Bauer, C. 2007; lognormal variance with pedigree 0.472625, pedigree (2,4,5,2,1)
  (same comment as for Sulfur dioxide)
- Hydrocarbons, aliphatic, alkanes, unspecified [air, urban air close to ground]: 1.21333e-6 kg; = 9.1E-07 * scaling_factor; source Bauer, C. 2007; lognormal variance with pedigree 0.472625, pedigree (2,4,5,2,1)
  (same comment as for Sulfur dioxide)
- Chromium [air, urban air close to ground]: 5.28e-9 kg; = 3.96E-09 * scaling_factor; source Bauer, C. 2007; lognormal variance with pedigree 0.472625, pedigree (2,4,5,2,1)
  (same comment as for Sulfur dioxide)
- Phenol, pentachloro- [air, urban air close to ground]: 1.08e-11 kg; = 8.1E-12 * scaling_factor; source Bauer, C. 2007; lognormal variance with pedigree 0.472625, pedigree (2,4,5,2,1)
  (same comment as for Sulfur dioxide)
- Zinc [air, urban air close to ground]: 4e-7 kg; = 3E-07 * scaling_factor; source Bauer, C. 2007; lognormal variance with pedigree 0.472625, pedigree (2,4,5,2,1)
  (same comment as for Sulfur dioxide)
- Magnesium [air, urban air close to ground]: 4.8e-7 kg; = 3.6E-07 * scaling_factor; source Bauer, C. 2007; lognormal variance with pedigree 0.472625, pedigree (2,4,5,2,1)
  (same comment as for Sulfur dioxide)
- m-Xylene [air, urban air close to ground]: 1.6e-7 kg; = 1.2E-07 * scaling_factor; source Bauer, C. 2007; lognormal variance with pedigree 0.472625, pedigree (2,4,5,2,1)
  (same comment as for Sulfur dioxide)
- Benzene, hexachloro- [air, urban air close to ground]: 9.6e-15 kg; = 7.2E-15 * scaling_factor; source Bauer, C. 2007; lognormal variance with pedigree 0.472625, pedigree (2,4,5,2,1)
  (same comment as for Sulfur dioxide)
- Phosphorus [air, urban air close to ground]: 4e-7 kg; = 3E-07 * scaling_factor; source Bauer, C. 2007; lognormal variance with pedigree 0.472625, pedigree (2,4,5,2,1)
  (same comment as for Sulfur dioxide)
- Lead [air, urban air close to ground]: 3.33333e-8 kg; = 2.5E-08 * scaling_factor; source Bauer, C. 2007; lognormal variance with pedigree 0.472625, pedigree (2,4,5,2,1)
  (same comment as for Sulfur dioxide)

## Sampling procedure
extrapolation

## Extrapolations
This dataset has been extrapolated from year 2014 to the year of the calculation (2019). The uncertainty has been adjusted accordingly.
