# heat, from municipal waste incineration to generic market for heat district or industrial, other than natural gas

Dataset: EcoSpold 2, unit process
Geography: IT
Time period: 2008-01-01 to 2019-12-31
Technology level: current
Classification: ISIC rev.4 ecoinvent: 3821:Treatment and disposal of non-hazardous waste
Synonyms: WTE; waste-to-energy
Scenario: Business-as-Usual
System model: Allocation at the point of substitution
Share of production covered: 100 %
Generated by: Karin Treyer
Published in: Doka G. 2013
Database: ecoinvent
isCopyrightProtected: true
accessRestrictedTo: 1

## General comment
This dataset changes the names of the (internally used) heat product of waste incineration and connects it with the external grid and the respective average energy markets (district heat grid).

## Reference product
- heat, district or industrial, other than natural gas: 1 MJ; = E_th_prod_MSWI; source Doka G. 2013; CPC 17300: Steam and hot water; By-product classification allocatable product
  Net heat from municipal waste incineration fed in to district heating grid
  production volume 2.28e10 MJ
    Calculated value. Please take into account that the annual production volume of the municipal solid waste is a rough estimate only.
  property price 0.0106 EUR2005
    Average European district heat price from Ecoheatcool and Euroheat 2005-2006, Ecoheat Work package 1: The European heat market. Final report. 10.6 EUR/GJ i s the price of district heat. http://www.solarthermalworld.org/files/Ecoheatcool%20WP1%20Web.pdf?download

## Inputs from technosphere
- heat, for reuse in municipal waste incineration only: 1 MJ; name E_th_prod_MSWI; source Doka G. 2013; lognormal variance with pedigree 0.002, pedigree (1,1,3,1,1)
  useful heat produced in municipal waste incineration (internal)
  Uncertainty: a mere name exchange. There is no additonal uncertainty

## Extrapolations
This dataset has been extrapolated from year 2012 to the year of the calculation (2019). The uncertainty has been adjusted accordingly.

## Review by Emilia Moreno Ruiz 2013-02-21
Conecting DS from specific to generic market
