# clinker production

Dataset: EcoSpold 2, unit process
Geography: US
Time period: 1998-01-01 to 2019-12-31
Technology level: current
Classification: EcoSpold01Categories: construction materials/binder
Classification: ISIC rev.4 ecoinvent: 2394:Manufacture of cement, lime and plaster
Synonyms: Klinker; clinker; Zement; cement; rotary kiln; Drehrohrofen
Tags: combined production
Scenario: Business-as-Usual
System model: Allocation at the point of substitution
Generated by: Gregor Wernet
Published in: Kellenberger D. 2007
Database: ecoinvent
isCopyrightProtected: true
accessRestrictedTo: 1

## General comment
The dataset describes the production of portland cement clinker; in the production different types of alterantive fuels and raw materials are used. As the use of a alternative fuel/material can vary considerably between different years, this dataset covers the period from 2005 to 2009.

## Included activities start
From the reception of traditional and alternative fuels and raw materials at the factory gate.

## Included activities end
This activity ends with the cooling of the produced clinker. It includes the whole manufacturing process to produce clinker (raw material provision, grinding and mixing; rotary kiln process), internal processes (transport, etc.) and for the infrastructure only the rotary kiln (material consumption) is taken into account. No administration is included. Waste (as secondary fuel and raw material) enter the system without environmental burdens from upstream processes.

## Geography
For some exchanges European and Swiss data have been used as proxy.

## Parameters
- fraction, tap water, to air: 0.15; name fraction_TW_to_air; = fraction_PW_to_air; lognormal variance with pedigree 0.092025, pedigree (4,4,3,2,4)
  Calculated value. See comment in the other parametres present in this dataset. Tap water is considered to be always used as process water, thus process water fractions to air are applied to all tap water input flows to calculate the amount of water consumed in the processes.
- fraction, process water, to air: 0.15 dimensionless; name fraction_PW_to_air; lognormal variance with pedigree 0.092025, pedigree (4,4,3,2,4)
  Literature value. In case when no industry/process specific data are available, default evaporation fraction value is used. This value is 15% and is based on literature (Statistics Canada, 2007 & Shaffer, K.H., 2008, Consumptive water use in the Great Lakes Basin, USGS & Shiklomanov, 2003, World Water Resources at the Beginning of the 21st Century) and has been approved by an expert.

## Reference product
- clinker: 1 kg; By-product classification allocatable product; CPC 37430: Cement clinkers
  EcoSpold01Location=CH
  production volume 7.969e10 kg; name clinker_pv
    Average of US clinker production 2005 - 2009
  property price 0.047 EUR2005
    Calculated value based on data from United Nations Commodity Trade Statistics Database (comtrade.un.org). UN comtrade category: 252310 Cement Clinkers. Using exchange rate of 1EURO = 1.209 USD. Average of price of import into 5 main markets (EU, US, JP, IN and CN).
  property carbon content 0
    carbon content on a dry matter basis (reserved; not for manual entry)
  property true value 0.047; name clinker_true_value
    allocation property applied in "true value" allocation // value calculated from revenue
  properties: wet mass 1 kg, carbon content, non-fossil 0, water in wet mass 0 kg, dry mass 1 kg, water content 0, carbon content, fossil 0, carbon allocation 0 kg
- used tyre: 0 kg; name usedtyre; CPC 39260: Used pneumatic tyres of rubber; By-product classification Waste
  Estimated to be the same as in Switzerland.
  production volume 0 kg
    Calculated using ratio towards the reference product.
  property water in wet mass 0 kg; name usedtyre_WWM
  property dry mass 1 kg; name usedtyre_DM
  property water content 0; name usedtyre_water_content
  property wet mass 1 kg; name usedtyre_WM
  property price 0 EUR2005; name usedtyre_price_EUR2005
    Waste products are assigned a price of zero as they are assumed to require further treatment.
  property carbon content, fossil 0.82; name usedtyre_C_content_fossil
  property carbon content, non-fossil 0; name usedtyre_C_content_non_fossil
  property carbon content 0.82
    carbon content on a dry matter basis (reserved; not for manual entry)
  properties: carbon allocation 0.82 kg
- waste plastic, mixture: 0 kg; name wasteplastic; CPC 39270: Waste, parings and scrap of plastics; By-product classification Waste
  Estimated to be the same as in Switzerland.
  production volume 0 kg
    Calculated using ratio towards the reference product.
  property price 0 EUR2005; name wasteplastic_price_EUR2005
    (same comment as for used tyre)
  property carbon content 0.747344
    carbon content on a dry matter basis (reserved; not for manual entry)
  properties: wet mass 1 kg, dry mass 0.847 kg, water in wet mass 0.153 kg, water content 0.180638, carbon content, non-fossil 0, carbon content, fossil 0.747344, carbon allocation 0.633 kg
- waste wood, untreated: 0 kg; name wastewood; CPC 3928: Sawdust and wood waste and scrap; By-product classification Waste
  Estimated to be the same as in Switzerland.
  production volume 0 kg
    Calculated using ratio towards the reference product.
  property price 0 EUR2005; name wastewood_price_EUR2005
    (same comment as for used tyre)
  property carbon content 0.48632
    carbon content on a dry matter basis (reserved; not for manual entry)
  properties: carbon content, fossil 0, water in wet mass 0.2 kg, dry mass 0.8 kg, water content 0.25, carbon content, non-fossil 0.48632, wet mass 1 kg, carbon allocation 0.389056 kg
- spent solvent mixture: 0 kg; name wastesolvent; CPC 39950: Wastes from chemical or allied industries; By-product classification Waste
  Estimated to be the same as in Switzerland.
  production volume 0 kg
    Calculated using ratio towards the reference product.
  property price 0 EUR2005; name wastesolvent_price_EUR2005
    (same comment as for used tyre)
  property carbon content, fossil 0.571257
    Tab A.7, ecoinvent v2.2 report 13_I. C content has been calculated after data in the tables, and then referred to 1 kg DM
  property carbon content 0.571257
    carbon content on a dry matter basis (reserved; not for manual entry)
  properties: wet mass 1 kg, dry mass 0.835 kg, water in wet mass 0.165 kg, water content 0.197605, carbon content, non-fossil 0, carbon allocation 0.477 kg
- sludge, pig iron production: 0 kg; name ironsludge; CPC 39310: Slag, dross, scalings and other waste from the manufacture of iron or steel; By-product classification Waste
  Estimated to be the same as in Switzerland.
  production volume 0 kg
    Calculated using ratio towards the reference product.
  property price 0 EUR2005; name ironsludge_price_EUR2005
    (same comment as for used tyre)
  property carbon content 0.339168
    carbon content on a dry matter basis (reserved; not for manual entry)
  properties: carbon content, non-fossil 0, carbon content, fossil 0.339168, water content 0.0940919, wet mass 1 kg, water in wet mass 0.086 kg, dry mass 0.914 kg, carbon allocation 0.31 kg
- waste mineral oil: 0 kg; name wasteoil; By-product classification Waste; CPC 39990: Other wastes n.e.c.
  Estimated to be the same as in Switzerland.
  production volume 0 kg
    Calculated using ratio towards the reference product.
  property price 0 EUR2005; name wasteoil_price_EUR2005
    (same comment as for used tyre)
  property carbon content, fossil 0.864444
    Tab A.6, ecoinvent v2.2 report 13_I. C content has been calculated after data in the tables, and then referred to 1 kg DM
  property carbon content 0.864444
    carbon content on a dry matter basis (reserved; not for manual entry)
  properties: dry mass 0.9 kg, water content 0.111111, water in wet mass 0.1 kg, wet mass 1 kg, carbon content, non-fossil 0, carbon allocation 0.778 kg
- pyrite ash: 0 kg; name pyrite_ash; By-product classification Waste; CPC 374: Plaster, lime and cement
  Estimated to be the same as in Switzerland.
  production volume 0 kg
    Calculated using ratio towards the reference product.
  property price 0 EUR2005; name pyrite_ash_price_EUR2005
    (same comment as for used tyre)
  property carbon content, non-fossil 0; name pyrite_ash_C_content_non_fossil
    Based on composition of pyrite ash from http://www.srcosmos.gr/srcosmos/showpub.aspx?aa=3629
  property dry mass 1 kg; name pyrite_ash_DM
  property wet mass 1 kg; name pyrite_ash_WM
  property water content 0; name pyrite_ash_water_content
  property water in wet mass 0 kg; name pyrite_ash_WWM
  property carbon content, fossil 0.0594904; name pyrite_ash_C_content_fossil; = .045+0.0526*(12/44)/0.99
    (same comment as for pyrite ash)
  property carbon content 0.0594904
    carbon content on a dry matter basis (reserved; not for manual entry)
  properties: carbon allocation 0.0594904 kg
- sewage sludge, dried: 0 kg; name sewage_sludge; By-product classification Waste; CPC 39920: Sewage sludge
  Estimated to be the same as in Switzerland.
  production volume 0 kg
    Calculated using ratio towards the reference product.
  property price 0 EUR2005; name sewage_sludge_price_EUR2005
    (same comment as for used tyre)
  property carbon content 0
    carbon content on a dry matter basis (reserved; not for manual entry)
  properties: carbon content, fossil 0, dry mass 0.99 kg, carbon content, non-fossil 0, wet mass 1 kg, water content 0.010101, water in wet mass 0.01 kg, carbon allocation 0 kg
- used vegetable cooking oil: 0 kg; name other_biogenic_fuels; CPC 39120: Bran and other residues from the working of cereals or legumes; vegetable materials and vegetable waste, veget[…]; By-product classification Recyclable
  Estimated to be the same as in Switzerland.
  production volume 0 kg
    Calculated using ratio towards the reference product.
  property price 0 EUR2005; name other_biogenic_fuels_price_EUR2005
    Price assumed to be zero.
  property carbon content, non-fossil 0.75
    C content in fat is estimated to be 75% in dry mass (ecoinvent v2.2 report, n 15a, pg 40)
  property carbon content 0.75
    carbon content on a dry matter basis (reserved; not for manual entry)
  properties: carbon content, fossil 0, water content 0, wet mass 1 kg, dry mass 1 kg, water in wet mass 0 kg, carbon allocation 0.75 kg
- inert waste: 0 kg; name inert_waste; CPC 39: Wastes or scraps; By-product classification Waste
  Estimated to be the same as in Switzerland.
  production volume 0 kg
    Calculated using ratio towards the reference product.
  property price 0 EUR2005; name inert_waste_price_EUR2005
    (same comment as for used tyre)
  property carbon content 0
    carbon content on a dry matter basis (reserved; not for manual entry)
  properties: wet mass 1 kg, dry mass 1 kg, water in wet mass 0 kg, carbon content, non-fossil 0, carbon content, fossil 0, water content 0, carbon allocation 0 kg
- waste paint: 0 kg; name CCS_organics; By-product classification Waste; CPC 39: Wastes or scraps
  Estimated to be the same as in Switzerland.
  production volume 0 kg
    Calculated using ratio towards the reference product.
  property price 0 EUR2005; name CCS_organics_price_EUR2005
    (same comment as for used tyre)
  property carbon content 0.65
    carbon content on a dry matter basis (reserved; not for manual entry)
  properties: water in wet mass 0 kg, wet mass 1 kg, carbon content, non-fossil 0, water content 0, dry mass 1 kg, carbon content, fossil 0.65, carbon allocation 0.65 kg

## By-products
- electricity, for reuse in municipal waste incineration only: 0 kWh; CPC 17100: Electrical energy; By-product classification allocatable product; pedigree (1,1,1,1,1)
  Net electricity generated from this waste and used in internal MSWI plant energy redistribution.
  Uncertainty: uncertainty is calculated from uncertainties in waste composition and uncertainties in energy efficiency and the uncertainty in internal energy demand
  production volume 87673.9 kWh
  property exergy 3.6 MJ; name E_el_prod_MSWI_exergy
    This exergy property is based on the exergy content of the product.
  property true value relation 3.6; name E_el_prod_MSWI_true_value_relation
    property to calculate "true value" from
  property price 0.1 EUR2005; name E_el_prod_MSWI_price_EUR2005
    Estimated to be the same price as in case of electricity, medium voltage.
  property true value 1.42358e-7
    allocation property applied in "true value" allocation // value calculated from true value relation
- iron scrap, sorted, pressed: 0 kg; By-product classification Recyclable; CPC 39310: Slag, dross, scalings and other waste from the manufacture of iron or steel; pedigree (1,1,1,1,1)
  Iron scrap recovered from this waste.
  Uncertainty: uncertainty calculated from uncertainty in waste composition, uncertainty of share of recyclable metal, uncertainty of transfer coefficient to bottom ash, uncertainty of the efficiency of scrap removal in MSWI plant.
  production volume 11038.8 kg
  property price 0.175 EUR2005
    Temporary price data. Calculated as 90% of purchasers price based on: 2005 import and export prices (total trades (USD) divided by total weight (kg) in biggest economies of the world: EU27, USA, Brasil, China, India, Japan and Russia) from UN Commodity Trade Statistics Database (http://data.un.org/Explorer.aspxDatabase [Accessed 2011.06.20]). Commodity: Waste or scrap, of cast iron
  property carbon content 0
    carbon content on a dry matter basis (reserved; not for manual entry)
  property true value 2.42414e-8
    allocation property applied in "true value" allocation // value calculated from revenue
  properties: dry mass 1 kg, water content 0, carbon content, non-fossil 0, water in wet mass 0 kg, carbon content, fossil 0, wet mass 1 kg, carbon allocation 0 kg
- heat, for reuse in municipal waste incineration only: 0 MJ; CPC 17300: Steam and hot water; By-product classification allocatable product; pedigree (1,1,1,1,1)
  (same comment as for electricity, for reuse in municipal waste incineration only)
  production volume 647639 MJ
  property exergy 0.1842 MJ; name E_th_prod_MSWI_exergy
    This exergy property is based on the exergy content of the product.
  property true value relation 0.1842; name E_th_prod_MSWI_true_value_relation
    property to calculate "true value" from
  property price 0.0106 EUR2005; name E_th_prod_MSWI_price_EUR2005
    Average European district heat price from Ecoheatcool and Euroheat 2005-2006, Ecoheat Work package 1: The European heat market. Final report. 10.6 EUR/GJ i s the price of district heat. http://www.solarthermalworld.org/files/Ecoheatcool%20WP1%20Web.pdf?download
  property true value 5.38063e-8
    (same comment as for electricity, for reuse in municipal waste incineration only)
- iron scrap, unsorted: 0 kg; source European Aluminium Association 2008; CPC 39310: Slag, dross, scalings and other waste from the manufacture of iron or steel; By-product classification Recyclable; pedigree (1,1,1,1,1)
  production volume 0.314067 kg
  property price 0.149 EUR2005; name ironScrapAmount_price_EUR2005
    Temporary price data. Calculated as 90% of purchasers price based on: estimated at 85% of sorted scrap
  property carbon content 0
    carbon content on a dry matter basis (reserved; not for manual entry)
  property true value 5.87224e-13
    allocation property applied in "true value" allocation // value calculated from revenue
  properties: water in wet mass 0 kg, water content 0, carbon content, fossil 0, carbon content, non-fossil 0, dry mass 1 kg, wet mass 1 kg, carbon allocation 0 kg
- aluminium oxide, non-metallurgical: 0 kg; source European Aluminium Association 2008; CPC 41432: Alumina (aluminium oxide), except artificial corundum; By-product classification allocatable product; CAS 1344-28-1; pedigree (1,1,1,1,1)
  production volume 19.763 kg
  property carbon content, non-fossil 0; name C_content_non_fossil
  property price 0.28 EUR2005; name Al2O3Amount_price_EUR2005
    From UN trade database. http://data.un.org/ Import data from the largest economies of the world are used (Brazil, India, USA, China, Japan and EU-27).
  property dry mass 1 kg; name DM
  property water content 0; name water_content
  property wet mass 1 kg; name WM
  property water in wet mass 0 kg; name WWM
  property carbon content, fossil 0; name C_content_fossil
  property carbon content 0
    carbon content on a dry matter basis (reserved; not for manual entry)
  property true value 6.94396e-11
    allocation property applied in "true value" allocation // value calculated from revenue
  properties: carbon allocation 0 kg
- aluminium, cast alloy: 0 kg; source European Aluminium Association 2008; By-product classification allocatable product; CPC 41431: Unwrought aluminium; pedigree (1,1,1,1,1)
  EcoSpold01Location=RER
  production volume 184.74 kg
  property price 1.3 EUR2005; name castAlloyAmount_price_EUR2005
    Temporary price data. Calculated as 90% of purchasers price based on: Source: London Metal Exchange, Aluminium alloy price for 2005
  property carbon content 0
    carbon content on a dry matter basis (reserved; not for manual entry)
  property true value 3.01371e-9
    allocation property applied in "true value" allocation // value calculated from revenue
  properties: water in wet mass 0 kg, carbon content, non-fossil 0, water content 0, dry mass 1 kg, carbon content, fossil 0, wet mass 1 kg, carbon allocation 0 kg
- aluminium, wrought alloy: 0 kg; source European Aluminium Association 2008; By-product classification allocatable product; CPC 4153: Semi-finished products of aluminium or aluminium alloys; pedigree (1,1,1,1,1)
  production volume 80.8758 kg
  property price 1.44 EUR2005; name secondaryAluminiumOutput_price_EUR2005
    Estimated based on literature values and expert judgement. Aluminium ccast alloys are about 90% of the price of aluminium wrought alloys.
  property carbon content 0
    carbon content on a dry matter basis (reserved; not for manual entry)
  property true value 1.46143e-9
    allocation property applied in "true value" allocation // value calculated from revenue
  properties: wet mass 1 kg, water content 0, carbon content, fossil 0, water in wet mass 0 kg, carbon content, non-fossil 0, dry mass 1 kg, carbon allocation 0 kg
- copper: 0 kg; source Rentz O. 1999; By-product classification allocatable product; CPC 41413: Refined copper and copper alloys, unwrought; master alloys of copper
  Literature value. Copper uses: Before end-use copper is manufactured into semi fabricated products, such as shapes and ingots (known as 'semis'). These manufacturing processes are subdivided into hot working, cold working and, if necessary, process annealing. Few of the semis are ready for use as such. They more typically travel to first-stage manufacturers, who make metal rods, wire, and casting, and then to component manufacturers who produce such things as motors, valves, and insulated cables The components in turn are incorporated by final-stage manufacturers into a variety of finished products - automobiles, commercial buildings, residential housing, and so forth. These uses account for about 79% of the world-wide consumption of copper.
  production volume 351.366 kg
  property price 5.52 EUR2005
    Literature value (http://www.economist.com/news/business/21576714-mining-industry-has-enriched-chile-its-future-precarious-copper-solution). Average price between 20015 and 2013.
  property carbon content 0
    carbon content on a dry matter basis (reserved; not for manual entry)
  property true value 2.43386e-8
    allocation property applied in "true value" allocation // value calculated from revenue
  properties: dry mass 1 kg, water in wet mass 0 kg, wet mass 1 kg, carbon content, non-fossil 0, water content 0, carbon content, fossil 0, carbon allocation 0 kg
- zinc concentrate: 0 kg; CPC 14290: Other non-ferrous metal ores and concentrates (other than uranium or thorium ores and concentrates); By-product classification allocatable product
  Calculated value from the knowledge of the properties of both products.
  production volume 2.78889e-7 kg
  property price 0.38 EUR2005; name ByP_price_EUR2005
    Temporary price data. Calculated as 90% of purchasers price based on: Zinc content in concentrate 53%. Concentrate price per kg Zn 86.5% of refined Zn price (13.5% treatment charges according to CHR Metals Limited 2005: Dynamic cost curves. http://www.minecost.com/dynamic.pdf). 2004 zinc price from USGS (2007) Mineral commodity summaries 2007. <http://minerals.usgs.gov/minerals/pubs/mcs/2007/mcs2007.pdf> [Accessed 25 May 2010]
  property zinc content 0.53; name zinc_C_zinc_concentrate
    Zinc content on a dry matter basis. Value taken from teh "zinc mine operation" /GLO dataset.
  property dry mass 1 kg; name DM_zinc_concentrate
  property carbon content 0
    carbon content on a dry matter basis (reserved; not for manual entry)
  property true value 1.32988e-18
    allocation property applied in "true value" allocation // value calculated from revenue
  properties: wet mass 1 kg, water content 0, carbon content, non-fossil 0, carbon content, fossil 0, water in wet mass 0 kg, carbon allocation 0 kg

## Inputs from technosphere
- refractory, high aluminium oxide, packed: 0.000136999 kg; = 0.000137*clinker; lognormal variance with pedigree 0.0526, pedigree (2,1,5,5,1)
  2007, Kellenberger D., Althaus H.-J., Jungbluth N., Künniger T., Life Cycle Inventories of Building Products, Final report ecoinvent data v2.0, 7, Dübendorf, CH, Swiss Centre for LCI, Empa - TSL, 3 - SeparatePublication, CD-ROM
  EcoSpold01Location=DE
  properties: dry mass 1 kg, wet mass 1 kg
- lubricating oil: 4.70998e-5 kg; = 0.0000471*clinker; lognormal variance with pedigree 0.0526, pedigree (2,1,5,5,1)
  2007, Kellenberger D., Althaus H.-J., Jungbluth N., Künniger T., Life Cycle Inventories of Building Products, Final report ecoinvent data v2.0, 7, Dübendorf, CH, Swiss Centre for LCI, Empa - TSL, 3 - SeparatePublication, CD-ROM
  EcoSpold01Location=RER
  properties: wet mass 1 kg, carbon content, fossil 0.75, dry mass 1 kg
  note on carbon content, fossil: Lubricating oil is produced from diesel. C-content/dry mass of fats and oils considered 75%, from: ecoinvent v2.2 report, n 15a, pg 40
- petroleum coke: 0.00390998 kg; = 0.00391*clinker; lognormal variance with pedigree 0.0526, pedigree (2,1,5,5,1)
  (same comment as for lubricating oil)
  properties: dry mass 1 kg, carbon content, fossil 0.885, wet mass 1 kg
- tap water: 0.339998 kg; name tap_water_input; = 0.34*clinker; lognormal variance with pedigree 0.0526, pedigree (2,1,5,5,1)
  EcoSpold01Location=RER
  2007, Kellenberger D., Althaus H.-J., Jungbluth N., Künniger T., Life Cycle Inventories of Building Products, Final report ecoinvent data v2.0, 7, Dübendorf, CH, Swiss Centre for LCI, Empa - TSL, 3 - SeparatePublication, CD-ROM
- electricity, medium voltage: 0.0579997 kWh; = 0.058*clinker; lognormal variance with pedigree 0.0526, pedigree (2,1,5,5,1)
  EcoSpold01Location=CH
  2007, Kellenberger D., Althaus H.-J., Jungbluth N., Künniger T., Life Cycle Inventories of Building Products, Final report ecoinvent data v2.0, 7, Dübendorf, CH, Swiss Centre for LCI, Empa - TSL, 3 - SeparatePublication, CD-ROM
- refractory, fireclay, packed: 8.20996e-5 kg; = 0.0000821*clinker; lognormal variance with pedigree 0.0526, pedigree (2,1,5,5,1)
  (same comment as for refractory, high aluminium oxide, packed)
  properties: dry mass 1 kg, wet mass 1 kg
- meat and bone meal: 0.00960995 kg; name meat_and_bone_meal; = 0.00961*clinker; lognormal variance with pedigree 0.0526, pedigree (2,1,5,5,1)
  Estimated to be the same as in Switzerland.
  properties: dry mass 0.96 kg, wet mass 1 kg, heating value, net 21.45 MJ, carbon content, non-fossil 0.521, water content 0.0416667
  note on carbon content, non-fossil: Boesch & Hellweg 2010, 2010, Boesch, M.E., Hellweg, S., Identifying Improvement Potentials in Cement Production with Life Cycle Assessment, Environmental Science & Technology, 44, 23, 9143-9149, 1 - Article, Supporting information is available via http://pubs.acs.org
- lime: 0.840996 kg; = 0.841*clinker; lognormal variance with pedigree 0.0526, pedigree (2,1,5,5,1)
  (same comment as for electricity, medium voltage)
  properties: dry mass 1 kg, wet mass 1 kg, carbon content, fossil 0.120005
- refractory, basic, packed: 0.000189999 kg; = 0.00019*clinker; lognormal variance with pedigree 0.0526, pedigree (2,1,5,5,1)
  (same comment as for refractory, high aluminium oxide, packed)
  properties: wet mass 1 kg, dry mass 1 kg
- bauxite: 0.000119999 kg; = 0.00012*clinker; lognormal variance with pedigree 0.0526, pedigree (2,1,5,5,1)
  2007, Kellenberger D., Althaus H.-J., Jungbluth N., Künniger T., Life Cycle Inventories of Building Products, Final report ecoinvent data v2.0, 7, Dübendorf, CH, Swiss Centre for LCI, Empa - TSL, 3 - SeparatePublication, CD-ROM
  EcoSpold01Location=GLO
  properties: wet mass 1 kg, dry mass 1 kg
- steel, chromium steel 18/8, hot rolled: 5.85997e-5 kg; = 0.0000586*clinker; lognormal variance with pedigree 0.0526, pedigree (2,1,5,5,1)
  (same comment as for tap water)
  properties: wet mass 1 kg, dry mass 1 kg, carbon content, fossil 0.0008
  note on carbon content, fossil: Stainless steel model is the grade 304 steel (18/8 stainless, 18% chromium 8% nickel; max. 0.08% C)
- clay: 0.330998 kg; = 0.331*clinker; lognormal variance with pedigree 0.0526, pedigree (2,1,5,5,1)
  2007, Kellenberger D., Althaus H.-J., Jungbluth N., Künniger T., Life Cycle Inventories of Building Products, Final report ecoinvent data v2.0, 7, Dübendorf, CH, Swiss Centre for LCI, Empa - TSL, 3 - SeparatePublication, CD-ROM
  EcoSpold01Location=CH
  properties: water content 0.0362694, dry mass 0.965 kg, wet mass 1 kg
- cement factory: 6.26997e-12 unit; = 0.00000000000627*clinker; lognormal variance with pedigree 0.3526, pedigree (2,1,5,5,1)
  (same comment as for clay)
- natural gas, high pressure: 0.000174619 m3; = 0.00017462*clinker; lognormal variance with pedigree 0.0526, pedigree (2,1,5,5,1)
  (same comment as for electricity, medium voltage)
  properties: heating value, gross 39 MJ
- calcareous marl: 0.465998 kg; = 0.466*clinker; lognormal variance with pedigree 0.0526, pedigree (2,1,5,5,1)
  (same comment as for clay)
  properties: carbon content, fossil 0.087767, dry mass 1 kg, wet mass 1 kg
  note on carbon content, fossil: composed from 3/4 pure limestone and 1/4 clay, ecoinvent v2.2 report 7 part II pg 14. C content of limestone is 0.117 kg/kg WM
- industrial machine, heavy, unspecified: 3.75998e-5 kg; = 0.0000376*clinker; lognormal variance with pedigree 0.372, pedigree (4,4,5,5,1)
  (same comment as for lubricating oil)
- sand: 0.00925995 kg; = 0.00926*clinker; lognormal variance with pedigree 0.0526, pedigree (2,1,5,5,1)
  (same comment as for clay)
  properties: dry mass 1 kg, wet mass 1 kg
- municipal solid waste: -4.49998e-5 kg; name MSW; = (0.000045*clinker)*-1; lognormal variance with pedigree 0.0526, pedigree (2,1,5,5,1)
  (same comment as for electricity, medium voltage)
  production volume 3.58605e6 kg; = clinker_pv*4.5E-05
    Calculated from the production volume of clinker in proportion to the respective output amounts.
  properties: dry mass 0.771 kg, water content 0.297017, wet mass 1 kg, carbon content, non-fossil 0.261655, carbon content, fossil 0.171549
  note on carbon content, non-fossil: MSW composition in tab 4.1, ecoinvent v2.2 report 13_I. C content referred to 1 kg DM
- hard coal: 0.0353998 kg; = 0.0354*clinker+wasteplastic*0+ usedtyre*0+ wastewood*0+ wasteoil*0+ ironsludge*0+ CCS_organics*0+ pyrite_ash*0+ wastesolvent*0+ other_biogenic_fuels*0+inert_waste*0; lognormal variance with pedigree 0.0526, pedigree (2,1,5,5,1)
  2007, Kellenberger D., Althaus H.-J., Jungbluth N., Künniger T., Life Cycle Inventories of Building Products, Final report ecoinvent data v2.0, 7, Dübendorf, CH, Swiss Centre for LCI, Empa - TSL, 3 - SeparatePublication, CD-ROM
  EcoSpold01Location=WEU
  properties: carbon content, fossil 0.845, wet mass 1 kg, water content 0.0638298, dry mass 0.94 kg
  note on carbon content, fossil: C content 75-94% (specified in Tab 1.1, report 6, part VI). A mean content of 0.845 kg C/ kg dry hard coal was considered
- diesel, burned in building machine: 0.0133999 MJ; = 0.0134*clinker; lognormal variance with pedigree 0.0526, pedigree (2,1,5,5,1)
  EcoSpold01Location=GLO
  2007, Kellenberger D., Althaus H.-J., Jungbluth N., Künniger T., Life Cycle Inventories of Building Products, Final report ecoinvent data v2.0, 7, Dübendorf, CH, Swiss Centre for LCI, Empa - TSL, 3 - SeparatePublication, CD-ROM
- heavy fuel oil: 0.0254999 kg; = 0.0255*clinker; lognormal variance with pedigree 0.0526, pedigree (2,1,5,5,1)
  (same comment as for electricity, medium voltage)
  properties: dry mass 1 kg, carbon content, fossil 0.849, wet mass 1 kg
- lime, hydrated, loose weight: 0.00391998 kg; = 0.00392*clinker; lognormal variance with pedigree 0.0526, pedigree (2,1,5,5,1)
  (same comment as for clay)
  properties: wet mass 1 kg, water content 0.00300903, dry mass 0.997 kg
- ammonia, liquid: 0.000907995 kg; = 0.000908*clinker; lognormal variance with pedigree 0.0526, pedigree (2,1,5,5,1)
  (same comment as for clay)
  properties: wet mass 1 kg, dry mass 1 kg
- light fuel oil: 0.000373998 kg; = 0.000374*clinker; lognormal variance with pedigree 0.0526, pedigree (2,1,5,5,1)
  (same comment as for electricity, medium voltage)
  properties: wet mass 1 kg, carbon content, fossil 0.862, dry mass 1 kg
- inert waste, for final disposal: -7.99996e-5 kg; name inert_waste_disposal; = (0.00008*clinker)*-1; lognormal variance with pedigree 0.0526, pedigree (2,1,5,5,1)
  (same comment as for clay)
  production volume 6.3752e6 kg; = clinker_pv*8E-05
    (same comment as for municipal solid waste)
  property price 0 EUR2005; name inert_waste_disposal_price_EUR2005
  properties: water content 0.00502513, dry mass 0.995 kg, wet mass 1 kg

## Inputs from nature
- Water, unspecified natural origin [natural resource, in water]: 0.00161999 m3; name water_UNO_input; = 0.00162*clinker; lognormal variance with pedigree 0.0526, pedigree (2,1,5,5,1)
  2007, Kellenberger D., Althaus H.-J., Jungbluth N., Künniger T., Life Cycle Inventories of Building Products, Final report ecoinvent data v2.0, 7, Dübendorf, CH, Swiss Centre for LCI, Empa - TSL, 3 - SeparatePublication, CD-ROM

## Emissions to nature
- Ammonia [air, unspecified]: 2.27999e-5 kg; = 0.0000228*clinker; lognormal variance with pedigree 0.0926, pedigree (2,1,5,5,1)
  (same comment as for Water, unspecified natural origin)
- Water [water, unspecified]: 0.00166599 m3; name water_to_water_unspecified; = 0.001666*clinker; lognormal variance with pedigree 0.0807, pedigree (2,2,5,1,1)
  Calculated value.
  Calculated using following formula;
  ((water_UNO_input+(tap_water_input/1000))*(1-fraction_PW_to_air))
  property fraction, origin: fresh water 0.173469; name fraction_origin_fresh_water_Ww
  property fraction, origin: unspecified 0.826531; name fraction_origin_unspecified_Ww
  property fraction, origin: salt water 0; name fraction_origin_salt_water_Ww
- Cobalt [air, unspecified]: 3.99998e-9 kg; = 0.000000004*clinker; lognormal variance with pedigree 0.0926, pedigree (2,1,5,5,1)
  (same comment as for Water, unspecified natural origin)
- Tin [air, unspecified]: 8.99995e-9 kg; = 0.000000009*clinker; lognormal variance with pedigree 0.7026, pedigree (2,1,5,5,1)
  (same comment as for Water, unspecified natural origin)
- Mercury [air, unspecified]: 3.29998e-8 kg; = 0.000000033*clinker; lognormal variance with pedigree 0.0926, pedigree (2,1,5,5,1)
  (same comment as for Water, unspecified natural origin)
- NMVOC, non-methane volatile organic compounds, unspecified origin [air, unspecified]: 5.63997e-5 kg; = 0.0000564*clinker; lognormal variance with pedigree 0.1726, pedigree (2,1,5,5,1)
  (same comment as for Water, unspecified natural origin)
- Cadmium [air, unspecified]: 6.99996e-9 kg; = 0.000000007*clinker; lognormal variance with pedigree 0.0926, pedigree (2,1,5,5,1)
  (same comment as for Water, unspecified natural origin)
- Carbon dioxide, non-fossil [air, unspecified]: 0.0150999 kg; = 0.0151*clinker; lognormal variance with pedigree 0.0526, pedigree (2,1,5,5,1)
  (same comment as for Water, unspecified natural origin)
- Dioxins, measured as 2,3,7,8-tetrachlorodibenzo-p-dioxin [air, unspecified]: 9.59995e-13 kg; = 0.00000000000096*clinker; lognormal variance with pedigree 0.1726, pedigree (2,1,5,5,1)
  (same comment as for Water, unspecified natural origin)
- Water [air, unspecified]: 0.000293998 m3; name water_to_air_unspecified; = 0.000294*clinker; lognormal variance with pedigree 0.0807, pedigree (2,2,5,1,1)
  Calculated value.
  Calculated using following formula;
  ((water_UNO_input+(tap_water_input/1000))* fraction_PW_to_air)
  property fraction, origin: salt water 0; name fraction_origin_salt_water
  property fraction, origin: fresh water 0.173469; name fraction_origin_fresh_water
  property fraction, origin: unspecified 0.826531; name fraction_origin_unspecified
- Zinc [air, unspecified]: 5.99997e-8 kg; = 0.00000006*clinker; lognormal variance with pedigree 0.0926, pedigree (2,1,5,5,1)
  (same comment as for Water, unspecified natural origin)
- Vanadium [air, unspecified]: 4.99997e-9 kg; = 0.000000005*clinker; lognormal variance with pedigree 0.0926, pedigree (2,1,5,5,1)
  (same comment as for Water, unspecified natural origin)
- Nitrogen oxides [air, unspecified]: 0.00107999 kg; = 0.00108*clinker; lognormal variance with pedigree 0.0926, pedigree (2,1,5,5,1)
  (same comment as for Water, unspecified natural origin)
- Hydrogen chloride [air, unspecified]: 6.30997e-6 kg; = 0.00000631*clinker; lognormal variance with pedigree 0.0926, pedigree (2,1,5,5,1)
  (same comment as for Water, unspecified natural origin)
- Beryllium [air, unspecified]: 2.99998e-9 kg; = 0.000000003*clinker; lognormal variance with pedigree 0.0926, pedigree (2,1,5,5,1)
  (same comment as for Water, unspecified natural origin)
- Carbon monoxide, fossil [air, unspecified]: 0.000471997 kg; = 0.000472*clinker; lognormal variance with pedigree 0.1726, pedigree (2,1,5,5,1)
  (same comment as for Water, unspecified natural origin)
- Nickel [air, unspecified]: 4.99997e-9 kg; = 0.000000005*clinker; lognormal variance with pedigree 0.0926, pedigree (2,1,5,5,1)
  (same comment as for Water, unspecified natural origin)
- Methane, fossil [air, unspecified]: 8.87995e-6 kg; = 0.00000888*clinker; lognormal variance with pedigree 0.1726, pedigree (2,1,5,5,1)
  (same comment as for Water, unspecified natural origin)
- Carbon dioxide, fossil [air, unspecified]: 0.838996 kg; = 0.839*clinker; lognormal variance with pedigree 0.0526, pedigree (2,1,5,5,1)
  (same comment as for Water, unspecified natural origin)
- Arsenic [air, unspecified]: 1.19999e-8 kg; = 0.000000012*clinker; lognormal variance with pedigree 0.0926, pedigree (2,1,5,5,1)
  (same comment as for Water, unspecified natural origin)
- Particulates, > 2.5 um, and < 10um [air, non-urban air or from high stacks]: 7.91996e-6 kg; = 0.00000792*clinker; lognormal variance with pedigree 0.1726, pedigree (2,1,5,5,1)
  (same comment as for Water, unspecified natural origin)
- Thallium [air, unspecified]: 1.29999e-8 kg; = 0.000000013*clinker; lognormal variance with pedigree 0.0926, pedigree (2,1,5,5,1)
  (same comment as for Water, unspecified natural origin)
- Chromium [air, unspecified]: 1.44999e-9 kg; = 0.00000000145*clinker; lognormal variance with pedigree 0.0926, pedigree (2,1,5,5,1)
  (same comment as for Water, unspecified natural origin)
- Antimony [air, unspecified]: 1.99999e-9 kg; = 0.000000002*clinker; lognormal variance with pedigree 0.7026, pedigree (2,1,5,5,1)
  (same comment as for Water, unspecified natural origin)
- Selenium [air, unspecified]: 1.99999e-9 kg; = 0.000000002*clinker; lognormal variance with pedigree 0.7026, pedigree (2,1,5,5,1)
  (same comment as for Water, unspecified natural origin)
- Chromium VI [air, unspecified]: 5.49997e-10 kg; = 0.00000000055*clinker; lognormal variance with pedigree 0.0926, pedigree (2,1,5,5,1)
  (same comment as for Water, unspecified natural origin)
- Copper [air, unspecified]: 1.39999e-8 kg; = 0.000000014*clinker; lognormal variance with pedigree 0.0926, pedigree (2,1,5,5,1)
  (same comment as for Water, unspecified natural origin)
- Sulfur dioxide [air, unspecified]: 0.000354998 kg; = 0.000355*clinker; lognormal variance with pedigree 0.0926, pedigree (2,1,5,5,1)
  (same comment as for Water, unspecified natural origin)
- Lead [air, unspecified]: 8.49995e-8 kg; = 0.000000085*clinker; lognormal variance with pedigree 0.7026, pedigree (2,1,5,5,1)
  (same comment as for Water, unspecified natural origin)
- Particulates, < 2.5 um [air, non-urban air or from high stacks]: 2.40999e-5 kg; = 0.0000241*clinker; lognormal variance with pedigree 0.3526, pedigree (2,1,5,5,1)
  (same comment as for Water, unspecified natural origin)
- Particulates, > 10 um [air, non-urban air or from high stacks]: 5.65997e-6 kg; = 0.00000566*clinker; lognormal variance with pedigree 0.0926, pedigree (2,1,5,5,1)
  (same comment as for Water, unspecified natural origin)

## Extrapolations
See geography.
