# electric motor production, for electric scooter

Dataset: EcoSpold 2, unit process
Geography: GLO
Time period: 2005-01-01 to 2019-12-31
Technology level: current
Classification: ISIC rev.4 ecoinvent: 2610:Manufacture of electronic components and boards
Scenario: Business-as-Usual
System model: Allocation at the point of substitution
Generated by: M. Gauch
Database: ecoinvent
isCopyrightProtected: true
accessRestrictedTo: 1

## General comment
This dataset describes the production of an electric motor suitable for an electric scooter. The entries are given on a function of kg of device. The original data was collected for a device of approximately 5.8kg. The dataset is based on direct inspection of existing commercial devices of current technology.

## Included activities start
The dataset takes as input the various marterials and energy resources required for the production of the electric motor.

## Included activities end
The dataset returns the electric motor and production waste materials as by-products.

## Reference product
- electric motor, for electric scooter: 1 kg; By-product classification allocatable product; CPC 49941: Parts and accessories of motorcycles and side-cars
  Materialization is based on the direct inspection of a commercial device. Production efforts have been derived through own estimation.
  production volume 4.5e6 kg
    Rough estimate based on 1% electric scooters out of 466E6 world two wheeler production projection between 2010 and 2016.(www.electric-bicycle-guide.com)
  property price 143 EUR2005
    Calculated value based on estimates and literature. The price of the batterry is 32.06euro/kg. The weight of a battery for an electric scooter is 30kg (producer's information: http://vespino.ch/?page_id=6, accessed 20130726). The market price for an electric scooter is approximatelly 4600euro (producer's information: http://vespino.ch/?page_id=6, accessed: 20130726). It is estimated, that the basic price is 1/3 lower than the market price (expert judgement). The basic price of a scooter without batterry is then calculated to be ((4600*2/3)-(32.06*30)=) 2105euro. The ratio between the price of powertrain and glider in case of electric cars is 1:17 (for more details see the comment field of these products' prices). The resulting prices are 8.4euro/kg of glider, for electric scooter and 142euro/kg of powertrain, for electric scooter. The price is considered to be the same (142euro/kg) for all the parts of the powertrain, such as motor, controller and charger.
  property true value 829.4
    allocation property applied in "true value" allocation // value calculated from revenue

## By-products
- iron scrap, unsorted: 0 kg; CPC 39310: Slag, dross, scalings and other waste from the manufacture of iron or steel; By-product classification Recyclable; pedigree (1,1,1,1,1)
  Production scrap. Own estimate, based on values from automotive industry.
  production volume 439798 kg; = Ref('8688547c-b4d8-49c5-adf4-8274a97d8faf', 'ProductionVolume') * (Ref('54394f7a-51df-4bab-a9e0-c642edc3c299') / Ref('8688547c-b4d8-49c5-adf4-8274a97d8faf'))
    Calculated from production volume of reference product using the relative outputs.
  property price 0.149 EUR2005
    Temporary price data. Calculated as 90% of purchasers price based on: estimated at 85% of sorted scrap
  property carbon content 0
    carbon content on a dry matter basis (reserved; not for manual entry)
  property true value 0.0843943
    allocation property applied in "true value" allocation // value calculated from revenue
  properties: carbon content, non-fossil 0, dry mass 1 kg, water content 0, wet mass 1 kg, carbon content, fossil 0, water in wet mass 0 kg, carbon allocation 0 kg
- copper: 0 kg; source Rentz O. 1999; By-product classification allocatable product; CPC 41413: Refined copper and copper alloys, unwrought; master alloys of copper
  Literature value. Copper uses: Before end-use copper is manufactured into semi fabricated products, such as shapes and ingots (known as 'semis'). These manufacturing processes are subdivided into hot working, cold working and, if necessary, process annealing. Few of the semis are ready for use as such. They more typically travel to first-stage manufacturers, who make metal rods, wire, and casting, and then to component manufacturers who produce such things as motors, valves, and insulated cables The components in turn are incorporated by final-stage manufacturers into a variety of finished products - automobiles, commercial buildings, residential housing, and so forth. These uses account for about 79% of the world-wide consumption of copper.
  production volume 120229 kg
  properties: dry mass 1 kg, water in wet mass 0 kg, wet mass 1 kg, carbon content, non-fossil 0, water content 0, price 5.52 EUR2005, carbon content, fossil 0, carbon content 0, carbon allocation 0 kg, true value 0.855389
- electricity, for reuse in municipal waste incineration only: 0 kWh; CPC 17100: Electrical energy; By-product classification allocatable product; pedigree (1,1,1,1,1)
  Net electricity generated from this waste and used in internal MSWI plant energy redistribution.
  Uncertainty: uncertainty is calculated from uncertainties in waste composition and uncertainties in energy efficiency and the uncertainty in internal energy demand
  production volume 48647.9 kWh
  property exergy 3.6 MJ; name E_el_prod_MSWI_exergy
    This exergy property is based on the exergy content of the product.
  property true value relation 3.6; name E_el_prod_MSWI_true_value_relation
    property to calculate "true value" from
  property price 0.1 EUR2005; name E_el_prod_MSWI_price_EUR2005
    Estimated to be the same price as in case of electricity, medium voltage.
  property true value 0.00395347
    allocation property applied in "true value" allocation // value calculated from true value relation
- heat, for reuse in municipal waste incineration only: 0 MJ; CPC 17300: Steam and hot water; By-product classification allocatable product; pedigree (1,1,1,1,1)
  Net useful heat generated from this waste and used in internal MSWI plant energy redistribution.
  Uncertainty: uncertainty is calculated from uncertainties in waste composition and uncertainties in energy efficiency and the uncertainty in internal energy demand
  production volume 338371 MJ
  property true value relation 0.1842; name E_th_prod_MSWI_true_value_relation
    property to calculate "true value" from
  property exergy 0.1842 MJ; name E_th_prod_MSWI_exergy
    This exergy property is based on the exergy content of the product.
  property price 0.0106 EUR2005; name E_th_prod_MSWI_price_EUR2005
    Average European district heat price from Ecoheatcool and Euroheat 2005-2006, Ecoheat Work package 1: The European heat market. Final report. 10.6 EUR/GJ i s the price of district heat. http://www.solarthermalworld.org/files/Ecoheatcool%20WP1%20Web.pdf?download
  property true value 0.00140788
    (same comment as for electricity, for reuse in municipal waste incineration only)
- zinc concentrate: 0 kg; CPC 14290: Other non-ferrous metal ores and concentrates (other than uranium or thorium ores and concentrates); By-product classification allocatable product
  Calculated value from the knowledge of the properties of both products.
  production volume 2.82919 kg
  property price 0.38 EUR2005; name ByP_price_EUR2005
    Temporary price data. Calculated as 90% of purchasers price based on: Zinc content in concentrate 53%. Concentrate price per kg Zn 86.5% of refined Zn price (13.5% treatment charges according to CHR Metals Limited 2005: Dynamic cost curves. http://www.minecost.com/dynamic.pdf). 2004 zinc price from USGS (2007) Mineral commodity summaries 2007. <http://minerals.usgs.gov/minerals/pubs/mcs/2007/mcs2007.pdf> [Accessed 25 May 2010]
  property zinc content 0.53; name zinc_C_zinc_concentrate
    Zinc content on a dry matter basis. Value taken from teh "zinc mine operation" /GLO dataset.
  property dry mass 1 kg; name DM_zinc_concentrate
  property carbon content 0
    carbon content on a dry matter basis (reserved; not for manual entry)
  property true value 2.0669e-8
    allocation property applied in "true value" allocation // value calculated from revenue
  properties: wet mass 1 kg, water content 0, carbon content, non-fossil 0, carbon content, fossil 0, water in wet mass 0 kg, carbon allocation 0 kg
- aluminium, cast alloy: 0 kg; source European Aluminium Association 2008; By-product classification allocatable product; CPC 41431: Unwrought aluminium; pedigree (1,1,1,1,1)
  EcoSpold01Location=RER
  production volume 388448 kg
  property price 1.3 EUR2005; name castAlloyAmount_price_EUR2005
  properties: carbon content, fossil 0, dry mass 1 kg, wet mass 1 kg, water content 0, water in wet mass 0 kg, carbon content, non-fossil 0, carbon content 0, carbon allocation 0 kg, true value 0.309228
- aluminium oxide, non-metallurgical: 0 kg; source European Aluminium Association 2008; CPC 41432: Alumina (aluminium oxide), except artificial corundum; By-product classification allocatable product; CAS 1344-28-1; pedigree (1,1,1,1,1)
  production volume 41555.1 kg
  property dry mass 1 kg; name DM
  property wet mass 1 kg; name WM
  property carbon content, fossil 0; name C_content_fossil
  property water in wet mass 0 kg; name WWM
  property water content 0; name water_content
  property price 0.28 EUR2005; name Al2O3Amount_price_EUR2005
    From UN trade database. http://data.un.org/ Import data from the largest economies of the world are used (Brazil, India, USA, China, Japan and EU-27).
  property carbon content, non-fossil 0; name C_content_non_fossil
  property carbon content 0
    carbon content on a dry matter basis (reserved; not for manual entry)
  property true value 0.00712499
    allocation property applied in "true value" allocation // value calculated from revenue
  properties: carbon allocation 0 kg
- aluminium, wrought alloy: 0 kg; source European Aluminium Association 2008; By-product classification allocatable product; CPC 4153: Semi-finished products of aluminium or aluminium alloys; pedigree (1,1,1,1,1)
  production volume 330062 kg
  property price 1.44 EUR2005; name secondaryAluminiumOutput_price_EUR2005
    Estimated based on literature values and expert judgement. Aluminium ccast alloys are about 90% of the price of aluminium wrought alloys.
  property carbon content 0
    carbon content on a dry matter basis (reserved; not for manual entry)
  property true value 0.324894
    allocation property applied in "true value" allocation // value calculated from revenue
  properties: dry mass 1 kg, wet mass 1 kg, carbon content, fossil 0, water content 0, carbon content, non-fossil 0, water in wet mass 0 kg, carbon allocation 0 kg
- aluminium alloy, AlLi: 0 kg; By-product classification allocatable product; CPC 41431: Unwrought aluminium
  reference flow
  production volume 70.3469 kg
  property price 3.6 EUR2005; name ref_price_EUR2005
    Literature value (http://www.economist.com/news/business/21576714-mining-industry-has-enriched-chile-its-future-precarious-copper-solution). Average price between 20015 and 2013.
  property carbon content 0
    carbon content on a dry matter basis (reserved; not for manual entry)
  property true value 0.000287924
    allocation property applied in "true value" allocation // value calculated from revenue
  properties: carbon content, non-fossil 0, carbon content, fossil 0, dry mass 1 kg, wet mass 1 kg, water in wet mass 0 kg, carbon allocation 0 kg
- ground granulated blast furnace slag: 0 kg; By-product classification allocatable product; CPC 37440: Portland cement, aluminous cement, slag cement and similar hydraulic cements, except in the form of clinkers
  Functional unit of LCI by Marceau & VanGeem (2003) was 1 short ton of slag cement (GGBFS) output which was converted to 907.18 kg for the present inventory.
  production volume 8.0563 kg
  property water content 0; name GGBFS_water_content
  property carbon content, non-fossil 0; name GGBFS_C_content_non_fossil
  property water in wet mass 0 kg; name GGBFS_WWM
  property carbon content, fossil 0; name GGBFS_C_content_fossil
    Industry value; Arcelor Mittal, chemical composition of blast furnace slag (http://www.cst.com.br/english/products/co_products/catalog_products/blast_slag/blast_slag.asp, accessed: 20121003).
  property price 0.0615 EUR2005; name GGBFS_price_EUR2005
    2005 import and export prices (total trades (USD) divided by total weight (kg) in China, India, USA, Japan, Russia and Europe, major producers and consumers (http://www.cementchina.net/freport/showfre.asp?id=749) from UN Commodity Trade Statistics Database (http://data.un.org/Explorer.aspxDatabase [Accessed 2 July 2010]). Commodity: Cement (portland, aluminious, slag or hydraulic)
  property carbon content 0
    carbon content on a dry matter basis (reserved; not for manual entry)
  property true value 5.63302e-7
    allocation property applied in "true value" allocation // value calculated from revenue
  properties: wet mass 1 kg, dry mass 1 kg, carbon allocation 0 kg
- granulated blast furnace slag: 0 kg; By-product classification allocatable product
  production volume 33.3522 kg
  property wet mass 1 kg; name GBFS_WM
  property dry mass 1 kg; name GBFS_DM
  property price 0.0615 EUR2005; name GBFS_price_EUR2005
    (same comment as for ground granulated blast furnace slag)
  property water in wet mass 0 kg; name GBFS_WWM
  property carbon content, non-fossil 0; name GBFS_C_content_non_fossil
    biogene carbon content on a dry matter basis
  property carbon content, fossil 0; name GBFS_C_content_fossil
    fossil carbon content on a dry matter basis
  property water content 0; name GBFS_water_content
  property carbon content 0
    carbon content on a dry matter basis (reserved; not for manual entry)
  property true value 2.33201e-6
    allocation property applied in "true value" allocation // value calculated from revenue
  properties: carbon allocation 0 kg
- aluminium alloy, metal matrix composite: 0 kg; CPC 41431: Unwrought aluminium; By-product classification allocatable product
  reference flow
  production volume 56.8755 kg
  property water content 0; name Al_MMC_water_content
  property carbon content, non-fossil 0; name Al_MMC_C_content_non_fossil
    biogene carbon content on a dry matter basis
  property price 6.2 EUR2005; name ref_price_EUR2005
    (same comment as for aluminium alloy, AlLi)
  property carbon content, fossil 0.0475; name Al_MMC_C_content_fossil
    fossil carbon content on a dry matter basis
  property dry mass 1 kg; name Al_MMC_DM
  property water in wet mass 0 kg; name Al_MMC_WWM
  property wet mass 1 kg; name Al_MMC_WM
  property carbon content 0.0475
    carbon content on a dry matter basis (reserved; not for manual entry)
  property true value 0.000400911
    allocation property applied in "true value" allocation // value calculated from revenue
  properties: carbon allocation 0.0475 kg
- aluminium, primary, cast alloy slab from continuous casting: 0 kg; CPC 41431: Unwrought aluminium; By-product classification allocatable product
  reference flow
  production volume 3644.67 kg
  property price 3.67 EUR2005; name ref_price_EUR2005
    Estimated to be the same as in case of aluminium, primary, liquid.
  property carbon content 0
    carbon content on a dry matter basis (reserved; not for manual entry)
  property true value 0.0152074
    allocation property applied in "true value" allocation // value calculated from revenue
  properties: wet mass 1 kg, carbon content, fossil 0, water content 0, carbon content, non-fossil 0, water in wet mass 0 kg, dry mass 1 kg, carbon allocation 0 kg

## Inputs from technosphere
- waste plastic, industrial electronics: 0 kg; pedigree (1,1,1,1,1)
  Production scrap. Own estimate, based on values from automotive industry.
  production volume 0 kg
    Calculated from production volume of reference product using the relative outputs.
  properties: dry mass 0.847 kg, carbon content, fossil 0.81386, water content 0.180638, wet mass 1 kg
- heat, district or industrial, natural gas: 6.42758 MJ; lognormal variance with pedigree 0.0138, pedigree (2,4,3,4,3)
  Own estimate, based on values from automotive industry.
- steel, low-alloyed, hot rolled: 0.561501 kg; lognormal variance with pedigree 0.0064, pedigree (2,4,3,4,2)
  Based on the direct inspection of a commercial device.
  property carbon content, fossil 0.005; name C_content_fossil
  property wet mass 1 kg; name WM
  property dry mass 1 kg; name DM
  property water content 0; name water_content
  property carbon content, non-fossil 0; name C_content_non_fossil
  property water in wet mass 0 kg; name WWM
  note on carbon content, fossil: Low alloyed steel composition given in Tab. 3.2 ecoinvent v2.2 report 10_partII. Steel assumed to have a C content of 0.5%
- polyphenylene sulfide: 0.0328675 kg; lognormal variance with pedigree 0.0064, pedigree (2,4,3,4,2)
  Based on the direct inspection of a commercial device.
  properties: wet mass 1 kg, dry mass 1 kg, carbon content, fossil 0.666667
- permanent magnet, for electric motor: 0.054894 kg
- aluminium scrap, new: 0 kg; pedigree (1,1,1,1,1)
  Production scrap. Own estimate, based on values from automotive industry.
  production volume 0 kg
    Calculated from production volume of reference product using the relative outputs.
  properties: price 0.806 EUR2005, wet mass 1 kg, dry mass 1 kg
- copper: 0.174663 kg; lognormal variance with pedigree 0.0064, pedigree (2,4,3,4,2)
  Based on the direct inspection of a commercial device.
  properties: wet mass 1 kg, dry mass 1 kg
- electricity, medium voltage: 2.96926 kWh; lognormal variance with pedigree 0.0138, pedigree (2,4,3,4,3)
  Own estimate, based on values from automotive industry.
- copper scrap, sorted, pressed: -0.0349325 kg; lognormal variance with pedigree 0.0138, pedigree (2,4,3,4,3)
  Production scrap. Own estimate, based on values from automotive industry.
  production volume 157500 kg; = Ref('8688547c-b4d8-49c5-adf4-8274a97d8faf', 'ProductionVolume') * ((Ref('4989ed4f-d484-4def-a5f7-c5cfd79ec6de')*-1) / Ref('8688547c-b4d8-49c5-adf4-8274a97d8faf'))
    Calculated from production volume of reference product using the relative outputs.
  properties: dry mass 1 kg, wet mass 1 kg, price 2.84 EUR2005
- aluminium, cast alloy: 0.411791 kg; lognormal variance with pedigree 0.0064, pedigree (2,4,3,4,2)
  Based on the direct inspection of a commercial device.
  properties: dry mass 1 kg, wet mass 1 kg
- waste plastic, industrial electronics: -4.45617e-5, -0.00294965 kg (2 entries); lognormal variance with pedigree 0.0138, pedigree (2,4,3,4,3)
  Production scrap. Own estimate, based on values from automotive industry.
  production volume 13500 kg
- aluminium scrap, new: -0.00971046, -0.0726477 kg (2 entries); lognormal variance with pedigree 0.0138, pedigree (2,4,3,4,3)
  Production scrap. Own estimate, based on values from automotive industry.
  production volume 371328 kg

## Sampling procedure
Direct inspection of a typical device of common technology.

## Extrapolations
The inspected device represents a typical technology which is believed to be representative up to 2015.

## Review by Christian Bauer 2012-05-25
passed
