# treatment of hard coal ash, sanitary landfill

Dataset: EcoSpold 2, unit process
Geography: CH
Time period: 1994-01-01 to 2019-12-31
Technology level: outdated
Classification: EcoSpold01Categories: waste management/sanitary landfill
Classification: ISIC rev.4 ecoinvent: 3821:Treatment and disposal of non-hazardous waste
Tags: Treatment; ConvertedDataset
Scenario: Business-as-Usual
System model: Allocation at the point of substitution
Generated by: Gabor Doka (obsolete)
Published in: Doka G. 2007
Database: ecoinvent
isCopyrightProtected: true
accessRestrictedTo: 1

## General comment
Inventoried waste contains 100% hard coal ash small scale; .
waste composition (wet, in ppm): upper heating value 0.4712 MJ/kg; H2O n.a.; O 298030; H n.a.; C 100000; S n.a.; N n.a.; P 980; B 350; Cl n.a.; Br 97; F n.a.; I 16.4; Ag n.a.; As 92; Ba 1960; Cd 4.5; Co 49; Cr 192; Cu 146.25; Hg 0.1; Mn 693; Mo 28.5; Ni 194; Pb 376; Sb 9.5; Se 7; Sn 19.8; V 388; Zn 475; Be 19.6; Sc 39.6; Sr 1940; Ti 5880; Tl 9.5; W n.a.; Si 245000; Fe 68600; Ca 19600; Al 166600; K 19600; Mg 58800; Na 9800;
Share of carbon in waste that is biogenic 0%.
Overall degradability of waste during 100 years: 5%.
[This dataset was already contained in the ecoinvent database version 2. It was not individually updated during the transfer to ecoinvent version 3. Life Cycle Impact Assessment results may still have changed, as they are affected by changes in the supply chain, i.e. in other datasets. This dataset was generated following the ecoinvent quality guidelines for version 2. It may have been subject to central changes described in the ecoinvent version 3 change report (http://www.ecoinvent.org/database/ecoinvent-version-3/reports-of-changes/), and the results of the central updates were reviewed extensively. The changes added e.g. consistent water flows and other information throughout the database. The documentation of this dataset can be found in the ecoinvent reports of version 2, which are still available via the ecoinvent website. The change report linked above covers all central changes that were made during the conversion process.]

## Included activities end
Waste-specific short-term emissions to air via landfill gas incineration and landfill leachate. Burdens from treatment of short-term leachate (0-100a) in wastewater treatment plant (including WWTP sludge disposal in municipal incinerator). Long-term emissions from landfill to groundwater (after base lining failure).

## Geography
Technology encountered in Switzerland in 2000. Landfill includes base seal, leachate collection system, treatment of leachate in municipal wastewater treatment plant.

## Technology
Swiss municipal sanitary landfill for biogenic or untreated municipal waste ('reactive organic landfill'). Landfill gas and leachate collection system. Recultivation and monitoring for 150 years after closure.

## Reference product
- hard coal ash: -1 kg; CPC 39: Wastes or scraps; By-product classification Waste
  production volume 0 kg
    Outdated
  property price 0 EUR2005
    Waste products are assigned a price of zero as they are assumed to require further treatment.
  property carbon content 0.1
    carbon content on a dry matter basis (reserved; not for manual entry)
  properties: carbon content, fossil 0.1, water in wet mass 0 kg, wet mass 1 kg, carbon content, non-fossil 0, water content 0, dry mass 1 kg, carbon allocation 0.1 kg

## By-products
- electricity, for reuse in municipal waste incineration only: 0 kWh; CPC 17100: Electrical energy; By-product classification allocatable product; pedigree (1,1,1,1,1)
  Net electricity generated from this waste and used in internal MSWI plant energy redistribution.
  Uncertainty: uncertainty is calculated from uncertainties in waste composition and uncertainties in energy efficiency and the uncertainty in internal energy demand
  property exergy 3.6 MJ; name E_el_prod_MSWI_exergy
  property true value relation 3.6; name E_el_prod_MSWI_true_value_relation
  property price 0.1 EUR2005; name E_el_prod_MSWI_price_EUR2005
- heat, for reuse in municipal waste incineration only: 0 MJ; CPC 17300: Steam and hot water; By-product classification allocatable product; pedigree (1,1,1,1,1)
  Net useful heat generated from this waste and used in internal MSWI plant energy redistribution.
  Uncertainty: uncertainty is calculated from uncertainties in waste composition and uncertainties in energy efficiency and the uncertainty in internal energy demand
  property exergy 0.1842 MJ; name E_th_prod_MSWI_exergy
  property true value relation 0.1842; name E_th_prod_MSWI_true_value_relation
  property price 0.0106 EUR2005; name E_th_prod_MSWI_price_EUR2005
- zinc concentrate: 0 kg; CPC 14290: Other non-ferrous metal ores and concentrates (other than uranium or thorium ores and concentrates); By-product classification allocatable product
  Calculated value from the knowledge of the properties of both products.
  property price 0.38 EUR2005; name ByP_price_EUR2005
    Temporary price data. Calculated as 90% of purchasers price based on: Zinc content in concentrate 53%. Concentrate price per kg Zn 86.5% of refined Zn price (13.5% treatment charges according to CHR Metals Limited 2005: Dynamic cost curves. http://www.minecost.com/dynamic.pdf). 2004 zinc price from USGS (2007) Mineral commodity summaries 2007. <http://minerals.usgs.gov/minerals/pubs/mcs/2007/mcs2007.pdf> [Accessed 25 May 2010]
  property zinc content 0.53; name zinc_C_zinc_concentrate
    Zinc content on a dry matter basis. Value taken from teh "zinc mine operation" /GLO dataset.
  property dry mass 1 kg; name DM_zinc_concentrate
  property carbon content 0
    carbon content on a dry matter basis (reserved; not for manual entry)
  properties: wet mass 1 kg, water content 0, carbon content, non-fossil 0, carbon content, fossil 0, water in wet mass 0 kg, carbon allocation 0 kg

## Inputs from technosphere
- municipal waste incineration facility: 1.01e-12 unit; lognormal variance with pedigree 0.23, pedigree (1,1,5,1,1)
  Burden from incineration of sludge from wastewater treatment of the short-term leachate (0-100a).
  Burden from incineration of sludge from wastewater treatment of the short-term leachate (0-100a).
- electricity, low voltage: 0.000779 kWh; lognormal variance with pedigree 0.34, pedigree (5,5,5,5,5)
  burden from wastewater treatment of the short-term leachate (0-100a). Uncertainty calculated from unertainty of the waste composition of this waste, uncertainty in waste decomposition and short-term leaching in sanitary landfill
- sanitary landfill facility: 5.56e-10 unit; lognormal variance with pedigree 0.04, pedigree (1,1,5,1,1)
  demands per kilogram waste. uncertainty is heeded in the module
  This exchange has an activity link directly to the producing activity because the product is primarily consumed in the same geographical area where it is produced.
- cement, unspecified: 0.000128 kg; lognormal variance with pedigree 0.26, pedigree (1,1,5,1,1)
  burden from incineration of sludge from wastewater treatment of the short-term leachate (0-100a). uncertainty is calculated from uncertainties in waste composition and transfer coefficients in incinerator and uncertainty of waste decomposition and short-term leaching in sanitary landfill
  properties: dry mass 1 kg, wet mass 1 kg
- sodium hydroxide, without water, in 50% solution state: 4.36e-9 kg; lognormal variance with pedigree 1.27, pedigree (1,1,5,1,1)
  (same comment as for cement, unspecified)
  properties: wet mass 1 kg, dry mass 1 kg
- chemical, organic: 6.13e-8 kg; lognormal variance with pedigree 1.79, pedigree (1,1,5,1,1)
  (same comment as for cement, unspecified)
  properties: dry mass 1 kg, carbon content, fossil 0.628, wet mass 1 kg
  note on carbon content, fossil: Tab A.9, ecoinvent report 13_I: 0.1 kg C/kg hard coal ash This dataset is an unweighted average of 20 organic substances (listed in Tab 88.1, ecoinvent v2.2 report 8, part II), being part of the top100 chemicals included in this database. The C-content has also been calculated as an unweighted average of the C content of the substances composing this dataset.
- process-specific burdens, sanitary landfill: 1 kg; lognormal variance with pedigree 0.04, pedigree (1,1,5,1,1)
  demands per kilogram waste. uncertainty is heeded in the module;activityLink introduced to establish a direct link to the corresponding regional supply of this product
- chemical, inorganic: 6.29e-8 kg; lognormal variance with pedigree 0.85, pedigree (1,1,5,1,1)
  (same comment as for cement, unspecified)
  properties: wet mass 1 kg, dry mass 1 kg, carbon content, fossil 0.003
  note on carbon content, fossil: Tab A.9, ecoinvent report 13_I: 0.1 kg C/kg hard coal ash This dataset is an unweighted average of 20 inorganic substances (listed in Tab 88.1, ecoinvent v2.2 report 8, part II), being part of the top100 chemicals included in this database. The C-content has also been calculated as an unweighted average of the C content of the substances composing this dataset.
- hydrochloric acid, without water, in 30% solution state: 3.78e-8 kg; lognormal variance with pedigree 0.85, pedigree (1,1,5,1,1)
  (same comment as for cement, unspecified)
  properties: dry mass 1 kg, wet mass 1 kg
- heat, district or industrial, natural gas: 0.0018432 MJ; lognormal variance with pedigree 0.38, pedigree (5,5,5,5,5)
  (same comment as for electricity, low voltage)
- iron (III) chloride, without water, in 40% solution state: 1.8e-5 kg; lognormal variance with pedigree 1.22, pedigree (1,1,5,1,1)
  (same comment as for cement, unspecified)
  properties: wet mass 1 kg, dry mass 1 kg
- process-specific burdens, municipal waste incineration: 0.00402 kg; lognormal variance with pedigree 0.23, pedigree (1,1,5,1,1)
  Burden from incineration of sludge from wastewater treatment of the short-term leachate (0-100a).
  Burden from incineration of sludge from wastewater treatment of the short-term leachate (0-100a).;activityLink introduced to establish a direct link to the corresponding regional supply of this product
- sewer grid, 5E9l/year, 110 km: 5.45e-10 km; lognormal variance with pedigree 0.2106, pedigree (5,5,5,5,5)
  (same comment as for electricity, low voltage)
- heat, for reuse in municipal waste incineration only: 0.00337 MJ; name E_th_prod_MSWI; lognormal variance with pedigree 0.23, pedigree (1,1,5,1,1)
  (same comment as for cement, unspecified)
- wastewater treatment facility, capacity 5E9l/year: 1.42e-11 unit; lognormal variance with pedigree 0.2106, pedigree (5,5,5,5,5)
  (same comment as for electricity, low voltage)
- electricity, for reuse in municipal waste incineration only: 0.000578 kWh; name E_el_prod_MSWI; lognormal variance with pedigree 0.43, pedigree (1,1,5,1,1)
  (same comment as for cement, unspecified)
- residual material landfill: 6.66e-13 unit; lognormal variance with pedigree 0.26, pedigree (1,1,5,1,1)
  (same comment as for cement, unspecified)
- waste cement, hydrated: -0.00032 kg; lognormal variance with pedigree 0.26, pedigree (1,1,5,1,1)
  (same comment as for cement, unspecified)
  production volume 0 kg
    Calculated from the production volume of hard coal ash, 0% water in proportion to the respective output amounts.
  properties: wet mass 1 kg, dry mass 1 kg
- process-specific burdens, slag landfill: 0.00229 kg; lognormal variance with pedigree 0.29, pedigree (1,1,5,1,1)
  burden from incineration of sludge from wastewater treatment of the short-term leachate (0-100a). uncertainty is calculated from uncertainties in waste composition and transfer coefficients in incinerator and uncertainty of waste decomposition and short-term leaching in sanitary landfill;activityLink introduced to establish a direct link to the corresponding regional supply of this product
- waste graphical paper: -3.88e-5 kg; lognormal variance with pedigree 0.2106, pedigree (5,5,5,5,5)
  (same comment as for electricity, low voltage)
  production volume 0 kg
    (same comment as for waste cement, hydrated)
  properties: water content 0.126126, wet mass 1 kg, dry mass 0.888 kg, carbon content, non-fossil 0.454955
- process-specific burdens, residual material landfill: 0.00032 kg; lognormal variance with pedigree 0.26, pedigree (1,1,5,1,1)
  (same comment as for process-specific burdens, slag landfill)
- aluminium sulfate, powder: 3.51e-6 kg; lognormal variance with pedigree 1.35, pedigree (5,5,5,5,5)
  (same comment as for electricity, low voltage)
  properties: dry mass 1 kg, wet mass 1 kg
- heat, central or small-scale, other than natural gas: 0.0013348 MJ; lognormal variance with pedigree 0.38, pedigree (5,5,5,5,5)
  (same comment as for electricity, low voltage)
- waste plastic, mixture: -3.88e-5 kg; lognormal variance with pedigree 0.2106, pedigree (5,5,5,5,5)
  (same comment as for electricity, low voltage)
  production volume 0 kg
    (same comment as for waste cement, hydrated)
  properties: carbon content, fossil 0.747344, dry mass 0.847 kg, water content 0.180638, wet mass 1 kg
  note on carbon content, fossil: Tab A.9, ecoinvent report 13_I: 0.1 kg C/kg hard coal ash C content in 1 kg DM was calculated using data in Tab A.2, ecoinvent v2.2 report 13_I
- quicklime, milled, packed: 7.9e-10 kg; lognormal variance with pedigree 1.27, pedigree (1,1,5,1,1)
  (same comment as for cement, unspecified)
  properties: wet mass 1 kg, dry mass 0.99 kg, water content 0.010101
- iron sulfate: 1.3e-5 kg; lognormal variance with pedigree 1.35, pedigree (5,5,5,5,5)
  (same comment as for electricity, low voltage)
  properties: dry mass 1 kg, wet mass 1 kg
- slag landfill: 4.07e-12 unit; lognormal variance with pedigree 0.29, pedigree (1,1,5,1,1)
  (same comment as for cement, unspecified)

## Emissions to nature
- Aluminium [water, surface water]: 2.5e-5 kg; lognormal variance with pedigree 0.66, pedigree (1,1,5,1,1)
  Emissions from short-term leachate treatment and incineration of resulting sludge. Uncertainty calculated depending on waste input and uncertainty of transfer coefficents in landfill, wastewater treatment and incineration model.
- Potassium, ion [water, ground-, long-term]: 0.0189 kg; lognormal variance with pedigree 0.33, pedigree (1,1,5,1,1)
  Emissions from long-term leachate (>100a) directly from MSW landfill and indirectly via incineration of treatement sludge from leachate treatement. Uncertainty calculated depending on waste input and uncertainty of long-term transfer coefficents in landfill.
- Thallium [water, ground-, long-term]: 9.48e-6 kg; lognormal variance with pedigree 1.31, pedigree (1,1,5,1,1)
  (same comment as for Potassium, ion)
- Zinc [air, non-urban air or from high stacks]: 2.5e-10 kg; lognormal variance with pedigree 2.44, pedigree (1,1,5,1,1)
  burden from direct release or incineration of landfill biogas. Uncertainty calculated from unertainty of the waste composition of this waste, uncertainty in waste decomposition and short-term leaching in sanitary landfill
- Strontium [water, surface water]: 2.86e-6 kg; lognormal variance with pedigree 1.13, pedigree (1,1,5,1,1)
  (same comment as for Aluminium)
- Methane, fossil [air, non-urban air or from high stacks]: 0.00192 kg; lognormal variance with pedigree 0.39, pedigree (1,1,5,1,1)
  (same comment as for Zinc)
- Barium [water, surface water]: 6.75e-6 kg; lognormal variance with pedigree 0.81, pedigree (1,1,5,1,1)
  (same comment as for Aluminium)
- BOD5, Biological Oxygen Demand [water, surface water]: 2.89e-5 kg; lognormal variance with pedigree 0.77, pedigree (1,1,5,1,1)
  (same comment as for Aluminium)
- Chromium, ion [water, surface water]: 1.72e-10 kg; lognormal variance with pedigree 1.67, pedigree (1,1,5,1,1)
  (same comment as for Aluminium)
- Thallium [water, surface water]: 1.4e-8 kg; lognormal variance with pedigree 1.84, pedigree (1,1,5,1,1)
  (same comment as for Aluminium)
- Sodium, ion [water, surface water]: 0.00203 kg; lognormal variance with pedigree 0.47, pedigree (1,1,5,1,1)
  Emissions from short-term leachate treatment. Uncertainty calculated depending on waste input and uncertainty of transfer coefficents in landfill and wastewater treatment.
- Barium [air, urban air close to ground]: 1.06e-7 kg; lognormal variance with pedigree 0.82, pedigree (1,1,5,1,1)
  (same comment as for Aluminium)
- TOC, Total Organic Carbon [water, surface water]: 2.32e-5 kg; lognormal variance with pedigree 0.77, pedigree (1,1,5,1,1)
  (same comment as for Aluminium)
- Vanadium, ion [water, ground-, long-term]: 0.000113 kg; lognormal variance with pedigree 1.2, pedigree (1,1,5,1,1)
  (same comment as for Potassium, ion)
- Strontium [water, ground-, long-term]: 0.00194 kg; lognormal variance with pedigree 0.61, pedigree (1,1,5,1,1)
  (same comment as for Potassium, ion)
- Phosphate [water, surface water]: 2.96e-6 kg; lognormal variance with pedigree 1.22, pedigree (1,1,5,1,1)
  (same comment as for Aluminium)
- Carbon monoxide, fossil [air, urban air close to ground]: 1.15e-6 kg; lognormal variance with pedigree 0.43, pedigree (1,1,5,1,1)
  (same comment as for Aluminium)
- Cadmium [air, non-urban air or from high stacks]: 2.64e-10 kg; lognormal variance with pedigree 2.44, pedigree (1,1,5,1,1)
  (same comment as for Zinc)
- Vanadium [air, non-urban air or from high stacks]: 5.11e-10 kg; lognormal variance with pedigree 2.34, pedigree (1,1,5,1,1)
  (same comment as for Zinc)
- Molybdenum [air, non-urban air or from high stacks]: 3.76e-11 kg; lognormal variance with pedigree 2.69, pedigree (1,1,5,1,1)
  (same comment as for Zinc)
- COD, Chemical Oxygen Demand [water, ground-, long-term]: 0.0266 kg; lognormal variance with pedigree 0.65, pedigree (1,1,5,1,1)
  (same comment as for Potassium, ion)
- Cadmium [air, urban air close to ground]: 1.08e-12 kg; lognormal variance with pedigree 1.85, pedigree (1,1,5,1,1)
  (same comment as for Aluminium)
- Iron, ion [water, surface water]: 2.39e-5 kg; lognormal variance with pedigree 0.9, pedigree (1,1,5,1,1)
  (same comment as for Aluminium)
- Calcium, ion [water, surface water]: 0.000115 kg; lognormal variance with pedigree 0.74, pedigree (1,1,5,1,1)
  (same comment as for Aluminium)
- Arsenic, ion [water, ground-, long-term]: 9.13e-5 kg; lognormal variance with pedigree 1.01, pedigree (1,1,5,1,1)
  (same comment as for Potassium, ion)
- Arsenic [air, non-urban air or from high stacks]: 1.16e-8 kg; lognormal variance with pedigree 1.94, pedigree (1,1,5,1,1)
  (same comment as for Zinc)
- Magnesium [air, non-urban air or from high stacks]: 4.54e-7 kg; lognormal variance with pedigree 1.51, pedigree (1,1,5,1,1)
  (same comment as for Zinc)
- Molybdenum [water, surface water]: 8.89e-8 kg; lognormal variance with pedigree 1.61, pedigree (1,1,5,1,1)
  (same comment as for Aluminium)
- Scandium [air, non-urban air or from high stacks]: 4.46e-11 kg; lognormal variance with pedigree 2.67, pedigree (1,1,5,1,1)
  (same comment as for Zinc)
- Iron [air, urban air close to ground]: 1.14e-9 kg; lognormal variance with pedigree 0.7, pedigree (1,1,5,1,1)
  (same comment as for Aluminium)
- Copper, ion [water, ground-, long-term]: 0.000146 kg; lognormal variance with pedigree 0.95, pedigree (1,1,5,1,1)
  (same comment as for Potassium, ion)
- TOC, Total Organic Carbon [water, ground-, long-term]: 0.0244 kg; lognormal variance with pedigree 0.65, pedigree (1,1,5,1,1)
  (same comment as for Potassium, ion)
- Antimony [air, urban air close to ground]: 2.47e-12 kg; lognormal variance with pedigree 2.4, pedigree (1,1,5,1,1)
  (same comment as for Aluminium)
- Beryllium [water, surface water]: 2.89e-8 kg; lognormal variance with pedigree 1.73, pedigree (1,1,5,1,1)
  (same comment as for Aluminium)
- Boron [water, ground-, long-term]: 0.00027 kg; lognormal variance with pedigree 0.7, pedigree (1,1,5,1,1)
  (same comment as for Potassium, ion)
- Cobalt [air, non-urban air or from high stacks]: 1.97e-10 kg; lognormal variance with pedigree 2.48, pedigree (1,1,5,1,1)
  (same comment as for Zinc)
- Carbon monoxide, fossil [air, non-urban air or from high stacks]: 7.1e-7 kg; lognormal variance with pedigree 1, pedigree (1,1,5,1,1)
  (same comment as for Zinc)
- Thallium [air, urban air close to ground]: 1.36e-11 kg; lognormal variance with pedigree 1.87, pedigree (1,1,5,1,1)
  (same comment as for Aluminium)
- Tin [air, non-urban air or from high stacks]: 1.46e-12 kg; lognormal variance with pedigree 3.11, pedigree (1,1,5,1,1)
  (same comment as for Zinc)
- Potassium, ion [water, surface water]: 0.000717 kg; lognormal variance with pedigree 0.55, pedigree (1,1,5,1,1)
  (same comment as for Sodium, ion)
- Iron [air, non-urban air or from high stacks]: 1.18e-8 kg; lognormal variance with pedigree 1.98, pedigree (1,1,5,1,1)
  (same comment as for Zinc)
- Phosphorus [air, urban air close to ground]: 1.74e-9 kg; lognormal variance with pedigree 1.26, pedigree (1,1,5,1,1)
  (same comment as for Aluminium)
- Nickel [air, urban air close to ground]: 9.58e-15 kg; lognormal variance with pedigree 1.55, pedigree (1,1,5,1,1)
  (same comment as for Aluminium)
- Calcium [air, non-urban air or from high stacks]: 3.19e-8 kg; lognormal variance with pedigree 1.83, pedigree (1,1,5,1,1)
  (same comment as for Zinc)
- Manganese [water, ground-, long-term]: 0.000656 kg; lognormal variance with pedigree 0.72, pedigree (1,1,5,1,1)
  (same comment as for Potassium, ion)
- Titanium [air, urban air close to ground]: 7.24e-9 kg; lognormal variance with pedigree 1.05, pedigree (1,1,5,1,1)
  (same comment as for Aluminium)
- Zinc, ion [water, surface water]: 3.48e-7 kg; lognormal variance with pedigree 1.34, pedigree (1,1,5,1,1)
  (same comment as for Aluminium)
- Mercury [water, surface water]: 1.08e-10 kg; lognormal variance with pedigree 2.4, pedigree (1,1,5,1,1)
  (same comment as for Aluminium)
- COD, Chemical Oxygen Demand [water, surface water]: 9.18e-5 kg; lognormal variance with pedigree 0.77, pedigree (1,1,5,1,1)
  (same comment as for Aluminium)
- Calcium [air, urban air close to ground]: 2.09e-8 kg; lognormal variance with pedigree 0.78, pedigree (1,1,5,1,1)
  (same comment as for Aluminium)
- Nickel, ion [water, ground-, long-term]: 0.000194 kg; lognormal variance with pedigree 0.91, pedigree (1,1,5,1,1)
  (same comment as for Potassium, ion)
- Manganese [water, surface water]: 2.01e-5 kg; lognormal variance with pedigree 0.92, pedigree (1,1,5,1,1)
  (same comment as for Aluminium)
- Iron, ion [water, ground-, long-term]: 0.00482 kg; lognormal variance with pedigree 1.96, pedigree (1,1,5,1,1)
  (same comment as for Potassium, ion)
- Chromium VI [water, surface water]: 5.73e-8 kg; lognormal variance with pedigree 1.64, pedigree (1,1,5,1,1)
  (same comment as for Aluminium)
- Selenium [water, ground-, long-term]: 1.98e-6 kg; lognormal variance with pedigree 1.74, pedigree (1,1,5,1,1)
  (same comment as for Potassium, ion)
- Copper [air, urban air close to ground]: 1.96e-13 kg; lognormal variance with pedigree 1.86, pedigree (1,1,5,1,1)
  (same comment as for Aluminium)
- Magnesium [water, surface water]: 0.00164 kg; lognormal variance with pedigree 0.45, pedigree (1,1,5,1,1)
  (same comment as for Aluminium)
- Beryllium [air, urban air close to ground]: 2.81e-11 kg; lognormal variance with pedigree 1.77, pedigree (1,1,5,1,1)
  (same comment as for Aluminium)
- Sulfate [water, surface water]: 1.12e-5 kg; lognormal variance with pedigree 1.24, pedigree (1,1,5,1,1)
  (same comment as for Sodium, ion)
- Iodine [air, non-urban air or from high stacks]: 2.89e-8 kg; lognormal variance with pedigree 1.82, pedigree (1,1,5,1,1)
  (same comment as for Zinc)
- Carbon dioxide, fossil [air, urban air close to ground]: 0.000418 kg; lognormal variance with pedigree 0.77, pedigree (1,1,5,1,1)
  (same comment as for Aluminium)
- Scandium [water, surface water]: 9.58e-8 kg; lognormal variance with pedigree 1.59, pedigree (1,1,5,1,1)
  (same comment as for Aluminium)
- Cadmium, ion [water, ground-, long-term]: 4.46e-6 kg; lognormal variance with pedigree 1.41, pedigree (1,1,5,1,1)
  (same comment as for Potassium, ion)
- Scandium [water, ground-, long-term]: 3.95e-5 kg; lognormal variance with pedigree 1.12, pedigree (1,1,5,1,1)
  (same comment as for Potassium, ion)
- Selenium [water, surface water]: 2.47e-8 kg; lognormal variance with pedigree 1.8, pedigree (1,1,5,1,1)
  (same comment as for Aluminium)
- Mercury [air, non-urban air or from high stacks]: 1.37e-10 kg; lognormal variance with pedigree 2.52, pedigree (1,1,5,1,1)
  (same comment as for Zinc)
- Phosphate [water, ground-, long-term]: 2.05e-5 kg; lognormal variance with pedigree 6.94, pedigree (1,1,5,1,1)
  (same comment as for Potassium, ion)
- Lead [air, non-urban air or from high stacks]: 3.69e-11 kg; lognormal variance with pedigree 2.68, pedigree (1,1,5,1,1)
  (same comment as for Zinc)
- Arsenic [air, urban air close to ground]: 2.33e-10 kg; lognormal variance with pedigree 1.43, pedigree (1,1,5,1,1)
  (same comment as for Aluminium)
- Cobalt [water, surface water]: 4e-7 kg; lognormal variance with pedigree 1.41, pedigree (1,1,5,1,1)
  (same comment as for Aluminium)
- Bromine [water, surface water]: 1.22e-5 kg; lognormal variance with pedigree 1.11, pedigree (1,1,5,1,1)
  (same comment as for Sodium, ion)
- DOC, Dissolved Organic Carbon [water, ground-, long-term]: 0.0244 kg; lognormal variance with pedigree 0.65, pedigree (1,1,5,1,1)
  (same comment as for Potassium, ion)
- Silicon [water, ground-, long-term]: 0.00473 kg; lognormal variance with pedigree 3.97, pedigree (1,1,5,1,1)
  (same comment as for Potassium, ion)
- Thallium [air, non-urban air or from high stacks]: 6.9e-12 kg; lognormal variance with pedigree 2.91, pedigree (1,1,5,1,1)
  (same comment as for Zinc)
- Manganese [air, urban air close to ground]: 1.06e-13 kg; lognormal variance with pedigree 1.06, pedigree (1,1,5,1,1)
  (same comment as for Aluminium)
- Molybdenum [air, urban air close to ground]: 1.48e-10 kg; lognormal variance with pedigree 1.64, pedigree (1,1,5,1,1)
  (same comment as for Aluminium)
- Bromine [water, ground-, long-term]: 8.46e-5 kg; lognormal variance with pedigree 1.01, pedigree (1,1,5,1,1)
  (same comment as for Potassium, ion)
- Lead [air, urban air close to ground]: 3.66e-12 kg; lognormal variance with pedigree 1.7, pedigree (1,1,5,1,1)
  (same comment as for Aluminium)
- Silicon [water, surface water]: 3.68e-5 kg; lognormal variance with pedigree 0.65, pedigree (1,1,5,1,1)
  (same comment as for Aluminium)
- Vanadium, ion [water, surface water]: 1.04e-6 kg; lognormal variance with pedigree 1.27, pedigree (1,1,5,1,1)
  (same comment as for Aluminium)
- Chloride [water, surface water]: 1.16e-5 kg; lognormal variance with pedigree 1.24, pedigree (1,1,5,1,1)
  (same comment as for Sodium, ion)
- Mercury [air, urban air close to ground]: 0 kg; pedigree (1,1,1,1,1)
  (same comment as for Aluminium)
- Antimony [air, non-urban air or from high stacks]: 1.25e-11 kg; lognormal variance with pedigree 2.84, pedigree (1,1,5,1,1)
  (same comment as for Zinc)
- Lead [water, surface water]: 1.22e-8 kg; lognormal variance with pedigree 1.64, pedigree (1,1,5,1,1)
  (same comment as for Aluminium)
- Zinc, ion [water, ground-, long-term]: 0.000391 kg; lognormal variance with pedigree 0.8, pedigree (1,1,5,1,1)
  (same comment as for Potassium, ion)
- Manganese [air, non-urban air or from high stacks]: 9.92e-9 kg; lognormal variance with pedigree 1.96, pedigree (1,1,5,1,1)
  (same comment as for Zinc)
- Tin, ion [water, surface water]: 2.44e-9 kg; lognormal variance with pedigree 2.03, pedigree (1,1,5,1,1)
  (same comment as for Aluminium)
- Zinc [air, urban air close to ground]: 1.27e-11 kg; lognormal variance with pedigree 1.4, pedigree (1,1,5,1,1)
  (same comment as for Aluminium)
- Nickel [air, non-urban air or from high stacks]: 1.41e-10 kg; lognormal variance with pedigree 2.52, pedigree (1,1,5,1,1)
  (same comment as for Zinc)
- Cobalt [water, ground-, long-term]: 4.86e-5 kg; lognormal variance with pedigree 1.09, pedigree (1,1,5,1,1)
  (same comment as for Potassium, ion)
- Chromium VI [water, ground-, long-term]: 8.75e-7 kg; lognormal variance with pedigree 8.2, pedigree (1,1,5,1,1)
  (same comment as for Potassium, ion)
- Magnesium [water, ground-, long-term]: 0.0571 kg; lognormal variance with pedigree 0.21, pedigree (1,1,5,1,1)
  (same comment as for Potassium, ion)
- Strontium [air, urban air close to ground]: 2.78e-10 kg; lognormal variance with pedigree 1.18, pedigree (1,1,5,1,1)
  (same comment as for Aluminium)
- Antimony [water, ground-, long-term]: 9.64e-7 kg; lognormal variance with pedigree 2.62, pedigree (1,1,5,1,1)
  (same comment as for Potassium, ion)
- Lead [water, ground-, long-term]: 0.000376 kg; lognormal variance with pedigree 0.83, pedigree (1,1,5,1,1)
  (same comment as for Potassium, ion)
- Molybdenum [water, ground-, long-term]: 1.13e-5 kg; lognormal variance with pedigree 1.38, pedigree (1,1,5,1,1)
  (same comment as for Potassium, ion)
- BOD5, Biological Oxygen Demand [water, ground-, long-term]: 0.00631 kg; lognormal variance with pedigree 0.65, pedigree (1,1,5,1,1)
  (same comment as for Potassium, ion)
- Sodium, ion [water, ground-, long-term]: 0.00777 kg; lognormal variance with pedigree 0.41, pedigree (1,1,5,1,1)
  (same comment as for Potassium, ion)
- Tin [air, urban air close to ground]: 4.5e-12 kg; lognormal variance with pedigree 2.07, pedigree (1,1,5,1,1)
  (same comment as for Aluminium)
- NMVOC, non-methane volatile organic compounds, unspecified origin [air, urban air close to ground]: 3.72e-9 kg; lognormal variance with pedigree 0.94, pedigree (1,1,5,1,1)
  (same comment as for Aluminium)
- Barium [water, ground-, long-term]: 0.00194 kg; lognormal variance with pedigree 0.57, pedigree (1,1,5,1,1)
  (same comment as for Potassium, ion)
- Scandium [air, urban air close to ground]: 4.39e-11 kg; lognormal variance with pedigree 1.63, pedigree (1,1,5,1,1)
  (same comment as for Aluminium)
- Copper [air, non-urban air or from high stacks]: 1.02e-11 kg; lognormal variance with pedigree 2.85, pedigree (1,1,5,1,1)
  (same comment as for Zinc)
- Boron [water, surface water]: 6.88e-5 kg; lognormal variance with pedigree 0.87, pedigree (1,1,5,1,1)
  (same comment as for Aluminium)
- Silicon [air, urban air close to ground]: 1.34e-6 kg; lognormal variance with pedigree 0.66, pedigree (1,1,5,1,1)
  (same comment as for Aluminium)
- Methane, fossil [air, urban air close to ground]: 8.44e-7 kg; lognormal variance with pedigree 0.79, pedigree (1,1,5,1,1)
  (same comment as for Aluminium)
- Particulates, < 2.5 um [air, non-urban air or from high stacks]: 2.38e-7 kg; lognormal variance with pedigree 0.66, pedigree (1,1,5,1,1)
  (same comment as for Zinc)
- Antimony [water, surface water]: 3.4e-8 kg; lognormal variance with pedigree 1.76, pedigree (1,1,5,1,1)
  (same comment as for Aluminium)
- Silicon [air, non-urban air or from high stacks]: 1.53e-7 kg; lognormal variance with pedigree 1.71, pedigree (1,1,5,1,1)
  (same comment as for Zinc)
- Calcium, ion [water, ground-, long-term]: 0.0195 kg; lognormal variance with pedigree 0.33, pedigree (1,1,5,1,1)
  (same comment as for Potassium, ion)
- Cadmium, ion [water, surface water]: 2.01e-8 kg; lognormal variance with pedigree 1.79, pedigree (1,1,5,1,1)
  (same comment as for Aluminium)
- DOC, Dissolved Organic Carbon [water, surface water]: 2.23e-5 kg; lognormal variance with pedigree 0.77, pedigree (1,1,5,1,1)
  (same comment as for Aluminium)
- Nickel, ion [water, surface water]: 3.42e-7 kg; lognormal variance with pedigree 1.43, pedigree (1,1,5,1,1)
  (same comment as for Aluminium)
- Titanium, ion [water, ground-, long-term]: 0.00587 kg; lognormal variance with pedigree 0.47, pedigree (1,1,5,1,1)
  (same comment as for Potassium, ion)
- Magnesium [air, urban air close to ground]: 2.45e-7 kg; lognormal variance with pedigree 0.48, pedigree (1,1,5,1,1)
  (same comment as for Aluminium)
- Beryllium [water, ground-, long-term]: 1.96e-5 kg; lognormal variance with pedigree 1.22, pedigree (1,1,5,1,1)
  (same comment as for Potassium, ion)
- Mercury [water, ground-, long-term]: 9.95e-8 kg; lognormal variance with pedigree 1.9, pedigree (1,1,5,1,1)
  (same comment as for Potassium, ion)
- Chromium [air, non-urban air or from high stacks]: 2.74e-11 kg; lognormal variance with pedigree 2.72, pedigree (1,1,5,1,1)
  (same comment as for Zinc)
- Copper, ion [water, surface water]: 9.29e-9 kg; lognormal variance with pedigree 1.79, pedigree (1,1,5,1,1)
  (same comment as for Aluminium)
- Potassium [air, non-urban air or from high stacks]: 1.79e-7 kg; lognormal variance with pedigree 1.6, pedigree (1,1,5,1,1)
  (same comment as for Zinc)
- Chromium [air, urban air close to ground]: 3.98e-15 kg; lognormal variance with pedigree 1.75, pedigree (1,1,5,1,1)
  (same comment as for Aluminium)
- NMVOC, non-methane volatile organic compounds, unspecified origin [air, non-urban air or from high stacks]: 1.34e-8 kg; lognormal variance with pedigree 0.39, pedigree (1,1,5,1,1)
  (same comment as for Zinc)
- Strontium [air, non-urban air or from high stacks]: 1.41e-9 kg; lognormal variance with pedigree 2.22, pedigree (1,1,5,1,1)
  (same comment as for Zinc)
- Barium [air, non-urban air or from high stacks]: 2.81e-8 kg; lognormal variance with pedigree 1.82, pedigree (1,1,5,1,1)
  (same comment as for Zinc)
- Selenium [air, urban air close to ground]: 0 kg; pedigree (1,1,1,1,1)
  (same comment as for Aluminium)
- Arsenic, ion [water, surface water]: 7.28e-7 kg; lognormal variance with pedigree 1.39, pedigree (1,1,5,1,1)
  (same comment as for Aluminium)
- Bromine [air, non-urban air or from high stacks]: 1.71e-7 kg; lognormal variance with pedigree 1.58, pedigree (1,1,5,1,1)
  (same comment as for Zinc)
- Iodide [water, surface water]: 2.06e-6 kg; lognormal variance with pedigree 1.34, pedigree (1,1,5,1,1)
  (same comment as for Sodium, ion)
- Carbon dioxide, fossil [air, non-urban air or from high stacks]: 0.0125 kg; lognormal variance with pedigree 0.35, pedigree (1,1,5,1,1)
  (same comment as for Zinc)
- Tin, ion [water, ground-, long-term]: 1.98e-5 kg; lognormal variance with pedigree 1.22, pedigree (1,1,5,1,1)
  (same comment as for Potassium, ion)
- Aluminium [water, ground-, long-term]: 0.166 kg; lognormal variance with pedigree 0.12, pedigree (1,1,5,1,1)
  (same comment as for Potassium, ion)
- Aluminium [air, urban air close to ground]: 6.12e-7 kg; lognormal variance with pedigree 0.69, pedigree (1,1,5,1,1)
  (same comment as for Aluminium)
- Titanium, ion [water, surface water]: 7.46e-6 kg; lognormal variance with pedigree 1.01, pedigree (1,1,5,1,1)
  (same comment as for Aluminium)
- Iodide [water, ground-, long-term]: 1.43e-5 kg; lognormal variance with pedigree 1.24, pedigree (1,1,5,1,1)
  (same comment as for Potassium, ion)
- Vanadium [air, urban air close to ground]: 1.01e-10 kg; lognormal variance with pedigree 1.32, pedigree (1,1,5,1,1)
  (same comment as for Aluminium)
- Cobalt [air, urban air close to ground]: 1.23e-14 kg; lognormal variance with pedigree 1.53, pedigree (1,1,5,1,1)
  (same comment as for Aluminium)
- Sodium [air, non-urban air or from high stacks]: 5.07e-7 kg; lognormal variance with pedigree 1.46, pedigree (1,1,5,1,1)
  (same comment as for Zinc)
- Beryllium [air, non-urban air or from high stacks]: 1.42e-11 kg; lognormal variance with pedigree 2.82, pedigree (1,1,5,1,1)
  (same comment as for Zinc)
- Aluminium [air, non-urban air or from high stacks]: 1.04e-7 kg; lognormal variance with pedigree 1.74, pedigree (1,1,5,1,1)
  (same comment as for Zinc)
- Selenium [air, non-urban air or from high stacks]: 9.23e-12 kg; lognormal variance with pedigree 2.88, pedigree (1,1,5,1,1)
  (same comment as for Zinc)
- Boron [air, urban air close to ground]: 6.96e-6 kg; lognormal variance with pedigree 0.89, pedigree (1,1,5,1,1)
  (same comment as for Aluminium)
- Titanium [air, non-urban air or from high stacks]: 3.67e-9 kg; lognormal variance with pedigree 2.1, pedigree (1,1,5,1,1)
  (same comment as for Zinc)

## Sampling procedure
Landfill model based on observed leachate concentrations in literature. Extrapolated to 60'000 years heeding chemical characteristics. Initial waste composition from various literature sources.

## Extrapolations
This dataset has been extrapolated from year 2000 to the year of the calculation (2019). The uncertainty has been adjusted accordingly.

## Review by Emilia Moreno Ruiz 2015-10-14
PV adjusted

## Review by Niels Jungbluth 2003-07-21
Passed. Calculation for standard deviation 95 of, i.e., infrastructure,
land occupation, transport services or other services can differ from
standard Pedigree approach used in this project and figures obtained by
this procedure.
