# aluminium hydroxide factory construction

Dataset: EcoSpold 2, unit process
Geography: RoW
Time period: 2002-01-01 to 2019-12-31
Technology level: current
Classification: ISIC rev.4 ecoinvent: 4100a: Construction of factory buildings for the metal industry
Classification: EcoSpold01Categories: metals/extraction
Tags: ConvertedDataset
Scenario: Business-as-Usual
System model: Allocation at the point of substitution
Generated by: Hans-Jörg Althaus
Published in: Althaus H.-J. 2000
Database: ecoinvent
isCopyrightProtected: true
accessRestrictedTo: 1

## General comment
Medium sized plant. Output: 1'220'000 t/a, life time: 50 years
[This dataset was already contained in the ecoinvent database version 2. It was not individually updated during the transfer to ecoinvent version 3. Life Cycle Impact Assessment results may still have changed, as they are affected by changes in the supply chain, i.e. in other datasets. This dataset was generated following the ecoinvent quality guidelines for version 2. It may have been subject to central changes described in the ecoinvent version 3 change report (http://www.ecoinvent.org/database/ecoinvent-version-3/reports-of-changes/), and the results of the central updates were reviewed extensively. The changes added e.g. consistent water flows and other information throughout the database. The documentation of this dataset can be found in the ecoinvent reports of version 2, which are still available via the ecoinvent website. The change report linked above covers all central changes that were made during the conversion process.]

## Included activities end
Part of the Al2O3 plant needed for Al(OH)3 fabrication including port, storage and process infrastructure. Also includes Building for administration. Includes disposal.

## Geography
Some Swiss datasets are used for European processes.

## Technology
Technology of one medium sized plant in Germany

## Reference product
- aluminium hydroxide factory: 1 unit; By-product classification allocatable product; CPC 53269: Other constructions for manufacturing
  production volume 2.67763 unit
    This is a placeholder value that does not reflect real-world production volumes. This dataset does not currently require a real-world production volume to work in the database framework, and no actual data were collected yet. This has no negative effect on the results of the ecoinvent database.
  property price 1.34877e8 EUR2005
    Upscale from EU 27 to the world by PPP (0.8458 in 2003 and 0,8426 in 2004)
  property true value 1.34877e8
    allocation property applied in "true value" allocation // value calculated from revenue

## By-products
- heat, for reuse in municipal waste incineration only: 0 MJ; CPC 17300: Steam and hot water; By-product classification allocatable product; pedigree (1,1,1,1,1)
  Net electricity generated from this waste and used in internal MSWI plant energy redistribution.
  Uncertainty: uncertainty is calculated from uncertainties in waste composition and uncertainties in energy efficiency and the uncertainty in internal energy demand
  production volume 22.3894 MJ
  property exergy 0.1842 MJ; name E_th_prod_MSWI_exergy
    This exergy property is based on the exergy content of the product.
  property price 0.0106 EUR2005; name E_th_prod_MSWI_price_EUR2005
    Average European district heat price from Ecoheatcool and Euroheat 2005-2006, Ecoheat Work package 1: The European heat market. Final report. 10.6 EUR/GJ i s the price of district heat. http://www.solarthermalworld.org/files/Ecoheatcool%20WP1%20Web.pdf?download
  property true value relation 0.1842; name E_th_prod_MSWI_true_value_relation
    property to calculate "true value" from
  property true value 0.0490923
    allocation property applied in "true value" allocation // value calculated from true value relation
- electricity, for reuse in municipal waste incineration only: 0 kWh; CPC 17100: Electrical energy; By-product classification allocatable product; pedigree (1,1,1,1,1)
  (same comment as for heat, for reuse in municipal waste incineration only)
  production volume 3.15303 kWh
  property true value relation 3.6; name E_el_prod_MSWI_true_value_relation
    property to calculate "true value" from
  property price 0.1 EUR2005; name E_el_prod_MSWI_price_EUR2005
    Estimated to be the same price as in case of electricity, medium voltage.
  property exergy 3.6 MJ; name E_el_prod_MSWI_exergy
    This exergy property is based on the exergy content of the product.
  property true value 0.135118
    (same comment as for heat, for reuse in municipal waste incineration only)

## Inputs from technosphere
- conveyor belt: 640 m; lognormal variance with pedigree 0.346, pedigree (3,4,5,5,1)
- concrete, normal: 0 m3; pedigree (1,1,1,1,1)
  properties: wet mass 2380 kg, dry mass 2190 kg, water content 0.086758
- building, multi-storey: 25000 m3; lognormal variance with pedigree 0.346, pedigree (3,4,5,5,1)
- waste concrete, not reinforced: -220000 kg; lognormal variance with pedigree 0.346, pedigree (3,4,5,5,1)
  production volume 660000 kg
    Calculated from the production volume of aluminium hydroxide factory in proportion to the respective output amounts.
  properties: wet mass 1 kg, dry mass 1 kg
- steel, chromium steel 18/8, hot rolled: 1.87e6 kg; lognormal variance with pedigree 0.346, pedigree (3,4,5,5,1)
  properties: dry mass 1 kg, wet mass 1 kg, carbon content, fossil 0.0008
  note on carbon content, fossil: Stainless steel model is the grade 304 steel (18/8 stainless, 18% chromium 8% nickel; max. 0.08% C)
- waste reinforced concrete: -8.73e6 kg; lognormal variance with pedigree 0.346, pedigree (3,4,5,5,1)
  production volume 2.619e7 kg
    (same comment as for waste concrete, not reinforced)
  properties: dry mass 0.99418 kg, water content 0.00585407, wet mass 1 kg
- industrial machine, heavy, unspecified: 220000 kg; lognormal variance with pedigree 0.346, pedigree (3,4,5,5,1)
- steel, low-alloyed, hot rolled: 24600 kg; lognormal variance with pedigree 0.346, pedigree (3,4,5,5,1)
  properties: carbon content, fossil 0.005, wet mass 1 kg, dry mass 1 kg
  note on carbon content, fossil: Low alloyed steel composition given in Tab. 3.2 ecoinvent v2.2 report 10_partII. Steel assumed to have a C content of 0.5%
- reinforcing steel: 2.09e6 kg; lognormal variance with pedigree 0.346, pedigree (3,4,5,5,1)
  properties: carbon content, fossil 0.004, dry mass 1 kg, wet mass 1 kg
- building, hall: 5600 m2; lognormal variance with pedigree 0.346, pedigree (3,4,5,5,1)
- concrete, normal: 71.6353, 7.4643, 60.4287, 33.9912, 143.943, 4.85511, 2797.68 m3 (7 entries); lognormal variance with pedigree 0.346, pedigree (3,4,5,5,1)

## Inputs from nature
- Occupation, industrial area [natural resource, land]: 2.612e7 m2*year; lognormal variance with pedigree 0.0846, pedigree (2,4,5,5,1)
- Transformation, from unspecified [natural resource, land]: 522000 m2; lognormal variance with pedigree 0.164, pedigree (1,4,5,5,1)
- Transformation, to industrial area [natural resource, land]: 522000 m2; lognormal variance with pedigree 0.1646, pedigree (2,4,5,5,1)

## Sampling procedure
Internet search

## Extrapolations
see Geography This dataset has been copied from an original dataset covering the geography RER. The uncertainty has been adjusted accordingly.

## Review by Roland Hischier 2003-06-10
Passed.
