# sputtering, indium tin oxide, for liquid crystal display

Dataset: EcoSpold 2, unit process
Geography: RER
Time period: 2005-01-01 to 2019-12-31
Technology level: current
Classification: ISIC rev.4 ecoinvent: 2592:Treatment and coating of metals; machining
Classification: EcoSpold01Categories: electronics/module
Synonyms: Indium Zinn Oxid; Indium Tin Oxide; physical vapour deposition; TCO; Transparent and conductive Oxide Layer; TFT; PVD
Tags: ConvertedDataset
Scenario: Business-as-Usual
System model: Allocation at the point of substitution
Generated by: Mischa Classen
Published in: Hischier R. 2007
Database: ecoinvent
isCopyrightProtected: true
accessRestrictedTo: 1

## General comment
This dataset is established for the manufacturing of LCD screens. Due to a lack of structured data the inventory bases on assumptions and lab-scale technology. Direct process emissions are not known and disregarded. The dataset therefore must not be used for the direct comparison of different film deposition technologies. The functional unit of this dataset is cubic meter resulting from the sputtered area times the film thickness. Film thickness depends on display technology: STN LCD: 150nm top; 330nm bottom; 480nm total. TFT LCD: 150nm top; 50nm bottom; 200nm total. Default value: 500nm total, resulting in typical values for a 17'' monitor (893.55 cm2) of 4.5E-8 m3. 85% of the target ends up as scrap.
[This dataset was already contained in the ecoinvent database version 2. It was not individually updated during the transfer to ecoinvent version 3. Life Cycle Impact Assessment results may still have changed, as they are affected by changes in the supply chain, i.e. in other datasets. This dataset was generated following the ecoinvent quality guidelines for version 2. It may have been subject to central changes described in the ecoinvent version 3 change report (http://www.ecoinvent.org/database/ecoinvent-version-3/reports-of-changes/), and the results of the central updates were reviewed extensively. The changes added e.g. consistent water flows and other information throughout the database. The documentation of this dataset can be found in the ecoinvent reports of version 2, which are still available via the ecoinvent website. The change report linked above covers all central changes that were made during the conversion process.]

## Included activities end
Sputtering process and infrastructure, as well as the transportation of the targets. No pre and post treatment of the surfaces are considered.

## Technology
Relates to RF magentron sputtering techniquewith commercially available sputtering targets. Pre-sputtering phase and subsequent main sputtering.

## Reference product
- sputtering, indium tin oxide, for liquid crystal display: 1 m3; By-product classification allocatable product; CPC 88731: Metal treatment and coating services
  EcoSpold01Location=RER
  production volume 1.32237 m3
    This is a placeholder value that does not reflect real-world production volumes. This dataset does not currently require a real-world production volume to work in the database framework, and no actual data were collected yet. This has no negative effect on the results of the ecoinvent database. The placeholder value of this activity was scaled according to the nominal GDP of 2005 (source: United Nations, http://data.un.org/Glossary.aspx?q=GDP+%28current+US%24%29, accessed 20130726) to reflect an appropriate share of the global production volume, which is also a placeholder value.
  property price 8.17061e6 EUR2005
    Calculated based on inputs: The price of the product has been calculated as a sum of the values of the material and energy inputs for this product. This value is therefore a rough estimation. It may underestimate the real price since there are additional expenses when producing any product. These expences can include for example labour costs, treatment of waste materials and profit for the producer. Please consider carefully whether this level of data quality is acceptable for your application.

## Inputs from technosphere
- chemical factory: 588.24 kg; lognormal variance with pedigree 0.5801, pedigree (4,4,5,3,5)
  activityLink introduced to establish a direct link to the corresponding regional supply of this product
  EcoSpold01Location=RER
- electricity, medium voltage: 2.9276e7 kWh; lognormal variance with pedigree 0.2801, pedigree (4,4,5,3,5)
  EcoSpold01Location=UCTE
- sputtering target, sintered, indium tin oxide: 47733 kg; lognormal variance with pedigree 0.2801, pedigree (4,4,5,3,5)
  EcoSpold01Location=RER
  properties: wet mass 1 kg, dry mass 1 kg
- building, multi-storey: 147.06 m3; lognormal variance with pedigree 0.5801, pedigree (4,4,5,3,5)
  EcoSpold01Location=RER
  activityLink introduced to establish a direct link to the corresponding regional supply of this product

## Sampling procedure
Literature

## Extrapolations
This dataset has been extrapolated from year 2005 to the year of the calculation (2019). The uncertainty has been adjusted accordingly.

## Review by Roberto Dones 2007-08-22
Passed
