# apple production

Dataset: EcoSpold 2, unit process
Geography: CL
Time period: 2009-01-01 to 2019-12-31
Technology level: current
Classification: ISIC rev.4 ecoinvent: 0124:Growing of pome fruits and stone fruits
Tags: WFLDB
Scenario: Business-as-Usual
System model: Allocation at the point of substitution
Generated by: Hisko Baas
Published in: Nemecek T. 2015
Database: ecoinvent
isCopyrightProtected: true
accessRestrictedTo: 1

## General comment
This dataset represents the production of 1 kg of apples. The average yield from 2009 - 2012 is 43.3 t/ha. The data are representative for apple production in Chile used for the export market. Mineral NPK fertiliser input is 40-11-64 kg/ha. No organic fertilisers are applied. Total active ingredients (a.i.) applied as pesticides amount to 19.2 kg a.i./ha.
The dataset was modelled within the project 'World Food LCA database (WFLDB)'. The aim of this project was to provide inventories of a broad variety of agricultural products and processes and to cover for each product at least 50% of the global export market. The export share of apples produced in Chile amounts to 10% of the global export (tonnage exported in 2010). The production system regarded in this dataset aimed at representing apples produced in Chile for the export market.
PEF-Quality: data quality rating (DQR) = 3.0 (i.e. good quality). This dataset refers to an average situation; for specific situations exchanges might differ substantially due to site specific parameters

## Included activities start
This activity starts with the nursery producing fruit tree seedlings, i.e. grafted young trees to be planted.

## Included activities end
This activity ends with the waste treatment after the clearing of the orchard (rooting up the trees). The dataset includes all activities of a year in a year in the productive phase of the orchard including the establishment phase per year of lifetime (20 years, 1383 trees/ha planted), the clearing of the orchard including waste treatment.
The establishment phase of the orchard includes tree nursery, soil cultivation, planting trees, sowing grass, installation of trellis system (posts and wires) and irrigation. Fertiliser and pesticide use in a year of the establishment phase is assumed to be half of the amount of a year in the productive phase.
The productive phase of the orchard includes machine operations, corresponding infrastructure, fuel use and sheds. Machine operations in the productive phase are: soil cultivation (mulching, mowing), fertiliser and pesticide application, harvesting and irrigation. Further, direct field emissions and land use change are included. At the end of the productive phase the orchard is cleared by rooting up the trees.

Heavy metal uptake by the crop is considered.
The inputs of seedlings, fertilisers and pesticides as well as packaging of fertilisers and pesticides are considered.

## Technology
Conventional production

## Parameters
- heavyMetalUptakeSwitch: 1
- LUC_crop_specific: 1
  This parameter allows to switch between a 'crop specific' and a 'country specific' approach when calculating the LUC of a crop. By default, the chosen approach is 'crop specific', so the value of the parameter is 1. If you want to apply a 'country specific' approach, turn the parameter to 0.

## Reference product
- apple: 1 kg; CPC 01341: Apples; By-product classification allocatable product
  Reference flow: Yield = 43328 kg/ha
  production volume 1.54205e9 kg
    Source: FAOSTAT. Average, 2009-2012
  property price 0.38 EUR2005
    Calculated from the trade statistics for the year 2005 published by the UN (COMTRADE database, accessed 20151105) as an average of 5 biggest importers of pear in the world; DE, UK, RU, NL and FR. Comtrade cathegory: 80810: Fruit, edible; apples, fresh.
  property carbon content, non-fossil 0.431788
    calculation: C-content of components according to ecoinvent report No. 15a. Source of composition: Souci, S.W., Fachmann, W., Kraut, H. (Hg.: Bundesminsiterium fur Ernahrung, Landwirtschaft und Forsten, Bonn) 'Die Zusammensetzung der Lebensmittel - Nahrwerttabellen', medpharm Scientific Publishers Stuttgart, CRC Press; 2000.
  property carbon content 0.431788
    carbon content on a dry matter basis (reserved; not for manual entry)
  property true value 0.38
    allocation property applied in "true value" allocation // value calculated from revenue
  properties: water in wet mass 0.459167 kg, carbon content, fossil 0, water content 0.849, wet mass 1 kg, dry mass 0.540833 kg, carbon allocation 0.233525 kg

## By-products
- electricity, for reuse in municipal waste incineration only: 0 kWh; CPC 17100: Electrical energy; By-product classification allocatable product; pedigree (1,1,1,1,1)
  Net electricity generated from this waste and used in internal MSWI plant energy redistribution.
  Uncertainty: uncertainty is calculated from uncertainties in waste composition and uncertainties in energy efficiency and the uncertainty in internal energy demand
  production volume 2.3049e6 kWh
  property true value relation 3.6; name E_el_prod_MSWI_true_value_relation
    property to calculate "true value" from
  property price 0.1 EUR2005; name E_el_prod_MSWI_price_EUR2005
    Estimated to be the same price as in case of electricity, medium voltage.
  property exergy 3.6 MJ; name E_el_prod_MSWI_exergy
    This exergy property is based on the exergy content of the product.
  property true value 0.000192747
    allocation property applied in "true value" allocation // value calculated from true value relation
- heat, for reuse in municipal waste incineration only: 0 MJ; CPC 17300: Steam and hot water; By-product classification allocatable product; pedigree (1,1,1,1,1)
  (same comment as for electricity, for reuse in municipal waste incineration only)
  production volume 1.66762e7 MJ
  property exergy 0.1842 MJ; name E_th_prod_MSWI_exergy
    This exergy property is based on the exergy content of the product.
  property price 0.0106 EUR2005; name E_th_prod_MSWI_price_EUR2005
    Average European district heat price from Ecoheatcool and Euroheat 2005-2006, Ecoheat Work package 1: The European heat market. Final report. 10.6 EUR/GJ i s the price of district heat. http://www.solarthermalworld.org/files/Ecoheatcool%20WP1%20Web.pdf?download
  property true value relation 0.1842; name E_th_prod_MSWI_true_value_relation
    property to calculate "true value" from
  property true value 7.13544e-5
    (same comment as for electricity, for reuse in municipal waste incineration only)

## Inputs from technosphere
- cyclic N-compound: 3.24219e-6 kg; lognormal variance with pedigree 0.00784984, pedigree (2,2,3,1,1)
  Proxy: Source for total amount of pesticides: extrapolated with MEXALCA. Active ingredient is calculated based on Ecoinvent dataset Apple US. For calculations see supporting documentation 'WFLDB-Documentation.pdf' (https://ecoquery.ecoinvent.org/File/Reports).
  properties: wet mass 1 kg, carbon content, fossil 0.641962, dry mass 1 kg
- dithiocarbamate-compound: 0.000189328 kg; lognormal variance with pedigree 0.00784984, pedigree (2,2,3,1,1)
  (same comment as for cyclic N-compound)
  properties: wet mass 1 kg, carbon content, fossil 0.179339, dry mass 1 kg
- packaging, for fertilisers: 0.00529987 kg; lognormal variance with pedigree 0.0532, pedigree (4,3,3,5,4)
  Total amount of active substance/s of fertilisers needed for the production of 'apple' is calculated to be circa 2.65E-03 kg. Fertiliser/s used in this dataset is/are: 'ammonia, liquid', 'ammonium nitrate, as N', 'ammonium sulfate, as N', 'nitrogen fertiliser, as N', 'phosphate fertiliser, as P2O5', 'potassium chloride, as K2O', 'potassium fertiliser, as K2O', 'potassium sulfate, as K2O', 'urea, as N'. The total amount of active substance/s is doubled in order to account for the packaging of the dilluted product of fertiliser/s that is/are applied. Therefore, 5.30E-03 kg of packaging for fertilisers is justified with this exchange.
  properties: price 0.0642 EUR2005, carbon content, fossil 0.825301, dry mass 1 kg, wet mass 1 kg
  note on carbon content, fossil: Considering a chemical formula (C2H4)n for polyethylene, carbon content-fossil is calculated to be 0.856286 kg of Carbon per kg of dry mass.
- organophosphorus-compound, unspecified: 3.62098e-5 kg; lognormal variance with pedigree 0.00784984, pedigree (2,2,3,1,1)
  (same comment as for cyclic N-compound)
  properties: carbon content, fossil 0.260898, dry mass 1 kg, wet mass 1 kg
- irrigation: 0.157226 m3; lognormal variance with pedigree 0.118177, pedigree (2,1,3,1,1)
  Calculated value: The total amount of water used for irrigation (calculated from evapotranspiration, Pfister et al. 2011) multiplied by the country-share of irrigation technique (WFLDB-Guidelines.pdf, Appendix 6.1). See supporting documentation 'WFLDB-Documentation.pdf' chapter 'Water use for irrigation' for L2 data (https://ecoquery.ecoinvent.org/File/Reports).
  properties: water content 9089.91, dry mass 0.11 kg, wet mass 1000 kg
- sulfur: 0.000191053 kg; lognormal variance with pedigree 0.00784984, pedigree (2,2,3,1,1)
  (same comment as for cyclic N-compound)
  properties: dry mass 1 kg, wet mass 1 kg
- nitrogen fertiliser, as N: 0.000539926 kg; lognormal variance with pedigree 0.118177, pedigree (2,1,3,1,1)
  Calculated based on literature values: The nutrient content of the crop multiplied by the country-share of the fertiliser type (IFA 2014). See supporting documentation 'WFLDB-Documentation.pdf' chapter 'Fertiliser application' for L1 data and appendix for the source of nutrient content (https://ecoquery.ecoinvent.org/File/Reports).
  properties: dry mass 1 kg, wet mass 1 kg
- phenoxy-compound: 4.25282e-6 kg; lognormal variance with pedigree 0.00784984, pedigree (2,2,3,1,1)
  (same comment as for cyclic N-compound)
  properties: carbon content, fossil 0.532559, dry mass 1 kg, wet mass 1 kg
- phosphate fertiliser, as P2O5: 0.000252118 kg; lognormal variance with pedigree 0.118177, pedigree (2,1,3,1,1)
  Calculated based on literature values: The nutrient content of the crop multiplied by the country-share of the fertiliser type (IFA 2014). See supporting documentation 'WFLDB-Documentation.pdf' chapter 'Fertiliser application' for L1 data and appendix for the source of nutrient content (https://ecoquery.ecoinvent.org/File/Reports).
  Corresponds to 0.0146 kg/ha
  properties: dry mass 1 kg, wet mass 1 kg
- glyphosate: 1.87607e-5 kg; lognormal variance with pedigree 0.00784984, pedigree (2,2,3,1,1)
  (same comment as for cyclic N-compound)
  properties: dry mass 1 kg, wet mass 1 kg, carbon content, fossil 0.214286
- land use change, perennial crop: 7.73096e-6 ha; = 7.73633677991e-06*LUC_crop_specific+0.0*(1-LUC_crop_specific)
  Calculated value. Land use change (LUC) combines land transformation areas calculated with the adapted 'Direct Land Use Change Assessment Tool' version 2014 developed by Blonk Consultants and the carbon losses from soil organic carbon (SOC) and vegetation (VEG) as calculated in ecoinvent v3. See 'WFLDB-Guidelines.pdf', available at https://ecoquery.ecoinvent.org/File/Reports.
- ammonia, liquid: 1.77734e-6 kg; lognormal variance with pedigree 0.118177, pedigree (2,1,3,1,1)
  Calculated based on literature values: The nutrient content of the crop multiplied by the country-share of the fertiliser type (IFA 2014). See supporting documentation 'WFLDB-Documentation.pdf' chapter 'Fertiliser application' for L1 data and appendix for the source of nutrient content (https://ecoquery.ecoinvent.org/File/Reports).
  Corresponds to 0.0771 kg/ha
  properties: wet mass 1 kg, dry mass 1 kg
- fruit tree seedling, for planting: 0.00160178 unit; source Yuri J. 2011; lognormal variance with pedigree 0.118177, pedigree (2,1,3,1,1)
  Literature value or expert estimation (Yuri et al. 2011). This is the number of trees per ha divided by the lifetime years of the orchard.
  properties: water content 0.73, carbon content, non-fossil 0.439481, dry mass 0.578035 kg, wet mass 1 kg
  note on carbon content, non-fossil: calculation: C-content of components according to ecoinvent report No. 15a. Source of composition: https://ndb.nal.usda.gov/ndb/search/. Unspecific seedling used as proxy.
- ammonium nitrate, as N: 6.26988e-6 kg; lognormal variance with pedigree 0.118177, pedigree (2,1,3,1,1)
  Calculated based on literature values: The nutrient content of the crop multiplied by the country-share of the fertiliser type (IFA 2014). See supporting documentation 'WFLDB-Documentation.pdf' chapter 'Fertiliser application' for L1 data and appendix for the source of nutrient content (https://ecoquery.ecoinvent.org/File/Reports).
  Corresponds to 0.272 kg/ha
  properties: wet mass 1 kg, dry mass 1 kg
- planting tree: 0.00160178 unit; source Yuri J. 2011; lognormal variance with pedigree 0.118177, pedigree (2,1,3,1,1)
  (same comment as for fruit tree seedling, for planting)
- ammonium sulfate, as N: 5.24308e-6 kg; lognormal variance with pedigree 0.118177, pedigree (2,1,3,1,1)
  Calculated based on literature values: The nutrient content of the crop multiplied by the country-share of the fertiliser type (IFA 2014). See supporting documentation 'WFLDB-Documentation.pdf' chapter 'Fertiliser application' for L1 data and appendix for the source of nutrient content (https://ecoquery.ecoinvent.org/File/Reports).
  Corresponds to 0.227 kg/ha
  properties: wet mass 1 kg, dry mass 1 kg
- establishing orchard: 0.00160178 unit; source Yuri J. 2011; lognormal variance with pedigree 0.118177, pedigree (2,1,3,1,1)
  (same comment as for fruit tree seedling, for planting)
- urea, as N: 0.000375731 kg; lognormal variance with pedigree 0.118177, pedigree (2,1,3,1,1)
  Calculated based on literature values: The nutrient content of the crop multiplied by the country-share of the fertiliser type (IFA 2014). See supporting documentation 'WFLDB-Documentation.pdf' chapter 'Fertiliser application' for L1 data and appendix for the source of nutrient content (https://ecoquery.ecoinvent.org/File/Reports).
  Corresponds to 16.3 kg/ha
  properties: carbon content, fossil 0.2, dry mass 1 kg, wet mass 1 kg
- waste wood, untreated: -0.030744 kg; lognormal variance with pedigree 0.118177, pedigree (2,1,3,1,1)
  Wood from trees after 1-2 years of sorrage at the field (20% water) per lifetime year (20 years) of the orchard
  production volume 4.74417e7 kg
    Calculated from the reference product amount and production volume
  properties: carbon content, non-fossil 0.48632, wet mass 1 kg, dry mass 0.8 kg, water content 0.25
- potassium chloride, as K2O: 0.000952232 kg; lognormal variance with pedigree 0.118177, pedigree (2,1,3,1,1)
  Calculated based on literature values: The nutrient content of the crop multiplied by the country-share of the fertiliser type (IFA 2014). See supporting documentation 'WFLDB-Documentation.pdf' chapter 'Fertiliser application' for L1 data and appendix for the source of nutrient content (https://ecoquery.ecoinvent.org/File/Reports).
  Corresponds to 41.3 kg/ha
  properties: dry mass 1 kg, wet mass 1 kg
- packaging, for pesticides: 0.000885694 kg; lognormal variance with pedigree 0.0532, pedigree (4,3,3,5,4)
  Total amount of active substance/s of pesticides needed for the production of apple is calculated to be circa 4.43E-04 kg. Pesticide/s used in this dataset is/are: 'cyclic N-compound', 'dithiocarbamate-compound', 'glyphosate', 'organophosphorus-compound, unspecified', 'phenoxy-compound', 'sulfur'. The total amount of active substance/s is doubled in order to account for the packaging of the dilluted product of pesticide/s that is/are applied. Therefore, 8.86E-04 kg of packaging for pesticides is justified with this exchange.
  properties: dry mass 1 kg, carbon content, fossil 0.85714, price 0.0642 EUR2005, wet mass 1 kg
- potassium fertiliser, as K2O: 0.000410788 kg; lognormal variance with pedigree 0.118177, pedigree (2,1,3,1,1)
  Calculated based on literature values: The nutrient content of the crop multiplied by the country-share of the fertiliser type (IFA 2014). See supporting documentation 'WFLDB-Documentation.pdf' chapter 'Fertiliser application' for L1 data and appendix for the source of nutrient content (https://ecoquery.ecoinvent.org/File/Reports).
  Corresponds to 17.8 kg/ha
  properties: dry mass 1 kg, wet mass 1 kg
- potassium sulfate, as K2O: 0.000105846 kg; lognormal variance with pedigree 0.118177, pedigree (2,1,3,1,1)
  Calculated based on literature values: The nutrient content of the crop multiplied by the country-share of the fertiliser type (IFA 2014). See supporting documentation 'WFLDB-Documentation.pdf' chapter 'Fertiliser application' for L1 data and appendix for the source of nutrient content (https://ecoquery.ecoinvent.org/File/Reports).
  Corresponds to 4.59 kg/ha
  properties: dry mass 1 kg, wet mass 1 kg
- trellis system, wooden poles, soft wood, tar impregnated: 2.30637e-5 ha; lognormal variance with pedigree 0.118177, pedigree (2,1,3,1,1)
  Used to attach trees in orchards with a tree density of more than 500 trees per ha.
- fertilising, by broadcaster: 9.39778e-5 ha; lognormal variance with pedigree 0.118177, pedigree (2,1,3,1,1)
  Proxy: Extrapolated using a modified MEXALCA-approach (Roches et al. 2010; Nemecek et al. 2012). See supporting documentation 'WFLDB-Documentation.pdf' chapter 'Machinery processes' for L1 data (https://ecoquery.ecoinvent.org/File/Reports). Corresponds to 4 applications per year.
- application of plant protection product, by field sprayer: 0.000166649 ha; lognormal variance with pedigree 0.118664, pedigree (2,2,3,1,1)
  Estimation based on a modified MEXALCA-approach (Roches et al. 2010; Nemecek et al. 2012): See supporting documentation 'WFLDB-Documentation.pdf' chapter 'Machinery processes' for L2 data (https://ecoquery.ecoinvent.org/File/Reports). Field sprayer used as a proxy for pesticide application in orchards. Corresponds to 7.2 applications per year.
- mulching: 0.000115319 ha; lognormal variance with pedigree 0.118177, pedigree (2,1,3,1,1)
  Estimation based on a modified MEXALCA-approach (Roches et al. 2010; Nemecek et al. 2012): See supporting documentation 'WFLDB-Documentation.pdf' chapter 'Machinery processes' for L2 data (https://ecoquery.ecoinvent.org/File/Reports).
- transport, tractor and trailer, agricultural: 0.00109901 metric ton*km; lognormal variance with pedigree 0.156439, pedigree (4,1,3,1,1)
  On-farm transport: Yield (in tonnes) multiplied by the average distance from field to farm. The distance was obtained by extrapolation (modified MEXALCA approach). See supporting documentation 'WFLDB-Documentation.pdf' chapter 'Machinery processes' (https://ecoquery.ecoinvent.org/File/Reports). Corresponds to 47.7tkm/ha.

## Inputs from nature
- Transformation, from permanent crop, irrigated [natural resource, land]: 0.0115319 m2; lognormal variance with pedigree 0.0382144, pedigree (2,1,3,1,1)
  10000 m2 divided by the life time of the perennial crop (20 years).
- Transformation, to permanent crop, irrigated [natural resource, land]: 0.0115319 m2; lognormal variance with pedigree 0.0382144, pedigree (2,1,3,1,1)
  10000 m2 divided by the life time of the perennial crop (20 years).
- Carbon dioxide, in air [natural resource, in air]: 0.23871 kg; lognormal variance with pedigree 0.00784984, pedigree (2,2,3,1,1)
  CO2 uptake by biomass
- Energy, gross calorific value, in biomass [natural resource, biotic]: 2.70953 MJ; lognormal variance with pedigree 0.00784984, pedigree (2,2,3,1,1)
  Gross energy content is related to MJ/kg dry matter of product. Source: ecoinvent data
- Occupation, permanent crop, irrigated [natural resource, land]: 0.23126 m2*year; lognormal variance with pedigree 0.0140616, pedigree (2,1,3,1,1)
  Related to the duration from harvest date of previous crop to harvest date of main crop.

## Emissions to nature
- Chlorpyrifos methyl [soil, agricultural]: 3.62098e-5 kg; lognormal variance with pedigree 0.0387216, pedigree (2,2,3,1,1)
  Calculated value - 100% emission in soil. See 'WFLDB-Guidelines.pdf', available at https://ecoquery.ecoinvent.org/File/Reports.
- Carbon dioxide, fossil [air, non-urban air or from high stacks]: 0.00088484 kg; lognormal variance with pedigree 0.00784984, pedigree (2,2,3,1,1)
  Calculated value - CO2 emissions from urea and lime. See 'WFLDB-Guidelines.pdf', available at https://ecoquery.ecoinvent.org/File/Reports.
- Chromium, ion [water, ground-]: 3.45841e-7 kg; source Freiermuth R.  2006; lognormal variance with pedigree 0.350938, pedigree (2,2,3,1,1)
  Calculated value - Freiermuth (2006). See 'WFLDB-Guidelines.pdf', available at https://ecoquery.ecoinvent.org/File/Reports. This emission might be overestimated in case of basic soils.
- Nickel, ion [water, surface water]: 1.91881e-8 kg; source Freiermuth R.  2006; lognormal variance with pedigree 0.350938, pedigree (2,2,3,1,1)
  Calculated value - Freiermuth (2006). See 'WFLDB-Guidelines.pdf', available at https://ecoquery.ecoinvent.org/File/Reports.
- Copper, ion [water, ground-]: 4.48682e-8 kg; source Freiermuth R.  2006; lognormal variance with pedigree 0.350938, pedigree (2,2,3,1,1)
  (same comment as for Chromium, ion)
- Water [air, non-urban air or from high stacks]: 0.0729368 m3; lognormal variance with pedigree 0.118177, pedigree (2,1,3,1,1)
  Calculated value - Emission calculated from water balance. See 'WFLDB-Guidelines.pdf', available at https://ecoquery.ecoinvent.org/File/Reports.
- Ammonia [air, non-urban air or from high stacks]: 0.000157073 kg; source EEA 2013; lognormal variance with pedigree 0.0387216, pedigree (2,2,3,1,1)
  Calculated value - EMEP/EEA (2013). See 'WFLDB-Guidelines.pdf', available at https://ecoquery.ecoinvent.org/File/Reports.
- Lead [water, ground-]: 8.34146e-10 kg; source Freiermuth R.  2006; lognormal variance with pedigree 0.350938, pedigree (2,2,3,1,1)
  (same comment as for Chromium, ion)
- Nitrogen oxides [air, non-urban air or from high stacks]: 3.6616e-5 kg; source EEA 2013; lognormal variance with pedigree 0.118664, pedigree (2,2,3,1,1)
  Calculated value - EEA/EMEP (2013). See 'WFLDB-Guidelines.pdf', available at https://ecoquery.ecoinvent.org/File/Reports.
- Mercury [water, ground-]: 1.76258e-10 kg; source Freiermuth R.  2006; lognormal variance with pedigree 0.350938, pedigree (2,2,3,1,1)
  (same comment as for Chromium, ion)
- Dinitrogen monoxide [air, non-urban air or from high stacks]: 3.17881e-5 kg; source IPCC 2006; lognormal variance with pedigree 0.118664, pedigree (2,2,3,1,1)
  Calculated value - IPCC (2006). See 'WFLDB-Guidelines.pdf', available at https://ecoquery.ecoinvent.org/File/Reports.
- Zinc, ion [water, ground-]: 1.31431e-7 kg; source Freiermuth R.  2006; lognormal variance with pedigree 0.350938, pedigree (2,2,3,1,1)
  (same comment as for Chromium, ion)
- Phosphate [water, ground-]: 4.25226e-6 kg; source Prasuhn V.  2006; lognormal variance with pedigree 0.169866, pedigree (2,2,3,1,1)
  Calculated value - Prasuhn (2006). See 'WFLDB-Guidelines.pdf', available at https://ecoquery.ecoinvent.org/File/Reports. This emission might be overestimated in case of basic soils.
- Cadmium, ion [water, ground-]: 6.95625e-10 kg; source Freiermuth R.  2006; lognormal variance with pedigree 0.350938, pedigree (2,2,3,1,1)
  (same comment as for Chromium, ion)
- Nickel, ion [water, ground-]: 3.17565e-11 kg; source Freiermuth R.  2006; lognormal variance with pedigree 0.350938, pedigree (2,2,3,1,1)
  (same comment as for Chromium, ion)
- Phosphate [water, surface water]: 1.82024e-5 kg; source Prasuhn V.  2006; lognormal variance with pedigree 0.169866, pedigree (2,2,3,1,1)
  Calculated value - Prasuhn (2006). See 'WFLDB-Guidelines.pdf', available at https://ecoquery.ecoinvent.org/File/Reports.
- Water [water, surface water]: 0.0674314 m3; lognormal variance with pedigree 0.118177, pedigree (2,1,3,1,1)
  (same comment as for Water)
- 2,4-D [soil, agricultural]: 4.25282e-6 kg; lognormal variance with pedigree 0.0387216, pedigree (2,2,3,1,1)
  (same comment as for Chlorpyrifos methyl)
- Phosphorus [water, surface water]: 2.05159e-6 kg; source Prasuhn V.  2006; lognormal variance with pedigree 0.169866, pedigree (2,2,3,1,1)
  Calculated value - Prasuhn (2006) and SQCB-Erosion. See 'WFLDB-Guidelines.pdf', available at https://ecoquery.ecoinvent.org/File/Reports.
- Water [water, ground-]: 0.0168577 m3; lognormal variance with pedigree 0.118177, pedigree (2,1,3,1,1)
  (same comment as for Water)
- Lead [water, surface water]: 4.5883e-9 kg; source Freiermuth R.  2006; lognormal variance with pedigree 0.350938, pedigree (2,2,3,1,1)
  (same comment as for Nickel, ion)
- Nitrate [water, ground-]: 0.00309856 kg; source Faist Emmenegger M. 2009; lognormal variance with pedigree 0.169866, pedigree (2,2,3,1,1)
- Cadmium [soil, agricultural]: 7.80879e-9 kg; = 2.31466949778e-08 + ( - 1.53324743815e-08)*heavyMetalUptakeSwitch; source Freiermuth R.  2006
  Comment on mathematicalRelation:
  2.31466949778e-08 from Calculated value - Freiermuth (2006). See 'WFLDB-Guidelines.pdf', available at https://ecoquery.ecoinvent.org/File/Reports.
  -1.53324743815e-08 from Crop, default, heavy metals uptake model
  Heavy metal uptake can be excluded by setting the parameter heavyMetalUptakeSwitch to zero.
- Chromium [soil, agricultural]: -2.84825e-7 kg; = -2.02728028065e-07 + ( - 8.22946478028e-08)*heavyMetalUptakeSwitch; source Freiermuth R.  2006
  Comment on mathematicalRelation:
  -2.02728028065e-07 from Calculated value - Freiermuth (2006). See 'WFLDB-Guidelines.pdf', available at https://ecoquery.ecoinvent.org/File/Reports.
  -8.22946478028e-08 from Crop, default, heavy metals uptake model
  Heavy metal uptake can be excluded by setting the parameter heavyMetalUptakeSwitch to zero.
- Copper [soil, agricultural]: -1.04549e-6 kg; = -4.55617614476e-08 + ( - 1.00065761748e-06)*heavyMetalUptakeSwitch; source Freiermuth R.  2006
  Comment on mathematicalRelation:
  -4.55617614476e-08 from Calculated value - Freiermuth (2006). See 'WFLDB-Guidelines.pdf', available at https://ecoquery.ecoinvent.org/File/Reports.
  -1.00065761748e-06 from Crop, default, heavy metals uptake model
  Heavy metal uptake can be excluded by setting the parameter heavyMetalUptakeSwitch to zero.
- Lead [soil, agricultural]: -5.93356e-8 kg; = 2.22791266617e-08 + ( - 8.16559205364e-08)*heavyMetalUptakeSwitch; source Freiermuth R.  2006
  Comment on mathematicalRelation:
  2.22791266617e-08 from Calculated value - Freiermuth (2006). See 'WFLDB-Guidelines.pdf', available at https://ecoquery.ecoinvent.org/File/Reports.
  -8.16559205364e-08 from Crop, default, heavy metals uptake model
  Heavy metal uptake can be excluded by setting the parameter heavyMetalUptakeSwitch to zero.
- Mercury [soil, agricultural]: -5.56898e-9 kg; = 5.51075516987e-10 + ( - 6.12392979136e-09)*heavyMetalUptakeSwitch; source Freiermuth R.  2006
  Comment on mathematicalRelation:
  5.51075516987e-10 from Calculated value - Freiermuth (2006). See 'WFLDB-Guidelines.pdf', available at https://ecoquery.ecoinvent.org/File/Reports.
  -6.12392979136e-09 from Crop, default, heavy metals uptake model
  Heavy metal uptake can be excluded by setting the parameter heavyMetalUptakeSwitch to zero.
- Cadmium, ion [water, surface water]: 5.67714e-10 kg; source Freiermuth R.  2006; lognormal variance with pedigree 0.350938, pedigree (2,2,3,1,1)
  (same comment as for Nickel, ion)
- Nickel [soil, agricultural]: -1.33989e-7 kg; = 2.36521418021e-08 + ( - 1.57733924945e-07)*heavyMetalUptakeSwitch; source Freiermuth R.  2006
  Comment on mathematicalRelation:
  2.36521418021e-08 from Calculated value - Freiermuth (2006). See 'WFLDB-Guidelines.pdf', available at https://ecoquery.ecoinvent.org/File/Reports.
  -1.57733924945e-07 from Crop, default, heavy metals uptake model
  Heavy metal uptake can be excluded by setting the parameter heavyMetalUptakeSwitch to zero.
- Zinc [soil, agricultural]: -4.5602e-6 kg; = 2.72087333826e-07 + ( - 4.83545230567e-06)*heavyMetalUptakeSwitch; source Freiermuth R.  2006
  Comment on mathematicalRelation:
  2.72087333826e-07 from Calculated value - Freiermuth (2006). See 'WFLDB-Guidelines.pdf', available at https://ecoquery.ecoinvent.org/File/Reports.
  -4.83545230567e-06 from Crop, default, heavy metals uptake model
  Heavy metal uptake can be excluded by setting the parameter heavyMetalUptakeSwitch to zero.
- Mancozeb [soil, agricultural]: 0.000189328 kg; lognormal variance with pedigree 0.0387216, pedigree (2,2,3,1,1)
  (same comment as for Chlorpyrifos methyl)
- Copper, ion [water, surface water]: 6.30932e-8 kg; source Freiermuth R.  2006; lognormal variance with pedigree 0.350938, pedigree (2,2,3,1,1)
  (same comment as for Nickel, ion)
- Myclobutanil [soil, agricultural]: 3.24219e-6 kg; lognormal variance with pedigree 0.0387216, pedigree (2,2,3,1,1)
  (same comment as for Chlorpyrifos methyl)
- Sulfur [soil, agricultural]: 0.000191053 kg; lognormal variance with pedigree 0.0387216, pedigree (2,2,3,1,1)
  (same comment as for Chlorpyrifos methyl)
- Mercury [water, surface water]: 8.3094e-11 kg; source Freiermuth R.  2006; lognormal variance with pedigree 0.350938, pedigree (2,2,3,1,1)
  (same comment as for Nickel, ion)
- Zinc, ion [water, surface water]: 4.02208e-8 kg; source Freiermuth R.  2006; lognormal variance with pedigree 0.350938, pedigree (2,2,3,1,1)
  (same comment as for Nickel, ion)
- Glyphosate [soil, agricultural]: 1.87607e-5 kg; lognormal variance with pedigree 0.0387216, pedigree (2,2,3,1,1)
  (same comment as for Chlorpyrifos methyl)
- Chromium, ion [water, surface water]: 5.88264e-8 kg; source Freiermuth R.  2006; lognormal variance with pedigree 0.350938, pedigree (2,2,3,1,1)
  (same comment as for Nickel, ion)

## Sampling procedure
WFLDB Methodological Guidelines for the Life Cycle Inventory of Agricultural Products in the latest version, available at: http://www.quantis-intl.com/microsites/wfldb. Data sources: Data were categorised from level 0 (L0) to level (L4) as follows: L0 = estimate, proxy; L1 = statistical data (e.g. FAOSTAT); L2 = L1 adapted to crop and country; L3 = literature data or L1 resp. L2 data approved by experts; medium detailing (e.g. kg of total N-fertiliser); L4 = L3 data of higher detailing as L3 data (e.g. kg of a specific N-fertiliser such as Ammonium-Nitrate or Urea).In this dataset data were obtained for yield: L1; Fertilisers: L2; Pesticides: L1; Machinery: L1. For information regarding the calculation of individual exchanges see supporting documentation WFLDB-Documentation.pdf.

## Extrapolations
If used, extrapolations are documented on the flow level.

## Review by Assumpció ANTON 2016-05-30
Be aware that the use of statistics in input calculations could provide some specific inputs not common for specific crops, this should be corrected if better information is available and better reflexed in DQR . Currently, I would dissent for some of good marks provided, being a revision of criteria applied advisable.

Pesticides will need to be amended periodically checking for update of pesticides' ban.
