# treatment of fly ash and scrubber sludge, hazardous waste incineration

Dataset: EcoSpold 2, unit process
Geography: Europe without Switzerland
Time period: 1997-01-01 to 2019-12-31
Technology level: current
Classification: EcoSpold01Categories: waste management/hazardous waste incineration
Classification: ISIC rev.4 ecoinvent: 3822:Treatment and disposal of hazardous waste
Tags: Treatment
Scenario: Business-as-Usual
System model: Allocation at the point of substitution
Share of production covered: 39 %
Generated by: [System]
Database: ecoinvent
isCopyrightProtected: true
accessRestrictedTo: 1

## General comment
Inventoried waste contains 100% separator sludge; .
waste composition (wet, in ppm): upper heating value 0.9 MJ/kg; H2O 900000; O 197; H 2659.5; C 16745; S 98.5; N 2.7196; P 149; B 2.1; Cl 400; Br n.a.; F 0.0077703; I n.a.; Ag n.a.; As 0.5; Ba 27; Cd 0.66; Co 10.4; Cr 71.3; Cu 548.1; Hg 0.22; Mn 40.5; Mo 0.5; Ni 37.6; Pb 27.6; Sb 0.49; Se n.a.; Sn 1.7; V 0.85; Zn 270.6; Be n.a.; Sc n.a.; Sr 30; Ti n.a.; Tl n.a.; W n.a.; Si n.a.; Fe 3400; Ca 18200; Al 133.5; K 148; Mg 1670; Na 71;
Share of carbon in waste that is biogenic 0%.
Net energy produced in HWI: 17.11MJ/kg electric energy and 1.27MJ/kg thermal energy
Allocation of energy production: no substitution or expansion. 100% of burden allocated to waste disposal function of HWI.
One kg of this waste produces 0.03149 kg of residues, which are landfilled. Additional solidification with 0.01259 kg of cement.

## Included activities end
waste-specific air and water emissions from incineration, auxiliary material consumption for flue gas cleaning. Short-term emissions to river water and long-term emissions to ground water from residual material landfill (from solidified fly ashes and scrubber slugde). Process energy demands for HWI.

## Technology
Swiss HWI plant in 2000 with wet flue gas scrubber and low-dust SCR DeNOx facility. Gross thermal efficiency 74.4% and gross electric efficiency 10%.

## Time period
Transfer coefficients for modern Swiss MSWI. Emission speciation based on early 90ies data.

## Parameters
- fraction, process water, to air: 1 dimensionless; name fraction_PW_to_air; lognormal variance with pedigree 0.092025, pedigree (4,4,3,2,4)

## Reference product
- fly ash and scrubber sludge: -1 kg; name RP; CPC 39: Wastes or scraps; By-product classification Waste
  production volume 1.12197 kg; name RP_PV; = 4*0.280493523
    Estimated. The EU without CH production volume is extrapolated from the global production volume using the nominal GDP of 2010 (source: United Nations, http://data.un.org/Glossary.aspx?q=GDP+%28current+US%24%29, accessed 20130726 and 20130312). Where the Global GDP is set to a dummy value of 4.
    Gross domestic product (GDP) at current prices is GDP at prices of the current reporting period. Also known as nominal GDP.
  property price 0 EUR2005; name RP_price_EUR2005
    Waste products are assigned a price of zero as they are assumed to require further treatment.
  property carbon content, fossil 0.167
    Tab A.6, ecoinvent v2.2 report 13_I. C content has been calculated after data in the tables, and then referred to 1 kg DM
  property carbon content 0.167
    carbon content on a dry matter basis (reserved; not for manual entry)
  properties: water content 9, dry mass 0.1 kg, carbon content, non-fossil 0, wet mass 1 kg, water in wet mass 0.9 kg, carbon allocation 0.0167 kg

## Inputs from technosphere
- residual material landfill: 6.5596e-11 unit; lognormal variance with pedigree 0.282, pedigree (1,1,5,5,1)
  uncertainty is calculated from uncertainties in waste composition and transfer coefficients in incinerator
- process-specific burdens, residual material landfill: 0.031486 kg; lognormal variance with pedigree 0.282, pedigree (1,1,5,5,1)
  uncertainty is calculated from uncertainties in waste composition and transfer coefficients in incinerator;activityLink introduced to establish a direct link to the corresponding regional supply of this product
- hydrogen peroxide, without water, in 50% solution state: 4.4298e-7 kg; lognormal variance with pedigree 1.002, pedigree (1,1,5,5,1)
  uncertainty calculated from uncertainty in average auxiliary material input, and the unertainty of the waste composition of this waste
  properties: dry mass 1 kg, wet mass 1 kg
- process-specific burdens, hazardous waste incineration plant: 1 kg; lognormal variance with pedigree 0.042, pedigree (1,1,5,5,1)
  demands per kilogram waste. uncertainty is heeded in the module
- chemical, organic: 4.9628e-6 kg; lognormal variance with pedigree 1.462, pedigree (1,1,5,5,1)
  Proxy for TMT15. uncertainty calculated from uncertainty in average auxiliary material input, and the unertainty of the waste composition of this waste
  properties: wet mass 1 kg, dry mass 1 kg, carbon content, fossil 0.628
  note on carbon content, fossil: This dataset is an unweighted average of 20 organic substances (listed in Tab 88.1, ecoinvent v2.2 report 8, part II), being part of the top100 chemicals included in this database. The C-content has also been calculated as an unweighted average of the C content of the substances composing this dataset.
- titanium dioxide: 3.8946e-9 kg; lognormal variance with pedigree 2.342, pedigree (1,1,5,5,1)
  uncertainty calculated from uncertainty in average DeNOx input, uncertainty in the share of thermal NOx, uncertainty of nitrogen content in average municipal waste and the unertainty in nitrogen content in *this* waste.
  properties: wet mass 1 kg, dry mass 1 kg
- chromium: 7.9482e-11 kg; lognormal variance with pedigree 2.342, pedigree (1,1,5,5,1)
  Proxy for vanadium pentoxide V2O5 in SCR catalyst. uncertainty calculated from uncertainty in average DeNOx input, uncertainty in the share of thermal NOx, uncertainty of nitrogen content in average municipal waste and the unertainty in nitrogen content in *this* waste.
  properties: dry mass 1 kg, wet mass 1 kg
- waste cement, hydrated: -0.031486 kg; name waste_cement; lognormal variance with pedigree 0.282, pedigree (1,1,5,5,1)
  Hydrated cement for solidification of landfilled residual material. Uncertainty calculated from unertainty of the waste composition of this waste and transfer coefficients in the incinerator and of the solidification recipe.
  production volume 0.0353265 kg; = waste_cement*RP_PV/ABS(RP)
    Calculated from the production volume of fly ash and scrubber sludge, 90% water in proportion to the respective output amounts.
  property price 0 EUR2005; name waste_cement_price_EUR2005
  properties: dry mass 1 kg, wet mass 1 kg
- quicklime, milled, packed: 0.00010839 kg; lognormal variance with pedigree 0.472, pedigree (1,1,5,5,1)
  (same comment as for hydrogen peroxide, without water, in 50% solution state)
  properties: dry mass 0.99 kg, water content 0.010101, wet mass 1 kg
- chemical, inorganic: 8.0963e-5 kg; lognormal variance with pedigree 0.252, pedigree (1,1,5,5,1)
  Proxy for Polyelectrolyte. uncertainty calculated from uncertainty in average auxiliary material input, and the unertainty of the waste composition of this waste
  properties: wet mass 1 kg, carbon content, fossil 0.003, dry mass 1 kg
  note on carbon content, fossil: This dataset is an unweighted average of 20 inorganic substances (listed in Tab 88.1, ecoinvent v2.2 report 8, part II), being part of the top100 chemicals included in this database. The C-content has also been calculated as an unweighted average of the C content of the substances composing this dataset.
- heat, district or industrial, natural gas: 4.84146e-5 MJ; lognormal variance with pedigree 2.062, pedigree (1,1,5,5,1)
  (same comment as for titanium dioxide)
- cement, unspecified: 0.012595 kg; lognormal variance with pedigree 0.282, pedigree (1,1,5,5,1)
  Cement for solidification of landfilled residual material. Uncertainty calculated from unertainty of the waste composition of this waste, of transfer coefficients in the incinerator and of the solidification recipe.
  properties: wet mass 1 kg, dry mass 1 kg
- calcium chloride: 0.00051667 kg; lognormal variance with pedigree 0.982, pedigree (1,1,5,5,1)
  (same comment as for hydrogen peroxide, without water, in 50% solution state)
  properties: dry mass 1 kg, wet mass 1 kg
- iron (III) chloride, without water, in 40% solution state: 0.00061877 kg; lognormal variance with pedigree 0.382, pedigree (1,1,5,5,1)
  (same comment as for hydrogen peroxide, without water, in 50% solution state)
  properties: dry mass 1 kg, wet mass 1 kg
- heat, central or small-scale, other than natural gas: 21.62 MJ; lognormal variance with pedigree 0.092, pedigree (1,1,5,5,1)
  Uncertainty dependent on total energy required and heating value present, using experimental GSd for substraction from uc=A*GSDa^2-B
- hazardous waste incineration facility: 1.25e-9 unit; lognormal variance with pedigree 0.042, pedigree (1,1,5,5,1)
  demands per kilogram waste. uncertainty is heeded in the module
- ammonia, liquid: 9.9182e-8 kg; lognormal variance with pedigree 1.972, pedigree (1,1,5,5,1)
  (same comment as for titanium dioxide)
  properties: dry mass 1 kg, wet mass 1 kg
- hydrochloric acid, without water, in 30% solution state: 4.8578e-5 kg; lognormal variance with pedigree 0.252, pedigree (1,1,5,5,1)
  (same comment as for hydrogen peroxide, without water, in 50% solution state)
  properties: wet mass 1 kg, dry mass 1 kg
- sodium hydroxide, without water, in 50% solution state: 0.0010336 kg; lognormal variance with pedigree 0.452, pedigree (1,1,5,5,1)
  (same comment as for hydrogen peroxide, without water, in 50% solution state)
  properties: dry mass 1 kg, wet mass 1 kg

## Emissions to nature
- Calcium, ion [water, ground-, long-term]: 0.0016418 kg; lognormal variance with pedigree 1.782, pedigree (1,1,5,5,1)
  Long-term emissions from landfilling of incineration residues. uncertainty is calculated from uncertainties in waste composition and transfer coefficients in incinerator and landfills.
- Strontium [water, surface water]: 1.813e-8 kg; lognormal variance with pedigree 1.882, pedigree (1,1,5,5,1)
  uncertainty is calculated from uncertainties in waste composition and transfer coefficients in incinerator and landfills
- BOD5, Biological Oxygen Demand [water, surface water]: 8.4139e-7 kg; lognormal variance with pedigree 0.552, pedigree (1,1,5,5,1)
  (same comment as for Strontium)
- Carbon dioxide, fossil [air, urban air close to ground]: 0.060691 kg; lognormal variance with pedigree 0.352, pedigree (1,1,5,5,1)
  calculated from uncertainty in carbon in waste and transfer coefficients
- Nickel, ion [water, surface water]: 7.7073e-6 kg; lognormal variance with pedigree 1.132, pedigree (1,1,5,5,1)
  (same comment as for Strontium)
- Sodium [air, urban air close to ground]: 6.6802e-7 kg; lognormal variance with pedigree 1.062, pedigree (1,1,5,5,1)
  (same comment as for residual material landfill)
- Arsenic [air, urban air close to ground]: 5.1e-15 kg; lognormal variance with pedigree 1.812, pedigree (1,1,5,5,1)
  (same comment as for residual material landfill)
- Magnesium [air, urban air close to ground]: 2.2996e-6 kg; lognormal variance with pedigree 0.652, pedigree (1,1,5,5,1)
  (same comment as for residual material landfill)
- Antimony [water, ground-, long-term]: 3.1714e-7 kg; lognormal variance with pedigree 1.712, pedigree (1,1,5,5,1)
  (same comment as for Calcium, ion)
- Sulfate [water, surface water]: 0.00028403 kg; lognormal variance with pedigree 1.002, pedigree (1,1,5,5,1)
  (same comment as for Strontium)
- Arsenic, ion [water, surface water]: 5e-7 kg; lognormal variance with pedigree 1.702, pedigree (1,1,5,5,1)
  (same comment as for Strontium)
- Manganese [water, ground-, long-term]: 3.3454e-7 kg; lognormal variance with pedigree 6.872, pedigree (1,1,5,5,1)
  (same comment as for Calcium, ion)
- Cadmium, ion [water, surface water]: 2.9823e-10 kg; lognormal variance with pedigree 1.622, pedigree (1,1,5,5,1)
  (same comment as for Strontium)
- Lead [water, surface water]: 7.5123e-10 kg; lognormal variance with pedigree 1.382, pedigree (1,1,5,5,1)
  (same comment as for Strontium)
- Chloride [water, ground-, long-term]: 4.8551e-7 kg; lognormal variance with pedigree 0.842, pedigree (1,1,5,5,1)
  (same comment as for Calcium, ion)
- Barium [air, urban air close to ground]: 2.7e-8 kg; lognormal variance with pedigree 1.202, pedigree (1,1,5,5,1)
  (same comment as for residual material landfill)
- Boron [water, ground-, long-term]: 1.5059e-6 kg; lognormal variance with pedigree 1.512, pedigree (1,1,5,5,1)
  (same comment as for Calcium, ion)
- Ammonia [air, urban air close to ground]: 2.6897e-9 kg; lognormal variance with pedigree 2.012, pedigree (1,1,5,5,1)
  uncertainty calculated from uncertainty in average N-emissions, uncertainty in the share of thermal NOx, uncertainty of nitrogen content in average municipal waste and the unertainty in nitrogen content in *this* waste.
- Sulfur dioxide [air, urban air close to ground]: 1.182e-7 kg; lognormal variance with pedigree 1.032, pedigree (1,1,5,5,1)
  (same comment as for residual material landfill)
- Magnesium [water, ground-, long-term]: 0.00018949 kg; lognormal variance with pedigree 1.812, pedigree (1,1,5,5,1)
  (same comment as for Calcium, ion)
- Antimony [air, urban air close to ground]: 1.906e-15 kg; lognormal variance with pedigree 1.832, pedigree (1,1,5,5,1)
  (same comment as for residual material landfill)
- COD, Chemical Oxygen Demand [water, surface water]: 8.4139e-7 kg; lognormal variance with pedigree 0.552, pedigree (1,1,5,5,1)
  (same comment as for Strontium)
- Aluminium [water, surface water]: 6.6057e-8 kg; lognormal variance with pedigree 1.712, pedigree (1,1,5,5,1)
  (same comment as for Strontium)
- Lead [air, urban air close to ground]: 1.0245e-9 kg; lognormal variance with pedigree 1.212, pedigree (1,1,5,5,1)
  (same comment as for residual material landfill)
- Hydrogen fluoride [air, urban air close to ground]: 1.9551e-12 kg; lognormal variance with pedigree 1.992, pedigree (1,1,5,5,1)
  (same comment as for residual material landfill)
- Barium [water, ground-, long-term]: 2.228e-7 kg; lognormal variance with pedigree 6.932, pedigree (1,1,5,5,1)
  (same comment as for Calcium, ion)
- Strontium [water, ground-, long-term]: 1.086e-5 kg; lognormal variance with pedigree 1.422, pedigree (1,1,5,5,1)
  (same comment as for Calcium, ion)
- BOD5, Biological Oxygen Demand [water, ground-, long-term]: 0.00027206 kg; lognormal variance with pedigree 0.402, pedigree (1,1,5,5,1)
  (same comment as for Calcium, ion)
- Tin, ion [water, surface water]: 7.6258e-11 kg; lognormal variance with pedigree 2.262, pedigree (1,1,5,5,1)
  (same comment as for Strontium)
- Chromium VI [water, ground-, long-term]: 1.3496e-5 kg; lognormal variance with pedigree 1.052, pedigree (1,1,5,5,1)
  (same comment as for Calcium, ion)
- Potassium [air, urban air close to ground]: 4.462e-7 kg; lognormal variance with pedigree 0.962, pedigree (1,1,5,5,1)
  (same comment as for residual material landfill)
- DOC, Dissolved Organic Carbon [water, ground-, long-term]: 0.00011902 kg; lognormal variance with pedigree 0.402, pedigree (1,1,5,5,1)
  (same comment as for Calcium, ion)
- Mercury [water, ground-, long-term]: 1.0276e-8 kg; lognormal variance with pedigree 4.132, pedigree (1,1,5,5,1)
  (same comment as for Calcium, ion)
- Copper, ion [water, ground-, long-term]: 2.0179e-5 kg; lognormal variance with pedigree 3.432, pedigree (1,1,5,5,1)
  (same comment as for Calcium, ion)
- Iron, ion [water, ground-, long-term]: 3.34e-6 kg; lognormal variance with pedigree 7.552, pedigree (1,1,5,5,1)
  (same comment as for Calcium, ion)
- Lead [water, ground-, long-term]: 1.4316e-7 kg; lognormal variance with pedigree 8.092, pedigree (1,1,5,5,1)
  (same comment as for Calcium, ion)
- Hydrogen chloride [air, urban air close to ground]: 1.2338e-7 kg; lognormal variance with pedigree 0.852, pedigree (1,1,5,5,1)
  (same comment as for residual material landfill)
- Molybdenum [air, urban air close to ground]: 1e-9 kg; lognormal variance with pedigree 1.722, pedigree (1,1,5,5,1)
  (same comment as for residual material landfill)
- Manganese [air, urban air close to ground]: 2.2052e-13 kg; lognormal variance with pedigree 1.242, pedigree (1,1,5,5,1)
  (same comment as for residual material landfill)
- COD, Chemical Oxygen Demand [water, ground-, long-term]: 0.00027206 kg; lognormal variance with pedigree 0.402, pedigree (1,1,5,5,1)
  (same comment as for Calcium, ion)
- Zinc, ion [water, surface water]: 3.6315e-6 kg; lognormal variance with pedigree 0.882, pedigree (1,1,5,5,1)
  (same comment as for Strontium)
- Iron, ion [water, surface water]: 0.0027312 kg; lognormal variance with pedigree 0.542, pedigree (1,1,5,5,1)
  (same comment as for Strontium)
- Phosphorus [air, urban air close to ground]: 1.043e-7 kg; lognormal variance with pedigree 0.972, pedigree (1,1,5,5,1)
  (same comment as for residual material landfill)
- Mercury [water, surface water]: 2.3196e-9 kg; lognormal variance with pedigree 1.792, pedigree (1,1,5,5,1)
  (same comment as for Strontium)
- Boron [air, urban air close to ground]: 2.52e-7 kg; lognormal variance with pedigree 1.522, pedigree (1,1,5,5,1)
  (same comment as for residual material landfill)
- Aluminium [water, ground-, long-term]: 3.9568e-5 kg; lognormal variance with pedigree 1.332, pedigree (1,1,5,5,1)
  (same comment as for Calcium, ion)
- Fluoride [water, surface water]: 7.756e-9 kg; lognormal variance with pedigree 1.962, pedigree (1,1,5,5,1)
  (same comment as for Strontium)
- Water [air, unspecified]: 0.0009 m3; name water_to_air_unspecified; lognormal variance with pedigree 0.0827, pedigree (2,2,5,5,1)
  Calculated value based on water balance.
  property fraction, origin: salt water 0; name fraction_origin_salt_water
  property carbon content, fossil 0; name C_content_fossil
  property dry mass 0 kg; name DM
  property wet mass 1000 kg; name WM
  property carbon content, non-fossil 0; name C_content_non_fossil
  property water in wet mass 1000 kg; name WWM
  property fraction, origin: fresh water 0; name fraction_origin_fresh_water
  property fraction, origin: unspecified 1; name fraction_origin_unspecified
- Aluminium [air, urban air close to ground]: 2.0855e-7 kg; lognormal variance with pedigree 0.982, pedigree (1,1,5,5,1)
  (same comment as for residual material landfill)
- Mercury [air, urban air close to ground]: 7.5982e-15 kg; lognormal variance with pedigree 1.912, pedigree (1,1,5,5,1)
  (same comment as for residual material landfill)
- Potassium, ion [water, ground-, long-term]: 0.00010596 kg; lognormal variance with pedigree 0.952, pedigree (1,1,5,5,1)
  (same comment as for Calcium, ion)
- Molybdenum [water, ground-, long-term]: 2.2909e-9 kg; lognormal variance with pedigree 1.722, pedigree (1,1,5,5,1)
  (same comment as for Calcium, ion)
- Cobalt [water, surface water]: 1.0393e-5 kg; lognormal variance with pedigree 1.302, pedigree (1,1,5,5,1)
  (same comment as for Strontium)
- Dinitrogen monoxide [air, urban air close to ground]: 9.6829e-9 kg; lognormal variance with pedigree 2.1, pedigree (5,5,5,5,5)
  uncertainty calculated from uncertainty for proxy (from MSWI), uncertainty in average N-emissions, uncertainty in the share of thermal NOx, uncertainty of nitrogen content in average municipal waste and the unertainty in nitrogen content in *this* waste.
- Chromium [air, urban air close to ground]: 5.272e-12 kg; lognormal variance with pedigree 1.142, pedigree (1,1,5,5,1)
  (same comment as for residual material landfill)
- Sodium, ion [water, ground-, long-term]: 4.3938e-5 kg; lognormal variance with pedigree 1.052, pedigree (1,1,5,5,1)
  (same comment as for Calcium, ion)
- Magnesium [water, surface water]: 3.1634e-7 kg; lognormal variance with pedigree 1.502, pedigree (1,1,5,5,1)
  (same comment as for Strontium)
- Fluoride [water, ground-, long-term]: 1.2494e-11 kg; lognormal variance with pedigree 1.982, pedigree (1,1,5,5,1)
  (same comment as for Calcium, ion)
- Nitrogen oxides [air, urban air close to ground]: 6.9932e-8 kg; lognormal variance with pedigree 2.012, pedigree (1,1,5,5,1)
  (same comment as for Ammonia)
- TOC, Total Organic Carbon [water, surface water]: 3.6811e-7 kg; lognormal variance with pedigree 0.552, pedigree (1,1,5,5,1)
  (same comment as for Strontium)
- Tin, ion [water, ground-, long-term]: 3.2171e-8 kg; lognormal variance with pedigree 5.472, pedigree (1,1,5,5,1)
  (same comment as for Calcium, ion)
- Antimony [water, surface water]: 1.7286e-7 kg; lognormal variance with pedigree 1.732, pedigree (1,1,5,5,1)
  (same comment as for Strontium)
- Vanadium, ion [water, surface water]: 2.0943e-9 kg; lognormal variance with pedigree 2.162, pedigree (1,1,5,5,1)
  (same comment as for Strontium)
- Tin [air, urban air close to ground]: 2.2551e-9 kg; lognormal variance with pedigree 1.562, pedigree (1,1,5,5,1)
  (same comment as for residual material landfill)
- Cadmium [air, urban air close to ground]: 3.6345e-11 kg; lognormal variance with pedigree 1.702, pedigree (1,1,5,5,1)
  (same comment as for residual material landfill)
- Strontium [air, urban air close to ground]: 3e-9 kg; lognormal variance with pedigree 1.202, pedigree (1,1,5,5,1)
  (same comment as for residual material landfill)
- Molybdenum [water, surface water]: 4.9671e-7 kg; lognormal variance with pedigree 1.702, pedigree (1,1,5,5,1)
  (same comment as for Strontium)
- Cobalt [air, urban air close to ground]: 7.28e-9 kg; lognormal variance with pedigree 1.322, pedigree (1,1,5,5,1)
  (same comment as for residual material landfill)
- Boron [water, surface water]: 3.2844e-7 kg; lognormal variance with pedigree 1.452, pedigree (1,1,5,5,1)
  (same comment as for Strontium)
- Calcium [air, urban air close to ground]: 3.034e-5 kg; lognormal variance with pedigree 0.352, pedigree (1,1,5,5,1)
  (same comment as for residual material landfill)
- DOC, Dissolved Organic Carbon [water, surface water]: 3.6811e-7 kg; lognormal variance with pedigree 0.552, pedigree (1,1,5,5,1)
  (same comment as for Strontium)
- Nitrate [water, surface water]: 3.4787e-8 kg; lognormal variance with pedigree 1.122, pedigree (1,1,5,5,1)
  (same comment as for Strontium)
- Manganese [water, surface water]: 9.6349e-10 kg; lognormal variance with pedigree 1.782, pedigree (1,1,5,5,1)
  (same comment as for Strontium)
- Copper [air, urban air close to ground]: 3.8367e-7 kg; lognormal variance with pedigree 0.802, pedigree (1,1,5,5,1)
  (same comment as for residual material landfill)
- Zinc, ion [water, ground-, long-term]: 3.2697e-6 kg; lognormal variance with pedigree 5.712, pedigree (1,1,5,5,1)
  (same comment as for Calcium, ion)
- Cadmium, ion [water, ground-, long-term]: 4.4784e-9 kg; lognormal variance with pedigree 7.892, pedigree (1,1,5,5,1)
  (same comment as for Calcium, ion)
- Zinc [air, urban air close to ground]: 1.8942e-7 kg; lognormal variance with pedigree 0.892, pedigree (1,1,5,5,1)
  (same comment as for residual material landfill)
- Nickel, ion [water, ground-, long-term]: 1.0819e-5 kg; lognormal variance with pedigree 1.392, pedigree (1,1,5,5,1)
  (same comment as for Calcium, ion)
- Carbon monoxide, fossil [air, urban air close to ground]: 1.2076e-5 kg; lognormal variance with pedigree 0.712, pedigree (1,4,5,5,3)
  1 plant for waste solvent incineration in Switzerland
- Phosphate [water, ground-, long-term]: 0.00010043 kg; lognormal variance with pedigree 1.512, pedigree (1,1,5,5,1)
  (same comment as for Calcium, ion)
- Phosphate [water, surface water]: 7.1538e-6 kg; lognormal variance with pedigree 0.922, pedigree (1,1,5,5,1)
  (same comment as for Strontium)
- Arsenic, ion [water, ground-, long-term]: 0 kg; pedigree (1,1,1,1,1)
  (same comment as for Calcium, ion)
- Potassium, ion [water, surface water]: 4.1593e-5 kg; lognormal variance with pedigree 0.992, pedigree (1,1,5,5,1)
  (same comment as for Strontium)
- Vanadium [air, urban air close to ground]: 8.5e-11 kg; lognormal variance with pedigree 1.662, pedigree (1,1,5,5,1)
  (same comment as for residual material landfill)
- Sulfate [water, ground-, long-term]: 1.129e-5 kg; lognormal variance with pedigree 1.012, pedigree (1,1,5,5,1)
  (same comment as for Calcium, ion)
- Barium [water, surface water]: 3.7196e-10 kg; lognormal variance with pedigree 2.392, pedigree (1,1,5,5,1)
  (same comment as for Strontium)
- TOC, Total Organic Carbon [water, ground-, long-term]: 0.00011902 kg; lognormal variance with pedigree 0.402, pedigree (1,1,5,5,1)
  (same comment as for Calcium, ion)
- Nitrate [water, ground-, long-term]: 9.7697e-8 kg; lognormal variance with pedigree 1.492, pedigree (1,1,5,5,1)
  (same comment as for Calcium, ion)
- Nickel [air, urban air close to ground]: 2.632e-8 kg; lognormal variance with pedigree 1.152, pedigree (1,1,5,5,1)
  (same comment as for residual material landfill)
- Cyanide [air, urban air close to ground]: 2.4207e-9 kg; lognormal variance with pedigree 2.1, pedigree (5,5,5,5,5)
  (same comment as for Dinitrogen monoxide)
- Iron [air, urban air close to ground]: 2.38e-6 kg; lognormal variance with pedigree 0.562, pedigree (1,1,5,5,1)
  (same comment as for residual material landfill)
- Vanadium, ion [water, ground-, long-term]: 6.5325e-7 kg; lognormal variance with pedigree 1.652, pedigree (1,1,5,5,1)
  (same comment as for Calcium, ion)
- Chromium VI [water, surface water]: 4.4996e-6 kg; lognormal variance with pedigree 1.152, pedigree (1,1,5,5,1)
  (same comment as for Strontium)
- Chloride [water, surface water]: 0.00039939 kg; lognormal variance with pedigree 0.822, pedigree (1,1,5,5,1)
  (same comment as for Strontium)
- Sodium, ion [water, surface water]: 2.6394e-5 kg; lognormal variance with pedigree 1.072, pedigree (1,1,5,5,1)
  (same comment as for Strontium)
- Calcium, ion [water, surface water]: 2.7409e-6 kg; lognormal variance with pedigree 1.242, pedigree (1,1,5,5,1)
  (same comment as for Strontium)
- Copper, ion [water, surface water]: 2.3547e-5 kg; lognormal variance with pedigree 0.782, pedigree (1,1,5,5,1)
  (same comment as for Strontium)

## Sampling procedure
The 2 Swiss HWI plants, used as the inventory reference technology mix, have a total annual capacity of 53'000 tons of hazardous waste. This corresponds to 39% of the Swiss total installed capacity in 2000. Swiss average plants size is 20'000 t/a.

## Extrapolations
This dataset has been extrapolated from year 2000 to the year of the calculation (2019). The uncertainty has been adjusted accordingly.
