# anode production, paste, for aluminium electrolysis

Dataset: EcoSpold 2, unit process
Geography: IAI Area, Gulf Cooperation Council
Time period: 2015-01-01 to 2019-12-31
Technology level: outdated
Classification: ISIC rev.4 ecoinvent: 2790:Manufacture of other electrical equipment
Classification: EcoSpold01Categories: metals/extraction
Scenario: Business-as-Usual
System model: Allocation at the point of substitution
Generated by: Linlin Wu
Published in: International Aluminium Insitute 2015
Database: ecoinvent
isCopyrightProtected: false
accessRestrictedTo: 1

## General comment
Industry average of paste anodes for use in the Hall-Héroult process using Söderberg technology.
[This dataset is meant to replace the following datasets:]

## Included activities start
The unit process begins with the unloading of process materials to the storage areas on site. The operations associated with this unit process include:
* anode mix preparation and anode briquette forming;
* maintenance and repair of plant and equipment; and
* treatment of process air, liquids and solids.
Treatment of scrubber sludges are excluded, as there is no corresponding waste treatment in the ecoinvent database.

## Included activities end
The output of this process is anode paste (briquettes) to be transported to electrolysis plants employing Söderberg technology.

## Geography
Data mostly from global surveys by IAI.

## Reference product
- anode, paste, for aluminium electrolysis: 1 kg; name anodePasteAmount; By-product classification allocatable product; CPC 46950: Carbon electrodes, carbon brushes, lamp carbons, battery carbons and other articles of graphite or other carbo[…]
  production volume 0 kg; name anodePasteProductionVolume
    Calculated value based on reported data, scaled up to correspond with Annual Production Volume of aluminium using Söderberg technology.
  property price 0.15 EUR2005; name anodePasteAmount_price_EUR2005
    Literature value; U.S. Department of Energy (Inert Anode Roadmap, 1998, http://www1.eere.energy.gov/manufacturing/industries_technologies/aluminum/pdfs/inertroad.pdf).
  property carbon content 0.868686
    carbon content on a dry matter basis (reserved; not for manual entry)
  property true value 0.15; name anodePasteAmount_true_value
    allocation property applied in "true value" allocation // value calculated from revenue
  properties: water content 0, wet mass 1 kg, water in wet mass 0 kg, dry mass 1 kg, carbon content, non-fossil 0, carbon content, fossil 0.868686, carbon allocation 0.868686 kg

## By-products
- heat, for reuse in municipal waste incineration only: 0 MJ; CPC 17300: Steam and hot water; By-product classification allocatable product; pedigree (1,1,1,1,1)
  Net electricity generated from this waste and used in internal MSWI plant energy redistribution.
  Uncertainty: uncertainty is calculated from uncertainties in waste composition and uncertainties in energy efficiency and the uncertainty in internal energy demand
  property exergy 0.1842 MJ; name E_th_prod_MSWI_exergy
    This exergy property is based on the exergy content of the product.
  property price 0.0106 EUR2005; name E_th_prod_MSWI_price_EUR2005
    Average European district heat price from Ecoheatcool and Euroheat 2005-2006, Ecoheat Work package 1: The European heat market. Final report. 10.6 EUR/GJ i s the price of district heat. http://www.solarthermalworld.org/files/Ecoheatcool%20WP1%20Web.pdf?download
  property true value relation 0.1842; name E_th_prod_MSWI_true_value_relation
    property to calculate "true value" from
  property true value 6.78351e-10
    allocation property applied in "true value" allocation // value calculated from true value relation
- electricity, for reuse in municipal waste incineration only: 0 kWh; CPC 17100: Electrical energy; By-product classification allocatable product; pedigree (1,1,1,1,1)
  (same comment as for heat, for reuse in municipal waste incineration only)
  property price 0.1 EUR2005; name E_el_prod_MSWI_price_EUR2005
    Estimated to be the same price as in case of electricity, medium voltage.
  property exergy 3.6 MJ; name E_el_prod_MSWI_exergy
    This exergy property is based on the exergy content of the product.
  property true value relation 3.6; name E_el_prod_MSWI_true_value_relation
    property to calculate "true value" from
  property true value 1.86718e-9
    (same comment as for heat, for reuse in municipal waste incineration only)

## Inputs from technosphere
- waste asphalt: -0.00265 kg; name wasteCarbonAmount; source International Aluminium Insitute 2015; lognormal variance with pedigree 0.0032, pedigree (1,3,3,1,1)
  EcoSpold01Location=CH
  Proxy for treatment of waste carbon
  production volume 0 kg; = wasteCarbonAmount*anodePasteProductionVolume
    Calculated from the production volume of anode, for aluminium electrolysis in proportion to the respective output amounts.
  property price 0 EUR2005; name wasteCarbonAmount_price_EUR2005
  properties: dry mass 0.999 kg, carbon content, fossil 0.0440796, water content 0.001001, wet mass 1 kg
  note on carbon content, fossil: The waste contains 94.7% inert material (see Tab A.5 for details) 5.3% bitumen (see Tab A.6 for details), ecoinvent v2.2 report 13_I
- fly ash and scrubber sludge: -0.000658 kg; source International Aluminium Insitute 2015; lognormal variance with pedigree 0.0040006, pedigree (1,4,3,1,1)
  Reported as scrubber sludges in landfill solid waste
  production volume 0 kg; = anodePasteProductionVolume * ((Ref('bc70dc2d-da16-4942-9be9-6d8feb2a9bea')*-1) / anodePasteAmount)
    Calculated from production volume of reference product using the relative outputs.
  properties: carbon content, fossil 0.167, dry mass 0.1 kg, water content 9, wet mass 1 kg
  note on carbon content, fossil: Tab A.6, ecoinvent v2.2 report 13_I. C content has been calculated after data in the tables, and then referred to 1 kg DM
- heat, district or industrial, other than natural gas: 0.338082 MJ; = Net_Heat_Value_HFO * kgFuel_Input_HFO /fuel_use_HFO; source International Aluminium Insitute 2015; lognormal variance with pedigree 0.002, pedigree (1,1,3,1,1)
  Heavy oil combustion.
  Uncertainty: No uncertainty added - uncertainty should be based on propagation of the uncertainty of the underlying parameters.
  property Corresponding fuel use 1.053 MJ; name fuel_use_HFO
  property fuel input in physical units, kg 0.0089 kg; name kgFuel_Input_HFO
  property heating value, net 40 MJ; name Net_Heat_Value_HFO
  note on Corresponding fuel use: Lower heating value of the fuel input related to the heat/electricity output
- heat, district or industrial, natural gas: 0.00877923 MJ; = Net_Heat_Value_ng * m3fuel_use_ng/ fuel_use_ng; source International Aluminium Insitute 2015; lognormal variance with pedigree 0.002, pedigree (1,1,3,1,1)
  Natural gas combustion
  Uncertainty: No uncertainty added - uncertainty should be based on propagation of the uncertainty of the underlying parameters.
  property heating value, net 40.4 MJ; name Net_Heat_Value_ng
  property fuel input in physical units, m3 0.000226 m3; name m3fuel_use_ng
  property Corresponding fuel use 1.04 MJ; name fuel_use_ng
  note on heating value, net: net (lower) heating (calorific) value. Based on European average as reported in Dones et al. 2007.
  note on Corresponding fuel use: Lower heating value of the fuel input related to the heat/electricity output, based on an efficiency of 96%
- electricity, medium voltage: 0 kWh; source International Aluminium Insitute 2015; pedigree (1,1,1,1,1)
  EcoSpold01Location=UCTE
- anode factory: 2.5e-10 unit; source Classen M. 2008; lognormal variance with pedigree 0.5, pedigree (5,5,5,5,5)
  EcoSpold01Location=RER
  Rough estimate
  Uncertainty: rough guess
- pitch: 0.306 kg; source International Aluminium Insitute 2015; lognormal variance with pedigree 0.0027, pedigree (1,2,3,1,1)
  Reported as Pitch in IAI report
  EcoSpold01Location=RER
  properties: dry mass 1 kg, wet mass 1 kg, carbon content, fossil 0.83
- inert waste, for final disposal: -0.00098 kg; lognormal variance with pedigree 0.00261, pedigree (1,3,3,1,1)
  as ecoInvent does not relevent recycled by-products, this number includes external recyceled by products, as well as landfilled industrial waste.
  production volume 0 kg; = anodePasteProductionVolume * ((Ref('a24e6f75-91b2-47d6-b452-9ebed2f0522b')*-1) / anodePasteAmount)
    Calculated from production volume of reference product using the relative outputs.
  properties: wet mass 1 kg, water content 0.00502513, dry mass 0.995 kg
- petroleum coke: 0.702 kg; source International Aluminium Insitute 2015; lognormal variance with pedigree 0.0027, pedigree (1,2,3,1,1)
  EcoSpold01Location=RER
  properties: carbon content, fossil 0.885, dry mass 1 kg, wet mass 1 kg
- electricity, medium voltage: 0.00741262, 0.0143253, 0.0551747, 0.00108737 kWh (4 entries); source International Aluminium Insitute 2015; lognormal variance with pedigree 0.0027, pedigree (1,2,3,1,1)
  EcoSpold01Location=UCTE

## Inputs from nature
- Water, cooling, unspecified natural origin [natural resource, in water]: 0.00475 m3; source International Aluminium Insitute 2015; lognormal variance with pedigree 0.0038, pedigree (2,3,3,1,1)
  Specified as freshwater in IAI report.

## Emissions to nature
- Hydrocarbons, unspecified [water, unspecified]: 2.02e-5 kg; source International Aluminium Insitute 2015; lognormal variance with pedigree 0.004001, pedigree (1,4,3,1,1)
  Reported as Oil and grease/total hydrocarbons in IAI survey, reporting rate 2%
- Particulates, > 10 um [air, unspecified]: 4.9e-5 kg; source International Aluminium Insitute 2015; lognormal variance with pedigree 0.0026, pedigree (1,3,3,1,1)
  the only particulates that is reported in the IAI 2015 LCI survey
  Uncertainty: Uncertainty calculated from that of underlying variables.
  property ratio pf particulates greater than 10 microns 0.2; name PM_greater_10um; = (4-3.2)/4
  property total particulates 0.0001 kg; name PM_total_2
- Fluoride [water, unspecified]: 7.1e-5 kg; source International Aluminium Insitute 2015; lognormal variance with pedigree 0.00401, pedigree (1,4,3,1,1)
- Sulfur dioxide [air, unspecified]: 5.1e-5 kg; source International Aluminium Insitute 2015; lognormal variance with pedigree 0.0032, pedigree (1,3,3,1,1)
- Water [water, surface water]: 0.0042 m3; lognormal variance with pedigree 0.0038, pedigree (2,3,3,1,1)
- PAH, polycyclic aromatic hydrocarbons [air, unspecified]: 1e-7 kg; source International Aluminium Insitute 2015; lognormal variance with pedigree 0.0026, pedigree (1,3,3,1,1)
  Reporting rate 7%
  Uncertainty: Uncertainty calculated from that of underlying variables.
  property total PAH emission to air 7.5e-6 kg; name totalPAH
- Benzo(a)pyrene [air, unspecified]: 2e-8 kg; name BaPAmount; source International Aluminium Insitute 2015; lognormal variance with pedigree 0.304, pedigree (1,4,3,1,1)
  Reporting rate 4%
- Water [air, unspecified]: 0.00071 m3; source International Aluminium Insitute 2015; lognormal variance with pedigree 0.2106, pedigree (5,5,5,5,5)
  IAI data reported as "Fresh Water Consumption"
- Nitrogen oxides [air, unspecified]: 1.5e-5 kg; source International Aluminium Insitute 2015; lognormal variance with pedigree 0.0426, pedigree (1,3,3,1,1)
- PAH, polycyclic aromatic hydrocarbons [water, unspecified]: 3e-8 kg; source International Aluminium Insitute 2015; lognormal variance with pedigree 0.0046, pedigree (1,4,3,1,1)
  Reported as PAH (6 Borneff components)
- Suspended solids, unspecified [water, unspecified]: 0.00011 kg; source International Aluminium Insitute 2015; lognormal variance with pedigree 0.0046, pedigree (1,4,3,1,1)

## Sampling procedure
Flows are based on a life cycle inventory (LCI) survey and an energy survey carried out by IAI for its member and non member companies. The survey was conducted in 2016 for 2015 data. No data is reported from this region, therefore, weighted averages from global reported facilities are adopted.

## Extrapolations
The infrastructure input was not covered by the IAI survey and uses the rough guess in ecoinvent 2.2.
