# bicycle production

Dataset: EcoSpold 2, unit process
Geography: RER
Time period: 2000-01-01 to 2019-12-31
Technology level: current
Classification: ISIC rev.4 ecoinvent: 3092:Manufacture of bicycles and invalid carriages
Classification: EcoSpold01Categories: transport systems/road
Synonyms: Citybike
Scenario: Business-as-Usual
System model: Allocation at the point of substitution
Generated by: Marianne Leuenberger
Published in: Spielmann M. 2007
Database: ecoinvent
isCopyrightProtected: true
accessRestrictedTo: 1

## General comment
The data set reflects a bike of 17kg including additionals (e.g. carriers, lights). The frame material is Aluminium. Disposal of bicycle is included.

## Included activities end
This data set includes the material use for the manufacturing of an average bicycle and the disposal of a bicycle. Manufacturing of the bike parts is assumed to take place in China. Transport to Europe included.

## Geography
Data cover manufacturing in China and retail in Europe.

## Technology
Citybike

## Parameters
- fraction, process water, to air: 0.15 dimensionless; name fraction_PW_to_air; lognormal variance with pedigree 0.092025, pedigree (4,4,3,2,4)
  Literature value. In case when no industry/process specific data are available, default evaporation fraction value is used. This value is 15% and is based on literature (Statistics Canada, 2007 & Shaffer, K.H., 2008, Consumptive water use in the Great Lakes Basin, USGS & Shiklomanov, 2003, World Water Resources at the Beginning of the 21st Century) and has been approved by an expert.
- fraction, tap water, to air: 0.15; name fraction_TW_to_air; = fraction_PW_to_air; lognormal variance with pedigree 0.092025, pedigree (4,4,3,2,4)
  Calculated value. See comment in the other parametres present in this dataset. Tap water is considered to be always used as process water, thus process water fractions to air are applied to all tap water input flows to calculate the amount of water consumed in the processes.

## Reference product
- bicycle: 1 unit; By-product classification allocatable product; CPC 49921: Bicycles and other cycles, not motorized
  EcoSpold01Location=RER
  production volume 1.32237 unit
    This is a placeholder value that does not reflect real-world production volumes. This dataset does not currently require a real-world production volume to work in the database framework, and no actual data were collected yet. This has no negative effect on the results of the ecoinvent database. The placeholder value of this activity was scaled according to the nominal GDP of 2005 (source: United Nations, http://data.un.org/Glossary.aspx?q=GDP+%28current+US%24%29, accessed 20130726) to reflect an appropriate share of the global production volume, which is also a placeholder value.
  property price 85.59 EUR2005
    Calculated based on literature value (UN Commodity Trade Statistics Database) using data on trade value and net weight (kg) for 5 reference countries/regions (RER, USA, JP, CN and IN) which average is assumed to be a good approximation of the global price. This is not a purchaser's price.
  property carbon content 0
    carbon content on a dry matter basis (reserved; not for manual entry)
  property true value 85.59
    allocation property applied in "true value" allocation // value calculated from revenue
  properties: dry mass 0 kg, carbon content, fossil 0, water content 0, wet mass 0 kg, water in wet mass 0 kg, carbon content, non-fossil 0, carbon allocation 0 kg

## By-products
- electricity, for reuse in municipal waste incineration only: 0 kWh; CPC 17100: Electrical energy; By-product classification allocatable product; pedigree (1,1,1,1,1)
  Net electricity generated from this waste and used in internal MSWI plant energy redistribution.
  Uncertainty: uncertainty is calculated from uncertainties in waste composition and uncertainties in energy efficiency and the uncertainty in internal energy demand
  production volume 0.597696 kWh
  property exergy 3.6 MJ; name E_el_prod_MSWI_exergy
    This exergy property is based on the exergy content of the product.
  property true value relation 3.6; name E_el_prod_MSWI_true_value_relation
    property to calculate "true value" from
  property price 0.1 EUR2005; name E_el_prod_MSWI_price_EUR2005
    Estimated to be the same price as in case of electricity, medium voltage.
  property true value 0.0580296
    allocation property applied in "true value" allocation // value calculated from true value relation
- heat, for reuse in municipal waste incineration only: 0 MJ; CPC 17300: Steam and hot water; By-product classification allocatable product; pedigree (1,1,1,1,1)
  Net useful heat generated from this waste and used in internal MSWI plant energy redistribution.
  Uncertainty: uncertainty is calculated from uncertainties in waste composition and uncertainties in energy efficiency and the uncertainty in internal energy demand
  production volume 4.20992 MJ
  property true value relation 0.1842; name E_th_prod_MSWI_true_value_relation
    property to calculate "true value" from
  property exergy 0.1842 MJ; name E_th_prod_MSWI_exergy
    This exergy property is based on the exergy content of the product.
  property price 0.0106 EUR2005; name E_th_prod_MSWI_price_EUR2005
    Average European district heat price from Ecoheatcool and Euroheat 2005-2006, Ecoheat Work package 1: The European heat market. Final report. 10.6 EUR/GJ i s the price of district heat. http://www.solarthermalworld.org/files/Ecoheatcool%20WP1%20Web.pdf?download
  property true value 0.0209137
    (same comment as for electricity, for reuse in municipal waste incineration only)
- zinc concentrate: 0 kg; CPC 14290: Other non-ferrous metal ores and concentrates (other than uranium or thorium ores and concentrates); By-product classification allocatable product
  Calculated value from the knowledge of the properties of both products.
  production volume 3.767e-5 kg
  property price 0.38 EUR2005; name ByP_price_EUR2005
    Temporary price data. Calculated as 90% of purchasers price based on: Zinc content in concentrate 53%. Concentrate price per kg Zn 86.5% of refined Zn price (13.5% treatment charges according to CHR Metals Limited 2005: Dynamic cost curves. http://www.minecost.com/dynamic.pdf). 2004 zinc price from USGS (2007) Mineral commodity summaries 2007. <http://minerals.usgs.gov/minerals/pubs/mcs/2007/mcs2007.pdf> [Accessed 25 May 2010]
  property zinc content 0.53; name zinc_C_zinc_concentrate
    Zinc content on a dry matter basis. Value taken from teh "zinc mine operation" /GLO dataset.
  property dry mass 1 kg; name DM_zinc_concentrate
  property carbon content 0
    carbon content on a dry matter basis (reserved; not for manual entry)
  property true value 1.08242e-5
    allocation property applied in "true value" allocation // value calculated from revenue
  properties: wet mass 1 kg, water content 0, carbon content, non-fossil 0, carbon content, fossil 0, water in wet mass 0 kg, carbon allocation 0 kg

## Inputs from technosphere
- polyethylene, high density, granulate: 1.9557 kg; lognormal variance with pedigree 0.0086, pedigree (2,1,4,1,1)
  EcoSpold01Location=RER
  Uncertainty: Literature, Shimano/Selle Italia
  properties: wet mass 1 kg, carbon content, fossil 0.857143, dry mass 1 kg
  note on carbon content, fossil: Polyethylene is formed out of a huge amount of ethylene monomers (C2H4) (ecoinvent v2.2 report 11_II). MW=28 g/mol
- tap water: 0.743314 kg; name tap_water_input; lognormal variance with pedigree 0.0092, pedigree (2,3,4,1,1)
  EcoSpold01Location=RER
  Uncertainty: Assumption based on: Cherry, C.R. 2009, 1488 liters waste water for all production phases (incl. Battery manufacturing --> 50%)
  properties: dry mass 0.000337476 kg, carbon content, fossil 0.00178991, water content 2962.17, wet mass 1 kg
  note on carbon content, fossil: Bicarbonate content is 2.93 mol/m3. CO2 content is 0.1 mol/m3 (ecoinvent v2.2 report 8, Tab 93.1).
- used bicycle: -0.999078 unit; lognormal variance with pedigree 0.3086, pedigree (2,1,4,1,1)
  Uncertainty: Estimation: Bike 15'000km
  production volume 1.32237 unit; = Ref('5af61512-32f3-4290-856a-046aa11c8d79', 'ProductionVolume') * ((Ref('9484cba3-dbd1-46f0-9067-628d240cdfd1')*-1) / Ref('5af61512-32f3-4290-856a-046aa11c8d79'))
    Calculated from production volume of reference product using the relative outputs.
  property carbon content, non-fossil 0; name C_content_non_fossil
  property carbon content, fossil 0.130184; name C_content_fossil
  property water in wet mass 0 kg; name WWM
  property dry mass 17 kg; name DM
  property water content 0; name water_content
  property wet mass 17 kg; name WM
- chromium steel removed by turning, average, conventional: 0.158853 kg; lognormal variance with pedigree 0.096, pedigree (4,1,4,1,4)
  activityLink introduced to establish a direct link to the corresponding regional supply of this product
  Uncertainty: Assumption
  properties: carbon content, fossil 0.0008, wet mass 1 kg, dry mass 1 kg
- road vehicle factory: 9.36067e-10 unit; lognormal variance with pedigree 0.3086, pedigree (2,1,4,1,1)
  activityLink introduced to establish a direct link to the corresponding regional supply of this product
  Uncertainty: Extrapolation for bicycle plant: 25% of weight ratio
- polyurethane, flexible foam: 0.0299724 kg; lognormal variance with pedigree 0.0086, pedigree (2,1,4,1,1)
  EcoSpold01Location=RER
  Uncertainty: Literature, Selle Italia
  properties: dry mass 1 kg, carbon content, fossil 0.633827, wet mass 1 kg
  note on carbon content, fossil: Polyurethanes (PUR) is the collective name for an extensive group of polymers with very different compositions and correspondingly varied property profiles, though their molecule chain contains all a urethane group (-NH-CO-O-). All PURs are built on a common principle : they are produced by the diisocyanate polyaddition process, that links polyols and (di)isocyanates. In this dataset, an example of typical polyurethane mixture is described (Ullmann, Polyurethanes, Dieterich et al. & ecoinvent v2 report 11_II). C content was calculated as an addition of C contents in its components.
- steel, chromium steel 18/8, hot rolled: 1.58853 kg; lognormal variance with pedigree 0.0086, pedigree (2,1,4,1,1)
  EcoSpold01Location=RER
  Uncertainty: Factsheets Bicycle parts manufacturere: Shimano, DT Swiss
  properties: carbon content, fossil 0.0008, dry mass 1 kg, wet mass 1 kg
  note on carbon content, fossil: Stainless steel model is the grade 304 steel (18/8 stainless, 18% chromium 8% nickel; max. 0.08% C)
- welding, arc, aluminium: 0.749309 m; lognormal variance with pedigree 0.096, pedigree (4,1,4,1,4)
  activityLink introduced to establish a direct link to the corresponding regional supply of this product
  Uncertainty: Assumption: pipe diameter: 4cm --> 0.125 m per joint, 6 joints per bike
- synthetic rubber: 0.561982 kg; lognormal variance with pedigree 0.0086, pedigree (2,1,4,1,1)
  EcoSpold01Location=RER
  Uncertainty: Literature, Schwalbe
  properties: dry mass 1 kg, wet mass 1 kg, carbon content, fossil 0.871949
  note on carbon content, fossil: EPDM (Ethylene-propene-diene terpolymer) rubber is a terpolymer of ethylene, propene, and a diene with the residual unsaturated portion of the diene in the side chain (ecoinvent v2.2 report 7-part XX & Ullmann). Chemical formula (deduced from Evidences of Solvent-Induced Miscibility in Polychloroprene-co-Ethylene-Propene Diene Terpolymer Blends, Dubey et al., Journal of Applied Polymer Science, 2009, 111:1884–1891): C20H35
- electricity, medium voltage: 6.88385 kWh; lognormal variance with pedigree 0.13, pedigree (4,4,5,1,4)
  EcoSpold01Location=CN
  Uncertainty: Extrapolation from passenger car manufacture using weight ratio, thereof 25%
- heat, district or industrial, natural gas: 13.5677 MJ; lognormal variance with pedigree 0.13, pedigree (4,4,5,1,4)
  EcoSpold01Location=RER
  Uncertainty: Extrapolation from passenger car manufacture; weight ratio
- wastewater, average: 0 m3; pedigree (1,1,1,1,1)
  EcoSpold01Location=CH
  Uncertainty: Assumption based on: Cherry, C.R. 2009, 1488 liters waste water for all production phases (incl. Battery manufacturing --> 50%)
  production volume 0 m3
    Calculated from the production volume of bicycle in proportion to the respective output amounts.
  properties: wet mass 1000 kg, dry mass 0.346837 kg, carbon content, non-fossil 0.194039, water content 2882.2
  note on carbon content, non-fossil: 0.0673 kg TOC/m3 (Tab A.17, ecoinvent v2.2 report 13_I). TOC was considered as Total Carbon.
- municipal solid waste: -4.49585 kg; lognormal variance with pedigree 0.0092, pedigree (2,3,4,1,1)
  EcoSpold01Location=CH
  Uncertainty: Assumption based on: Cherry, C.R. 2009, 4.5 kg solid waste per bicycle
  production volume 4.5 kg
    (same comment as for wastewater, average)
  properties: dry mass 0.771 kg, carbon content, fossil 0.171549, wet mass 1 kg, water content 0.297017, carbon content, non-fossil 0.261655
  note on carbon content, fossil: MSW composition in tab 4.1, ecoinvent v2.2 report 13_I. C content referred to 1 kg DM
- aluminium, wrought alloy: 7.52556 kg; lognormal variance with pedigree 0.0086, pedigree (2,1,4,1,1)
  Uncertainty: Factsheets Bicycle parts manufacturere: Shimano, DT Swiss
  properties: dry mass 1 kg, wet mass 1 kg
- wire drawing, steel: 0.337189 kg; lognormal variance with pedigree 0.096, pedigree (4,1,4,1,4)
  (same comment as for chromium steel removed by turning, average, conventional)
- injection moulding: 1.9557 kg; lognormal variance with pedigree 0.096, pedigree (4,1,4,1,4)
  (same comment as for chromium steel removed by turning, average, conventional)
- section bar extrusion, aluminium: 3.76283 kg; lognormal variance with pedigree 0.0587, pedigree (4,2,4,5,4)
  activityLink introduced to establish a direct link to the corresponding regional supply of this product
  Uncertainty: Assumption for pipe drawing. Pedigree matrix set according to expert judgment and variance of log-transformed data set to default value
- powder coat, aluminium sheet: 0.349677 m2; lognormal variance with pedigree 0.096, pedigree (4,1,4,1,4)
  activityLink introduced to establish a direct link to the corresponding regional supply of this product
  Uncertainty: Assumption: pipe diamter: 4cm, pipe length: 3m
- steel, low-alloyed, hot rolled: 4.89798 kg; lognormal variance with pedigree 0.0086, pedigree (2,1,4,1,1)
  (same comment as for steel, chromium steel 18/8, hot rolled)
  properties: carbon content, fossil 0.005, wet mass 1 kg, dry mass 1 kg
  note on carbon content, fossil: Low alloyed steel composition given in Tab. 3.2 ecoinvent v2.2 report 10_partII. Steel assumed to have a C content of 0.5%
- heat, district or industrial, other than natural gas: 0.19252 MJ; lognormal variance with pedigree 0.13, pedigree (4,4,5,1,4)
  EcoSpold01Location=RER
  Uncertainty: Extrapolation from passenger car manufacture using weight ratio, thereof 25%
- wastewater, average: -0.000670752, -7.25627e-5 m3 (2 entries); lognormal variance with pedigree 0.0092, pedigree (2,3,4,1,1)
  (same comment as for wastewater, average)
  production volume 0.000744 m3

## Emissions to nature
- Water [air, unspecified]: 0.000111497 m3; name water_to_air_unspecified; = (tap_water_input/1000*fraction_TW_to_air); lognormal variance with pedigree 0.0487, pedigree (2,2,4,1,1)
  Calculated value based on literature values and expert opinion. See comments in the parametres' comment field.
  property fraction, origin: fresh water 1; name fraction_origin_fresh_water
  property fraction, origin: unspecified 0; name fraction_origin_unspecified
  property fraction, origin: salt water 0; name fraction_origin_salt_water

## Sampling procedure
Literature

## Extrapolations
Manufacturing plant is extrapolated from passenger car plant, electricity consumption extrapolated according to weight ratio from passenger car (50%)

## Review by Christian Bauer 2010-02-07
26.01.2010
passed
C:\Dokumente und Einstellungen\Marianne\Eigene Dateien\Projekte\277_Mobitool\Review\[Ecospold_Bike-v1.1.xls]X-Process

## Review by Carl Vadenbo 2012-06-28
In preparation for the release of ecoinvent v3.0, exchange for disposal of used bicycle was moved from the dataset 'transport, passenger, bicycle, CH' to 'bicycle production, RER' The amounts and the uncertainty information of the exchanges were reviewed and the dataset was accepted for inclusion into the ecoinvent database on 2012.07.04.
