# electricity production, peat

Dataset: EcoSpold 2, unit process
Geography: FI
Time period: 1980-01-01 to 2019-12-31
Technology level: current
Classification: ISIC rev.4 ecoinvent: 3510:Electric power generation, transmission and distribution
Classification: EcoSpold01Categories: lignite/power plants
Tags: peat power; fossil fuels
Scenario: Business-as-Usual
System model: Allocation at the point of substitution
Generated by: Karin Treyer
Published in: Röder, A. 2007
Database: ecoinvent
isCopyrightProtected: true
accessRestrictedTo: 1

## General comment
This dataset represents the production of high voltage electricity in an average peat power plant on the world in 2012. This dataset has been extrapolated from a global 2008 dataset representing electricity production with lignite due to the lack of specific peat data.
The only exceptions are data for efficiency and emissions of SO2, NOx, particles and CO2 (see tab. 9.28 in Röder et al. 2007). These emissions were available from peat incineartion in Finland. As electricity from peat is mainly produced in Finland, Ireland, Sweden and Russia, these values were taken over for this dataset.
In this dataset, no desulfurisation and denitrification is taken into account.
All following information are valid for lignite.
For the assessment of main characteristics (sulphur and ash content of coal, efficiency of the plant) and criteria emissions (SOx, NOx, particles, and CO2) a bottom-up approach has been used. It consists in the collection of information about single plants (in this case in Finland).
- The size distribution of particle emissions has been derived from German data.
- Halogene emissions have been estimated on the basis of the content of the species in the country-specific coal input mix, assuming average retention rates.
- For CO and particle emissions average values for the former UCTE are included (Union for the Coordination of the Transmission of Electricity, since 2009 replaced by ENTSO-E European Network of Transmission System Operators for Electricity).
- Emissions of trace elements were calculated by means of a formula (CORINAIR) using the ash content in the country-specific coal input mix and average transfer coefficients for coal power plants, taking into account the share of DeSOx installed.
- Emission of uranium and thorium radioactive isotopes were assumed proportional to the corresponding element emitted with particles; the other non-gaseous radioactive isotopes of the uranium and thorium decay chain were assumed proportional to the emitted U-238 or Th-232.
- The emission of gaseous radon and K-40 are taken from the literature.
IEA. 2009. Coal information, 2009 edition. Documentation for beyond 2020 files. International Energy Agency.
European Environment Agency (1991) CORINAIR Inventory; VOC's Default Emission Factors

## Included activities start
From the constructed lignite power plant ready to produce electricity.

From reception of peat and operating materials at power plant gate.

## Included activities end
This activity ends with 1kWh of high voltage electricity produced at the power plant and arrived at the busbar.

This dataset includes:
- all operation and maintenance activities and materials of the power plants.

- Particle removal (dedusting of the flue gas)
- Cooling: It is assumed that all plants use wet cooling with a cooling tower. No cooling tower is included in this dataset (will be implemented in future versions)
- Loss of feed water

This dataset doesn't include
- raw materials extraction, decommissioning and waste treatment as these activities are already included in the infrastructure datasets
- transformation of the electricity produced
- The disposal of non-recycled ashes is modelled separately.
- Use of fuel oil for startup, as this can be neglected for lignite power plants because these are run for a long time (2-3 years) without being shut down.
- Desulfurisation and denitrification.

## Technology
A lignite power plant is used as infrastructure. Lignite power plant input is a dataset which consists out of a mix of 30% 100MW power plant and 70% 500MW power plant. The plants are used for basic load with 6000 hours of operation at full capacity per year. The plants are assumed to operate 200000 hours during its lifetime.

## Time period
The Annual Production Volume is valid for the year 2012.

## Parameters
- factor: input of MJ for the production of 1 kWh: 9.65147 MJ/kWh; name factor_MJ_kWh; = 1*3.6/efficiency; lognormal variance with pedigree 0.0532, pedigree (4,4,3,4,4)
  Calculated value. 3.6 MJ = 1kWh.
  nan
- water consumption, electricity production from hard coal, recirculating CS: 0.0018 m3/kWh; name WConsumption_EP_HC_recirculatingCS; lognormal variance with pedigree 0.092025, pedigree (4,4,3,2,4)
  Estimated based on literature (Scown, 2011, Water Footprint of U.S. Transportation Fuels, SI). The amount of water consumed while burning lignite and peat is assumed to be the same as in case of coal.
  nan
- fraction, water, completely softened, to air: 0.15; name fraction_WCS_to_air; = fraction_PW_to_air; lognormal variance with pedigree 0.092025, pedigree (4,4,3,2,4)
  Calculated value. See comment in the other parametres present in this dataset. Water, completely softened is considered to be always used as process water, thus process water fractions to air are applied to all water, completely softened input flows to calculate the amount of water consumed in the processes.
  nan
- recirculating cooling system as a fraction of all cooling systems: 0.27 dimensionless; name recirculating_CS_fraction_from_allCS; lognormal variance with pedigree 0.092025, pedigree (4,4,3,2,4)
  Calculated as an average of data available for Europe (Floerke, 2008, Future changes of freshwater needs in the electricity production sector) and USA (NERL, 2011, Estimating freshwater needs to meet future thermoelectric generation requirements).
  nan
- efficiency: 0.373 dimensionless; lognormal variance with pedigree 0.003725, pedigree (3,2,1,2,2)
  Literature value/calculated value. Net electrical efficiency based on the lower heating value (LHV).
  For all OECD countries, the IEA Electricity information 2014 provides data for the year 2012 on fuel input (TJ, Net calorific value NCV) and gross electricity production (GWh) as well as heat production (TJ) in tables 8 and 9 for each country for electricity only and Combined Heat and Power (CHP) plants each. Together with the information on own use (see parameter 'losses'), the net electrical efficiency based on the NCV is calculated.
  For all non-OECD countries, data from the IEA Energy balances of non-OECD countries 2014 have been used. These tables do not always provide information on how much of the electricity has been produced in electricity only and in CHP plants, but often give the total value only.
  IEA. 2014. Electricity Information 2014. ISBN 978-92-64-21692-1. International Energy Agency (IEA), Paris Cedex (FR).
  IEA/OECD. 2014. Energy balances of non-OECD countries 2014. International Energy Agency (IEA), Paris Cedex (FR).
  output relative to input (requires additional specification)
- fraction, water, decarbonised, to air: 0.0251074; name fraction_WDC_to_air; = fraction_CW_to_air; lognormal variance with pedigree 0.092025, pedigree (4,4,3,2,4)
  Calculated value. See comments in the other parametres present in this dataset. Decarbonised water is considered to be always used as cooling water, thus cooling water fractions to air are applied to all carbonised water input flows to calculate the amount of water consumed in the processes.
  nan
- fraction, process water, to air: 0.15 dimensionless; name fraction_PW_to_air; lognormal variance with pedigree 0.092025, pedigree (4,4,3,2,4)
  Literature value. In case when no industry/process specific data are available, default evaporation fraction value is used. This value is 15% and is based on literature (Statistics Canada, 2007 & Shaffer, K.H., 2008, Consumptive water use in the Great Lakes Basin, USGS & Shiklomanov, 2003, World Water Resources at the Beginning of the 21st Century) and has been approved by an expert.
  nan
- once-through and cooling pond cooling systems as a fraction of all cooling syste: 0.73 dimensionless; name once_through_andCP_CS_fractio_from_allCS; lognormal variance with pedigree 0.092025, pedigree (4,4,3,2,4)
  (same comment as for recirculating cooling system as a fraction of all cooling systems)
- fraction, cooling water, to air: 0.0251074; name fraction_CW_to_air; lognormal variance with pedigree 0.092025, pedigree (4,4,3,2,4)
  Calculated
  nan
- water withdrawal, electricity production from hard coal, once-through and coolin: 0.0815 m3/kWh; name WWithdrawal_EP_HC_once_through_andCP_CS; lognormal variance with pedigree 0.092025, pedigree (4,4,3,2,4)
  Estimated based on literature (Scown, 2011, Water Footprint of U.S. Transportation Fuels, SI). The amount of water withdrawn while burning lignite and peat is assumed to be the same as in case of coal.
  nan
- water withdrawal, electricity production from hard coal, recirculating CS: 0.0021 m3/kWh; name WWithdrawal_EP_HC_recirculating_CS; lognormal variance with pedigree 0.092025, pedigree (4,4,3,2,4)
  (same comment as for water withdrawal, electricity production from hard coal, once-through )
- water consumption, electricity production from hard coal, once-through and cooli: 0.0014 m3/kWh; name WConsumption_EP_HC_once_through_andCP_CS; lognormal variance with pedigree 0.092025, pedigree (4,4,3,2,4)
  (same comment as for water consumption, electricity production from hard coal, recirculatin)

## Reference product
- electricity, high voltage: 1 kWh; CPC 17100: Electrical energy; By-product classification allocatable product
  production volume 3.494e9 kWh; name apv_electricity_peat
    Literature value/calculated value. Net electricity production 2012 according to the IEA electricity information 2014, taking into account country specific own use of the power plant between gross and net electricity production. Includes electricity production from peat in combined heat and power plants.
    IEA. 2014. Electricity Information 2014. ISBN 978-92-64-21692-1. International Energy Agency (IEA), Paris Cedex (FR).
  property price 0.0977 EUR2005
    Temporary price data. Calculated as 90% of purchasers price based on: 94% of the average price (to account for a 6% loss in transformation and transmission) for electricity for industrial consumersin 2005 (excluded taxes). From IEA.
  property true value 0.0977
    allocation property applied in "true value" allocation // value calculated from revenue

## By-products
- residue from cooling tower: 0 kg; name cooling_tower_residue; By-product classification Waste; CPC 39: Wastes or scraps; pedigree (1,1,3,1,1)
  Exchange present due to parent child relationship
  production volume 0 kg; = apv_electricity_peat * cooling_tower_residue
    Calculated from production volume of reference product using the relative outputs.
  property price 0 EUR2005; name cooling_tower_residue_price_EUR2005
    Waste products are assigned a price of zero as they are assumed to require further treatment.
  property carbon content 0.0544233
    carbon content on a dry matter basis (reserved; not for manual entry)
  properties: water content 0.428571, water in wet mass 0.3 kg, wet mass 1 kg, carbon content, non-fossil 0, dry mass 0.7 kg, carbon content, fossil 0.0544233, carbon allocation 0.0380963 kg
- heat, for reuse in municipal waste incineration only: 0 MJ; CPC 17300: Steam and hot water; By-product classification allocatable product; pedigree (1,1,1,1,1)
  Net electricity generated from this waste and used in internal MSWI plant energy redistribution.
  Uncertainty: uncertainty is calculated from uncertainties in waste composition and uncertainties in energy efficiency and the uncertainty in internal energy demand
  production volume 137.023 MJ
  property exergy 0.1842 MJ; name E_th_prod_MSWI_exergy
    This exergy property is based on the exergy content of the product.
  property price 0.0106 EUR2005; name E_th_prod_MSWI_price_EUR2005
    Average European district heat price from Ecoheatcool and Euroheat 2005-2006, Ecoheat Work package 1: The European heat market. Final report. 10.6 EUR/GJ i s the price of district heat. http://www.solarthermalworld.org/files/Ecoheatcool%20WP1%20Web.pdf?download
  property true value relation 0.1842; name E_th_prod_MSWI_true_value_relation
    property to calculate "true value" from
  property true value 2.57964e-10
    allocation property applied in "true value" allocation // value calculated from true value relation
- electricity, for reuse in municipal waste incineration only: 0 kWh; CPC 17100: Electrical energy; By-product classification allocatable product; pedigree (1,1,1,1,1)
  (same comment as for heat, for reuse in municipal waste incineration only)
  production volume 19.2981 kWh
  property true value relation 3.6; name E_el_prod_MSWI_true_value_relation
    property to calculate "true value" from
  property price 0.1 EUR2005; name E_el_prod_MSWI_price_EUR2005
    Estimated to be the same price as in case of electricity, medium voltage.
  property exergy 3.6 MJ; name E_el_prod_MSWI_exergy
    This exergy property is based on the exergy content of the product.
  property true value 7.10055e-10
    (same comment as for heat, for reuse in municipal waste incineration only)

## Inputs from technosphere
- chlorine, liquid: 9.65147e-5 kg; = 1E-05 * factor_MJ_kWh; lognormal variance with pedigree 0.212, pedigree (1,1,3,1,1)
  own estimation
  Amount was scaled to the amount of reference product.
  properties: dry mass 1 kg, wet mass 1 kg
- lignite power plant: 1e-11 unit; name lignite_power_plant; = 1/(200000*500*1000); source Röder, A. 2007, p. p.99; lognormal variance with pedigree 0.3686, pedigree (5,3,4,5,3)
  Calculated value. At the moment, the lignite power plant input consists of mix of a 100MWe power plant (30%) and a 500MWe power plant (70%).
  For this calculation, 6000 load hours per year are assumed. It is assumed that a total of 200'000h is reached during the lifetime. A capacity of 500MW is taken for the calculation.
- petroleum coke: 0.00134155 kg; name petroleum_coke; = factor_MJ_kWh*0.000139; lognormal variance with pedigree 0.0446, pedigree (2,1,3,5,4)
  Literature value/calculated value. Petroleum coke use when producing 1kWh of electricity from lignite, based on the value for burning 1MJ of lignite. Weighted average with electricity production data (Itten&Frischknecht 2012) and values of 10 countries
  (AT, BA, CZ, DE, ES, FR, HU, PL, SI, SK) (Röder et al. 2007)
  Source:
  Itten R. and Frischknecht R. (2012) Life Cycle Inventories of Electricity Mixes and Grid. ESU-services Ltd., Uster, Switzerland.
  properties: carbon content, fossil 0.885, dry mass 1 kg, wet mass 1 kg
- lignite ash: -0.0680429 kg; name lignite_ash; = (0.00705 * factor_MJ_kWh)*-1; source Röder, A. 2007, p. Tab. 9.69, p.165; lognormal variance with pedigree 0.072, pedigree (5,1,3,1,1)
  Calculated from mass balance
  Amount was scaled to the amount of reference product.
  production volume 2.37742e8 kg; = apv_electricity_peat*lignite_ash
    Calculated from the production volume of electricity, high voltage in proportion to the respective output amounts.
  property price 0 EUR2005; name ash_price_EUR2005
  properties: dry mass 1 kg, wet mass 1 kg
- lignite power plant: 0 unit; name dummy123; source Röder, A. 2007, p. p.99; uniform min 0, max 0, pedigree (1,1,3,1,1)
  (same comment as for lignite power plant)
- water, completely softened: 0.0579088 kg; name water_softened_input; = 0.006 * factor_MJ_kWh; lognormal variance with pedigree 0.122, pedigree (1,1,3,1,1)
  own estimation
  Amount was scaled to the amount of reference product.
  own estimation
  Amount was scaled to the amount of reference product.
  properties: wet mass 1 kg
- peat: 1.10027 kg; = 0.114 * factor_MJ_kWh; lognormal variance with pedigree 0.0026, pedigree (2,1,3,1,1)
  See power plant data base for details
  Amount was scaled to the amount of reference product.
  property carbon content, non-fossil 0; name C_content_non_fossil
  property dry mass 0.42 kg; name DM
  property carbon content, fossil 0.59; name C_content_fossil
  property water in wet mass 0.58 kg; name WWM
  property water content 1.38095; name water_content
  property wet mass 1 kg; name WM
  note on carbon content, fossil: C content of dry peat is 58-60% (specified in Tab 1.1, report 6, part VI). A mean content of 0.59 kg C/kg dry peat was considered.
- water, decarbonised: 1.44772 kg; name water_decarbonised_input; = 0.15 * factor_MJ_kWh; lognormal variance with pedigree 0.122, pedigree (1,1,3,1,1)
  (same comment as for water, completely softened)
  properties: wet mass 1 kg

## Inputs from nature
- Water, cooling, unspecified natural origin [natural resource, in water]: 0.0562803 m3; name water_cooling_UNO_input; = ((recirculating_CS_fraction_from_allCS*WWithdrawal_EP_HC_recirculating_CS)+(once_through_andCP_CS_fractio_from_allCS*WWithdrawal_EP_HC_once_through_andCP_CS))/10.3*factor_MJ_kWh; lognormal variance with pedigree 0.098025, pedigree (4,4,4,2,4)
  own estimation
  Amount was scaled to the amount of reference product.
  Calculated based on literature data.

## Emissions to nature
- Water [water, unspecified]: 0.0563278 m3; name water_to_water_unspecified; = (water_softened_input/1000)*(1-fraction_WCS_to_air)+(water_decarbonised_input/1000)*(1-fraction_WDC_to_air)+water_cooling_UNO_input*(1-fraction_CW_to_air); lognormal variance with pedigree 0.098025, pedigree (4,4,4,2,4)
  Calculated value based on literature values and expert opinion. See comments in the parametres' comment field.
  property fraction, origin: unspecified 0.971087; name fraction_origin_unspecified_Ww
  property fraction, origin: fresh water 0.0289128; name fraction_origin_fresh_water_Ww
  property fraction, origin: salt water 0; name fraction_origin_salt_water_Ww
- Hydrocarbons, aliphatic, alkanes, unspecified [air, non-urban air or from high stacks]: 2.11367e-6 kg; name hydrocarbons_al_al_unspec; = 2.19E-07 * factor_MJ_kWh; lognormal variance with pedigree 0.302, pedigree (1,1,3,1,1)
  own estimation
  Amount was scaled to the amount of reference product.
- Manganese [air, non-urban air or from high stacks]: 1.05201e-8 kg; name manganese; = 1.09E-09 * factor_MJ_kWh; lognormal variance with pedigree 0.952, pedigree (1,1,3,1,1)
  own estimation
  Amount was scaled to the amount of reference product.
- Radon-220 [air, non-urban air or from high stacks]: 0.0013319 kBq; name radon_220; = 0.000138 * factor_MJ_kWh; lognormal variance with pedigree 0.652, pedigree (1,1,3,1,1)
  own estimation
  Amount was scaled to the amount of reference product.
- Copper [air, non-urban air or from high stacks]: 1.93995e-9 kg; name copper; = 2.01E-10 * factor_MJ_kWh; lognormal variance with pedigree 0.952, pedigree (1,1,3,1,1)
  own estimation
  Amount was scaled to the amount of reference product.
- Bromine [air, non-urban air or from high stacks]: 2.66381e-7 kg; name bromine; = 2.76E-08 * factor_MJ_kWh; lognormal variance with pedigree 0.302, pedigree (1,1,3,1,1)
  own estimation
  Amount was scaled to the amount of reference product.
- Carbon dioxide, fossil [air, non-urban air or from high stacks]: 1.0134 kg; name carbon_dioxide_fossil; = 0.105 * factor_MJ_kWh; lognormal variance with pedigree 0.004, pedigree (3,1,3,1,1)
  Based on available literature
  Amount was scaled to the amount of reference product.
- Iodine [air, non-urban air or from high stacks]: 2.49973e-7 kg; name iodine; = 2.59E-08 * factor_MJ_kWh; lognormal variance with pedigree 0.482, pedigree (1,1,3,1,1)
  own estimation
  Amount was scaled to the amount of reference product.
- Uranium-238 [air, non-urban air or from high stacks]: 2.6059e-6 kBq; name uranium_238; = 2.7E-07 * factor_MJ_kWh; lognormal variance with pedigree 0.652, pedigree (1,1,3,1,1)
  own estimation
  Amount was scaled to the amount of reference product.
- Radium-228 [air, non-urban air or from high stacks]: 3.04987e-6 kBq; name radium_228; = 3.16E-07 * factor_MJ_kWh; lognormal variance with pedigree 0.652, pedigree (1,1,3,1,1)
  own estimation
  Amount was scaled to the amount of reference product.
- Benzene [air, non-urban air or from high stacks]: 2.09437e-6 kg; name benzene; = 2.17E-07 * factor_MJ_kWh; lognormal variance with pedigree 0.302, pedigree (1,1,3,1,1)
  own estimation
  Amount was scaled to the amount of reference product.
- Molybdenum [air, non-urban air or from high stacks]: 8.42574e-10 kg; name molybdenum; = 8.73E-11 * factor_MJ_kWh; lognormal variance with pedigree 0.952, pedigree (1,1,3,1,1)
  own estimation
  Amount was scaled to the amount of reference product.
- Potassium-40 [air, non-urban air or from high stacks]: 7.837e-6 kBq; name potassium_40; = 8.12E-07 * factor_MJ_kWh; lognormal variance with pedigree 0.652, pedigree (1,1,3,1,1)
  own estimation
  Amount was scaled to the amount of reference product.
- Nickel [air, non-urban air or from high stacks]: 4.16944e-9 kg; name nickel; = 4.32E-10 * factor_MJ_kWh; lognormal variance with pedigree 0.952, pedigree (1,1,3,1,1)
  own estimation
  Amount was scaled to the amount of reference product.
- Propene [air, non-urban air or from high stacks]: 1.54424e-7 kg; name propene; = 1.6E-08 * factor_MJ_kWh; lognormal variance with pedigree 0.302, pedigree (1,1,3,1,1)
  own estimation
  Amount was scaled to the amount of reference product.
- Selenium [air, non-urban air or from high stacks]: 2.87614e-8 kg; name selenium; = 2.98E-09 * factor_MJ_kWh; lognormal variance with pedigree 0.952, pedigree (1,1,3,1,1)
  own estimation
  Amount was scaled to the amount of reference product.
- Ethane [air, non-urban air or from high stacks]: 3.9571e-7 kg; name ethane; = 4.1E-08 * factor_MJ_kWh; lognormal variance with pedigree 0.302, pedigree (1,1,3,1,1)
  own estimation
  Amount was scaled to the amount of reference product.
- Water [air, unspecified]: 0.00145809 m3; name water_to_air_unspecified; = (water_softened_input/1000)*fraction_WCS_to_air+(water_decarbonised_input/1000)*fraction_WDC_to_air+water_cooling_UNO_input*fraction_CW_to_air; lognormal variance with pedigree 0.098025, pedigree (4,4,4,2,4)
  (same comment as for Water)
  property fraction, origin: fresh water 0.0344187; name fraction_origin_fresh_water
  property fraction, origin: salt water 0; name fraction_origin_salt_water
  property fraction, origin: unspecified 0.965581; name fraction_origin_unspecified
- Lead [air, non-urban air or from high stacks]: 5.05737e-9 kg; name lead; = 5.24E-10 * factor_MJ_kWh; lognormal variance with pedigree 0.952, pedigree (1,1,3,1,1)
  own estimation
  Amount was scaled to the amount of reference product.
- Dinitrogen monoxide [air, non-urban air or from high stacks]: 2.49973e-5 kg; name dinitrogen_monoxide; = 2.59E-06 * factor_MJ_kWh; lognormal variance with pedigree 0.302, pedigree (1,1,3,1,1)
  own estimation
  Amount was scaled to the amount of reference product.
- Thorium-232 [air, non-urban air or from high stacks]: 2.57694e-6 kBq; name thorium_232; = 2.67E-07 * factor_MJ_kWh; lognormal variance with pedigree 0.652, pedigree (1,1,3,1,1)
  own estimation
  Amount was scaled to the amount of reference product.
- Antimony [air, non-urban air or from high stacks]: 1.26434e-10 kg; name antimony; = 1.31E-11 * factor_MJ_kWh; lognormal variance with pedigree 0.952, pedigree (1,1,3,1,1)
  own estimation
  Amount was scaled to the amount of reference product.
  property calculation property, kg 5.22e-10 kg; name antimony_calc_prop_kg
- Particulates, > 2.5 um, and < 10um [air, non-urban air or from high stacks]: 2.14263e-5 kg; name particulates_2_5_to_10; = 2.22E-06 * factor_MJ_kWh; lognormal variance with pedigree 0.202, pedigree (5,1,3,1,1)
  (same comment as for peat)
- Barium [air, non-urban air or from high stacks]: 4.20804e-8 kg; name barium; = 4.36E-09 * factor_MJ_kWh; lognormal variance with pedigree 0.952, pedigree (1,1,3,1,1)
  own estimation
  Amount was scaled to the amount of reference product.
- Radium-226 [air, non-urban air or from high stacks]: 3.12708e-6 kBq; name radium_226; = 3.24E-07 * factor_MJ_kWh; lognormal variance with pedigree 0.652, pedigree (1,1,3,1,1)
  own estimation
  Amount was scaled to the amount of reference product.
- Xylene [air, non-urban air or from high stacks]: 8.89866e-6 kg; name xylene; = 9.22E-07 * factor_MJ_kWh; lognormal variance with pedigree 0.302, pedigree (1,1,3,1,1)
  own estimation
  Amount was scaled to the amount of reference product.
- Chromium VI [air, non-urban air or from high stacks]: 2.31635e-10 kg; name chromium_vi; = 2.4E-11 * factor_MJ_kWh; lognormal variance with pedigree 0.482, pedigree (1,1,3,1,1)
  based on range of data
  Amount was scaled to the amount of reference product.
- Thorium-228 [air, non-urban air or from high stacks]: 1.64075e-6 kBq; name thorium_228; = 1.7E-07 * factor_MJ_kWh; lognormal variance with pedigree 0.652, pedigree (1,1,3,1,1)
  own estimation
  Amount was scaled to the amount of reference product.
- Particulates, < 2.5 um [air, non-urban air or from high stacks]: 0.000171796 kg; name particulates_lt2_5; = 1.78E-05 * factor_MJ_kWh; lognormal variance with pedigree 0.382, pedigree (5,1,3,1,1)
  (same comment as for peat)
- PAH, polycyclic aromatic hydrocarbons [air, non-urban air or from high stacks]: 9.65147e-9 kg; name pah; = 1E-09 * factor_MJ_kWh; lognormal variance with pedigree 0.652, pedigree (1,1,3,1,1)
  own estimation
  Amount was scaled to the amount of reference product.
- Hydrocarbons, aliphatic, unsaturated [air, non-urban air or from high stacks]: 2.08472e-6 kg; name hydrocarbons_aliphatic_unsaturated; = 2.16E-07 * factor_MJ_kWh; lognormal variance with pedigree 0.302, pedigree (1,1,3,1,1)
  own estimation
  Amount was scaled to the amount of reference product.
- Butane [air, non-urban air or from high stacks]: 1.83378e-7 kg; name butane; = 1.9E-08 * factor_MJ_kWh; lognormal variance with pedigree 0.302, pedigree (1,1,3,1,1)
  own estimation
  Amount was scaled to the amount of reference product.
- Mercury [air, non-urban air or from high stacks]: 2.21984e-8 kg; name mercury; = 2.3E-09 * factor_MJ_kWh; lognormal variance with pedigree 0.952, pedigree (1,1,3,1,1)
  own estimation
  Amount was scaled to the amount of reference product.
- Pentane [air, non-urban air or from high stacks]: 1.41877e-6 kg; name pentane; = 1.47E-07 * factor_MJ_kWh; lognormal variance with pedigree 0.302, pedigree (1,1,3,1,1)
  own estimation
  Amount was scaled to the amount of reference product.
- Hydrogen chloride [air, non-urban air or from high stacks]: 2.82788e-5 kg; name hydrogen_chloride; = 2.93E-06 * factor_MJ_kWh; lognormal variance with pedigree 0.302, pedigree (1,1,3,1,1)
  own estimation
  Amount was scaled to the amount of reference product.
- Cadmium [air, non-urban air or from high stacks]: 1.47668e-10 kg; name cadmium; = 1.53E-11 * factor_MJ_kWh; lognormal variance with pedigree 0.952, pedigree (1,1,3,1,1)
  own estimation
  Amount was scaled to the amount of reference product.
- Nitrogen oxides [air, non-urban air or from high stacks]: 0.00113887 kg; name nitrogen_oxides; = 0.000118 * factor_MJ_kWh; lognormal variance with pedigree 0.044, pedigree (3,1,3,1,1)
  (same comment as for peat)
- Toluene [air, non-urban air or from high stacks]: 1.05201e-6 kg; name toluene; = 1.09E-07 * factor_MJ_kWh; lognormal variance with pedigree 0.302, pedigree (1,1,3,1,1)
  own estimation
  Amount was scaled to the amount of reference product.
- Sulfur dioxide [air, non-urban air or from high stacks]: 0.00191099 kg; name sulfur_dioxide; = 0.000198 * factor_MJ_kWh; lognormal variance with pedigree 0.004, pedigree (3,1,3,1,1)
  (same comment as for peat)
- Propane [air, non-urban air or from high stacks]: 3.37802e-7 kg; name propane; = 3.5E-08 * factor_MJ_kWh; lognormal variance with pedigree 0.302, pedigree (1,1,3,1,1)
  own estimation
  Amount was scaled to the amount of reference product.
- Arsenic [air, non-urban air or from high stacks]: 7.12279e-9 kg; name arsenic; = 7.38E-10 * factor_MJ_kWh; lognormal variance with pedigree 0.952, pedigree (1,1,3,1,1)
  own estimation
  Amount was scaled to the amount of reference product.
- Strontium [air, non-urban air or from high stacks]: 4.42038e-9 kg; name strontium; = 4.58E-10 * factor_MJ_kWh; lognormal variance with pedigree 0.952, pedigree (1,1,3,1,1)
  own estimation
  Amount was scaled to the amount of reference product.
- Chromium [air, non-urban air or from high stacks]: 1.87239e-9 kg; name chromium; = 1.94E-10 * factor_MJ_kWh; lognormal variance with pedigree 0.952, pedigree (1,1,3,1,1)
  own estimation
  Amount was scaled to the amount of reference product.
- Polonium-210 [air, non-urban air or from high stacks]: 2.21019e-5 kBq; name polonium_210; = 2.29E-06 * factor_MJ_kWh; lognormal variance with pedigree 0.652, pedigree (1,1,3,1,1)
  own estimation
  Amount was scaled to the amount of reference product.
- Particulates, > 10 um [air, non-urban air or from high stacks]: 2.14263e-5 kg; name particulates_gt10; = 2.22E-06 * factor_MJ_kWh; lognormal variance with pedigree 0.122, pedigree (5,1,3,1,1)
  (same comment as for peat)
- Lead-210 [air, non-urban air or from high stacks]: 1.20643e-5 kBq; name lead_210; = 1.25E-06 * factor_MJ_kWh; lognormal variance with pedigree 0.652, pedigree (1,1,3,1,1)
  own estimation
  Amount was scaled to the amount of reference product.
- Zinc [air, non-urban air or from high stacks]: 7.37373e-9 kg; name zinc; = 7.64E-10 * factor_MJ_kWh; lognormal variance with pedigree 0.952, pedigree (1,1,3,1,1)
  own estimation
  Amount was scaled to the amount of reference product.
- Benzo(a)pyrene [air, non-urban air or from high stacks]: 1.93029e-12 kg; name benzo_a_pyrene; = 2E-13 * factor_MJ_kWh; lognormal variance with pedigree 0.302, pedigree (1,1,3,1,1)
  own estimation
  Amount was scaled to the amount of reference product.
- Boron [air, non-urban air or from high stacks]: 1.99786e-5 kg; name boron; = 2.07E-06 * factor_MJ_kWh; lognormal variance with pedigree 0.952, pedigree (1,1,3,1,1)
  own estimation
  Amount was scaled to the amount of reference product.
- Cobalt [air, non-urban air or from high stacks]: 8.42574e-10 kg; name cobalt; = 8.73E-11 * factor_MJ_kWh; lognormal variance with pedigree 0.952, pedigree (1,1,3,1,1)
  own estimation
  Amount was scaled to the amount of reference product.
- Formaldehyde [air, non-urban air or from high stacks]: 5.59786e-7 kg; name formaldehyde; = 5.8E-08 * factor_MJ_kWh; lognormal variance with pedigree 0.302, pedigree (1,1,3,1,1)
  own estimation
  Amount was scaled to the amount of reference product.
- Radon-222 [air, non-urban air or from high stacks]: 0.00236461 kBq; name radon_222; = 0.000245 * factor_MJ_kWh; lognormal variance with pedigree 0.652, pedigree (1,1,3,1,1)
  own estimation
  Amount was scaled to the amount of reference product.
- Dioxins, measured as 2,3,7,8-tetrachlorodibenzo-p-dioxin [air, non-urban air or from high stacks]: 6.75603e-14 kg; name dioxins; = 7E-15 * factor_MJ_kWh; lognormal variance with pedigree 0.652, pedigree (1,1,3,1,1)
  own estimation
  Amount was scaled to the amount of reference product.
- Vanadium [air, non-urban air or from high stacks]: 1.05201e-9 kg; name vanadium; = 1.09E-10 * factor_MJ_kWh; lognormal variance with pedigree 0.952, pedigree (1,1,3,1,1)
  own estimation
  Amount was scaled to the amount of reference product.
- Carbon monoxide, fossil [air, non-urban air or from high stacks]: 0.000193029 kg; name carbon_monoxide_fossil; = 2E-05 * factor_MJ_kWh; lognormal variance with pedigree 0.952, pedigree (1,1,3,1,1)
  own estimation
  Amount was scaled to the amount of reference product.
- Methane, fossil [air, non-urban air or from high stacks]: 9.65147e-6 kg; name methane_fossil; = 1E-06 * factor_MJ_kWh; lognormal variance with pedigree 0.302, pedigree (1,1,3,1,1)
  own estimation
  Amount was scaled to the amount of reference product.
- Hydrogen fluoride [air, non-urban air or from high stacks]: 7.88525e-6 kg; name hydrogen_fluoride; = 8.17E-07 * factor_MJ_kWh; lognormal variance with pedigree 0.302, pedigree (1,1,3,1,1)
  own estimation
  Amount was scaled to the amount of reference product.

## Sampling procedure
literature and statistics

## Extrapolations
Data were taken over from a global dataset for electricity production with lignite except for emissions of SO2, NOx, particles and CO2 and the efficiency. No DeNOx and DeSOx is taken into account. Uncertainty was adjusted accordingly.
Most of the exchanges were extrapolated through production-weighted averages of the datasets of the following 10 countries: AT, BA, CZ, DE, ES, FR, HU, PL, SI, SK.

## Review by Carl Vadenbo 2015-06-17
The update of the whole electricity sector for the ecoinvent v3.2 database consist of hundreds of datasets. All these datasets have passed through a streamlined review processes where the underlying modelling of production volumes, technology shares and efficiencies was reviewed in detail prior to the datasets being submitted to the database.
