# flax husks to generic market for energy feed

Dataset: EcoSpold 2, unit process
Geography: IN
Time period: 2016-01-01 to 2019-12-31
Technology level: current
Classification: ISIC rev.4 ecoinvent: 108:Manufacture of prepared animal feeds
Scenario: Business-as-Usual
System model: Allocation at the point of substitution
Generated by: Avraam Symeonidis
Database: ecoinvent
isCopyrightProtected: true
accessRestrictedTo: 1

## General comment
This is a linking (transfering) activity which links flax husks, to the generic market for energy feed. Flax husks are a by-product of the flax fibre production.

## Included activities start
The activity starts with the reception of flax husks.

## Included activities end
The activity models the part of flax husks which contributes to the generic market for energy feed, resulting in energy and protein outputs.

## Reference product
- energy feed, gross: 1 MJ; = flax_husks_input_gross_E_feed_per_kg_DM* falx_husks_input*flax_husks_input_DM; CPC 23319: Preparations used in animal feeding n.e.c.; By-product classification allocatable product
  Calculated based on literature value for "hominy feed" (Feedipedia, 2015), which reports a crude protein content of 15.2% of dry matter; while gross energy content equates to 18.7 MJ/kg dry matter of fed. Dry matter content equates 89.3% of fed. Reference(s): Feedipedia (2015) Hominy Feed, Animal Feed Resources Information System, Available at: https://www.feedipedia.org/node/12290 (Accessed November 2017).
  production volume 9.34345e9 MJ; name fh_pv; = 3.0625*172500000* flax_husks_input_DM* flax_husks_input_gross_E_feed_per_kg_DM
    Calculated based on the production volume of flax fibre. According to data collected, 3.0625 kg of flax husks are generated per kg of flax fibre produced. Given the production volume of flax fibres in India (172500000 kg) production volume of energy feed driven to the generic market for energy feed is calculated to be 972900000 MJ.
  property price 0.0108 EUR2005
    Based on energy feed, gross content in soybean meal and prices per kg of soybean meal. Assumed soybean meal is the most used feed. Soybean meal 2004 prices for World import/export data (tonnes and US$) from FaoStat statistics (http://faostat.fao.org/site/535/default.aspx#ancor, TRADE)- [Accessed 24 May 2010]. See calculations for protein /energy content
  property carbon content 0
    carbon content on a dry matter basis (reserved; not for manual entry)
  property true value 0.191014
    allocation property applied in "true value" allocation // value calculated from revenue
  properties: water in wet mass 0 kg, dry mass 1 kg, wet mass 1 kg, carbon content, fossil 0, carbon content, non-fossil 0, water content 0, carbon allocation 0 kg

## By-products
- protein feed, 100% crude: 0 kg; = flax_husks_input_protein_feed_per_kg_DM* falx_husks_input*flax_husks_input_DM; By-product classification allocatable product; CPC 23319: Preparations used in animal feeding n.e.c.; pedigree (1,1,1,1,1)
  (same comment as for energy feed, gross)
  production volume 2.5395e7 kg; = 3.0625*172500000* flax_husks_input_DM*flax_husks_input_protein_feed_per_kg_DM
    Calculated based on the production volume of flax fibre. According to data collected, 3.0625 kg of flax husks are generated per kg of flax fibre produced. Given the production volume of flax fibres in India (172500000 kg) the production volume of protein feed driven to the generic market for energy feed is calculated to be 55163430 kg.
  property price 0.424 EUR2005
    Based on protein content and energy feed, gross content in soybean meal and prices per kg of soybean meal. Assumed soybean meal is the most used feed. Soybean meal 2004 prices for World import/export data (tonnes and US$) from FaoStat statistics (http://faostat.fao.org/site/535/default.aspx#ancor, TRADE)- [Accessed 24 May 2010]. See calculations for protein /energy content
  property carbon content 0.53
    carbon content on a dry matter basis (reserved; not for manual entry)
  property true value 0.0203821
    allocation property applied in "true value" allocation // value calculated from revenue
  properties: carbon content, non-fossil 0.53, water content 0, dry mass 1 kg, water in wet mass 0 kg, wet mass 1 kg, carbon content, fossil 0, carbon allocation 0.53 kg

## Inputs from technosphere
- flax husks: 0.0510889 kg; name falx_husks_input
  property carbon content, fossil 0; name flax_husks_input_C_content_fossil
  property water content 0.102536; name flax_husks_input_water_content
  property dry mass 0.907 kg; name flax_husks_input_DM
  property energy content 19.5 MJ; name flax_husks_input_gross_E_feed_per_kg_DM
  property water in wet mass 0.093 kg; name flax_husks_input_WWM
  property carbon content, non-fossil 0.475; name flax_husks_input_C_content_non_fossil
  property wet mass 1 kg; name flax_husks_input_WM
  property protein content 0.053; name flax_husks_input_protein_feed_per_kg_DM
  note on carbon content, fossil: Carbon content fossil is considered zero in all agricultural products and by-products.
  note on energy content: Gross energy content (19.5 MJ/kg DM) for flax straw and flax crop by-products. Reference: Feedipedia - Animal Feed Resources Information System. Accessed online at: https://www.feedipedia.org/content/about-feedipedia on 23/03/2018.
  note on carbon content, non-fossil: Biogenic carbon content on a dry mass basis (47.5% DM) derived from FAOSTAT. Reference: http://www.fao.org/forestry/17111/en"
  note on protein content: Crude protein content (5.3 % DM) for flax straw and flax crop by-products. Reference: Feedipedia - Animal Feed Resources Information System. Accessed online at: https://www.feedipedia.org/content/about-feedipedia on 23/03/2018.
