# transport, freight, aircraft, belly-freight, very short haul

Dataset: EcoSpold 2, unit process
Geography: GLO
Time period: 2016-01-01 to 2019-12-31
Technology level: current
Classification: ISIC rev.4 ecoinvent: 5110:Passenger air transport
Classification: EcoSpold01Categories: transport systems/airplane
Scenario: Business-as-Usual
System model: Allocation at the point of substitution
Share of production covered: 99.5 %
Generated by: Philippa Notten
Published in: Notten, P.J. 2018
Database: ecoinvent
isCopyrightProtected: true
accessRestrictedTo: 1

## General comment
The dataset represents the transport of one tonne of freight over a distance of less than 800 km in a belly-freight aircraft (an aircraft carrying both passengers and freight). The dataset represents the entire transport life cycle including the production of the aircraft, the transportation of goods, and the construction and operation of the airport. The scope of this dataset is the operation of the aircraft, which has inputs of aircraft and airport facilities (i.e. aircraft production and the construction and operation of the airport are contained in linked datasets).
Fuel consumption and the main emissions (SOx, NOx, NMHC, PM and CO) are calculated for 99.5% of all scheduled flights in 2016, based on OAG (2016) data. Flight distances are calculated as the Great Circle Distance (GCD) using coordinates of the destination airports and corrected using a distance dependent factor (74 km (40 nautical miles) for distances below 926 km and 139 km (75 nautical miles) for distances above). For the 0.044% of the flights for which no coordinates for one of the destinations was available, a flight distance of 1000 km was assumed. Fuel consumption and emissions are based on EMEP/EEA 2016. Linear regression fits were used to approximate fuel consumption and SOx-emissions of all the plane types. For the other emissions, a polynomial of the 3rd degree was used as a fit function. R2 values for fuel consumption and SOx of all plane types are > 0.999. Also for the other emissions, the R2 values are > 0.99 for almost all plane types. Flights are classified according to distance (very short haul < 800 km, short haul between 800 and 1500 km, medium haul between 1500 and 4000 km and long haul > 4000 km). Weighted averages are calculated for each distance class (and for all distances) using the share of each flight to the total transport performance. Passenger transport performance (total pkm) is calculated using the distance of each flight, the typical number of seats for the specific plane type (from ecotransit) used for this flight and an occupancy of 80%. Belly-freight performance is calculated using the distance and the average mass of transported goods per flight (from OAG 2016). Allocation between passenger and freight transport is done by mass for each flight before averaging, with an assumed passenger mass of 105 kg (including luggage) (EASA 2009).
CO2, water vapour and heavy metal emissions are calculated from the fuel consumption and from emission factors derived from fuel composition (Spielmann et al. 2007). Shares of emissions to the lower and upper part of the atmosphere are taken from the shares of the distances covered in the flight phases below and above 7,315m (FL240). A typical climb/descent procedure for an Airbus A320 is used for the calculation (Source: eurocontrol).
Certain emissions (formaldehyde, nitrous oxide, methane, ethylene oxide and hydrogen chloride) have been removed in the updated inventory because no reliable source could be found to model them. Furthermore, benzene and butadiene are no longer inventoried separately but included in the exchange "NMVOC", because accounting for them individually is deemed too inaccurate.
Airport facilities have not been updated are representative of a medium-sized international airport (Zurich). Airport demand per tonne freight transported is calculated using a value of 0.4 million tonnes transported per year (based on Zurich airport (2016), and assumes two airports per delivery and a 100 year life of the airport. Aircraft production is global in scope and described in the individual datasets. Aircraft demand per tonne.km is calculated from the lifetime kms and freight loads of over 40 different aircraft, with the aircraft types weighted according to their tonne kms in 2016 (OAG, 2016). Freight load is calculated from the passenger load (maximum number of seats in the different aircraft types and an assumed occupancy factor of 80%) and that passengers account for 86% of the total load (calculated weighted average from OAG data). Aircraft maintenance is not included, although de-icing of aircraft is included in the airport operations.
References:
Spielmann et al (2007) Transport services. ecoinvent Report No. 14. Villigen
EMEP/EEA air pollutant emission inventory guidebook 2016;
eurocontrol Aircraft Performance Database, https://contentzone.eurocontrol.int/aircraftperformance/default.aspx?GroupFilter=4, accessed April 2018. EASA (2009) Survey on the standard weights of passengers and baggage: Final Report. European Aviation Safety Agency
OAG (2016) OAG Analytics. OAG

## Included activities start
The scope of this dataset is the operation of the aircraft, with the production of the aircraft and airport facilities as linked inputs. The transportation service starts with demand for construction of the aircraft and the consumption of fuel (and associated emissions).

## Included activities end
The dataset ends with the service of transporting 1 tonne of freight over a distance of 1 km. The dataset includes the operation of an average flight and links to the production of one average very short-haul aircraft (designed to carry both passengers and belly-freight), and the construction and operation of one airport. The dataset includes the consumption of fuel, airborne gaseous emissions, particulate emissions and heavy metal emissions. Shares of emissions to the lower and upper part of the atmosphere are taken from the shares of the distances covered in the flight phases below and above 7,315m (FL240).

## Allocation
Allocation between passengers and freight using actual freight mass and 105 kg per passenger (including luggage) (EASA 2009).

## Geography
Aircraft and flight data is for all scheduled flights in 2016. Data from one Swiss airport is employed as an estimate for the infrastructure requirement.

## Technology
Data is representative of the global aircraft fleet operating in 2016 (considering age distribution of global fleet).

## Reference product
- transport, freight, aircraft, very short haul: 1 metric ton*km; By-product classification allocatable product; CPC 6531: Air transport services of freight
  production volume 6.77e9 metric ton*km
    Belly-freight tonne kms for very short haul freight (oag, 2016). Belly-freight accounts for 90% of very short haul freight.
  property price 0.0454046 EUR2005
    Calculated based on inputs: The price of the product has been calculated as a sum of the values of the material and energy inputs for this product. This value is therefore a rough estimation. It may underestimate the real price since there are additional expenses when producing any product. These expences can include for example labour costs, treatment of waste materials and profit for the producer. Please consider carefully whether this level of data quality is acceptable for your application.

## Inputs from technosphere
- kerosene: 0 kg; pedigree (1,1,1,1,1)
  Fuel consumption is based on EMEP/EEA (2016), with fuel consumption calculated for 99.5% of all scheduled flights in 2016. Linear regression fits are used to approximate fuel consumption of all the plane types. The R2 value for fuel consumption of all plane types is > 0.999.
  References: EMEP/EEA (2016) EMEP/EEA air pollutant emission inventory guidebook 2016: 1.A.3.a Aviation. European Environmental Agency
  properties: carbon content, fossil 0.85, dry mass 1 kg, wet mass 1 kg
- airport: 1.36e-12 unit; lognormal variance with pedigree 0.1242, pedigree (1,4,2,5,1)
  EcoSpold01Location=RER
  Infrastructure demand for passenger and freight transport allocated based on Zurich Airport revenue (CHF 427,918,000 and CHF 7,675,000 for passengers and freight respectively (Zurich Airport, 2016)), as that is the airport on which the dataset of airport construction, operation and maintenance is based. Infrastructure demand per tonne of freight transported based on this allocation (1.8% of airport for freight transport) and total freight movements (434 thousand tonnes (Zurich Airport, 2016)) at Zurich Airport. Assumes two airports per item of freight transported and a 100 year airport lifetime (Spielmann et al., 2007). References: Spielmann et al (2007) Transport services. ecoinvent Report No. 14. Villigen Zurich Airport (2016) Annual Report of Flughafen Zurich AG, Zurich, Switzerland.
- aircraft, belly freight, very short haul: 1.025e-9 unit; lognormal variance with pedigree 0.1214, pedigree (2,1,2,1,2)
  Aircraft demand per tonne.km applying a weighted average of lifetime kms and average freight load (from Cox et al, 2018) over 40 different aircraft. Average freight load calculated from estimated passenger weight (average number of seats and an assumed passenger load of 80%) and assuming that passenger weight accounts for 86% of the total weight. Aircraft weighting according to freight transported in 2016 (OAG, 2016).
  properties: carbon content, fossil 0.16, wet mass 46613 kg, dry mass 46613 kg
- kerosene: 0.0351865, 0.0012906, 0.0193225, 0.00250122, 0.00609051, 0.00101644, 0.00165549, 0.171933 kg (8 entries); lognormal variance with pedigree 0.002, pedigree (2,1,2,1,2)
  (same comment as for kerosene)

## Emissions to nature
- Nitrogen oxides [air, non-urban air or from high stacks]: 0.00156093 kg; lognormal variance with pedigree 0.0414, pedigree (2,1,2,1,2)
  Fuel consumption and emissions are based on EMEP/EEA (2016), with fuel consumption and main emissions (SOx, NOx, NMHC, PM and CO) calculated for 99.5% of all scheduled flights in 2016. Linear regression fits are used to approximate fuel consumption and SOx emissions of all the plane types. For the other emissions, a polynomial of the 3rd degree is used as a fit function. R2 values for fuel consumption and SOx of all plane types are > 0.999. Also for the other emissions, the R2 values are > 0.99 for almost all plane types. Shares of emissions to the lower and upper part of the atmosphere are taken from the shares of the distances covered in the flight phases below and above 7315m (FL240). A typical climb / descent procedure for an A 320 is used for the calculation (source: eurocontrol).
  References:
  References: EMEP/EEA (2016) EMEP/EEA air pollutant emission inventory guidebook 2016: 1.A.3.a Aviation. European Environmental Agency
  eurocontrol Aircraft Performance Database, https://contentzone.eurocontrol.int/aircraftperformance/default.aspx?GroupFilter=4, accessed April 2018.
- Chromium [air, non-urban air or from high stacks]: 4.74663e-9 kg; lognormal variance with pedigree 0.716, pedigree (4,5,5,5,3)
  Heavy metal emissions are calculated from the fuel consumption and emission factors in Spielmann et al (2007) derived from fuel composition*. Fuel consumption is based on EMEP/EEA/Corinair 2016, and with fuel consumption calculated for 99.5% of all scheduled flights in 2016. Linear regression fit is used to approximate fuel consumption of all the plane types. R2 values for fuel consumption of all plane types are > 0.999. Shares of emissions to the lower and upper part of the atmosphere are taken from the shares of the distances covered in the flight phases below and above 7315m (FL240). A typical climb / descent procedure for an A 320 is used for the calculation (source: eurocontrol).
  References: Spielmann et al (2007) Transport services. ecoinvent Report No. 14. Villigen eurocontrol Aircraft Performance Database, https://contentzone.eurocontrol.int/aircraftperformance/default.aspx?GroupFilter=4, accessed April 2018. EMEP/EEA/Corinair (2016) EMEP/EEA air pollutant emission inventory guidebook 2016: 1.A.3.a Aviation. European Environmental Agency
  *Comment in ecoinvent v2 dataset (Spielmann et al., 2007): In order to complete the list is employed heavy metal emission indices for diesel fuels, assuming that the raw fuel and production processes of kerosene fuels are similar to those of diesel.
- Mercury [air, lower stratosphere + upper troposphere]: 1.00844e-11 kg; lognormal variance with pedigree 0.716, pedigree (4,5,5,5,3)
  (same comment as for Chromium)
- Nickel [air, non-urban air or from high stacks]: 6.64529e-9 kg; lognormal variance with pedigree 0.716, pedigree (4,5,5,5,3)
  (same comment as for Chromium)
- Cadmium [air, non-urban air or from high stacks]: 9.49327e-10 kg; lognormal variance with pedigree 0.716, pedigree (4,5,5,5,3)
  (same comment as for Chromium)
- NMVOC, non-methane volatile organic compounds, unspecified origin [air, lower stratosphere + upper troposphere]: 7.17047e-5 kg; lognormal variance with pedigree 0.0414, pedigree (2,1,2,1,2)
  Fuel consumption and emissions are based on EMEP/EEA (2016), with fuel consumption and main emissions (SOx, NOx, NMHC, PM and CO) calculated for 99.5% of all scheduled flights in 2016. Linear regression fits are used to approximate fuel consumption and SOx emissions of all the plane types. For the other emissions, a polynomial of the 3rd degree is used as a fit function. R2 values for fuel consumption and SOx of all plane types are > 0.999. Also for the other emissions, the R2 values are > 0.99 for almost all plane types. Shares of emissions to the lower and upper part of the atmosphere are taken from the shares of the distances covered in the flight phases below and above 7315m (FL240). A typical climb / descent procedure for an A 320 is used for the calculation (source: eurocontrol).
  References:
  EMEP/EEA (2016) EMEP/EEEA air pollutant emission inventory guidebook 2016. European Environmental Agency.
  eurocontrol Aircraft Performance Database, https://contentzone.eurocontrol.int/aircraftperformance/default.aspx?GroupFilter=4, accessed April 2018.
- Sulfur dioxide [air, non-urban air or from high stacks]: 7.97435e-5 kg; lognormal variance with pedigree 0.002, pedigree (2,1,2,1,2)
  (same comment as for NMVOC, non-methane volatile organic compounds, unspecified origin)
- Zinc [air, lower stratosphere + upper troposphere]: 1.44063e-6 kg; lognormal variance with pedigree 0.716, pedigree (4,5,5,5,3)
  (same comment as for Chromium)
- Water [air, lower stratosphere + upper troposphere]: 1.10228e-6 m3; lognormal variance with pedigree 0.0014, pedigree (2,1,2,1,2)
  Water vapour emissions are calculated from the fuel consumption and emission factors in Spielmann et al (2007)*. Fuel consumption is based on EMEP/EEA/Corinair 2016, and with fuel consumption calculated for 99.5% of all scheduled flights in 2016. Linear regression fit is used to approximate fuel consumption of all the plane types. R2 values for fuel consumption of all plane types are > 0.999. Shares of emissions to the lower and upper part of the atmosphere are taken from the shares of the distances covered in the flight phases below and above 7315m (FL240). A typical climb / descent procedure for an A 320 is used for the calculation (source: eurocontrol).
  References: Spielmann et al (2007) Transport services. ecoinvent Report No. 14. Villigen; eurocontrol Aircraft Performance Database, https://contentzone.eurocontrol.int/aircraftperformance/default.aspx?GroupFilter=4, accessed April 2018. Comment in ecoinvent v2 dataset (Spielmann et al., 2007): Literature value derived from Lufthansa (2001) and from Andreas Döpelheuer (2001). Further references: Lufthansa (2001) Balance: Das wichtigste zu Umwelt und Nachhaltigkeit bei Lufthansa. Ausgabe 2000/1. Deutsche Lufthansa AG, Frankfurt a.M. EMEP/EEA/Corinair (2016) EMEP/EEA air pollutant emission inventory guidebook 2016: 1.A.3.a Aviation. European Environmental Agency
- Nickel [air, lower stratosphere + upper troposphere]: 1.00844e-8 kg; lognormal variance with pedigree 0.716, pedigree (4,5,5,5,3)
  (same comment as for Chromium)
- Particulates, < 2.5 um [air, lower stratosphere + upper troposphere]: 3.05522e-5 kg; lognormal variance with pedigree 0.3014, pedigree (2,1,2,1,2)
  (same comment as for Nitrogen oxides)
- Chromium [air, lower stratosphere + upper troposphere]: 7.20315e-9 kg; lognormal variance with pedigree 0.716, pedigree (4,5,5,5,3)
  (same comment as for Chromium)
- Particulates, < 2.5 um [air, non-urban air or from high stacks]: 2.01328e-5 kg; lognormal variance with pedigree 0.3014, pedigree (2,1,2,1,2)
  Fuel consumption and emissions are based on EMEP/EEA (2016), with fuel consumption and main emissions (SOx, NOx, NMHC, PM and CO) calculated for 99.5% of all scheduled flights in 2016. Linear regression fits are used to approximate fuel consumption and SOx emissions of all the plane types. For the other emissions, a polynomial of the 3rd degree is used as a fit function. R2 values for fuel consumption and SOx of all plane types are > 0.999. Also for the other emissions, the R2 values are > 0.99 for almost all plane types. Shares of emissions to the lower and upper part of the atmosphere are taken from the shares of the distances covered in the flight phases below and above 7315m (FL240). A typical climb / descent procedure for an A 320 is used for the calculation (source: eurocontrol).
  References:
  EMEP/EEA (2016) EMEP/EEA air pollutant emission inventory guidebook 2016: 1.A.3.a Aviation. European Environmental Agency
  eurocontrol Aircraft Performance Database, https://contentzone.eurocontrol.int/aircraftperformance/default.aspx?GroupFilter=4, accessed April 2018.
- Lead [air, lower stratosphere + upper troposphere]: 2.88126e-6 kg; lognormal variance with pedigree 0.716, pedigree (4,5,5,5,3)
  (same comment as for Chromium)
- Nitrogen oxides [air, lower stratosphere + upper troposphere]: 0.00236875 kg; lognormal variance with pedigree 0.0414, pedigree (2,1,2,1,2)
  Fuel consumption and emissions are based on EMEP/EEA (2016), with fuel consumption and main emissions (SOx, NOx, NMHC, PM and CO) calculated for 99.5% of all scheduled flights in 2016. Linear regression fits are used to approximate fuel consumption and SOx emissions of all the plane types. For the other emissions, a polynomial of the 3rd degree is used as a fit function. R2 values for fuel consumption and SOx of all plane types are > 0.999. Also for the other emissions, the R2 values are > 0.99 for almost all plane types. Shares of emissions to the lower and upper part of the atmosphere are taken from the shares of the distances covered in the flight phases below and above 7315m (FL240). A typical climb / descent procedure for an A 320 is used for the calculation (source: eurocontrol).
  References:
  References: eurocontrol Aircraft Performance Database, https://contentzone.eurocontrol.int/aircraftperformance/default.aspx?GroupFilter=4, accessed April 2018. EMEP/EEA (2016) EMEP/EEA air pollutant emission inventory guidebook 2016: 1.A.3.a Aviation. European Environmental Agency
- Mercury [air, non-urban air or from high stacks]: 6.64529e-12 kg; lognormal variance with pedigree 0.716, pedigree (4,5,5,5,3)
  (same comment as for Chromium)
- Carbon dioxide, fossil [air, lower stratosphere + upper troposphere]: 0.448996 kg; lognormal variance with pedigree 0.002, pedigree (2,1,2,1,2)
  CO2 emissions are calculated from the fuel consumption and emission factors in Spielmann et al (2007) derived from fuel composition*. Fuel consumption is based on EMEP/EEA/Corinair 2016, and with fuel consumption calculated for 99.5% of all scheduled flights in 2016. Linear regression fit is used to approximate fuel consumption of all the plane types. R2 values for fuel consumption of all plane types are > 0.999. Shares of emissions to the lower and upper part of the atmosphere are taken from the shares of the distances covered in the flight phases below and above 7315m (FL240). A typical climb / descent procedure for an A 320 is used for the calculation (source: eurocontrol).
  References: Spielmann et al (2007) Transport services. ecoinvent Report No. 14. Villigen eurocontrol Aircraft Performance Database, https://contentzone.eurocontrol.int/aircraftperformance/default.aspx?GroupFilter=4, accessed April 2018. EMEP/EEA/Corinair (2016) EMEP/EEA air pollutant emission inventory guidebook 2016: 1.A.3.a Aviation. European Environmental Agency
  *Comment in ecoinvent v2 dataset (Spielmann et al., 2007): Literature value. The combustion of kerosene in aircraft engines is directly coupled with the amount of carbon dioxide and water produced. Due to its nearly constant carbon to hydrogen ratio (a good approximation for the average sum formula is C12H23) the combustion of one kilogram kerosene results in about 3150 g carbon dioxide (CO2).
- Cadmium [air, lower stratosphere + upper troposphere]: 1.44063e-9 kg; lognormal variance with pedigree 0.716, pedigree (4,5,5,5,3)
  (same comment as for Chromium)
- NMVOC, non-methane volatile organic compounds, unspecified origin [air, non-urban air or from high stacks]: 4.7251e-5 kg; lognormal variance with pedigree 0.0414, pedigree (2,1,2,1,2)
  Fuel consumption and emissions are based on EMEP/EEA (2016), with fuel consumption and main emissions (SOx, NOx, NMHC, PM and CO) calculated for 99.5% of all scheduled flights in 2016. Linear regression fits are used to approximate fuel consumption and SOx emissions of all the plane types. For the other emissions, a polynomial of the 3rd degree is used as a fit function. R2 values for fuel consumption and SOx of all plane types are > 0.999. Also for the other emissions, the R2 values are > 0.99 for almost all plane types. Shares of emissions to the lower and upper part of the atmosphere are taken from the shares of the distances covered in the flight phases below and above 7315m (FL240). A typical climb / descent procedure for an A 320 is used for the calculation (source: eurocontrol).
  References: EMEP/EEA (2016) EMEP/EEA air pollutant emission inventory guidebook 2016: 1.A.3.a Aviation. European Environmental Agency
  eurocontrol Aircraft Performance Database, https://contentzone.eurocontrol.int/aircraftperformance/default.aspx?GroupFilter=4, accessed April 2018.
- Carbon dioxide, fossil [air, non-urban air or from high stacks]: 0.295874 kg; lognormal variance with pedigree 0.002, pedigree (2,1,2,1,2)
  (same comment as for Carbon dioxide, fossil)
- Carbon monoxide, fossil [air, lower stratosphere + upper troposphere]: 0.0011496 kg; lognormal variance with pedigree 0.6514, pedigree (2,1,2,1,2)
  (same comment as for Nitrogen oxides)
- Sulfur dioxide [air, lower stratosphere + upper troposphere]: 0.000121013 kg; lognormal variance with pedigree 0.002, pedigree (2,1,2,1,2)
  (same comment as for Nitrogen oxides)
- Lead [air, non-urban air or from high stacks]: 1.89865e-6 kg; lognormal variance with pedigree 0.716, pedigree (4,5,5,5,3)
  (same comment as for Chromium)
- Copper [air, lower stratosphere + upper troposphere]: 2.44907e-7 kg; lognormal variance with pedigree 0.716, pedigree (4,5,5,5,3)
  (same comment as for Chromium)
- Water [air, non-urban air or from high stacks]: 7.26365e-7 m3; lognormal variance with pedigree 0.0014, pedigree (2,1,2,1,2)
  (same comment as for Water)
- Selenium [air, lower stratosphere + upper troposphere]: 1.44063e-9 kg; lognormal variance with pedigree 0.716, pedigree (4,5,5,5,3)
  (same comment as for Chromium)
- Copper [air, non-urban air or from high stacks]: 1.61386e-7 kg; lognormal variance with pedigree 0.716, pedigree (4,5,5,5,3)
  (same comment as for Chromium)
- Carbon monoxide, fossil [air, non-urban air or from high stacks]: 0.000757551 kg; lognormal variance with pedigree 0.6514, pedigree (2,1,2,1,2)
  (same comment as for Nitrogen oxides)
- Zinc [air, non-urban air or from high stacks]: 9.49327e-7 kg; lognormal variance with pedigree 0.716, pedigree (4,5,5,5,3)
  (same comment as for Chromium)
- Selenium [air, non-urban air or from high stacks]: 9.49327e-10 kg; lognormal variance with pedigree 0.716, pedigree (4,5,5,5,3)
  (same comment as for Chromium)

## Sampling procedure
Calculation of fuel consumption and emissions performed for 99.5% of all scheduled flights in 2016. Global flight data; literature data.

## Extrapolations
This dataset has been extrapolated from year 2016 to the year of the calculation (2019). The uncertainty has been adjusted accordingly.
