# planing, board, hardwood, u=20%

Dataset: EcoSpold 2, unit process
Geography: CA-QC
Time period: 2011-01-01 to 2019-12-31
Technology level: current
Classification: ISIC rev.4 ecoinvent: 1610:Sawmilling and planing of wood
Tags: recontextualization
Scenario: Business-as-Usual
System model: Allocation at the point of substitution
Generated by: Hugues Imbeault-Tétreault
Published in: BFS 2013
Database: ecoinvent
isCopyrightProtected: true
accessRestrictedTo: 1

## General comment
This dataset represents the planing of one m3 hardwood board that has been air dried or kiln dried to 20% moisture content. The ratio of kiln dried to air dried raw board input corresponds to the extimated market mix. The planing mill is assumed to be located on the sawmill site. The suction of the shavings is modeled in a separate activity.
The data was provided by and approved by the Swiss forest industry (Holzindustrie Schweiz HIS).
Within ecoinvent, three products - boards, beams and laths - are distinguished:
After being sawn, the resulting products can either be air dried down to a moisture content of u=20% (mass of water per dry mass), kiln dried down to u=20% or kiln dried down to u=10%. The resulting products can then be planed (the ratio of planed products at a moisture content of u=20% reflects the market share of air dried and kiln dried unplaned products). The activity name indicates the respective product and moisture content of the product being planed.
The exchanges of this child dataset are identical to the GLO dataset. This dataset was created to enable linking to regional markets (e.g. for electricity). Data quality indicators were adjusted accordingly.

## Included activities start
Planing process starting from air dried respectively kiln dried hardwood board, at sawmill site.

## Included activities end
This activity ends with planed hardwood board, at plant. The dataset includes the planing process at the sawmill site and input of wood. The dataset does not include dust emissions.

## Geography
Represents average Swiss conditions. The exchanges of this child dataset are identical to the GLO dataset. This dataset was created to enable linking to regional markets (e.g. for electricity). Data quality indicators were adjusted accordingly.

## Parameters
- share of kiln dried wood: 0.8 dimensionless; name share_kiln_dried
  share of kiln dried sawnwood input (part of sawnwood input is air dried instead of kiln dried)
- share of shaving: 10 dimensionless; name share_shaving
  share of shaving production per volume of sawlog input
- share of board: 90 dimensionless; name share_board
  share of board production per volume of sawlog input
- shrinkage ratio (u=30% - 0%): 0.004 dimensionless; name shrinkage_ratio
  shrinkage of volume (%) per change in moisture content in %, relevant for u=30% to 0%
- wood density, apparent: 706.56 kg/m3; name wood_d_apparent; = (1+moisture_board/100)* basic_wood_d
  kg wet matter/wet volume
- wood density, dry: 640 kg/m3; name dry_wood_d
  kg oven-dry matter/oven-dry volume
- moisture content board: 20 dimensionless; name moisture_board
  moisture content of board
- wood density, basic: 588.8 kg/m3; name basic_wood_d; = dry_wood_d*(1-moisture_board*shrinkage_ratio)
  kg oven-dry matter/wet volume

## Reference product
- sawnwood, board, hardwood, dried (u=20%), planed: 1 m3; name board_planed; source BFS 2013; CPC 31102: Wood, sawn or chipped lengthwise, sliced or peeled, of a thickness exceeding 6 mm, of non-coniferous wood; By-product classification allocatable product
  production volume 204199 m3; name p_sawnwood_planed; = 314152.368512736*0.5+94245.7105538209*0.5
    Estimated to be 50% of respective air dried and kiln dried sawn timber product; extraplated to global production volume from Swiss production volumes via the production volumes of sawntimber (NC) or (C) as applicable according to FAOStat
  property water content 0.2; name water_content
  property price 265 EUR2005; name board_planed_price_EUR2005
    Expert judgement (Urs Luginbühl, Swiss Sawmilling industry, personal communication in June 2014). Cross-reference; FAOSTAT (accessed 20140428). The price is calculated by using data on total world import quantity (m3) and import value (1000 USD), year 2005. 25656806 m3 of Sawnwood (NC) - coniferous was imported in the world in 2005. The import value was 9652714000 USD. The calculated price is thus (9652714000/25656806=376*0.8=) 303 Euro.
  property wet mass 706.56 kg; = basic_wood_d*(1+ water_content)
  property water in wet mass 117.76 kg; = basic_wood_d* water_content
  property dry mass 588.8 kg; = basic_wood_d
  property carbon content 0.494
    carbon content on a dry matter basis (reserved; not for manual entry)
  property true value 265; name board_planed_true_value
    allocation property applied in "true value" allocation // value calculated from revenue
  properties: carbon content, fossil 0, carbon content, non-fossil 0.494, carbon allocation 290.867 kg

## By-products
- shavings, hardwood, measured as dry mass: 0 kg; source BFS 2013; CPC 39283: Non-agglomerated wood waste and scrap; By-product classification allocatable product; pedigree (1,1,1,1,1)
  shavings recollected from the planing process where they are generated as loose shavings.
  production volume 1.33592e7 kg
    Calculated from production volume of reference product using the relative outputs.
  property price 0.113 EUR2005
    Temporary price data. Calculated as 90% of purchasers price based on: 2004 prices for World Import/Export (USD/cubicmeter) from FaoStat (http://faostat.fao.org/site/626/default.aspx#ancor, [accessed 10th June 2010]) Commodity: 'Chips and Particles' assuming this is for air-dry chips (10% water on a dry matter basis at 650 kg/m3) and no price difference for water content (i.e. assuming air-drying).
  property carbon content 0.494
    carbon content on a dry matter basis (reserved; not for manual entry)
  property true value 7.39271
    allocation property applied in "true value" allocation // value calculated from revenue
  properties: water content 0.1, dry mass 1 kg, water in wet mass 0.1 kg, carbon content, fossil 0, carbon content, non-fossil 0.494, wet mass 1.1 kg, carbon allocation 0.494 kg

## Inputs from technosphere
- planing mill: 7.19916e-7 unit; name planemill; source BFS 2013; lognormal variance with pedigree 0.4346, pedigree (2,1,3,5,1)
  data taken from ecoinvent 2.2 dataset
- sawnwood, board, hardwood, raw, dried (u=20%): 0 m3; name board_raw_u20_ad_GLO; pedigree (5,5,5,5,5)
  input of raw sawn wood to be planed
  properties: wet mass 706.56 kg, dry mass 588.8 kg, carbon content, non-fossil 0.494, water content 0.2
- sawnwood, board, hardwood, raw, dried (u=20%): 0.864765 m3; name board_raw_u20_kd; = 1/(1-share_shaving/100)*share_kiln_dried; lognormal variance with pedigree 0.01, pedigree (1,1,3,5,1)
  input of raw sawn wood to be planed; usually processes within the sawmill that produces the raw sawn wood
  properties: dry mass 588.8 kg, water content 0.2, carbon content, non-fossil 0.494, wet mass 706.56 kg
- shavings, hardwood, loose, measured as dry mass: -63.6467 kg; name m_shavings; = ((board_raw_u20_ad + board_raw_u20_kd) * share_shaving/100* basic_wood_d)*-1; source BFS 2013
  calculated as dry mass
  production volume 1.33592e7 kg; = m_shavings*p_sawnwood_planed
    Calculated from production volume of reference product using the relative outputs.
  property price 0.113 EUR2005; name m_shavings_price_EUR2005
  properties: carbon content, non-fossil 0.494, water content 0.2, dry mass 1 kg, wet mass 1.2 kg
- sawnwood, board, hardwood, raw, dried (u=20%): 0.216191 m3; name board_raw_u20_ad; = 1/(1-share_shaving/100)*(1-share_kiln_dried); source BFS 2013; lognormal variance with pedigree 0.01, pedigree (1,1,3,5,1)
  (same comment as for sawnwood, board, hardwood, raw, dried (u=20%))
  property carbon content, non-fossil 0.494; name board_hardwood_ra_C_content_non_fossil_0
  property wet mass 706.56 kg; name board_hardwood_raw_WM; = board_hardwood_raw_DM*(1+ board_hardwood_raw_water_content)
  property dry mass 588.8 kg; name board_hardwood_raw_DM; = basic_wood_d
  property water in wet mass 117.76 kg; name board_hardwood_raw_WWM; = board_hardwood_raw_DM* board_hardwood_raw_water_content
  property water content 0.2; name board_hardwood_raw_water_content
  property carbon content, fossil 0; name board_hardwood_raw_C_content_fossil
- electricity, medium voltage: 18.6984 kWh; name elec_medvol; source BFS 2013; lognormal variance with pedigree 0.2046, pedigree (2,1,3,5,1)
  electricity consumed for the planing; the suction of the shavings in covered in a separate dataset; data from Swiss industry

## Sampling procedure
complementary literature and sampling from sawmills

## Extrapolations
Extrapolated from Swiss data. The exchanges of this child dataset are identical to the GLO dataset. This dataset was created to enable linking to regional markets (e.g. for electricity). Data quality indicators were adjusted accordingly.
