# copper production, primary

Dataset: EcoSpold 2, unit process
Geography: RoW
Time period: 1994-01-01 to 2019-12-31
Technology level: current
Classification: ISIC rev.4 ecoinvent: 2420:Manufacture of basic precious and other non-ferrous metals
Tags: ConvertedDataset
Scenario: Business-as-Usual
System model: Allocation at the point of substitution
Share of production covered: 84 %
Generated by: [System]
Published in: Althaus H.-J. 2000
Database: ecoinvent
isCopyrightProtected: true
accessRestrictedTo: 1

## General comment
This activity represents the production of 1 kg of refined copper. It is used as pure metal or as alloying element in various technical applications.

## Included activities end
The module includes the pre-treatment of the ore, the reduction and the refining copper to cathode copper, including the country-specific share in hydrometalurgically won copper (SX-EW)

## Geography
This module is valid for the whole corresponding region. Some agents used like lime or sodium cyanide originate from data sets valid for Switzerland or Europe.

## Technology
The ore is pre-treated, reduced and refined according to the country specific mix of process alternatives: reverberatory furnace 23.7%; flash smelting furnaces 60.7%; other 6.2%.; SX-EW 9.4%. An overall abatement for sulphur dioxide of 45.4% was estimated.

## Parameters
- fraction, process water, to air: 0.15 dimensionless; name fraction_PW_to_air; lognormal variance with pedigree 0.092025, pedigree (4,4,3,2,4)
  Literature value. In case when no industry/process specific data are available, default evaporation fraction value is used. This value is 15% and is based on literature (Statistics Canada, 2007 & Shaffer, K.H., 2008, Consumptive water use in the Great Lakes Basin, USGS & Shiklomanov, 2003, World Water Resources at the Beginning of the 21st Century) and has been approved by an expert.

## Reference product
- copper: 1 kg; name RP_amount; By-product classification allocatable product; CPC 41413: Refined copper and copper alloys, unwrought; master alloys of copper
  production volume 4.01822e8 kg; name RP_PV
    Source: USGS Minerals Yearbook 2015. Available from: https://www.usgs.gov/centers/nmic/copper-statistics-and-information (downloaded 21 June 2019), Table 22 (grand total, primary, other minus PV of copper from 'platinum group metal mine operation, ore with high palladium content [RU]', PV of copper from 'platinum group metal, extraction and refinery operations [ZA]', PV of copper from 'primary zinc production, from concentrate [GLO]', and PV of copper from 'treatment of copper cake [GLO]')
  property price 5.52 EUR2005
    Literature value (http://www.economist.com/news/business/21576714-mining-industry-has-enriched-chile-its-future-precarious-copper-solution). Average price between 20015 and 2013.
  property carbon content 0
    carbon content on a dry matter basis (reserved; not for manual entry)
  property true value 5.52; name RP_amount_true_value
    allocation property applied in "true value" allocation // value calculated from revenue
  properties: wet mass 1 kg, water in wet mass 0 kg, carbon content, non-fossil 0, carbon content, fossil 0, dry mass 1 kg, water content 0, carbon allocation 0 kg

## By-products
- heat, for reuse in municipal waste incineration only: 0 MJ; CPC 17300: Steam and hot water; By-product classification allocatable product; pedigree (1,1,1,1,1)
  Net electricity generated from this waste and used in internal MSWI plant energy redistribution.
  Uncertainty: uncertainty is calculated from uncertainties in waste composition and uncertainties in energy efficiency and the uncertainty in internal energy demand
  production volume 140971 MJ
  property exergy 0.1842 MJ; name E_th_prod_MSWI_exergy
    This exergy property is based on the exergy content of the product.
  property price 0.0106 EUR2005; name E_th_prod_MSWI_price_EUR2005
    Average European district heat price from Ecoheatcool and Euroheat 2005-2006, Ecoheat Work package 1: The European heat market. Final report. 10.6 EUR/GJ i s the price of district heat. http://www.solarthermalworld.org/files/Ecoheatcool%20WP1%20Web.pdf?download
  property true value relation 0.1842; name E_th_prod_MSWI_true_value_relation
    property to calculate "true value" from
  property true value 2.31298e-6
    allocation property applied in "true value" allocation // value calculated from true value relation
- electricity, for reuse in municipal waste incineration only: 0 kWh; CPC 17100: Electrical energy; By-product classification allocatable product; pedigree (1,1,1,1,1)
  (same comment as for heat, for reuse in municipal waste incineration only)
  production volume 19579.3 kWh
  property price 0.1 EUR2005; name E_el_prod_MSWI_price_EUR2005
    Estimated to be the same price as in case of electricity, medium voltage.
  property exergy 3.6 MJ; name E_el_prod_MSWI_exergy
    This exergy property is based on the exergy content of the product.
  property true value relation 3.6; name E_el_prod_MSWI_true_value_relation
    property to calculate "true value" from
  property true value 6.27844e-6
    (same comment as for heat, for reuse in municipal waste incineration only)

## Inputs from technosphere
- oxygen, liquid: 0.290351 kg; lognormal variance with pedigree 0.0408, pedigree (2,2,5,3,1)
  properties: wet mass 1 kg, dry mass 1 kg
- anode, for metal electrolysis: 0.00100022 kg; lognormal variance with pedigree 0.23, pedigree (5,5,5,5,4)
  properties: dry mass 1 kg, wet mass 1 kg, carbon content, fossil 0.865971
  note on carbon content, fossil: The main component of the anode is carbon, coming from bitumen and petroleum coke (ecoinvent v2.2 report 10). The C content in those components of the anode has been taken into account to calculate the anode final C content.
- copper concentrate, sulfide ore: 3.47758 kg; lognormal variance with pedigree 0.0408, pedigree (2,2,5,3,1)
  activityLink added to better reflect the reality of the supply chain
  properties: wet mass 1 kg, dry mass 1 kg
- silica sand: 0.831308 kg; lognormal variance with pedigree 0.1102, pedigree (5,2,5,3,1)
  properties: dry mass 0.99 kg, wet mass 1 kg, water content 0.010101
- heat, district or industrial, other than natural gas: 6.28418 MJ; lognormal variance with pedigree 0.0408, pedigree (2,2,5,3,1)
- lime, packed: 0.249503 kg; lognormal variance with pedigree 0.1102, pedigree (5,2,5,3,1)
  properties: carbon content, fossil 0.117492, water content 0.00200401, dry mass 0.998 kg, wet mass 1 kg
  note on carbon content, fossil: Table 3.1, ecoinvent v2.2 report 7, part VII, pg 3. MW CaCO3=100, MW MgCO3=84
- non-ferrous metal smelter: 1.05652e-11 unit; lognormal variance with pedigree 0.3601, pedigree (3,2,5,1,3)
- electricity, high voltage: 0.326782 kWh; lognormal variance with pedigree 0.0408, pedigree (2,2,5,3,1)
  activityLink added to better reflect the reality of the supply chain
- wastewater, unpolluted: -0.00546679 m3; name wastewater_amount; lognormal variance with pedigree 0.0407, pedigree (2,2,5,1,1)
  production volume 2.19668e6 m3; = abs(wastewater_amount/RP_amount)*RP_PV
    Calculated from production volume of reference product using the relative outputs.
  property price 0 EUR2005; name wastewater_amount_price_EUR2005
  properties: water content 2962.17, wet mass 1000 kg, dry mass 0.337476 kg, carbon content, fossil 0.00178991, carbon content, non-fossil 0.00178991
  note on carbon content, fossil: Assumed to be like in tap water. Bicarbonate content is 2.93 mol/m3. CO2 content is 0.1 mol/m3 (ecoinvent v2.2 report 8, Tab 93.1).
- copper slag: -0.930275 kg; name copper_slag_amount; lognormal variance with pedigree 0.0408, pedigree (2,2,5,3,1)
  production volume 3.73805e8 kg; = abs(copper_slag_amount/RP_amount)*RP_PV
    Calculated from the production volume of copper in proportion to the respective output amounts.
  property price 0 EUR2005; name copper_slag_amount_price_EUR2005
  properties: iron content 0.379, magnesium content 0.00485, aluminium content 0.0267, sodium content 0.008, zinc content 0.00606, dry mass 1 kg, copper content 0.00807, calcium content 0.00713, tungsten content 0.23999, potassium content 0.0317, wet mass 1 kg, silicon content 0.155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
- heat, district or industrial, natural gas: 4.84934 MJ; lognormal variance with pedigree 0.0408, pedigree (2,2,5,3,1)
  Calculated value; the original value (3.002 kg) reported in eiv2 dataset was evaluated as underestimated (in comparison with the local datasets), thus has been recalculated for eiv3 as weighted average (by production volumes) of the local datasets.
- electricity, high voltage: 0 kWh; pedigree (1,1,1,1,1)
- electricity, high voltage: 0.0120285, 0.205458 kWh (2 entries); lognormal variance with pedigree 0.0408, pedigree (2,2,5,3,1)

## Inputs from nature
- Water, river [natural resource, in water]: 0.00486862 m3; name water_river_input; lognormal variance with pedigree 0.0407, pedigree (2,2,5,1,1)

## Emissions to nature
- Sulfur dioxide [air, non-urban air or from high stacks]: 0.458158 kg; lognormal variance with pedigree 0.1401, pedigree (5,4,5,3,3)
- Vanadium [air, non-urban air or from high stacks]: 7.49612e-6 kg; lognormal variance with pedigree 0.7101, pedigree (3,2,5,1,3)
- Tin, ion [water, surface water]: 1.39103e-7 kg; lognormal variance with pedigree 1.37, pedigree (1,1,5,1,1)
  reported values
- Lead [air, non-urban air or from high stacks]: 0.00249503 kg; lognormal variance with pedigree 0.7101, pedigree (3,2,5,1,3)
- Cadmium [air, non-urban air or from high stacks]: 0.000349966 kg; lognormal variance with pedigree 0.7101, pedigree (3,2,5,1,3)
- Cadmium, ion [water, surface water]: 1.32479e-8 kg; lognormal variance with pedigree 1.37, pedigree (1,1,5,1,1)
  reported values
- Manganese [air, non-urban air or from high stacks]: 0.000300287 kg; lognormal variance with pedigree 0.7101, pedigree (3,2,5,1,3)
- Arsenic, ion [water, surface water]: 9.10796e-8 kg; lognormal variance with pedigree 1.37, pedigree (1,1,5,1,1)
  reported values
- Lead [water, surface water]: 7.78316e-8 kg; lognormal variance with pedigree 1.37, pedigree (1,1,5,1,1)
  reported values
- Particulates, > 2.5 um, and < 10um [air, non-urban air or from high stacks]: 0.000304703 kg; lognormal variance with pedigree 0.0701, pedigree (3,2,5,1,3)
- Carbon monoxide, fossil [air, non-urban air or from high stacks]: 3.00287e-5 kg; lognormal variance with pedigree 0.7101, pedigree (3,2,5,1,3)
- Copper [air, non-urban air or from high stacks]: 0.00274895 kg; lognormal variance with pedigree 0.7101, pedigree (3,2,5,1,3)
- Dioxins, measured as 2,3,7,8-tetrachlorodibenzo-p-dioxin [air, non-urban air or from high stacks]: 1.99823e-12 kg; lognormal variance with pedigree 0.3601, pedigree (3,2,5,1,3)
- Particulates, > 10 um [air, non-urban air or from high stacks]: 0.000101678 kg; lognormal variance with pedigree 0.0901, pedigree (3,2,5,1,3)
- Mercury [air, non-urban air or from high stacks]: 1.99823e-6 kg; lognormal variance with pedigree 0.7101, pedigree (3,2,5,1,3)
- Tin [air, non-urban air or from high stacks]: 0.000124751 kg; lognormal variance with pedigree 0.7101, pedigree (3,2,5,1,3)
- Chromium [air, non-urban air or from high stacks]: 1.00022e-6 kg; lognormal variance with pedigree 0.7101, pedigree (3,2,5,1,3)
- Chromium, ion [water, surface water]: 1.39103e-7 kg; lognormal variance with pedigree 1.37, pedigree (1,1,5,1,1)
  reported values
- Nickel [air, non-urban air or from high stacks]: 0.00195407 kg; lognormal variance with pedigree 0.7101, pedigree (3,2,5,1,3)
- Water [air, unspecified]: 0.000730293 m3; name water_to_air_unspecified; = (water_river_input*fraction_PW_to_air); lognormal variance with pedigree 0.0807, pedigree (2,2,5,1,1)
  Calculated value based on literature values and expert opinion. See comments in the parametres' comment field.
  property fraction, origin: fresh water 1; name fraction_origin_fresh_water
  property fraction, origin: salt water 0; name fraction_origin_salt_water
  property fraction, origin: unspecified 0; name fraction_origin_unspecified
- Carbon dioxide, fossil [air, non-urban air or from high stacks]: 0.109958 kg; lognormal variance with pedigree 0.1801, pedigree (5,4,5,3,3)
- Selenium [air, non-urban air or from high stacks]: 0.000100022 kg; lognormal variance with pedigree 0.7101, pedigree (3,2,5,1,3)
- Copper, ion [water, surface water]: 2.56127e-7 kg; lognormal variance with pedigree 1.37, pedigree (1,1,5,1,1)
  reported values
- Zinc [air, non-urban air or from high stacks]: 0.000749612 kg; lognormal variance with pedigree 0.7101, pedigree (3,2,5,1,3)
- Nickel, ion [water, surface water]: 1.03555e-7 kg; lognormal variance with pedigree 1.37, pedigree (1,1,5,1,1)
  reported values
- Mercury [water, surface water]: 1.39103e-9 kg; lognormal variance with pedigree 1.37, pedigree (1,1,5,1,1)
  reported values
- NMVOC, non-methane volatile organic compounds, unspecified origin [air, non-urban air or from high stacks]: 1.50143e-5 kg; lognormal variance with pedigree 0.1001, pedigree (3,2,5,1,3)
- Particulates, < 2.5 um [air, non-urban air or from high stacks]: 5.07838e-7 kg; lognormal variance with pedigree 0.3601, pedigree (3,2,5,1,3)
- Zinc, ion [water, surface water]: 4.12894e-7 kg; lognormal variance with pedigree 1.37, pedigree (1,1,5,1,1)
  reported values
- Arsenic [air, non-urban air or from high stacks]: 0.00100022 kg; lognormal variance with pedigree 0.7101, pedigree (3,2,5,1,3)
- Antimony [air, non-urban air or from high stacks]: 0.000124751 kg; lognormal variance with pedigree 0.7101, pedigree (3,2,5,1,3)

## Sampling procedure
literature

## Extrapolations
see Geography and Technology
