# clinker production

Dataset: EcoSpold 2, unit process
Geography: CA-QC
Time period: 2008-01-01 to 2019-12-31
Technology level: current
Classification: ISIC rev.4 ecoinvent: 2394:Manufacture of cement, lime and plaster
Classification: EcoSpold01Categories: construction materials/binder
Scenario: Business-as-Usual
System model: Allocation at the point of substitution
Share of production covered: 100 %
Generated by: Geneviève Martineau
Published in: Athena Institute, 2005
Database: ecoinvent
isCopyrightProtected: true
accessRestrictedTo: 1

## General comment
This activity represents the production of clinker.

Clinker is a constituant of Portland cement. It is produced by heating (sintering) limestone and clay in a cement kiln.
Other raw materials are added in the mixture to be sintered, but in smaller quantities.

In its 2005 document (Cement and Structural Concrete products LCI for Canadian cement mills) , Athena Institute, mention that "other ipunt materials" may include steel mill scale (iron oxides consisting of iron(II,III) oxide, hematite, and magnetite); iron slag or iron ore residue may also be used in small amounts to adjust the formulation to achieve the desired iron content. Similarly, bauxite or even aluminum scrap may be added to adjust Al2O3 levels, and sand is often used as a supplementary source of silica. However, because these inputs (excluding marl) are less than 1% of the total material input and because they make only minor contributions to emissions or residuals, these are typically not reported by plants.

At the kiln exit, ckinker is in the form of lumps or nodules, usually 3-25 mm in diameter. A grinding step is necessary in order for it to be ready for cement production.

## Included activities start
From reception of materials at the cement plant gate.

## Included activities end
This activity ends with the clinker ready for production of cement mix.
The dataset includes the whole manufacturing process to produce clinker (raw material provision, grinding and mixing; Long dry and Pre-calciner kiln process), internal processes (transport, etc.).
The dataset does not include administration activities.
In this version of the dataset, waste used as fuel and raw material enter the system without environmental burdens from upstream processes. Only the emissions from its combustion are included.
The following inputs were excluded (per kg clinker):
- "Other input materials": 1,09E-02 kg
- Waste - other solid / Misc. : 3,59E-03 kg
- Residual oil: 1,22 E-03 kg
- Used tyres: 5,30E-3kg
- Spent solvent mixture: 1,58E-03 kg
- Spent oil and grease mixture: 3,53E-03kg (assuming 0,9 kg/litre)
Also, the Canadian National Pollutant Release Inventory 2007 lists the following as inorganic (not metals) materials transferred for recycling / recovery:
- Chromium (and its compounds): 7,49 E-6 kg/kg clinker
- Manganese (and its compounds): 1,15 E-6 kg/kg clinker
- Nickel (and its compounds): 3,01 E-7 kg/kg clinker
These by-products were excluded from the dataset because of their small amounts and lack of specificity.
Finally, "Other input materials" listed in literature sources (see General Comment field for details) are excluded because their individual amounts are unknown. Values from the generic (GLO) clinker production dataset (ecoinvent v3.0) were used for ammonia and bauxite.

## Geography
Represents Quebec cement mills.

## Technology
Typical technology for Quebec production (including Long dry and Pre-calciner kilns).

## Time period
Average production volume over 2008-2011.
Inventory data provided for 2007, the uncertainty has been adjusted accordingly.

## Parameters
- non-process water: 0.000728 m3; name non_process_water; lognormal variance with pedigree 0.001425, pedigree (2,1,2,2,1)
  Includes. contact cooling water; non-contact cooling water; roadway dust suppression; non-roadway dust suppression, other laboratory and grounds, Cement kiln dust (CKD) landfill slurry
  No "wet-kilns" in Quebec. Amount estimated considering 2 long dry (68% production) and 1 precalciner (32% production).
  Estimation based on Table 10a (p.15) of 2006, Marceau, Life Cycle Inventory of Portland Cement Manufacture, 68, Portland Cement Association, 0 - Undefined, Link: http://www.cement.org/bookstore/profile.asp?printpage=true&store=&id=11004, Accessed: 2011-07-21
- quebec production volume: 4.203e9 kg; name PV_cement_Quebec; lognormal variance with pedigree 0.0008, pedigree (1,1,2,1,1)
  Annual production capacity of the 3 cement mills in Québec, in 2007. Source: USGS (2010) Minerals Yearbook 2007, v.3. Area Reports, International, Latin America and Canada. The use of production capacity may be overestimate the production volume of Quebec cement plants.
- clinker fraction: 0.9065 dimensionless; name clinker_fraction; = 0.92*Portland_fraction+0.83*(1-Portland_fraction); lognormal variance with pedigree 0.001325, pedigree (2,2,1,2,1)
  For Annual production volume purpose: proportion of clinker in the global cement production (including Portland and other alternative constituants cements).
  Estimated value for Canadian Cement Plants, provided by Athena Institute. For regular Portland cement, clinker fraction is 0,92, whereas for Portland-Limestone cement (Contempra), clinker fraction is 0,83.
  Uncertainty: Variance of log-transformed data was taken from ecoinvent report no 1, table 10.3. Value represents demand of products, electricity etc. for input/output group c.
- fraction, water, to air: 0.15 dimensionless; name f_water_to_air
  Based on "clinker production, GLO" dataset
- process water: 0.000232 m3; name process_water; lognormal variance with pedigree 0.001425, pedigree (2,1,2,2,1)
  Includes slurry make-up water. contact cooling water; roadway dust suppression; non-roadway dust suppression, other laboratory and grounds, Cement kiln dust (CKD) landfill slurry.
  No "wet-kilns" in Quebec. Amount estimated considering 2 long dry (68% production) and 1 precalciner (32% production).
  Sources:
  For slurry make-up water: 2008, Portland Cement Association, US & Canadian Labor-Energy Input Survey 2007, 0 - Undefined
  For other water uses:Table 10a (p.15) of 2006, Marceau, Life Cycle Inventory of Portland Cement Manufacture, 68, Portland Cement Association, 0 - Undefined, Link: http://www.cement.org/bookstore/profile.asp?printpage=true&store=&id=11004, Accessed: 2011-07-21
- fraction, water, to water: 0.85 dimensionless; name f_water_to_water
  Based on "clinker production, GLO" dataset
- Portland fraction: 0.85 dimensionless; name Portland_fraction; lognormal variance with pedigree 0.0406, pedigree (5,1,1,1,1)
  Fraction of the annual production capacity of Quebec cement plants that is used to produce regular Portland cement. Canadian cement association reports all Portland cements (with or without alternative constituents) alltogether. The fraction of regular Portland cement is therefore a rough estimation.
  It is assumed that the balance is Portland-Limestone cement (Contempra)

## Reference product
- clinker: 1 kg; name ref; By-product classification allocatable product; CPC 37430: Cement clinkers
  EcoSpold01Location=CH
  production volume 3.81002e9 kg; name pv_ref; = PV_cement_Quebec*clinker_fraction
    Calculated value. See Parameters.
  property price 0.047 EUR2005
    Calculated value based on data from United Nations Commodity Trade Statistics Database (comtrade.un.org). UN comtrade category: 252310 Cement Clinkers. Using exchange rate of 1EURO = 1.209 USD. Average of price of import into 5 main markets (EU, US, JP, IN and CN).
  property carbon content 0
    carbon content on a dry matter basis (reserved; not for manual entry)
  property true value 0.047; name ref_true_value
    allocation property applied in "true value" allocation // value calculated from revenue
  properties: dry mass 1 kg, water content 0, wet mass 1 kg, water in wet mass 0 kg, carbon content, non-fossil 0, carbon content, fossil 0, carbon allocation 0 kg

## By-products
- heat, for reuse in municipal waste incineration only: 0 MJ; CPC 17300: Steam and hot water; By-product classification allocatable product; pedigree (1,1,1,1,1)
  Net electricity generated from this waste and used in internal MSWI plant energy redistribution.
  Uncertainty: uncertainty is calculated from uncertainties in waste composition and uncertainties in energy efficiency and the uncertainty in internal energy demand
  production volume 8.39306 MJ
  property exergy 0.1842 MJ; name E_th_prod_MSWI_exergy
    This exergy property is based on the exergy content of the product.
  property price 0.0106 EUR2005; name E_th_prod_MSWI_price_EUR2005
    Average European district heat price from Ecoheatcool and Euroheat 2005-2006, Ecoheat Work package 1: The European heat market. Final report. 10.6 EUR/GJ i s the price of district heat. http://www.solarthermalworld.org/files/Ecoheatcool%20WP1%20Web.pdf?download
  property true value relation 0.1842; name E_th_prod_MSWI_true_value_relation
    property to calculate "true value" from
  property true value 1.44898e-11
    allocation property applied in "true value" allocation // value calculated from true value relation
- electricity, for reuse in municipal waste incineration only: 0 kWh; CPC 17100: Electrical energy; By-product classification allocatable product; pedigree (1,1,1,1,1)
  (same comment as for heat, for reuse in municipal waste incineration only)
  production volume 1.18235 kWh
  property price 0.1 EUR2005; name E_el_prod_MSWI_price_EUR2005
    Estimated to be the same price as in case of electricity, medium voltage.
  property exergy 3.6 MJ; name E_el_prod_MSWI_exergy
    This exergy property is based on the exergy content of the product.
  property true value relation 3.6; name E_el_prod_MSWI_true_value_relation
    property to calculate "true value" from
  property true value 3.98934e-11
    (same comment as for heat, for reuse in municipal waste incineration only)

## Inputs from technosphere
- petroleum coke: 0.0386 kg; source Portland Cement Association 2008; lognormal variance with pedigree 0.003225, pedigree (2,1,3,2,1)
  Kiln fuel. Assumed equivalent as for US and Canadian cement industry.
  EcoSpold01Location=RER
  properties: carbon content, fossil 0.885, wet mass 1 kg, dry mass 1 kg
- steel, chromium steel 18/8, hot rolled: 5.86e-5 kg; source Kellenberger D. 2007; lognormal variance with pedigree 0.1006, pedigree (2,5,5,5,4)
  Ancillary product for grinding (wearing parts). Extrapolated value, based on "clinker production, GLO" dataset.
  EcoSpold01Location=RER
  properties: wet mass 1 kg, dry mass 1 kg, carbon content, fossil 0.0008
  note on carbon content, fossil: Stainless steel model is the grade 304 steel (18/8 stainless, 18% chromium 8% nickel; max. 0.08% C)
- petrol, unleaded: 1.935e-5 kg; = density_gasoline*gasoline_vol_in*UnitConversion(1, 'm3', 'l'); source Portland Cement Association 2008; lognormal variance with pedigree 0.002, pedigree (1,1,3,1,1)
  Gasoline, as kiln fuel. Assumed equivalent as for US and Canadian cement industry.
  Uncertainty: Calculated variable. Uncertainty will be determined from propagation of uncertainty factors of underlying variables. Uncertainty of actual relation between variables not accounted at this time.
  property fuel input in physical units, m3 2.58e-8 m3; name gasoline_vol_in; = 2.58e-5*UnitConversion(1, 'l', 'm3')
  property density 0.75 kg/l; name density_gasoline
  properties: dry mass 1 kg, wet mass 1 kg, carbon content, fossil 0.865
- refractory, high aluminium oxide, packed: 0.000137 kg; source Kellenberger D. 2007; lognormal variance with pedigree 0.1006, pedigree (2,5,5,5,4)
  Process material (wearing parts in the cement kiln). Extrapolated value, based on "clinker production, GLO" dataset.
  EcoSpold01Location=DE
  properties: dry mass 1 kg, wet mass 1 kg
- refractory, basic, packed: 0.00019 kg; source Kellenberger D. 2007; lognormal variance with pedigree 0.1006, pedigree (2,5,5,5,4)
  (same comment as for refractory, high aluminium oxide, packed)
  properties: wet mass 1 kg, dry mass 1 kg
- clay: 0.196 kg; source Athena Institute, 2005, p. Table 3.1 (Eastern Region); lognormal variance with pedigree 0.003225, pedigree (2,1,3,2,1)
  Raw material for clinker production. Literature value- Orignial data given per tonne of cement. Quantity corrected assuming 0,92 t clinker/t cement.
  EcoSpold01Location=CH
  properties: wet mass 1 kg, dry mass 0.965 kg, water content 0.0362694
- electricity, medium voltage: 0.107 kWh; source Portland Cement Association 2008; lognormal variance with pedigree 0.003225, pedigree (2,1,3,2,1)
  EcoSpold01Location=CH
  Energy for operation (conveyors, grinding, etc.). Assumed equivalent as for US and Canadian cement industry.
- inert waste, for final disposal: -0.007652 kg; name inert_waste; source Athena Institute, 2005; lognormal variance with pedigree 0.012625, pedigree (2,1,3,2,1)
  Literature value. Cement kiln dust (CKD) discarded as solid waste. Orignial data given per tonne of cement. Quantity corrected assuming 0,92 t clinker/t cement.
  For Canadian plants, assumed 100% landfilled.
  EcoSpold01Location=CH
  production volume 2.91543e7 kg; = pv_ref*inert_waste/ref
    Calculated from the production volume of clinker in proportion to the respective output amounts.
  property price 0 EUR2005; name inert_waste_price_EUR2005
  properties: water content 0.00502513, dry mass 0.995 kg, wet mass 1 kg
- hard coal: 0.0971 kg; source Portland Cement Association 2008; lognormal variance with pedigree 0.003825, pedigree (2,1,3,2,2)
  EcoSpold01Location=WEU
  Kiln fuel. Extrapolated input. Canadian cement plants use bituminous coal. Value assumed equivalent as for US and Canadian cement industry.
  properties: dry mass 0.94 kg, carbon content, fossil 0.845, water content 0.0638298, wet mass 1 kg
  note on carbon content, fossil: C content 75-94% (specified in Tab 1.1, report 6, part VI). A mean content of 0.845 kg C/ kg dry hard coal was considered
- sand: 0.0978 kg; source Athena Institute, 2005, p. Table 3.1 (Eastern Region); lognormal variance with pedigree 0.003225, pedigree (2,1,3,2,1)
  (same comment as for clay)
  properties: wet mass 1 kg, dry mass 1 kg
- natural gas, high pressure: 0.00265 m3; source Portland Cement Association 2008; lognormal variance with pedigree 0.003225, pedigree (2,1,3,2,1)
  EcoSpold01Location=CH
  Kiln fuel. Assumed equivalent as for US and Canadian cement industry.
  properties: heating value, gross 39 MJ
- limestone, crushed, for mill: 1.402 kg; source Athena Institute, 2005, p. Table 3.1 (Eastern Region); lognormal variance with pedigree 0.012625, pedigree (2,1,3,2,1)
  Raw material for clinker production. Literature value- Orignial data given per tonne of Portland cement. Quantity corrected assuming 0,92 t clinker/t cement.
  properties: wet mass 1 kg, dry mass 0.998 kg, carbon content, fossil 0.117492, water content 0.00200401
- industrial machine, heavy, unspecified: 3.76e-5 kg; source Kellenberger D. 2007; lognormal variance with pedigree 0.418, pedigree (4,5,5,5,4)
  Kiln infrastructure. Extrapolated value, based on "clinker production, GLO" dataset.
  Attention: infrastructure includes only round kiln; weight assumption: 300t; assumption service life: 25 years, rest of infrastructure in "cement plant" for cement production included.
  EcoSpold01Location=RER
- iron ore, crude ore, 46% Fe: 0.0109 kg; source Athena Institute, 2005; lognormal variance with pedigree 0.012625, pedigree (2,1,3,2,1)
  Raw material for clinker production. Literature value- Orignial data given per tonne of cement. Quantity corrected assuming 0,92 t clinker/t cement.
  properties: wet mass 1 kg, dry mass 1 kg
- bauxite: 0.00012 kg; source Kellenberger D. 2007; lognormal variance with pedigree 0.1006, pedigree (2,5,5,5,4)
  EcoSpold01Location=GLO
  Raw material for clinker production. Extrapolated value, based on "clinker production, GLO" dataset.
  No amount reported by Québec cement plants.
  properties: wet mass 1 kg, dry mass 1 kg
- refractory, fireclay, packed: 8.21e-5 kg; source Kellenberger D. 2007; lognormal variance with pedigree 0.1006, pedigree (2,5,5,5,4)
  (same comment as for refractory, high aluminium oxide, packed)
  properties: wet mass 1 kg, dry mass 1 kg
- diesel, low-sulfur: 0.00042672 kg; = density_diesel*diesel_vol_in*UnitConversion(1, 'm3', 'l'); source Portland Cement Association 2008; lognormal variance with pedigree 0.002, pedigree (1,1,3,1,1)
  Middle distillates, as kiln fuel. Assumed equivalent as for US and Canadian cement industry.
  Uncertainty: Calculated variable. Uncertainty will be determined from propagation of uncertainty factors of underlying variables. Uncertainty of actual relation between variables not accounted at this time.
  property density 0.84 kg/l; name density_diesel
  property fuel input in physical units, m3 5.08e-7 m3; name diesel_vol_in; = 5.08E-04*UnitConversion(1, 'l', 'm3')
  properties: carbon content, fossil 0.865, wet mass 1 kg, dry mass 1 kg
- municipal solid waste: -4.5e-5 kg; name MSW; source Kellenberger D. 2007; lognormal variance with pedigree 0.1006, pedigree (2,5,5,5,4)
  EcoSpold01Location=CH
  Extrapolated value, based on "clinker production, GLO" dataset.
  No amount reported by Québec cement plants.
  production volume 171451 kg; = pv_ref*MSW/ref
    (same comment as for inert waste, for final disposal)
  properties: carbon content, non-fossil 0.261655, dry mass 0.771 kg, wet mass 1 kg, water content 0.297017, carbon content, fossil 0.171549
  note on carbon content, non-fossil: MSW composition in tab 4.1, ecoinvent v2.2 report 13_I. C content referred to 1 kg DM
- cement factory: 6.27e-12 unit; source Kellenberger D. 2007; lognormal variance with pedigree 0.4006, pedigree (2,5,5,5,4)
  Ancillary product for grinding. Extrapolated value, based on "clinker production, GLO" dataset.
  EcoSpold01Location=CH
- lime, hydrated, loose weight: 0.00392 kg; source Kellenberger D. 2007; lognormal variance with pedigree 0.0912, pedigree (2,5,5,5,4)
  Raw material for clinker production. Extrapolated value, based on "clinker production, GLO" dataset.
  properties: dry mass 0.997 kg, wet mass 1 kg, water content 0.00300903
- liquefied petroleum gas: 5.082e-5 kg; = density_LPG*LPG_vol_in*UnitConversion(1, 'm3', 'l'); source Portland Cement Association 2008; lognormal variance with pedigree 0.002, pedigree (1,1,3,1,1)
  Kiln fuel. Assumed equivalent as for US and Canadian cement industry.
  Uncertainty: Calculated variable. Uncertainty will be determined from propagation of uncertainty factors of underlying variables. Uncertainty of actual relation between variables not accounted at this time.
  property fuel input in physical units, m3 9.24e-8 m3; name LPG_vol_in; = 9.24e-5*UnitConversion(1, 'l', 'm3')
  property density 0.55 kg/l; name density_LPG
  properties: dry mass 1 kg, wet mass 1 kg, carbon content, fossil 0.821863
  note on density: Density of liquid is approximately half of water and ranges from 0.525 to 0.580 @ 15°C. Source: http://www.nationalgasco.net/CorporateGovernance/ConsumerAwareness/CharacteristicsofLPG.aspx
- lubricating oil: 4.71e-5 kg; source Kellenberger D. 2007; lognormal variance with pedigree 0.1006, pedigree (2,5,5,5,4)
  EcoSpold01Location=RER
  Process material (lubricating grease / oil). Extrapolated value, based on "clinker production, GLO" dataset.
  properties: carbon content, fossil 0.75, dry mass 1 kg, wet mass 1 kg
  note on carbon content, fossil: Lubricating oil is produced from diesel. C-content/dry mass of fats and oils considered 75%, from: ecoinvent v2.2 report, n 15a, pg 40
- ammonia, liquid: 0.000908 kg; source Kellenberger D. 2007; lognormal variance with pedigree 0.1006, pedigree (2,5,5,5,4)
  EcoSpold01Location=CH
  Ancillary material for nitrogen oxide removal during burning process. Extrapolated value, based on "clinker production, GLO" dataset.
  No amount reported by Québec cement plants.
  properties: wet mass 1 kg, dry mass 1 kg

## Inputs from nature
- Water, unspecified natural origin [natural resource, in water]: 0.000232 m3; name water_in; = process_water; lognormal variance with pedigree 0.002, pedigree (1,1,3,1,1)
  Calculated value. See Parameters.
  Uncertainty: Calculated variable. Uncertainty will be determined from propagation of uncertainty factors of underlying variables. Uncertainty of actual relation between variables not accounted at this time.
- Water, cooling, unspecified natural origin [natural resource, in water]: 0.000728 m3; = non_process_water; lognormal variance with pedigree 0.002, pedigree (1,1,3,1,1)
  (same comment as for Water, unspecified natural origin)

## Emissions to nature
- Dioxins, measured as 2,3,7,8-tetrachlorodibenzo-p-dioxin [air, unspecified]: 4.17e-13 kg; source Environnement Canada 2007; lognormal variance with pedigree 0.042625, pedigree (2,1,3,2,1)
  Literature value- Emissions to air- weighted average of 3 Québec cement plants.
  Orignial data given per tonne of cement. Quantity corrected assuming 0,92 t clinker/t cement.
- PAH, polycyclic aromatic hydrocarbons [air, unspecified]: 9.68e-11 kg; source Environnement Canada 2007; lognormal variance with pedigree 0.302625, pedigree (2,1,3,2,1)
  Literature value- Emissions to air- weighted average of 3 Quebec cement plants.
  Generic PAH used for 7H-Dibenzo(c,g)carbazole (2,87 E-11 kg) and Dibenz(a,j)acridine (6,81E-11 kg)
  Orignial data given per tonne of cement. Quantity corrected assuming 0,92 t clinker/t cement.
- Tin [air, unspecified]: 9e-9 kg; source Kellenberger D. 2007; lognormal variance with pedigree 0.7506, pedigree (2,5,5,5,4)
  Extrapolated value, based on "clinker production, GLO" dataset.
  No amount reported by Québec cement plants.
- Nickel [air, unspecified]: 1.32e-7 kg; source Environnement Canada 2007; lognormal variance with pedigree 0.652625, pedigree (2,1,3,2,1)
  (same comment as for Dioxins, measured as 2,3,7,8-tetrachlorodibenzo-p-dioxin)
- Arsenic, ion [water, unspecified]: 9.84e-9 kg; source Environnement Canada 2007; lognormal variance with pedigree 0.043225, pedigree (2,3,3,2,1)
  Literature value- Emissions to water- Data from one (1) Québec cement plant (the only Canadian cement plant that has reported "emissions to water" to the NPRI in 2007.
  Orignial data given per tonne of cement. Quantity corrected assuming 0,92 t clinker/t cement.
- Carbon dioxide, non-fossil [air, unspecified]: 0.0151 kg; source Kellenberger D. 2007; lognormal variance with pedigree 0.1006, pedigree (2,5,5,5,4)
  (same comment as for Tin)
- Ammonia [air, unspecified]: 1.79e-6 kg; source Environnement Canada 2007; lognormal variance with pedigree 0.042625, pedigree (2,1,3,2,1)
  Literature value- Emissions to air- weighted avg of 3 Quebec cement plants.
  Orignial data given per tonne of cement. Quantity corrected assuming 0,92 t clinker/t cement.
- Cadmium, ion [water, unspecified]: 1.97e-9 kg; source Environnement Canada 2007; lognormal variance with pedigree 0.653225, pedigree (2,3,3,2,1)
  (same comment as for Arsenic, ion)
- Carbon dioxide, fossil [air, unspecified]: 0.846 kg; source Environnement Canada 2007; lognormal variance with pedigree 0.003225, pedigree (2,1,3,2,1)
  (same comment as for Dioxins, measured as 2,3,7,8-tetrachlorodibenzo-p-dioxin)
- Cobalt [air, unspecified]: 4e-9 kg; source Kellenberger D. 2007; lognormal variance with pedigree 0.1406, pedigree (2,5,5,5,4)
  (same comment as for Tin)
- Chromium, ion [water, unspecified]: 3.94e-9 kg; source Environnement Canada 2007; lognormal variance with pedigree 0.653225, pedigree (2,3,3,2,1)
  (same comment as for Arsenic, ion)
- Vanadium [air, unspecified]: 5e-9 kg; source Kellenberger D. 2007; lognormal variance with pedigree 0.1406, pedigree (2,5,5,5,4)
  (same comment as for Tin)
- Beryllium [air, unspecified]: 3e-9 kg; source Kellenberger D. 2007; lognormal variance with pedigree 0.1406, pedigree (2,5,5,5,4)
  (same comment as for Tin)
- Copper, ion [water, unspecified]: 1.97e-9 kg; source Environnement Canada 2007; lognormal variance with pedigree 0.653225, pedigree (2,3,3,2,1)
  (same comment as for Arsenic, ion)
- Benzo(k)fluoranthene [air, unspecified]: 3.37e-10 kg; source Environnement Canada 2007; lognormal variance with pedigree 0.302625, pedigree (2,1,3,2,1)
  Literature value- Emissions to air- weighted average of 3 Québec cement plants.
  Original data given per tonne of cement. Quantity corrected assuming 0,92 t clinker/t cement.
- Cadmium [air, unspecified]: 1.36e-9 kg; source Environnement Canada 2007; lognormal variance with pedigree 0.652625, pedigree (2,1,3,2,1)
  (same comment as for Dioxins, measured as 2,3,7,8-tetrachlorodibenzo-p-dioxin)
- Particulates, > 2.5 um, and < 10um [air, non-urban air or from high stacks]: 9e-6 kg; source Environnement Canada 2007; lognormal variance with pedigree 0.122625, pedigree (2,1,3,2,1)
  (same comment as for Dioxins, measured as 2,3,7,8-tetrachlorodibenzo-p-dioxin)
- Mercury [water, unspecified]: 2.07e-11 kg; source Environnement Canada 2007; lognormal variance with pedigree 0.653225, pedigree (2,3,3,2,1)
  (same comment as for Arsenic, ion)
- Dibenz(a,h)anthracene [air, unspecified]: 2.19e-10 kg; source Environnement Canada 2007; lognormal variance with pedigree 0.302625, pedigree (2,1,3,2,1)
  (same comment as for Benzo(k)fluoranthene)
- Particulates, < 2.5 um [air, non-urban air or from high stacks]: 9.86e-6 kg; source Environnement Canada 2007; lognormal variance with pedigree 0.302625, pedigree (2,1,3,2,1)
  (same comment as for Dioxins, measured as 2,3,7,8-tetrachlorodibenzo-p-dioxin)
- Nitrogen oxides [air, unspecified]: 0.00214 kg; source Environnement Canada 2007; lognormal variance with pedigree 0.042625, pedigree (2,1,3,2,1)
  (same comment as for Dioxins, measured as 2,3,7,8-tetrachlorodibenzo-p-dioxin)
- Lead [water, unspecified]: 2.07e-9 kg; source Environnement Canada 2007; lognormal variance with pedigree 0.653225, pedigree (2,3,3,2,1)
  (same comment as for Arsenic, ion)
- Fluoranthene [air, unspecified]: 3.59e-9 kg; source Environnement Canada 2007; lognormal variance with pedigree 0.302625, pedigree (2,1,3,2,1)
  (same comment as for Benzo(k)fluoranthene)
- Mercury [air, unspecified]: 1.41e-8 kg; source Environnement Canada 2007; lognormal variance with pedigree 0.652625, pedigree (2,1,3,2,1)
  (same comment as for Dioxins, measured as 2,3,7,8-tetrachlorodibenzo-p-dioxin)
- Nickel, ion [water, unspecified]: 1.97e-9 kg; source Environnement Canada 2007; lognormal variance with pedigree 0.653225, pedigree (2,3,3,2,1)
  (same comment as for Arsenic, ion)
- Fluorene [air, unspecified]: 3.26e-9 kg; source Environnement Canada 2007; lognormal variance with pedigree 0.302625, pedigree (2,1,3,2,1)
  (same comment as for Benzo(k)fluoranthene)
- Zinc [air, unspecified]: 3.19e-7 kg; source Environnement Canada 2007; lognormal variance with pedigree 0.652625, pedigree (2,1,3,2,1)
  (same comment as for Dioxins, measured as 2,3,7,8-tetrachlorodibenzo-p-dioxin)
- Chromium VI [air, unspecified]: 5.5e-10 kg; source Kellenberger D. 2007; lognormal variance with pedigree 0.1406, pedigree (2,5,5,5,4)
  (same comment as for Tin)
- Zinc, ion [water, unspecified]: 3.94e-9 kg; source Environnement Canada 2007; lognormal variance with pedigree 0.653225, pedigree (2,3,3,2,1)
  (same comment as for Arsenic, ion)
- Indeno(1,2,3-cd)pyrene [air, unspecified]: 8.61e-11 kg; source Environnement Canada 2007; lognormal variance with pedigree 0.302625, pedigree (2,1,3,2,1)
  Literature value- Emissions to air- weighted average of 3 Québec cement plants.
  Orignial data given per tonne of cement. Quantity corrected assuming 0,92 t clinker/t cement."
- Sulfur dioxide [air, unspecified]: 0.00312 kg; source Environnement Canada 2007; lognormal variance with pedigree 0.003225, pedigree (2,1,3,2,1)
  (same comment as for Dioxins, measured as 2,3,7,8-tetrachlorodibenzo-p-dioxin)
- Lead [air, unspecified]: 4.66e-8 kg; source Environnement Canada 2007; lognormal variance with pedigree 0.652625, pedigree (2,1,3,2,1)
  (same comment as for Dioxins, measured as 2,3,7,8-tetrachlorodibenzo-p-dioxin)
- Phosphorus [water, unspecified]: 5.91e-9 kg; source Environnement Canada 2007; lognormal variance with pedigree 0.043225, pedigree (2,3,3,2,1)
  (same comment as for Arsenic, ion)
- Phenanthrene [air, unspecified]: 5.02e-8 kg; source Environnement Canada 2007; lognormal variance with pedigree 0.652625, pedigree (2,1,3,2,1)
  (same comment as for Dioxins, measured as 2,3,7,8-tetrachlorodibenzo-p-dioxin)
- Chromium [air, unspecified]: 4.73e-8 kg; source Environnement Canada 2007; lognormal variance with pedigree 0.652625, pedigree (2,1,3,2,1)
  (same comment as for Dioxins, measured as 2,3,7,8-tetrachlorodibenzo-p-dioxin)
- Particulates, > 10 um [air, non-urban air or from high stacks]: 7.34e-5 kg; source Environnement Canada 2007; lognormal variance with pedigree 0.042625, pedigree (2,1,3,2,1)
  (same comment as for Dioxins, measured as 2,3,7,8-tetrachlorodibenzo-p-dioxin)
- Pyrene [air, unspecified]: 2.62e-9 kg; source Environnement Canada 2007; lognormal variance with pedigree 0.302625, pedigree (2,1,3,2,1)
  (same comment as for Indeno(1,2,3-cd)pyrene)
- Water [water, unspecified]: 0.0001972 m3; = f_water_to_water*water_in; lognormal variance with pedigree 0.002, pedigree (1,1,3,1,1)
  (same comment as for Water, unspecified natural origin)
- Methane, fossil [air, unspecified]: 8.88e-6 kg; source Kellenberger D. 2007; lognormal variance with pedigree 0.2206, pedigree (2,5,5,5,4)
  (same comment as for Tin)
- Chrysene [air, unspecified]: 4.3e-11 kg; source Environnement Canada 2007; lognormal variance with pedigree 0.302625, pedigree (2,1,3,2,1)
  (same comment as for Dioxins, measured as 2,3,7,8-tetrachlorodibenzo-p-dioxin)
- Water [air, unspecified]: 3.48e-5 m3; = f_water_to_air*water_in; lognormal variance with pedigree 0.002, pedigree (1,1,3,1,1)
  (same comment as for Water, unspecified natural origin)
- Carbon monoxide, fossil [air, unspecified]: 0.000801 kg; source Environnement Canada 2007; lognormal variance with pedigree 0.652625, pedigree (2,1,3,2,1)
  (same comment as for Dioxins, measured as 2,3,7,8-tetrachlorodibenzo-p-dioxin)
- Acenaphthylene [air, unspecified]: 2.04e-8 kg; source Environnement Canada 2007; lognormal variance with pedigree 0.302625, pedigree (2,1,3,2,1)
  (same comment as for Indeno(1,2,3-cd)pyrene)
- Thallium [air, unspecified]: 1.3e-8 kg; source Kellenberger D. 2007; lognormal variance with pedigree 0.1406, pedigree (2,5,5,5,4)
  (same comment as for Tin)
- Benzo(a)pyrene [air, unspecified]: 1.58e-10 kg; source Environnement Canada 2007; lognormal variance with pedigree 0.302625, pedigree (2,1,3,2,1)
  (same comment as for Dioxins, measured as 2,3,7,8-tetrachlorodibenzo-p-dioxin)
- Benzo(b)fluoranthene [air, unspecified]: 4.66e-10 kg; source Environnement Canada 2007; lognormal variance with pedigree 0.302625, pedigree (2,1,3,2,1)
  (same comment as for Indeno(1,2,3-cd)pyrene)
- NMVOC, non-methane volatile organic compounds, unspecified origin [air, unspecified]: 1.4e-5 kg; source Environnement Canada 2007; lognormal variance with pedigree 0.042625, pedigree (2,1,3,2,1)
  (same comment as for Dioxins, measured as 2,3,7,8-tetrachlorodibenzo-p-dioxin)
- Benzene, hexachloro- [air, unspecified]: 1.97e-10 kg; source Environnement Canada 2007; lognormal variance with pedigree 0.302625, pedigree (2,1,3,2,1)
  (same comment as for Dioxins, measured as 2,3,7,8-tetrachlorodibenzo-p-dioxin)
- Benz(a)anthracene [air, unspecified]: 3.94e-10 kg; source Environnement Canada 2007; lognormal variance with pedigree 0.302625, pedigree (2,1,3,2,1)
  (same comment as for Indeno(1,2,3-cd)pyrene)
- Antimony [air, unspecified]: 2e-9 kg; source Kellenberger D. 2007; lognormal variance with pedigree 0.7506, pedigree (2,5,5,5,4)
  (same comment as for Tin)
- Manganese [air, unspecified]: 4.37e-8 kg; source Environnement Canada 2007; lognormal variance with pedigree 0.302625, pedigree (2,1,3,2,1)
  (same comment as for Dioxins, measured as 2,3,7,8-tetrachlorodibenzo-p-dioxin)
- Benzo(ghi)perylene [air, unspecified]: 2.87e-11 kg; source Environnement Canada 2007; lognormal variance with pedigree 0.302625, pedigree (2,1,3,2,1)
  (same comment as for Dioxins, measured as 2,3,7,8-tetrachlorodibenzo-p-dioxin)
- Copper [air, unspecified]: 6.1e-9 kg; source Environnement Canada 2007; lognormal variance with pedigree 0.652625, pedigree (2,1,3,2,1)
  (same comment as for Dioxins, measured as 2,3,7,8-tetrachlorodibenzo-p-dioxin)
- Methane, dichloro-, HCC-30 [air, unspecified]: 3.94e-6 kg; source Environnement Canada 2007; lognormal variance with pedigree 0.302625, pedigree (2,1,3,2,1)
  (same comment as for Dioxins, measured as 2,3,7,8-tetrachlorodibenzo-p-dioxin)
- Hydrogen chloride [air, unspecified]: 3.37e-5 kg; source Environnement Canada 2007; lognormal variance with pedigree 0.042625, pedigree (2,1,3,2,1)
  (same comment as for Dioxins, measured as 2,3,7,8-tetrachlorodibenzo-p-dioxin)
- Arsenic [air, unspecified]: 9.32e-10 kg; source Environnement Canada 2007; lognormal variance with pedigree 0.042625, pedigree (2,1,3,2,1)
  (same comment as for Dioxins, measured as 2,3,7,8-tetrachlorodibenzo-p-dioxin)
- Phosphorus [air, unspecified]: 2.65e-11 kg; source Environnement Canada 2007; lognormal variance with pedigree 0.042625, pedigree (2,1,3,2,1)
  (same comment as for Dioxins, measured as 2,3,7,8-tetrachlorodibenzo-p-dioxin)
- Selenium [air, unspecified]: 2e-9 kg; source Kellenberger D. 2007; lognormal variance with pedigree 0.7506, pedigree (2,5,5,5,4)
  (same comment as for Tin)

## Sampling procedure
Several published sources were used to elaborate this dataset:
- For energy input: Based on "US and Canadian Labor-Energy Input Survey 2007" (Portland Cement Association, 2008) data (in which Québec cement mills are included). An average energy input profile of Canadian mills is used (see Extrapolations field below)
- For material inputs: Based on "Cement and Structural Concrete Products LCI" (Athena Institute, 2005) data (Table 3.1). Values regarding Quebec plants (Eastern Region) were used, updated with Athena LCI database 2013 for some constituents.
- For water input: Based on US and Canadian 2007 labor-energy input survey data, and "LCI of Portland Cement Manufacture" (PCA, 2006).
- For emissions to air and water: Based on Canadian National Pollutant Release Inventory (2007) data, covering all the cement plants. When a substance was not reported by Québec plants, the generic (GLO) value from ecoinvent v.3.0 clinker production dataset was used, the uncertainty has been adjusted accordingly.
- For solid waste: Based on Athena 2005 cement LCI data (Table 7.3).

## Extrapolations
Energy inputs are based on "US and Canadian Labor-Energy Input Survey 2007" (Portland Cement Association, 2008). It is assumed that Québec cement plants are equivalent to North American cement plants in terms of energy consumption.
Calculations are based on two important technical parameters for the Canadian Cement Plants, by Athena Institute:
1. an equivalent finished cement ton is composed of 92% clinker and 8% finished cement ;
2.Capacity utilisation rate of the cement plant is assumed to be 93.3%
Emissions to air are based on a weighted average of 3 Quebec cement plants.
Emissions to water: data from one (1) Quebec cement plant. It's the only Canadian cement plant that has reported "emissions to water" to the Canadian National Pollutant Release Inventory in 2007.

## Review by Emilia Moreno Ruiz 2015-09-24
broken formula fixed
