# steam generation system construction, solar tower power plant, 20 MW

Dataset: EcoSpold 2, unit process
Geography: ZA
Time period: 2010-01-01 to 2020-01-01
Technology level: current
Classification: ISIC rev.4 ecoinvent: 4220a: Construction of utility projects for electricity production, except for liquid fuels
Tags: Concentrated Solar Power; CSP
Scenario: Business-as-Usual
System model: Allocation at the point of substitution
Generated by: Karin Treyer
Published in: Telsnig, Thomas 2015
Database: ecoinvent
isCopyrightProtected: true
accessRestrictedTo: 1

## General comment
This activity represents the construction of various heat exchangers used in the steam generator to generate process steam in Upington, South Africa. The heat exchanger surfaces for the preheater, superheater, intermediate superheater and evaporator are calculated over their total area and the average pipe diameter.
In the final system, hot salt is pumped to the steam generating system when power is needed from the plant. These hot salts produce superheated steam for a conventional Rankine-cycle turbine generator system.
This dataset is entirely based on the detailed life cycle inventory as presented in the dissertation report by
Telsnig, Thomas. 2015. Standortabhängige Analyse und Bewertung solarthermischer Kraftwerke am Beispiel Südafrikas. Forschungsbericht. Band 123. ISSN 0938-1228. Institut für Energiewirtschaft und Rationelle Energieanwendung, Universität Stuttgart, Germany.

## Included activities start
This activity starts with the manufacturing of the heat exchangers and the steam generating system.

## Included activities end
The activity concludes with the decommissioning of the plant with the construction materials sent for recycling and disposal according to their treatment methods.

## Geography
The CSP plant represented in this dataset has been modelled specifically for South African conditions (see Telsnig 2015).

## Technology
Extended shaft turbine pump, 1 stage,stainless steel 11300gpm, 2725lbm/sec, 200ft total developed head 1250 bhp motor variable speed drive

## Reference product
- steam generation system, solar tower power plant, 20 MW: 1 unit; CPC 53262: Power plants; By-product classification allocatable product; pedigree (1,1,1,1,1)
  Reference product unit used fpr constructing a stea, generation system for a 20MW solar tower plant
  production volume 1 unit
    Assumption
  property price 298523 EUR2005
    Calculated based on inputs: The price of the product has been calculated as a sum of the values of the material and energy inputs for this product. This value is therefore a rough estimation. It may underestimate the real price since there are additional expenses when producing any product. These expences can include for example labour costs, treatment of waste materials and profit for the producer. Please consider carefully whether this level of data quality is acceptable for your application. No investment cost available for this component of a solar tower plant in Telsnig (2015). Telsnig, Thomas. 2015. Standortabhängige Analyse und Bewertung solarthermischer Kraftwerke am Beispiel Südafrikas. Forschungsbericht. Band 123. ISSN 0938-1228. Institut für Energiewirtschaft und Rationelle Energieanwendung, Universität Stuttgart, Germany.)
  property lifetime 30 year
    The economic lifetime of the plant is assumed to be 30 years.
  property true value 298523
    allocation property applied in "true value" allocation // value calculated from revenue

## By-products
- electricity, for reuse in municipal waste incineration only: 0 kWh; CPC 17100: Electrical energy; By-product classification allocatable product; pedigree (1,1,1,1,1)
  Net electricity generated from this waste and used in internal MSWI plant energy redistribution.
  Uncertainty: uncertainty is calculated from uncertainties in waste composition and uncertainties in energy efficiency and the uncertainty in internal energy demand
  production volume 1.47411 kWh
  property true value relation 3.6; name E_el_prod_MSWI_true_value_relation
    property to calculate "true value" from
  property exergy 3.6 MJ; name E_el_prod_MSWI_exergy
    This exergy property is based on the exergy content of the product.
  property price 0.1 EUR2005; name E_el_prod_MSWI_price_EUR2005
    Estimated to be the same price as in case of electricity, medium voltage.
  property true value 0.190915
    allocation property applied in "true value" allocation // value calculated from true value relation
- heat, for reuse in municipal waste incineration only: 0 MJ; CPC 17300: Steam and hot water; By-product classification allocatable product; pedigree (1,1,1,1,1)
  (same comment as for electricity, for reuse in municipal waste incineration only)
  production volume 10.949 MJ
  property price 0.0106 EUR2005; name E_th_prod_MSWI_price_EUR2005
    Average European district heat price from Ecoheatcool and Euroheat 2005-2006, Ecoheat Work package 1: The European heat market. Final report. 10.6 EUR/GJ i s the price of district heat. http://www.solarthermalworld.org/files/Ecoheatcool%20WP1%20Web.pdf?download
  property exergy 0.1842 MJ; name E_th_prod_MSWI_exergy
    This exergy property is based on the exergy content of the product.
  property true value relation 0.1842; name E_th_prod_MSWI_true_value_relation
    property to calculate "true value" from
  property true value 0.0725558
    (same comment as for electricity, for reuse in municipal waste incineration only)
- copper: 0 kg; source Rentz O. 1999; By-product classification allocatable product; CPC 41413: Refined copper and copper alloys, unwrought; master alloys of copper
  Literature value. Copper uses: Before end-use copper is manufactured into semi fabricated products, such as shapes and ingots (known as 'semis'). These manufacturing processes are subdivided into hot working, cold working and, if necessary, process annealing. Few of the semis are ready for use as such. They more typically travel to first-stage manufacturers, who make metal rods, wire, and casting, and then to component manufacturers who produce such things as motors, valves, and insulated cables The components in turn are incorporated by final-stage manufacturers into a variety of finished products - automobiles, commercial buildings, residential housing, and so forth. These uses account for about 79% of the world-wide consumption of copper.
  production volume 18.9313 kg
  properties: dry mass 1 kg, water in wet mass 0 kg, wet mass 1 kg, carbon content, non-fossil 0, water content 0, price 5.52 EUR2005, carbon content, fossil 0, carbon content 0, carbon allocation 0 kg, true value 104.501
- zinc concentrate: 0 kg; CPC 14290: Other non-ferrous metal ores and concentrates (other than uranium or thorium ores and concentrates); By-product classification allocatable product
  Calculated value from the knowledge of the properties of both products.
  production volume 1.50263e-8 kg
  property price 0.38 EUR2005; name ByP_price_EUR2005
    Temporary price data. Calculated as 90% of purchasers price based on: Zinc content in concentrate 53%. Concentrate price per kg Zn 86.5% of refined Zn price (13.5% treatment charges according to CHR Metals Limited 2005: Dynamic cost curves. http://www.minecost.com/dynamic.pdf). 2004 zinc price from USGS (2007) Mineral commodity summaries 2007. <http://minerals.usgs.gov/minerals/pubs/mcs/2007/mcs2007.pdf> [Accessed 25 May 2010]
  property zinc content 0.53; name zinc_C_zinc_concentrate
    Zinc content on a dry matter basis. Value taken from teh "zinc mine operation" /GLO dataset.
  property dry mass 1 kg; name DM_zinc_concentrate
  property carbon content 0
    carbon content on a dry matter basis (reserved; not for manual entry)
  property true value 5.70999e-9
    allocation property applied in "true value" allocation // value calculated from revenue
  properties: wet mass 1 kg, water content 0, carbon content, non-fossil 0, carbon content, fossil 0, water in wet mass 0 kg, carbon allocation 0 kg
- iron scrap, sorted, pressed: 0 kg; By-product classification Recyclable; CPC 39310: Slag, dross, scalings and other waste from the manufacture of iron or steel; pedigree (1,1,1,1,1)
  Iron scrap recovered from this waste.
  production volume 98.5166 kg
  property price 0.175 EUR2005
    Temporary price data. Calculated as 90% of purchasers price based on: 2005 import and export prices (total trades (USD) divided by total weight (kg) in biggest economies of the world: EU27, USA, Brasil, China, India, Japan and Russia) from UN Commodity Trade Statistics Database (http://data.un.org/Explorer.aspxDatabase [Accessed 2011.06.20]). Commodity: Waste or scrap, of cast iron
  property carbon content 0
    carbon content on a dry matter basis (reserved; not for manual entry)
  property true value 17.2404
    allocation property applied in "true value" allocation // value calculated from revenue
  properties: water content 0, water in wet mass 0 kg, carbon content, fossil 0, dry mass 1 kg, carbon content, non-fossil 0, wet mass 1 kg, carbon allocation 0 kg

## Inputs from technosphere
- waste paint: -24.9898 kg; = (paint)*-1; lognormal variance with pedigree 0.0137, pedigree (4,4,3,3,2)
  Inert materials in alkyd solvent 60% are disposed in landfill
  production volume 25 kg; = Ref('9172d861-da14-4eb9-a0f7-01434527edcd', 'ProductionVolume') * ((Ref('e9cc7c13-2bb8-44f2-bbb2-e35f19c90643')*-1) / Ref('9172d861-da14-4eb9-a0f7-01434527edcd'))
    Calculated from production volume of reference product using the relative outputs.
  properties: dry mass 1 kg, carbon content, fossil 0.65, wet mass 1 kg
- concrete, normal: 6.69726 m3; name concrete; lognormal variance with pedigree 0.0137, pedigree (4,4,3,3,2)
  Concrete used for embeding metals in steam generator heat exchangers, nitrate salt heaters
  properties: dry mass 2190 kg, wet mass 2380 kg, water content 0.086758
- drawing of pipe, steel: 24017.2 kg; lognormal variance with pedigree 0.0137, pedigree (4,4,3,3,2)
  Process done to draw pipes from steel.
- reinforcing steel: 198955 kg; name steel; lognormal variance with pedigree 0.0137, pedigree (4,4,3,3,2)
  Used for constructionof heat exchangers, piping
  properties: dry mass 1 kg, carbon content, fossil 0.004, wet mass 1 kg
- steel, chromium steel 18/8, hot rolled: 767.686 kg; name chromesteel; lognormal variance with pedigree 0.0137, pedigree (4,4,3,3,2)
  Material composition of boilers recirculation pumps etc
  properties: wet mass 1 kg, dry mass 1 kg, carbon content, fossil 0.0008
  note on carbon content, fossil: Stainless steel model is the grade 304 steel (18/8 stainless, 18% chromium 8% nickel; max. 0.08% C)
- steel, low-alloyed: 1090.55 kg; name lowsteel; lognormal variance with pedigree 0.0137, pedigree (4,4,3,3,2)
  Material composition of boilers recircopperlation pumps etc
  properties: carbon content, fossil 0.005, dry mass 1 kg, wet mass 1 kg
- copper: 79.9673 kg; lognormal variance with pedigree 0.0137, pedigree (4,4,3,3,2)
  Copper supplied for field wiring purposes
  properties: wet mass 1 kg, dry mass 1 kg
- waste concrete: -54991.5 kg; = ((concrete*2200)+expandedperilite)*-1; lognormal variance with pedigree 0.0137, pedigree (4,4,3,3,2)
  Disposal of concrete. The density is assumed to be 2200kg/m3.
  production volume 55014 kg; = Ref('9172d861-da14-4eb9-a0f7-01434527edcd', 'ProductionVolume') * ((Ref('01218a7f-b74d-4b3b-9947-e53fce40073e')*-1) / Ref('9172d861-da14-4eb9-a0f7-01434527edcd'))
    Calculated from production volume of reference product using the relative outputs.
  properties: water content 1, wet mass 1 kg, dry mass 0.5 kg
- tap water: 8645.47 kg; name water; lognormal variance with pedigree 0.0137, pedigree (4,4,3,3,2)
  Used in the manufacturing process of pumps
  properties: dry mass 0.000337476 kg, water content 2962.17, wet mass 1 kg, carbon content, fossil 0.00178991
  note on carbon content, fossil: Bicarbonate content is 2.93 mol/m3. CO2 content is 0.1 mol/m3 (ecoinvent v2.2 report 8, Tab 93.1).
- iron-nickel-chromium alloy: 8850.38 kg; name alloy; lognormal variance with pedigree 0.0137, pedigree (4,4,3,3,2)
  Cables and piping of hot and cold water pumps
  properties: wet mass 1 kg, dry mass 1 kg
- expanded perlite: 40257.5 kg; name expandedperilite; lognormal variance with pedigree 0.0137, pedigree (4,4,3,3,2)
  Insulation
  properties: wet mass 1 kg, dry mass 1 kg
- excavation, hydraulic digger: 4.99796 m3; lognormal variance with pedigree 0.0137, pedigree (4,4,3,3,2)
  Excavation and backfilling. The digger is a removable unit. All the soil dislocated for initial construction is put back. Hence no end of life calculation is needed.
- silicone product: 5.99755 kg; name silicone_product; lognormal variance with pedigree 0.0137, pedigree (4,4,3,3,2)
  Used in hot and cold salt pumps to prevent leakage
  properties: carbon content, fossil 0.324324, wet mass 1 kg, dry mass 1 kg
- alkyd paint, white, without solvent, in 60% solution state: 24.9898 kg; name paint; lognormal variance with pedigree 0.0137, pedigree (4,4,3,3,2)
  Painting the structural steel to prevent rust
  properties: carbon content, non-fossil 0.199629, carbon content, fossil 0.140367, dry mass 1 kg, wet mass 1 kg
  note on carbon content, non-fossil: C content was calculated as an addition of C content in the raw materials.
- scrap copper: -79.9673 kg; = (copper)*-1; lognormal variance with pedigree 0.0137, pedigree (4,4,3,3,2)
  Scrap copper disposal
  production volume 80 kg; = Ref('9172d861-da14-4eb9-a0f7-01434527edcd', 'ProductionVolume') * ((Ref('989b2f37-5146-436d-b1f1-e4714d86fe12')*-1) / Ref('9172d861-da14-4eb9-a0f7-01434527edcd'))
    Calculated from production volume of reference product using the relative outputs.
  properties: dry mass 1 kg, wet mass 1 kg
- wastewater, unpolluted: -8.64547 m3; = (water/1000)*-1; lognormal variance with pedigree 0.0137, pedigree (4,4,3,3,2)
  The amount of tap water input stems from the water consumption reported in the EPDs of the modelled pumps (Sulzer EPDs). It is stated in the EPDs that the water is used for testing purposes. Therefore, it is assumed to be discharged to the sewer system without pollution. Sulzer EPDs: https://www.sulzer.com/en/shared/about-us/2017/08/10/13/22/environmental-product-declarations (accessed May 2019)
  production volume 8.649 m3; = Ref('9172d861-da14-4eb9-a0f7-01434527edcd', 'ProductionVolume') * ((Ref('0e861b8a-dc6d-4e88-bafe-3c8b6ad4e5f5')*-1) / Ref('9172d861-da14-4eb9-a0f7-01434527edcd'))
    Calculated from production volume of reference product using the relative outputs.
  properties: water content 2962.17, dry mass 0.337476 kg, carbon content, non-fossil 0.00178991, carbon content, fossil 0.00178991, wet mass 1000 kg
  note on carbon content, fossil: Assumed to be like in tap water. Bicarbonate content is 2.93 mol/m3. CO2 content is 0.1 mol/m3 (ecoinvent v2.2 report 8, Tab 93.1).
- transformer, high voltage use: 52.9783 kg; lognormal variance with pedigree 0.0137, pedigree (4,4,3,3,2)
  Transformer setup including substations and primary power distribution sources.
  properties: wet mass 1 kg, dry mass 1 kg, carbon content, fossil 0.262798
- cast iron: 1920.22 kg; name castiron; lognormal variance with pedigree 0.0137, pedigree (4,4,3,3,2)
  Used for constructionof hot and cold salt pumps, motors, boilers and valves
  properties: wet mass 1 kg, dry mass 1 kg, carbon content, fossil 0.04
  note on carbon content, fossil: Cast iron is made by remelting pig iron in small furnaces (e.g. cupola furnaces or electric arc furnaces) and poured into moulds to make castings. It usually contains 2% to 6% carbon (ecoinvent v2.2 report 10_partII). An average content of 4% was considered
- hazardous waste, for incineration: -5.99755 kg; = (silicone_product)*-1; lognormal variance with pedigree 0.0137, pedigree (4,4,3,3,2)
  Disposal of the oil used for the initial filling and during operation of the pumps and transformers. Calculated based on the environmental product declarations for pumps as provided by Sulzer and for transformers as provided by ABB.
  Sulzer EPDs: https://www.sulzer.com/en/shared/about-us/2017/08/10/13/22/environmental-product-declarations (accessed May 2019)
  ABB library: https://library.abb.com/en/ (accessed May 2019)
  production volume 6 kg; = Ref('9172d861-da14-4eb9-a0f7-01434527edcd', 'ProductionVolume') * ((Ref('f93a1b27-d42f-4fc7-9b05-5446aa31e572')*-1) / Ref('9172d861-da14-4eb9-a0f7-01434527edcd'))
    Calculated from production volume of reference product using the relative outputs.
  properties: carbon content, fossil 0.554667, dry mass 0.75 kg, wet mass 1 kg, water content 0.333333
  note on carbon content, fossil: Tab A.6, ecoinvent v2.2 report 13_I. C content has been calculated after data in the tables, and then referred to 1 kg DM
- waste reinforcement steel: -137529 kg; = ((steel+castiron+lowsteel+chromesteel+alloy)*0.65)*-1
  All steel types are assumed to be treated as reinforcing steel due to lack of other appropriate datasets in ecoinvent. For the time period 2003-2012, average steel recycling rate in South Africa amounted to 35% fo the total steel mass according to Telsnig 2015. The remaining steel is assumed to be sent to final disposal.
  production volume 137586 kg; = Ref('9172d861-da14-4eb9-a0f7-01434527edcd', 'ProductionVolume') * ((Ref('24f082dc-98db-41e0-bebf-343d173c9ab2')*-1) / Ref('9172d861-da14-4eb9-a0f7-01434527edcd'))
    Calculated from production volume of reference product using the relative outputs.
  properties: dry mass 1 kg, wet mass 1 kg
- welding, arc, steel: 115.953 m; lognormal variance with pedigree 0.0137, pedigree (4,4,3,3,2)
  Process of arc welding the steel
- wire drawing, copper: 79.9673 kg; lognormal variance with pedigree 0.0137, pedigree (4,4,3,3,2)
  Process used to draw wires for field wiring, cables etc from available copper
- waste reinforcement steel: -74054.2 kg; = ((steel+castiron+lowsteel+chromesteel+alloy)*0.35)*-1
  (same comment as for waste reinforcement steel)
  production volume 74084.5 kg; = Ref('9172d861-da14-4eb9-a0f7-01434527edcd', 'ProductionVolume') * ((Ref('e1e2bce1-e019-46d9-bb19-3a2d1a7fcc99')*-1) / Ref('9172d861-da14-4eb9-a0f7-01434527edcd'))
    Calculated from production volume of reference product using the relative outputs.

## Sampling procedure
This dataset is entirely based on the detailed life cycle inventory as presented in the dissertation report by
Telsnig, Thomas. 2015. Standortabhängige Analyse und Bewertung solarthermischer Kraftwerke am Beispiel Südafrikas. Forschungsbericht. Band 123. ISSN 0938-1228. Institut für Energiewirtschaft und Rationelle Energieanwendung, Universität Stuttgart, Germany.

Further, data in Telsnig 2015 are not shown explicitely for the downscaled 20 MW solar tower power plant. This gap is filled in the ecoinvent report.

## Extrapolations
The original data modelling a 440 MW power plant have been scaled down with parameter specific linear and non-linear equations to represent a 20 MW plant design.

## Review by Christopher Oberschelp 2017-03-13
Very detailed, structured and well-documented datasets. Main exchanges have been checked and make sense.
