# electricity production, photovoltaic, 3kWp slanted-roof installation, single-Si, laminated, integrated

Dataset: EcoSpold 2, unit process
Geography: CH
Time period: 2005-01-01 to 2019-12-31
Technology level: current
Classification: EcoSpold01Categories: photovoltaic/power plants
Classification: ISIC rev.4 ecoinvent: 3510b: Electric power generation, photovoltaic
Synonyms: silicon; monocrystalline; single crystalline
Tags: ConvertedDataset; photovoltaic power
Scenario: Business-as-Usual
System model: Allocation at the point of substitution
Share of production covered: 100 %
Generated by: Niels Jungbluth
Published in: Jungbluth, N. 2007
Database: ecoinvent
isCopyrightProtected: true
accessRestrictedTo: 1

## General comment
Assumption for electricity production of photovoltaic plants with good performance. Average performance is lower while optimum performance would be higher. Total capacity in Switzerland for the year 2005 was 23.8 MWp. Dataset can be used for comparison of energy technologies in Switzerland, but not for assessment of average production patterns. Yield data must be corrected for the installations used in other countries.
[This dataset was already contained in the ecoinvent database version 2. It was not individually updated during the transfer to ecoinvent version 3. Life Cycle Impact Assessment results may still have changed, as they are affected by changes in the supply chain, i.e. in other datasets. This dataset was generated following the ecoinvent quality guidelines for version 2. It may have been subject to central changes described in the ecoinvent version 3 change report (http://www.ecoinvent.org/database/ecoinvent-version-3/reports-of-changes/), and the results of the central updates were reviewed extensively. The changes added e.g. consistent water flows and other information throughout the database. The documentation of this dataset can be found in the ecoinvent reports of version 2, which are still available via the ecoinvent website. The change report linked above covers all central changes that were made during the conversion process.]

## Included activities end
Infrastructure for 3kWp PV-plant. Water use for cleaning. Amount of solar energy transformed to electricity. Waste heat emission due to losses of electricity in the system.

## Geography
Use in CH.

## Technology
Electricity production with grid-connected photovoltaic power plants integrated in buildings slanted roof.

## Time period
Calculation for yield based on production with a state of the art plant.

## Parameters
- fraction, process water, to air: 0.15 dimensionless; name fraction_PW_to_air; lognormal variance with pedigree 0.092025, pedigree (4,4,3,2,4)
  Literature value. In case when no industry/process specific data are available, default evaporation fraction value is used. This value is 15% and is based on literature (Statistics Canada, 2007 & Shaffer, K.H., 2008, Consumptive water use in the Great Lakes Basin, USGS & Shiklomanov, 2003, World Water Resources at the Beginning of the 21st Century) and has been approved by an expert.
- fraction, tap water, to air: 0.15; name fraction_TW_to_air; = fraction_PW_to_air; lognormal variance with pedigree 0.092025, pedigree (4,4,3,2,4)
  Calculated value. See comment in the other parametres present in this dataset. Tap water is considered to be always used as process water, thus process water fractions to air are applied to all tap water input flows to calculate the amount of water consumed in the processes.

## Reference product
- electricity, low voltage: 1 kWh; CPC 17100: Electrical energy; By-product classification allocatable product
  EcoSpold01Location=CH
  production volume 2.05105e6 kWh; name apv_el
    Literature value/statistics. Net production of grid-connected electricity in 2012 with that specific photovoltaic installation type. (Net = gross production minus direct electricity use needed for electricity production at the power plant).
    The total production volume of 127 GWh (Stolz&Frischknecht 2015) has been distributed to the different photovoltaic installation types with the shares for Switzerland which can be found in Jungbluth et al 2012.
    Stolz, P., Frischnkecht, R. 2015. Umweltbilanz Strommix Schweiz 2011. Issued by treeze Ltd. for the Federal Office for the Environment, Switzerland
    Jungbluth N., Stucki M, Flury K, Frischknecht R., and S. Buesser (2012) Photovoltaics. In Dones, R. (Ed.) et al., Sachbilanzen von Energiesystemen: Grundlagen für den ökologischen Vergleich von Energiesystemen und den Einbezug von Energiesystemen in Ökobilanzen für die Schweiz. ecoinvent report No. 6-XII, ESU-services Ltd, Uster, CH, 2012.
  property price 0.107 EUR2005
    Temporary price data. Calculated as 90% of purchasers price based on: IEA Key world energy statistics 2004 (www.iea.org/textbase/nppdf/free/2004/keyworld2004.pdf)
  property true value 0.107
    allocation property applied in "true value" allocation // value calculated from revenue

## By-products
- electricity, for reuse in municipal waste incineration only: 0 kWh; CPC 17100: Electrical energy; By-product classification allocatable product; pedigree (1,1,1,1,1)
  Net electricity generated from this waste and used in internal MSWI plant energy redistribution.
  Uncertainty: uncertainty is calculated from uncertainties in waste composition and uncertainties in energy efficiency and the uncertainty in internal energy demand
  production volume 0.257234 kWh
  property exergy 3.6 MJ; name E_el_prod_MSWI_exergy
    This exergy property is based on the exergy content of the product.
  property true value relation 3.6; name E_el_prod_MSWI_true_value_relation
    property to calculate "true value" from
  property price 0.1 EUR2005; name E_el_prod_MSWI_price_EUR2005
    Estimated to be the same price as in case of electricity, medium voltage.
  property true value 1.61138e-8
    allocation property applied in "true value" allocation // value calculated from true value relation
- heat, for reuse in municipal waste incineration only: 0 MJ; CPC 17300: Steam and hot water; By-product classification allocatable product; pedigree (1,1,1,1,1)
  Net useful heat generated from this waste and used in internal MSWI plant energy redistribution.
  Uncertainty: uncertainty is calculated from uncertainties in waste composition and uncertainties in energy efficiency and the uncertainty in internal energy demand
  production volume 1.81989 MJ
  property true value relation 0.1842; name E_th_prod_MSWI_true_value_relation
    property to calculate "true value" from
  property exergy 0.1842 MJ; name E_th_prod_MSWI_exergy
    This exergy property is based on the exergy content of the product.
  property price 0.0106 EUR2005; name E_th_prod_MSWI_price_EUR2005
    Average European district heat price from Ecoheatcool and Euroheat 2005-2006, Ecoheat Work package 1: The European heat market. Final report. 10.6 EUR/GJ i s the price of district heat. http://www.solarthermalworld.org/files/Ecoheatcool%20WP1%20Web.pdf?download
  property true value 5.83314e-9
    (same comment as for electricity, for reuse in municipal waste incineration only)
- zinc concentrate: 0 kg; CPC 14290: Other non-ferrous metal ores and concentrates (other than uranium or thorium ores and concentrates); By-product classification allocatable product
  Calculated value from the knowledge of the properties of both products.
  production volume 4.55305e-5 kg
  property price 0.38 EUR2005; name ByP_price_EUR2005
    Temporary price data. Calculated as 90% of purchasers price based on: Zinc content in concentrate 53%. Concentrate price per kg Zn 86.5% of refined Zn price (13.5% treatment charges according to CHR Metals Limited 2005: Dynamic cost curves. http://www.minecost.com/dynamic.pdf). 2004 zinc price from USGS (2007) Mineral commodity summaries 2007. <http://minerals.usgs.gov/minerals/pubs/mcs/2007/mcs2007.pdf> [Accessed 25 May 2010]
  property zinc content 0.53; name zinc_C_zinc_concentrate
    Zinc content on a dry matter basis. Value taken from teh "zinc mine operation" /GLO dataset.
  property dry mass 1 kg; name DM_zinc_concentrate
  property carbon content 0
    carbon content on a dry matter basis (reserved; not for manual entry)
  property true value 8.43547e-12
    allocation property applied in "true value" allocation // value calculated from revenue
  properties: wet mass 1 kg, water content 0, carbon content, non-fossil 0, carbon content, fossil 0, water in wet mass 0 kg, carbon allocation 0 kg

## Inputs from technosphere
- photovoltaic slanted-roof installation, 3kWp, single-Si, laminated, integrated, on roof: 1.2051e-5 unit; lognormal variance with pedigree 0.0521, pedigree (3,2,5,1,1)
  EcoSpold01Location=CH
  Yield at good installation, average is lower while optimum would be higher, basic uncertainty = 1.2
  Uncertainty: yield at good installation, average is lower while optimum would be higher, basic uncertainty = 1.2
- wastewater, from residence: -5.1648e-6 m3; name sewage; lognormal variance with pedigree 0.0407, pedigree (2,2,5,1,1)
  EcoSpold01Location=CH
  Estimation 20l/m2 panel
  Uncertainty: Estimation 20l/m2 panel
  production volume 10.5933 m3; = apv_el*sewage
    Calculated from the production volume of electricity, low voltage in proportion to the respective output amounts.
  property price 0 EUR2005; name sewage_price_EUR2005
  properties: water content 2962.17, wet mass 1000 kg, carbon content, non-fossil 0.199421, dry mass 0.337476 kg
  note on carbon content, non-fossil: 0.0673 kg TOC/m3 (Tab A.17, ecoinvent v2.2 report 13_I). TOC was considered as Total Carbon.
- tap water: 0.0051648 kg; name tap_water_input; lognormal variance with pedigree 0.0407, pedigree (2,2,5,1,1)
  Estimation 20l/m2 panel
  EcoSpold01Location=CH
  Uncertainty: Estimation 20l/m2 panel
  properties: wet mass 1 kg, carbon content, fossil 0.00178991, dry mass 0.000337476 kg, water content 2962.17
  note on carbon content, fossil: Bicarbonate content is 2.93 mol/m3. CO2 content is 0.1 mol/m3 (ecoinvent v2.2 report 8, Tab 93.1).

## Inputs from nature
- Energy, solar, converted [natural resource, in air]: 3.8503 MJ; lognormal variance with pedigree 0.0418844, pedigree (2,2,5,1,1)
  Energy loss in the system is included.

## Emissions to nature
- Water [air, unspecified]: 7.7472e-7 m3; name water_to_air_unspecified; = (tap_water_input/1000*fraction_TW_to_air); lognormal variance with pedigree 0.0807, pedigree (2,2,5,1,1)
  Calculated value based on literature values and expert opinion. See comments in the parametres' comment field.
  property fraction, origin: fresh water 1; name fraction_origin_fresh_water
  property fraction, origin: salt water 0; name fraction_origin_salt_water
  property fraction, origin: unspecified 0; name fraction_origin_unspecified

## Sampling procedure
Statistical data for CH.

## Review by Bo Weidema 2012-09-28
production volumes revised

## Review by Roberto Dones 2007-08-23
Passed.
none

## Review by Bo Weidema 2013-01-29
technology level set to "current" to avoid PV being the only input to the low voltage market
