# electricity, high voltage, import from BR-Northern grid

Dataset: EcoSpold 2, unit process
Geography: BR-South-eastern grid
Time period: 2014-01-01 to 2019-12-31
Technology level: current
Classification: ISIC rev.4 ecoinvent: 3510:Electric power generation, transmission and distribution
Scenario: Business-as-Usual
System model: Allocation at the point of substitution
Generated by: Florentine Brunner
Published in: Suppen, N 2017
Database: ecoinvent
isCopyrightProtected: true
accessRestrictedTo: 1

## General comment
This dataset represents the amount of imported electricity from the Brazilian Southern electricity grid to the Brazilian South-eastern electricity grid. The import value is valid for 2014. and includes all electricity imports, independently whether used within the importing country, or re-exported. For a discussion of different ways of modeling electricity trade in LCI, please refer to Itten et al. 2014.

Itten R., Frischknecht R. and Stucki M. (2014) Life Cycle Inventories of Electricity Mixes and Grid. Version 1.3 Report issued on behalf of Paul Scherrer Institut (PSI). treeze Ltd., Uster, Switzerland, retrieved from: www.lc-inventories.ch

## Included activities start
This activity represents the point of 'handing over' the electricity from one electricity grid to the other at the border.

## Included activities end
This dataset doesn't include any electricity losses or transmission infrastructure as these are accounted for in the market datasets.

## Time period
The production volume is valid for the year 2014

## Reference product
- electricity, high voltage: 1 kWh; CPC 17100: Electrical energy; By-product classification allocatable product
  production volume 3.25e10 kWh
    Production volume valid for 2014. Calculated as follows: the amount of electricity imported by each of the two net-importing Brazilian grids (South-eastern and North-eastern) is reported by MME, 2016. This amount was divided over the supplying Brazilian grids according to the share of installed transmission capacity between grids (retrieved from Gils et al., 2017).
    MME (2016). Matrizes Elétricas Estaduais: Ano Referência 2015. Edição de 23 de novembro de 2016. Ministério De Minas E Energia - MME. Secretaria De Planejamento E Desenvolvimento Energético. Núcleo De Estudos Estratégicos De Energia. Available in: <http://www.mme.gov.br/documents/10584/3580498/03+-+Matrizes+El%C3%A9tricas+Estaduais+2016+-+ano+ref.+2015+%28PDF%29/ddfaad8c-a436-4aa8-b619-f95dd2cf689c?version=1.0> Access at 03-2018
    Gils, H. C., Simon, S., Soria, R., 2017: 100% Renewable Energy Supply for Brazil-The Role of Sector Coupling and Regional Development. energies. Accessible online at http://www.mdpi.com/1996-1073/10/11/1859/pdf, 26.04.2018
  property price 0.0977 EUR2005
    Temporary price data. Calculated as 90% of purchasers price based on: 94% of the average price (to account for a 6% loss in transformation and transmission) for electricity for industrial consumersin 2005 (excluded taxes). From IEA.

## Inputs from technosphere
- electricity, high voltage: 1 kWh; undefined min 0.71, max 0.71, standardDeviation95 0, pedigree (1,1,3,1,1)
  activityLink added to better reflect the reality of the supply chain

## Sampling procedure
Literature data: The total amount of electricity imported to the BR South-eastern grid in 2014 was found in literaure. The split of this amount between the supplying grids was done based on the share of the installed transmission capacities between the grids.

## Extrapolations
This dataset has been extrapolated from year 2014 to the year of the calculation (2019). The uncertainty has been adjusted accordingly.

## Review by Karin Treyer 2018-04-27
These datasets model the electricity exchanges between the Brazilean grid regions. They are not based on certificates of origin, but on total electricity flows between the grids. Transmission grid capacities were used for extrapolation of total values given, see production volume comment. If more accurate measured data become accesible, the modelling should be changed.
