# onion production

Dataset: EcoSpold 2, unit process
Geography: NL
Time period: 2009-01-01 to 2019-12-31
Technology level: current
Classification: ISIC rev.4 ecoinvent: 0113:Growing of vegetables and melons, roots and tubers
Tags: WFLDB
Scenario: Business-as-Usual
System model: Allocation at the point of substitution
Generated by: Tuija Waldvogel
Published in: Nemecek T. 2015
Database: ecoinvent
isCopyrightProtected: true
accessRestrictedTo: 1

## General comment
This dataset represents the production of 1 kg of onions The average yield from 2009 - 2012 is 55 t/ha. The data are representative for onion production in the Netherlands used for the export market. Mineral NPK fertiliser input is 100-120-19 kg/ha. No organic fertilisers are applied. Total active ingredients (a.i.) applied as pesticides amount to 14.85 kg a.i./ha.
The dataset was modelled within the project 'World Food LCA database (WFLDB)'. The aim of this project was to provide inventories of a broad variety of agricultural products and processes and to cover for each product at least 50% of the global export market. The export share of onions produced in the Netherlands amounts to 20% of the global export (tonnage exported in 2010). The production system regarded in this dataset aimed at representing onions produced in the Netherlands for the export market.
PEF-Quality: data quality rating (DQR) = 2.2 (i.e. good quality). This dataset refers to an average situation; for specific situations exchanges might differ substantially due to site specific parameters

## Included activities start
This activity starts with the nursery producing seedlings, i.e. seedlings from roots.

## Included activities end
This activity ends with the harvest of onions at farm gate. The dataset includes total diesel combusted in agricultural machinery, corresponding infrastructure, fuel use and sheds. Further, direct field emissions and land use change are included. Heavy metal uptake by the crop is considered. The inputs of seeds, fertilisers and pesticides as well as packaging of fertilisers and pesticides are considered.

## Technology
Conventional production

## Parameters
- LUC_crop_specific: 1
  This parameter allows to switch between a 'crop specific' and a 'country specific' approach when calculating the LUC of a crop. By default, the chosen approach is 'crop specific', so the value of the parameter is 1. If you want to apply a 'country specific' approach, turn the parameter to 0.
- heavyMetalUptakeSwitch: 1

## Reference product
- onion: 1 kg; By-product classification allocatable product; CPC 01253: Onions
  Reference flow: Yield = 55000 kg/ha
  production volume 1.40242e9 kg
    Source: FAOSTAT. Average, 2009-2012
  property price 0.322 EUR2005
    Calculated from the trade statistics for the year 2005 published by the UN (COMTRADE database, accessed 20151105) as an average of 5 biggest importers of onion in the world; USA, UK, RU, DE and MY. Comtrade cathegory: 70310: Onions and shallots, fresh or chilled.
  property carbon content, non-fossil 0.331061
    calculation: C-content of components according to ecoinvent report No. 15a. Source of composition: Souci, S.W., Fachmann, W., Kraut, H. (Hg.: Bundesminsiterium fur Ernahrung, Landwirtschaft und Forsten, Bonn) 'Die Zusammensetzung der Lebensmittel - Nahrwerttabellen', medpharm Scientific Publishers Stuttgart, CRC Press; 2000.
  property carbon content 0.331061
    carbon content on a dry matter basis (reserved; not for manual entry)
  properties: carbon content, fossil 0, water content 0.886, dry mass 0.530223 kg, water in wet mass 0.469777 kg, wet mass 1 kg, carbon allocation 0.175536 kg

## Inputs from technosphere
- diesel, burned in agricultural machinery: 0.312545 MJ; source Barber A. 2004; lognormal variance with pedigree 0.118177, pedigree (2,1,3,1,1)
  Proxy: Similar crop and country used (onion NZ).
- ammonia, liquid: 8.102e-5 kg; source De Visser C.L.M. 1998; lognormal variance with pedigree 0.118177, pedigree (2,1,3,1,1)
  Calculated based on literature values or expert estimation: The total amount of nutrient (De Visser 1998) multiplied by the country-share of fertiliser type (IFA 2014). See supporting documentation 'WFLDB-Documentation.pdf' chapter 'Fertiliser application' for L3 and L4 data (https://ecoquery.ecoinvent.org/File/Reports).
  Corresponds to 4.46 kg/ha
  properties: dry mass 1 kg, wet mass 1 kg
- nitrogen fertiliser, as N: 0.00165034 kg; source De Visser C.L.M. 1998; lognormal variance with pedigree 0.118177, pedigree (2,1,3,1,1)
  Calculated based on literature values or expert estimation: The total amount of nutrient (De Visser 1998) multiplied by the country-share of fertiliser type (IFA 2014). See supporting documentation 'WFLDB-Documentation.pdf' chapter 'Fertiliser application' for L3 and L4 data (https://ecoquery.ecoinvent.org/File/Reports).
  Corresponds to 9.86 kg/ha
  properties: dry mass 1 kg, wet mass 1 kg
- dithiocarbamate-compound: 0.000228567 kg; lognormal variance with pedigree 0.00784984, pedigree (2,2,3,1,1)
  Proxy: Source for total amount of pesticides: extrapolated from MEXALCA. Active ingredient is calculated based on Ecoinvent dataset 'onion855 production GLO'. For calculations see supporting documentation 'WFLDB-Documentation.pdf' (https://ecoquery.ecoinvent.org/File/Reports).
  properties: wet mass 1 kg, dry mass 1 kg, carbon content, fossil 0.179339
- ammonium nitrate, as N: 2.502e-5 kg; source De Visser C.L.M. 1998; lognormal variance with pedigree 0.118177, pedigree (2,1,3,1,1)
  Calculated based on literature values or expert estimation: The total amount of nutrient (De Visser 1998) multiplied by the country-share of fertiliser type (IFA 2014). See supporting documentation 'WFLDB-Documentation.pdf' chapter 'Fertiliser application' for L3 and L4 data (https://ecoquery.ecoinvent.org/File/Reports).
  Corresponds to 1.38 kg/ha
  properties: dry mass 1 kg, wet mass 1 kg
- phosphate fertiliser, as P2O5: 0.00218182 kg; lognormal variance with pedigree 0.118177, pedigree (2,1,3,1,1)
  35e2b8a3-031000-4890-93ef-b6aa68baf111; Calculated based on literature values or expert estimation: The total amount of nutrient (Acs et al. 2007) multiplied by the country-share of fertiliser type (IFA 2014). See supporting documentation 'WFLDB-Documentation.pdf' chapter 'Fertiliser application' for L3 and L4 data (https://ecoquery.ecoinvent.org/File/Reports).
  Corresponds to 42.5 kg/ha
  properties: wet mass 1 kg, dry mass 1 kg
- pyrethroid-compound: 6.27513e-7 kg; lognormal variance with pedigree 0.00784984, pedigree (2,2,3,1,1)
  (same comment as for dithiocarbamate-compound)
  properties: wet mass 1 kg, dry mass 1 kg, carbon content, fossil 0.623
- ammonium sulfate, as N: 2.91909e-5 kg; source De Visser C.L.M. 1998; lognormal variance with pedigree 0.118177, pedigree (2,1,3,1,1)
  Calculated based on literature values or expert estimation: The total amount of nutrient (De Visser 1998) multiplied by the country-share of fertiliser type (IFA 2014). See supporting documentation 'WFLDB-Documentation.pdf' chapter 'Fertiliser application' for L3 and L4 data (https://ecoquery.ecoinvent.org/File/Reports).
  Corresponds to 1.61 kg/ha
  properties: wet mass 1 kg, dry mass 1 kg
- dinitroaniline-compound: 2.41117e-5 kg; lognormal variance with pedigree 0.00784984, pedigree (2,2,3,1,1)
  (same comment as for dithiocarbamate-compound)
  properties: carbon content, fossil 0.55516, wet mass 1 kg, dry mass 1 kg
- packaging, for pesticides: 0.000539927 kg; lognormal variance with pedigree 0.0532, pedigree (4,3,3,5,4)
  Total amount of active substance/s of pesticides needed for the production of onion is calculated to be circa 2.70E-04 kg. Pesticide/s used in this dataset is/are: 'cyclic N-compound', 'dinitroaniline-compound', 'dithiocarbamate-compound', 'organophosphorus-compound, unspecified', 'pyrethroid-compound'. The total amount of active substance/s is doubled in order to account for the packaging of the dilluted product of pesticide/s that is/are applied. Therefore, 5.40E-04 kg of packaging for pesticides is justified with this exchange.
  properties: wet mass 1 kg, carbon content, fossil 0.85714, dry mass 1 kg, price 0.0642 EUR2005
- urea, as N: 4.69145e-5 kg; source De Visser C.L.M. 1998; lognormal variance with pedigree 0.118177, pedigree (2,1,3,1,1)
  Calculated based on literature values or expert estimation: The total amount of nutrient (De Visser 1998) multiplied by the country-share of fertiliser type (IFA 2014). See supporting documentation 'WFLDB-Documentation.pdf' chapter 'Fertiliser application' for L3 and L4 data (https://ecoquery.ecoinvent.org/File/Reports).
  Corresponds to 2.58 kg/ha
  properties: wet mass 1 kg, carbon content, fossil 0.2, dry mass 1 kg
- organophosphorus-compound, unspecified: 9.50777e-6 kg; lognormal variance with pedigree 0.00784984, pedigree (2,2,3,1,1)
  (same comment as for dithiocarbamate-compound)
  properties: dry mass 1 kg, carbon content, fossil 0.260898, wet mass 1 kg
- potassium chloride, as K2O: 0.000170236 kg; lognormal variance with pedigree 0.118177, pedigree (2,1,3,1,1)
  Calculated based on literature values: The nutrient content of the crop multiplied by the country-share of the fertiliser type (IFA 2014). See supporting documentation 'WFLDB-Documentation.pdf' chapter 'Fertiliser application' for L1 data and appendix for the source of nutrient content (https://ecoquery.ecoinvent.org/File/Reports).
  Corresponds to 9.36 kg/ha
  properties: wet mass 1 kg, dry mass 1 kg
- cyclic N-compound: 7.14984e-6 kg; lognormal variance with pedigree 0.00784984, pedigree (2,2,3,1,1)
  (same comment as for dithiocarbamate-compound)
  properties: carbon content, fossil 0.641962, wet mass 1 kg, dry mass 1 kg
- packaging, for fertilisers: 0.00871987 kg; lognormal variance with pedigree 0.0532, pedigree (4,3,3,5,4)
  Total amount of active substance/s of fertilisers needed for the production of 'onion' is calculated to be circa 4.36E-03 kg. Fertiliser/s used in this dataset is/are: 'ammonia, liquid', 'ammonium nitrate, as N', 'ammonium sulfate, as N', 'nitrogen fertiliser, as N', 'phosphate fertiliser, as P2O5', 'potassium chloride, as K2O', 'potassium fertiliser, as K2O', 'potassium sulfate, as K2O', 'urea, as N'. The total amount of active substance/s is doubled in order to account for the packaging of the dilluted product of fertiliser/s that is/are applied. Therefore, 8.72E-03 kg of packaging for fertilisers is justified with this exchange.
  properties: dry mass 1 kg, carbon content, fossil 0.825301, price 0.0642 EUR2005, wet mass 1 kg
  note on carbon content, fossil: Considering a chemical formula (C2H4)n for polyethylene, carbon content-fossil is calculated to be 0.856286 kg of Carbon per kg of dry mass.
- potassium fertiliser, as K2O: 0.000134125 kg; lognormal variance with pedigree 0.118177, pedigree (2,1,3,1,1)
  Calculated based on literature values: The nutrient content of the crop multiplied by the country-share of the fertiliser type (IFA 2014). See supporting documentation 'WFLDB-Documentation.pdf' chapter 'Fertiliser application' for L1 data and appendix for the source of nutrient content (https://ecoquery.ecoinvent.org/File/Reports).
  Corresponds to 7.38 kg/ha
  properties: dry mass 1 kg, wet mass 1 kg
- land use change, annual crop: 1.55127e-5 ha; = 1.55127272727e-05*LUC_crop_specific+0.0*(1-LUC_crop_specific)
  Calculated value. Land use change (LUC) combines land transformation areas calculated with the adapted 'Direct Land Use Change Assessment Tool' version 2014 developed by Blonk Consultants and the carbon losses from soil organic carbon (SOC) and vegetation (VEG) as calculated in ecoinvent v3. See 'WFLDB-Guidelines.pdf', available at https://ecoquery.ecoinvent.org/File/Reports.
- onion seedling, for planting: 20.5455 unit; source De Visser C.L.M. 1998; lognormal variance with pedigree 0.118177, pedigree (2,1,3,1,1)
  Literature value or expert estimation (De Visser 1998). Planting density: 1'130'000 seedlings/ha.
  properties: dry mass 0.578035 kg, wet mass 1 kg, water content 0.73, carbon content, non-fossil 0.439481
  note on carbon content, non-fossil: calculation: C-content of components according to ecoinvent report No. 15a. Source of composition: https://ndb.nal.usda.gov/ndb/search/. Unspecific seedling used as proxy.
- potassium sulfate, as K2O: 4.12691e-5 kg; lognormal variance with pedigree 0.118177, pedigree (2,1,3,1,1)
  Calculated based on literature values: The nutrient content of the crop multiplied by the country-share of the fertiliser type (IFA 2014). See supporting documentation 'WFLDB-Documentation.pdf' chapter 'Fertiliser application' for L1 data and appendix for the source of nutrient content (https://ecoquery.ecoinvent.org/File/Reports).
  Corresponds to 2.27 kg/ha
  properties: dry mass 1 kg, wet mass 1 kg
- irrigation: 0.0306772 m3; lognormal variance with pedigree 0.118177, pedigree (2,1,3,1,1)
  Calculated value: The total amount of water used for irrigation (calculated from evapotranspiration, Pfister et al. 2011) multiplied by the country-share of irrigation technique (WFLDB-Guidelines.pdf, Appendix 6.1). See supporting documentation 'WFLDB-Documentation.pdf' chapter 'Water use for irrigation' for L2 data (https://ecoquery.ecoinvent.org/File/Reports).
  properties: wet mass 1000 kg, dry mass 0.11 kg, water content 9089.91

## Inputs from nature
- Occupation, annual crop [natural resource, land]: 0.181818 m2*year; lognormal variance with pedigree 0.0140616, pedigree (2,1,3,1,1)
  Related to the duration from harvest date of previous crop to harvest date of main crop: 365 days.
- Transformation, to arable land, unspecified use [natural resource, land]: 0.181818 m2; lognormal variance with pedigree 0.0382144, pedigree (2,1,3,1,1)
  10000 m2 divided by the life time of the crop.
- Transformation, from arable land, unspecified use [natural resource, land]: 0.181818 m2; lognormal variance with pedigree 0.0382144, pedigree (2,1,3,1,1)
  10000 m2 divided by the life time of the crop.
- Carbon dioxide, in air [natural resource, in air]: 0.177389 kg; lognormal variance with pedigree 0.00784984, pedigree (2,2,3,1,1)
  CO2 uptake by biomass
- Energy, gross calorific value, in biomass [natural resource, biotic]: 2.09527 MJ; lognormal variance with pedigree 0.00784984, pedigree (2,2,3,1,1)
  Gross energy content is related to MJ/kg dry matter of product. Source: ecoinvent data.

## Emissions to nature
- Lead [soil, agricultural]: 1.32677e-9 kg; = 6.29745454545e-08 + ( - 6.164778e-08)*heavyMetalUptakeSwitch; source Freiermuth R.  2006
  Comment on mathematicalRelation:
  6.29745454545e-08 from Calculated value - Freiermuth (2006). See 'WFLDB-Guidelines.pdf', available at https://ecoquery.ecoinvent.org/File/Reports.
  -6.164778e-08 from Crop, default, heavy metals uptake model
  Heavy metal uptake can be excluded by setting the parameter heavyMetalUptakeSwitch to zero.
- Mercury [soil, agricultural]: -3.4806e-9 kg; = 1.14278181818e-09 + ( - 4.623384e-09)*heavyMetalUptakeSwitch; source Freiermuth R.  2006
  Comment on mathematicalRelation:
  1.14278181818e-09 from Calculated value - Freiermuth (2006). See 'WFLDB-Guidelines.pdf', available at https://ecoquery.ecoinvent.org/File/Reports.
  -4.623384e-09 from Crop, default, heavy metals uptake model
  Heavy metal uptake can be excluded by setting the parameter heavyMetalUptakeSwitch to zero.
- Phosphate [water, ground-]: 3.90036e-6 kg; source Prasuhn V.  2006; lognormal variance with pedigree 0.169866, pedigree (2,2,3,1,1)
  Calculated value - Prasuhn (2006). See 'WFLDB-Guidelines.pdf', available at https://ecoquery.ecoinvent.org/File/Reports.
- Nickel [soil, agricultural]: -5.15499e-8 kg; = 6.75345454545e-08 + ( - 1.190844e-07)*heavyMetalUptakeSwitch; source Freiermuth R.  2006
  Comment on mathematicalRelation:
  6.75345454545e-08 from Calculated value - Freiermuth (2006). See 'WFLDB-Guidelines.pdf', available at https://ecoquery.ecoinvent.org/File/Reports.
  -1.190844e-07 from Crop, default, heavy metals uptake model
  Heavy metal uptake can be excluded by setting the parameter heavyMetalUptakeSwitch to zero.
- Zinc [soil, agricultural]: -2.29891e-6 kg; = 1.35170909091e-06 + ( - 3.650622e-06)*heavyMetalUptakeSwitch; source Freiermuth R.  2006
  Comment on mathematicalRelation:
  1.35170909091e-06 from Calculated value - Freiermuth (2006). See 'WFLDB-Guidelines.pdf', available at https://ecoquery.ecoinvent.org/File/Reports.
  Heavy metal uptake can be excluded by setting the parameter heavyMetalUptakeSwitch to zero.
- Zinc, ion [water, surface water]: 3.21018e-7 kg; source Freiermuth R.  2006; lognormal variance with pedigree 0.350938, pedigree (2,2,3,1,1)
  Calculated value - Freiermuth (2006). See 'WFLDB-Guidelines.pdf', available at https://ecoquery.ecoinvent.org/File/Reports.
- Diazinon [soil, agricultural]: 8.45486e-6 kg; lognormal variance with pedigree 0.0387216, pedigree (2,2,3,1,1)
  Calculated value - 100% emission in soil. See 'WFLDB-Guidelines.pdf', available at https://ecoquery.ecoinvent.org/File/Reports. Diazinon is not registered in this country, but used as a proxy
- Chromium, ion [water, surface water]: 2.71436e-7 kg; source Freiermuth R.  2006; lognormal variance with pedigree 0.350938, pedigree (2,2,3,1,1)
  (same comment as for Zinc, ion)
- Pendimethalin [soil, agricultural]: 2.14415e-5 kg; lognormal variance with pedigree 0.0387216, pedigree (2,2,3,1,1)
  Calculated value - 100% emission in soil. See 'WFLDB-Guidelines.pdf', available at https://ecoquery.ecoinvent.org/File/Reports.
- Nitrogen oxides [air, non-urban air or from high stacks]: 7.16891e-5 kg; source EEA 2013; lognormal variance with pedigree 0.118664, pedigree (2,2,3,1,1)
  Calculated value - EEA/EMEP (2013). See 'WFLDB-Guidelines.pdf', available at https://ecoquery.ecoinvent.org/File/Reports.
- Ioxynil [soil, agricultural]: 1.11604e-5 kg; lognormal variance with pedigree 0.0387216, pedigree (2,2,3,1,1)
  Calculated value - 100% emission in soil. See 'WFLDB-Guidelines.pdf', available at https://ecoquery.ecoinvent.org/File/Reports. Ioxynil is not registered in this country, but used as a proxy.
- Mancozeb [soil, agricultural]: 0.000203255 kg; lognormal variance with pedigree 0.0387216, pedigree (2,2,3,1,1)
  (same comment as for Pendimethalin)
- Cadmium, ion [water, ground-]: 8.26818e-10 kg; source Freiermuth R.  2006; lognormal variance with pedigree 0.350938, pedigree (2,2,3,1,1)
  (same comment as for Zinc, ion)
- Nickel, ion [water, surface water]: 1.96927e-7 kg; source Freiermuth R.  2006; lognormal variance with pedigree 0.350938, pedigree (2,2,3,1,1)
  (same comment as for Zinc, ion)
- Pyrimethanil [soil, agricultural]: 1.26485e-5 kg; lognormal variance with pedigree 0.0387216, pedigree (2,2,3,1,1)
  (same comment as for Pendimethalin)
- Dimethomorph [soil, agricultural]: 6.35805e-6 kg; lognormal variance with pedigree 0.0387216, pedigree (2,2,3,1,1)
  (same comment as for Pendimethalin)
- Lambda-cyhalothrin [soil, agricultural]: 5.58021e-7 kg; lognormal variance with pedigree 0.0387216, pedigree (2,2,3,1,1)
  (same comment as for Pendimethalin)
- Cymoxanil [soil, agricultural]: 6.0875e-6 kg; lognormal variance with pedigree 0.0387216, pedigree (2,2,3,1,1)
  (same comment as for Pendimethalin)
- Mercury [water, surface water]: 5.62964e-10 kg; source Freiermuth R.  2006; lognormal variance with pedigree 0.350938, pedigree (2,2,3,1,1)
  (same comment as for Zinc, ion)
- Carbon dioxide, fossil [air, non-urban air or from high stacks]: 7.36558e-5 kg; lognormal variance with pedigree 0.00784984, pedigree (2,2,3,1,1)
  Calculated value - CO2 emissions from urea and lime. See 'WFLDB-Guidelines.pdf', available at https://ecoquery.ecoinvent.org/File/Reports.
- Copper, ion [water, ground-]: 5.72436e-8 kg; source Freiermuth R.  2006; lognormal variance with pedigree 0.350938, pedigree (2,2,3,1,1)
  (same comment as for Zinc, ion)
- Ammonia [air, non-urban air or from high stacks]: 6.734e-5 kg; source EEA 2013; lognormal variance with pedigree 0.0387216, pedigree (2,2,3,1,1)
  Calculated value - EMEP/EEA (2013). See 'WFLDB-Guidelines.pdf', available at https://ecoquery.ecoinvent.org/File/Reports.
- Lead [water, ground-]: 3.00545e-9 kg; source Freiermuth R.  2006; lognormal variance with pedigree 0.350938, pedigree (2,2,3,1,1)
  (same comment as for Zinc, ion)
- Chromium, ion [water, ground-]: 3.68382e-7 kg; source Freiermuth R.  2006; lognormal variance with pedigree 0.350938, pedigree (2,2,3,1,1)
  (same comment as for Zinc, ion)
- Lead [water, surface water]: 6.33127e-8 kg; source Freiermuth R.  2006; lognormal variance with pedigree 0.350938, pedigree (2,2,3,1,1)
  (same comment as for Zinc, ion)
- Mercury [water, ground-]: 1.54671e-11 kg; source Freiermuth R.  2006; lognormal variance with pedigree 0.350938, pedigree (2,2,3,1,1)
  (same comment as for Zinc, ion)
- Nitrate [water, ground-]: 0.0064719 kg; source Richner W. 2014; lognormal variance with pedigree 0.169866, pedigree (2,2,3,1,1)
- Dinitrogen monoxide [air, non-urban air or from high stacks]: 5.4727e-5 kg; source IPCC 2006; lognormal variance with pedigree 0.118664, pedigree (2,2,3,1,1)
  Calculated value - IPCC (2006). See 'WFLDB-Guidelines.pdf', available at https://ecoquery.ecoinvent.org/File/Reports.
- Zinc, ion [water, ground-]: 3.29509e-7 kg; source Freiermuth R.  2006; lognormal variance with pedigree 0.350938, pedigree (2,2,3,1,1)
  (same comment as for Zinc, ion)
- Water [air, non-urban air or from high stacks]: 0.0228382 m3; lognormal variance with pedigree 0.118177, pedigree (2,1,3,1,1)
  Calculated value - Emission calculated from water balance. See 'WFLDB-Guidelines.pdf', available at https://ecoquery.ecoinvent.org/File/Reports.
- Water [water, surface water]: 0.00627182 m3; lognormal variance with pedigree 0.118177, pedigree (2,1,3,1,1)
  (same comment as for Water)
- Phosphate [water, surface water]: 1.2676e-5 kg; source Prasuhn V.  2006; lognormal variance with pedigree 0.169866, pedigree (2,2,3,1,1)
  (same comment as for Phosphate)
- Water [water, ground-]: 0.00156795 m3; lognormal variance with pedigree 0.118177, pedigree (2,1,3,1,1)
  (same comment as for Water)
- Copper, ion [water, surface water]: 2.07164e-7 kg; source Freiermuth R.  2006; lognormal variance with pedigree 0.350938, pedigree (2,2,3,1,1)
  (same comment as for Zinc, ion)
- Phosphorus [water, surface water]: 9.16855e-6 kg; source Prasuhn V.  2006; lognormal variance with pedigree 0.169866, pedigree (2,2,3,1,1)
  Calculated value - Prasuhn (2006) and SQCB-Erosion. See 'WFLDB-Guidelines.pdf', available at https://ecoquery.ecoinvent.org/File/Reports.
- Cadmium [soil, agricultural]: 1.12919e-7 kg; = 1.24494545455e-07 + ( - 1.157556e-08)*heavyMetalUptakeSwitch; source Freiermuth R.  2006
  Comment on mathematicalRelation:
  1.24494545455e-07 from Calculated value - Freiermuth (2006). See 'WFLDB-Guidelines.pdf', available at https://ecoquery.ecoinvent.org/File/Reports.
  -1.157556e-08 from Crop, default, heavy metals uptake model
  Heavy metal uptake can be excluded by setting the parameter heavyMetalUptakeSwitch to zero.
- Chromium [soil, agricultural]: 7.30306e-7 kg; = 7.92436363636e-07 + ( - 6.213e-08)*heavyMetalUptakeSwitch; source Freiermuth R.  2006
  Comment on mathematicalRelation:
  7.92436363636e-07 from Calculated value - Freiermuth (2006). See 'WFLDB-Guidelines.pdf', available at https://ecoquery.ecoinvent.org/File/Reports.
  -6.213e-08 from Crop, default, heavy metals uptake model
  Heavy metal uptake can be excluded by setting the parameter heavyMetalUptakeSwitch to zero.
- Copper [soil, agricultural]: -7.15668e-7 kg; = 3.97981818182e-08 + ( - 7.554666e-07)*heavyMetalUptakeSwitch; source Freiermuth R.  2006
  Comment on mathematicalRelation:
  -7.554666e-07 from Crop, default, heavy metals uptake model
  Heavy metal uptake can be excluded by setting the parameter heavyMetalUptakeSwitch to zero.
- Cadmium, ion [water, surface water]: 2.57236e-9 kg; source Freiermuth R.  2006; lognormal variance with pedigree 0.350938, pedigree (2,2,3,1,1)
  (same comment as for Zinc, ion)

## Sampling procedure
WFLDB Methodological Guidelines for the Life Cycle Inventory of Agricultural Products in the latest version, available at: (Report section: https://v30.ecoquery.ecoinvent.org/File/Reports). Data sources: Data were categorised from level 0 (L0) to level (L4) as follows: L0 = estimate, proxy; L1 = statistical data (e.g. FAOSTAT); L2 = L1 adapted to crop and country; L3 = literature data or L1 resp. L2 data approved by experts; medium detailing (i.e. kg of total N-fertiliser); L4 = L3 data of high detailing (i.e. portion N-fertiliser types).In this dataset data were obtained for yield: L3; Fertilisers: L3; Pesticides: L1; Machinery: L0; Irrigation: L2. For information regarding the calculation of individual exchanges see supporting documentation WFLDB-Documentation.pdf.

## Extrapolations
This dataset has been extrapolated from year 2012 to the year of the calculation (2019). The uncertainty has been adjusted accordingly.

## Review by Assumpció ANTON 2016-05-30
Be aware that the use of statistics in input calculations could provide some specific inputs not common for specific crops, this should be corrected if better information is available and better reflexed in DQR . Currently, I would dissent for some of good marks provided, being a revision of criteria applied advisable.

Pesticides will need to be amended periodically checking for update of pesticides' ban.
