# meat and bone meal to generic market for protein feed

Dataset: EcoSpold 2, unit process
Geography: CH
Time period: 2016-01-01 to 2019-12-31
Technology level: current
Classification: ISIC rev.4 ecoinvent: 1040:Manufacture of vegetable and animal oils and fats
Scenario: Business-as-Usual
System model: Allocation at the point of substitution
Generated by: Avraam Symeonidis
Database: ecoinvent
isCopyrightProtected: true
accessRestrictedTo: 1

## General comment
This activity is a linking activity, i.e. it connects meat and bone meal with the generic market for protein feed. Meat and bone meal is used partially as a feed for animals, thus traded on generic feed market with other protein - containing products.

## Included activities start
The activity starts with the reception of meat and bone meal.

## Included activities end
Valid for all linking activities: The activity models the part of meat and bone meal which contributes to the generic market for protein feed.

## Reference product
- protein feed, 100% crude: 1 kg; = PC_NABM*DM_NABM; By-product classification allocatable product; CPC 23319: Preparations used in animal feeding n.e.c.
  production volume 5.82781e6 kg; = 0.43546*2.5446E+07*PC_NABM*DM_NABM
    Using expert judgement the amount of meat and bone meal driven to protein market is circa 43.5% of the total production volume. Hence, the amount of protein feed, 100% crude is circa 5.8278E+06 kg.
  property price 0.424 EUR2005
    Based on protein content and energy feed, gross content in soybean meal and prices per kg of soybean meal. Assumed soybean meal is the most used feed. Soybean meal 2004 prices for World import/export data (tonnes and US$) from FaoStat statistics (http://faostat.fao.org/site/535/default.aspx#ancor, TRADE)- [Accessed 24 May 2010]. See calculations for protein /energy content
  property carbon content 0.53
    carbon content on a dry matter basis (reserved; not for manual entry)
  property true value 0.222999
    allocation property applied in "true value" allocation // value calculated from revenue
  properties: carbon content, non-fossil 0.53, water content 0, dry mass 1 kg, wet mass 1 kg, water in wet mass 0 kg, carbon content, fossil 0, carbon allocation 0.53 kg

## By-products
- energy feed, gross: 0 MJ; = GE_NABM* DM_NABM; CPC 23319: Preparations used in animal feeding n.e.c.; By-product classification allocatable product
  Calculated based on literature value for fish oil, 17.7 MJ/kg DM as reported in Feedipedia.
  References:
  Feedipedia, Animal feed resources information system: Accessed at https://www.feedipedia.org/node/222 on13/04/2018.
  production volume 1.87891e8 MJ; = Ref('2129b31c-0083-4e91-8e7a-d2dbc1dede30', 'ProductionVolume') * (Ref('75483a10-6cfa-4b7a-bf84-02ab83db92b6') / Ref('2129b31c-0083-4e91-8e7a-d2dbc1dede30'))
    Calculated from production volume of reference product using the relative outputs.
  property price 0.0108 EUR2005
    Based on energy feed, gross content in soybean meal and prices per kg of soybean meal. Assumed soybean meal is the most used feed. Soybean meal 2004 prices for World import/export data (tonnes and US$) from FaoStat statistics (http://faostat.fao.org/site/535/default.aspx#ancor, TRADE)- [Accessed 24 May 2010]. See calculations for protein /energy content
  property carbon content 0
    carbon content on a dry matter basis (reserved; not for manual entry)
  property true value 0.183131
    allocation property applied in "true value" allocation // value calculated from revenue
  properties: carbon content, fossil 0, dry mass 1 kg, water in wet mass 0 kg, wet mass 1 kg, water content 0, carbon content, non-fossil 0, carbon allocation 0 kg

## Inputs from technosphere
- meat and bone meal: 1.044 kg; name meat_and_bone_meal
  Meat and bone meal from the treatment of slaughterhouse waste, rendering.
  property water in wet mass 0.042 kg; name meat_and_bone_meal_WWM
  property carbon content, fossil 0; name meat_and_bone_meal_C_content_fossil
  property carbon content, non-fossil 0.521; name meat_and_bone_mea_C_content_non_fossil_0
  property protein content 0.549; name PC_NABM
  property wet mass 1 kg; name meat_and_bone_meal_WM
  property water content 0.0438413; name meat_and_bone_meal_water_content
  property heating value, net 21.45 MJ; name meat_and_bone_meal_Net_Heat_Value
  property dry mass 0.958 kg; name DM_NABM
  property gross energy, feed per kg of dry mass 17.7 MJ/kg; name GE_NABM
  note on carbon content, non-fossil: Boesch & Hellweg 2010, 2010, Boesch, M.E., Hellweg, S., Identifying Improvement Potentials in Cement Production with Life Cycle Assessment, Environmental Science & Technology, 44, 23, 9143-9149, 1 - Article, Supporting information is available via http://pubs.acs.org
  note on protein content: Literature value from Feedipedia. Reference: Feedipedia, Animal feed resources information system. Accessed at: https://www.feedipedia.org/node/222 on 13.04.2018

## Sampling procedure
The data is primarily sourced from literature and statistics.
