# core board production

Dataset: EcoSpold 2, unit process
Geography: RER
Time period: 2000-01-01 to 2019-12-31
Technology level: current
Classification: ISIC rev.4 ecoinvent: 1701:Manufacture of pulp, paper and paperboard
Classification: EcoSpold01Categories: paper & cardboard/packaging papers
Tags: ConvertedDataset
Scenario: Business-as-Usual
System model: Allocation at the point of substitution
Generated by: Roland Hischier
Published in: Hischier R. 2007
Database: ecoinvent
isCopyrightProtected: true
accessRestrictedTo: 1

## General comment
The functional unit represent 1 kg of core board, as produced in a modern core board mill
[This dataset was already contained in the ecoinvent database version 2. It was not individually updated during the transfer to ecoinvent version 3. Life Cycle Impact Assessment results may still have changed, as they are affected by changes in the supply chain, i.e. in other datasets. This dataset was generated following the ecoinvent quality guidelines for version 2. It may have been subject to central changes described in the ecoinvent version 3 change report (http://www.ecoinvent.org/database/ecoinvent-version-3/reports-of-changes/), and the results of the central updates were reviewed extensively. The changes added e.g. consistent water flows and other information throughout the database. The documentation of this dataset can be found in the ecoinvent reports of version 2, which are still available via the ecoinvent website. The change report linked above covers all central changes that were made during the conversion process.]

## Included activities end
Material input, water (cooling & process) consumption, energy consumption, emissions to air and water. Estimations for transports and infrastructure. No waste reported.

## Geography
Data based on one finnish plant from Corenso Ltd. Representing here average European data.

## Technology
presently used technology in a modern plant in Finnland

## Parameters
- fraction, cooling water, cooling pond system, to air: 0.032; name fraction_CW_CP_to_air; lognormal variance with pedigree 0.0413, pedigree (2,3,1,3,1)
  Calculated based on literature value (Scown, C.D., 2011, Water Footprint of U.S. Transportation Fuels and supplying information of the article) (Vionnet, S., Quantis Water Database - Technical Report, 2012).
- fraction, cooling water, recirculating system, to air: 0.771; name fraction_CW_R_to_air; lognormal variance with pedigree 0.0413, pedigree (2,3,1,3,1)
  (same comment as for fraction, cooling water, cooling pond system, to air)
- fraction, cooling water, once-through system, to air: 0.004; name fraction_CW_OT_to_air; lognormal variance with pedigree 0.0413, pedigree (2,3,1,3,1)
  (same comment as for fraction, cooling water, cooling pond system, to air)
- fraction, process water, to air: 0.15 dimensionless; name fraction_PW_to_air; lognormal variance with pedigree 0.092025, pedigree (4,4,3,2,4)
  Literature value. In case when no industry/process specific data are available, default evaporation fraction value is used. This value is 15% and is based on literature (Statistics Canada, 2007 & Shaffer, K.H., 2008, Consumptive water use in the Great Lakes Basin, USGS & Shiklomanov, 2003, World Water Resources at the Beginning of the 21st Century) and has been approved by an expert.
- fraction, cooling water, to air: 0.3875; name fraction_CW_to_air; = (0.5*fraction_CW_OT_to_air)+(0.5*fraction_CW_R_to_air); lognormal variance with pedigree 0.092025, pedigree (4,4,3,2,4)
  Calculated value based on literature value (see comments of the other parametres present in this dataset) and expert opinion. In the case when no industry/literature data are available about the type of cooling or directly fraction, cooling water, to air specific for the process a default assumption is applied. It is assumed that the once-through cooling system is used in 50% of all cases and recirculating system is used in another 50% of all cases.

## Reference product
- core board: 0 kg; CPC 321: Pulp, paper and paperboard; By-product classification allocatable product
  EcoSpold01Location=RER
  production volume 0 kg
    This is a placeholder value that does not reflect real-world production volumes. This dataset does not currently require a real-world production volume to work in the database framework, and no actual data were collected yet. This has no negative effect on the results of the ecoinvent database. The placeholder value of this activity was scaled according to the nominal GDP of 2005 (source: United Nations, http://data.un.org/Glossary.aspx?q=GDP+%28current+US%24%29, accessed 20130726) to reflect an appropriate share of the global production volume, which is also a placeholder value.
  property price 0.598 EUR2005
    Export prices for the World+ according to: http://faostat.fao.org/site/626/DesktopDefault.aspx?PageID=626#ancor downloaded 28 April 2009; calculated as export value divided by export volume.
  property carbon content, fossil 0
    Fossil C content was calculated after fossil C contents of chemicals used in the production of board (ecoinvent v2.2 report 11_III, part 13).
  property carbon content, non-fossil 0.430314
    Biogenic C content was calculated after biogenic C contents of chemicals used in the production of board (ecoinvent v2.2 report 11_III, part 13). The cellulose content in 1 kg of paper (on a wet mas basis) was estimated as (1-chemical content), C content of cellulose was considered 0.44 kgC/kg dry mass (ecoinvent v2.2 report, n 15a, pg 40)
  property carbon content 0.430314
    carbon content on a dry matter basis (reserved; not for manual entry)
  properties: water content 0.0582011, dry mass 0.945 kg, water in wet mass 0.055 kg, wet mass 1 kg, carbon allocation 0.406646 kg
- waste paper, sorted: 0 kg; By-product classification Recyclable; CPC 39240: Waste and scrap of paper or paperboard; pedigree (1,1,1,1,1)
  EcoSpold01Location=RER
  Data from 1 European producer
  Uncertainty: data from 1 European producer
  properties: water content 0.111111, carbon content, non-fossil 0.448889, water in wet mass 0.1 kg, wet mass 1 kg, carbon content, fossil 0, dry mass 0.9 kg, carbon content 0.448889, carbon allocation 0.404 kg
- core board: 1 kg; CPC 321: Pulp, paper and paperboard; By-product classification allocatable product
  EcoSpold01Location=RER
  production volume 1.32237 kg

## By-products
- core board: 0 kg; CPC 321: Pulp, paper and paperboard; By-product classification allocatable product
  EcoSpold01Location=RER
  properties: price 0.598 EUR2005, carbon content, fossil 0, water content 0.0582011, carbon content, non-fossil 0.430314, dry mass 0.945 kg, water in wet mass 0.055 kg, wet mass 1 kg, carbon content 0.430314, carbon allocation 0.406646 kg

## Inputs from technosphere
- rosin size, for paper production: 0 kg; pedigree (1,1,1,1,1)
  Data from 1 European producer
  EcoSpold01Location=RER
  Uncertainty: data from 1 European producer
  properties: dry mass 1 kg, carbon content, non-fossil 0.515474, wet mass 1 kg
  note on carbon content, non-fossil: Mixture of rosin size (approximated by soap) (75%) and alkali (shown as sodium hydroxide) (25%). (ecoinvent v2.2 report 11-III, pg 299).
- waste paper, sorted: 0 kg; pedigree (1,1,1,1,1)
  (same comment as for waste paper, sorted)
  properties: water content 0.111111, carbon content, non-fossil 0.448889, wet mass 1 kg, dry mass 0.9 kg
  note on carbon content, non-fossil: The collected waste paper has a biogenic C content of 40.4% (average C-content of waste paper according to Doka 2004)
- heat, district or industrial, other than natural gas: 0 MJ; pedigree (1,1,1,1,1)
  (same comment as for rosin size, for paper production)
- aluminium sulfate, powder: 2.65104e-6 kg; lognormal variance with pedigree 0.0413, pedigree (2,3,5,3,1)
  (same comment as for rosin size, for paper production)
  properties: dry mass 1 kg, wet mass 1 kg
- pulpwood, hardwood, measured as solid wood under bark: 0, 0, 0 m3 (3 entries); pedigree (1,1,1,1,1)
  EcoSpold01Location=NORDEL
  Data from 1 European producer
  Uncertainty: data from 1 European producer
  properties: water content 0.8, wet mass 1170 kg, dry mass 650 kg, carbon content, non-fossil 0.494
  note on carbon content, non-fossil: C content of dry mass is 0.494 kgC/kg dry wood (ecoinvent v2.2 report 9)
- electricity, medium voltage: 0 kWh; pedigree (1,1,1,1,1)
  (same comment as for pulpwood, hardwood, measured as solid wood under bark)
- paper mill, integrated: 0 unit; pedigree (1,1,1,1,1)
  Own assumption
  EcoSpold01Location=RER
  Uncertainty: own assumption
- potato starch: 0 kg; pedigree (1,1,1,1,1)
  EcoSpold01Location=DE
  Data from 1 European producer
  Uncertainty: data from 1 European producer
  properties: water content 0.25, carbon content, non-fossil 0.46, dry mass 0.8 kg, wet mass 1 kg
  note on carbon content, non-fossil: C-content of starch is considered 46% on dry mass basis (from "Evolutionary and Biochemical Aspects", A.D. Kay and T. Vrede (in Global Ecology, 2010, Elsevier B.V., S.E. Jørgensen Ed.)).
- lubricating oil: 2.77128e-5 kg; lognormal variance with pedigree 0.066, pedigree (3,4,5,5,1)
  Based on data from 1 Swiss plant
  EcoSpold01Location=RER
  Uncertainty: based on data from 1 Swiss plant
- waste textile, soiled: -6.64478e-5 kg; lognormal variance with pedigree 0.0386, pedigree (4,3,4,5,1)
  EcoSpold01Location=CH
  Personal communication of industry
  Uncertainty: personal communication of industry
- waste wood, untreated: -0.000132073, -1.63988e-5, -1.19894e-6, -4.60594e-5, -6.95846e-6, -1.10007e-5, -0.00172659 kg (7 entries); lognormal variance with pedigree 0.0386, pedigree (4,3,4,5,1)
  (same comment as for waste textile, soiled)
- waste plastic, mixture: -2.44375e-7 kg; lognormal variance with pedigree 0.0386, pedigree (4,3,4,5,1)
  Personal communication of industry
  EcoSpold01Location=CH
  Uncertainty: personal communication of industry
- scrap steel: -7.86669e-6 kg; lognormal variance with pedigree 0.0386, pedigree (4,3,4,5,1)
  (same comment as for waste plastic, mixture)
- electricity, medium voltage: 0.0159811, 1.40946e-6, 2.39023e-5, 0.000346558, 4.9599e-5, 0.00637462 kWh (6 entries); lognormal variance with pedigree 0.0386, pedigree (4,3,4,5,1)
  EcoSpold01Location=UCTE
  Personal communication of industry
  Uncertainty: personal communication of industry
- hazardous waste, for incineration: -0.000148533 kg; lognormal variance with pedigree 0.0041, pedigree (2,4,2,3,2)
  Estimated value. This figure have been taken from the CA (Quebec) dataset
  production volume 12427.7 kg
- heavy water: 2.17854e-6 kg; lognormal variance with pedigree 0.0041, pedigree (2,4,2,3,2)
  Estimated value. This figure have been taken from the CA (Quebec) dataset
- chlorine, liquid: 9.31163e-6 kg; lognormal variance with pedigree 0.0041, pedigree (2,4,2,3,2)
  Estimated value. This figure have been taken from the CA (Quebec) dataset
- spent nuclear fuel: -8.8485e-5 kg; lognormal variance with pedigree 0.0041, pedigree (2,4,2,3,2)
  Estimated value. This figure have been taken from the CA (Quebec) dataset.Amount of spent fuel produced per year plus concrete of storage modules
  production volume 118772 kg
- helium: 1.91711e-6 kg; lognormal variance with pedigree 0.0041, pedigree (2,4,2,3,2)
  Estimated value. This figure have been taken from the CA (Quebec) dataset
- hydrogen, liquid: 0.000103186 kg; lognormal variance with pedigree 0.0041, pedigree (2,4,2,3,2)
  Estimated value. This figure have been taken from the CA (Quebec) dataset
- nuclear power plant, pressure water reactor, 650MW: 2.84669e-11 unit; lognormal variance with pedigree 0.0041, pedigree (2,4,2,3,2)
  Calculated value. The life time of Atucha I and Embalse have recently been prolonged for another 30 years, and so the total lifetime have been estimated in 60 years. An average load factor for nuclear power plants of 73% was applied (PRIS database, 2018).
  Reference(s): International Atomic Energy Agency. 2018. Power Reactor Information System (PRIS), World Statistics, Load Factor, accessible online athttps://pris.iaea.org/PRIS/WorldStatistics/WorldTrendinAverageLoadFactor.aspx, last accessed February 2018
- carbon dioxide, liquid: 1.66455e-6 kg; lognormal variance with pedigree 0.0035, pedigree (2,4,2,3,1)
  Estimated value. This figure have been taken from the CA (Quebec) dataset
- reinforcing steel: 2.72317e-6 kg; lognormal variance with pedigree 0.0041, pedigree (2,4,2,3,2)
  Estimated value. This figure have been taken from the CA (Quebec) dataset
- cast iron: 2.72317e-6 kg; lognormal variance with pedigree 0.0041, pedigree (2,4,2,3,2)
  Estimated value. This figure have been taken from the CA (Quebec) dataset
- waste reinforced concrete: -0.0487045 kg; lognormal variance with pedigree 0.21, pedigree (5,5,5,5,5)
  Estimated value. This figure have been taken from the CA (Quebec) dataset. Same amount entering the dataset is estimated as by-product.
  production volume 7.47135e7 kg
- nitrogen, liquid: 2.07303e-6 kg; lognormal variance with pedigree 0.0041, pedigree (2,4,2,3,2)
  Estimated value. This figure have been taken from the CA (Quebec) dataset
- transport, freight, light commercial vehicle: 0.000173724 metric ton*km; lognormal variance with pedigree 0.0041, pedigree (2,4,2,3,2)
  Estimated value. This figure have been taken from the CA (Quebec) dataset. This vehicle use corresponds to maintenance and operation services related to the operation of the whole company. Transports have been distributed among different activities (electricity production, transport and distribution) according to their respective use of these transports and, when the exact distribution was not available, according to the relative expenses of each activity.
- anionic resin: 3.71756e-9 kg; lognormal variance with pedigree 0.0041, pedigree (2,4,2,3,2)
  Estimated value. This figure have been taken from the CA (Quebec) dataset
- tap water: 0.0366217 kg; lognormal variance with pedigree 0.0041, pedigree (2,4,2,3,2)
  Estimated value. This figure have been taken from the CA (Quebec) dataset
- cationic resin: 1.48237e-9 kg; lognormal variance with pedigree 0.0041, pedigree (2,4,2,3,2)
  Estimated value. This figure have been taken from the CA (Quebec) dataset
- uranium hexafluoride: 8.10149e-5 kg; lognormal variance with pedigree 0.0041, pedigree (2,4,2,3,2)
  Estimated value.This figure have been taken from the CA (Quebec) dataset As CANDU reactors use natural uranium (unenriched UO2) but no data were collected for UO2 production (impurities removal from yellowcake, refining to UO3 and conversion to UO2) uranium hexafluoride is used as proxy (UO3 is used to produce both UO2 and UF6).
- transport, freight, lorry, unspecified: 0.000327622 metric ton*km; lognormal variance with pedigree 0.1235, pedigree (2,4,2,3,2)
  Estimated value. This figure have been taken from the CA (Quebec) dataset
  This vehicle use corresponds to maintenance and operation services related to the operation of the whole company. Transports have been distributed among different activities (electricity production, transport and distribution) according to their respective use of these transports and, when the exact distribution was not available, according to the relative expenses of each activity.
- diesel, burned in diesel-electric generating set, 10MW: 0.000303566 MJ; lognormal variance with pedigree 0.0041, pedigree (2,4,2,3,2)
  Estimated value. This figure have been taken from the CA (Quebec) dataset
- sodium hypochlorite, without water, in 15% solution state: 1.7571e-5 kg; lognormal variance with pedigree 0.0041, pedigree (2,4,2,3,2)
  Estimated value. This figure have been taken from the CA (Quebec) dataset
- hydrazine: 1.38701e-6 kg; lognormal variance with pedigree 0.0041, pedigree (2,4,2,3,2)
  Estimated value. This figure have been taken from the CA (Quebec) dataset
- transport, passenger car: 0.000156969 km; lognormal variance with pedigree 0.0041, pedigree (2,4,2,3,2)
  Estimated value. This figure have been taken from the CA (Quebec) dataset
  This vehicle use corresponds to maintenance and operation services related to the operation of the whole company. Transports have been distributed among different activities (electricity production, transport and distribution) according to their respective use of these transports and, when the exact distribution was not available, according to the relative expenses of each activity
- sodium hydroxide, without water, in 50% solution state: 0.00668305 kg; lognormal variance with pedigree 0.0041, pedigree (2,4,2,3,2)
  Estimated value. This figure have been taken from the CA (Quebec) dataset
- chlorodifluoromethane: 1.06204e-7 kg; lognormal variance with pedigree 0.0041, pedigree (2,4,2,3,2)
  Estimated value. This figure have been taken from the CA (Quebec) dataset
- fly ash and scrubber sludge: -8.29216e-5 kg; lognormal variance with pedigree 0.0041, pedigree (2,4,2,3,2)
  Estimated value. This figure have been taken from the CA (Quebec) dataset
  production volume 127203 kg
- chemical, organic: 0.000669489 kg; lognormal variance with pedigree 0.0041, pedigree (2,4,2,3,2)
  Estimated value. This figure have been taken from the CA (Quebec) dataset
- steel, low-alloyed, hot rolled: 6.26722e-6 kg; lognormal variance with pedigree 0.0041, pedigree (2,4,2,3,2)
  Estimated value. This figure have been taken from the CA (Quebec) dataset
- municipal solid waste: -0.000123467 kg; lognormal variance with pedigree 0.0041, pedigree (2,4,2,3,2)
  Estimated value. This figure have been taken from the CA (Quebec) dataset
  production volume 98845.3 kg
- low level radioactive waste: -7.48328e-9 m3; lognormal variance with pedigree 0.0041, pedigree (2,4,2,3,2)
  Estimated value. This figure have been taken from the CA (Quebec) dataset
  production volume 10.0449 m3
- sulfuric acid: 0.00414455 kg; lognormal variance with pedigree 0.0041, pedigree (2,4,2,3,2)
  Estimated value. This figure have been taken from the CA (Quebec) dataset
- waste paper, unsorted: -0.000677727 kg; lognormal variance with pedigree 0.0041, pedigree (2,4,2,3,2)
  Estimated value. This figure have been taken from the CA (Quebec) dataset
  production volume 61408.4 kg
- low level radioactive waste for final repository: -3.50745e-8 m3; lognormal variance with pedigree 0.0041, pedigree (2,4,2,3,2)
  Estimated value. This figure have been taken from the CA (Quebec) dataset
  production volume 47.0798 m3
- paper, woodfree, coated: 0.00257561 kg; lognormal variance with pedigree 0.0002, pedigree (1,1,2,1,1)
  Estimated value. This figure have been taken from the CA (Quebec) dataset
  Uncertainty: Calculated variable. Uncertainty will be determined from propagation of uncertainty factors of underlying variables. Uncertainty of actual relation between variables not accounted at this time, although this could be included in a future update.
- sodium percarbonate, powder: 5.92293e-6 kg; lognormal variance with pedigree 0.0041, pedigree (2,4,2,3,2)
  Estimated value. This figure have been taken from the CA (Quebec) dataset
- waste mineral oil: -8.06086e-5 kg; lognormal variance with pedigree 0.0041, pedigree (2,4,2,3,2)
  Estimated value. This figure have been taken from the CA (Quebec) dataset
  production volume 13890 kg
- concrete, normal: 9.53107e-6 m3; lognormal variance with pedigree 0.0041, pedigree (2,4,2,3,2)
  Estimated value. This figure have been taken from the CA (Quebec) dataset
- aluminium sulfate, powder: 5.26887e-5 kg; lognormal variance with pedigree 0.0041, pedigree (2,4,2,3,2)
  Estimated value. This figure have been taken from the CA (Quebec) dataset
- hazardous waste, for underground deposit: -0.000322651 kg; lognormal variance with pedigree 0.0032, pedigree (1,3,3,1,1)
  Amount and activity link based on primary data collected from participating companies.
  production volume 1.75109e6 kg
- light fuel oil: 8.65675e-5 kg; lognormal variance with pedigree 0.0032, pedigree (1,3,3,1,1)
  Amount and activity link based on primary data collected from participating companies. Emissions from fuel combustion included in dataset.
- copper: 6.2914e-6 kg; lognormal variance with pedigree 0.0032, pedigree (1,3,3,1,1)
  Amount and activity link based on primary data collected from participating companies.
- blasting: 7.15146e-5 kg; lognormal variance with pedigree 0.0032, pedigree (1,3,3,1,1)
  Amount and activity link based on primary data collected from participating companies.
- mine infrastructure, underground, non-ferrous metal: 9.91875e-12 unit; lognormal variance with pedigree 0.0887, pedigree (5,5,5,3,1)
  Estimation from author of 'zinc mine operation, GLO, 1994-2003' dataset. No primary data on infrastructure included.
- heat, district or industrial, other than natural gas: 8.89758e-5, 0.000190484, 0.00187243 MJ (3 entries); lognormal variance with pedigree 0.0032, pedigree (1,3,3,1,1)
  Amount and activity link based on primary data collected from participating companies.
- conveyor belt: 6.75526e-9 m; lognormal variance with pedigree 0.0587, pedigree (4,4,5,3,3)
  Estimation from author of 'zinc mine operation, GLO, 1994-2003' dataset: 2000 m conveyor belts are assumed to have a capacity of 2000 t/h which yields 2*10-5 m conveyor belt required per tonne mined raw ore. No primary data on infrastructure included.
- maize starch: 4.00011e-6 kg; lognormal variance with pedigree 0.0032, pedigree (1,3,3,1,1)
  Amount and activity link based on primary data collected from participating companies.
- electricity, medium voltage: 0.0150543, 0.00262262, 0.00233073, 0.000999722, 0.000792476, 0.000960115, 0.000336283, 0.00589522, 0.00234586, 0.00448377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 kWh (15 entries); lognormal variance with pedigree 0.0032, pedigree (1,3,3,1,1)
  Amount and activity link based on primary data collected from participating companies.
- zinc slag: -0.00424495 kg; lognormal variance with pedigree 0.0032, pedigree (1,3,3,1,1)
  Amount and activity link based on primary data collected from participating companies.
  production volume 2.1567e6 kg
- copper sulfate: 0.000498444 kg; lognormal variance with pedigree 0.0032, pedigree (1,3,3,1,1)
  Amount and activity link based on primary data collected from participating companies.
- heavy fuel oil: 2.51542e-5 kg; lognormal variance with pedigree 0.0032, pedigree (1,3,3,1,1)
  (same comment as for light fuel oil)
- electricity, high voltage: 0.00385056 kWh; lognormal variance with pedigree 0.0032, pedigree (1,3,3,1,1)
  Amount and activity link based on primary data collected from participating companies.
- diesel: 0.000320649, 0.0010321, 8.61209e-6 kg (3 entries); lognormal variance with pedigree 0.0032, pedigree (1,3,3,1,1)
  Amount and activity link based on primary data collected from participating companies. Emissions from diesel combustion included in dataset.
- tap water: 0.245499 kg; lognormal variance with pedigree 0.0032, pedigree (1,3,3,1,1)
  Amount and activity link based on primary data collected from participating companies.
- aluminium chloride: 5.53117e-9 kg; lognormal variance with pedigree 0.0032, pedigree (1,3,3,1,1)
  Amount and activity link based on primary data collected from participating companies.
- steel, low-alloyed: 0.000104062 kg; lognormal variance with pedigree 0.0032, pedigree (1,3,3,1,1)
  Amount and activity link based on primary data collected from participating companies.
- concrete, normal: 1.58329e-7 m3; lognormal variance with pedigree 0.0032, pedigree (1,3,3,1,1)
  Amount and activity link based on primary data collected from participating companies.
- chemical, inorganic: 1.93504e-5 kg; lognormal variance with pedigree 0.0032, pedigree (1,3,3,1,1)
  Amount and activity link based on primary data collected from participating companies.
- waste wood, post-consumer: -1.11186e-6 kg; lognormal variance with pedigree 0.0032, pedigree (1,3,3,1,1)
  Amount and activity link based on primary data collected from participating companies.
  production volume 527319 kg
- acetic acid, without water, in 98% solution state: 2.18617e-6 kg; lognormal variance with pedigree 0.0032, pedigree (1,3,3,1,1)
  Amount and activity link based on primary data collected from participating companies.
- transport, freight, sea, bulk carrier for dry goods: 0.0184956 metric ton*km; lognormal variance with pedigree 0.1226, pedigree (1,3,3,1,1)
  Inbound transport of materials to sites. Amount and activity link based on primary data collected from participating companies.
- cement, unspecified: 9.58306e-6 kg; lognormal variance with pedigree 0.0032, pedigree (1,3,3,1,1)
  Amount and activity link based on primary data collected from participating companies.
- sodium dichromate: 4.55112e-7 kg; lognormal variance with pedigree 0.0032, pedigree (1,3,3,1,1)
  Amount and activity link based on primary data collected from participating companies.
- polyacrylamide: 1.90517e-5 kg; lognormal variance with pedigree 0.0032, pedigree (1,3,3,1,1)
  Amount and activity link based on primary data collected from participating companies.
- used Li-ion battery: -6.33756e-8 kg; lognormal variance with pedigree 0.0032, pedigree (1,3,3,1,1)
  Amount and activity link based on primary data collected from participating companies.
  production volume 30057 kg
- sodium sulfide: 1.28144e-5 kg; lognormal variance with pedigree 0.0032, pedigree (1,3,3,1,1)
  Amount and activity link based on primary data collected from participating companies.
- sodium hydrogen sulfite: 1.72915e-6 kg; lognormal variance with pedigree 0.0032, pedigree (1,3,3,1,1)
  Amount and activity link based on primary data collected from participating companies.
- soda ash, dense: 0.00100636 kg; lognormal variance with pedigree 0.0032, pedigree (1,3,3,1,1)
  Amount and activity link based on primary data collected from participating companies.
- non-sulfidic overburden, off-site: -0.70362 kg; lognormal variance with pedigree 0.0032, pedigree (1,3,3,1,1)
  Amount and activity link based on primary data collected from participating companies.
  production volume 3.33704e11 kg
- propane: 7.2725e-5 kg; lognormal variance with pedigree 0.0032, pedigree (1,3,3,1,1)
  Amount and activity link based on primary data collected from participating companies.
- pig iron: 3.53793e-5 kg; lognormal variance with pedigree 0.0032, pedigree (1,3,3,1,1)
  Amount and activity link based on primary data collected from participating companies.
- natural gas, high pressure: 0.00164363, 9.16887e-6, 2.234e-5 m3 (3 entries); lognormal variance with pedigree 0.0032, pedigree (1,3,3,1,1)
  (same comment as for light fuel oil)
- petrol, unleaded: 8.19554e-7, 2.60478e-8, 1.0765e-7, 2.59631e-8, 9.7128e-8, 5.3482e-9, 2.98954e-6 kg (7 entries); lognormal variance with pedigree 0.0032, pedigree (1,3,3,1,1)
  Amount and activity link based on primary data collected from participating companies.
- inert waste: -5.06814e-5, -4.36503e-7, -8.23366e-5 kg (3 entries); lognormal variance with pedigree 0.0032, pedigree (1,3,3,1,1)
  Amount and activity link based on primary data collected from participating companies.
  production volume 9.14737e6 kg
- lubricating oil: 6.29806e-6 kg; lognormal variance with pedigree 0.0032, pedigree (1,3,3,1,1)
  Amount and activity link based on primary data collected from participating companies.
- lime, hydrated, packed: 5.75241e-7, 6.77685e-5 kg (2 entries); lognormal variance with pedigree 0.0032, pedigree (1,3,3,1,1)
  Amount and activity link based on primary data collected from participating companies.
- limestone, crushed, washed: 3.96299e-10, 4.64781e-8 kg (2 entries); lognormal variance with pedigree 0.0032, pedigree (1,3,3,1,1)
  Amount and activity link based on primary data collected from participating companies.
- bilge oil: -4.81786e-8, -1.25936e-9, -1.00185e-7 kg (3 entries); lognormal variance with pedigree 0.0032, pedigree (1,3,3,1,1)
  Amount and activity link based on primary data collected from participating companies.
  production volume 70961.3 kg
- lime: 1.02332e-6, 0.000116433 kg (2 entries); lognormal variance with pedigree 0.0032, pedigree (1,3,3,1,1)
  Amount and activity link based on primary data collected from participating companies.
- hazardous waste, for incineration: -6.82512e-5, -2.34754e-6 kg (2 entries); lognormal variance with pedigree 0.0032, pedigree (1,3,3,1,1)
  Amount and activity link based on primary data collected from participating companies.
  production volume 6.58402e7 kg
- limestone, unprocessed: 2.47398e-5, 2.56119e-7, 0.000626362 kg (3 entries); lognormal variance with pedigree 0.0032, pedigree (1,3,3,1,1)
  Amount and activity link based on primary data collected from participating companies.
- hydrogen cyanide: 6.35522e-7, 1.39815e-6 kg (2 entries); lognormal variance with pedigree 0.0032, pedigree (1,3,3,1,1)
  Amount and activity link based on primary data collected from participating companies.
- sulfidic tailings, from zinc-lead mine operation: -0.0896814, -0.0126251, -0.0110578, -0.0234217, -0.00457985, -0.0303872, -0.0161078, -0.0515799 kg (8 entries); lognormal variance with pedigree 0.0032, pedigree (1,3,3,1,1)
  Amount and activity link based on primary data collected from participating companies.
  production volume 1.13556e11 kg
- iron sulfate: 3.65706e-6, 7.40508e-6 kg (2 entries); lognormal variance with pedigree 0.0032, pedigree (1,3,3,1,1)
  Amount and activity link based on primary data collected from participating companies.
- nylon 6: 1.83971e-7, 3.72519e-7 kg (2 entries); lognormal variance with pedigree 0.0032, pedigree (1,3,3,1,1)
  Amount and activity link based on primary data collected from participating companies.
- zinc monosulfate: 1.80268e-5, 9.52297e-5 kg (2 entries); lognormal variance with pedigree 0.0032, pedigree (1,3,3,1,1)
  Amount and activity link based on primary data collected from participating companies.
- concrete, 35MPa: 3.59316e-9, 2.24688e-11, 1.43615e-10, 2.96501e-8 m3 (4 entries); lognormal variance with pedigree 0.0032, pedigree (1,3,3,1,1)
  Amount and activity link based on primary data collected from participating companies.
- transport, freight, lorry 16-32 metric ton, EURO3: 0.000657093, 0.00088488 metric ton*km (2 entries); lognormal variance with pedigree 0.1226, pedigree (1,3,3,1,1)
  (same comment as for transport, freight, sea, bulk carrier for dry goods)
- acrylic acid: 1.47285e-7, 6.9918e-7 kg (2 entries); lognormal variance with pedigree 0.0032, pedigree (1,3,3,1,1)
  Amount and activity link based on primary data collected from participating companies.
- sulfuric acid: 0.00344546 kg; lognormal variance with pedigree 0.0032, pedigree (1,3,3,1,1)
  Amount and activity link based on primary data collected from participating companies.
- sulfur dioxide, liquid: 3.67619e-5, 4.66114e-5 kg (2 entries); lognormal variance with pedigree 0.0032, pedigree (1,3,3,1,1)
  Amount and activity link based on primary data collected from participating companies.
- waste paper, unsorted: -0.000115999, -0.000700605 kg (2 entries); lognormal variance with pedigree 0.0032, pedigree (1,3,3,1,1)
  Amount and activity link based on primary data collected from participating companies.
  production volume 4446.2 kg
- sodium cyanide: 1.6397e-6, 3.32018e-6 kg (2 entries); lognormal variance with pedigree 0.0032, pedigree (1,3,3,1,1)
  Amount and activity link based on primary data collected from participating companies.
- waste mineral oil: -2.76437e-5, -1.27138e-6 kg (2 entries); lognormal variance with pedigree 0.0032, pedigree (1,3,3,1,1)
  Amount and activity link based on primary data collected from participating companies.
  production volume 1.91672e6 kg
- calcium chloride: 2.12626e-6, 7.36297e-6 kg (2 entries); lognormal variance with pedigree 0.0032, pedigree (1,3,3,1,1)
  Amount and activity link based on primary data collected from participating companies.
- municipal solid waste: -2.18081e-5, -2.76598e-5, -5.28871e-8, -4.67819e-6 kg (4 entries); lognormal variance with pedigree 0.0032, pedigree (1,3,3,1,1)
  Amount and activity link based on primary data collected from participating companies.
  production volume 2.68043e7 kg
- quicklime, milled, loose: 0.0013044, 0.00221233 kg (2 entries); lognormal variance with pedigree 0.0032, pedigree (1,3,3,1,1)
  Amount and activity link based on primary data collected from participating companies.
- waste rubber, unspecified: -8.16178e-9, -3.4263e-10, -8.16178e-9 kg (3 entries); lognormal variance with pedigree 0.0032, pedigree (1,3,3,1,1)
  Amount and activity link based on primary data collected from participating companies.
  production volume 7904.23 kg
- polyol: 1.09037e-6, 2.20786e-6 kg (2 entries); lognormal variance with pedigree 0.0032, pedigree (1,3,3,1,1)
  Amount and activity link based on primary data collected from participating companies.
- scrap copper: -7.29469e-7, -3.42251e-8, -1.53596e-6 kg (3 entries); lognormal variance with pedigree 0.0032, pedigree (1,3,3,1,1)
  Amount and activity link based on primary data collected from participating companies.
  production volume 1.09065e6 kg
- quicklime, in pieces, loose: 5.84851e-9, 0.000353405 kg (2 entries); lognormal variance with pedigree 0.0032, pedigree (1,3,3,1,1)
  Amount and activity link based on primary data collected from participating companies.
- oxygen, liquid: 0.00598052, 0.0030536 kg (2 entries); lognormal variance with pedigree 0.0032, pedigree (1,3,3,1,1)
  Amount and activity link based on primary data collected from participating companies.
- concrete, normal: 4.76561e-6, 9.53123e-6, 2.85417e-8, 9.47373e-7, 9.8715e-8, 4.49532e-7, 6.42086e-8 m3 (7 entries); lognormal variance with pedigree 0.0059, pedigree (2,4,3,3,2)
  Estimated value. Measured/calculated value for Quebec is extrapolated for GLO.
- transport, helicopter: 9.24049e-7 hour; lognormal variance with pedigree 0.1253, pedigree (2,4,3,3,2)
  Estimated value. Measured/calculated value for Quebec is extrapolated for GLO. This vehicle use corresponds to maintenance and operation services related to the operation of the whole company. Transports have been distributed among different activities (electricity production, transport and distribution) according to their respective use of these transports and, when the exact distribution was not available, according to the relative expenses of each activity.
- nuclear power plant, pressure water reactor, 650MW: 1.96326e-12 unit; lognormal variance with pedigree 0.0059, pedigree (2,4,3,3,2)
  Calculated generic value, not country specific.The amount of infrastructure input is calculated based on the assumption of an average lifetime of 30 years for this type of power plant. An average load factor for nuclear power plants of 73% was applied (PRIS database, 2018).
  Reference(s): International Atomic Energy Agency. 2018. Power Reactor Information System (PRIS), World Statistics, Load Factor, accessible online athttps://pris.iaea.org/PRIS/WorldStatistics/WorldTrendinAverageLoadFactor.aspx, last accessed February 2018
  ;activityLink introduced to establish a direct link to the corresponding regional supply of this product
- tap water: 0.00445925, 0.027228, 0.00445885, 0.000222831 kg (4 entries); lognormal variance with pedigree 0.0059, pedigree (2,4,3,3,2)
  Estimated value. Measured/calculated value for Quebec is extrapolated for GLO.
- uranium hexafluoride: 5.78681e-6, 5.7862e-6 kg (2 entries); lognormal variance with pedigree 0.0059, pedigree (2,4,3,3,2)
  Estimated value. Measured/calculated value for Quebec is extrapolated for GLO.
  As CANDU reactors use natural uranium (unenriched UO2) but no data were collected for UO2 production (impurities removal from yellowcake, refining to UO3 and conversion to UO2) uranium hexafluoride is used as proxy (UO3 is used to produce both UO2 and UF6).
- foaming agent: 6.27239e-7 kg; lognormal variance with pedigree 0.002, pedigree (1,1,3,1,1)
  Measured value. Reported in litres as foaming agent (saponin).
  Uncertainty: Calculated variable. Uncertainty will be determined from propagation of uncertainty factors of underlying variables. Uncertainty of actual relation between variables not accounted for at this time, although this could be included in a future update.
- strontium carbonate: 3.23115e-5 kg; lognormal variance with pedigree 0.0026, pedigree (1,1,3,1,1)
  Measured value.
- copper cake: -0.000390807 kg; lognormal variance with pedigree 0.0026, pedigree (1,1,3,1,1)
  Measured Value. Proxy created to estimate the treatment of the copper cake.
  production volume 2.40305e6 kg
- ammonium chloride: 3.13447e-5 kg; lognormal variance with pedigree 0.0026, pedigree (1,1,3,1,1)
  Measured value.
- sodium silicate, without water, in 37% solution state: 5.40706e-7 kg; lognormal variance with pedigree 0.002, pedigree (1,1,3,1,1)
  Measured value. Reported as 38% solution. Amount as been multiplied by concentration in order to have the active ingredient only.
  Uncertainty: Calculated variable. Uncertainty will be determined from propagation of uncertainty factors of underlying variables. Uncertainty of actual relation between variables not accounted for at this time, although this could be included in a future update.
- aluminium scrap, new: -4.61716e-5 kg; lognormal variance with pedigree 0.0026, pedigree (1,1,3,1,1)
  Measured value. Reported as scrap aluminium to recycling.
  production volume 567035 kg
- urea, as N: 1.923e-6 kg; lognormal variance with pedigree 0.002, pedigree (1,1,3,1,1)
  Measured value.
  Uncertainty: Calculated variable. Uncertainty will be determined from propagation of uncertainty factors of underlying variables. Uncertainty of actual relation between variables not accounted for at this time, although this could be included in a future update.
- aluminium, wrought alloy: 0.000155904 kg; lognormal variance with pedigree 0.0026, pedigree (1,1,3,1,1)
  Measured value. Reported as secondary aluminium and used for alloy production.
- perlite: 1.93161e-6 kg; lognormal variance with pedigree 0.0026, pedigree (1,1,3,1,1)
  Measured value.
- diesel, burned in building machine: 0.00207505 MJ; lognormal variance with pedigree 0.002, pedigree (1,1,3,1,1)
  EcoSpold01Location=GLO
  Measured value. Reported in m³.
  Uncertainty: Calculated variable. Uncertainty will be determined from propagation of uncertainty factors of underlying variables. Uncertainty of actual relation between variables not accounted for at this time, although this could be included in a future update.
- lead: 6.55449e-5 kg; lognormal variance with pedigree 0.0032, pedigree (2,1,3,1,1)
  Calculated value. Lead for anode production, excluding the amount recovered from restored anodes.
- zinc concentrate: 0.0766032 kg; lognormal variance with pedigree 0.008, pedigree (1,1,3,1,1)
  EcoSpold01Location=GLO
  Measured value.
- electricity, high voltage: 0.100217 kWh; lognormal variance with pedigree 0.0026, pedigree (1,1,3,1,1)
  Measured value. Reported in kWh at 120 kV. According to following document, high voltage is between 44 kV and 315 kV in Quebec region: http://www.hydroquebec.com/transenergie/fr/commerce/pdf/characteristics-and-target-values-of-voltage.pdf
- retention aid, for paper production: 1.47292e-5 kg; lognormal variance with pedigree 0.0026, pedigree (1,1,3,1,1)
  Proxy, reported as "flocculants (polyacrilamide)". Measured value.
- copper scrap, sorted, pressed: -5.13911e-6 kg; lognormal variance with pedigree 0.0026, pedigree (1,1,3,1,1)
  Measured value. Reported as scrap copper to recycling.
  production volume 59997.1 kg
- heat, district or industrial, natural gas: 0.0311457 MJ; lognormal variance with pedigree 0.002, pedigree (1,1,3,1,1)
  EcoSpold01Location=RER
  Calculated value based on reported fuel input (in m³), the Net Heating Value of the fuel and assumed efficiency (1/Fuel_use).
  Uncertainty: Calculated variable. Uncertainty will be determined from propagation of uncertainty factors of underlying variables. Uncertainty of actual relation between variables not accounted for at this time, although this could be included in a future update.
- heat, central or small-scale, other than natural gas: 0.000112324 MJ; lognormal variance with pedigree 0.002, pedigree (1,1,3,1,1)
  Calculated value based on reported fuel input (in m³), the Net Heating Value of the fuel and assumed efficiency (1/Fuel_use).
  Uncertainty: Calculated variable. Uncertainty will be determined from propagation of uncertainty factors of underlying variables. Uncertainty of actual relation between variables not accounted for at this time, although this could be included in a future update.
- transport, passenger car, large size, petrol, EURO 3: 2.04039e-5 km; lognormal variance with pedigree 0.2906, pedigree (2,5,5,5,5)
  Calculated value. Reported as liters of petrol used in pickup trucks (1.031E-4 liter/kg). Conversion using : 0,081237 kg/km (taken directly from ecoinvent v3.0 dataset "transport, passenger car, large size, petrol, EURO 3, GLO") and 0.75 kg/l (taken from Table 5.1 of the data quality guideline).
- heat, district or industrial, other than natural gas: 0.00017113 MJ; lognormal variance with pedigree 0.002, pedigree (1,1,3,1,1)
  (same comment as for heat, central or small-scale, other than natural gas)
- precious metal refinery: 1.62853e-12 unit; lognormal variance with pedigree 0.002, pedigree (1,1,3,1,1)
  Proxy. Estimated value. The service life, surface area covered and annual production volume of the actual plant, 50 years, 30 ha and more than 250 000 t respectively, are very different than the values assumed for the precious metal refinery modeled by the dataset, 25 years, 0,5 ha and 243 t respectively.
  Uncertainty: Calculated variable. Uncertainty will be determined from propagation of uncertainty factors of underlying variables. Uncertainty of actual relation between variables not accounted for at this time, although this could be included in a future update.
- heat, district or industrial, other than natural gas: 0.00489811 MJ; lognormal variance with pedigree 0.002, pedigree (1,1,3,1,1)
  (same comment as for heat, district or industrial, natural gas)
- municipal solid waste: -7.55653e-5 kg; lognormal variance with pedigree 0.0026, pedigree (1,1,3,1,1)
  Measured value. Reported as household waste.
  production volume 928019 kg
- silver: 2.65508e-7 kg; lognormal variance with pedigree 0.0032, pedigree (2,1,3,1,1)
  Calculated value. Silver for anode production, excluding the amount recovered from restored anodes.
- waste mineral oil: -1.38429e-6 kg; lognormal variance with pedigree 0.0026, pedigree (1,1,3,1,1)
  Measured value. Reported as used oil and grease and sent to an external company. Assumed to be incinerated (expert jugement).
  production volume 17000.5 kg
- aluminium, primary, ingot: 4.78881e-5 kg; lognormal variance with pedigree 0.0026, pedigree (1,1,3,1,1)
  Measured value. Reported as primary aluminium for the cathode sheets.
- sodium hydroxide, without water, in 50% solution state: 1.21758e-5 kg; lognormal variance with pedigree 0.002, pedigree (1,1,3,1,1)
  Measured value. Reported as 50% solution. Amount as been divided in half in order to have the active ingredient only.
  Uncertainty: Calculated variable. Uncertainty will be determined from propagation of uncertainty factors of underlying variables. Uncertainty of actual relation between variables not accounted for at this time, although this could be included in a future update.
- section bar extrusion, aluminium: 2.60466e-6 kg; lognormal variance with pedigree 0.002, pedigree (1,1,3,1,1)
  Measured value. Proxy for the production of the copper bars (anodes and equipotentials).
  Uncertainty: Calculated variable. Uncertainty will be determined from propagation of uncertainty factors of underlying variables. Uncertainty of actual relation between variables not accounted for at this time, although this could be included in a future update.
- hydrogen peroxide, without water, in 50% solution state: 0.00114862 kg; lognormal variance with pedigree 0.002, pedigree (1,1,3,1,1)
  Measured value. Reported as 50% solution. Amount as been multiplied by concentration in order to have the active ingredient only.
  Uncertainty: Calculated variable. Uncertainty will be determined from propagation of uncertainty factors of underlying variables. Uncertainty of actual relation between variables not accounted for at this time, although this could be included in a future update.
- potassium permanganate: 1.25852e-6 kg; lognormal variance with pedigree 0.0026, pedigree (1,1,3,1,1)
  Measured value.
- pyridine: 5.57836e-6 kg; lognormal variance with pedigree 0.0026, pedigree (1,1,3,1,1)
  Measured value. Reported as cyclic amine (confidential).
- sodium dithionite, anhydrous: 2.2056e-5 kg; lognormal variance with pedigree 0.0026, pedigree (1,1,3,1,1)
  Measured value.
- hot rolling, steel: 0.000138333 kg; lognormal variance with pedigree 0.002, pedigree (1,1,3,1,1)
  Measured value. Proxy for anodes production. Includes the amount of new metal and metal in the recycled anodes.
  Uncertainty: Calculated variable. Uncertainty will be determined from propagation of uncertainty factors of underlying variables. Uncertainty of actual relation between variables not accounted for at this time, although this could be included in a future update.
- cement, Portland: 0.00157267 kg; lognormal variance with pedigree 0.0026, pedigree (1,1,3,1,1)
  Measured value. Reported as Portland cement type10.
- waste glass: -4.11297e-8 kg; lognormal variance with pedigree 0.0026, pedigree (1,1,3,1,1)
  Measured value. Reported as glass to recycling.
  production volume 505.114 kg
- sheet rolling, aluminium: 9.32584e-5 kg; lognormal variance with pedigree 0.0026, pedigree (1,1,3,1,1)
  Measured value. Proxy for the production of aluminium cathode sheets.
- manganese dioxide: 8.15652e-5 kg; lognormal variance with pedigree 0.0026, pedigree (1,1,3,1,1)
  Measured value.
- dithiocarbamate-compound: 1.04928e-6 kg; lognormal variance with pedigree 0.0032, pedigree (2,1,1,5,1)
  Calculated as the production-volume weighted average of the exchange amounts of the corresponding regional datasets.
- triazine-compound, unspecified: 1.04928e-6 kg; lognormal variance with pedigree 0.0032, pedigree (2,1,1,5,1)
  (same comment as for dithiocarbamate-compound)
- wood chips, dry, measured as dry mass: 0.0381247 kg; lognormal variance with pedigree 0.0027, pedigree (1,2,1,5,1)
  (same comment as for dithiocarbamate-compound)
- ethylene glycol: 1.43308e-7 kg; lognormal variance with pedigree 0.0032, pedigree (2,1,1,5,1)
  (same comment as for dithiocarbamate-compound)
- methanol, from biomass: 0.000168242 kg; lognormal variance with pedigree 0.0027, pedigree (1,2,1,5,1)
  (same comment as for dithiocarbamate-compound)
- digester sludge: -4.10669e-5 kg; lognormal variance with pedigree 0.0027, pedigree (1,2,1,5,1)
  (same comment as for dithiocarbamate-compound)
  production volume 390647 kg
- phosphoric acid, industrial grade, without water, in 85% solution state: 4.08989e-6 kg; lognormal variance with pedigree 0.0026, pedigree (1,1,1,5,1)
  (same comment as for dithiocarbamate-compound)
- fatty alcohol: 1.17359e-5 kg; lognormal variance with pedigree 0.0032, pedigree (2,1,1,5,1)
  (same comment as for dithiocarbamate-compound)
- green liquor dregs: -0.00232702 kg; lognormal variance with pedigree 0.0027, pedigree (1,2,1,5,1)
  (same comment as for dithiocarbamate-compound)
  production volume 4.42471e7 kg
- hydrochloric acid, without water, in 30% solution state: 4.12642e-6 kg; lognormal variance with pedigree 0.0032, pedigree (2,1,1,5,1)
  (same comment as for dithiocarbamate-compound)
- limestone residue: -0.000998024 kg; lognormal variance with pedigree 0.0027, pedigree (1,2,1,5,1)
  (same comment as for dithiocarbamate-compound)
  production volume 1.64706e7 kg
- propane, burned in building machine: 0.000106195 MJ; lognormal variance with pedigree 0.002, pedigree (1,1,1,5,1)
  (same comment as for dithiocarbamate-compound)
- manganese: 1.93937e-7 kg; lognormal variance with pedigree 0.0032, pedigree (2,1,1,5,1)
  (same comment as for dithiocarbamate-compound)
- methanol: 0.000114159 kg; lognormal variance with pedigree 0.0032, pedigree (2,1,1,5,1)
  (same comment as for dithiocarbamate-compound)
- sludge from pulp and paper production: -0.000463805 kg; lognormal variance with pedigree 0.0027, pedigree (1,2,1,5,1)
  (same comment as for dithiocarbamate-compound)
  production volume 3.59786e7 kg
- spent solvent mixture: -2.03358e-6 kg; lognormal variance with pedigree 0.0026, pedigree (1,1,1,5,1)
  (same comment as for dithiocarbamate-compound)
  production volume 387.777 kg
- wood ash mixture, pure: -0.000321794 kg; lognormal variance with pedigree 0.0026, pedigree (1,1,1,5,1)
  (same comment as for dithiocarbamate-compound)
  production volume 1.75356e7 kg
- residual softwood, wet: 6.15691e-6 m3; lognormal variance with pedigree 0.0027, pedigree (1,2,1,5,1)
  (same comment as for dithiocarbamate-compound)
- calcium carbonate, precipitated: 0.000316718 kg; lognormal variance with pedigree 0.0027, pedigree (1,2,1,5,1)
  (same comment as for dithiocarbamate-compound)
- sodium formate: 6.02972e-5 kg; lognormal variance with pedigree 0.0027, pedigree (1,2,1,5,1)
  (same comment as for dithiocarbamate-compound)
- EDTA, ethylenediaminetetraacetic acid: 9.08112e-5 kg; lognormal variance with pedigree 0.0027, pedigree (1,2,1,5,1)
  (same comment as for dithiocarbamate-compound)
- adipic acid: 8.88248e-9 kg; lognormal variance with pedigree 0.0032, pedigree (2,1,1,5,1)
  (same comment as for dithiocarbamate-compound)
- bark chips, wet, measured as dry mass: 0.0039551 kg; lognormal variance with pedigree 0.0052, pedigree (1,3,3,5,1)
  (same comment as for dithiocarbamate-compound)
- sodium sulfate, anhydrite: 5.64567e-5 kg; lognormal variance with pedigree 0.0027, pedigree (1,2,1,5,1)
  (same comment as for dithiocarbamate-compound)
- magnesium sulfate: 0.000449444 kg; lognormal variance with pedigree 0.0027, pedigree (1,2,1,5,1)
  (same comment as for dithiocarbamate-compound)
- malusil: 0.000272933 kg; lognormal variance with pedigree 0.0087, pedigree (2,2,1,5,1)
  (same comment as for dithiocarbamate-compound)
- sodium chlorate, powder: 0.00218092 kg; lognormal variance with pedigree 0.0027, pedigree (1,2,1,5,1)
  (same comment as for dithiocarbamate-compound)
- pulpwood, hardwood, measured as solid wood under bark: 0.000170759 m3; lognormal variance with pedigree 0.0052, pedigree (1,3,3,5,1)
  (same comment as for dithiocarbamate-compound)
- sawlog and veneer log, softwood, measured as solid wood under bark: 1.98651e-7 m3; lognormal variance with pedigree 0.0026, pedigree (1,1,1,5,1)
  (same comment as for dithiocarbamate-compound)
- sodium chloride, powder: 2.77775e-5 kg; lognormal variance with pedigree 0.0032, pedigree (2,1,1,5,1)
  (same comment as for dithiocarbamate-compound)
- spent antifreezer liquid: -6.11631e-9 kg; lognormal variance with pedigree 0.0026, pedigree (1,1,1,5,1)
  (same comment as for dithiocarbamate-compound)
  production volume 529.951 kg
- sugar, from sugar beet: 9.28684e-7 kg; lognormal variance with pedigree 0.0026, pedigree (1,1,1,5,1)
  (same comment as for dithiocarbamate-compound)
- pulp factory: 5.77382e-12 unit; lognormal variance with pedigree 0.478, pedigree (4,5,5,5,5)
  (same comment as for dithiocarbamate-compound)
- solvent, organic: 1.02561e-8 kg; lognormal variance with pedigree 0.0032, pedigree (2,1,1,5,1)
  (same comment as for dithiocarbamate-compound)
- wood chips, wet, measured as dry mass: 0.0272981 kg; lognormal variance with pedigree 0.0052, pedigree (1,3,3,5,1)
  (same comment as for dithiocarbamate-compound)
- electricity, medium voltage: 1.14234e-5, 0.00252426 kWh (2 entries); lognormal variance with pedigree 0.0026, pedigree (1,1,1,5,1)
  (same comment as for dithiocarbamate-compound)
- light fuel oil: 1.25785e-5, 1.81402e-6, 2.53864e-5, 1.68461e-6, 2.44094e-6 kg (5 entries); lognormal variance with pedigree 0.0027, pedigree (1,2,1,5,1)
  (same comment as for dithiocarbamate-compound)
- heavy fuel oil: 0.000580915, 0.000151336, 0.000448011, 8.8125e-5, 0.000113051 kg (5 entries); lognormal variance with pedigree 0.0027, pedigree (1,2,1,5,1)
  (same comment as for dithiocarbamate-compound)
- natural gas, high pressure: 4.37906e-5, 3.02946e-5, 5.04319e-5, 0.00102897, 0.000965558 m3 (5 entries); lognormal variance with pedigree 0.0027, pedigree (1,2,1,5,1)
  (same comment as for dithiocarbamate-compound)
- electricity, high voltage: 4.66489e-5, 8.49497e-6, 0.000145102, 0.00208897, 0.000336452 kWh (5 entries); lognormal variance with pedigree 0.0027, pedigree (1,2,1,5,1)
  (same comment as for dithiocarbamate-compound)
- sand: 1.13619e-9, 2.18854e-7, 1.42421e-5 kg (3 entries); lognormal variance with pedigree 0.0027, pedigree (1,2,1,5,1)
  (same comment as for dithiocarbamate-compound)
- waste packaging paper: -1.95847e-6, -2.99067e-7, -2.61507e-8, -1.08065e-6, -1.05373e-7, -1.95056e-7, -3.63817e-5 kg (7 entries); lognormal variance with pedigree 0.0027, pedigree (1,2,1,5,1)
  (same comment as for dithiocarbamate-compound)
  production volume 437854 kg
- tap water: 0.00258499, 0.000514248, 0.000337341, 0.00095956 kg (4 entries); lognormal variance with pedigree 0.0026, pedigree (1,1,1,5,1)
  (same comment as for dithiocarbamate-compound)
- bark: -0.00241411 kg; lognormal variance with pedigree 0.0027, pedigree (1,2,1,5,1)
  Data provided by industry (EPIS) 2017
  production volume 3.62438e8 kg
- wood pellet, measured as dry mass: 0.000541988 kg; lognormal variance with pedigree 0.0027, pedigree (1,2,1,5,1)
  Data provided by industry (EPIS) 2017, indicated in energy content. Calculation into mass/volume was done by using the following conversion factor: Wood pallets: MJ/kg 16.75. Source: http://www.fao.org/docrep/T0269e/t0269e0c.htm
- sulfur: 8.93607e-6 kg; lognormal variance with pedigree 0.0027, pedigree (1,2,1,5,1)
  Data provided by industry (EPIS) 2017
- sodium sulfite: 2.29087e-6 kg; lognormal variance with pedigree 0.0027, pedigree (1,2,1,5,1)
  Data provided by industry (EPIS) 2017
- ozone, liquid: 2.06178e-6 kg; lognormal variance with pedigree 0.0027, pedigree (1,2,1,5,1)
  Data provided by industry (EPIS) 2017
  Uncertainty: average from KCL EcoData
- heavy fuel oil: 0.00037591 kg; lognormal variance with pedigree 0.0027, pedigree (1,2,1,5,1)
  Data provided by industry (EPIS) 2017, indicated in energy content. Calculation into mass/volume was done by using the following conversion factor: Heavy fuel oil: MJ/kg 42.6. Source: http://www.fao.org/docrep/T0269e/t0269e0c.htm
  EcoSpold01Location=RER
- electricity, high voltage: 0.000129157, 0.000640178 kWh (2 entries); lognormal variance with pedigree 0.0027, pedigree (1,2,1,5,1)
  Data provided by industry (EPIS) 2017
- light fuel oil: 0.000234363 kg; lognormal variance with pedigree 0.0027, pedigree (1,2,1,5,1)
  Data provided by industry (EPIS) 2017, indicated in energy content. Calculation into mass/volume was done by using the following conversion factor: Light fuel oil: MJ/kg 43.5. Source: http://www.fao.org/docrep/T0269e/t0269e0c.htm
- natural gas, high pressure: 9.57359e-5, 2.11034e-5 m3 (2 entries); lognormal variance with pedigree 0.0027, pedigree (1,2,1,5,1)
  Data provided by industry (EPIS) 2017, indicated in energy content. Calculation into mass/volume was done by using the following conversion factor: Natural gas: MJ/m3 39. Source: Ecoinvent, during technical review.
  EcoSpold01Location=RER
- pulpwood, softwood, measured as solid wood under bark: 2.08913e-8, 2.37461e-6, 0.000240551 m3 (3 entries); lognormal variance with pedigree 0.0027, pedigree (1,2,1,5,1)
  EcoSpold01Location=RER
  Data provided by industry (EPIS) 2017; Represents wood sources explicitly: pine wood certified (major part) and pinus contorta certified
- printing ink, offset, without solvent, in 47.5% solution state: 1.68909e-5 kg; lognormal variance with pedigree 0.0099, pedigree (2,3,4,3,1)
  Calculated value: average ink consumption of three companies
- industrial machine, heavy, unspecified: 3.97219e-7 kg; lognormal variance with pedigree 0.0493, pedigree (5,3,4,3,1)
  Estimate value: Weight of offset printing equipment given by one of the companies indicating main material steal and furhter materials aluminium, rubber and electronics. Assumption comparable equipment weight in other companies and similar production as for industrial machines.
- thermoforming, with calendering: 7.25197e-7, 7.11405e-7 kg (2 entries); lognormal variance with pedigree 0.0967, pedigree (5,5,4,3,4)
  Estimate value: Assumed processing for rubber blankets.
- acrylic dispersion, without water, in 65% solution state: 2.1683e-6 kg; lognormal variance with pedigree 0.0099, pedigree (2,3,4,3,1)
  Calculated value: average consumption of three companies
- isopropanol: 3.97219e-6 kg; lognormal variance with pedigree 0.0099, pedigree (2,3,4,3,1)
  Calculated value: average Ispopropanol use of three companies (with low VOC consumption)
- white spirit: 1.10091e-5 kg; lognormal variance with pedigree 0.0113, pedigree (3,3,4,3,1)
  Calculate value: Average value for different petrol based cleaners of three companies. Only a portion is relied to the use of white spirit itself, the data set ist used also as estimate for the production of other petrol based mixtures. Except for mixtures containing VOCs with high boiling point all VOCs are assumed to be emitted to air. The less volatil content with high boiling VOCs is assumed to be delivered to a professional treatment. Heptan emissions represent emissions from white spirit. Methanol and Propylene oxide emissions represent the Methoxypropanol content and Toluol, Xylene and Ethylbenzol the content of solvent naphtha in furhter used mixtures.
- waste paperboard, unsorted: -0.000318363 kg
  production volume 3.1681e9 kg
- acrylic varnish, without water, in 87.5% solution state: 7.12442e-7 kg; lognormal variance with pedigree 0.0099, pedigree (2,3,4,3,1)
  Calculated value: average consumption of three companies
- textile, woven cotton: 1.01789e-6 kg; lognormal variance with pedigree 0.0573, pedigree (4,3,4,3,4)
  Calculated value: average consumption of textiles in printing process of three companies (including the portion of textile within rubber blankets)
- ethylene glycol monoethyl ether: 9.54782e-7 kg; lognormal variance with pedigree 0.0099, pedigree (2,3,4,3,1)
  Calculated value: Average consumption of three companies
- synthetic rubber: 6.4611e-7 kg; lognormal variance with pedigree 0.0513, pedigree (3,3,4,3,4)
  Calculated value: average consumption of rubber blankets of three companies. Assumptions on the portion of rubber and textile content derived from product declarations
- electricity, low voltage: 1.39994e-5, 2.45532e-6, 5.56869e-5, 0.000199652, 4.03754e-5, 0.000610593, 0.000100645, 0.000286685 kWh (8 entries); lognormal variance with pedigree 0.0099, pedigree (2,3,4,3,1)
  EcoSpold01Location=CH
  Calculated values: Average consumption of three companies
- corrugated board box: 1.86973e-6, 0.00015884 kg (2 entries); lognormal variance with pedigree 0.0099, pedigree (2,3,4,3,1)
  The
- heat, district or industrial, natural gas: 0.00345727, 0.00202638 MJ (2 entries); lognormal variance with pedigree 0.0099, pedigree (2,3,4,3,1)
  Calculated value: Average consumption of three companies
- spent solvent mixture: -7.0405e-7 kg; lognormal variance with pedigree 0.0113, pedigree (3,3,4,3,1)
  Estimate value: recovered solvent given declared only by one of tree companies. Recovery and professional waste treatment of 'non-voc wash' products assumed for the other companies.
  production volume 5.38792e7 kg
- waste emulsion paint: -4.21797e-8, -4.71654e-7 kg (2 entries); lognormal variance with pedigree 0.0099, pedigree (2,3,4,3,1)
  Calculated value: average value for disposal of paints of three companies
  production volume 1.01293e7 kg
- scrap steel: -5.61856e-7 kg; lognormal variance with pedigree 0.0367, pedigree (4,3,4,3,1)
  (same comment as for waste plastic, mixture)
- waste packaging paper: -4.14402e-5 kg; lognormal variance with pedigree 0.0007, pedigree (1,2,1,1,1)
  Data provided by industry (EPIS) 2017. Represents waste packaging such as corrugated containers, cartonboard etc. Can be also plastic or anything that is recyclable is separated and recycled, glass, metal, paper. Is produced in small side tasks of the overall pulp process in order to "keep the pulp site funktioning".
  production volume 146758 kg
- electricity, high voltage: 0.00364244 kWh; lognormal variance with pedigree 0.0007, pedigree (1,2,1,1,1)
  Data provided by industry (EPIS) 2017
- sodium sulfate, anhydrite: 6.63031e-5 kg; lognormal variance with pedigree 0.0007, pedigree (1,2,1,1,1)
  Data provided by industry (EPIS) 2017
- transport, freight train: 0.0419929 metric ton*km; lognormal variance with pedigree 0.0061, pedigree (1,2,1,1,1)
  Data provided by industry (EPIS) 2017
- hydrogen peroxide, without water, in 50% solution state: 0.00122932 kg; lognormal variance with pedigree 0.0007, pedigree (1,2,1,1,1)
  Data provided by industry (EPIS) 2017
  EcoSpold01Location=RER
- transport, freight, lorry >32 metric ton, EURO5: 0.0367499 metric ton*km; lognormal variance with pedigree 0.0061, pedigree (1,2,1,1,1)
  Data provided by industry (EPIS) 2017
- transport, freight, inland waterways, barge: 0.00685667 metric ton*km; lognormal variance with pedigree 0.0007, pedigree (1,2,1,1,1)
  Data provided by industry (EPIS) 2017
- light fuel oil: 0.000267196 kg; lognormal variance with pedigree 0.0007, pedigree (1,2,1,1,1)
  (same comment as for light fuel oil)
- sand: 1.84134e-5 kg; lognormal variance with pedigree 0.0007, pedigree (1,2,1,1,1)
  Data provided by industry (EPIS) 2017
- sodium formate: 6.26611e-5 kg; lognormal variance with pedigree 0.0007, pedigree (1,2,1,1,1)
  Data provided by industry (EPIS) 2017
- wood chips, dry, measured as dry mass: 0.0395659 kg; lognormal variance with pedigree 0.0007, pedigree (1,2,1,1,1)
  Data provided by industry (EPIS) 2017. Representing wood chips and lignin powder (scaled with heating value ratio)
- waste wood, untreated: -0.00211534 kg; lognormal variance with pedigree 0.0007, pedigree (1,2,1,1,1)
  Data provided by industry (EPIS) 2017. Represents bark and wood wastes
  production volume 1.86642e7 kg
- pulp factory: 5.68264e-12 unit; lognormal variance with pedigree 0.3021, pedigree (3,2,1,1,1)
  EcoSpold01Location=RER
  Own estimation with yearly production volume and a lifetime of a factory of 50 years;activityLink introduced to establish a direct link to the corresponding regional supply of this product
- limestone residue: -0.00105026 kg; lognormal variance with pedigree 0.0007, pedigree (1,2,1,1,1)
  EcoSpold01Location=CH
  Data provided by industry (EPIS) 2017; including lime kiln ash, lime mud and lime sludge
  production volume 5.52053e6 kg
- calcium carbonate, precipitated: 0.000373421 kg; lognormal variance with pedigree 0.0007, pedigree (1,2,1,1,1)
  Data provided by industry (EPIS) 2017
- heavy fuel oil: 0.00105376 kg; lognormal variance with pedigree 0.0007, pedigree (1,2,1,1,1)
  (same comment as for heavy fuel oil)
- sodium chlorate, powder: 0.00150497 kg; lognormal variance with pedigree 0.0007, pedigree (1,2,1,1,1)
  Data provided by industry (EPIS) 2017
  EcoSpold01Location=RER
- methanol, from biomass: 0.00017917 kg; lognormal variance with pedigree 0.0007, pedigree (1,2,1,1,1)
  Data provided by industry (EPIS) 2017. Represents biofuel from bark and tall oil pitch. Calculated from energetic value with conversion factor 23 MJ/kg
- pulpwood, hardwood, measured as solid wood under bark: 0.000211877 m3; lognormal variance with pedigree 0.0061, pedigree (1,2,1,1,1)
  Data provided by industry (EPIS) 2017; Represents birch wood
- natural gas, high pressure: 1.05996e-5 m3; lognormal variance with pedigree 0.0007, pedigree (1,2,1,1,1)
  (same comment as for natural gas, high pressure)
- sludge from pulp and paper production: -0.000154995, -1.14621e-7 kg (2 entries); lognormal variance with pedigree 0.0007, pedigree (1,2,1,1,1)
  Data provided by industry (EPIS) 2017
  production volume 2.42978e6 kg
- sodium sulfite: 2.29173e-6 kg; lognormal variance with pedigree 0.0007, pedigree (1,2,1,1,1)
  Data provided by industry (EPIS) 2017
- ozone, liquid: 2.06256e-6 kg; lognormal variance with pedigree 0.0007, pedigree (1,2,1,1,1)
  Data provided by industry (EPIS) 2017
  Uncertainty: average from KCL EcoData
- wood pellet, measured as dry mass: 0.000542191 kg; lognormal variance with pedigree 0.0007, pedigree (1,2,1,1,1)
  (same comment as for wood pellet, measured as dry mass)
- sodium hypochlorite, without water, in 15% solution state: 1.43501e-5 kg; lognormal variance with pedigree 0.0007, pedigree (1,2,1,1,1)
  Data provided by industry (EPIS) 2017
- pulpwood, softwood, measured as solid wood under bark: 0.00015515 m3; lognormal variance with pedigree 0.0007, pedigree (1,2,1,1,1)
  Data provided by industry (EPIS) 2017; Represents wood sources explicitly: pine wood certified (major part) and pinus contorta certified
  EcoSpold01Location=RER
- pulpwood, softwood, measured as solid wood under bark: 8.78878e-5 m3; lognormal variance with pedigree 0.0007, pedigree (1,2,1,1,1)
  Data provided by industry (EPIS) 2017; Source explicitly spruce wood certified
- wood ash mixture, pure: -0.000117066, -2.38994e-6 kg (2 entries); lognormal variance with pedigree 0.0007, pedigree (1,2,1,1,1)
  Data provided by industry (EPIS) 2017; Represents 0.002058kg "fiber reject".
  EcoSpold01Location=CH
  production volume 1.6263e7 kg
- hydrogen, liquid: 9.80883e-6 kg; lognormal variance with pedigree 0.0059, pedigree (2,4,3,3,2)
  Estimated value. Measured/calculated value for Quebec is extrapolated for GLO.
- paper, woodfree, coated: 0.00248742 kg; lognormal variance with pedigree 0.002, pedigree (1,1,3,1,1)
  Estimated value. Measured/calculated value for Quebec is extrapolated for GLO.
  Uncertainty: Calculated variable. Uncertainty will be determined from propagation of uncertainty factors of underlying variables. Uncertainty of actual relation between variables not accounted at this time, although this could be included in a future update.
- waste reinforced concrete: -0.00347858 kg; lognormal variance with pedigree 0.21, pedigree (5,5,5,5,5)
  Estimated value. Same amount entering the dataset is estimated as by-product
  production volume 1.53158e8 kg
- carbon dioxide, liquid: 1.10961e-7 kg; lognormal variance with pedigree 0.0053, pedigree (2,4,3,3,1)
  Estimated value. Measured/calculated value for Quebec is extrapolated for GLO.
- transport, freight, light commercial vehicle: 1.24077e-5, 5.09131e-7, 1.18984e-5 metric ton*km (3 entries); lognormal variance with pedigree 0.0059, pedigree (2,4,3,3,2)
  (same comment as for transport, helicopter)
- anionic resin: 2.47817e-10 kg; lognormal variance with pedigree 0.0059, pedigree (2,4,3,3,2)
  Estimated value. Measured/calculated value for Quebec is extrapolated for GLO.
- cationic resin: 9.88163e-11 kg; lognormal variance with pedigree 0.0059, pedigree (2,4,3,3,2)
  Estimated value. Measured/calculated value for Quebec is extrapolated for GLO.
- nitrogen, liquid: 1.3819e-7 kg; lognormal variance with pedigree 0.0059, pedigree (2,4,3,3,2)
  Estimated value. Measured/calculated value for Quebec is extrapolated for GLO.
- transport, freight, lorry, unspecified: 2.33995e-5, 2.33991e-5 metric ton*km (2 entries); lognormal variance with pedigree 0.1253, pedigree (2,4,3,3,2)
  (same comment as for transport, helicopter)
- transport, passenger car: 1.04638e-5 km; lognormal variance with pedigree 0.0059, pedigree (2,4,3,3,2)
  (same comment as for transport, helicopter)
- hydrazine: 8.37311e-8 kg; lognormal variance with pedigree 0.0059, pedigree (2,4,3,3,2)
  Estimated value. Measured/calculated value for Quebec is extrapolated for GLO.
- fly ash and scrubber sludge: -5.92244e-6 kg; lognormal variance with pedigree 0.0059, pedigree (2,4,3,3,2)
  Estimated value. Measured/calculated value for Quebec is extrapolated for GLO.
  production volume 260758 kg
- chlorodifluoromethane: 7.0797e-9 kg; lognormal variance with pedigree 0.0059, pedigree (2,4,3,3,2)
  Estimated value. Measured/calculated value for Quebec is extrapolated for GLO.
- municipal solid waste: -4.60181e-6 kg; lognormal variance with pedigree 0.0059, pedigree (2,4,3,3,2)
  Estimated value. Measured/calculated value for Quebec is extrapolated for GLO.
  production volume 202612 kg
- sodium percarbonate, powder: 3.94829e-7 kg; lognormal variance with pedigree 0.0059, pedigree (2,4,3,3,2)
  Estimated value. Measured/calculated value for Quebec is extrapolated for GLO.
- chlorine, liquid: 6.2595e-7 kg; lognormal variance with pedigree 0.0059, pedigree (2,4,3,3,2)
  Estimated value. Measured/calculated value for Quebec is extrapolated for GLO.
- hard coal: 0.000218588 kg; lognormal variance with pedigree 0.0032, pedigree (1,3,3,1,1)
  Amount and activity link based on primary data collected from participating companies.
- ethoxylated alcohol (AE11): 1.28002e-7 kg; lognormal variance with pedigree 0.0032, pedigree (1,3,3,1,1)
  Amount based on primary data collected from participating companies.
- aluminium scrap, post-consumer: -1.26773e-7 kg; lognormal variance with pedigree 0.0032, pedigree (1,3,3,1,1)
  Amount based on primary data collected from participating companies.
  production volume 87573.2 kg
- aluminium scrap, new: -8.20853e-7 kg; lognormal variance with pedigree 0.2106, pedigree (5,5,5,5,5)
  Estimated value. This flow was added to the GLO dataset to make it consistent with the Peru (PE) regional one. As it is assumed not to be representative of the processes for which data was collected for this dataset, the amount was scaled down based on the ratio between the zinc production volumes of the PE and GLO datasets.
- zinc oxide: 0.00086842 kg; lognormal variance with pedigree 0.0032, pedigree (1,3,3,1,1)
  Amount based on primary data collected from participating companies.
- coke: 0.0126391 MJ; lognormal variance with pedigree 0.0032, pedigree (1,3,3,1,1)
  Amount and activity link based on primary data collected from participating companies.
- transport, freight, sea, container ship: 0.000650554 metric ton*km; lognormal variance with pedigree 0.1226, pedigree (1,3,3,1,1)
  Amount based on primary data collected from participating companies.
- zinc: 5.26703e-5 kg; lognormal variance with pedigree 0.0032, pedigree (1,3,3,1,1)
  Amount based on primary data collected from participating companies.
- transport, freight, lorry 3.5-7.5 metric ton, EURO3: 8.18514e-9 metric ton*km; lognormal variance with pedigree 0.1226, pedigree (1,3,3,1,1)
  Inbound transport of zinc concentrate and other materials to sites. Amount and activity link based on primary data collected from participating companies.
- transport, freight, lorry >32 metric ton, EURO3: 5.27241e-5 metric ton*km; lognormal variance with pedigree 0.1226, pedigree (1,3,3,1,1)
  (same comment as for transport, freight, lorry 3.5-7.5 metric ton, EURO3)
- sulfamic acid: 4.82505e-9 kg; lognormal variance with pedigree 0.0032, pedigree (1,3,3,1,1)
  Amount based on primary data collected from participating companies.
- anode, for metal electrolysis: 1.22556e-6 kg; lognormal variance with pedigree 0.0032, pedigree (1,3,3,1,1)
  Amount based on primary data collected from participating companies.
- transport, freight, lorry 16-32 metric ton, EURO4: 5.95469e-6 metric ton*km; lognormal variance with pedigree 0.1226, pedigree (1,3,3,1,1)
  (same comment as for transport, freight, lorry 3.5-7.5 metric ton, EURO3)
- butane: 6.78786e-7 kg; lognormal variance with pedigree 0.0032, pedigree (1,3,3,1,1)
  Amount based on primary data collected from participating companies.
- transport, freight train: 0.000142902 metric ton*km; lognormal variance with pedigree 0.1226, pedigree (1,3,3,1,1)
  (same comment as for transport, freight, lorry 3.5-7.5 metric ton, EURO3)
- antimony: 8.43242e-8 kg; lognormal variance with pedigree 0.0032, pedigree (1,3,3,1,1)
  Amount based on primary data collected from participating companies.
- sulfite pulp, bleached: 9.85e-6 kg; lognormal variance with pedigree 0.0032, pedigree (1,3,3,1,1)
  Amount based on primary data collected from participating companies.
- barium carbonate: 2.17127e-6 kg; lognormal variance with pedigree 0.0032, pedigree (1,3,3,1,1)
  Amount based on primary data collected from participating companies.
- sodium silicate, without water, in 37% solution state: 3.53616e-7 kg; lognormal variance with pedigree 0.0032, pedigree (1,3,3,1,1)
  Amount based on primary data collected from participating companies.
- aluminium, cast alloy: 2.98874e-6 kg; lognormal variance with pedigree 0.0032, pedigree (1,3,3,1,1)
  Amount based on primary data collected from participating companies.
- activated silica: 6.63541e-5 kg; lognormal variance with pedigree 0.0032, pedigree (1,3,3,1,1)
  Amount based on primary data collected from participating companies.
- sodium hydrosulfide: 2.1684e-5 kg; lognormal variance with pedigree 0.0032, pedigree (1,3,3,1,1)
  Amount based on primary data collected from participating companies.
- silica sand: 0.000414626 kg; lognormal variance with pedigree 0.0032, pedigree (1,3,3,1,1)
  Amount based on primary data collected from participating companies.
- waste plastic, mixture: -2.04868e-7 kg; lognormal variance with pedigree 0.0032, pedigree (1,3,3,1,1)
  Amount and activity link based on primary data collected from participating companies.
  production volume 141520 kg
- waste glass: -1.27238e-7 kg; lognormal variance with pedigree 0.0032, pedigree (1,3,3,1,1)
  Amount and activity link based on primary data collected from participating companies.
  production volume 87894.3 kg
- petroleum coke: 7.28747e-7 kg; lognormal variance with pedigree 0.0032, pedigree (1,3,3,1,1)
  Amount based on primary data collected from participating companies.
- nitrogen, liquid: 0.000113168 kg; lognormal variance with pedigree 0.0032, pedigree (1,3,3,1,1)
  Amount and activity link based on primary data collected from participating companies.
- municipal solid waste: -0.00271775 kg; lognormal variance with pedigree 0.0032, pedigree (1,3,3,1,1)
  Amount and activity link based on primary data collected from participating companies.
  production volume 1.87739e9 kg
- manganese sulfate: 7.86865e-8 kg; lognormal variance with pedigree 0.0032, pedigree (1,3,3,1,1)
  Amount based on primary data collected from participating companies.
- municipal solid waste: -0.000603132 kg; lognormal variance with pedigree 0.0032, pedigree (1,3,3,1,1)
  Amount and activity link based on primary data collected from participating companies.
  production volume 4.16636e8 kg
- lead concentrate: 0.000378946 kg; lognormal variance with pedigree 0.0032, pedigree (1,3,3,1,1)
  Amount based on primary data collected from participating companies.
- iron(III) sulfate, without water, in 12.5% iron solution state: 5.30756e-6 kg; lognormal variance with pedigree 0.0032, pedigree (1,3,3,1,1)
  Amount based on primary data collected from participating companies.
- magnesium: 1.29977e-7 kg; lognormal variance with pedigree 0.0032, pedigree (1,3,3,1,1)
  Amount based on primary data collected from participating companies.
- iron(III) chloride, without water, in 14% iron solution state: 1.27374e-6 kg; lognormal variance with pedigree 0.0032, pedigree (1,3,3,1,1)
  Amount based on primary data collected from participating companies.
- ferrite: 1.46568e-5 kg; lognormal variance with pedigree 0.0032, pedigree (1,3,3,1,1)
  Amount based on primary data collected from participating companies.
- ethanol, without water, in 99.7% solution state, from ethylene: 6.35045e-7, 1.41405e-6 kg (2 entries); lognormal variance with pedigree 0.0032, pedigree (1,3,3,1,1)
  Amount based on primary data collected from participating companies.
- water, deionised: 9.90294e-5, 0.02751, 0.0893063 kg (3 entries); lognormal variance with pedigree 0.0032, pedigree (1,3,3,1,1)
  Amount based on primary data collected from participating companies.
- clinker: 3.2898e-5, 7.41458e-6, 1.71984e-6, 1.31955e-6, 2.20477e-6, 5.36757e-7, 0.000104545 kg (7 entries); lognormal variance with pedigree 0.0032, pedigree (1,3,3,1,1)
  Amount based on primary data collected from participating companies.
- diesel: 9.82121e-6, 4.72146e-7, 1.98214e-5, 1.38841e-6, 2.00678e-6, 0.000195727 kg (6 entries); lognormal variance with pedigree 0.0032, pedigree (1,3,3,1,1)
  Amount based on primary data collected from participating companies. Emissions from diesel combustion included in dataset.
- tap water: 0.000732173 kg; lognormal variance with pedigree 0.0032, pedigree (1,3,3,1,1)
  Amount based on primary data collected from participating companies.
- cement, unspecified: 2.76684e-6, 2.29356e-7, 5.77624e-7, 1.32976e-5, 1.30632e-5, 3.84487e-7, 4.22281e-6, 5.10912e-7, 5.70653e-5 kg (9 entries); lognormal variance with pedigree 0.0032, pedigree (1,3,3,1,1)
  Amount based on primary data collected from participating companies.
- ammonia, liquid: 4.75234e-5, 0.000416085 kg (2 entries); lognormal variance with pedigree 0.0032, pedigree (1,3,3,1,1)
  Amount based on primary data collected from participating companies.
- steam, in chemical industry: 2.9067e-8, 1.64861e-7 kg (2 entries); lognormal variance with pedigree 0.0032, pedigree (1,3,3,1,1)
  Amount based on primary data collected from participating companies.
- waste textile, soiled: -9.92238e-7 kg; lognormal variance with pedigree 0.0032, pedigree (1,3,3,1,1)
  Amount based on primary data collected from participating companies.
  production volume 4.64799e7 kg
- wastewater, average: -3.24473e-8, -2.99935e-7, -6.27528e-7 m3 (3 entries); lognormal variance with pedigree 0.0032, pedigree (1,3,3,1,1)
  Amount based on primary data collected from participating companies.
  production volume 663094 m3
- waste paperboard: -6.18396e-9, -9.44318e-10, -8.25721e-11, -3.41222e-9, -3.3272e-10, -6.15899e-10, -1.5187e-8, -1.14877e-7 kg (8 entries); lognormal variance with pedigree 0.0032, pedigree (1,3,3,1,1)
  Amount based on primary data collected from participating companies.
  production volume 97840.1 kg
- waste gypsum: -1.64314e-7, -3.47601e-6, -1.13173e-5 kg (3 entries); lognormal variance with pedigree 0.0032, pedigree (1,3,3,1,1)
  Amount based on primary data collected from participating companies.
  production volume 1.03326e7 kg
- waste glass: -1.05269e-7, -9.70242e-9, -2.20115e-10, -9.05222e-10, -1.37463e-9, -4.05053e-9, -1.99961e-7 kg (7 entries); lognormal variance with pedigree 0.0032, pedigree (1,3,3,1,1)
  Amount based on primary data collected from participating companies.
  production volume 221572 kg
- sludge, pig iron production: -2.31718e-7, -5.22356e-6, -2.53407e-5 kg (3 entries); lognormal variance with pedigree 0.0032, pedigree (1,3,3,1,1)
  Amount based on primary data collected from participating companies.
  production volume 2.12735e7 kg
- waste polyethylene terephthalate: -9.32423e-10, -6.23009e-11, -4.71172e-12, -2.57325e-11, -1.03956e-11, -2.44354e-11, -8.08115e-10, -6.52748e-9 kg (8 entries); lognormal variance with pedigree 0.0032, pedigree (1,3,3,1,1)
  Amount based on primary data collected from participating companies.
  production volume 5799.57 kg
- meat and bone meal: 1.04768e-10, 6.21384e-8 kg (2 entries); lognormal variance with pedigree 0.0032, pedigree (1,3,3,1,1)
  Amount based on primary data collected from participating companies.
- liquefied petroleum gas: 1.48247e-7, 1.29182e-6, 5.2655e-7, 4.65384e-8, 1.03584e-8, 6.56993e-9, 2.2191e-6 kg (7 entries); lognormal variance with pedigree 0.0032, pedigree (1,3,3,1,1)
  Amount based on primary data collected from participating companies.
- hydrochloric acid, without water, in 30% solution state: 8.56232e-7 kg; lognormal variance with pedigree 0.0032, pedigree (1,3,3,1,1)
  Amount based on primary data collected from participating companies.
- hard coal: 1.68512e-5, 4.53458e-5, 2.78412e-5, 2.72825e-5, 6.47394e-6, 2.12418e-5, 1.18398e-5, 6.01686e-5 kg (8 entries); lognormal variance with pedigree 0.0032, pedigree (1,3,3,1,1)
  Amount based on primary data collected from participating companies.
- esterquat: 7.88913e-9, 1.57045e-8 kg (2 entries); lognormal variance with pedigree 0.0032, pedigree (1,3,3,1,1)
  Amount based on primary data collected from participating companies.
- acrylic dispersion, without water, in 65% solution state: 2.12707e-6 kg; lognormal variance with pedigree 0.0098, pedigree (2,3,4,1,1)
  Calculated value: average consumption of three companies
- ethylene glycol monoethyl ether: 9.36624e-7 kg; lognormal variance with pedigree 0.0098, pedigree (2,3,4,1,1)
  Calculated value: Average consumption of three companies
- electricity, low voltage: 0.00128518 kWh; lognormal variance with pedigree 0.0098, pedigree (2,3,4,1,1)
  EcoSpold01Location=CH
  Calculated values: Average consumption of three companies
- heat, district or industrial, natural gas: 0.00282417 MJ; lognormal variance with pedigree 0.0098, pedigree (2,3,4,1,1)
  Calculated value: Average consumption of three companies
- sheet rolling, aluminium: 4.45075e-5 kg; lognormal variance with pedigree 0.1767, pedigree (5,5,4,3,5)
  Estimate value: assumed processing for the production of printing plates
- spent solvent mixture: -2.68118e-6 kg; lognormal variance with pedigree 0.0113, pedigree (3,3,4,3,1)
  (same comment as for spent solvent mixture)
  production volume 830.76 kg
- acrylic varnish, without water, in 87.5% solution state: 6.98893e-7 kg; lognormal variance with pedigree 0.0098, pedigree (2,3,4,1,1)
  Calculated value: average consumption of three companies
- isopropanol: 3.89664e-6 kg; lognormal variance with pedigree 0.0098, pedigree (2,3,4,1,1)
  Calculated value: average Ispopropanol use of three companies (with low VOC consumption)
- waste emulsion paint: -5.04061e-7 kg; lognormal variance with pedigree 0.0099, pedigree (2,3,4,3,1)
  Calculated value: average value for disposal of paints of three companies
  production volume 156.183 kg
- printing ink, offset, without solvent, in 47.5% solution state: 1.65697e-5 kg; lognormal variance with pedigree 0.0098, pedigree (2,3,4,1,1)
  Calculated value: average ink consumption of three companies
- industrial machine, heavy, unspecified: 3.89664e-7 kg; lognormal variance with pedigree 0.0086, pedigree (1,1,4,1,1)
  (same comment as for industrial machine, heavy, unspecified)
- corrugated board box: 0.000157653 kg; lognormal variance with pedigree 0.0098, pedigree (2,3,4,1,1)
  The
- scrap steel: -5.61847e-7 kg; lognormal variance with pedigree 0.21, pedigree (5,5,5,5,5)
  Estimated value. Same amount entering the dataset is estimated as by-product
  production volume 17009.5 kg
- waste reinforced concrete: -0.00347853 kg; lognormal variance with pedigree 0.21, pedigree (5,5,5,5,5)
  Estimated value. Same amount entering the dataset is estimated as by-product
  production volume 1.0531e8 kg
- fly ash and scrubber sludge: -5.92235e-6 kg; lognormal variance with pedigree 0.0059, pedigree (2,4,3,3,2)
  Estimated value. Measured/calculated value for Quebec is extrapolated for GLO.
  production volume 179295 kg
- municipal solid waste: -2.39585e-8, -7.02824e-8, -4.32572e-8, -7.60012e-8, -7.67372e-8, -7.34708e-8, -5.64429e-7, -7.18327e-8, -9.1716e-9, -4.80721e-7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 kg (35 entries); lognormal variance with pedigree 0.0059, pedigree (2,4,3,3,2)
  Estimated value. Measured/calculated value for Quebec is extrapolated for GLO.
  production volume 139307 kg

## Inputs from nature
- Water, cooling, unspecified natural origin [natural resource, in water]: 0.651086 m3; name water_cooling_UNO_input; lognormal variance with pedigree 0.0413, pedigree (2,3,5,3,1)
  Data from 1 European producer
  Uncertainty: data from 1 European producer
- Water, unspecified natural origin [natural resource, in water]: 0.0257577 m3; name water_UNO_input; lognormal variance with pedigree 0.0413, pedigree (2,3,5,3,1)
  Data from 1 European producer
  Uncertainty: data from 1 European producer
- Water, river [natural resource, in water]: 0.0772091 m3; lognormal variance with pedigree 0.0041, pedigree (2,4,2,3,2)
  Estimated value. This figure have been taken from the CA (Quebec) dataset
- Dolomite, in ground [natural resource, in ground]: 1.03123e-7 kg; lognormal variance with pedigree 0.0032, pedigree (1,3,3,1,1)
  Amount and activity link based on primary data collected from participating companies.
- Water, lake [natural resource, in water]: 3.32099e-5 m3; lognormal variance with pedigree 0.0032, pedigree (1,3,3,1,1)
  Amount and activity link based on primary data collected from participating companies.
- Sulfur, in ground [natural resource, in ground]: 0.000319858 kg; lognormal variance with pedigree 0.0032, pedigree (1,3,3,1,1)
  Amount and activity link based on primary data collected from participating companies.
- Strontium, in ground [natural resource, in ground]: 1.30952e-6 kg; lognormal variance with pedigree 0.0032, pedigree (1,3,3,1,1)
  Amount and activity link based on primary data collected from participating companies.
- Copper, in ground [natural resource, in ground]: 0.000751876 kg; lognormal variance with pedigree 0.0032, pedigree (1,3,3,1,1)
  Amount and activity link based on primary data collected from participating companies.
- Aluminium, in ground [natural resource, in ground]: 9.71462e-5 kg; lognormal variance with pedigree 0.0032, pedigree (1,3,3,1,1)
  Amount and activity link based on primary data collected from participating companies.
- Gangue, in ground [natural resource, in ground]: 0.909464 kg; lognormal variance with pedigree 0.0032, pedigree (1,3,3,1,1)
  Amount and activity link based on primary data collected from participating companies.
- Gold, in ground [natural resource, in ground]: 6.25402e-5 kg; lognormal variance with pedigree 0.0032, pedigree (1,3,3,1,1)
  Amount and activity link based on primary data collected from participating companies.
- Vanadium, in ground [natural resource, in ground]: 1.24265e-7 kg; lognormal variance with pedigree 0.0032, pedigree (1,3,3,1,1)
  Amount and activity link based on primary data collected from participating companies.
- Zinc, in ground [natural resource, in ground]: 0.0271833 kg; lognormal variance with pedigree 0.0032, pedigree (1,3,3,1,1)
  Amount and activity link based on primary data collected from participating companies.
- Titanium, in ground [natural resource, in ground]: 4.58799e-6 kg; lognormal variance with pedigree 0.0032, pedigree (1,3,3,1,1)
  Amount and activity link based on primary data collected from participating companies.
- Sodium, in ground [natural resource, in ground]: 3.71496e-6 kg; lognormal variance with pedigree 0.0032, pedigree (1,3,3,1,1)
  Amount and activity link based on primary data collected from participating companies.
- Nickel, in ground [natural resource, in ground]: 7.31845e-8 kg; lognormal variance with pedigree 0.0032, pedigree (1,3,3,1,1)
  Amount and activity link based on primary data collected from participating companies.
- Silver, in ground [natural resource, in ground]: 9.92704e-6 kg; lognormal variance with pedigree 0.0032, pedigree (1,3,3,1,1)
  Amount and activity link based on primary data collected from participating companies.
- Potassium, in ground [natural resource, in ground]: 0.000121665 kg; lognormal variance with pedigree 0.0032, pedigree (1,3,3,1,1)
  Amount and activity link based on primary data collected from participating companies.
- Manganese, in ground [natural resource, in ground]: 7.02738e-6 kg; lognormal variance with pedigree 0.0032, pedigree (1,3,3,1,1)
  Amount and activity link based on primary data collected from participating companies.
- Magnesium, in ground [natural resource, in ground]: 0.00192992 kg; lognormal variance with pedigree 0.0032, pedigree (1,3,3,1,1)
  Amount and activity link based on primary data collected from participating companies.
- Phosphorus, in ground [natural resource, in ground]: 8.30296e-7 kg; lognormal variance with pedigree 0.0032, pedigree (1,3,3,1,1)
  Amount and activity link based on primary data collected from participating companies.
- Iron, in ground [natural resource, in ground]: 0.000121851 kg; lognormal variance with pedigree 0.0032, pedigree (1,3,3,1,1)
  Amount and activity link based on primary data collected from participating companies.
- Mercury, in ground [natural resource, in ground]: 9.90035e-10 kg; lognormal variance with pedigree 0.0032, pedigree (1,3,3,1,1)
  Amount and activity link based on primary data collected from participating companies.
- Lead, in ground [natural resource, in ground]: 0.00581215 kg; lognormal variance with pedigree 0.0032, pedigree (1,3,3,1,1)
  Amount and activity link based on primary data collected from participating companies.
- Sand, unspecified, in ground [natural resource, in ground]: 4.88432e-6 kg; lognormal variance with pedigree 0.0032, pedigree (1,3,3,1,1)
  Amount and activity link based on primary data collected from participating companies.
- Cadmium, in ground [natural resource, in ground]: 3.19486e-6 kg; lognormal variance with pedigree 0.0032, pedigree (1,3,3,1,1)
  Amount and activity link based on primary data collected from participating companies.
- Calcium, in ground [natural resource, in ground]: 0.00337615 kg; lognormal variance with pedigree 0.0032, pedigree (1,3,3,1,1)
  Amount and activity link based on primary data collected from participating companies.
- Barium, in ground [natural resource, in ground]: 5.16381e-7 kg; lognormal variance with pedigree 0.0032, pedigree (1,3,3,1,1)
  Amount and activity link based on primary data collected from participating companies.
- Water, well, in ground [natural resource, in water]: 0.000104575 m3; lognormal variance with pedigree 0.0032, pedigree (1,3,3,1,1)
  Amount and activity link based on primary data collected from participating companies.
- Chromium, in ground [natural resource, in ground]: 1.19993e-7 kg; lognormal variance with pedigree 0.0032, pedigree (1,3,3,1,1)
  Amount and activity link based on primary data collected from participating companies.
- Occupation, inland waterbody, unspecified [natural resource, land]: 8.54978e-5 m2*year; lognormal variance with pedigree 0.002, pedigree (1,1,3,1,1)
  Calculated Value. Land use of the different ponds : tailings pond, wastewater treatment sludge pond and Jarofix disposal site.
  Uncertainty: Calculated variable. Uncertainty will be determined from propagation of uncertainty factors of underlying variables. Uncertainty of actual relation between variables not accounted for at this time, although this could be included in a future update.
- Transformation, to inland waterbody, unspecified [natural resource, land]: 8.54978e-7 m2; lognormal variance with pedigree 0.002, pedigree (1,1,3,1,1)
  (same comment as for Occupation, inland waterbody, unspecified)
- Transformation, from unspecified [natural resource, land]: 8.54978e-7 m2; lognormal variance with pedigree 0.002, pedigree (1,1,3,1,1)
  (same comment as for Occupation, inland waterbody, unspecified)
## Emissions to nature
- Water [water, unspecified]: 0.0161417 m3; name water_to_water_unspecified; = water_cooling_UNO_input*(1-fraction_CW_to_air)+water_UNO_input*(1-fraction_PW_to_air); lognormal variance with pedigree 0.0807, pedigree (2,2,5,1,1)
  Calculated value based on literature values and expert opinion. See comments in the parametres' comment field.
  property wet mass 1000 kg; name WM
  property dry mass 0 kg; name DM
  property water in wet mass 1000 kg; name WWM
  property carbon content, fossil 0; name C_content_fossil
  property fraction, origin: salt water 0; name fraction_origin_salt_water_Ww
  property fraction, origin: fresh water 0; name fraction_origin_fresh_water_Ww
  property fraction, origin: unspecified 1; name fraction_origin_unspecified_Ww
  property carbon content, non-fossil 0; name C_content_non_fossil
- BOD5, Biological Oxygen Demand [water, surface water]: 0.000106333 kg; lognormal variance with pedigree 0.0813, pedigree (2,3,5,3,1)
  Data from 1 European producer
  Uncertainty: data from 1 European producer
- Water [air, unspecified]: 0.01064 m3; name water_to_air_unspecified; = (water_cooling_UNO_input*fraction_CW_to_air)+(water_UNO_input*fraction_PW_to_air); lognormal variance with pedigree 0.0807, pedigree (2,2,5,1,1)
  (same comment as for Water)
  property fraction, origin: unspecified 1; name fraction_origin_unspecified
  property fraction, origin: salt water 0; name fraction_origin_salt_water
  property fraction, origin: fresh water 0; name fraction_origin_fresh_water
- TOC, Total Organic Carbon [water, surface water]: 0.00122121 kg; lognormal variance with pedigree 0.0813, pedigree (2,3,5,3,1)
  Calculated by default as TOC (gC) = COD/2.7 (COD measured in g O2). Should more correctly be calculated from the carbon content of the specified emissions to water.
  Uncertainty: data from 1 European producer
- DOC, Dissolved Organic Carbon [water, surface water]: 0.00122121 kg; lognormal variance with pedigree 0.0813, pedigree (2,3,5,3,1)
  Calculated as equal to TOC.
  Uncertainty: data from 1 European producer
- Phosphorus [water, surface water]: 4.625e-6 kg; lognormal variance with pedigree 0.0813, pedigree (2,3,5,3,1)
  Data from 1 European producer
  Uncertainty: data from 1 European producer
- Carbon dioxide, fossil [air, urban air close to ground]: 0.0171028 kg; lognormal variance with pedigree 0.0413, pedigree (2,3,5,3,1)
  Data from 1 European producer
  Uncertainty: data from 1 European producer
- Nitrogen oxides [air, urban air close to ground]: 0.000357818 kg; lognormal variance with pedigree 0.0813, pedigree (2,3,5,3,1)
  Data from 1 European producer
  Uncertainty: data from 1 European producer
- Sulfur dioxide [air, urban air close to ground]: 7.52398e-5 kg; lognormal variance with pedigree 0.0413, pedigree (2,3,5,3,1)
  Data from 1 European producer
  Uncertainty: data from 1 European producer
- Nitrogen [water, surface water]: 3.12828e-5 kg; lognormal variance with pedigree 0.0813, pedigree (2,3,5,3,1)
  Data from 1 European producer
  Uncertainty: data from 1 European producer
- Hydrogen sulfide [air, urban air close to ground]: 1.18551e-5 kg; lognormal variance with pedigree 0.0813, pedigree (2,3,5,3,1)
  Data from 1 European producer
  Uncertainty: data from 1 European producer
- COD, Chemical Oxygen Demand [water, surface water]: 0.00335184 kg; lognormal variance with pedigree 0.0813, pedigree (2,3,5,3,1)
  Calculated as 2*BOD5.
  Uncertainty: data from 1 European producer
- Suspended solids, unspecified [water, surface water]: 0.000286846 kg; lognormal variance with pedigree 0.0813, pedigree (2,3,5,3,1)
  Data from 1 European producer
  Uncertainty: data from 1 European producer
- Carbon-14 [water, surface water]: 0.0112195 kBq; lognormal variance with pedigree 0.0041, pedigree (2,4,2,3,2)
  Estimated value. This figure have been taken from the CA (Quebec) dataset. Measured/calculated value for Quebec is extrapolated for AR.
- Ruthenium-103 [water, surface water]: 1.11635e-6 kBq; lognormal variance with pedigree 0.4706, pedigree (2,5,5,5,5)
  Estimated value. This figure have been taken from the CA (Quebec) dataset. Value extrapolated from a different PWR technology.
- Sodium-24 [water, surface water]: 3.90918e-5 kBq; lognormal variance with pedigree 0.4706, pedigree (2,5,5,5,5)
  (same comment as for Ruthenium-103)
- Carbon-14 [air, non-urban air or from high stacks]: 9.62914e-5 kBq; lognormal variance with pedigree 0.3035, pedigree (2,4,2,3,2)
  Estimated value. This figure have been taken from the CA (Quebec) dataset
- Silver-110 [water, surface water]: 1.73524e-5 kBq; lognormal variance with pedigree 0.4706, pedigree (2,5,5,5,5)
  (same comment as for Ruthenium-103)
- Cerium-141 [water, surface water]: 6.89394e-7 kBq; lognormal variance with pedigree 0.4706, pedigree (2,5,5,5,5)
  (same comment as for Ruthenium-103)
- Cesium-136 [water, surface water]: 1.10068e-6 kBq; lognormal variance with pedigree 0.4706, pedigree (2,5,5,5,5)
  (same comment as for Ruthenium-103)
- Cobalt-57 [water, surface water]: 3.49397e-5 kBq; lognormal variance with pedigree 0.4706, pedigree (2,5,5,5,5)
  (same comment as for Ruthenium-103)
- Cesium-137 [air, non-urban air or from high stacks]: 2.85158e-8 kBq; lognormal variance with pedigree 0.4706, pedigree (2,5,5,5,5)
  (same comment as for Ruthenium-103)
- Antimony-122 [water, surface water]: 3.54098e-6 kBq; lognormal variance with pedigree 0.4706, pedigree (2,5,5,5,5)
  (same comment as for Ruthenium-103)
- Manganese-54 [water, surface water]: 5.13129e-5 kBq; lognormal variance with pedigree 0.4706, pedigree (2,5,5,5,5)
  (same comment as for Ruthenium-103)
- Antimony-125 [water, surface water]: 0.000163339 kBq; lognormal variance with pedigree 0.4706, pedigree (2,5,5,5,5)
  (same comment as for Ruthenium-103)
- Niobium-95 [air, non-urban air or from high stacks]: 0.112195 kBq; lognormal variance with pedigree 0.0041, pedigree (2,4,2,3,2)
  Estimated value. This figure have been taken from the CA (Quebec) dataset
- Silver-110 [air, non-urban air or from high stacks]: 1.22602e-8 kBq; lognormal variance with pedigree 0.4706, pedigree (2,5,5,5,5)
  (same comment as for Ruthenium-103)
- Cobalt-60 [water, surface water]: 0.00274496 kBq; lognormal variance with pedigree 0.0041, pedigree (2,4,2,3,2)
  (same comment as for Carbon-14)
- Zirconium-95 [water, surface water]: 0.0457493 kBq; lognormal variance with pedigree 0.3035, pedigree (2,4,2,3,2)
  Estimated value. This figure have been taken from the CA (Quebec) dataset
- Barium-140 [air, non-urban air or from high stacks]: 1.24169e-9 kBq; lognormal variance with pedigree 0.4706, pedigree (2,5,5,5,5)
  (same comment as for Ruthenium-103)
- Xenon-135 [air, non-urban air or from high stacks]: 0.650224 kBq; lognormal variance with pedigree 0.4706, pedigree (2,5,5,5,5)
  (same comment as for Ruthenium-103)
- Strontium-90 [water, surface water]: 5.09212e-6 kBq; lognormal variance with pedigree 0.4706, pedigree (2,5,5,5,5)
  (same comment as for Ruthenium-103)
- Antimony-125 [air, non-urban air or from high stacks]: 9.16581e-8 kBq; lognormal variance with pedigree 0.4706, pedigree (2,5,5,5,5)
  (same comment as for Ruthenium-103)
- Chromium-51 [water, surface water]: 2.96126e-5 kBq; lognormal variance with pedigree 0.4706, pedigree (2,5,5,5,5)
  (same comment as for Ruthenium-103)
- Zinc-65 [water, surface water]: 0.00718918 kBq; lognormal variance with pedigree 0.0041, pedigree (2,4,2,3,2)
  Estimated value. This figure have been taken from the CA (Quebec) dataset
- Niobium-95 [water, surface water]: 1.20252e-5 kBq; lognormal variance with pedigree 0.4706, pedigree (2,5,5,5,5)
  (same comment as for Ruthenium-103)
- Iodine-133 [water, surface water]: 1.62948e-6 kBq; lognormal variance with pedigree 0.4706, pedigree (2,5,5,5,5)
  (same comment as for Ruthenium-103)
- Aerosols, radioactive, unspecified [air, non-urban air or from high stacks]: 5.23938e-6 kBq; lognormal variance with pedigree 0.0041, pedigree (2,4,2,3,2)
  Estimated value. This figure have been taken from the CA (Quebec) dataset
- Strontium-89 [water, surface water]: 1.42971e-5 kBq; lognormal variance with pedigree 0.4706, pedigree (2,5,5,5,5)
  (same comment as for Ruthenium-103)
- Lanthanum-140 [water, surface water]: 1.93892e-6 kBq; lognormal variance with pedigree 0.4706, pedigree (2,5,5,5,5)
  (same comment as for Ruthenium-103)
- Iron-59 [water, surface water]: 0.0914986 kBq; lognormal variance with pedigree 0.0041, pedigree (2,4,2,3,2)
  Estimated value. This figure have been taken from the CA (Quebec) dataset
- Cerium-144 [water, surface water]: 1.888e-6 kBq; lognormal variance with pedigree 0.4706, pedigree (2,5,5,5,5)
  (same comment as for Ruthenium-103)
- Water [air, non-urban air or from high stacks]: 0.144538 m3; lognormal variance with pedigree 0.0055, pedigree (3,4,2,3,2)
  Estimated value. This figure have been taken from the CA (Quebec) dataset, based on input of water. It is assumed that 20% of cooling water is evaporated and 80% is rejected to the river
- Cesium-134 [water, surface water]: 0.000575134 kBq; lognormal variance with pedigree 0.0041, pedigree (2,4,2,3,2)
  Estimated value. This figure have been taken from the CA (Quebec) dataset
- Technetium-99m [water, surface water]: 1.10068e-5 kBq; lognormal variance with pedigree 0.4706, pedigree (2,5,5,5,5)
  (same comment as for Ruthenium-103)
- Antimony-124 [air, non-urban air or from high stacks]: 1.86058e-9 kBq; lognormal variance with pedigree 0.4706, pedigree (2,5,5,5,5)
  (same comment as for Ruthenium-103)
- Cesium-137 [water, surface water]: 0.000810416 kBq; lognormal variance with pedigree 0.0041, pedigree (2,4,2,3,2)
  Estimated value. This figure have been taken from the CA (Quebec) dataset
- Tellurium-132 [water, surface water]: 3.29812e-7 kBq; lognormal variance with pedigree 0.4706, pedigree (2,5,5,5,5)
  Estimated value. This figure have been taken from the CA (Quebec) dataset Value extrapolated from a different PWR technology.
- Antimony-124 [water, surface water]: 0.100648 kBq; lognormal variance with pedigree 0.3035, pedigree (2,4,2,3,2)
  (same comment as for Carbon-14)
- Iodine-131 [water, surface water]: 0.0196068 kBq; lognormal variance with pedigree 0.0041, pedigree (2,4,2,3,2)
  Estimated value. This figure have been taken from the CA (Quebec) dataset
- Radioactive species, alpha emitters [water, surface water]: 1.18294e-7 kBq; lognormal variance with pedigree 0.4706, pedigree (2,5,5,5,5)
  (same comment as for Ruthenium-103)
- Noble gases, radioactive, unspecified [air, non-urban air or from high stacks]: 1.01451 kBq; lognormal variance with pedigree 0.4706, pedigree (2,5,5,5,5)
  (same comment as for Ruthenium-103)
- Water [water, surface water]: 0.583329 m3; lognormal variance with pedigree 0.0115, pedigree (4,4,2,3,2)
  (same comment as for Water)
- Iodine-131 [air, non-urban air or from high stacks]: 1.41605e-6 kBq; lognormal variance with pedigree 0.0041, pedigree (2,4,2,3,2)
  Estimated value. This figure have been taken from the CA (Quebec) dataset
- Radioactive species, other beta emitters [air, non-urban air or from high stacks]: 3.39605e-7 kBq; lognormal variance with pedigree 0.4706, pedigree (2,5,5,5,5)
  (same comment as for Ruthenium-103)
- Hydrogen-3, Tritium [water, surface water]: 522.849 kBq; lognormal variance with pedigree 0.0041, pedigree (2,4,2,3,2)
  Estimated value. This figure have been taken from the CA (Quebec) dataset
- Tellurium-123m [water, surface water]: 6.14971e-6 kBq; lognormal variance with pedigree 0.4706, pedigree (2,5,5,5,5)
  (same comment as for Ruthenium-103)
- Hydrocarbons, unspecified [water, surface water]: 4.83636e-6 kg; lognormal variance with pedigree 0.0041, pedigree (2,4,2,3,2)
  Estimated value. This figure have been taken from the CA (Quebec) dataset
- Molybdenum-99 [water, surface water]: 2.35021e-8 kBq; lognormal variance with pedigree 0.3433, pedigree (2,2,5,5,2)
  (same comment as for Ruthenium-103)
- Cobalt-58 [air, non-urban air or from high stacks]: 6.4239e-8 kBq; lognormal variance with pedigree 0.4706, pedigree (2,5,5,5,5)
  (same comment as for Ruthenium-103)
- Cobalt-60 [air, non-urban air or from high stacks]: 2.96518e-7 kBq; lognormal variance with pedigree 0.4706, pedigree (2,5,5,5,5)
  (same comment as for Ruthenium-103)
- Xenon-133 [air, non-urban air or from high stacks]: 2.36588 kBq; lognormal variance with pedigree 0.4706, pedigree (2,5,5,5,5)
  (same comment as for Ruthenium-103)
- Zirconium-95 [air, non-urban air or from high stacks]: 2.26403e-7 kBq; lognormal variance with pedigree 0.4706, pedigree (2,5,5,5,5)
  (same comment as for Ruthenium-103)
- Iodine-133 [air, non-urban air or from high stacks]: 7.12896e-6 kBq; lognormal variance with pedigree 0.4706, pedigree (2,5,5,5,5)
  (same comment as for Ruthenium-103)
- Cobalt-58 [water, surface water]: 0.00446539 kBq; lognormal variance with pedigree 0.4706, pedigree (2,5,5,5,5)
  (same comment as for Ruthenium-103)
- Krypton-85m [air, non-urban air or from high stacks]: 0.0386609 kBq; lognormal variance with pedigree 0.4706, pedigree (2,5,5,5,5)
  (same comment as for Ruthenium-103)
- Lead [soil, industrial]: 9.15923e-10 kg; lognormal variance with pedigree 0.0426, pedigree (1,3,3,1,1)
  Amount and activity link based on primary data collected from participating companies.
- Sulfur dioxide [air, unspecified]: 8.3388e-5 kg; lognormal variance with pedigree 0.0032, pedigree (1,3,3,1,1)
  Amount and activity link based on primary data collected from participating companies.
- Ammonia [air, unspecified]: 7.68752e-7 kg; lognormal variance with pedigree 0.0426, pedigree (1,3,3,1,1)
  Amount and activity link based on primary data collected from participating companies.
- Hydrogen chloride [air, unspecified]: 2.87811e-8 kg; lognormal variance with pedigree 0.0426, pedigree (1,3,3,1,1)
  Amount and activity link based on primary data collected from participating companies.
- Suspended solids, unspecified [water, ocean]: 6.54785e-6 kg; lognormal variance with pedigree 0.0426, pedigree (1,3,3,1,1)
  Amount and activity link based on primary data collected from participating companies.
- Ammonium, ion [water, surface water]: 5.93132e-7 kg; lognormal variance with pedigree 0.0426, pedigree (1,3,3,1,1)
  Amount and activity link based on primary data collected from participating companies.
- Hydrocarbons, unspecified [soil, unspecified]: 2.9863e-8 kg; lognormal variance with pedigree 0.0426, pedigree (1,3,3,1,1)
  Amount and activity link based on primary data collected from participating companies.
- Selenium [air, unspecified]: 1.44888e-9 kg; lognormal variance with pedigree 0.6526, pedigree (1,3,3,1,1)
  Amount and activity link based on primary data collected from participating companies.
- Antimony [water, surface water]: 2.13764e-8 kg; lognormal variance with pedigree 0.6526, pedigree (1,3,3,1,1)
  Amount and activity link based on primary data collected from participating companies.
- Fluoride [soil, industrial]: 6.00178e-8 kg; lognormal variance with pedigree 0.0426, pedigree (1,3,3,1,1)
  Amount and activity link based on primary data collected from participating companies.
- Sodium [soil, industrial]: 3.75761e-11 kg; lognormal variance with pedigree 0.0426, pedigree (1,3,3,1,1)
  Amount and activity link based on primary data collected from participating companies.
- Benzene [air, unspecified]: 4.70605e-8 kg; lognormal variance with pedigree 0.0426, pedigree (1,3,3,1,1)
  Amount and activity link based on primary data collected from participating companies.
- Lead [air, unspecified]: 2.75856e-6 kg; lognormal variance with pedigree 0.6526, pedigree (1,3,3,1,1)
  Amount and activity link based on primary data collected from participating companies.
- Sulfate [soil, unspecified]: 6.39875e-10 kg; lognormal variance with pedigree 0.0426, pedigree (1,3,3,1,1)
  Amount and activity link based on primary data collected from participating companies.
- Aluminium [water, surface water]: 9.43554e-9 kg; lognormal variance with pedigree 0.6526, pedigree (1,3,3,1,1)
  Amount and activity link based on primary data collected from participating companies.
- Fluorine [air, unspecified]: 1.0772e-7 kg; lognormal variance with pedigree 0.0426, pedigree (1,3,3,1,1)
  Amount and activity link based on primary data collected from participating companies.
- Zinc [soil, industrial]: 2.6287e-7 kg; lognormal variance with pedigree 0.0426, pedigree (1,3,3,1,1)
  Amount and activity link based on primary data collected from participating companies.
- Sulfate [water, surface water]: 0.000213848 kg; lognormal variance with pedigree 0.0426, pedigree (1,3,3,1,1)
  Amount and activity link based on primary data collected from participating companies.
- Arsenic, ion [water, ocean]: 2.30191e-9 kg; lognormal variance with pedigree 0.6526, pedigree (1,3,3,1,1)
  Amount and activity link based on primary data collected from participating companies.
- Dissolved solids [water, surface water]: 0.000206953 kg; lognormal variance with pedigree 0.0426, pedigree (1,3,3,1,1)
  Amount and activity link based on primary data collected from participating companies.
- Zinc, ion [water, ocean]: 2.92861e-7 kg; lognormal variance with pedigree 0.6526, pedigree (1,3,3,1,1)
  Amount and activity link based on primary data collected from participating companies.
- Selenium [water, surface water]: 3.22354e-8 kg; lognormal variance with pedigree 0.6526, pedigree (1,3,3,1,1)
  Amount and activity link based on primary data collected from participating companies.
- Antimony [air, unspecified]: 1.81054e-8 kg; lognormal variance with pedigree 0.6526, pedigree (1,3,3,1,1)
  Amount and activity link based on primary data collected from participating companies.
- Fluoride [water, ocean]: 9.36197e-8 kg; lognormal variance with pedigree 0.0426, pedigree (1,3,3,1,1)
  Amount and activity link based on primary data collected from participating companies.
- Particulates, < 2.5 um [air, unspecified]: 7.01001e-5 kg; lognormal variance with pedigree 0.3026, pedigree (1,3,3,1,1)
  Amount and activity link based on primary data collected from participating companies.
- Fluoride [water, surface water]: 8.44473e-7 kg; lognormal variance with pedigree 0.0426, pedigree (1,3,3,1,1)
  Amount and activity link based on primary data collected from participating companies.
- Particulates, > 2.5 um, and < 10um [air, unspecified]: 1.47992e-5 kg; lognormal variance with pedigree 0.1226, pedigree (1,3,3,1,1)
  Amount and activity link based on primary data collected from participating companies.
- Aldehydes, unspecified [air, unspecified]: 2.68232e-9 kg; lognormal variance with pedigree 0.0426, pedigree (1,3,3,1,1)
  Amount and activity link based on primary data collected from participating companies.
- Formaldehyde [air, unspecified]: 2.03215e-7 kg; lognormal variance with pedigree 0.0426, pedigree (1,3,3,1,1)
  Amount and activity link based on primary data collected from participating companies.
- Zinc, ion [water, surface water]: 1.98048e-5 kg; lognormal variance with pedigree 0.6526, pedigree (1,3,3,1,1)
  Amount and activity link based on primary data collected from participating companies.
- Copper, ion [water, surface water]: 4.3385e-7 kg; lognormal variance with pedigree 0.6526, pedigree (1,3,3,1,1)
  Amount and activity link based on primary data collected from participating companies.
- Sodium, ion [water, surface water]: 1.04437e-5 kg; lognormal variance with pedigree 0.0426, pedigree (1,3,3,1,1)
  Amount and activity link based on primary data collected from participating companies.
- Dioxins, measured as 2,3,7,8-tetrachlorodibenzo-p-dioxin [air, unspecified]: 0 kg; pedigree (1,1,1,1,1)
  Amount and activity link based on primary data collected from participating companies.
- Potassium, ion [water, surface water]: 2.47934e-6 kg; lognormal variance with pedigree 0.0426, pedigree (1,3,3,1,1)
  Amount and activity link based on primary data collected from participating companies.
- Cyanide [water, surface water]: 1.83203e-9 kg; lognormal variance with pedigree 0.0426, pedigree (1,3,3,1,1)
  Amount and activity link based on primary data collected from participating companies.
- Particulates, > 10 um [air, unspecified]: 5.31524e-5 kg; lognormal variance with pedigree 0.0426, pedigree (1,3,3,1,1)
  Amount and activity link based on primary data collected from participating companies.
- COD, Chemical Oxygen Demand [water, ocean]: 2.19159e-7 kg; source Weidema B P 2013; lognormal variance with pedigree 0.25, pedigree (5,5,5,5,5)
  Calculated value. The amount of COD is assumed to be five times that of BOD5, based on the estimates provided in section 5.9.7 of Weidema et al. (2013).
- Copper, ion [water, ocean]: 7.32326e-10 kg; lognormal variance with pedigree 0.6526, pedigree (1,3,3,1,1)
  Amount and activity link based on primary data collected from participating companies.
- Nitrogen oxides [air, unspecified]: 0.000233259 kg; lognormal variance with pedigree 0.0426, pedigree (1,3,3,1,1)
  Amount and activity link based on primary data collected from participating companies.
- Cobalt [air, unspecified]: 3.57615e-8 kg; lognormal variance with pedigree 0.6526, pedigree (1,3,3,1,1)
  Amount and activity link based on primary data collected from participating companies.
- Nitrogen, organic bound [water, surface water]: 9.2811e-7 kg; lognormal variance with pedigree 0.0426, pedigree (1,3,3,1,1)
  Amount and activity link based on primary data collected from participating companies.
- DOC, Dissolved Organic Carbon [water, ocean]: 1.27479e-10 kg; lognormal variance with pedigree 0.25, pedigree (5,5,5,5,5)
  Calculated value. The amount of DOC is assumed to be equal to the amount of TOC
- Chromium VI [water, surface water]: 5.14634e-6 kg; lognormal variance with pedigree 0.6526, pedigree (1,3,3,1,1)
  Amount and activity link based on primary data collected from participating companies.
- TOC, Total Organic Carbon [water, ocean]: 1.27479e-10 kg; source Weidema B P 2013; lognormal variance with pedigree 0.25, pedigree (5,5,5,5,5)
  Calculated value. The relation between COD and TOC is assumed to be COD (g O2) = 2.7*TOC (g C), based on the estimates provided in section 5.9.7 of Weidema et al. (2013).
- Chromium [soil, industrial]: 1.68747e-12 kg; lognormal variance with pedigree 0.0426, pedigree (1,3,3,1,1)
  Amount and activity link based on primary data collected from participating companies.
- Nickel, ion [water, surface water]: 1.24763e-8 kg; lognormal variance with pedigree 0.6526, pedigree (1,3,3,1,1)
  Amount and activity link based on primary data collected from participating companies.
- Nitric acid [soil, industrial]: 2.00235e-9 kg; lognormal variance with pedigree 0.0426, pedigree (1,3,3,1,1)
  Amount and activity link based on primary data collected from participating companies.
- NMVOC, non-methane volatile organic compounds, unspecified origin [air, unspecified]: 2.84326e-6 kg; lognormal variance with pedigree 0.0426, pedigree (1,3,3,1,1)
  Amount and activity link based on primary data collected from participating companies.
- Copper [soil, industrial]: 1.01765e-7 kg; lognormal variance with pedigree 0.0426, pedigree (1,3,3,1,1)
  Amount and activity link based on primary data collected from participating companies.
- PAH, polycyclic aromatic hydrocarbons [air, unspecified]: 4.52824e-11 kg; lognormal variance with pedigree 0.3026, pedigree (1,3,3,1,1)
  Amount and activity link based on primary data collected from participating companies.
- Chromium VI [air, unspecified]: 4.12494e-10 kg; lognormal variance with pedigree 0.6526, pedigree (1,3,3,1,1)
  Amount and activity link based on primary data collected from participating companies.
- Nickel [soil, industrial]: 3.92619e-10 kg; lognormal variance with pedigree 0.0426, pedigree (1,3,3,1,1)
  Amount and activity link based on primary data collected from participating companies.
- Chromium [air, unspecified]: 5.10721e-9 kg; lognormal variance with pedigree 0.6526, pedigree (1,3,3,1,1)
  Amount and activity link based on primary data collected from participating companies.
- Nitrogen [soil, industrial]: 7.6124e-8 kg; lognormal variance with pedigree 0.0426, pedigree (1,3,3,1,1)
  Amount and activity link based on primary data collected from participating companies.
- Copper [air, unspecified]: 2.83305e-6 kg; lognormal variance with pedigree 0.6526, pedigree (1,3,3,1,1)
  Amount and activity link based on primary data collected from participating companies.
- Nickel [air, unspecified]: 2.84374e-8 kg; lognormal variance with pedigree 0.6526, pedigree (1,3,3,1,1)
  Amount and activity link based on primary data collected from participating companies.
- Ammonia [soil, industrial]: 2.4755e-8 kg; lognormal variance with pedigree 0.0426, pedigree (1,3,3,1,1)
  Amount and activity link based on primary data collected from participating companies.
- Carbon dioxide, non-fossil [air, unspecified]: 7.95753e-5 kg; lognormal variance with pedigree 0.0032, pedigree (1,3,3,1,1)
  Amount and activity link based on primary data collected from participating companies.
- Nitrate [water, surface water]: 6.50489e-6 kg; lognormal variance with pedigree 0.0426, pedigree (1,3,3,1,1)
  Amount and activity link based on primary data collected from participating companies.
- Chlorine [water, surface water]: 2.97424e-6 kg; lognormal variance with pedigree 0.0426, pedigree (1,3,3,1,1)
  Amount and activity link based on primary data collected from participating companies.
- Nickel, ion [water, ocean]: 1.91805e-10 kg; lognormal variance with pedigree 0.6526, pedigree (1,3,3,1,1)
  Amount and activity link based on primary data collected from participating companies.
- Carbon monoxide, fossil [air, unspecified]: 1.18461e-5 kg; lognormal variance with pedigree 0.6526, pedigree (1,3,3,1,1)
  Amount and activity link based on primary data collected from participating companies.
- Methane, fossil [air, unspecified]: 3.77711e-7 kg; lognormal variance with pedigree 0.0426, pedigree (1,3,3,1,1)
  Amount and activity link based on primary data collected from participating companies.
- Calcium, ion [water, surface water]: 6.7909e-5 kg; lognormal variance with pedigree 0.0426, pedigree (1,3,3,1,1)
  Amount and activity link based on primary data collected from participating companies.
- Methanol [air, unspecified]: 1.21617e-6 kg; lognormal variance with pedigree 0.0426, pedigree (1,3,3,1,1)
  Amount and activity link based on primary data collected from participating companies.
- Chloride [water, surface water]: 4.35638e-6 kg; lognormal variance with pedigree 0.0426, pedigree (1,3,3,1,1)
  Amount and activity link based on primary data collected from participating companies.
- Mercury [air, unspecified]: 2.35205e-9 kg; lognormal variance with pedigree 0.6526, pedigree (1,3,3,1,1)
  Amount and activity link based on primary data collected from participating companies.
- Mercury [water, surface water]: 6.83125e-9 kg; lognormal variance with pedigree 0.6526, pedigree (1,3,3,1,1)
  Amount and activity link based on primary data collected from participating companies.
- Calcium [soil, industrial]: 1.12905e-9 kg; lognormal variance with pedigree 0.0426, pedigree (1,3,3,1,1)
  Amount and activity link based on primary data collected from participating companies.
- Mercury [soil, industrial]: 1.59373e-11 kg; lognormal variance with pedigree 0.0426, pedigree (1,3,3,1,1)
  Amount and activity link based on primary data collected from participating companies.
- Cadmium, ion [water, surface water]: 1.03845e-7 kg; lognormal variance with pedigree 0.6526, pedigree (1,3,3,1,1)
  Amount and activity link based on primary data collected from participating companies.
- Magnesium [water, surface water]: 7.84673e-6 kg; lognormal variance with pedigree 0.0426, pedigree (1,3,3,1,1)
  Amount and activity link based on primary data collected from participating companies.
- Beryllium [air, unspecified]: 1.10319e-9 kg; lognormal variance with pedigree 0.0426, pedigree (1,3,3,1,1)
  Amount and activity link based on primary data collected from participating companies.
- Manganese [soil, industrial]: 5.68023e-8 kg; lognormal variance with pedigree 0.0426, pedigree (1,3,3,1,1)
  Amount and activity link based on primary data collected from participating companies.
- Cadmium [air, unspecified]: 1.323e-7 kg; lognormal variance with pedigree 0.6526, pedigree (1,3,3,1,1)
  Amount and activity link based on primary data collected from participating companies.
- Manganese [water, ocean]: 4.55619e-10 kg; lognormal variance with pedigree 0.6526, pedigree (1,3,3,1,1)
  Amount and activity link based on primary data collected from participating companies.
- BOD5, Biological Oxygen Demand [water, ocean]: 6.88386e-11 kg; lognormal variance with pedigree 0.0426, pedigree (1,3,3,1,1)
  Amount and activity link based on primary data collected from participating companies.
- Mercury [water, ocean]: 2.06374e-10 kg; lognormal variance with pedigree 0.6526, pedigree (1,3,3,1,1)
  Amount and activity link based on primary data collected from participating companies.
- Carbon dioxide, fossil [air, unspecified]: 0.00968269 kg; lognormal variance with pedigree 0.0032, pedigree (1,3,3,1,1)
  Amount and activity link based on primary data collected from participating companies. Accounts for on-site combustion of diesel at mine. Some companies provided emissions on the combustion of natural gas, diesel, propane, or other fuels, which are included here. If no emissions were provided for these other fuels then input is reflected as a an input of heat instead of a direct fuel input.
- Lead [water, surface water]: 1.55661e-7 kg; lognormal variance with pedigree 0.6526, pedigree (1,3,3,1,1)
  Amount and activity link based on primary data collected from participating companies.
- Cadmium [soil, industrial]: 3.93088e-10 kg; lognormal variance with pedigree 0.0426, pedigree (1,3,3,1,1)
  Amount and activity link based on primary data collected from participating companies.
- Manganese [air, unspecified]: 1.92572e-7 kg; lognormal variance with pedigree 0.6526, pedigree (1,3,3,1,1)
  Amount and activity link based on primary data collected from participating companies.
- Arsenic [soil, industrial]: 1.09123e-10 kg; lognormal variance with pedigree 0.0426, pedigree (1,3,3,1,1)
  Amount and activity link based on primary data collected from participating companies.
- Manganese [water, surface water]: 9.45855e-7 kg; lognormal variance with pedigree 0.6526, pedigree (1,3,3,1,1)
  Amount and activity link based on primary data collected from participating companies.
- VOC, volatile organic compounds, unspecified origin [air, unspecified]: 1.30727e-7 kg; lognormal variance with pedigree 0.0426, pedigree (1,3,3,1,1)
  Amount and activity link based on primary data collected from participating companies.
- Cadmium, ion [water, ocean]: 4.00821e-9 kg; lognormal variance with pedigree 0.6526, pedigree (1,3,3,1,1)
  Amount and activity link based on primary data collected from participating companies.
- Lead [water, ocean]: 4.5101e-8 kg; lognormal variance with pedigree 0.6526, pedigree (1,3,3,1,1)
  Amount and activity link based on primary data collected from participating companies.
- Benzo(a)pyrene [air, unspecified]: 3.01614e-12 kg; lognormal variance with pedigree 0.3026, pedigree (1,3,3,1,1)
  Amount and activity link based on primary data collected from participating companies.
- Hydrogen fluoride [air, unspecified]: 7.19992e-9 kg; lognormal variance with pedigree 0.0426, pedigree (1,3,3,1,1)
  Amount and activity link based on primary data collected from participating companies.
- Sulfur oxides [air, unspecified]: 6.00384e-7 kg; lognormal variance with pedigree 0.0426, pedigree (1,3,3,1,1)
  Amount and activity link based on primary data collected from participating companies.
- Arsenic, ion [water, surface water]: 1.14124e-6 kg; lognormal variance with pedigree 0.6526, pedigree (1,3,3,1,1)
  Amount and activity link based on primary data collected from participating companies.
- Iron, ion [water, surface water]: 5.70282e-6 kg; lognormal variance with pedigree 0.6526, pedigree (1,3,3,1,1)
  Amount and activity link based on primary data collected from participating companies.
- Zinc [air, unspecified]: 3.66795e-6 kg; lognormal variance with pedigree 0.6526, pedigree (1,3,3,1,1)
  Amount and activity link based on primary data collected from participating companies.
- Arsenic [air, unspecified]: 1.5023e-7 kg; lognormal variance with pedigree 0.6526, pedigree (1,3,3,1,1)
  Amount and activity link based on primary data collected from participating companies.
- Cadmium [air, non-urban air or from high stacks]: 1.0113e-8 kg; lognormal variance with pedigree 0.652, pedigree (1,1,3,1,1)
  Measured value.
- Dioxins, measured as 2,3,7,8-tetrachlorodibenzo-p-dioxin [air, non-urban air or from high stacks]: 0 kg; pedigree (1,1,1,1,1)
  Measured value. Reported as Dioxins.
- Nitrogen oxides [air, non-urban air or from high stacks]: 4.08631e-5 kg; lognormal variance with pedigree 0.042, pedigree (1,1,3,1,1)
  Measured value. Reported as NO2.
- Copper [air, non-urban air or from high stacks]: 1.65291e-8 kg; lognormal variance with pedigree 0.652, pedigree (1,1,3,1,1)
  Measured value.
- Sulfur dioxide [air, non-urban air or from high stacks]: 0.000437755 kg; lognormal variance with pedigree 0.0026, pedigree (1,1,3,1,1)
  Measured value.
- Carbon dioxide, fossil [air, non-urban air or from high stacks]: 0.00332195 kg; lognormal variance with pedigree 0.0026, pedigree (1,1,3,1,1)
  Measured value. Emissions from carbonates and concentrate.
- Carbon monoxide, fossil [air, non-urban air or from high stacks]: 1.74746e-5 kg; lognormal variance with pedigree 0.652, pedigree (1,1,3,1,1)
  Measured value.
- Sulfuric acid [air, non-urban air or from high stacks]: 4.71782e-6 kg; lognormal variance with pedigree 0.042, pedigree (1,1,3,1,1)
  Measured value.
- Particulates, < 2.5 um [air, non-urban air or from high stacks]: 1.82158e-5 kg; lognormal variance with pedigree 0.302, pedigree (1,1,3,1,1)
  Measured value.
- Particulates, > 2.5 um, and < 10um [air, non-urban air or from high stacks]: 9.14971e-7 kg; lognormal variance with pedigree 0.122, pedigree (1,1,3,1,1)
  Measured value.
- Zinc [air, non-urban air or from high stacks]: 1.79342e-6 kg; lognormal variance with pedigree 0.652, pedigree (1,1,3,1,1)
  Measured value.
- Mercury [air, non-urban air or from high stacks]: 1.92346e-9 kg; lognormal variance with pedigree 0.652, pedigree (1,1,3,1,1)
  Measured value.
- Particulates, > 10 um [air, non-urban air or from high stacks]: 1.05241e-6 kg; lognormal variance with pedigree 0.042, pedigree (1,1,3,1,1)
  Measured value.
- Lead [air, non-urban air or from high stacks]: 1.64607e-8 kg; lognormal variance with pedigree 0.652, pedigree (1,1,3,1,1)
  Measured value.
- Arsenic [air, non-urban air or from high stacks]: 2.44865e-9 kg; lognormal variance with pedigree 0.652, pedigree (1,1,3,1,1)
  Measured value.
- Formaldehyde [water, surface water]: 5.07938e-8 kg; lognormal variance with pedigree 0.3026, pedigree (2,1,1,5,1)
  (same comment as for dithiocarbamate-compound)
- Propane [air, urban air close to ground]: 4.85317e-8 kg; lognormal variance with pedigree 0.1408, pedigree (2,5,2,5,4)
  (same comment as for dithiocarbamate-compound)
- Hydrocarbons, aliphatic, alkanes, unspecified [air, non-urban air or from high stacks]: 1.3327e-7 kg; lognormal variance with pedigree 0.1306, pedigree (2,5,5,5,4)
  (same comment as for dithiocarbamate-compound)
- Selenium [air, urban air close to ground]: 9.56393e-10 kg; lognormal variance with pedigree 0.7408, pedigree (2,5,2,5,4)
  (same comment as for dithiocarbamate-compound)
- Hydrocarbons, aliphatic, alkanes, unspecified [air, urban air close to ground]: 2.99339e-7 kg; lognormal variance with pedigree 0.1408, pedigree (2,5,2,5,4)
  (same comment as for dithiocarbamate-compound)
- Hydrocarbons, aliphatic, unsaturated [air, urban air close to ground]: 8.22257e-7 kg; lognormal variance with pedigree 0.1408, pedigree (2,5,2,5,4)
  (same comment as for dithiocarbamate-compound)
- Selenium [air, non-urban air or from high stacks]: 1.72041e-10 kg; lognormal variance with pedigree 0.6526, pedigree (2,1,1,5,1)
  (same comment as for dithiocarbamate-compound)
- Hydrocarbons, aromatic [air, urban air close to ground]: 1.2633e-8 kg; lognormal variance with pedigree 0.1408, pedigree (2,5,2,5,4)
  (same comment as for dithiocarbamate-compound)
- Toluene [air, urban air close to ground]: 4.37075e-7 kg; lognormal variance with pedigree 0.1408, pedigree (2,5,2,5,4)
  (same comment as for dithiocarbamate-compound)
- Hydrocarbons, aliphatic, unsaturated [air, non-urban air or from high stacks]: 3.88279e-7 kg; lognormal variance with pedigree 0.1306, pedigree (2,5,5,5,4)
  (same comment as for dithiocarbamate-compound)
- Hydrogen chloride [air, non-urban air or from high stacks]: 1.61339e-7 kg; lognormal variance with pedigree 0.0426, pedigree (2,1,1,5,1)
  (same comment as for dithiocarbamate-compound)
- Sodium [air, urban air close to ground]: 4.03589e-7 kg; lognormal variance with pedigree 0.7408, pedigree (2,5,2,5,4)
  (same comment as for dithiocarbamate-compound)
- Hydrogen sulfide [water, surface water]: 2.40939e-7 kg; lognormal variance with pedigree 0.0426, pedigree (2,1,1,5,1)
  (same comment as for dithiocarbamate-compound)
- Hydrocarbons, aromatic [air, non-urban air or from high stacks]: 4.88834e-9 kg; lognormal variance with pedigree 0.1306, pedigree (2,5,5,5,4)
  (same comment as for dithiocarbamate-compound)
- Toluene [water, surface water]: 1.61657e-11 kg; lognormal variance with pedigree 0.3026, pedigree (2,1,1,5,1)
  (same comment as for dithiocarbamate-compound)
- Hydrogen chloride [air, urban air close to ground]: 1.16892e-7 kg; lognormal variance with pedigree 0.1408, pedigree (2,5,2,5,4)
  (same comment as for dithiocarbamate-compound)
- Hydrogen fluoride [air, non-urban air or from high stacks]: 1.56437e-9 kg; lognormal variance with pedigree 0.1306, pedigree (2,5,5,5,4)
  (same comment as for dithiocarbamate-compound)
- Vanadium [air, urban air close to ground]: 7.96994e-8 kg; lognormal variance with pedigree 0.7408, pedigree (2,5,2,5,4)
  (same comment as for dithiocarbamate-compound)
- Hydrogen fluoride [air, urban air close to ground]: 4.02898e-9 kg; lognormal variance with pedigree 0.1408, pedigree (2,5,2,5,4)
  (same comment as for dithiocarbamate-compound)
- Toluene [air, non-urban air or from high stacks]: 2.43831e-8 kg; lognormal variance with pedigree 0.1306, pedigree (2,5,5,5,4)
  (same comment as for dithiocarbamate-compound)
- Iron [air, non-urban air or from high stacks]: 2.6713e-8 kg; lognormal variance with pedigree 0.6526, pedigree (2,1,1,5,1)
  (same comment as for dithiocarbamate-compound)
- Hydrogen sulfide [air, non-urban air or from high stacks]: 1.92722e-8 kg; lognormal variance with pedigree 0.0426, pedigree (2,1,1,5,1)
  (same comment as for dithiocarbamate-compound)
- Lead [air, urban air close to ground]: 1.81682e-8 kg; lognormal variance with pedigree 0.7408, pedigree (2,5,2,5,4)
  (same comment as for dithiocarbamate-compound)
- Zinc [air, urban air close to ground]: 9.95469e-8 kg; lognormal variance with pedigree 0.7408, pedigree (2,5,2,5,4)
  (same comment as for dithiocarbamate-compound)
- Iron [air, urban air close to ground]: 6.53535e-8 kg; lognormal variance with pedigree 0.7408, pedigree (2,5,2,5,4)
  (same comment as for dithiocarbamate-compound)
- Vanadium [air, non-urban air or from high stacks]: 3.25759e-8 kg; lognormal variance with pedigree 0.6526, pedigree (2,1,1,5,1)
  (same comment as for dithiocarbamate-compound)
- Magnesium [air, non-urban air or from high stacks]: 2.09556e-8 kg; lognormal variance with pedigree 0.1306, pedigree (2,5,5,5,4)
  (same comment as for dithiocarbamate-compound)
- m-Xylene [air, urban air close to ground]: 3.17368e-8 kg; lognormal variance with pedigree 0.1408, pedigree (2,5,2,5,4)
  (same comment as for dithiocarbamate-compound)
- Magnesium [air, urban air close to ground]: 9.52103e-8 kg; lognormal variance with pedigree 0.7408, pedigree (2,5,2,5,4)
  (same comment as for dithiocarbamate-compound)
- m-Xylene [air, non-urban air or from high stacks]: 3.31761e-8 kg; lognormal variance with pedigree 0.1306, pedigree (2,5,5,5,4)
  (same comment as for dithiocarbamate-compound)
- Mercury [air, urban air close to ground]: 1.09451e-10 kg; lognormal variance with pedigree 0.7408, pedigree (2,5,2,5,4)
  (same comment as for dithiocarbamate-compound)
- 2-Propanol [air, non-urban air or from high stacks]: 1.12822e-7 kg; lognormal variance with pedigree 0.0426, pedigree (2,1,1,5,1)
  (same comment as for dithiocarbamate-compound)
- Manganese [air, non-urban air or from high stacks]: 2.1239e-8 kg; lognormal variance with pedigree 0.1306, pedigree (2,5,5,5,4)
  (same comment as for dithiocarbamate-compound)
- 4-Methyl-2-pentanone [air, non-urban air or from high stacks]: 2.46564e-9 kg; lognormal variance with pedigree 0.0426, pedigree (2,1,1,5,1)
  (same comment as for dithiocarbamate-compound)
- Methane, fossil [air, urban air close to ground]: 6.81721e-7 kg; lognormal variance with pedigree 0.1408, pedigree (2,5,2,5,4)
  (same comment as for dithiocarbamate-compound)
- 4-Methyl-2-pentanol [water, surface water]: 3.43952e-13 kg; lognormal variance with pedigree 0.3026, pedigree (2,1,1,5,1)
  (same comment as for dithiocarbamate-compound)
- Manganese [air, urban air close to ground]: 4.49604e-8 kg; lognormal variance with pedigree 0.7408, pedigree (2,5,2,5,4)
  (same comment as for dithiocarbamate-compound)
- Acetaldehyde [air, non-urban air or from high stacks]: 6.33122e-8 kg; lognormal variance with pedigree 0.0426, pedigree (2,1,1,5,1)
  (same comment as for dithiocarbamate-compound)
- Methane, non-fossil [air, urban air close to ground]: 1.22697e-6 kg; lognormal variance with pedigree 0.1408, pedigree (2,5,2,5,4)
  (same comment as for dithiocarbamate-compound)
- Methane, non-fossil [air, non-urban air or from high stacks]: 7.38319e-6 kg; lognormal variance with pedigree 0.0426, pedigree (2,1,1,5,1)
  (same comment as for dithiocarbamate-compound)
- AOX, Adsorbable Organic Halogen as Cl [water, surface water]: 2.338e-5 kg; lognormal variance with pedigree 0.0421, pedigree (1,2,1,5,1)
  (same comment as for dithiocarbamate-compound)
- Methane, fossil [air, non-urban air or from high stacks]: 1.1563e-7 kg; lognormal variance with pedigree 0.0426, pedigree (2,1,1,5,1)
  (same comment as for dithiocarbamate-compound)
- Acetaldehyde [air, urban air close to ground]: 2.83162e-8 kg; lognormal variance with pedigree 0.1408, pedigree (2,5,2,5,4)
  (same comment as for dithiocarbamate-compound)
- Molybdenum [air, non-urban air or from high stacks]: 2.60622e-10 kg; lognormal variance with pedigree 0.6526, pedigree (2,1,1,5,1)
  (same comment as for dithiocarbamate-compound)
- Acetic acid [air, non-urban air or from high stacks]: 2.04436e-8 kg; lognormal variance with pedigree 0.1306, pedigree (2,5,5,5,4)
  (same comment as for dithiocarbamate-compound)
- Methyl ethyl ketone [air, non-urban air or from high stacks]: 2.95475e-8 kg; lognormal variance with pedigree 0.0426, pedigree (2,1,1,5,1)
  (same comment as for dithiocarbamate-compound)
- Acetic acid [air, urban air close to ground]: 8.20845e-8 kg; lognormal variance with pedigree 0.1408, pedigree (2,5,2,5,4)
  (same comment as for dithiocarbamate-compound)
- Methanol [air, urban air close to ground]: 4.01602e-7 kg; lognormal variance with pedigree 0.1408, pedigree (2,5,2,5,4)
  (same comment as for dithiocarbamate-compound)
- Acrolein [air, non-urban air or from high stacks]: 2.74491e-8 kg; lognormal variance with pedigree 0.0426, pedigree (2,1,1,5,1)
  (same comment as for dithiocarbamate-compound)
- Methanol [air, non-urban air or from high stacks]: 3.18369e-6 kg; lognormal variance with pedigree 0.0426, pedigree (2,1,1,5,1)
  (same comment as for dithiocarbamate-compound)
- Acetone [air, urban air close to ground]: 1.19549e-8 kg; lognormal variance with pedigree 0.1408, pedigree (2,5,2,5,4)
  (same comment as for dithiocarbamate-compound)
- Nickel [air, urban air close to ground]: 4.06395e-8 kg; lognormal variance with pedigree 0.7408, pedigree (2,5,2,5,4)
  (same comment as for dithiocarbamate-compound)
- Acetone [air, non-urban air or from high stacks]: 4.88631e-9 kg; lognormal variance with pedigree 0.0426, pedigree (2,1,1,5,1)
  (same comment as for dithiocarbamate-compound)
- Methanol [water, surface water]: 1.48265e-7 kg; lognormal variance with pedigree 0.3026, pedigree (2,1,1,5,1)
  (same comment as for dithiocarbamate-compound)
- Ammonia [air, non-urban air or from high stacks]: 2.09903e-6 kg; lognormal variance with pedigree 0.0426, pedigree (2,1,1,5,1)
  (same comment as for dithiocarbamate-compound)
- PAH, polycyclic aromatic hydrocarbons [air, non-urban air or from high stacks]: 1.01991e-8 kg; lognormal variance with pedigree 0.3906, pedigree (2,5,5,5,4)
  (same comment as for dithiocarbamate-compound)
- Molybdenum [air, urban air close to ground]: 6.37595e-10 kg; lognormal variance with pedigree 0.7408, pedigree (2,5,2,5,4)
  (same comment as for dithiocarbamate-compound)
- Ammonia [air, urban air close to ground]: 4.61726e-7 kg; lognormal variance with pedigree 0.1408, pedigree (2,5,2,5,4)
  (same comment as for dithiocarbamate-compound)
- NMVOC, non-methane volatile organic compounds, unspecified origin [air, non-urban air or from high stacks]: 1.34088e-6 kg; lognormal variance with pedigree 0.0426, pedigree (2,1,1,5,1)
  (same comment as for dithiocarbamate-compound)
- Benzene [air, non-urban air or from high stacks]: 7.98959e-8 kg; lognormal variance with pedigree 0.1306, pedigree (2,5,5,5,4)
  (same comment as for dithiocarbamate-compound)
- Arsenic [air, urban air close to ground]: 1.30057e-9 kg; lognormal variance with pedigree 0.1408, pedigree (2,5,2,5,4)
  (same comment as for dithiocarbamate-compound)
- Benzene, ethyl- [air, urban air close to ground]: 3.577e-7 kg; lognormal variance with pedigree 0.1408, pedigree (2,5,2,5,4)
  (same comment as for dithiocarbamate-compound)
- Benzene [air, urban air close to ground]: 3.32383e-7 kg; lognormal variance with pedigree 0.1408, pedigree (2,5,2,5,4)
  (same comment as for dithiocarbamate-compound)
- Benzene, ethyl- [air, non-urban air or from high stacks]: 3.748e-9 kg; lognormal variance with pedigree 0.1306, pedigree (2,5,5,5,4)
  (same comment as for dithiocarbamate-compound)
- Benzene, hexachloro- [air, non-urban air or from high stacks]: 0 kg; pedigree (1,1,1,1,1)
  (same comment as for dithiocarbamate-compound)
- Benzene [water, surface water]: 2.92366e-11 kg; lognormal variance with pedigree 0.3026, pedigree (2,1,1,5,1)
  (same comment as for dithiocarbamate-compound)
- Benzo(a)pyrene [air, non-urban air or from high stacks]: 2.53304e-11 kg; lognormal variance with pedigree 0.1306, pedigree (2,5,5,5,4)
  (same comment as for dithiocarbamate-compound)
- Bromine [air, urban air close to ground]: 1.58684e-8 kg; lognormal variance with pedigree 0.1408, pedigree (2,5,2,5,4)
  (same comment as for dithiocarbamate-compound)
- Benzo(a)pyrene [air, urban air close to ground]: 1.37385e-10 kg; lognormal variance with pedigree 0.1408, pedigree (2,5,2,5,4)
  (same comment as for dithiocarbamate-compound)
- Benzene, hexachloro- [air, urban air close to ground]: 1.9042e-15 kg; lognormal variance with pedigree 0.1408, pedigree (2,5,2,5,4)
  (same comment as for dithiocarbamate-compound)
- Bromine [air, non-urban air or from high stacks]: 7.49614e-9 kg; lognormal variance with pedigree 0.1306, pedigree (2,5,5,5,4)
  (same comment as for dithiocarbamate-compound)
- Butane [air, non-urban air or from high stacks]: 4.21252e-9 kg; lognormal variance with pedigree 0.1306, pedigree (2,5,5,5,4)
  (same comment as for dithiocarbamate-compound)
- Calcium [air, non-urban air or from high stacks]: 7.34458e-7 kg; lognormal variance with pedigree 0.1306, pedigree (2,5,5,5,4)
  (same comment as for dithiocarbamate-compound)
- Cadmium [air, urban air close to ground]: 1.85131e-10 kg; lognormal variance with pedigree 0.7408, pedigree (2,5,2,5,4)
  (same comment as for dithiocarbamate-compound)
- Butane [air, urban air close to ground]: 1.67022e-7 kg; lognormal variance with pedigree 0.4008, pedigree (2,5,2,5,4)
  (same comment as for dithiocarbamate-compound)
- Calcium [air, urban air close to ground]: 1.55594e-6 kg; lognormal variance with pedigree 0.4008, pedigree (2,5,2,5,4)
  (same comment as for dithiocarbamate-compound)
- NMVOC, non-methane volatile organic compounds, unspecified origin [air, urban air close to ground]: 2.77697e-6 kg; lognormal variance with pedigree 0.1408, pedigree (2,5,2,5,4)
  (same comment as for dithiocarbamate-compound)
- Carbon dioxide, non-fossil [air, urban air close to ground]: 0.542465 kg; lognormal variance with pedigree 0.0027, pedigree (1,2,1,5,1)
  (same comment as for dithiocarbamate-compound)
- Nickel [air, non-urban air or from high stacks]: 1.79171e-9 kg; lognormal variance with pedigree 0.6526, pedigree (2,1,1,5,1)
  (same comment as for dithiocarbamate-compound)
- Carbon monoxide, fossil [air, urban air close to ground]: 1.08933e-6 kg; lognormal variance with pedigree 0.7408, pedigree (2,5,2,5,4)
  (same comment as for dithiocarbamate-compound)
- PAH, polycyclic aromatic hydrocarbons [air, urban air close to ground]: 5.27931e-9 kg; lognormal variance with pedigree 0.1408, pedigree (2,5,2,5,4)
  (same comment as for dithiocarbamate-compound)
- Carbon dioxide, non-fossil [air, non-urban air or from high stacks]: 0.0414614 kg; lognormal variance with pedigree 0.0032, pedigree (2,1,1,5,1)
  (same comment as for dithiocarbamate-compound)
- Carbon monoxide, non-fossil [air, urban air close to ground]: 0.000229644 kg; lognormal variance with pedigree 0.6521, pedigree (1,2,1,5,1)
  (same comment as for dithiocarbamate-compound)
- Carbon monoxide, non-fossil [air, non-urban air or from high stacks]: 0.000754922 kg; lognormal variance with pedigree 0.7406, pedigree (2,5,5,5,4)
  (same comment as for dithiocarbamate-compound)
- Chlorine [air, urban air close to ground]: 4.76051e-8 kg; lognormal variance with pedigree 0.4008, pedigree (2,5,2,5,4)
  (same comment as for dithiocarbamate-compound)
- Particulates, > 10 um [air, urban air close to ground]: 1.91279e-7 kg; lognormal variance with pedigree 0.0526, pedigree (1,3,1,5,1)
  (same comment as for dithiocarbamate-compound)
- Chromium VI [air, non-urban air or from high stacks]: 4.50379e-11 kg; lognormal variance with pedigree 0.6526, pedigree (2,1,1,5,1)
  (same comment as for dithiocarbamate-compound)
- Chlorine [air, non-urban air or from high stacks]: 2.24886e-8 kg; lognormal variance with pedigree 0.1306, pedigree (2,5,5,5,4)
  (same comment as for dithiocarbamate-compound)
- Pentane [air, non-urban air or from high stacks]: 7.1988e-9 kg; lognormal variance with pedigree 0.1306, pedigree (2,5,5,5,4)
  (same comment as for dithiocarbamate-compound)
- Chromium [air, urban air close to ground]: 1.44183e-9 kg; lognormal variance with pedigree 0.7408, pedigree (2,5,2,5,4)
  (same comment as for dithiocarbamate-compound)
- Chromium [air, non-urban air or from high stacks]: 1.19458e-9 kg; lognormal variance with pedigree 0.6526, pedigree (2,1,1,5,1)
  (same comment as for dithiocarbamate-compound)
- Phenol, pentachloro- [air, non-urban air or from high stacks]: 1.01199e-12 kg; lognormal variance with pedigree 0.1306, pedigree (2,5,5,5,4)
  (same comment as for dithiocarbamate-compound)
- Cobalt [air, non-urban air or from high stacks]: 1.07504e-9 kg; lognormal variance with pedigree 0.6526, pedigree (2,1,1,5,1)
  (same comment as for dithiocarbamate-compound)
- Pentane [air, urban air close to ground]: 2.78866e-7 kg; lognormal variance with pedigree 0.1408, pedigree (2,5,2,5,4)
  (same comment as for dithiocarbamate-compound)
- Copper [air, urban air close to ground]: 2.29539e-8 kg; lognormal variance with pedigree 0.7806, pedigree (2,5,5,5,4)
  (same comment as for dithiocarbamate-compound)
- Phosphorus [air, non-urban air or from high stacks]: 2.28646e-8 kg; lognormal variance with pedigree 0.1306, pedigree (2,5,5,5,4)
  (same comment as for dithiocarbamate-compound)
- Chromium VI [air, urban air close to ground]: 1.45639e-11 kg; lognormal variance with pedigree 0.7408, pedigree (2,5,2,5,4)
  (same comment as for dithiocarbamate-compound)
- Phosphorus [air, urban air close to ground]: 7.93419e-8 kg; lognormal variance with pedigree 0.1408, pedigree (2,5,2,5,4)
  (same comment as for dithiocarbamate-compound)
- Dinitrogen monoxide [air, non-urban air or from high stacks]: 1.7476e-7 kg; lognormal variance with pedigree 0.0426, pedigree (2,1,1,5,1)
  (same comment as for dithiocarbamate-compound)
- Phenol [air, non-urban air or from high stacks]: 4.70409e-8 kg; lognormal variance with pedigree 0.0426, pedigree (2,1,1,5,1)
  (same comment as for dithiocarbamate-compound)
- Cobalt [air, urban air close to ground]: 2.63008e-9 kg; lognormal variance with pedigree 0.7408, pedigree (2,5,2,5,4)
  (same comment as for dithiocarbamate-compound)
- Potassium [air, non-urban air or from high stacks]: 2.92351e-6 kg; lognormal variance with pedigree 0.1306, pedigree (2,5,5,5,4)
  (same comment as for dithiocarbamate-compound)
- Ethanol [air, urban air close to ground]: 2.39098e-8 kg; lognormal variance with pedigree 0.1408, pedigree (2,5,2,5,4)
  (same comment as for dithiocarbamate-compound)
- Phenol, pentachloro- [air, urban air close to ground]: 2.14223e-12 kg; lognormal variance with pedigree 0.1408, pedigree (2,5,2,5,4)
  (same comment as for dithiocarbamate-compound)
- Fluorine [air, non-urban air or from high stacks]: 6.24676e-9 kg; lognormal variance with pedigree 0.1306, pedigree (2,5,5,5,4)
  (same comment as for dithiocarbamate-compound)
- Propanal [air, non-urban air or from high stacks]: 2.99351e-8 kg; lognormal variance with pedigree 0.1786, pedigree (2,5,4,5,5)
  (same comment as for dithiocarbamate-compound)
- Ethanol [air, non-urban air or from high stacks]: 9.7732e-9 kg; lognormal variance with pedigree 0.0426, pedigree (2,1,1,5,1)
  (same comment as for dithiocarbamate-compound)
- Propionic acid [air, urban air close to ground]: 4.56865e-9 kg; lognormal variance with pedigree 0.1408, pedigree (2,5,2,5,4)
  (same comment as for dithiocarbamate-compound)
- Dinitrogen monoxide [air, urban air close to ground]: 7.61347e-7 kg; lognormal variance with pedigree 0.1408, pedigree (2,5,2,5,4)
  (same comment as for dithiocarbamate-compound)
- Potassium [air, urban air close to ground]: 6.18867e-6 kg; lognormal variance with pedigree 0.7408, pedigree (2,5,2,5,4)
  (same comment as for dithiocarbamate-compound)
- Formaldehyde [air, non-urban air or from high stacks]: 2.76805e-7 kg; lognormal variance with pedigree 0.0426, pedigree (2,1,1,5,1)
  (same comment as for dithiocarbamate-compound)
- Propanol [air, non-urban air or from high stacks]: 7.11984e-12 kg; lognormal variance with pedigree 0.0426, pedigree (2,1,1,5,1)
  (same comment as for dithiocarbamate-compound)
- Dioxins, measured as 2,3,7,8-tetrachlorodibenzo-p-dioxin [air, urban air close to ground]: 8.25155e-15 kg; lognormal variance with pedigree 0.1408, pedigree (2,5,2,5,4)
  (same comment as for dithiocarbamate-compound)
- Propane [air, non-urban air or from high stacks]: 2.17611e-9 kg; lognormal variance with pedigree 0.1306, pedigree (2,5,5,5,4)
  (same comment as for dithiocarbamate-compound)
- Fluorine [air, urban air close to ground]: 1.32237e-8 kg; lognormal variance with pedigree 0.1408, pedigree (2,5,2,5,4)
  (same comment as for dithiocarbamate-compound)
- Sodium [air, non-urban air or from high stacks]: 1.8685e-7 kg; lognormal variance with pedigree 0.1306, pedigree (2,5,5,5,4)
  (same comment as for dithiocarbamate-compound)
- Formaldehyde [air, urban air close to ground]: 1.13431e-7 kg; lognormal variance with pedigree 0.1408, pedigree (2,5,2,5,4)
  (same comment as for dithiocarbamate-compound)
- Propionic acid [air, non-urban air or from high stacks]: 1.19735e-10 kg; lognormal variance with pedigree 0.1306, pedigree (2,5,5,5,4)
  (same comment as for dithiocarbamate-compound)
- Xylene [air, urban air close to ground]: 3.08978e-7 kg; lognormal variance with pedigree 0.0127, pedigree (3,4,4,3,1)
  Calculated value: Emissions from the use of solvent Naphtha, white spirit and other petrol based derivates. Average of three companies calculated from the mass balance of product use and recovery for recycling/disposal. Toluene and Xylene assumed main components of cyclic hydrocarbons, related content of cylcic hydrocarbons from product specifications expressed by 50% Xylene and 50% Toluene.
- 2-Propanol [air, urban air close to ground]: 7.86883e-6 kg; lognormal variance with pedigree 0.0113, pedigree (3,3,4,3,1)
  Calculated value: average from three companies calculated from the mass balance of solvent consumption and solvent recovery for recycling.
- Heptane [air, urban air close to ground]: 3.42186e-6 kg; lognormal variance with pedigree 0.0113, pedigree (3,3,4,3,1)
  Calculated value: Emissions from the use of solvent Naphtha, white spirit and other petrol based derivates. Average of three companies calculated from the mass balance of product use and recovery for recycling. Heptane used for the portion of aliphatic hydrocarbons C7-C12 given in product specifications.
- Propylene oxide [air, urban air close to ground]: 6.56939e-7 kg; lognormal variance with pedigree 0.0173, pedigree (4,3,4,3,1)
  Calculated, stochiometric value: Emissions from the use of ink solvent. Average of three companies calculated from the mass balance of product use and recovery for recycling/disposal. Portion of Methoxypropanol derived from product specifications and related emissions expressed by the portion of methanol and propylene oxide used for the production of Methoxypropanol.
- Molybdenum [air, unspecified]: 5.47099e-12 kg; lognormal variance with pedigree 0.6526, pedigree (1,3,3,1,1)
  Amount based on primary data collected from participating companies.
- Hydrocarbons, unspecified [air, non-urban air or from high stacks]: 5.40969e-8 kg; lognormal variance with pedigree 0.0426, pedigree (1,3,3,1,1)
  Amount based on primary data collected from participating companies.
- Iron, ion [water, ocean]: 9.84311e-9 kg; lognormal variance with pedigree 0.6526, pedigree (1,3,3,1,1)
  Amount based on primary data collected from participating companies.
- Thallium [water, ocean]: 5.88701e-10 kg; lognormal variance with pedigree 0.6526, pedigree (1,3,3,1,1)
  Amount based on primary data collected from participating companies.
- Sulfur [soil, industrial]: 0.000339037 kg; lognormal variance with pedigree 0.0426, pedigree (1,3,3,1,1)
  Amount based on primary data collected from participating companies.
- Cyanide [water, ocean]: 5.6835e-11 kg; lognormal variance with pedigree 0.0426, pedigree (1,3,3,1,1)
  Amount based on primary data collected from participating companies.
- Sulfuric acid [air, unspecified]: 6.35634e-7 kg; lognormal variance with pedigree 0.0426, pedigree (1,3,3,1,1)
  Amount based on primary data collected from participating companies.
- Chlorine [air, unspecified]: 1.73219e-9 kg; lognormal variance with pedigree 0.0426, pedigree (1,3,3,1,1)
  Amount based on primary data collected from participating companies.
- Phenol [water, surface water]: 4.34255e-11 kg; lognormal variance with pedigree 0.0426, pedigree (1,3,3,1,1)
  Amount based on primary data collected from participating companies.
- Cobalt [water, surface water]: 4.9179e-12 kg; lognormal variance with pedigree 0.6526, pedigree (1,3,3,1,1)
  Amount based on primary data collected from participating companies.
- Nitrogen [water, ocean]: 2.48408e-7 kg; lognormal variance with pedigree 0.0426, pedigree (1,3,3,1,1)
  Amount based on primary data collected from participating companies.
- Ammonium, ion [water, ocean]: 1.0259e-7 kg; lognormal variance with pedigree 0.0426, pedigree (1,3,3,1,1)
  Amount based on primary data collected from participating companies.
- Nitrate [water, ocean]: 1.27879e-8 kg; lognormal variance with pedigree 0.0426, pedigree (1,3,3,1,1)
  Amount based on primary data collected from participating companies.
- Nitrogen dioxide [water, surface water]: 7.23758e-10 kg; lognormal variance with pedigree 0.0426, pedigree (1,3,3,1,1)
  Amount based on primary data collected from participating companies.
- Acidity, unspecified [water, surface water]: 7.13106e-9 kg; lognormal variance with pedigree 0.0426, pedigree (1,3,3,1,1)
  Amount based on primary data collected from participating companies.
- Sulfuric acid [water, surface water]: 2.02778e-5 kg; lognormal variance with pedigree 0.0426, pedigree (1,3,3,1,1)
  Amount based on primary data collected from participating companies.

## Review by Hans-Jörg Althaus 2003-08-29
passed
