# oriented strand board production

Dataset: EcoSpold 2, unit process
Geography: RER
Time period: 2012-01-01 to 2019-12-31
Technology level: current
Classification: EcoSpold01Categories: wooden materials/processing
Classification: ISIC rev.4 ecoinvent: 1621:Manufacture of veneer sheets and wood-based panels
Synonyms: OSB
Scenario: Business-as-Usual
System model: Allocation at the point of substitution
Generated by: Frank Werner
Database: ecoinvent
isCopyrightProtected: true
accessRestrictedTo: 1

## General comment
This dataset represents oriented strand board production as the weighted average of oriented strand board produced by the members of the European Panel Federation (EPF)
Oriented strand board (OSB) is a structural panel made from wood strands, flaked from round wood. OSB is a structural panel, consisting of a sheet material in which rather long strands of wood are bonded together with a synthetic resin adhesive. The strands are orientated in a particular direction in the two outer layers of the panel, and sometimes also in all three layers. OSB varies in colour from a light straw colour to a medium brown depending on the wood species, resin system and pressing conditions. Waterproof and boil proof resin binders are combined with the strands to improve internal strength, rigidity and moisture resistance.
Typical densities are 600-680 kg/m3; typical thickness is in a range of 6 to 40 mm.
The inventoried oriented strand board has the following composition:
OSB is characterised by an excellent strength-to-weight ratio and high mechanical strength, resulting from the uninterrupted wood fibre, interweaving of the long strands and degree of orientation of strands in the surface layers. It is resistant to distortion, splitting and de-lamination. It is dimensionally stable, easy to work and flaw free. It is fully recyclable.
European standards describe different types of OSB:
OSB/1 : boards for general purpose use and interior use in dry conditions
OSB/2 : boards for load-bearing in dry conditions
OSB/3 : boards for load-bearing in wet/moist conditions
OSB/4 : high-specification boards for load-bearing in wet/moist conditions
In construction projects, OSB applications comprise for example:
• wall sheeting - high strength and racking performance under all types of exterior cladding,
• roof sheeting - uniformly sound and extra rigid to handle snow and wind loads, sacking for pitched tiles on slated roofs, structural decking on joists for flat roofs,
• subfloors - strong, rigid and impact-resistant for underlayment, carpet or tiles,
• single-layer floors - directly under carpet, lightweight concrete or hardwood,
• underlayment - uniformly thin yet strong and finely sanded, provides a smooth and uniform base for vinyl or tiles,
• I-joists - a high quality support system that minimizes deflection, provides for long spans and minimizes floor squeaking.
Because it's engineered, OSB can be custom manufactured to meet specific requirements in thick-ness, density, panel size, surface texture, strength and rigidity. OSB is also highly workable, making it easy to saw, drill, nail, plane, file, glue, paint and sand.
OSB is also used as concrete shuttering or framework and for high-quality and high specification packaging. Other OSB uses are (EPF website, 2011):
• in fair- and shop-fittings, for both structural and decorative components
• in furniture manufacture, as decorative furniture and to reduce thickness and weight of furniture components (chair seats and backs, furniture frames, desk tops under lamination);
• for vehicle and wagon interiors;
• for hoarding and barriers, shutters and fences;
• for dry storage pallets.

## Included activities start
From the reception at the factory gate of all materials and fuels used.

## Included activities end
Activity ends with the uncoated oriented strand board at the factory gate.

## Geography
Representation of the production of the member companies of the European Panel Federation (EPF).

## Technology
Key elements in the production are the stranders in which strands are produced. These strands retain the natural strength properties of the wood and are critical to the quality of the finished product. The dry strands are metered into the blender where they are tumbled into a rotating drum with a fine mist of wax and resin. The resin/wax bonds the strands in the pressing process and enhances the moisture resilience of the board. The coated strands are then conveyed overhead to the forming line where a "mat" of flakes is laid on a continuous belt conveyor by a cut-off saw. This mat is loaded in a press where, under high temperature and pressure, a sheet of OSB is formed. In the finishing area the product is trimmed and cut to produce the finished OSB board. Production is subject to the regulations of the Industrial Emissions Directive (EU-IED, 2011) if the production capacity exceeds 600 m3 per day where one or more of the following wood-based panels are produced: oriented strand board particle, board or fibreboard.

## Parameters
- input wood fuel: 3596.62 MJ; name wood_fuel; = 188.7*19.06
  input of wood fuel used in production, i.e. wood fuel from forestry, internal wood residues, post-consumer wood used for energy purposes, etc; expressed in MJ of absolutely dry mass (lower heating value at humidity u=0%)

## Reference product
- bark chips, wet, measured as dry mass: 1 kg; name w_bark; By-product classification allocatable product; CPC 31230: Wood in chips or particles; pedigree (1,1,1,1,1)
  bark from debarking of logs, not used energetically
  production volume 7.70832e7 kg; = w_bark*p_board
    Calculated from production volume of reference product using the relative outputs.
  property price 0.034 EUR2005; name w_bark_price_EUR2005
    Data on Import/Export (USD/kg) from UN data has been used. (http://data.un.org/Data.aspx?d=ComTrade&f=_l1Code%3a45, [accessed 10th June 2010]) Commodity: 'Sawdust, wood waste or scrap'. A density of 250 kg/m3 was used to convert from M3 to kg (data on density: http://wiki.answers.com/Q/What_is_the_density_of_sawdust, [Accessed 13 June 2010]).
  property carbon content 0.494
    carbon content on a dry matter basis (reserved; not for manual entry)
  property true value 0.7208; name w_bark_true_value
    allocation property applied in "true value" allocation // value calculated from revenue
  properties: dry mass 1 kg, carbon content, non-fossil 0.494, carbon content, fossil 0, water in wet mass 1.4 kg, water content 1.4, wet mass 2.4 kg, carbon allocation 0.494 kg
- oriented strand board: 0 m3; CPC 31432: Oriented strand board (OSB); By-product classification allocatable product
  production volume 3.636e6 m3; name p_board
    FaoStat 2011
  property carbon content, non-fossil 0.461899; = 543.9*0.494/OSB_DM
    carbon in wood divided by dry mass
  property wet mass 607 kg; name OSB_WM
  property price 566 EUR2005
    Temporary price data. Calculated as 90% of purchasers price based on: 2004 prices for World Import/Export (USD/cubicmeter) from FaoStat (http://faostat.fao.org/site/626/default.aspx#ancor, [accessed 10th June 2010]) Commodity: 'Chips and Particles' assuming this is for air-dry chips (10% water on a dry matter basis at 650 kg/m3) and no price difference for water content (i.e. assuming air-drying).
  property water content 0.0434932; = OSB_WWM/OSB_DM
  property dry mass 581.7 kg; name OSB_DM; = OSB_WM-OSB_WWM
  property water in wet mass 25.3 kg; name OSB_WWM
  property carbon content 0.534051
    carbon content on a dry matter basis (reserved; not for manual entry)
  property true value 566
    allocation property applied in "true value" allocation // value calculated from revenue
  properties: carbon content, fossil 0.0721522, carbon allocation 310.658 kg

## By-products
- residual wood, dry: 0 m3; name w_chips; CPC 39283: Non-agglomerated wood waste and scrap; By-product classification allocatable product; pedigree (1,1,1,1,1)
  Emission factor from DS on heat generation from industrial residual wood mulitplied by the input of wood fuel (direct wood fuel plus production residues)
  production volume 322611 m3; = p_board * (Ref('e975ba4f-883f-4161-823f-109ad7f0c4be') / Ref('27eefbc5-b0c4-46b4-aa59-0e52ad0d6941'))
    Calculated from production volume of reference product using the relative outputs.
  property price 26.9 EUR2005; name w_chips_price_EUR2005
    Calculated based on inputs: The price of the product has been calculated as a sum of the values of the material and energy inputs for this product. This value is therefore a rough estimation. It may underestimate the real price since there are additional expenses when producing any product. These expences can include for example labour costs, treatment of waste materials and profit for the producer. Please consider carefully whether this level of data quality is acceptable for your application.
  property carbon content 0.494
    carbon content on a dry matter basis (reserved; not for manual entry)
  property true value 2.38676; name w_chips_true_value
    allocation property applied in "true value" allocation // value calculated from revenue
  properties: water in wet mass 82.5 kg, wet mass 632.5 kg, carbon content, fossil 0, dry mass 550 kg, carbon content, non-fossil 0.494, water content 0.15, carbon allocation 271.7 kg
- heat, for reuse in municipal waste incineration only: 0 MJ; CPC 17300: Steam and hot water; By-product classification allocatable product; pedigree (1,1,1,1,1)
  Net useful heat generated from this waste and used in internal MSWI plant energy redistribution.
  Uncertainty: uncertainty is calculated from uncertainties in waste composition and uncertainties in energy efficiency and the uncertainty in internal energy demand
  production volume 491724 MJ
  property exergy 0.1842 MJ; name E_th_prod_MSWI_exergy
    This exergy property is based on the exergy content of the product.
  property true value relation 0.1842; name E_th_prod_MSWI_true_value_relation
    property to calculate "true value" from
  property price 0.0106 EUR2005; name E_th_prod_MSWI_price_EUR2005
    Average European district heat price from Ecoheatcool and Euroheat 2005-2006, Ecoheat Work package 1: The European heat market. Final report. 10.6 EUR/GJ i s the price of district heat. http://www.solarthermalworld.org/files/Ecoheatcool%20WP1%20Web.pdf?download
  property true value 0.000925797
    allocation property applied in "true value" allocation // value calculated from true value relation
- electricity, for reuse in municipal waste incineration only: 0 kWh; CPC 17100: Electrical energy; By-product classification allocatable product; pedigree (1,1,1,1,1)
  Net electricity generated from this waste and used in internal MSWI plant energy redistribution.
  Uncertainty: uncertainty is calculated from uncertainties in waste composition and uncertainties in energy efficiency and the uncertainty in internal energy demand
  production volume 54629.9 kWh
  property true value relation 3.6; name E_el_prod_MSWI_true_value_relation
    property to calculate "true value" from
  property exergy 3.6 MJ; name E_el_prod_MSWI_exergy
    This exergy property is based on the exergy content of the product.
  property price 0.1 EUR2005; name E_el_prod_MSWI_price_EUR2005
    Estimated to be the same price as in case of electricity, medium voltage.
  property true value 0.0020102
    (same comment as for heat, for reuse in municipal waste incineration only)
- zinc concentrate: 0 kg; CPC 14290: Other non-ferrous metal ores and concentrates (other than uranium or thorium ores and concentrates); By-product classification allocatable product
  Calculated value from the knowledge of the properties of both products.
  production volume 78.1108 kg
  property price 0.38 EUR2005; name ByP_price_EUR2005
    Temporary price data. Calculated as 90% of purchasers price based on: Zinc content in concentrate 53%. Concentrate price per kg Zn 86.5% of refined Zn price (13.5% treatment charges according to CHR Metals Limited 2005: Dynamic cost curves. http://www.minecost.com/dynamic.pdf). 2004 zinc price from USGS (2007) Mineral commodity summaries 2007. <http://minerals.usgs.gov/minerals/pubs/mcs/2007/mcs2007.pdf> [Accessed 25 May 2010]
  property zinc content 0.53; name zinc_C_zinc_concentrate
    Zinc content on a dry matter basis. Value taken from teh "zinc mine operation" /GLO dataset.
  property dry mass 1 kg; name DM_zinc_concentrate
  property carbon content 0
    carbon content on a dry matter basis (reserved; not for manual entry)
  property true value 8.1634e-6
    allocation property applied in "true value" allocation // value calculated from revenue
  properties: wet mass 1 kg, water content 0, carbon content, non-fossil 0, carbon content, fossil 0, water in wet mass 0 kg, carbon allocation 0 kg
- biogas: 0 m3; source Raboni, Massimo 2014; By-product classification allocatable product; CPC 17200: Coal gas, water gas, producer gas and similar gases, other than petroleum gases and other gaseous hydrocarbons; pedigree (1,1,1,1,1)
  An average yield of 100 litres of biogas per kg biowaste is assumed
  production volume 18629.9 m3
  property carbon content, non-fossil 0.449939
    Total C content in kg/Nm3 (Tab 12.8, ecoinvent v2.2 report n17), referred to 1kg DM
  property price 0.109 EUR2005; name biogas_yield_price_EUR2005
    Temporary price data. Calculated as 90% of purchasers price based on: Same prices per energy output as natural gas, based on the proportional lower heating value (2/3 that of natural gas)
  property carbon content 0.449939
    carbon content on a dry matter basis (reserved; not for manual entry)
  property true value 0.000558488
    allocation property applied in "true value" allocation // value calculated from revenue
  properties: dry mass 1.15 kg, wet mass 1.15 kg, carbon content, fossil 0, water content 0, lower heating value 0 MJ/Nm3, water in wet mass 0 kg, carbon allocation 0.51743 kg
- compost: 0 kg; CPC 391: Wastes from food and tobacco industry; By-product classification allocatable product; pedigree (1,1,1,1,1)
  EcoSpold01Location=CH
  Biowaste is reduced in mass by a factor of 2 during composting
  production volume 172395 kg
  property nitrogen content 0.0136364; name Mass_compost_N_content; = Mass_biowaste_N_content/0.5*( DM_biowaste / DM_compost)
    nitrogen content on a dry matter basis
  property water in wet mass 0.472 kg; name Water_in_wet_mass_compost; = 1- DM_compost
  property price 0.03 EUR2005
    Temporary price data. Calculated as 90% of purchasers price based on: Estimation done using the following sources: <http://www.wmaa.asn.au/uploads/documents/MarkWinser_1May2007.pdf>; <http://www.swlf.ait.ac.th/UpdData/International/Composting%20and%20anaerobic%20digestion_%20comparions%20for%20Europe%20and%20Asia.pdf>; <http://www.epa.gov/osw/conserve/rrr/composting/basic.htm>, accessed 2011.06.16
  property carbon content, non-fossil 0.1165
    calculation: dry matter 50%, organic matter 40% of dry matter, C content calculated from organic matter divided by 1.72. Relative to dry matter; relative to fresh matter: divided by 2 => 0.1156
  property dry mass 0.528 kg; name DM_compost
  property water content 0.893939; name Water_content_compost; = Water_in_wet_mass_compost/DM_compost
  property concentration, cadmium 0 kg/kg; name Mass_compost_concentration_Cd; = Mass_biowaste_concentration_Cd*2
    Biowaste mass is reduced by a factor of two during composting, therefore concentration is doubled
  property humus equivalent 0.061 kg
    Humus building fraction expressed in kg per kg product on a FM basis. Humus denotes the converted, primary biomass from plants or animals in the ground. More information can be found in the documentation of the composting itself: "treatment of biowaste, industrial composting".
  property concentration, copper 0 kg/kg; name Mass_compost_concentration_Cu; = Mass_biowaste_concentration_Cu*2
    (same comment as for compost)
  property concentration, calcium 0 kg/kg; name Mass_compost_Ca_concentration; = Mass_biowaste_concentration_Ca*2
    (same comment as for compost)
  property concentration, magnesium 0 kg/kg; name Mass_compost_Mg_concentration; = Mass_biowaste_concentration_Mg*2
    (same comment as for compost)
  property concentration, mercury 0 kg/kg; name Mass_compost_Hg_concentration; = Mass_biowaste_concentration_Hg*2
    (same comment as for compost)
  property concentration, lead 0 kg/kg; name Mass_compost_concentration_Pb; = Mass_biowaste_concentration_Pb*2
    (same comment as for compost)
  property concentration, nickel 0 kg/kg; name Mass_compost_Ni_concentration; = Mass_biowaste_concentration_Ni*2
    (same comment as for compost)
  property concentration, phosphorus 0 kg/kg; name Mass_compost_P_concentration; = Mass_biowaste_concentration_P*2
    (same comment as for compost)
  property concentration, sulfur 0 kg/kg; name Mass_compost_concentration_S; = Mass_biowaste_concentration_S*2
    (same comment as for compost)
  property concentration, potassium 0 kg/kg; name Mass_compost_K_concentration; = Mass_biowaste_concentration_K*2
    (same comment as for compost)
  property nickel content 1.60606e-5; name Mass_compost_Ni_content; = Mass_biowaste_Ni_content/0.5*( DM_biowaste / DM_compost)
    nickel content on a dry matter basis
  property concentration, nitrogen 0 kg/kg; = Mass_biowaste_concentration_N*2
    (same comment as for compost)
  property concentration, zinc 0 kg/kg; name Mass_compost_concentration_Zn; = Mass_biowaste_concentration_Zn*2
    (same comment as for compost)
  property lead content 2.66667e-5; name Mass_compost_Pb_content; = Mass_biowaste_Pb_content/0.5*( DM_biowaste / DM_compost)
    lead content on a dry matter basis
  property copper content 3.81818e-5; name Mass_compost_Cu_content; = Mass_biowaste_Cu_content/0.5*( DM_biowaste / DM_compost)
    copper content on a dry matter basis
  property cadmium content 2.89394e-7; name Mass_compost_Cd_content; = Mass_biowaste_Cd_content/0.5*( DM_biowaste / DM_compost)
    cadmium content on a dry matter basis
  property magnesium content 0.00525758; name Mass_compost_Mg_content; = Mass_biowaste_Mg_content/0.5*( DM_biowaste / DM_compost)
    magnesium content on a dry matter basis
  property zinc content 0.000120303; name Mass_compost_Zn_content; = Mass_biowaste_Zn_content/0.5*( DM_biowaste / DM_compost)
    zinc content on a dry matter basis
  property potassium content 0.0099697; name Mass_compost_K_content; = Mass_biowaste_K_content/0.5*( DM_biowaste / DM_compost)
    potassium content on a dry matter basis
  property sulfur content 0.00190909; name Mass_compost_S_content; = Mass_biowaste_S_content/0.5*( DM_biowaste / DM_compost)
    sulfur content on a dry matter basis
  property calcium content 0.0504545; name Mass_compost_Ca_content; = Mass_biowaste_Ca_content/0.5*( DM_biowaste / DM_compost)
    calcium content on a dry matter basis
  property mercury content 1e-7; name Mass_compost_Hg_content; = Mass_biowaste_Hg_content/0.5*( DM_biowaste / DM_compost)
    mercury content on a dry matter basis
  property phosphorus content 0.00275758; name Mass_compost_P_content; = Mass_biowaste_P_content/0.5*( DM_biowaste / DM_compost)
    phosphorus content on a dry matter basis
  property carbon content 0.1165
    carbon content on a dry matter basis (reserved; not for manual entry)
  property true value 0.0014224
    allocation property applied in "true value" allocation // value calculated from revenue
  properties: carbon content, fossil 0, wet mass 1 kg, carbon allocation 0.061512 kg
- iron scrap, sorted, pressed: 0 kg; By-product classification Recyclable; CPC 39310: Slag, dross, scalings and other waste from the manufacture of iron or steel; pedigree (1,1,1,1,1)
  Iron scrap recovered from this waste.
  Uncertainty: uncertainty calculated from uncertainty in waste composition, uncertainty of share of recyclable metal, uncertainty of transfer coefficient to bottom ash, uncertainty of the efficiency of scrap removal in MSWI plant.
  production volume 0.0618851 kg
  property price 0.175 EUR2005
    Temporary price data. Calculated as 90% of purchasers price based on: 2005 import and export prices (total trades (USD) divided by total weight (kg) in biggest economies of the world: EU27, USA, Brasil, China, India, Japan and Russia) from UN Commodity Trade Statistics Database (http://data.un.org/Explorer.aspxDatabase [Accessed 2011.06.20]). Commodity: Waste or scrap, of cast iron
  property carbon content 0
    carbon content on a dry matter basis (reserved; not for manual entry)
  property true value 2.97852e-9
    allocation property applied in "true value" allocation // value calculated from revenue
  properties: carbon content, fossil 0, dry mass 1 kg, carbon content, non-fossil 0, water in wet mass 0 kg, wet mass 1 kg, water content 0, carbon allocation 0 kg
- iron scrap, unsorted: 0 kg; source European Aluminium Association 2008; CPC 39310: Slag, dross, scalings and other waste from the manufacture of iron or steel; By-product classification Recyclable; pedigree (1,1,1,1,1)
  production volume 8.72946e-6 kg
  property price 0.149 EUR2005; name ironScrapAmount_price_EUR2005
    Temporary price data. Calculated as 90% of purchasers price based on: estimated at 85% of sorted scrap
  property carbon content 0
    carbon content on a dry matter basis (reserved; not for manual entry)
  property true value 3.57726e-13
    allocation property applied in "true value" allocation // value calculated from revenue
  properties: water in wet mass 0 kg, water content 0, carbon content, fossil 0, carbon content, non-fossil 0, dry mass 1 kg, wet mass 1 kg, carbon allocation 0 kg
- aluminium oxide, non-metallurgical: 0 kg; source European Aluminium Association 2008; CPC 41432: Alumina (aluminium oxide), except artificial corundum; By-product classification allocatable product; CAS 1344-28-1; pedigree (1,1,1,1,1)
  production volume 0.000549312 kg
  property carbon content, non-fossil 0; name C_content_non_fossil
  property price 0.28 EUR2005; name Al2O3Amount_price_EUR2005
    From UN trade database. http://data.un.org/ Import data from the largest economies of the world are used (Brazil, India, USA, China, Japan and EU-27).
  property dry mass 1 kg; name DM
  property water content 0; name water_content
  property wet mass 1 kg; name WM
  property water in wet mass 0 kg; name WWM
  property carbon content, fossil 0; name C_content_fossil
  property carbon content 0
    carbon content on a dry matter basis (reserved; not for manual entry)
  property true value 4.23013e-11
    allocation property applied in "true value" allocation // value calculated from revenue
  properties: carbon allocation 0 kg
- aluminium, cast alloy: 0 kg; source European Aluminium Association 2008; By-product classification allocatable product; CPC 41431: Unwrought aluminium; pedigree (1,1,1,1,1)
  EcoSpold01Location=RER
  production volume 0.00513485 kg
  property price 1.3 EUR2005; name castAlloyAmount_price_EUR2005
    Temporary price data. Calculated as 90% of purchasers price based on: Source: London Metal Exchange, Aluminium alloy price for 2005
  property carbon content 0
    carbon content on a dry matter basis (reserved; not for manual entry)
  property true value 1.83589e-9
    allocation property applied in "true value" allocation // value calculated from revenue
  properties: water in wet mass 0 kg, carbon content, non-fossil 0, water content 0, dry mass 1 kg, carbon content, fossil 0, wet mass 1 kg, carbon allocation 0 kg
- aluminium, wrought alloy: 0 kg; source European Aluminium Association 2008; By-product classification allocatable product; CPC 4153: Semi-finished products of aluminium or aluminium alloys; pedigree (1,1,1,1,1)
  production volume 0.00224794 kg
  property price 1.44 EUR2005; name secondaryAluminiumOutput_price_EUR2005
    Estimated based on literature values and expert judgement. Aluminium ccast alloys are about 90% of the price of aluminium wrought alloys.
  property carbon content 0
    carbon content on a dry matter basis (reserved; not for manual entry)
  property true value 8.90273e-10
    allocation property applied in "true value" allocation // value calculated from revenue
  properties: wet mass 1 kg, water content 0, carbon content, fossil 0, water in wet mass 0 kg, carbon content, non-fossil 0, dry mass 1 kg, carbon allocation 0 kg
- copper: 0 kg; source Rentz O. 1999; By-product classification allocatable product; CPC 41413: Refined copper and copper alloys, unwrought; master alloys of copper
  Literature value. Copper uses: Before end-use copper is manufactured into semi fabricated products, such as shapes and ingots (known as 'semis'). These manufacturing processes are subdivided into hot working, cold working and, if necessary, process annealing. Few of the semis are ready for use as such. They more typically travel to first-stage manufacturers, who make metal rods, wire, and casting, and then to component manufacturers who produce such things as motors, valves, and insulated cables The components in turn are incorporated by final-stage manufacturers into a variety of finished products - automobiles, commercial buildings, residential housing, and so forth. These uses account for about 79% of the world-wide consumption of copper.
  production volume 0.000595984 kg
  property price 5.52 EUR2005
    Literature value (http://www.economist.com/news/business/21576714-mining-industry-has-enriched-chile-its-future-precarious-copper-solution). Average price between 20015 and 2013.
  property carbon content 0
    carbon content on a dry matter basis (reserved; not for manual entry)
  property true value 9.04794e-10
    allocation property applied in "true value" allocation // value calculated from revenue
  properties: dry mass 1 kg, water in wet mass 0 kg, wet mass 1 kg, carbon content, non-fossil 0, water content 0, carbon content, fossil 0, carbon allocation 0 kg

## Inputs from technosphere
- electricity, medium voltage: 0.000377451 kWh; = 117*0.054; lognormal variance with pedigree 0.027, pedigree (1,1,3,1,1)
  electricity input from grid times share of total production in specific country
- tap water: 0.0122471 kg; lognormal variance with pedigree 0.0276, pedigree (1,3,3,1,1)
  properties: wet mass 1 kg, water content 2962.17, carbon content, fossil 0.00178991, dry mass 0.000337476 kg
  note on carbon content, fossil: Bicarbonate content is 2.93 mol/m3. CO2 content is 0.1 mol/m3 (ecoinvent v2.2 report 8, Tab 93.1).
- heat, district or industrial, other than natural gas: 0.00014964 MJ; = 2.63/1.05; lognormal variance with pedigree 0.0276, pedigree (1,3,3,1,1)
  Fuel input, converted to heat output
- electricity, medium voltage: 0.000384441 kWh; = 117*0.055; lognormal variance with pedigree 0.027, pedigree (1,1,3,1,1)
  electricity input from grid times share of total production in specific country
- paraffin: 0.000657164 kg; lognormal variance with pedigree 0.0276, pedigree (1,3,3,1,1)
  hydrophobing agent
  properties: carbon content, fossil 0.847059, wet mass 1 kg, dry mass 1 kg
- heat, district or industrial, natural gas: 0.0207038 MJ; = (355.4+8.48)/1.05; lognormal variance with pedigree 0.0276, pedigree (1,3,3,1,1)
  Input of natural gas plus liquified petrolium gas, converted to heat output
- electricity, medium voltage: 0.00039842 kWh; = 117*0.057; lognormal variance with pedigree 0.027, pedigree (1,1,3,1,1)
  electricity input from grid times share of total production in specific country
- electricity, medium voltage: 0.000740922 kWh; = 117*(0.001+0.105); lognormal variance with pedigree 0.027, pedigree (1,1,3,1,1)
  electricity input from grid times share of total production not covered via specific country mixes; it covers the electricity input in countries where < 3% of the total production are produced.
- chemical, organic: 0.000313049 kg; lognormal variance with pedigree 0.0276, pedigree (1,3,3,1,1)
  input of unspecified additives, dyes, flame redardants, etc.
  properties: carbon content, fossil 0.628, dry mass 1 kg, wet mass 1 kg
  note on carbon content, fossil: This dataset is an unweighted average of 20 organic substances (listed in Tab 88.1, ecoinvent v2.2 report 8, part II), being part of the top100 chemicals included in this database. The C-content has also been calculated as an unweighted average of the C content of the substances composing this dataset.
- furnace, wood chips, softwood storage area, 1000kW: 1.42029e-9 unit; = 6.61E-09*wood_fuel; lognormal variance with pedigree 0.0126, pedigree (1,3,3,1,1)
  Factor from DS on heat generation from industrial residual wood mulitplied by the input of wood fuel (direct wood fuel plus production residues)
  EcoSpold01Location=CH
- electricity, medium voltage: 0.000636075 kWh; = 117*0.091; lognormal variance with pedigree 0.027, pedigree (1,1,3,1,1)
  electricity input from grid times share of total production in specific country
- pulpwood, softwood, measured as solid wood under bark: 0 m3; pedigree (1,1,1,1,1)
  input in kg divided by the basic wood density of 378 kg/m3
  properties: dry mass 450 kg, water content 1.4, carbon content, non-fossil 0.494, wet mass 1080 kg
- furnace, wood chips, with silo, 5000kW: 6.00265e-9 unit; = 2.9333E-08*wood_fuel/1.05; lognormal variance with pedigree 0.027, pedigree (1,1,3,1,1)
  Infrastructure factor from DS on heat generation from industrial residual wood mulitplied by the input of wood fuel (direct wood fuel plus production residues); correction for assumed efficiency as original value refers to heat output
- wood ash mixture, pure: 0 kg; name w_wood_ash; pedigree (1,1,1,1,1)
  Emission factor from DS on heat generation from industrial residual wood mulitplied by the input of wood fuel (direct wood fuel plus production residues)
  EcoSpold01Location=CH
  production volume 0 kg
    Calculated from production volume of reference product using the relative outputs.
  properties: carbon content, non-fossil 0.012, wet mass 1 kg, dry mass 1 kg
- dust collector, electrostatic precipitator, for industrial use: 2.84222e-10 unit; = 1.3889E-09*wood_fuel/1.05; lognormal variance with pedigree 0.027, pedigree (1,1,3,1,1)
  (same comment as for furnace, wood chips, with silo, 5000kW)
- electricity, medium voltage: 0.000328522 kWh; = 117*0.047; lognormal variance with pedigree 0.027, pedigree (1,1,3,1,1)
  electricity input from grid times share of total production in specific country
- biowaste: -1.57719e-5 kg; name w_biowaste; lognormal variance with pedigree 0.0282, pedigree (2,3,3,1,1)
  sludges from chip washing etc.
  production volume 959904 kg; = w_biowaste*p_board
    Calculated from production volume of reference product using the relative outputs.
  property price 0 EUR2005; name w_biowaste_price_EUR2005
  properties: wet mass 1 kg, dry mass 0.4 kg, carbon content, non-fossil 0.1624, water content 1.5
- electricity, medium voltage: 0.00083179 kWh; = 117*0.119; lognormal variance with pedigree 0.027, pedigree (1,1,3,1,1)
  electricity input from grid times share of total production in specific country
- electricity, medium voltage: 0.000314542 kWh; = 117*0.045; lognormal variance with pedigree 0.027, pedigree (1,1,3,1,1)
  electricity input from grid times share of total production in specific country
- diesel, burned in building machine: 0.00201331 MJ; lognormal variance with pedigree 0.0276, pedigree (1,3,3,1,1)
  for internal transport
- electricity, medium voltage: 0.000733932 kWh; = 117*0.105; lognormal variance with pedigree 0.027, pedigree (1,1,3,1,1)
  electricity input from grid times share of total production in specific country
- lubricating oil: 3.62097e-6 kg; = 0.055+0.00561; lognormal variance with pedigree 0.0276, pedigree (1,3,3,1,1)
  input of lubricating oils plus mineral oils, incl. thermooil
  properties: carbon content, fossil 0.75, dry mass 1 kg, wet mass 1 kg
  note on carbon content, fossil: Lubricating oil is produced from diesel. C-content/dry mass of fats and oils considered 75%, from: ecoinvent v2.2 report, n 15a, pg 40
- electricity, medium voltage: 0.000440359 kWh; = 117*0.063; lognormal variance with pedigree 0.027, pedigree (1,1,3,1,1)
  electricity input from grid times share of total production in specific country
- wooden board factory, organic bonded boards: 2.27589e-12 unit; = 1/(525000*50); lognormal variance with pedigree 0.0276, pedigree (1,3,3,1,1)
  estimated based on an assumed yearly production volume o 525,000 m3/year and a life time of infrastructure of 50 years
- electricity, medium voltage: 0.00180338 kWh; = 117*0.258; lognormal variance with pedigree 0.027, pedigree (1,1,3,1,1)
  electricity input from grid times share of total production in specific country
- methylene diphenyl diisocyanate: 0.00109926 kg; lognormal variance with pedigree 0.0276, pedigree (1,3,3,1,1)
  part of glueing system (inventoried as averaged production average in Europe)
  properties: carbon content, fossil 0.72, wet mass 1 kg, dry mass 1 kg
- pulpwood, softwood, measured as solid wood under bark: 0.000113586, 9.99298e-7 m3 (2 entries); lognormal variance with pedigree 0.0276, pedigree (1,3,3,1,1)
  input in kg divided by the basic wood density of 378 kg/m3
- wood ash mixture, pure: -0.000100232, -2.04626e-6 kg (2 entries); lognormal variance with pedigree 0.0276, pedigree (1,3,3,1,1)
  (same comment as for wood ash mixture, pure)
  production volume 6.2248e6 kg
    Calculated from production volume of reference product using the relative outputs.

## Inputs from nature
- Water, cooling, unspecified natural origin [natural resource, in water]: 1.79226e-5 m3; lognormal variance with pedigree 0.0266, pedigree (1,3,3,1,1)

## Emissions to nature
- Manganese [air, urban air close to ground]: 3.65279e-8 kg; = 1.7E-07*wood_fuel; lognormal variance with pedigree 0.4712, pedigree (2,3,5,1,1)
  (same comment as for residual wood, dry)
- Hydrocarbons, aliphatic, alkanes, unspecified [air, urban air close to ground]: 1.95532e-7 kg; = 9.1E-07*wood_fuel; lognormal variance with pedigree 0.4712, pedigree (2,3,5,1,1)
  (same comment as for residual wood, dry)
- Benzene [air, urban air close to ground]: 1.95532e-7 kg; = 9.1E-07*wood_fuel; lognormal variance with pedigree 0.4712, pedigree (2,3,5,1,1)
  (same comment as for residual wood, dry)
- Cadmium [air, urban air close to ground]: 1.50409e-10 kg; = 7E-10*wood_fuel; lognormal variance with pedigree 0.4712, pedigree (2,3,5,1,1)
  (same comment as for residual wood, dry)
- Sulfur dioxide [air, urban air close to ground]: 5.37175e-7 kg; = 2.5E-06*wood_fuel; lognormal variance with pedigree 0.4712, pedigree (2,3,5,1,1)
  (same comment as for residual wood, dry)
- Zinc [air, urban air close to ground]: 6.4461e-8 kg; = 3E-07*wood_fuel; lognormal variance with pedigree 0.4712, pedigree (2,3,5,1,1)
  (same comment as for residual wood, dry)
- Benzo(a)pyrene [air, urban air close to ground]: 1.07435e-10 kg; = 5E-10*wood_fuel; lognormal variance with pedigree 0.4712, pedigree (2,3,5,1,1)
  (same comment as for residual wood, dry)
- m-Xylene [air, urban air close to ground]: 2.57844e-8 kg; = 1.2E-07*wood_fuel; lognormal variance with pedigree 0.4712, pedigree (2,3,5,1,1)
  (same comment as for residual wood, dry)
- Chromium [air, urban air close to ground]: 8.50885e-10 kg; = 3.96E-09*wood_fuel; lognormal variance with pedigree 0.4712, pedigree (2,3,5,1,1)
  (same comment as for residual wood, dry)
- Mercury [air, urban air close to ground]: 6.4461e-11 kg; = 3E-10*wood_fuel; lognormal variance with pedigree 0.4712, pedigree (2,3,5,1,1)
  (same comment as for residual wood, dry)
- Nitrogen oxides [air, urban air close to ground]: 2.57844e-5 kg; = 0.00012*wood_fuel; lognormal variance with pedigree 0.1112, pedigree (2,3,5,1,1)
  (same comment as for residual wood, dry)
- Phosphorus [air, urban air close to ground]: 6.4461e-8 kg; = 3E-07*wood_fuel; lognormal variance with pedigree 0.4712, pedigree (2,3,5,1,1)
  (same comment as for residual wood, dry)
- Chlorine [air, urban air close to ground]: 3.86766e-8 kg; = 1.8E-07*wood_fuel; lognormal variance with pedigree 0.4712, pedigree (2,3,5,1,1)
  (same comment as for residual wood, dry)
- Potassium [air, urban air close to ground]: 5.02796e-6 kg; = 2.34E-05*wood_fuel; lognormal variance with pedigree 0.4712, pedigree (2,3,5,1,1)
  (same comment as for residual wood, dry)
- Ammonia [air, urban air close to ground]: 3.71725e-7 kg; = 1.73E-06*wood_fuel; lognormal variance with pedigree 0.4712, pedigree (2,3,5,1,1)
  (same comment as for residual wood, dry)
- Carbon monoxide, non-fossil [air, urban air close to ground]: 4.2974e-5 kg; = 2E-04*wood_fuel; lognormal variance with pedigree 0.0612, pedigree (2,3,5,1,1)
  (same comment as for residual wood, dry)
- Sodium [air, urban air close to ground]: 2.79331e-7 kg; = 1.3E-06*wood_fuel; lognormal variance with pedigree 0.4712, pedigree (2,3,5,1,1)
  (same comment as for residual wood, dry)
- Acetaldehyde [air, urban air close to ground]: 3.35986e-8 kg; = 6.1E-08*wood_fuel+0.000343; lognormal variance with pedigree 0.4712, pedigree (2,3,5,1,1)
  Emission factor from DS on heat generation from industrial residual wood mulitplied by the input of wood fuel (direct wood fuel plus production residues ) plus estimated emissions from wood and glue drying processes (based on Albrecht et al. 2009).
- Magnesium [air, urban air close to ground]: 7.73532e-8 kg; = 3.6E-07*wood_fuel; lognormal variance with pedigree 0.4712, pedigree (2,3,5,1,1)
  (same comment as for residual wood, dry)
- Fluorine [air, urban air close to ground]: 1.07435e-8 kg; = 5E-08*wood_fuel; lognormal variance with pedigree 0.4712, pedigree (2,3,5,1,1)
  (same comment as for residual wood, dry)
- Methane, non-fossil [air, urban air close to ground]: 3.22305e-7 kg; = 1.5E-06*wood_fuel; lognormal variance with pedigree 0.4712, pedigree (2,3,5,1,1)
  (same comment as for residual wood, dry)
- Benzene, hexachloro- [air, urban air close to ground]: 1.54706e-15 kg; = 7.2E-15*wood_fuel; lognormal variance with pedigree 0.4712, pedigree (2,3,5,1,1)
  (same comment as for residual wood, dry)
- PAH, polycyclic aromatic hydrocarbons [air, urban air close to ground]: 2.38506e-9 kg; = 1.11E-08*wood_fuel; lognormal variance with pedigree 0.4712, pedigree (2,3,5,1,1)
  (same comment as for residual wood, dry)
- Dinitrogen monoxide [air, urban air close to ground]: 4.94201e-7 kg; = 2.3E-06*wood_fuel; lognormal variance with pedigree 0.4712, pedigree (2,3,5,1,1)
  (same comment as for residual wood, dry)
- Arsenic [air, urban air close to ground]: 2.1487e-10 kg; = 1E-09*wood_fuel; lognormal variance with pedigree 0.4712, pedigree (2,3,5,1,1)
  (same comment as for residual wood, dry)
- Particulates, > 10 um [air, unspecified]: 5.93837e-6 kg; lognormal variance with pedigree 0.4346, pedigree (3,3,3,1,1)
  dust emissions
- Formaldehyde [air, urban air close to ground]: 1.17498e-6 kg; = 1.3E-07*wood_fuel+0.0192; lognormal variance with pedigree 0.4712, pedigree (2,3,5,1,1)
  Emission factor from DS on heat generation from industrial residual wood mulitplied by the input of wood fuel (direct wood fuel plus production residues) plus estimated emissions from wood and glue drying processes
- Nickel [air, urban air close to ground]: 1.28922e-9 kg; = 6E-09*wood_fuel; lognormal variance with pedigree 0.4712, pedigree (2,3,5,1,1)
  (same comment as for residual wood, dry)
- Lead [air, urban air close to ground]: 5.37175e-9 kg; = 2.5E-08*wood_fuel; lognormal variance with pedigree 0.4712, pedigree (2,3,5,1,1)
  (same comment as for residual wood, dry)
- NMVOC, non-methane volatile organic compounds, unspecified origin [air, urban air close to ground]: 1.97773e-5 kg; = 3.5E-06*wood_fuel + (0.517-0.0192-0.000343-0.179); lognormal variance with pedigree 0.2012, pedigree (2,3,5,1,1)
  Emission factor from DS on heat generation from industrial residual wood mulitplied by the input of wood fuel (direct wood fuel plus production residues) plus estimated emissions from wood and glue drying processes (based on Albrecht et al. 2009) minus emissions that have been inventoried specifically
- Methanol [air, non-urban air or from high stacks]: 1.06938e-6 kg; lognormal variance with pedigree 0.4726, pedigree (3,3,5,1,1)
  Estimated emissions from wood and glue drying processes
- Carbon dioxide, non-fossil [air, urban air close to ground]: 0.0219167 kg; = 0.102*wood_fuel; lognormal variance with pedigree 0.0412, pedigree (2,3,5,1,1)
  (same comment as for residual wood, dry)
- Chromium VI [air, urban air close to ground]: 8.5948e-12 kg; = 4E-11*wood_fuel; lognormal variance with pedigree 0.5212, pedigree (2,3,5,1,1)
  (same comment as for residual wood, dry)
- Copper [air, urban air close to ground]: 4.72714e-9 kg; = 2.2E-08*wood_fuel; lognormal variance with pedigree 0.4712, pedigree (2,3,5,1,1)
  (same comment as for residual wood, dry)
- Bromine [air, urban air close to ground]: 1.28922e-8 kg; = 6E-08*wood_fuel; lognormal variance with pedigree 0.4712, pedigree (2,3,5,1,1)
  (same comment as for residual wood, dry)
- Benzene, ethyl- [air, urban air close to ground]: 6.4461e-9 kg; = 3E-08*wood_fuel; lognormal variance with pedigree 0.4712, pedigree (2,3,5,1,1)
  (same comment as for residual wood, dry)
- Calcium [air, urban air close to ground]: 1.25699e-6 kg; = 5.85E-06*wood_fuel; lognormal variance with pedigree 0.4712, pedigree (2,3,5,1,1)
  (same comment as for residual wood, dry)
- Particulates, < 2.5 um [air, urban air close to ground]: 5.37175e-7 kg; = 2.5E-06*wood_fuel; lognormal variance with pedigree 0.1112, pedigree (2,3,5,1,1)
  (same comment as for residual wood, dry)
- Hydrocarbons, aliphatic, unsaturated [air, urban air close to ground]: 6.66097e-7 kg; = 3.1E-06*wood_fuel; lognormal variance with pedigree 0.4712, pedigree (2,3,5,1,1)
  (same comment as for residual wood, dry)
- Toluene [air, urban air close to ground]: 6.4461e-8 kg; = 3E-07*wood_fuel; lognormal variance with pedigree 0.4712, pedigree (2,3,5,1,1)
  (same comment as for residual wood, dry)
- Dioxins, measured as 2,3,7,8-tetrachlorodibenzo-p-dioxin [air, urban air close to ground]: 6.4461e-15 kg; = 3E-14*wood_fuel; lognormal variance with pedigree 0.4712, pedigree (2,3,5,1,1)
  (same comment as for residual wood, dry)
- Phenol, pentachloro- [air, urban air close to ground]: 1.74045e-12 kg; = 8.1E-12*wood_fuel; lognormal variance with pedigree 0.4712, pedigree (2,3,5,1,1)
  (same comment as for residual wood, dry)

## Sampling procedure
Survey among member companies of the European Panel Federation; emissions profile per MJ wood input from PSI (2014)

## Review by Emilia Moreno Ruiz 2015-01-16
Activity Link corrected from IR (Iran) to IE (Ireland)
