# precious metal refinery construction

Dataset: EcoSpold 2, unit process
Geography: RoW
Time period: 2000-01-01 to 2019-12-31
Technology level: current
Classification: EcoSpold01Categories: metals/extraction
Classification: ISIC rev.4 ecoinvent: 4100a: Construction of factory buildings for the metal industry
Tags: ConvertedDataset
Scenario: Business-as-Usual
System model: Allocation at the point of substitution
Generated by: Wolfram Scharnhorst
Published in: Classen M. 2009
Database: ecoinvent
isCopyrightProtected: true
accessRestrictedTo: 1

## General comment
The precious metal plant is equipped as follows: 1 Electrolyte cell, 1 Eluation cell, 5 Electrowinning cell, 1 Calcination furnace, 1 Smelting furnace, 1 Electrorefining cell. A building hall houses the equipment covering 5'000m2. The service life time assumed is 25 years, the yearly capacity of anode slime treatment is 243 t.
[This dataset was already contained in the ecoinvent database version 2. It was not individually updated during the transfer to ecoinvent version 3. Life Cycle Impact Assessment results may still have changed, as they are affected by changes in the supply chain, i.e. in other datasets. This dataset was generated following the ecoinvent quality guidelines for version 2. It may have been subject to central changes described in the ecoinvent version 3 change report (http://www.ecoinvent.org/database/ecoinvent-version-3/reports-of-changes/), and the results of the central updates were reviewed extensively. The changes added e.g. consistent water flows and other information throughout the database. The documentation of this dataset can be found in the ecoinvent reports of version 2, which are still available via the ecoinvent website. The change report linked above covers all central changes that were made during the conversion process.]

## Included activities end
Construction of facilities and housing, and their disposal. No transports and construction work considered.

## Geography
Data describes a Swedish plant that is singular in the region and ranges worldwide among the big producer. It may be taken as approximation for the global situation

## Technology
Due to high temperature chromium steel and refractory materials are used. Kaldo converter and converter aisle considered.

## Reference product
- precious metal refinery: 1 unit; CPC 53269: Other constructions for manufacturing; By-product classification allocatable product
  production volume 3.96757 unit
    This is a placeholder value that does not reflect real-world production volumes. This dataset does not currently require a real-world production volume to work in the database framework, and no actual data were collected yet. This has no negative effect on the results of the ecoinvent database.
  property price 347510 EUR2005
    Calculated based on inputs: The price of the product has been calculated as a sum of the values of the material and energy inputs for this product. This value is therefore a rough estimation. It may underestimate the real price since there are additional expenses when producing any product. These expences can include for example labour costs, treatment of waste materials and profit for the producer. Please consider carefully whether this level of data quality is acceptable for your application.
  property true value 347510
    allocation property applied in "true value" allocation // value calculated from revenue

## By-products
- heat, for reuse in municipal waste incineration only: 0 MJ; CPC 17300: Steam and hot water; By-product classification allocatable product; pedigree (1,1,1,1,1)
  Net electricity generated from this waste and used in internal MSWI plant energy redistribution.
  Uncertainty: uncertainty is calculated from uncertainties in waste composition and uncertainties in energy efficiency and the uncertainty in internal energy demand
  production volume 9.32932e-6 MJ
  property exergy 0.1842 MJ; name E_th_prod_MSWI_exergy
    This exergy property is based on the exergy content of the product.
  property price 0.0106 EUR2005; name E_th_prod_MSWI_price_EUR2005
    Average European district heat price from Ecoheatcool and Euroheat 2005-2006, Ecoheat Work package 1: The European heat market. Final report. 10.6 EUR/GJ i s the price of district heat. http://www.solarthermalworld.org/files/Ecoheatcool%20WP1%20Web.pdf?download
  property true value relation 0.1842; name E_th_prod_MSWI_true_value_relation
    property to calculate "true value" from
  property true value 2.04409e-8
    allocation property applied in "true value" allocation // value calculated from true value relation
- electricity, for reuse in municipal waste incineration only: 0 kWh; CPC 17100: Electrical energy; By-product classification allocatable product; pedigree (1,1,1,1,1)
  (same comment as for heat, for reuse in municipal waste incineration only)
  production volume 1.31382e-6 kWh
  property true value relation 3.6; name E_el_prod_MSWI_true_value_relation
    property to calculate "true value" from
  property price 0.1 EUR2005; name E_el_prod_MSWI_price_EUR2005
    Estimated to be the same price as in case of electricity, medium voltage.
  property exergy 3.6 MJ; name E_el_prod_MSWI_exergy
    This exergy property is based on the exergy content of the product.
  property true value 5.62598e-8
    (same comment as for heat, for reuse in municipal waste incineration only)

## Inputs from technosphere
- refractory, basic, packed: 113510 kg; lognormal variance with pedigree 0.0426, pedigree (2,1,5,5,1)
  properties: wet mass 1 kg, dry mass 1 kg
- glass fibre reinforced plastic, polyamide, injection moulded: 1786.5 kg; lognormal variance with pedigree 0.0426, pedigree (2,1,5,5,1)
  properties: carbon content, fossil 0.446018, wet mass 1 kg, dry mass 1 kg
  note on carbon content, fossil: Polyamide resin assimilate to Nylon 66 (ecoinvent v2.2 report 7_XIII). Nylon 66 is derived from hexamethylene diamine and adipic acid and has the following structure: -(HN-(CH2)6-NH-CO-(CH2)4-CO)n- (ecoinvent v2.2 report 11_II), C12H22N2O2. MW=226 g/mol. Here Nylon 66 is – mainly for improved stiffness and stability – modified with glass fibres. The glass fibre content in the product is assumed of 30%. (ecoinvent v2.2 report 11_II)
- calcium carbide, technical grade: 0.37373 kg; lognormal variance with pedigree 0.1126, pedigree (2,1,5,5,4)
  properties: carbon content, fossil 0.375, wet mass 1 kg, dry mass 1 kg
- building, hall, steel construction: 2000 m2; lognormal variance with pedigree 0.06, pedigree (4,1,5,5,1)
- lead: 2704.1 kg; lognormal variance with pedigree 0.1126, pedigree (2,1,5,5,4)
  properties: dry mass 1 kg, wet mass 1 kg
- sheet rolling, chromium steel: 8373.8 kg; lognormal variance with pedigree 0.0426, pedigree (2,1,5,5,1)
- waste concrete, not reinforced: 0 kg; pedigree (1,1,1,1,1)
  production volume 0 kg
    Calculated from the production volume of precious metal refinery in proportion to the respective output amounts.
  properties: dry mass 1 kg, wet mass 1 kg
- steel, chromium steel 18/8, hot rolled: 8581.6 kg; lognormal variance with pedigree 0.0426, pedigree (2,1,5,5,1)
  properties: dry mass 1 kg, wet mass 1 kg, carbon content, fossil 0.0008
  note on carbon content, fossil: Stainless steel model is the grade 304 steel (18/8 stainless, 18% chromium 8% nickel; max. 0.08% C)
- concrete, medium strength: 0 m3; pedigree (1,1,1,1,1)
  properties: wet mass 2380 kg, water content 0.086758, dry mass 2190 kg
- refractory spent pot liner from Al electrolysis: -3706.7 kg; lognormal variance with pedigree 0.182, pedigree (5,1,5,5,4)
  production volume 11120.1 kg
    (same comment as for waste concrete, not reinforced)
  properties: wet mass 1 kg, dry mass 1 kg
- nickel smelter slag: -101880 kg; lognormal variance with pedigree 0.182, pedigree (5,1,5,5,4)
  production volume 305640 kg
    (same comment as for waste concrete, not reinforced)
  properties: carbon content, fossil 0.00345, dry mass 1 kg, wet mass 1 kg
- section bar rolling, steel: 2548.6 kg; lognormal variance with pedigree 0.0426, pedigree (2,1,5,5,1)
- tin: 26.439 kg; lognormal variance with pedigree 0.1126, pedigree (2,1,5,5,4)
  properties: wet mass 1 kg, dry mass 1 kg
- waste concrete, not reinforced: -0.00268575, -3.61751 kg (2 entries); lognormal variance with pedigree 0.0426, pedigree (2,1,5,5,1)
  production volume 10.8606 kg
- concrete, medium strength: 0.880237, 0.32211, 1.24855, 0.917626, 0.251673 m3 (5 entries); lognormal variance with pedigree 0.0426, pedigree (2,1,5,5,1)

## Inputs from nature
- Transformation, to industrial area [natural resource, land]: 2000 m2; lognormal variance with pedigree 0.162, pedigree (1,1,5,5,1)
- Occupation, industrial area [natural resource, land]: 50000 m2*year; lognormal variance with pedigree 0.084, pedigree (3,1,5,5,1)
- Transformation, from unspecified [natural resource, land]: 2000 m2; lognormal variance with pedigree 0.162, pedigree (1,1,5,5,1)

## Sampling procedure
estimation

## Extrapolations
see Geography and Technology This dataset has been copied from an original dataset covering the geography SE. The uncertainty has been adjusted accordingly.

## Review by Roberto Dones 2007-08-22
Passed
