# aluminium electrolysis facility construction

Dataset: EcoSpold 2, unit process
Geography: RoW
Time period: 2002-01-01 to 2019-12-31
Technology level: current
Classification: ISIC rev.4 ecoinvent: 4100a: Construction of factory buildings for the metal industry
Classification: EcoSpold01Categories: metals/extraction
Tags: ConvertedDataset
Scenario: Business-as-Usual
System model: Allocation at the point of substitution
Generated by: Hans-Jörg Althaus
Published in: Althaus H.-J. 2000
Database: ecoinvent
isCopyrightProtected: true
accessRestrictedTo: 1

## General comment
Medium sized plant. Output: 130'000 t/a, life time: 50 years. Site is shared with casting plant. Total land use is allocated 50% to electrolysis, 50% to casting.
[This dataset was already contained in the ecoinvent database version 2. It was not individually updated during the transfer to ecoinvent version 3. Life Cycle Impact Assessment results may still have changed, as they are affected by changes in the supply chain, i.e. in other datasets. This dataset was generated following the ecoinvent quality guidelines for version 2. It may have been subject to central changes described in the ecoinvent version 3 change report (http://www.ecoinvent.org/database/ecoinvent-version-3/reports-of-changes/), and the results of the central updates were reviewed extensively. The changes added e.g. consistent water flows and other information throughout the database. The documentation of this dataset can be found in the ecoinvent reports of version 2, which are still available via the ecoinvent website. The change report linked above covers all central changes that were made during the conversion process.]

## Included activities end
Port, production hall, machinery and administrative buildings (including disposal)

## Geography
Some Swiss datasets are used for European processes.

## Technology
Technology of one medium sized plant in Norway

## Reference product
- aluminium electrolysis facility: 1 unit; CPC 53269: Other constructions for manufacturing; By-product classification allocatable product
  production volume 2.67763 unit
    This is a placeholder value that does not reflect real-world production volumes. This dataset does not currently require a real-world production volume to work in the database framework, and no actual data were collected yet. This has no negative effect on the results of the ecoinvent database.
  property price 8.59575e7 EUR2005
    Upscale from EU 27 to the world by PPP (0.8458 in 2003 and 0,8426 in 2004)
  property true value 8.59575e7
    allocation property applied in "true value" allocation // value calculated from revenue

## By-products
- heat, for reuse in municipal waste incineration only: 0 MJ; CPC 17300: Steam and hot water; By-product classification allocatable product; pedigree (1,1,1,1,1)
  Net electricity generated from this waste and used in internal MSWI plant energy redistribution.
  Uncertainty: uncertainty is calculated from uncertainties in waste composition and uncertainties in energy efficiency and the uncertainty in internal energy demand
  production volume 8.41448 MJ
  property exergy 0.1842 MJ; name E_th_prod_MSWI_exergy
    This exergy property is based on the exergy content of the product.
  property price 0.0106 EUR2005; name E_th_prod_MSWI_price_EUR2005
    Average European district heat price from Ecoheatcool and Euroheat 2005-2006, Ecoheat Work package 1: The European heat market. Final report. 10.6 EUR/GJ i s the price of district heat. http://www.solarthermalworld.org/files/Ecoheatcool%20WP1%20Web.pdf?download
  property true value relation 0.1842; name E_th_prod_MSWI_true_value_relation
    property to calculate "true value" from
  property true value 0.0184501
    allocation property applied in "true value" allocation // value calculated from true value relation
- electricity, for reuse in municipal waste incineration only: 0 kWh; CPC 17100: Electrical energy; By-product classification allocatable product; pedigree (1,1,1,1,1)
  (same comment as for heat, for reuse in municipal waste incineration only)
  production volume 1.18499 kWh
  property true value relation 3.6; name E_el_prod_MSWI_true_value_relation
    property to calculate "true value" from
  property price 0.1 EUR2005; name E_el_prod_MSWI_price_EUR2005
    Estimated to be the same price as in case of electricity, medium voltage.
  property exergy 3.6 MJ; name E_el_prod_MSWI_exergy
    This exergy property is based on the exergy content of the product.
  property true value 0.0507806
    (same comment as for heat, for reuse in municipal waste incineration only)

## Inputs from technosphere
- concrete, normal: 0 m3; pedigree (1,1,1,1,1)
  properties: water content 0.086758, dry mass 2190 kg, wet mass 2380 kg
- waste concrete, not reinforced: -200000 kg; lognormal variance with pedigree 0.346, pedigree (3,4,5,5,1)
  production volume 600000 kg
    Calculated from the production volume of aluminium electrolysis facility in proportion to the respective output amounts.
  properties: wet mass 1 kg, dry mass 1 kg
- conveyor belt: 1800 m; lognormal variance with pedigree 0.346, pedigree (3,4,5,5,1)
- reinforcing steel: 756000 kg; lognormal variance with pedigree 0.346, pedigree (3,4,5,5,1)
  properties: dry mass 1 kg, wet mass 1 kg, carbon content, fossil 0.004
- steel, low-alloyed, hot rolled: 857000 kg; lognormal variance with pedigree 0.346, pedigree (3,4,5,5,1)
  properties: dry mass 1 kg, carbon content, fossil 0.005, wet mass 1 kg
  note on carbon content, fossil: Low alloyed steel composition given in Tab. 3.2 ecoinvent v2.2 report 10_partII. Steel assumed to have a C content of 0.5%
- building, hall: 19700 m2; lognormal variance with pedigree 0.346, pedigree (3,4,5,5,1)
- building, multi-storey: 25000 m3; lognormal variance with pedigree 0.346, pedigree (3,4,5,5,1)
- waste reinforced concrete: -3.16e6 kg; lognormal variance with pedigree 0.346, pedigree (3,4,5,5,1)
  production volume 9.48e6 kg
    (same comment as for waste concrete, not reinforced)
  properties: dry mass 0.99418 kg, water content 0.00585407, wet mass 1 kg
- industrial machine, heavy, unspecified: 200000 kg; lognormal variance with pedigree 0.346, pedigree (3,4,5,5,1)
- concrete, normal: 27.1135, 2.82519, 22.8719, 12.8654, 54.4815, 1.83763, 1058.9 m3 (7 entries); lognormal variance with pedigree 0.346, pedigree (3,4,5,5,1)

## Inputs from nature
- Transformation, from unspecified [natural resource, land]: 488000 m2; lognormal variance with pedigree 0.1646, pedigree (2,4,5,5,1)
- Transformation, to industrial area [natural resource, land]: 487600 m2; lognormal variance with pedigree 0.1646, pedigree (2,4,5,5,1)
- Occupation, industrial area [natural resource, land]: 2.438e7 m2*year; lognormal variance with pedigree 0.0846, pedigree (2,4,5,5,1)

## Sampling procedure
Internet search

## Extrapolations
see Geography This dataset has been copied from an original dataset covering the geography RER. The uncertainty has been adjusted accordingly.

## Review by Roland Hischier 2003-06-10
Passed.
