# treatment of non-Fe-Co-metals, from used Li-ion battery, pyrometallurgical processing

Dataset: EcoSpold 2, unit process
Geography: GLO
Time period: 2000-01-01 to 2019-12-31
Technology level: current
Classification: EcoSpold01Categories: metals/extraction
Classification: ISIC rev.4 ecoinvent: 2420:Manufacture of basic precious and other non-ferrous metals
Scenario: Business-as-Usual
System model: Allocation at the point of substitution
Generated by: Sofia Parada Tur
Database: ecoinvent
isCopyrightProtected: true
accessRestrictedTo: 1

## General comment
The treatment of non-Fe-Co-metals fraction from used Li-ion battery, pyrometallurgical processing is based on the proxy "treatment of precious metal from electronics scrap, in anode slime, precious metal extraction". This proxy has been chosen because of the diverse composition of this fraction. The byproducts in the original dataset "silver, secondary, at precious metal refinery", "gold, secondary, at precious metal refinery" and "palladium, secondary, at precious metal refinery" have been deleted in order to adapt the dataset to the composition of the non-Fe-Co-metals fraction. The same has been done for the original outputs of Cadmium, Lead, Mercury and Zinc. The composition of the non-Fe-Cp-metals is 21% Copper, 14.4% Aluminium and 0.8% Lithium. The composition is calculated from the Li-Ion battery production, including cathode and anode components.The uncertainty has been adjusted accordingly.

## Included activities start
The activity starts with the reception of non-Fe-Co-metals fraction from the treatment of Li-Ion battery, pyrometallurgical processing

## Included activities end
The activity ends with the production of Copper. Aluminium and Lithium are burned during the process.

## Geography
Data is adapted from a Swedish plant that is singular in the region and ranges worldwide among the big producer. It may be taken as approximation for the global situation

## Technology
Based on technology that treats anode slime by pressure leaching and top blown rotary converter.

## Reference product
- non-Fe-Co-metals, from used Li-ion battery, pyrometallurgical processing: 0 kg; CPC 393: Metal wastes or scraps; By-product classification Waste
  production volume 0 kg; name non_fe_co_pv
    the production volume represents the non-Fe-Co-metals produced in the treatment of used Li-ion battery, pyrometallurgical processing. For further information, refer to dataset "treatment of used Li-ion battery, pyrometallurgical processing".
  property price 10.4 EUR2005
    Temporary price data. Calculated as 90% of purchasers price based on: Assumed as same price as nickel: 2004 nickel price from USGS (2007) Mineral commodity summaries 2007. <http://minerals.usgs.gov/minerals/pubs/mcs/2007/mcs2007.pdf> [Accessed 25 May 2010]
  property water in wet mass 0 kg; name WWM
  property carbon content, non-fossil 0; name C_content_non_fossil
  property wet mass 1 kg; name WM
  property dry mass 1 kg; name DM
  property water content 0; name water_content
  property carbon content, fossil 0; name C_content_fossil
  property carbon content 0
    carbon content on a dry matter basis (reserved; not for manual entry)
  properties: carbon allocation 0 kg
- copper: 1 kg; By-product classification allocatable product; CPC 41413: Refined copper and copper alloys, unwrought; master alloys of copper; pedigree (1,1,1,1,1)
  based on Li-ioin battery composition and pyrometallurgical treatment process. Substracted from copper emissions related to the original process for precious metal extraction
  production volume 50399.7 kg

## By-products
- copper: 0 kg; name copper_bp; = 0.21- copper_emissions; By-product classification allocatable product; CPC 41413: Refined copper and copper alloys, unwrought; master alloys of copper; pedigree (1,1,1,1,1)
  (same comment as for copper)
  production volume 0 kg; = copper_bp* non_fe_co_pv
    Calculated from production volume of reference product using the relative outputs.
  property price 5.52 EUR2005; name copper_bp_price_EUR2005
    Literature value (http://www.economist.com/news/business/21576714-mining-industry-has-enriched-chile-its-future-precarious-copper-solution). Average price between 20015 and 2013.
  property carbon content 0
    carbon content on a dry matter basis (reserved; not for manual entry)
  properties: carbon content, fossil 0, dry mass 1 kg, water in wet mass 0 kg, water content 0, wet mass 1 kg, carbon content, non-fossil 0, carbon allocation 0 kg

## Inputs from technosphere
- electricity, high voltage: 0 kWh; pedigree (1,1,1,1,1)
  EcoSpold01Location=UCTE
- precious metal refinery: 0 unit; pedigree (1,1,1,1,1)
  EcoSpold01Location=SE
- oxygen, liquid: 0 kg; pedigree (1,1,1,1,1)
  EcoSpold01Location=RER
  properties: wet mass 1 kg, dry mass 1 kg
- heat, district or industrial, other than natural gas: 0 MJ; pedigree (1,1,1,1,1)
  EcoSpold01Location=RER
- oxygen, liquid: 5.43374e-10, 1.98031e-9 kg (2 entries); lognormal variance with pedigree 0.22, pedigree (5,5,5,5,5)
  EcoSpold01Location=RER
- waste plastic, mixture: -7.4212e-5, -3.06522e-5, -2.91071e-5, -0.00111069, -1.23831e-5, -5.61253e-6, -0.00777544 kg (7 entries); lognormal variance with pedigree 0.0521, pedigree (1,4,5,3,1)
  EcoSpold01Location=CH
  Data of 1 European plant - reported in Fisher (2006)
  Uncertainty: data of 1 European plant - reported in Fisher (2006)
- hazardous waste, for underground deposit: -2.70825e-7 kg; lognormal variance with pedigree 0.0032, pedigree (1,3,3,1,1)
  Amount and activity link based on primary data collected from participating companies.
  production volume 1.75109e6 kg
- light fuel oil: 4.71988e-6 kg; lognormal variance with pedigree 0.0032, pedigree (1,3,3,1,1)
  Amount and activity link based on primary data collected from participating companies. Emissions from fuel combustion included in dataset.
- copper: 0.00117642 kg; lognormal variance with pedigree 0.0032, pedigree (1,3,3,1,1)
  Amount and activity link based on primary data collected from participating companies.
- blasting: 5.24564e-6 kg; lognormal variance with pedigree 0.0032, pedigree (1,3,3,1,1)
  Amount and activity link based on primary data collected from participating companies.
- mine infrastructure, underground, non-ferrous metal: 7.27546e-13 unit; lognormal variance with pedigree 0.0887, pedigree (5,5,5,3,1)
  Estimation from author of 'zinc mine operation, GLO, 1994-2003' dataset. No primary data on infrastructure included.
- heat, district or industrial, other than natural gas: 6.21081e-6, 3.21999e-6, 0.000137343 MJ (3 entries); lognormal variance with pedigree 0.0032, pedigree (1,3,3,1,1)
  Amount and activity link based on primary data collected from participating companies.
- conveyor belt: 4.95502e-10 m; lognormal variance with pedigree 0.0587, pedigree (4,4,5,3,3)
  Estimation from author of 'zinc mine operation, GLO, 1994-2003' dataset: 2000 m conveyor belts are assumed to have a capacity of 2000 t/h which yields 2*10-5 m conveyor belt required per tonne mined raw ore. No primary data on infrastructure included.
- maize starch: 2.47871e-7 kg; lognormal variance with pedigree 0.0032, pedigree (1,3,3,1,1)
  Amount and activity link based on primary data collected from participating companies.
- electricity, medium voltage: 0.00629227, 0.000598922, 0.000192371, 2.7477e-8, 7.33302e-5, 5.81286e-5, 0.000741606 kWh (7 entries); lognormal variance with pedigree 0.0032, pedigree (1,3,3,1,1)
  Amount and activity link based on primary data collected from participating companies.
- zinc slag: -3.33556e-7 kg; lognormal variance with pedigree 0.0032, pedigree (1,3,3,1,1)
  Amount and activity link based on primary data collected from participating companies.
  production volume 2.1567e6 kg
- copper sulfate: 3.6106e-5 kg; lognormal variance with pedigree 0.0032, pedigree (1,3,3,1,1)
  Amount and activity link based on primary data collected from participating companies.
- heavy fuel oil: 1.84507e-6 kg; lognormal variance with pedigree 0.0032, pedigree (1,3,3,1,1)
  (same comment as for light fuel oil)
- electricity, high voltage: 0.000282441 kWh; lognormal variance with pedigree 0.0032, pedigree (1,3,3,1,1)
  Amount and activity link based on primary data collected from participating companies.
- diesel: 2.04817e-5, 7.57048e-5 kg (2 entries); lognormal variance with pedigree 0.0032, pedigree (1,3,3,1,1)
  Amount and activity link based on primary data collected from participating companies. Emissions from diesel combustion included in dataset.
- tap water: 0.0180075 kg; lognormal variance with pedigree 0.0032, pedigree (1,3,3,1,1)
  Amount and activity link based on primary data collected from participating companies.
- aluminium chloride: 4.05714e-10 kg; lognormal variance with pedigree 0.0032, pedigree (1,3,3,1,1)
  Amount and activity link based on primary data collected from participating companies.
- steel, low-alloyed: 7.633e-6 kg; lognormal variance with pedigree 0.0032, pedigree (1,3,3,1,1)
  Amount and activity link based on primary data collected from participating companies.
- chemical, organic: 9.64631e-6 kg; lognormal variance with pedigree 0.0032, pedigree (1,3,3,1,1)
  Amount and activity link based on primary data collected from participating companies.
- concrete, normal: 1.16135e-8 m3; lognormal variance with pedigree 0.0032, pedigree (1,3,3,1,1)
  Amount and activity link based on primary data collected from participating companies.
- chemical, inorganic: 4.9236e-7 kg; lognormal variance with pedigree 0.0032, pedigree (1,3,3,1,1)
  Amount and activity link based on primary data collected from participating companies.
- waste wood, post-consumer: -8.15554e-8 kg; lognormal variance with pedigree 0.0032, pedigree (1,3,3,1,1)
  Amount and activity link based on primary data collected from participating companies.
  production volume 527319 kg
- acetic acid, without water, in 98% solution state: 6.92053e-8 kg; lognormal variance with pedigree 0.0032, pedigree (1,3,3,1,1)
  Amount and activity link based on primary data collected from participating companies.
- transport, freight, sea, bulk carrier for dry goods: 7.2769e-7 metric ton*km; lognormal variance with pedigree 0.1226, pedigree (1,3,3,1,1)
  Inbound transport of materials to sites. Amount and activity link based on primary data collected from participating companies.
- cement, unspecified: 7.02923e-7 kg; lognormal variance with pedigree 0.0032, pedigree (1,3,3,1,1)
  Amount and activity link based on primary data collected from participating companies.
- sodium dichromate: 1.78102e-8 kg; lognormal variance with pedigree 0.0032, pedigree (1,3,3,1,1)
  Amount and activity link based on primary data collected from participating companies.
- polyacrylamide: 1.7303e-7 kg; lognormal variance with pedigree 0.0032, pedigree (1,3,3,1,1)
  Amount and activity link based on primary data collected from participating companies.
- used Li-ion battery: -0.0385202 kg; lognormal variance with pedigree 0.0032, pedigree (1,3,3,1,1)
  Amount and activity link based on primary data collected from participating companies.
  production volume 30057 kg
- sodium sulfide: 3.30451e-7 kg; lognormal variance with pedigree 0.0032, pedigree (1,3,3,1,1)
  Amount and activity link based on primary data collected from participating companies.
- sodium hydrogen sulfite: 1.25462e-7 kg; lognormal variance with pedigree 0.0032, pedigree (1,3,3,1,1)
  Amount and activity link based on primary data collected from participating companies.
- soda ash, dense: 6.33523e-6 kg; lognormal variance with pedigree 0.0032, pedigree (1,3,3,1,1)
  Amount and activity link based on primary data collected from participating companies.
- non-sulfidic overburden, off-site: -0.0516109 kg; lognormal variance with pedigree 0.0032, pedigree (1,3,3,1,1)
  Amount and activity link based on primary data collected from participating companies.
  production volume 3.33704e11 kg
- propane: 4.19655e-6 kg; lognormal variance with pedigree 0.0032, pedigree (1,3,3,1,1)
  Amount and activity link based on primary data collected from participating companies.
- pig iron: 1.28543e-6 kg; lognormal variance with pedigree 0.0032, pedigree (1,3,3,1,1)
  Amount and activity link based on primary data collected from participating companies.
- natural gas, high pressure: 1.43792e-7 m3; lognormal variance with pedigree 0.0032, pedigree (1,3,3,1,1)
  (same comment as for light fuel oil)
- petrol, unleaded: 2.47202e-8, 1.09732e-9, 4.53498e-9, 1.09375e-9, 4.09173e-9, 2.25305e-10, 1.25941e-7 kg (7 entries); lognormal variance with pedigree 0.0032, pedigree (1,3,3,1,1)
  Amount and activity link based on primary data collected from participating companies.
- inert waste: -3.12064e-7, -2.68771e-9, -1.09999e-6 kg (3 entries); lognormal variance with pedigree 0.0032, pedigree (1,3,3,1,1)
  Amount and activity link based on primary data collected from participating companies.
  production volume 9.14737e6 kg
- lubricating oil: 3.76857e-7, 1.78903e-6 kg (2 entries); lognormal variance with pedigree 0.0032, pedigree (1,3,3,1,1)
  Amount and activity link based on primary data collected from participating companies.
- lime, hydrated, packed: 1.91978e-9, 2.26167e-7 kg (2 entries); lognormal variance with pedigree 0.0032, pedigree (1,3,3,1,1)
  Amount and activity link based on primary data collected from participating companies.
- limestone, crushed, washed: 2.90688e-11, 3.40919e-9 kg (2 entries); lognormal variance with pedigree 0.0032, pedigree (1,3,3,1,1)
  Amount and activity link based on primary data collected from participating companies.
- bilge oil: -3.53393e-9, -9.23747e-11, -7.34862e-9 kg (3 entries); lognormal variance with pedigree 0.0032, pedigree (1,3,3,1,1)
  Amount and activity link based on primary data collected from participating companies.
  production volume 70961.3 kg
- lime: 7.50614e-8, 8.69083e-7 kg (2 entries); lognormal variance with pedigree 0.0032, pedigree (1,3,3,1,1)
  Amount and activity link based on primary data collected from participating companies.
- hazardous waste, for incineration: -3.27889e-6, -8.57083e-8, -6.8183e-6 kg (3 entries); lognormal variance with pedigree 0.0032, pedigree (1,3,3,1,1)
  Amount and activity link based on primary data collected from participating companies.
  production volume 6.58402e7 kg
- limestone, unprocessed: 3.24015e-7, 3.35437e-9, 8.2034e-6 kg (3 entries); lognormal variance with pedigree 0.0032, pedigree (1,3,3,1,1)
  Amount and activity link based on primary data collected from participating companies.
- hydrogen cyanide: 4.66159e-8, 1.02555e-7 kg (2 entries); lognormal variance with pedigree 0.0032, pedigree (1,3,3,1,1)
  Amount and activity link based on primary data collected from participating companies.
- sulfidic tailings, from zinc-lead mine operation: -0.00657803, -0.000926034, -0.000811078, -0.00171795, -0.000335927, -0.00222887, -0.00118149, -0.00378333 kg (8 entries); lognormal variance with pedigree 0.0032, pedigree (1,3,3,1,1)
  Amount and activity link based on primary data collected from participating companies.
  production volume 1.13556e11 kg
- iron sulfate: 5.50144e-8, 1.11397e-7 kg (2 entries); lognormal variance with pedigree 0.0032, pedigree (1,3,3,1,1)
  Amount and activity link based on primary data collected from participating companies.
- nylon 6: 1.34944e-8, 2.73244e-8 kg (2 entries); lognormal variance with pedigree 0.0032, pedigree (1,3,3,1,1)
  Amount and activity link based on primary data collected from participating companies.
- zinc monosulfate: 1.32227e-6, 6.98515e-6 kg (2 entries); lognormal variance with pedigree 0.0032, pedigree (1,3,3,1,1)
  Amount and activity link based on primary data collected from participating companies.
- concrete, 35MPa: 2.6356e-10, 1.6481e-12, 1.05342e-11, 2.17485e-9 m3 (4 entries); lognormal variance with pedigree 0.0032, pedigree (1,3,3,1,1)
  Amount and activity link based on primary data collected from participating companies.
- transport, freight, lorry 16-32 metric ton, EURO3: 1.85411e-6, 4.56149e-6 metric ton*km (2 entries); lognormal variance with pedigree 0.1226, pedigree (1,3,3,1,1)
  (same comment as for transport, freight, sea, bulk carrier for dry goods)
- acrylic acid: 1.08034e-8, 5.12852e-8 kg (2 entries); lognormal variance with pedigree 0.0032, pedigree (1,3,3,1,1)
  Amount and activity link based on primary data collected from participating companies.
- sulfuric acid: 0.000412483, 0.000414938 kg (2 entries); lognormal variance with pedigree 0.0032, pedigree (1,3,3,1,1)
  Amount and activity link based on primary data collected from participating companies.
- sulfur dioxide, liquid: 5.23252e-7, 1.30246e-6 kg (2 entries); lognormal variance with pedigree 0.0032, pedigree (1,3,3,1,1)
  Amount and activity link based on primary data collected from participating companies.
- waste paper, unsorted: -8.88152e-11, -2.70697e-12, -5.9613e-10 kg (3 entries); lognormal variance with pedigree 0.0032, pedigree (1,3,3,1,1)
  Amount and activity link based on primary data collected from participating companies.
  production volume 4446.2 kg
- sodium cyanide: 1.20273e-7, 2.43537e-7 kg (2 entries); lognormal variance with pedigree 0.0032, pedigree (1,3,3,1,1)
  Amount and activity link based on primary data collected from participating companies.
- waste mineral oil: -7.41401e-8, -1.71553e-9, -2.20586e-7 kg (3 entries); lognormal variance with pedigree 0.0032, pedigree (1,3,3,1,1)
  Amount and activity link based on primary data collected from participating companies.
  production volume 1.91672e6 kg
- calcium chloride: 2.26501e-8, 7.84346e-8 kg (2 entries); lognormal variance with pedigree 0.0032, pedigree (1,3,3,1,1)
  Amount and activity link based on primary data collected from participating companies.
- municipal solid waste: -3.17283e-7, -1.94472e-9, -1.36084e-9, -5.40069e-9, -3.81958e-6 kg (5 entries); lognormal variance with pedigree 0.0032, pedigree (1,3,3,1,1)
  Amount and activity link based on primary data collected from participating companies.
  production volume 2.68043e7 kg
- quicklime, milled, loose: 3.33402e-9, 3.98943e-7 kg (2 entries); lognormal variance with pedigree 0.0032, pedigree (1,3,3,1,1)
  Amount and activity link based on primary data collected from participating companies.
- waste rubber, unspecified: -0.0550131, -0.109616, -0.0550131 kg (3 entries); lognormal variance with pedigree 0.0032, pedigree (1,3,3,1,1)
  Amount and activity link based on primary data collected from participating companies.
  production volume 7904.23 kg
- polyol: 7.99794e-8, 1.61948e-7 kg (2 entries); lognormal variance with pedigree 0.0032, pedigree (1,3,3,1,1)
  Amount and activity link based on primary data collected from participating companies.
- scrap copper: -5.35069e-8, -2.51043e-9, -1.12664e-7 kg (3 entries); lognormal variance with pedigree 0.0032, pedigree (1,3,3,1,1)
  Amount and activity link based on primary data collected from participating companies.
  production volume 1.09065e6 kg
- quicklime, in pieces, loose: 2.66052e-10, 1.60766e-5 kg (2 entries); lognormal variance with pedigree 0.0032, pedigree (1,3,3,1,1)
  Amount and activity link based on primary data collected from participating companies.
- chemical factory, organics: 3.16626e-11 unit; lognormal variance with pedigree 0.4461, pedigree (5,5,5,3,3)
  EcoSpold01Location=RER
- nitrogen, liquid: 0.000395782 kg; lognormal variance with pedigree 0.0381, pedigree (4,4,4,3,1)
  EcoSpold01Location=RER
- battery separator: 0.00424714 kg; lognormal variance with pedigree 0.0207, pedigree (2,4,4,3,1)
  EcoSpold01Location=CN
- aluminium, wrought alloy: 0.0199418 kg; lognormal variance with pedigree 0.0207, pedigree (2,4,4,3,1)
  EcoSpold01Location=RER
- ethylene carbonate: 0.012631 kg; lognormal variance with pedigree 0.0207, pedigree (2,4,4,3,1)
  EcoSpold01Location=CN
- lithium hexafluorophosphate: 0.0015069 kg; lognormal variance with pedigree 0.0207, pedigree (2,4,4,3,1)
  EcoSpold01Location=CN
- extrusion, plastic film: 0.00580137 kg; lognormal variance with pedigree 0.0207, pedigree (2,4,4,3,1)
  EcoSpold01Location=RER
- anode, graphite, for lithium-ion battery: 0.0317496 kg; lognormal variance with pedigree 0.0207, pedigree (2,4,4,3,1)
  EcoSpold01Location=CN
- polyethylene, low density, granulate: 0.00580137 kg; lognormal variance with pedigree 0.0207, pedigree (2,4,4,3,1)
  EcoSpold01Location=RER
- sheet rolling, aluminium: 0.00130489 kg; lognormal variance with pedigree 0.3207, pedigree (2,4,4,3,1)
  EcoSpold01Location=RER
- heat, district or industrial, natural gas: 0.086454 MJ; lognormal variance with pedigree 0.0381, pedigree (4,4,4,3,1)
  EcoSpold01Location=RER
- electricity, medium voltage: 0.00417946 kWh; lognormal variance with pedigree 0.048, pedigree (1,1,4,1,1)
  composite
  EcoSpold01Location=CN
- cathode, LiMn2O4, for lithium-ion battery: 0.0258731 kg; lognormal variance with pedigree 0.0207, pedigree (2,4,4,3,1)
  EcoSpold01Location=CN
- printed wiring board, surface mounted, unspecified, Pb free: 2.286e-5 kg; lognormal variance with pedigree 0.0101, pedigree (1,4,4,3,1)
  This original value from production mix has been replaced by 2 flows. Pb-containing has a share of 0.3, Pb-free has a share of 0.7.
- printed wiring board, surface mounted, unspecified, Pb containing: 9.79715e-6 kg; lognormal variance with pedigree 0.0101, pedigree (1,4,4,3,1)
  (same comment as for printed wiring board, surface mounted, unspecified, Pb free)
- metal working factory: 4.41952e-12 unit; lognormal variance with pedigree 0.4461, pedigree (5,5,5,3,3)
  EcoSpold01Location=RER
- cable, data cable in infrastructure: 0.00359834 m; lognormal variance with pedigree 0.0221, pedigree (3,4,4,3,1)
  EcoSpold01Location=GLO
- battery cell, Li-ion: 0.00771361 kg; lognormal variance with pedigree 0.0101, pedigree (1,4,4,3,1)
  EcoSpold01Location=CN
- reinforcing steel: 0.0750159 kg; lognormal variance with pedigree 0.0287, pedigree (2,4,4,3,3)
  EcoSpold01Location=RER
- sheet rolling, steel: 0.0237509 kg; lognormal variance with pedigree 0.0287, pedigree (2,4,4,3,3)
  EcoSpold01Location=RER
- electricity, low voltage: 0.00103782 kWh; lognormal variance with pedigree 0.096, pedigree (4,5,5,5,3)
  EcoSpold01Location=UCTE
- cable, three-conductor cable: 0.000240806 m; lognormal variance with pedigree 0.0221, pedigree (3,4,4,3,1)
  EcoSpold01Location=GLO
- metal working, average for steel product manufacturing: 0.00275365 kg; lognormal variance with pedigree 0.0186, pedigree (4,5,3,1,1)
  Calculated.
- battery, Li-ion, rechargeable, prismatic: 0.0191593 kg; source Carrier 2014; lognormal variance with pedigree 0.0186, pedigree (4,5,3,1,1)
  Literature value (Carrier, 2014, Operation and service for 69RG15 generator set units, http://dms.hvacpartners.com//docs/2000/Public/04/T-361.pdf, accessed 20141218).
- zinc coat, pieces: 3.68421e-5 m2; lognormal variance with pedigree 0.0186, pedigree (4,5,3,1,1)
  Calculated value based on estimates.
  The dimentions of the genset are approximatelly 2.4*1*0.7m.
- steel, low-alloyed, hot rolled: 0.0240671 kg; lognormal variance with pedigree 0.0186, pedigree (4,5,3,1,1)
  Calculated value.
- used diesel-electric generating set, 18.5kW: -5.94228e-6 unit
  production volume 50000 unit
- metal working, average for aluminium product manufacturing: 0.00178268 kg; lognormal variance with pedigree 0.0186, pedigree (4,5,3,1,1)
  Calculated.
- welding, arc, steel: 5.94228e-5 m; lognormal variance with pedigree 0.0186, pedigree (4,5,3,1,1)
  Estimated.
- electronics, for control units: 8.91342e-5 kg; source Carrier 2014; lognormal variance with pedigree 0.0186, pedigree (4,5,3,1,1)
  Estimated based on literature.
- aluminium alloy, AlMg3: 0.0148275 kg; lognormal variance with pedigree 0.0267, pedigree (2,2,4,1,3)
  EcoSpold01Location=RER
  Estimation:5% of aluminium parts replaced
  Uncertainty: Estimation:5% of aluminium parts replaced
- polyethylene, high density, granulate: 0.0451372 kg; lognormal variance with pedigree 0.0267, pedigree (2,2,4,1,3)
  Estimation: Bicycle: 50% of plastic parts once replaced, Scooter 15% replaced
  EcoSpold01Location=RER
  Uncertainty: Estimation: Bicycle: 50% of plastic parts once replaced, Scooter 15% replaced
- waste plastic, mixture: -0.00995116 kg; lognormal variance with pedigree 0.0341, pedigree (4,2,4,1,3)
  Plastics to municipal incineration
  EcoSpold01Location=CH
  Uncertainty: plastics to municipal incineration
  production volume 1.0088 kg
- section bar extrusion, aluminium: 0.00740056 kg; lognormal variance with pedigree 0.0961, pedigree (4,2,4,1,4)
  EcoSpold01Location=RER
  Assumption for pipe drawing
  Uncertainty: Assumption for pipe drawing
- tap water: 0.158536 kg; lognormal variance with pedigree 0.0092, pedigree (2,3,4,1,1)
  Assumption based on: Cherry, C.R. 2007, 1488 liters waste water for all production phases (incl. Battery manufacturing --> 50%)
  EcoSpold01Location=RER
  Uncertainty: Assumption based on: Cherry, C.R. 2007, 1488 liters waste water for all production phases (incl. Battery manufacturing --> 50%)
- chromium steel removed by turning, average, conventional: 0.00517436 kg; lognormal variance with pedigree 0.0961, pedigree (4,2,4,1,4)
  Assumption
  EcoSpold01Location=RER
  Uncertainty: Assumption
- polyurethane, flexible foam: 3.98268e-5 kg; lognormal variance with pedigree 0.0267, pedigree (2,2,4,1,3)
  Estimation: saddle once replaced, Scooter: no replacement
  EcoSpold01Location=RER
  Uncertainty: Estimation: saddle once replaced, Scooter: no replacement
- synthetic rubber: 0.44416 kg; lognormal variance with pedigree 0.0267, pedigree (2,2,4,1,3)
  EcoSpold01Location=RER
  Estimation: 3.75 (bike)/3 (scooter) tyre-sets use in life-time
  Uncertainty: Estimation: 3.75 (bike)/3 (scooter) tyre-sets use in life-time
- injection moulding: 0.022552 kg; lognormal variance with pedigree 0.0961, pedigree (4,2,4,1,4)
  EcoSpold01Location=RER
  Assumption
  Uncertainty: Assumption
- lead: 0.013421 kg; lognormal variance with pedigree 0.0341, pedigree (4,2,4,1,3)
  Estimation: 2 batteries per 50000km
  EcoSpold01Location=RER
  Uncertainty: Estimation: 2 batteries per 50000km
- used Ni-metal hydride battery: -0.00699556 kg; lognormal variance with pedigree 0.0267, pedigree (2,2,4,1,3)
  EcoSpold01Location=GLO
  Amount of S-Pb batteries replaced
  Uncertainty: Amount of S-Pb batteries replaced
  production volume 0.341561 kg
- alkyd paint, white, without solvent, in 60% solution state: 0.000343695 kg; lognormal variance with pedigree 0.1287, pedigree (4,3,5,3,4)
  EcoSpold01Location=RER
  Uncertainty: weight ratio scooter:passenger car
- palladium: 3.31698e-8 kg; lognormal variance with pedigree 0.1287, pedigree (4,3,5,3,4)
  EcoSpold01Location=RER
  Uncertainty: weight ratio scooter:passenger car
- aluminium, cast alloy: 0.00793142 kg; lognormal variance with pedigree 0.1287, pedigree (4,3,5,3,4)
  15 kg aluminium, production mix.
  0.32: part of aluminium cast alloy in aluminium, production mix. Based on the aluminium, production mix in ecoinvent v2.2.
  Uncertainty: 15 kg
- chromium: 0.000265355 kg; lognormal variance with pedigree 0.1287, pedigree (4,3,5,3,4)
  EcoSpold01Location=RER
  Uncertainty: weight ratio scooter:passenger car
- polyvinylchloride, suspension polymerised: 0.00345945 kg; lognormal variance with pedigree 0.0446, pedigree (4,3,4,1,3)
  EcoSpold01Location=RER
  Uncertainty: 15% of passenger car
- tap water: 0.178011 kg; lognormal variance with pedigree 0.1287, pedigree (4,3,5,3,4)
  EcoSpold01Location=RER
  Uncertainty: weight ratio scooter:passenger car
- platinum: 1.76904e-7 kg; lognormal variance with pedigree 0.1287, pedigree (4,3,5,3,4)
  EcoSpold01Location=RER
  Uncertainty: weight ratio scooter:passenger car
- road vehicle factory: 1.60876e-11 unit; lognormal variance with pedigree 0.4287, pedigree (4,3,5,3,4)
  activityLink introduced to establish a direct link to the corresponding regional supply of this product
  Uncertainty: weight ratio scooter:passenger car
- used motor scooter: -0.00165238 unit; lognormal variance with pedigree 0.3086, pedigree (2,1,4,1,1)
  Uncertainty: Estimation: Scooter 50'000km
  production volume 1.32237 unit
- wire drawing, copper: 0.000558372 kg; lognormal variance with pedigree 0.1287, pedigree (4,3,5,3,4)
  (same comment as for road vehicle factory)
- heat, district or industrial, natural gas: 0.0878291 MJ; lognormal variance with pedigree 0.0346, pedigree (4,3,4,1,3)
  EcoSpold01Location=RER
  Uncertainty: 50% of Environmental report Honda, 2008
- section bar rolling, steel: 0.011223 kg; lognormal variance with pedigree 0.1287, pedigree (4,3,5,3,4)
  (same comment as for road vehicle factory)
- polyvinylchloride, emulsion polymerised: 0.000506262 kg; lognormal variance with pedigree 0.0446, pedigree (4,3,4,1,3)
  EcoSpold01Location=RER
  Uncertainty: 15% of passenger car
- nickel, 99.5%: 0.000154795 kg; lognormal variance with pedigree 0.1287, pedigree (4,3,5,3,4)
  EcoSpold01Location=GLO
  Uncertainty: weight ratio scooter:passenger car
- electricity, medium voltage: 0.0160766 kWh; lognormal variance with pedigree 0.0346, pedigree (4,3,4,1,3)
  EcoSpold01Location=JP
  Uncertainty: 50% of Environmental report Honda, 2008
- zinc: 0.000651252 kg; lognormal variance with pedigree 0.1287, pedigree (4,3,5,3,4)
  EcoSpold01Location=RER
  Uncertainty: weight ratio scooter:passenger car
- polypropylene, granulate: 0.012145 kg; lognormal variance with pedigree 0.0446, pedigree (4,3,4,1,3)
  EcoSpold01Location=RER
  Uncertainty: 15% of passenger car
- heat, district or industrial, other than natural gas: 0.00315522 MJ; lognormal variance with pedigree 0.0346, pedigree (4,3,4,1,3)
  EcoSpold01Location=RER
  Uncertainty: 50% of Environmental report Honda, 2008
- ethylene, average: 0.00102274 kg; lognormal variance with pedigree 0.1287, pedigree (4,3,5,3,4)
  EcoSpold01Location=RER
  Uncertainty: weight ratio scooter:passenger car
- sheet rolling, steel: 0.0223484 kg; lognormal variance with pedigree 0.0446, pedigree (4,3,4,1,3)
  activityLink introduced to establish a direct link to the corresponding regional supply of this product
  Uncertainty: 5% of passenger car
- wire drawing, copper: 0.000558372 kg; lognormal variance with pedigree 0.1306, pedigree (4,3,5,5,4)
  EcoSpold01Location=RER
  Uncertainty: weight ratio scooter:passenger car
- section bar rolling, steel: 0.011223 kg; lognormal variance with pedigree 0.1306, pedigree (4,3,5,5,4)
  EcoSpold01Location=RER
  Uncertainty: weight ratio scooter:passenger car
- injection moulding: 0.0225852 kg; lognormal variance with pedigree 0.1306, pedigree (4,3,5,5,4)
  EcoSpold01Location=RER
  Uncertainty: All HDPE
- alkyd paint, white, without solvent, in 60% solution state: 0.000343695 kg; lognormal variance with pedigree 0.1306, pedigree (4,3,5,5,4)
  EcoSpold01Location=RER
  Uncertainty: weight ratio scooter:passenger car
- road vehicle factory: 1.60876e-11 unit; lognormal variance with pedigree 0.4306, pedigree (4,3,5,5,4)
  EcoSpold01Location=RER
  Uncertainty: weight ratio scooter:passenger car
- heat, district or industrial, natural gas: 0.001592 MJ; lognormal variance with pedigree 0.0366, pedigree (4,3,4,5,3)
  EcoSpold01Location=RER
  Uncertainty: 50% of Environmental report Honda, 2008
- heat, district or industrial, other than natural gas: 1.41386e-6, 0.0031538 MJ (2 entries); lognormal variance with pedigree 0.0366, pedigree (4,3,4,5,3)
  EcoSpold01Location=RER
  Uncertainty: 50% of Environmental report Honda, 2008
- tap water: 0.000512537, 0.0042579, 0.000847051, 0.0213593, 0.000555656, 0.00158056, 0.244425 kg (7 entries); lognormal variance with pedigree 0.1306, pedigree (4,3,5,5,4)
  EcoSpold01Location=RER
  Uncertainty: weight ratio scooter:passenger car
- electricity, medium voltage: 5.05189e-5, 0.000856724, 0.00870985, 0.00177777 kWh (4 entries); lognormal variance with pedigree 0.0366, pedigree (4,3,4,5,3)
  EcoSpold01Location=JP
  Uncertainty: 50% of Environmental report Honda, 2008
- ethylene, average: 1.61505e-5, 0.00100659 kg (2 entries); lognormal variance with pedigree 0.1306, pedigree (4,3,5,5,4)
  EcoSpold01Location=RER
  Uncertainty: weight ratio scooter:passenger car
- decommissioned road: -0.000532858 m*year; lognormal variance with pedigree 0.428, pedigree (4,1,5,1,4)
  Allocation of road use according to gross ton kilometre performance
  EcoSpold01Location=RER
  Uncertainty: allocation of road use according to gross ton kilometre performance
  production volume 1.781e-6 m*year
- road: 0.000266429 m*year; lognormal variance with pedigree 0.428, pedigree (4,1,5,1,4)
  Allocation of road use according to gross ton kilometre performance
  EcoSpold01Location=CH
  Uncertainty: allocation of road use according to gross ton kilometre performance
- used electric bicycle: -0.000671545 unit; lognormal variance with pedigree 0.3086, pedigree (2,1,4,1,1)
  Estimation: eBike 15'000km
  EcoSpold01Location=CH
  Uncertainty: Estimation: eBike 15'000km
  production volume 2.24454e-6 unit
- energy use and operation emissions, electric bicycle, label-certified electricity: 2.52131 km; lognormal variance with pedigree 0.128, pedigree (1,1,4,1,1)
  EcoSpold01Location=CH
  Defined by laws and physics;activityLink introduced to establish a direct link to the corresponding regional supply of this product
  Uncertainty: defined by laws and physics
- maintenance, electric bicycle: 0.000335772 unit; lognormal variance with pedigree 0.3086, pedigree (2,1,4,1,1)
  Estimation: eBike 15'000km
  EcoSpold01Location=CH
  Uncertainty: Estimation: eBike 15'000km
- electric bicycle: 0.000671545 unit; lognormal variance with pedigree 0.3086, pedigree (2,1,4,1,1)
  Estimation: eBike 15'000km
  EcoSpold01Location=RER
  Uncertainty: Estimation: eBike 15'000km
- energy use and operation emissions, electric bicycle: 2.51525 km; lognormal variance with pedigree 0.128, pedigree (1,1,4,1,1)
  Defined by laws and physics;activityLink introduced to establish a direct link to the corresponding regional supply of this product
  EcoSpold01Location=CH
  Uncertainty: defined by laws and physics
- energy use and operation emissions, electric bicycle, label-certified electricity: 2.52131 km; lognormal variance with pedigree 0.13, pedigree (1,1,4,5,1)
  EcoSpold01Location=CH
  Defined by laws and physics
  Uncertainty: defined by laws and physics
- maintenance, electric bicycle: 0.000335772 unit; lognormal variance with pedigree 0.3106, pedigree (2,1,4,5,1)
  EcoSpold01Location=CH
  Estimation: eBike 15'000km
  Uncertainty: Estimation: eBike 15'000km
- road: 0.000266429 m*year; lognormal variance with pedigree 0.43, pedigree (4,1,5,5,4)
  EcoSpold01Location=CH
  Allocation of road use according to gross ton kilometre performance
  Uncertainty: allocation of road use according to gross ton kilometre performance
- energy use and operation emissions, electric bicycle: 2.51525 km; lognormal variance with pedigree 0.13, pedigree (1,1,4,5,1)
  Defined by laws and physics
  EcoSpold01Location=CH
  Uncertainty: defined by laws and physics
- nitrogen, liquid: 0.000395782 kg; lognormal variance with pedigree 0.04, pedigree (4,4,4,5,1)
  EcoSpold01Location=RER
- electricity, medium voltage: 0.000348454 kWh; lognormal variance with pedigree 0.05, pedigree (1,1,4,5,1)
  composite
  EcoSpold01Location=CN
- section bar extrusion, aluminium: 0.00742692 kg; lognormal variance with pedigree 0.0981, pedigree (4,2,4,5,4)
  Assumption for pipe drawing
  EcoSpold01Location=RER
  Uncertainty: Assumption for pipe drawing
- chromium steel removed by turning, average, conventional: 0.00519294 kg; lognormal variance with pedigree 0.0981, pedigree (4,2,4,5,4)
  Assumption
  EcoSpold01Location=RER
  Uncertainty: Assumption
- polyurethane, flexible foam: 3.98488e-5 kg; lognormal variance with pedigree 0.0287, pedigree (2,2,4,5,3)
  EcoSpold01Location=RER
  Estimation: saddle once replaced, Scooter: no replacement
  Uncertainty: Estimation: saddle once replaced, Scooter: no replacement
- waste plastic, mixture: -0.000946359 kg; lognormal variance with pedigree 0.0361, pedigree (4,2,4,5,3)
  EcoSpold01Location=CH
  Plastics to municipal incineration
  Uncertainty: plastics to municipal incineration
  production volume 3.0264 kg
- tap water: 0.0636076 kg; lognormal variance with pedigree 0.0112, pedigree (2,3,4,5,1)
  (same comment as for tap water)

## Inputs from nature
- Water, unspecified natural origin [natural resource, in water]: 0.000151222 m3; lognormal variance with pedigree 0.0521, pedigree (1,4,5,3,1)
  Data of 1 European plant - reported in Fisher (2006)
  Uncertainty: data of 1 European plant - reported in Fisher (2006)
- Dolomite, in ground [natural resource, in ground]: 7.56415e-9 kg; lognormal variance with pedigree 0.0032, pedigree (1,3,3,1,1)
  Amount and activity link based on primary data collected from participating companies.
- Water, lake [natural resource, in water]: 2.43596e-6 m3; lognormal variance with pedigree 0.0032, pedigree (1,3,3,1,1)
  Amount and activity link based on primary data collected from participating companies.
- Sulfur, in ground [natural resource, in ground]: 2.34618e-5 kg; lognormal variance with pedigree 0.0032, pedigree (1,3,3,1,1)
  Amount and activity link based on primary data collected from participating companies.
- Water, cooling, unspecified natural origin [natural resource, in water]: 1.37642e-5 m3; lognormal variance with pedigree 0.0032, pedigree (1,3,3,1,1)
  Amount and activity link based on primary data collected from participating companies.
- Strontium, in ground [natural resource, in ground]: 9.60543e-8 kg; lognormal variance with pedigree 0.0032, pedigree (1,3,3,1,1)
  Amount and activity link based on primary data collected from participating companies.
- Copper, in ground [natural resource, in ground]: 5.51505e-5 kg; lognormal variance with pedigree 0.0032, pedigree (1,3,3,1,1)
  Amount and activity link based on primary data collected from participating companies.
- Aluminium, in ground [natural resource, in ground]: 7.12573e-6 kg; lognormal variance with pedigree 0.0032, pedigree (1,3,3,1,1)
  Amount and activity link based on primary data collected from participating companies.
- Gangue, in ground [natural resource, in ground]: 0.0667097 kg; lognormal variance with pedigree 0.0032, pedigree (1,3,3,1,1)
  Amount and activity link based on primary data collected from participating companies.
- Gold, in ground [natural resource, in ground]: 4.58736e-6 kg; lognormal variance with pedigree 0.0032, pedigree (1,3,3,1,1)
  Amount and activity link based on primary data collected from participating companies.
- Vanadium, in ground [natural resource, in ground]: 9.11492e-9 kg; lognormal variance with pedigree 0.0032, pedigree (1,3,3,1,1)
  Amount and activity link based on primary data collected from participating companies.
- Zinc, in ground [natural resource, in ground]: 0.00199391 kg; lognormal variance with pedigree 0.0032, pedigree (1,3,3,1,1)
  Amount and activity link based on primary data collected from participating companies.
- Titanium, in ground [natural resource, in ground]: 3.36532e-7 kg; lognormal variance with pedigree 0.0032, pedigree (1,3,3,1,1)
  Amount and activity link based on primary data collected from participating companies.
- Sodium, in ground [natural resource, in ground]: 2.72494e-7 kg; lognormal variance with pedigree 0.0032, pedigree (1,3,3,1,1)
  Amount and activity link based on primary data collected from participating companies.
- Nickel, in ground [natural resource, in ground]: 5.36812e-9 kg; lognormal variance with pedigree 0.0032, pedigree (1,3,3,1,1)
  Amount and activity link based on primary data collected from participating companies.
- Silver, in ground [natural resource, in ground]: 7.28154e-7 kg; lognormal variance with pedigree 0.0032, pedigree (1,3,3,1,1)
  Amount and activity link based on primary data collected from participating companies.
- Potassium, in ground [natural resource, in ground]: 8.92419e-6 kg; lognormal variance with pedigree 0.0032, pedigree (1,3,3,1,1)
  Amount and activity link based on primary data collected from participating companies.
- Manganese, in ground [natural resource, in ground]: 5.15462e-7 kg; lognormal variance with pedigree 0.0032, pedigree (1,3,3,1,1)
  Amount and activity link based on primary data collected from participating companies.
- Magnesium, in ground [natural resource, in ground]: 0.000141561 kg; lognormal variance with pedigree 0.0032, pedigree (1,3,3,1,1)
  Amount and activity link based on primary data collected from participating companies.
- Phosphorus, in ground [natural resource, in ground]: 6.09026e-8 kg; lognormal variance with pedigree 0.0032, pedigree (1,3,3,1,1)
  Amount and activity link based on primary data collected from participating companies.
- Iron, in ground [natural resource, in ground]: 8.93781e-6 kg; lognormal variance with pedigree 0.0032, pedigree (1,3,3,1,1)
  Amount and activity link based on primary data collected from participating companies.
- Mercury, in ground [natural resource, in ground]: 7.26196e-11 kg; lognormal variance with pedigree 0.0032, pedigree (1,3,3,1,1)
  Amount and activity link based on primary data collected from participating companies.
- Lead, in ground [natural resource, in ground]: 0.000426324 kg; lognormal variance with pedigree 0.0032, pedigree (1,3,3,1,1)
  Amount and activity link based on primary data collected from participating companies.
- Sand, unspecified, in ground [natural resource, in ground]: 3.58268e-7 kg; lognormal variance with pedigree 0.0032, pedigree (1,3,3,1,1)
  Amount and activity link based on primary data collected from participating companies.
- Cadmium, in ground [natural resource, in ground]: 2.34345e-7 kg; lognormal variance with pedigree 0.0032, pedigree (1,3,3,1,1)
  Amount and activity link based on primary data collected from participating companies.
- Calcium, in ground [natural resource, in ground]: 0.000247643 kg; lognormal variance with pedigree 0.0032, pedigree (1,3,3,1,1)
  Amount and activity link based on primary data collected from participating companies.
- Barium, in ground [natural resource, in ground]: 3.78768e-8 kg; lognormal variance with pedigree 0.0032, pedigree (1,3,3,1,1)
  Amount and activity link based on primary data collected from participating companies.
- Water, well, in ground [natural resource, in water]: 6.66192e-6 m3; lognormal variance with pedigree 0.0032, pedigree (1,3,3,1,1)
  Amount and activity link based on primary data collected from participating companies.
- Water, river [natural resource, in water]: 2.75061e-7 m3; lognormal variance with pedigree 0.0032, pedigree (1,3,3,1,1)
  Amount and activity link based on primary data collected from participating companies.
- Chromium, in ground [natural resource, in ground]: 8.80155e-9 kg; lognormal variance with pedigree 0.0032, pedigree (1,3,3,1,1)
  Amount and activity link based on primary data collected from participating companies.

## Emissions to nature
- Water [water, unspecified]: 0.000736152 m3; lognormal variance with pedigree 0.0807, pedigree (2,2,5,1,1)
  Calculated value based on literature values and expert opinion. See comments in the parametres' comment field.
- Chloride [water, surface water]: 6.80774e-8 kg; lognormal variance with pedigree 0.0921, pedigree (1,4,5,3,1)
  (same comment as for Water, unspecified natural origin)
- Water [air, unspecified]: 0.000129909 m3; lognormal variance with pedigree 0.0807, pedigree (2,2,5,1,1)
  (same comment as for Water)
- Sulfate [water, surface water]: 1.39647e-5 kg; lognormal variance with pedigree 0.0921, pedigree (1,4,5,3,1)
  (same comment as for Water, unspecified natural origin)
- Lead [soil, industrial]: 6.71834e-11 kg; lognormal variance with pedigree 0.0426, pedigree (1,3,3,1,1)
  Amount and activity link based on primary data collected from participating companies.
- Sulfur dioxide [air, unspecified]: 2.68391e-7 kg; lognormal variance with pedigree 0.0032, pedigree (1,3,3,1,1)
  Amount and activity link based on primary data collected from participating companies.
- Ammonia [air, unspecified]: 4.21395e-9 kg; lognormal variance with pedigree 0.0426, pedigree (1,3,3,1,1)
  Amount and activity link based on primary data collected from participating companies.
- Hydrogen chloride [air, unspecified]: 6.86716e-10 kg; lognormal variance with pedigree 0.0426, pedigree (1,3,3,1,1)
  Amount and activity link based on primary data collected from participating companies.
- Suspended solids, unspecified [water, ocean]: 4.80288e-7 kg; lognormal variance with pedigree 0.0426, pedigree (1,3,3,1,1)
  Amount and activity link based on primary data collected from participating companies.
- Ammonium, ion [water, surface water]: 1.0655e-8 kg; lognormal variance with pedigree 0.0426, pedigree (1,3,3,1,1)
  Amount and activity link based on primary data collected from participating companies.
- Hydrocarbons, unspecified [soil, unspecified]: 2.19047e-9 kg; lognormal variance with pedigree 0.0426, pedigree (1,3,3,1,1)
  Amount and activity link based on primary data collected from participating companies.
- Selenium [air, unspecified]: 1.06276e-10 kg; lognormal variance with pedigree 0.6526, pedigree (1,3,3,1,1)
  Amount and activity link based on primary data collected from participating companies.
- Antimony [water, surface water]: 2.92252e-10 kg; lognormal variance with pedigree 0.6526, pedigree (1,3,3,1,1)
  Amount and activity link based on primary data collected from participating companies.
- Fluoride [soil, industrial]: 4.40234e-9 kg; lognormal variance with pedigree 0.0426, pedigree (1,3,3,1,1)
  Amount and activity link based on primary data collected from participating companies.
- Sodium [soil, industrial]: 2.75623e-12 kg; lognormal variance with pedigree 0.0426, pedigree (1,3,3,1,1)
  Amount and activity link based on primary data collected from participating companies.
- Benzene [air, unspecified]: 3.4336e-9 kg; lognormal variance with pedigree 0.0426, pedigree (1,3,3,1,1)
  Amount and activity link based on primary data collected from participating companies.
- Lead [air, unspecified]: 1.95261e-7 kg; lognormal variance with pedigree 0.6526, pedigree (1,3,3,1,1)
  Amount and activity link based on primary data collected from participating companies.
- Sulfate [soil, unspecified]: 4.69352e-11 kg; lognormal variance with pedigree 0.0426, pedigree (1,3,3,1,1)
  Amount and activity link based on primary data collected from participating companies.
- Aluminium [water, surface water]: 1.69214e-10 kg; lognormal variance with pedigree 0.6526, pedigree (1,3,3,1,1)
  Amount and activity link based on primary data collected from participating companies.
- Fluorine [air, unspecified]: 7.90129e-9 kg; lognormal variance with pedigree 0.0426, pedigree (1,3,3,1,1)
  Amount and activity link based on primary data collected from participating companies.
- Zinc [soil, industrial]: 1.92817e-8 kg; lognormal variance with pedigree 0.0426, pedigree (1,3,3,1,1)
  Amount and activity link based on primary data collected from participating companies.
- Arsenic, ion [water, ocean]: 5.05425e-13 kg; lognormal variance with pedigree 0.6526, pedigree (1,3,3,1,1)
  Amount and activity link based on primary data collected from participating companies.
- Dissolved solids [water, surface water]: 1.5175e-5 kg; lognormal variance with pedigree 0.0426, pedigree (1,3,3,1,1)
  Amount and activity link based on primary data collected from participating companies.
- Zinc, ion [water, ocean]: 1.77449e-8 kg; lognormal variance with pedigree 0.6526, pedigree (1,3,3,1,1)
  Amount and activity link based on primary data collected from participating companies.
- Selenium [water, surface water]: 1.22525e-11 kg; lognormal variance with pedigree 0.6526, pedigree (1,3,3,1,1)
  Amount and activity link based on primary data collected from participating companies.
- Antimony [air, unspecified]: 1.22117e-9 kg; lognormal variance with pedigree 0.6526, pedigree (1,3,3,1,1)
  Amount and activity link based on primary data collected from participating companies.
- Fluoride [water, ocean]: 3.09712e-10 kg; lognormal variance with pedigree 0.0426, pedigree (1,3,3,1,1)
  Amount and activity link based on primary data collected from participating companies.
- Particulates, < 2.5 um [air, unspecified]: 4.37219e-8 kg; lognormal variance with pedigree 0.3026, pedigree (1,3,3,1,1)
  Amount and activity link based on primary data collected from participating companies.
- Fluoride [water, surface water]: 6.2568e-9 kg; lognormal variance with pedigree 0.0426, pedigree (1,3,3,1,1)
  Amount and activity link based on primary data collected from participating companies.
- TOC, Total Organic Carbon [water, surface water]: 7.90391e-6 kg; lognormal variance with pedigree 0.0426, pedigree (1,3,3,1,1)
  Amount and activity link based on primary data collected from participating companies.
- Particulates, > 2.5 um, and < 10um [air, unspecified]: 9.791e-7 kg; lognormal variance with pedigree 0.1226, pedigree (1,3,3,1,1)
  Amount and activity link based on primary data collected from participating companies.
- Aldehydes, unspecified [air, unspecified]: 1.9675e-10 kg; lognormal variance with pedigree 0.0426, pedigree (1,3,3,1,1)
  Amount and activity link based on primary data collected from participating companies.
- Formaldehyde [air, unspecified]: 1.48269e-8 kg; lognormal variance with pedigree 0.0426, pedigree (1,3,3,1,1)
  Amount and activity link based on primary data collected from participating companies.
- Zinc, ion [water, surface water]: 1.42568e-6 kg; lognormal variance with pedigree 0.6526, pedigree (1,3,3,1,1)
  Amount and activity link based on primary data collected from participating companies.
- Phosphorus [water, surface water]: 4.31257e-9 kg; lognormal variance with pedigree 0.0426, pedigree (1,3,3,1,1)
  Amount and activity link based on primary data collected from participating companies.
- Copper, ion [water, surface water]: 3.0235e-8 kg; lognormal variance with pedigree 0.6526, pedigree (1,3,3,1,1)
  Amount and activity link based on primary data collected from participating companies.
- Sodium, ion [water, surface water]: 4.40744e-7 kg; lognormal variance with pedigree 0.0426, pedigree (1,3,3,1,1)
  Amount and activity link based on primary data collected from participating companies.
- Dioxins, measured as 2,3,7,8-tetrachlorodibenzo-p-dioxin [air, unspecified]: 0 kg; pedigree (1,1,1,1,1)
  Amount and activity link based on primary data collected from participating companies.
- Potassium, ion [water, surface water]: 1.81861e-7 kg; lognormal variance with pedigree 0.0426, pedigree (1,3,3,1,1)
  Amount and activity link based on primary data collected from participating companies.
- Cyanide [water, surface water]: 1.32611e-10 kg; lognormal variance with pedigree 0.0426, pedigree (1,3,3,1,1)
  Amount and activity link based on primary data collected from participating companies.
- Particulates, > 10 um [air, unspecified]: 3.56961e-6 kg; lognormal variance with pedigree 0.0426, pedigree (1,3,3,1,1)
  Amount and activity link based on primary data collected from participating companies.
- COD, Chemical Oxygen Demand [water, ocean]: 2.52467e-11 kg; source Weidema B P 2013; lognormal variance with pedigree 0.25, pedigree (5,5,5,5,5)
  Calculated value. The amount of COD is assumed to be five times that of BOD5, based on the estimates provided in section 5.9.7 of Weidema et al. (2013).
- Copper, ion [water, ocean]: 3.72706e-13 kg; lognormal variance with pedigree 0.6526, pedigree (1,3,3,1,1)
  Amount and activity link based on primary data collected from participating companies.
- Nitrogen oxides [air, unspecified]: 4.24756e-6 kg; lognormal variance with pedigree 0.0426, pedigree (1,3,3,1,1)
  Amount and activity link based on primary data collected from participating companies.
- DOC, Dissolved Organic Carbon [water, surface water]: 7.90391e-6 kg; lognormal variance with pedigree 0.25, pedigree (5,5,5,5,5)
  Calculated value. The amount of DOC is assumed to be equal to the amount of TOC
- Cobalt [air, unspecified]: 2.61975e-9 kg; lognormal variance with pedigree 0.6526, pedigree (1,3,3,1,1)
  Amount and activity link based on primary data collected from participating companies.
- Nitrogen, organic bound [water, surface water]: 6.80774e-8 kg; lognormal variance with pedigree 0.0426, pedigree (1,3,3,1,1)
  Amount and activity link based on primary data collected from participating companies.
- DOC, Dissolved Organic Carbon [water, ocean]: 9.35065e-12 kg; lognormal variance with pedigree 0.25, pedigree (5,5,5,5,5)
  Calculated value. The amount of DOC is assumed to be equal to the amount of TOC
- Chromium VI [water, surface water]: 3.77486e-7 kg; lognormal variance with pedigree 0.6526, pedigree (1,3,3,1,1)
  Amount and activity link based on primary data collected from participating companies.
- Nitrogen [water, surface water]: 3.42738e-8 kg; lognormal variance with pedigree 0.0426, pedigree (1,3,3,1,1)
  Amount and activity link based on primary data collected from participating companies.
- TOC, Total Organic Carbon [water, ocean]: 9.35065e-12 kg; source Weidema B P 2013; lognormal variance with pedigree 0.25, pedigree (5,5,5,5,5)
  Calculated value. The relation between COD and TOC is assumed to be COD (g O2) = 2.7*TOC (g C), based on the estimates provided in section 5.9.7 of Weidema et al. (2013).
- Chromium [soil, industrial]: 1.23777e-13 kg; lognormal variance with pedigree 0.0426, pedigree (1,3,3,1,1)
  Amount and activity link based on primary data collected from participating companies.
- Nickel, ion [water, surface water]: 9.14456e-10 kg; lognormal variance with pedigree 0.6526, pedigree (1,3,3,1,1)
  Amount and activity link based on primary data collected from participating companies.
- Nitric acid [soil, industrial]: 1.46874e-10 kg; lognormal variance with pedigree 0.0426, pedigree (1,3,3,1,1)
  Amount and activity link based on primary data collected from participating companies.
- COD, Chemical Oxygen Demand [water, surface water]: 2.13628e-5 kg; lognormal variance with pedigree 0.0426, pedigree (1,3,3,1,1)
  Amount and activity link based on primary data collected from participating companies.
- NMVOC, non-methane volatile organic compounds, unspecified origin [air, unspecified]: 0.000530924 kg; lognormal variance with pedigree 0.0426, pedigree (1,3,3,1,1)
  Amount and activity link based on primary data collected from participating companies.
- Copper [soil, industrial]: 7.46455e-9 kg; lognormal variance with pedigree 0.0426, pedigree (1,3,3,1,1)
  Amount and activity link based on primary data collected from participating companies.
- PAH, polycyclic aromatic hydrocarbons [air, unspecified]: 3.07882e-12 kg; lognormal variance with pedigree 0.3026, pedigree (1,3,3,1,1)
  Amount and activity link based on primary data collected from participating companies.
- Chromium VI [air, unspecified]: 3.02567e-11 kg; lognormal variance with pedigree 0.6526, pedigree (1,3,3,1,1)
  Amount and activity link based on primary data collected from participating companies.
- Nickel [soil, industrial]: 2.87988e-11 kg; lognormal variance with pedigree 0.0426, pedigree (1,3,3,1,1)
  Amount and activity link based on primary data collected from participating companies.
- Chromium [air, unspecified]: 3.67523e-10 kg; lognormal variance with pedigree 0.6526, pedigree (1,3,3,1,1)
  Amount and activity link based on primary data collected from participating companies.
- Nitrogen [soil, industrial]: 5.58374e-9 kg; lognormal variance with pedigree 0.0426, pedigree (1,3,3,1,1)
  Amount and activity link based on primary data collected from participating companies.
- Copper [air, unspecified]: 2.0707e-7 kg; lognormal variance with pedigree 0.6526, pedigree (1,3,3,1,1)
  Amount and activity link based on primary data collected from participating companies.
- Nickel [air, unspecified]: 2.07209e-9 kg; lognormal variance with pedigree 0.6526, pedigree (1,3,3,1,1)
  Amount and activity link based on primary data collected from participating companies.
- Ammonia [soil, industrial]: 1.81579e-9 kg; lognormal variance with pedigree 0.0426, pedigree (1,3,3,1,1)
  Amount and activity link based on primary data collected from participating companies.
- Carbon dioxide, non-fossil [air, unspecified]: 5.80592e-6 kg; lognormal variance with pedigree 0.0032, pedigree (1,3,3,1,1)
  Amount and activity link based on primary data collected from participating companies.
- Nitrate [water, surface water]: 4.30549e-7 kg; lognormal variance with pedigree 0.0426, pedigree (1,3,3,1,1)
  Amount and activity link based on primary data collected from participating companies.
- Chlorine [water, surface water]: 2.18162e-7 kg; lognormal variance with pedigree 0.0426, pedigree (1,3,3,1,1)
  Amount and activity link based on primary data collected from participating companies.
- Nickel, ion [water, ocean]: 2.66121e-13 kg; lognormal variance with pedigree 0.6526, pedigree (1,3,3,1,1)
  Amount and activity link based on primary data collected from participating companies.
- Carbon monoxide, fossil [air, unspecified]: 7.88387e-7 kg; lognormal variance with pedigree 0.6526, pedigree (1,3,3,1,1)
  Amount and activity link based on primary data collected from participating companies.
- Methane, fossil [air, unspecified]: 2.29148e-8 kg; lognormal variance with pedigree 0.0426, pedigree (1,3,3,1,1)
  Amount and activity link based on primary data collected from participating companies.
- Calcium, ion [water, surface water]: 4.89834e-6 kg; lognormal variance with pedigree 0.0426, pedigree (1,3,3,1,1)
  Amount and activity link based on primary data collected from participating companies.
- Methanol [air, unspecified]: 8.92069e-8 kg; lognormal variance with pedigree 0.0426, pedigree (1,3,3,1,1)
  Amount and activity link based on primary data collected from participating companies.
- Mercury [air, unspecified]: 1.15509e-10 kg; lognormal variance with pedigree 0.6526, pedigree (1,3,3,1,1)
  Amount and activity link based on primary data collected from participating companies.
- BOD5, Biological Oxygen Demand [water, surface water]: 2.8785e-6 kg; lognormal variance with pedigree 0.0426, pedigree (1,3,3,1,1)
  Amount and activity link based on primary data collected from participating companies.
- Mercury [water, surface water]: 4.71215e-10 kg; lognormal variance with pedigree 0.6526, pedigree (1,3,3,1,1)
  Amount and activity link based on primary data collected from participating companies.
- Calcium [soil, industrial]: 8.28166e-11 kg; lognormal variance with pedigree 0.0426, pedigree (1,3,3,1,1)
  Amount and activity link based on primary data collected from participating companies.
- Mercury [soil, industrial]: 1.16901e-12 kg; lognormal variance with pedigree 0.0426, pedigree (1,3,3,1,1)
  Amount and activity link based on primary data collected from participating companies.
- Cadmium, ion [water, surface water]: 7.23702e-9 kg; lognormal variance with pedigree 0.6526, pedigree (1,3,3,1,1)
  Amount and activity link based on primary data collected from participating companies.
- Magnesium [water, surface water]: 3.38687e-7 kg; lognormal variance with pedigree 0.0426, pedigree (1,3,3,1,1)
  Amount and activity link based on primary data collected from participating companies.
- Beryllium [air, unspecified]: 8.09193e-11 kg; lognormal variance with pedigree 0.0426, pedigree (1,3,3,1,1)
  Amount and activity link based on primary data collected from participating companies.
- Manganese [soil, industrial]: 4.16648e-9 kg; lognormal variance with pedigree 0.0426, pedigree (1,3,3,1,1)
  Amount and activity link based on primary data collected from participating companies.
- Cadmium [air, unspecified]: 2.02351e-9 kg; lognormal variance with pedigree 0.6526, pedigree (1,3,3,1,1)
  Amount and activity link based on primary data collected from participating companies.
- Manganese [water, ocean]: 3.34199e-11 kg; lognormal variance with pedigree 0.6526, pedigree (1,3,3,1,1)
  Amount and activity link based on primary data collected from participating companies.
- BOD5, Biological Oxygen Demand [water, ocean]: 5.04935e-12 kg; lognormal variance with pedigree 0.0426, pedigree (1,3,3,1,1)
  Amount and activity link based on primary data collected from participating companies.
- Mercury [water, ocean]: 2.97378e-14 kg; lognormal variance with pedigree 0.6526, pedigree (1,3,3,1,1)
  Amount and activity link based on primary data collected from participating companies.
- Carbon dioxide, fossil [air, unspecified]: 0.00039884 kg; lognormal variance with pedigree 0.0032, pedigree (1,3,3,1,1)
  Amount and activity link based on primary data collected from participating companies. Accounts for on-site combustion of diesel at mine. Some companies provided emissions on the combustion of natural gas, diesel, propane, or other fuels, which are included here. If no emissions were provided for these other fuels then input is reflected as a an input of heat instead of a direct fuel input.
- Lead [water, surface water]: 9.68338e-9 kg; lognormal variance with pedigree 0.6526, pedigree (1,3,3,1,1)
  Amount and activity link based on primary data collected from participating companies.
- Cadmium [soil, industrial]: 2.88332e-11 kg; lognormal variance with pedigree 0.0426, pedigree (1,3,3,1,1)
  Amount and activity link based on primary data collected from participating companies.
- Manganese [air, unspecified]: 1.40693e-8 kg; lognormal variance with pedigree 0.6526, pedigree (1,3,3,1,1)
  Amount and activity link based on primary data collected from participating companies.
- Water [water, surface water]: 5.43801e-7 m3; lognormal variance with pedigree 0.0426, pedigree (1,3,3,1,1)
  Amount and activity link based on primary data collected from participating companies.
- Arsenic [soil, industrial]: 8.00425e-12 kg; lognormal variance with pedigree 0.0426, pedigree (1,3,3,1,1)
  Amount and activity link based on primary data collected from participating companies.
- Manganese [water, surface water]: 4.9619e-8 kg; lognormal variance with pedigree 0.6526, pedigree (1,3,3,1,1)
  Amount and activity link based on primary data collected from participating companies.
- VOC, volatile organic compounds, unspecified origin [air, unspecified]: 9.47918e-9 kg; lognormal variance with pedigree 0.0426, pedigree (1,3,3,1,1)
  Amount and activity link based on primary data collected from participating companies.
- Cadmium, ion [water, ocean]: 1.57101e-10 kg; lognormal variance with pedigree 0.6526, pedigree (1,3,3,1,1)
  Amount and activity link based on primary data collected from participating companies.
- Lead [water, ocean]: 3.21223e-9 kg; lognormal variance with pedigree 0.6526, pedigree (1,3,3,1,1)
  Amount and activity link based on primary data collected from participating companies.
- Suspended solids, unspecified [water, surface water]: 8.20848e-7 kg; lognormal variance with pedigree 0.0426, pedigree (1,3,3,1,1)
  Amount and activity link based on primary data collected from participating companies.
- Benzo(a)pyrene [air, unspecified]: 2.20061e-13 kg; lognormal variance with pedigree 0.3026, pedigree (1,3,3,1,1)
  Amount and activity link based on primary data collected from participating companies.
- Hydrogen fluoride [air, unspecified]: 5.28118e-10 kg; lognormal variance with pedigree 0.0426, pedigree (1,3,3,1,1)
  Amount and activity link based on primary data collected from participating companies.
- Sulfur oxides [air, unspecified]: 6.46654e-9 kg; lognormal variance with pedigree 0.0426, pedigree (1,3,3,1,1)
  Amount and activity link based on primary data collected from participating companies.
- Arsenic, ion [water, surface water]: 8.34551e-8 kg; lognormal variance with pedigree 0.6526, pedigree (1,3,3,1,1)
  Amount and activity link based on primary data collected from participating companies.
- Iron, ion [water, surface water]: 4.15077e-7 kg; lognormal variance with pedigree 0.6526, pedigree (1,3,3,1,1)
  Amount and activity link based on primary data collected from participating companies.
- Zinc [air, unspecified]: 1.93213e-7 kg; lognormal variance with pedigree 0.6526, pedigree (1,3,3,1,1)
  Amount and activity link based on primary data collected from participating companies.
- Arsenic [air, unspecified]: 1.07361e-8 kg; lognormal variance with pedigree 0.6526, pedigree (1,3,3,1,1)
  Amount and activity link based on primary data collected from participating companies.
- Phosphate [water, surface water]: 1.10567e-7 kg; lognormal variance with pedigree 0.1287, pedigree (4,3,5,3,4)
  Uncertainty: weight ratio scooter:passenger car
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
## Extrapolations
this dataset is based on a proxy. The byproducts have been adapted to the composition of the treated product

## Review by Hans-Jörg Althaus 2012-05-02
This is a proxy dataset that has to be used with appropriate care

## Review by Bo Weidema 2012-05-02
Passed
Documentation slightly revised
