# water supply network construction

Dataset: EcoSpold 2, unit process
Geography: CH
Time period: 1993-01-01 to 2019-12-31
Technology level: current
Classification: ISIC rev.4 ecoinvent: 4220:Construction of utility projects
Classification: EcoSpold01Categories: water supply/production
Tags: ConvertedDataset
Scenario: Business-as-Usual
System model: Allocation at the point of substitution
Share of production covered: 10 %
Generated by: Niels Jungbluth
Published in: Althaus H.-J. 2004
Database: ecoinvent
isCopyrightProtected: true
accessRestrictedTo: 1

## General comment
About 712 Mio m3 per year are transported in the Swiss water supply network. Life time 70 years.
[This dataset was already contained in the ecoinvent database version 2. It was not individually updated during the transfer to ecoinvent version 3. Life Cycle Impact Assessment results may still have changed, as they are affected by changes in the supply chain, i.e. in other datasets. This dataset was generated following the ecoinvent quality guidelines for version 2. It may have been subject to central changes described in the ecoinvent version 3 change report (http://www.ecoinvent.org/database/ecoinvent-version-3/reports-of-changes/), and the results of the central updates were reviewed extensively. The changes added e.g. consistent water flows and other information throughout the database. The documentation of this dataset can be found in the ecoinvent reports of version 2, which are still available via the ecoinvent website. The change report linked above covers all central changes that were made during the conversion process.]

## Included activities end
Materials, transports, disposal for the infrastructure. Estimation for building process. No land use for construction work.

## Geography
Data provided by a CH company in Marin (NE).

## Technology
Supply network for drinking water.

## Time period
Time of publication.

## Reference product
- water supply network: 1 km; CPC 53253: Sewage and water treatment plants; By-product classification allocatable product
  EcoSpold01Location=CH
  production volume 0.0336675 km
    This is a placeholder value that does not reflect real-world production volumes. This dataset does not currently require a real-world production volume to work in the database framework, and no actual data were collected yet. This has no negative effect on the results of the ecoinvent database. The placeholder value of this activity was scaled according to the nominal GDP of 2005 (source: United Nations, http://data.un.org/Glossary.aspx?q=GDP+%28current+US%24%29, accessed 20130726) to reflect an appropriate share of the global production volume, which is also a placeholder value.
  property price 851974 EUR2005
    Convert from EU 27 price to the world by currency exchange rate.
  property true value 851974
    allocation property applied in "true value" allocation // value calculated from revenue

## By-products
- iron scrap, sorted, pressed: 0 kg; By-product classification Recyclable; CPC 39310: Slag, dross, scalings and other waste from the manufacture of iron or steel; pedigree (1,1,1,1,1)
  Iron scrap recovered from this waste.
  Uncertainty: uncertainty calculated from uncertainty in waste composition, uncertainty of share of recyclable metal, uncertainty of transfer coefficient to bottom ash, uncertainty of the efficiency of scrap removal in MSWI plant.
  production volume 229.978 kg
  property price 0.175 EUR2005
    Temporary price data. Calculated as 90% of purchasers price based on: 2005 import and export prices (total trades (USD) divided by total weight (kg) in biggest economies of the world: EU27, USA, Brasil, China, India, Japan and Russia) from UN Commodity Trade Statistics Database (http://data.un.org/Explorer.aspxDatabase [Accessed 2011.06.20]). Commodity: Waste or scrap, of cast iron
  property carbon content 0
    carbon content on a dry matter basis (reserved; not for manual entry)
  property true value 40.2461
    allocation property applied in "true value" allocation // value calculated from revenue
  properties: wet mass 1 kg, water in wet mass 0 kg, carbon content, non-fossil 0, carbon content, fossil 0, dry mass 1 kg, water content 0, carbon allocation 0 kg
- electricity, for reuse in municipal waste incineration only: 0 kWh; CPC 17100: Electrical energy; By-product classification allocatable product; pedigree (1,1,1,1,1)
  Net electricity generated from this waste and used in internal MSWI plant energy redistribution.
  Uncertainty: uncertainty is calculated from uncertainties in waste composition and uncertainties in energy efficiency and the uncertainty in internal energy demand
  production volume 1192.03 kWh
  property true value relation 3.6; name E_el_prod_MSWI_true_value_relation
    property to calculate "true value" from
  property price 0.1 EUR2005; name E_el_prod_MSWI_price_EUR2005
    Estimated to be the same price as in case of electricity, medium voltage.
  property exergy 3.6 MJ; name E_el_prod_MSWI_exergy
    This exergy property is based on the exergy content of the product.
  property true value 152.875
    allocation property applied in "true value" allocation // value calculated from true value relation
- heat, for reuse in municipal waste incineration only: 0 MJ; CPC 17300: Steam and hot water; By-product classification allocatable product; pedigree (1,1,1,1,1)
  Net useful heat generated from this waste and used in internal MSWI plant energy redistribution.
  Uncertainty: uncertainty is calculated from uncertainties in waste composition and uncertainties in energy efficiency and the uncertainty in internal energy demand
  production volume 8339.07 MJ
  property true value relation 0.1842; name E_th_prod_MSWI_true_value_relation
    property to calculate "true value" from
  property price 0.0106 EUR2005; name E_th_prod_MSWI_price_EUR2005
    Average European district heat price from Ecoheatcool and Euroheat 2005-2006, Ecoheat Work package 1: The European heat market. Final report. 10.6 EUR/GJ i s the price of district heat. http://www.solarthermalworld.org/files/Ecoheatcool%20WP1%20Web.pdf?download
  property exergy 0.1842 MJ; name E_th_prod_MSWI_exergy
    This exergy property is based on the exergy content of the product.
  property true value 54.7213
    (same comment as for electricity, for reuse in municipal waste incineration only)
- zinc concentrate: 0 kg; CPC 14290: Other non-ferrous metal ores and concentrates (other than uranium or thorium ores and concentrates); By-product classification allocatable product
  Calculated value from the knowledge of the properties of both products.
  production volume 0.731014 kg
  property price 0.38 EUR2005; name ByP_price_EUR2005
    Temporary price data. Calculated as 90% of purchasers price based on: Zinc content in concentrate 53%. Concentrate price per kg Zn 86.5% of refined Zn price (13.5% treatment charges according to CHR Metals Limited 2005: Dynamic cost curves. http://www.minecost.com/dynamic.pdf). 2004 zinc price from USGS (2007) Mineral commodity summaries 2007. <http://minerals.usgs.gov/minerals/pubs/mcs/2007/mcs2007.pdf> [Accessed 25 May 2010]
  property zinc content 0.53; name zinc_C_zinc_concentrate
    Zinc content on a dry matter basis. Value taken from teh "zinc mine operation" /GLO dataset.
  property dry mass 1 kg; name DM_zinc_concentrate
  property carbon content 0
    carbon content on a dry matter basis (reserved; not for manual entry)
  property true value 0.277785
    allocation property applied in "true value" allocation // value calculated from revenue
  properties: wet mass 1 kg, water content 0, carbon content, non-fossil 0, carbon content, fossil 0, water in wet mass 0 kg, carbon allocation 0 kg

## Inputs from technosphere
- diesel, burned in building machine: 29341.5 MJ; lognormal variance with pedigree 0.078, pedigree (3,5,5,1,3)
  EcoSpold01Location=GLO
  Rough estimation with data for class 3 sewer system
  Uncertainty: Rough estimation with data for class 3 sewer system
- synthetic rubber: 33.0774 kg; lognormal variance with pedigree 0.0512, pedigree (2,3,5,1,1)
  EcoSpold01Location=RER
  Literature
  Uncertainty: Literature
  properties: carbon content, fossil 0.871949, dry mass 1 kg, wet mass 1 kg
  note on carbon content, fossil: EPDM (Ethylene-propene-diene terpolymer) rubber is a terpolymer of ethylene, propene, and a diene with the residual unsaturated portion of the diene in the side chain (ecoinvent v2.2 report 7-part XX & Ullmann). Chemical formula (deduced from Evidences of Solvent-Induced Miscibility in Polychloroprene-co-Ethylene-Propene Diene Terpolymer Blends, Dubey et al., Journal of Applied Polymer Science, 2009, 111:1884–1891): C20H35
- waste reinforcement steel: -21271.8 kg; lognormal variance with pedigree 0.0512, pedigree (2,3,5,1,1)
  Estimation for materials used
  EcoSpold01Location=CH
  Uncertainty: Estimation for materials used
  production volume 21278 kg
    Calculated from the production volume of water supply network in proportion to the respective output amounts.
  properties: dry mass 1 kg, wet mass 1 kg
- cast iron: 21271.8 kg; lognormal variance with pedigree 0.0512, pedigree (2,3,5,1,1)
  Literature
  EcoSpold01Location=RER
  Uncertainty: Literature
  properties: carbon content, fossil 0.04, wet mass 1 kg, dry mass 1 kg
  note on carbon content, fossil: Cast iron is made by remelting pig iron in small furnaces (e.g. cupola furnaces or electric arc furnaces) and poured into moulds to make castings. It usually contains 2% to 6% carbon (ecoinvent v2.2 report 10_partII). An average content of 4% was considered
- brass: 2.17517 kg; lognormal variance with pedigree 0.0512, pedigree (2,3,5,1,1)
  EcoSpold01Location=CH
  Literature
  Uncertainty: Literature
  properties: dry mass 1 kg, wet mass 1 kg
- steel, chromium steel 18/8, hot rolled: 12.2694 kg; lognormal variance with pedigree 0.0512, pedigree (2,3,5,1,1)
  EcoSpold01Location=RER
  Literature
  Uncertainty: Literature
  properties: dry mass 1 kg, wet mass 1 kg, carbon content, fossil 0.0008
  note on carbon content, fossil: Stainless steel model is the grade 304 steel (18/8 stainless, 18% chromium 8% nickel; max. 0.08% C)
- waste polyurethane: -534.934 kg; lognormal variance with pedigree 0.0512, pedigree (2,3,5,1,1)
  (same comment as for waste reinforcement steel)
  production volume 535.09 kg
    (same comment as for waste reinforcement steel)
  properties: water content 0.00200401, carbon content, fossil 0.641283, dry mass 0.998 kg, wet mass 1 kg
  note on carbon content, fossil: C content was calculated for 1 kg DM, using data in Tab A.2, ecoinvent v2.2 report 13_I.
- waste plastic, mixture: -0.0593767 kg; lognormal variance with pedigree 0.0512, pedigree (2,3,5,1,1)
  EcoSpold01Location=CH
  Estimation for materials used
  Uncertainty: Estimation for materials used
  production volume 0.059394 kg
    (same comment as for waste reinforcement steel)
  properties: water content 0.180638, carbon content, fossil 0.747344, dry mass 0.847 kg, wet mass 1 kg
  note on carbon content, fossil: C content in 1 kg DM was calculated using data in Tab A.2, ecoinvent v2.2 report 13_I
- excavation, hydraulic digger: 5445.41 m3; lognormal variance with pedigree 0.078, pedigree (3,5,5,1,3)
  Rough estimation with data for class 3 sewer system
  EcoSpold01Location=RER
  Uncertainty: Rough estimation with data for class 3 sewer system
- bitumen seal: 534.934 kg; lognormal variance with pedigree 0.0512, pedigree (2,3,5,1,1)
  EcoSpold01Location=RER
  Literature
  Uncertainty: Literature
  properties: carbon content, fossil 0.643968, wet mass 1 kg, dry mass 1 kg
  note on carbon content, fossil: It was considered that the production of bitumen sealing does not include any chemical processes (ecoinvent v2.2 report 7_part XXIII). Therefore, C content of bitumen sealing was calculated as a weighted average of C content of the different components listed in Tab 15.2, ecoinvent v2.2 report 8-part 15
- polyurethane, rigid foam: 534.934 kg; lognormal variance with pedigree 0.0512, pedigree (2,3,5,1,1)
  EcoSpold01Location=RER
  Literature
  Uncertainty: Literature
  properties: carbon content, fossil 0.69089, dry mass 1 kg, wet mass 1 kg
  note on carbon content, fossil: Polyurethanes (PUR) is the collective name for an extensive group of polymers with very different compositions and correspondingly varied property profiles, though their molecule chain contains all a urethane group (-NH-CO-O-). All PURs are built on a common principle : they are produced by the diisocyanate polyaddition process, that links polyols and (di)isocyanates. In this dataset, an example of typical polyurethane mixture is described (Ullmann, Polyurethanes, Dieterich et al. & ecoinvent v2 report 11_II). C content was calculated as an addition of C contents in its components.
- waste rubber, unspecified: -33.0774 kg; lognormal variance with pedigree 0.0512, pedigree (2,3,5,1,1)
  (same comment as for waste plastic, mixture)
  production volume 33.087 kg
    (same comment as for waste reinforcement steel)
  properties: carbon content, fossil 0.853, dry mass 1 kg, wet mass 1 kg
- tetrafluoroethylene: 0.0593767 kg; lognormal variance with pedigree 0.0512, pedigree (2,3,5,1,1)
  EcoSpold01Location=RER
  Literature
  Uncertainty: Literature
  properties: wet mass 1 kg, carbon content, fossil 0.24, dry mass 1 kg
- waste bitumen sheet: -534.934 kg; lognormal variance with pedigree 0.0512, pedigree (2,3,5,1,1)
  (same comment as for waste plastic, mixture)
  production volume 535.09 kg
    (same comment as for waste reinforcement steel)
  properties: carbon content, fossil 0.643207, water content 0.0152284, dry mass 0.985 kg, wet mass 1 kg
  note on carbon content, fossil: The bitumen sheet is made of 63% bitumen, 24% surface spread and filler (assumed to be pure SiO2), 6% carrier fleece (assumed to be PE) and 7% elastomer (assumed to be PS) (ecoinvent v2.2 report 13_I, pg 40). C content of bitumen, PE and PS from Tab A.6 and A.1 (ecoinvent v2.2 report 13_I, pg 40), respectively. C content of waste also given in the dataset
- zinc: 146.627 kg; lognormal variance with pedigree 0.0512, pedigree (2,3,5,1,1)
  EcoSpold01Location=RER
  Literature
  Uncertainty: Literature
  properties: dry mass 1 kg, wet mass 1 kg

## Sampling procedure
Literature and own estimations

## Extrapolations
From single data to Swiss situation.

## Review by Manuele Margni (obsolete) 2005-07-19
Passed
