# water works construction, capacity 6.23E10l/year, seawater reverse osmosis, conventional pretreatment

Dataset: EcoSpold 2, unit process
Geography: GLO
Time period: 2004-01-01 to 2019-12-31
Technology level: current
Classification: ISIC rev.4 ecoinvent: 4220:Construction of utility projects
Classification: EcoSpold01Categories: water supply/production
Scenario: Business-as-Usual
System model: Allocation at the point of substitution
Generated by: Marylène Dussault
Published in: Al-Sarkal, T. 2013
Database: ecoinvent
isCopyrightProtected: true
accessRestrictedTo: 1

## General comment
This dataset represents the construction of a membrane filtration plant with conventional pretreatment. This dataset is based on published literature mainly from the Fujairah-1 seawater reverse osmosis plant as plublished by Al-Sarkal et al. 2013. Reported infrastructure data are based on field measures and plant database. The plant is assumed to have a 30 years lifetime. The average production of the reverse osmosis plant is 170,500 m3/d of treated water and the pretreatment system average capacity is 416,000 m3/d of intake water. Recovery rate of the reverse osmosis system is 41%. Energy recovery is about 35%.

## Included activities start
From reception of raw materials and contruction equipment. This dataset includes material inputs for equipment of the different water treatment stages: chlorination, coagulation, floculation, clarification, sedimentation of sludge, dual media filtration, catridge filtration, membrane filtration and post-treatment. Infrastructure for the reverse osmosis system itself is extrapolated based on the ultrafiltration pretreatment for sea-water reverse osmosis. Metal forming activities and associated losses where excluded. It also excludes the material for the membrane and casing it-self as they are considered consumables (having a shorter lifetime and depending on configuration and raw water quality) and are included in the operation of membrane filtration treatment datasets. Energy and equipment needed for construction are excluded due to lack of data.

## Included activities end
This datasets ends with the dismantlement of the plant at the end of its useful life, expected to be 30 years. Input material end-of-life is included, but equipment and energy used for dismantling is excluded due to lack of data.

## Parameters
- reinforcing steel in concrete: 0.0275 dimensionless; name reinf_steel; lognormal variance with pedigree 0.0052, pedigree (3,4,1,1,2)
  Estimation. Reinforcing steel content in reinforced concrete for potable water treatment equipements based on average value from conventionnal treatment waterworks inventory and technical expert estimate.

## Reference product
- water works, capacity 6.23E10l/year: 1 unit; name SWRO_plant; CPC 53253: Sewage and water treatment plants; By-product classification allocatable product
  production volume 3.187 unit; name PV_SWRO_plant
    Calculated. Estimated production volume of 2012. Based on literature market data, installed desalination capacity (including sevral technologies and water sources) grew as an average of 12% a year from 2005-2010 (Lattermann, s.2010). Adjusted on a "plant basis" using the Fujairah-1 production capacity and percentage of membrane technologies used for desalination in 2006 worldwide: 59% (Lattemann, 2010). Assumed 91% of treatment plant used conventional pretreatment (Al-Sarkal et al.).
    Lattermann, s.2010. Sustainable eater for the future: Water recycling versus desalination - Chapiter 2: Global desalination situation. Edited Escobar, I. et al., Elsevier. volume 2. 399 p.).
    Al-Sarkal, T., & Arafat, H. a. (2013). Ultrafiltration versus sedimentation-based pretreatment in Fujairah-1 RO plant: Environmental impact study. Desalination, 317, 55–66. doi:10.1016/j.desal.2013.02.019
  property price 6.12625e6 EUR2005; name SWRO_plant_price_EUR2005
    Calculated based on inputs: The price of the product has been calculated as a sum of the values of the material and energy inputs for this product. This value is therefore a rough estimation. It may underestimate the real price since there are additional expenses when producing any product. These expences can include for example labour costs, treatment of waste materials and profit for the producer. Please consider carefully whether this level of data quality is acceptable for your application.
  property lifetime capacity in m3 1.86825e9 m3; name SWRO_plant_Lft_capacity_m3
    Calculated value. Based on capacity of seawater reverse osmosis plant assuming full capacity and year long operation.
  property lifetime 30 year; name SWRO_plant_lifetime
    Literature value. Based on reported average expected lifetime for seawater reverse osmosis plant. Value published by Waterreuse association desalination committee. 2011. Overview of desalination plant intake alternatives - white paper.
  property true value 6.12625e6; name SWRO_plant_true_value
    allocation property applied in "true value" allocation // value calculated from revenue

## By-products
All rows: pedigree (1,1,1,1,1)
- iron scrap, sorted, pressed: 0 kg; By-product classification Recyclable; CPC 39310: Slag, dross, scalings and other waste from the manufacture of iron or steel
  Iron scrap recovered from this waste.
  production volume 137961 kg
  property price 0.175 EUR2005
    Temporary price data. Calculated as 90% of purchasers price based on: 2005 import and export prices (total trades (USD) divided by total weight (kg) in biggest economies of the world: EU27, USA, Brasil, China, India, Japan and Russia) from UN Commodity Trade Statistics Database (http://data.un.org/Explorer.aspxDatabase [Accessed 2011.06.20]). Commodity: Waste or scrap, of cast iron
  property carbon content 0
    carbon content on a dry matter basis (reserved; not for manual entry)
  property true value 51.1326
    allocation property applied in "true value" allocation // value calculated from revenue
  properties: water content 0, water in wet mass 0 kg, carbon content, fossil 0, dry mass 1 kg, carbon content, non-fossil 0, wet mass 1 kg, carbon allocation 0 kg
- heat, for reuse in municipal waste incineration only: 0 MJ; CPC 17300: Steam and hot water; By-product classification allocatable product
  Net electricity generated from this waste and used in internal MSWI plant energy redistribution.
  Uncertainty: uncertainty is calculated from uncertainties in waste composition and uncertainties in energy efficiency and the uncertainty in internal energy demand
  production volume 912686 MJ
  property exergy 0.1842 MJ; name E_th_prod_MSWI_exergy
    This exergy property is based on the exergy content of the product.
  property price 0.0106 EUR2005; name E_th_prod_MSWI_price_EUR2005
    Average European district heat price from Ecoheatcool and Euroheat 2005-2006, Ecoheat Work package 1: The European heat market. Final report. 10.6 EUR/GJ i s the price of district heat. http://www.solarthermalworld.org/files/Ecoheatcool%20WP1%20Web.pdf?download
  property true value relation 0.1842; name E_th_prod_MSWI_true_value_relation
    property to calculate "true value" from
  property true value 1265.81
    allocation property applied in "true value" allocation // value calculated from true value relation
- electricity, for reuse in municipal waste incineration only: 0 kWh; CPC 17100: Electrical energy; By-product classification allocatable product
  (same comment as for heat, for reuse in municipal waste incineration only)
  production volume 130133 kWh
  property true value relation 3.6; name E_el_prod_MSWI_true_value_relation
    property to calculate "true value" from
  property price 0.1 EUR2005; name E_el_prod_MSWI_price_EUR2005
    Estimated to be the same price as in case of electricity, medium voltage.
  property exergy 3.6 MJ; name E_el_prod_MSWI_exergy
    This exergy property is based on the exergy content of the product.
  property true value 3523.26
    (same comment as for heat, for reuse in municipal waste incineration only)
- iron scrap, unsorted: 0 kg; source European Aluminium Association 2008; CPC 39310: Slag, dross, scalings and other waste from the manufacture of iron or steel; By-product classification Recyclable
  production volume 1007.67 kg
  property price 0.149 EUR2005; name ironScrapAmount_price_EUR2005
    Temporary price data. Calculated as 90% of purchasers price based on: estimated at 85% of sorted scrap
  property carbon content 0
    carbon content on a dry matter basis (reserved; not for manual entry)
  property true value 15.7036
    allocation property applied in "true value" allocation // value calculated from revenue
  properties: water in wet mass 0 kg, water content 0, carbon content, fossil 0, carbon content, non-fossil 0, dry mass 1 kg, wet mass 1 kg, carbon allocation 0 kg
- aluminium oxide, non-metallurgical: 0 kg; source European Aluminium Association 2008; CPC 41432: Alumina (aluminium oxide), except artificial corundum; By-product classification allocatable product; CAS 1344-28-1
  production volume 63408.7 kg
  property carbon content, non-fossil 0; name C_content_non_fossil
  property price 0.28 EUR2005; name Al2O3Amount_price_EUR2005
    From UN trade database. http://data.un.org/ Import data from the largest economies of the world are used (Brazil, India, USA, China, Japan and EU-27).
  property dry mass 1 kg; name DM
  property water content 0; name water_content
  property wet mass 1 kg; name WM
  property water in wet mass 0 kg; name WWM
  property carbon content, fossil 0; name C_content_fossil
  property carbon content 0
    carbon content on a dry matter basis (reserved; not for manual entry)
  property true value 1856.96
    allocation property applied in "true value" allocation // value calculated from revenue
  properties: carbon allocation 0 kg
- aluminium, cast alloy: 0 kg; source European Aluminium Association 2008; By-product classification allocatable product; CPC 41431: Unwrought aluminium
  EcoSpold01Location=RER
  production volume 592731 kg
  property price 1.3 EUR2005; name castAlloyAmount_price_EUR2005
    Temporary price data. Calculated as 90% of purchasers price based on: Source: London Metal Exchange, Aluminium alloy price for 2005
  property carbon content 0
    carbon content on a dry matter basis (reserved; not for manual entry)
  property true value 80593
    allocation property applied in "true value" allocation // value calculated from revenue
  properties: water in wet mass 0 kg, carbon content, non-fossil 0, water content 0, dry mass 1 kg, carbon content, fossil 0, wet mass 1 kg, carbon allocation 0 kg
- aluminium, wrought alloy: 0 kg; source European Aluminium Association 2008; By-product classification allocatable product; CPC 4153: Semi-finished products of aluminium or aluminium alloys
  production volume 259486 kg
  property price 1.44 EUR2005; name secondaryAluminiumOutput_price_EUR2005
  properties: wet mass 1 kg, water content 0, carbon content, fossil 0, water in wet mass 0 kg, carbon content, non-fossil 0, dry mass 1 kg, carbon content 0, carbon allocation 0 kg, true value 39081.7

## Inputs from technosphere
- charcoal: 5.57499e6 kg; source Al-Sarkal, T. 2013; lognormal variance with pedigree 0.0072, pedigree (3,4,3,1,2)
  Literature value. Based on Al-sarkal, T. et al. 2013.
  properties: carbon content, non-fossil 0.8, dry mass 1 kg, wet mass 1 kg
- glass fibre reinforced plastic, polyamide, injection moulded: 7631.94 kg; name glass_fiber; source Al-Sarkal, T. 2013; lognormal variance with pedigree 0.0072, pedigree (3,4,3,1,2)
  Literature value. Material for some chemical tanks.
  properties: dry mass 1 kg, wet mass 1 kg, carbon content, fossil 0.446018
- polyvinylchloride, suspension polymerised: 259751 kg; name pvc; source Al-Sarkal, T. 2013; lognormal variance with pedigree 0.0072, pedigree (3,4,3,1,2)
  Literature value. Used for contruction of reverse osmosis system pipes (extrapolation from ultrafiltration).
  properties: dry mass 1 kg, carbon content, fossil 0.387097, wet mass 1 kg
- waste reinforced concrete: 0 kg; name waste_reinf_concrete; pedigree (1,1,1,1,1)
  Estimation. Based on material input.
  production volume 0 kg
    Calculated from production volume of reference product using the relative outputs.
  property price 0 EUR2005; name waste_reinf_concrete_price_EUR2005
  properties: wet mass 1 kg, dry mass 0.99418 kg, water content 0.00585407
- aluminium, wrought alloy: 294507 kg; name al; source Al-Sarkal, T. 2013; lognormal variance with pedigree 0.0072, pedigree (3,4,3,1,2)
  Literature value. Used for contruction of reverse osmosis system shed (extrapolation from ultrafiltration).
  properties: dry mass 1 kg, wet mass 1 kg
- waste reinforcement steel: 0 kg; name waste_reinf_steel; pedigree (1,1,1,1,1)
  Estimation. Based on material input.
  Uncertainty: Calculated variable. Uncertainty will be determined from propagation of uncertainty factors of underlying variables. Uncertainty of actual relation between variables not accounted for at this time, although this could be included in a future update.
  production volume 0 kg
    Calculated from production volume of reference product using the relative outputs.
  property price 0 EUR2005; name waste_reinf_steel_price_EUR2005
  properties: wet mass 1 kg, dry mass 1 kg
- steel, low-alloyed: 387799 kg; name steel; source Al-Sarkal, T. 2013; lognormal variance with pedigree 0.0132, pedigree (4,4,3,1,2)
  (same comment as for aluminium, wrought alloy)
  properties: carbon content, fossil 0.005, dry mass 1 kg, wet mass 1 kg
- waste plastic, mixture: 0 kg; name waste_plastic; pedigree (1,1,1,1,1)
  Estimation. Based on material input.
  production volume 0 kg
    Calculated from production volume of reference product using the relative outputs.
  property price 0 EUR2005; name waste_plastic_price_EUR2005
  properties: wet mass 1 kg, dry mass 0.847 kg, water content 0.180638, carbon content, fossil 0.747344
- scrap aluminium: 0 kg; name scrap_al
  Estimation. Based on material input.
  production volume 0 kg
    Calculated from production volume of reference product using the relative outputs.
  property price 0 EUR2005; name scrap_al_price_EUR2005
  properties: wet mass 1 kg, dry mass 1 kg
- scrap steel: 0 kg; name scrap_steel; pedigree (1,1,1,1,1)
  (same comment as for waste reinforcement steel)
  production volume 0 kg
    Calculated from production volume of reference product using the relative outputs.
  property price 0 EUR2005; name scrap_steel_price_EUR2005
  properties: dry mass 1 kg, wet mass 1 kg
- reinforcing steel: 504.481 kg; = reinf_concrete* reinf_steel; lognormal variance with pedigree 0.002, pedigree (1,1,3,1,1)
  Calculated value.
  Uncertainty: Calculated variable. Uncertainty will be determined from propagation of uncertainty factors of underlying variables. Uncertainty of actual relation between variables not accounted for at this time, although this could be included in a future update.
  properties: carbon content, fossil 0.004, wet mass 1 kg, dry mass 1 kg
- silica sand: 2.36129e6 kg; source Al-Sarkal, T. 2013; lognormal variance with pedigree 0.0072, pedigree (3,4,3,1,2)
  Literature value. Based on Al-sarkal, T. et al. 2013.
  properties: wet mass 1 kg, water content 0.010101, dry mass 0.99 kg
- concrete, normal: 18344.8 m3; name reinf_concrete; = 44561277/ Ref('67f102e2-9cb6-4d20-aa16-bf74d8a03326', 'f760c8d9-171f-4452-9d78-c9be60136f05'); source Al-Sarkal, T. 2013; lognormal variance with pedigree 0.0072, pedigree (3,4,3,1,2)
  Literature value. Material for settling tanks, fondation and treatment unit superstructure.
  properties: water content 0.086758, dry mass 2190 kg, wet mass 2380 kg
- gravel, crushed: 0 kg; source Al-Sarkal, T. 2013; pedigree (1,1,1,1,1)
  Literature value. Based on Al-sarkal, T. et al. 2013.
  properties: wet mass 1 kg, dry mass 1 kg
- steel, chromium steel 18/8: 381921 kg; name ssteel; source Al-Sarkal, T. 2013; lognormal variance with pedigree 0.0072, pedigree (3,4,3,1,2)
  Literature value. Material for pumps, motors and agitators of the treatment system.
  properties: carbon content, fossil 0.0008, wet mass 1 kg, dry mass 1 kg
  note on carbon content, fossil: Stainless steel model is the grade 304 steel (18/8 stainless, 18% chromium 8% nickel; max. 0.08% C)
- waste reinforced concrete: -1200.39, -12.719, -17131.7 kg (3 entries); lognormal variance with pedigree 0.002, pedigree (1,1,3,1,1)
  Estimation. Based on material input.
  production volume 59670.9 kg
- waste reinforcement steel: -0.350046, -504.131 kg (2 entries); lognormal variance with pedigree 0.002, pedigree (1,1,3,1,1)
  (same comment as for waste reinforcement steel)
  production volume 1640.95 kg
- waste plastic, mixture: -25736.9, -1984.16, -819.53, -778.221, -29695.9, -331.081, -150.059, -207887 kg (8 entries); lognormal variance with pedigree 0.002, pedigree (1,1,3,1,1)
  Estimation. Based on material input.
  production volume 869731 kg
- scrap aluminium: -93420, -4383.05, -196704 kg (3 entries)
  Estimation. Based on material input.
  production volume 957958 kg
- scrap steel: -92995.9, -117.57, -288807 kg (3 entries); lognormal variance with pedigree 0.002, pedigree (1,1,3,1,1)
  (same comment as for waste reinforcement steel)
  production volume 1.24229e6 kg
- gravel, crushed: 174034, 38015.6, 229.78, 3480.32, 668008 kg (5 entries); source Al-Sarkal, T. 2013; lognormal variance with pedigree 0.0072, pedigree (3,4,3,1,2)
  Literature value. Based on Al-sarkal, T. et al. 2013.

## Inputs from nature
- Transformation, to industrial area [natural resource, land]: 23761.2 m2; lognormal variance with pedigree 0.0132, pedigree (4,4,3,1,2)
  Calulated value. Estimated based on reverse osmosis plant footprint and production capacity reported by Bartels. 2010. Design Advantages for SWRO Using Advanced Membrane Technology. IDA Journal of Desalination and Water Reuse. pp.21-25 (5).
- Occupation, construction site [natural resource, land]: 47522.5 m2*year; = footprint*2; lognormal variance with pedigree 0.0852, pedigree (5,4,5,5,2)
  Calculated value. Assumed construction of facility took 2 years.
- Transformation, from unspecified [natural resource, land]: 23761.2 m2; name footprint; lognormal variance with pedigree 0.0132, pedigree (4,4,3,1,2)
  (same comment as for Transformation, to industrial area)
- Occupation, industrial area [natural resource, land]: 712837 m2*year; = SWRO_plant_lifetime*footprint; lognormal variance with pedigree 0.002, pedigree (1,1,3,1,1)
  (same comment as for reinforcing steel)

## Sampling procedure
Al-Sarkal, T., & Arafat, H. a. (2013). Ultrafiltration versus sedimentation-based pretreatment in Fujairah-1 RO plant: Environmental impact study. Desalination, 317, 55–66. doi:10.1016/j.desal.2013.02.019

## Extrapolations
Extrapolation to plant located anywhere on the world. User must be careful is using this dataset to extrapolate for construction of different membrane filtration types (nanofiltration, ultrafiltration) and water other sources (brackish water, etc), since seawater reverse osmosis is different from other system and water sources. This dataset is based on published measured data from a single plant in the Arab Emirah (reverse osmosis plant Fujairah-1). This plant is one of the largest seawater reverse osmosis plant in the world and is located in the Arabian Gulf region where desalination account for around 45% of total desalinated water. The Arabian Gulf produce 11% of total seawater treated by reverse osmosis and the Fujairah-1 plant alone accounts for 2% of global production. Main areas where desalination is done are Arabian Gulf, Mediterranean Sea, Red Sea, Coastal waters of California, China and Australia (Lattermann 2008, 2010).

## Review by Emilia Moreno Ruiz 2014-05-22
renaming water work infrastructure
