# treatment of used refrigeration machine, carbon dioxide, liquid as refrigerant

Dataset: EcoSpold 2, unit process
Geography: GLO
Time period: 2010-01-01 to 2019-12-31
Technology level: modern
Classification: EcoSpold01Categories: transport systems/road
Classification: ISIC rev.4 ecoinvent: 3830:Materials recovery
Scenario: Business-as-Usual
System model: Allocation at the point of substitution
Generated by: Tereza Levova
Database: ecoinvent
isCopyrightProtected: true
accessRestrictedTo: 1

## General comment
This dataset represents the treatment of used refrigeration machine which uses carbon dioxide, liquid as refrigerant.

## Included activities start
The activity starts when the used refrigeration machine enters the waste treatment facility.

The data on energy needed during dismantling are unknown.

## Included activities end
The activity ends by different waste materials being ready for further treatment.

## Technology
The inventory is created by looking at the material composition of the container.
The most used refrigerant in refrigeration machines is the R134a. Since this refrigerant has a high global warming potential the refrigeration technology producers started producing referigeration machines with alternative refrigerants (Carrier, 2014, http://dms.hvacpartners.com//docs/2000/Public/0D/62-11665.pdf, accessed 20141105). One of them is liquid carbon dioxide.

## Parameters
- initial refrigerant charge: 4.5 kg; name initial_refrigerant_charge; lognormal variance with pedigree 0.0166, pedigree (4,5,1,1,1)
  Literature value. Copied from the refrigerated machine production dataset.

## Reference product
- used refrigeration machine, carbon dioxide, liquid as refrigerant: -1 unit; name used_ref_mach; By-product classification Waste; CPC 39990: Other wastes n.e.c.
  production volume 52200 unit; name used_ref_mach_RP_PV
    It is assumed, that same amount of refrigeration machine which is produced a year is also scrapped every year.
  property price 0 EUR2005; name used_ref_mach_price_EUR2005
    Waste products are assigned a price of zero as they are assumed to require further treatment.
  property carbon content 0.105111
    carbon content on a dry matter basis (reserved; not for manual entry)
  properties: dry mass 380 kg, carbon content, non-fossil 5.26316e-6, water content 0, carbon content, fossil 0.105105, water in wet mass 0 kg, wet mass 380 kg, carbon allocation 39.942 kg

## By-products
- lead: 0 kg; CPC 41441: Lead, unwrought; By-product classification allocatable product
  EcoSpold01Location=SE
  property price 0.744 EUR2005
    Temporary price data. Calculated as 90% of purchasers price based on: Source: ecoinvent v2 report 10-part IX, Tab 5.10 & 2.5
  property carbon content 0
    carbon content on a dry matter basis (reserved; not for manual entry)
  properties: wet mass 1 kg, water content 0, carbon content, non-fossil 0, carbon content, fossil 0, dry mass 1 kg, water in wet mass 0 kg, carbon allocation 0 kg
- copper: 0 kg; By-product classification allocatable product; CPC 41413: Refined copper and copper alloys, unwrought; master alloys of copper
  EcoSpold01Location=SE
  property price 5.52 EUR2005
    Literature value (http://www.economist.com/news/business/21576714-mining-industry-has-enriched-chile-its-future-precarious-copper-solution). Average price between 20015 and 2013.
  property carbon content 0
    carbon content on a dry matter basis (reserved; not for manual entry)
  properties: water content 0, water in wet mass 0 kg, carbon content, fossil 0, carbon content, non-fossil 0, dry mass 1 kg, wet mass 1 kg, carbon allocation 0 kg
- nickel, 99.5%: 0 kg; CPC 41422: Unwrought nickel; By-product classification allocatable product
  EcoSpold01Location=SE
  property price 10.4 EUR2005
    Temporary price data. Calculated as 90% of purchasers price based on: 2004 nickel price from USGS (2007) Mineral commodity summaries 2007. <http://minerals.usgs.gov/minerals/pubs/mcs/2007/mcs2007.pdf> [Accessed 25 May 2010]
  property carbon content 0
    carbon content on a dry matter basis (reserved; not for manual entry)
  properties: water in wet mass 0 kg, wet mass 1 kg, carbon content, non-fossil 0, dry mass 1 kg, water content 0, carbon content, fossil 0, carbon allocation 0 kg
- silver: 0 kg; CPC 41310: Silver (including silver plated with gold or platinum), unwrought or in semi-manufactured forms, or in powder […]; By-product classification allocatable product; CAS 7440-22-4
  EcoSpold01Location=SE
  property price 178 EUR2005
    (same comment as for lead)
  property carbon content 0
    carbon content on a dry matter basis (reserved; not for manual entry)
  properties: wet mass 1 kg, carbon content, non-fossil 0, dry mass 1 kg, water content 0, carbon content, fossil 0, water in wet mass 0 kg, carbon allocation 0 kg
- palladium: 0 kg; CPC 4160: Other non-ferrous metals and articles thereof (including waste and scrap of some metals); cermets and articles […]; By-product classification allocatable product
  EcoSpold01Location=SE
  property price 5640 EUR2005
    Temporary price data. Calculated as 90% of purchasers price based on: 2004 price from USGS (2007) Mineral commodity summaries 2007. <http://minerals.usgs.gov/minerals/pubs/mcs/2007/mcs2007.pdf> [Accessed 25 May 2010]
  property carbon content 0
    carbon content on a dry matter basis (reserved; not for manual entry)
  properties: wet mass 1 kg, carbon content, fossil 0, water in wet mass 0 kg, water content 0, carbon content, non-fossil 0, dry mass 1 kg, carbon allocation 0 kg
- gold: 0 kg; CPC 41320: Gold (including gold plated with platinum), unwrought or in semi-manufactured forms, or in powder form; By-product classification allocatable product; CAS 7440-57-5
  EcoSpold01Location=SE
  property price 10600 EUR2005
    Temporary price data. Calculated as 90% of purchasers price based on: Source: ecoinvent v2 report 10-part IX, Tab 2.5
  property carbon content 0
    carbon content on a dry matter basis (reserved; not for manual entry)
  properties: wet mass 1 kg, carbon content, fossil 0, dry mass 1 kg, carbon content, non-fossil 0, water content 0, water in wet mass 0 kg, carbon allocation 0 kg
- electricity, for reuse in municipal waste incineration only: 0 kWh; CPC 17100: Electrical energy; By-product classification allocatable product; pedigree (1,1,1,1,1)
  Net electricity generated from this waste and used in internal MSWI plant energy redistribution.
  Uncertainty: uncertainty is calculated from uncertainties in waste composition and uncertainties in energy efficiency and the uncertainty in internal energy demand
  property price 0.1 EUR2005; name E_el_prod_MSWI_price_EUR2005
    Estimated to be the same price as in case of electricity, medium voltage.
  property exergy 3.6 MJ; name E_el_prod_MSWI_exergy
    This exergy property is based on the exergy content of the product.
  property true value relation 3.6; name E_el_prod_MSWI_true_value_relation
    property to calculate "true value" from
- heat, for reuse in municipal waste incineration only: 0 MJ; CPC 17300: Steam and hot water; By-product classification allocatable product; pedigree (1,1,1,1,1)
  Net useful heat generated from this waste and used in internal MSWI plant energy redistribution.
  Uncertainty: uncertainty is calculated from uncertainties in waste composition and uncertainties in energy efficiency and the uncertainty in internal energy demand
  property true value relation 0.1842; name E_th_prod_MSWI_true_value_relation
    property to calculate "true value" from
  property exergy 0.1842 MJ; name E_th_prod_MSWI_exergy
    This exergy property is based on the exergy content of the product.
  property price 0.0106 EUR2005; name E_th_prod_MSWI_price_EUR2005
    Average European district heat price from Ecoheatcool and Euroheat 2005-2006, Ecoheat Work package 1: The European heat market. Final report. 10.6 EUR/GJ i s the price of district heat. http://www.solarthermalworld.org/files/Ecoheatcool%20WP1%20Web.pdf?download
- zinc concentrate: 0 kg; CPC 14290: Other non-ferrous metal ores and concentrates (other than uranium or thorium ores and concentrates); By-product classification allocatable product
  Calculated value from the knowledge of the properties of both products.
  property price 0.38 EUR2005; name ByP_price_EUR2005
    Temporary price data. Calculated as 90% of purchasers price based on: Zinc content in concentrate 53%. Concentrate price per kg Zn 86.5% of refined Zn price (13.5% treatment charges according to CHR Metals Limited 2005: Dynamic cost curves. http://www.minecost.com/dynamic.pdf). 2004 zinc price from USGS (2007) Mineral commodity summaries 2007. <http://minerals.usgs.gov/minerals/pubs/mcs/2007/mcs2007.pdf> [Accessed 25 May 2010]
  property zinc content 0.53; name zinc_C_zinc_concentrate
    Zinc content on a dry matter basis. Value taken from teh "zinc mine operation" /GLO dataset.
  property dry mass 1 kg; name DM_zinc_concentrate
  property carbon content 0
    carbon content on a dry matter basis (reserved; not for manual entry)
  properties: wet mass 1 kg, water content 0, carbon content, non-fossil 0, carbon content, fossil 0, water in wet mass 0 kg, carbon allocation 0 kg
- iron scrap, sorted, pressed: 0 kg; By-product classification Recyclable; CPC 39310: Slag, dross, scalings and other waste from the manufacture of iron or steel; pedigree (1,1,1,1,1)
  Iron scrap recovered from this waste.
  property price 0.175 EUR2005
    Temporary price data. Calculated as 90% of purchasers price based on: 2005 import and export prices (total trades (USD) divided by total weight (kg) in biggest economies of the world: EU27, USA, Brasil, China, India, Japan and Russia) from UN Commodity Trade Statistics Database (http://data.un.org/Explorer.aspxDatabase [Accessed 2011.06.20]). Commodity: Waste or scrap, of cast iron
  property carbon content 0
    carbon content on a dry matter basis (reserved; not for manual entry)
  properties: water content 0, water in wet mass 0 kg, carbon content, fossil 0, dry mass 1 kg, carbon content, non-fossil 0, wet mass 1 kg, carbon allocation 0 kg
- iron scrap, unsorted: 0 kg; source European Aluminium Association 2008; CPC 39310: Slag, dross, scalings and other waste from the manufacture of iron or steel; By-product classification Recyclable; pedigree (1,1,1,1,1)
  property price 0.149 EUR2005; name ironScrapAmount_price_EUR2005
    Temporary price data. Calculated as 90% of purchasers price based on: estimated at 85% of sorted scrap
  property carbon content 0
    carbon content on a dry matter basis (reserved; not for manual entry)
  properties: water in wet mass 0 kg, water content 0, carbon content, fossil 0, carbon content, non-fossil 0, dry mass 1 kg, wet mass 1 kg, carbon allocation 0 kg
- aluminium oxide, non-metallurgical: 0 kg; source European Aluminium Association 2008; CPC 41432: Alumina (aluminium oxide), except artificial corundum; By-product classification allocatable product; CAS 1344-28-1; pedigree (1,1,1,1,1)
  property carbon content, non-fossil 0; name C_content_non_fossil
  property price 0.28 EUR2005; name Al2O3Amount_price_EUR2005
    From UN trade database. http://data.un.org/ Import data from the largest economies of the world are used (Brazil, India, USA, China, Japan and EU-27).
  property dry mass 1 kg; name DM
  property water content 0; name water_content
  property wet mass 1 kg; name WM
  property water in wet mass 0 kg; name WWM
  property carbon content, fossil 0; name C_content_fossil
  property carbon content 0
    carbon content on a dry matter basis (reserved; not for manual entry)
  properties: carbon allocation 0 kg
- aluminium, cast alloy: 0 kg; source European Aluminium Association 2008; By-product classification allocatable product; CPC 41431: Unwrought aluminium; pedigree (1,1,1,1,1)
  EcoSpold01Location=RER
  property price 1.3 EUR2005; name castAlloyAmount_price_EUR2005
    Temporary price data. Calculated as 90% of purchasers price based on: Source: London Metal Exchange, Aluminium alloy price for 2005
  property carbon content 0
    carbon content on a dry matter basis (reserved; not for manual entry)
  properties: water in wet mass 0 kg, carbon content, non-fossil 0, water content 0, dry mass 1 kg, carbon content, fossil 0, wet mass 1 kg, carbon allocation 0 kg
- aluminium, wrought alloy: 0 kg; source European Aluminium Association 2008; By-product classification allocatable product; CPC 4153: Semi-finished products of aluminium or aluminium alloys; pedigree (1,1,1,1,1)
  property price 1.44 EUR2005; name secondaryAluminiumOutput_price_EUR2005
    Estimated based on literature values and expert judgement. Aluminium ccast alloys are about 90% of the price of aluminium wrought alloys.
  property carbon content 0
    carbon content on a dry matter basis (reserved; not for manual entry)
  properties: wet mass 1 kg, water content 0, carbon content, fossil 0, water in wet mass 0 kg, carbon content, non-fossil 0, dry mass 1 kg, carbon allocation 0 kg

## Inputs from technosphere
- scrap steel: 0 kg; name ByP_2
  Literature value from the refrigeration machine production dataset.
  production volume 0 kg
    Calculated from production volume of reference product using the relative outputs.
  property price 0 EUR2005; name ByP_2_price_EUR2005
  properties: wet mass 1 kg, dry mass 1 kg
- waste polyurethane foam: 0 kg; name ByP_1
  Literature value from the refrigeration machine production dataset.
  production volume 0 kg
    Calculated from production volume of reference product using the relative outputs.
  property price 0 EUR2005; name ByP_1_price_EUR2005
  properties: carbon content, fossil 0.641283, wet mass 1 kg, dry mass 0.998 kg, water content 0.00200401
- building, hall: 0.000495986 m2; = 1/(( lifetime_building*365)/(2.235*2.025*2))
  Calculated value based on estimates.
  1m2 of hall is available every day for 50 years
  1 refrigeration machine occupies during the dismantling the area of its base for the period of 2 days
  property lifetime 50 year; name lifetime_building
- electronics scrap: -15 kg; name ByP_8
  Literature value from the refrigeration machine production dataset.
  production volume 783000 kg; = ABS(ByP_8/ used_ref_mach* used_ref_mach_RP_PV)
    Calculated from production volume of reference product using the relative outputs.
  property price 16.1 EUR2005; name ByP_8_price_EUR2005
  properties: wet mass 1 kg, dry mass 1 kg
- waste polypropylene: 0 kg; name ByP_7
  Literature value from the refrigeration machine production dataset.
  production volume 0 kg
    Calculated from production volume of reference product using the relative outputs.
  property price 0 EUR2005; name ByP_7_price_EUR2005
  properties: water content 0.189061, wet mass 1 kg, carbon content, fossil 0.825208, dry mass 0.841 kg
- waste plastic, industrial electronics: 0 kg; name ByP_6
  Literature value from the refrigeration machine production dataset.
  production volume 0 kg
    Calculated from production volume of reference product using the relative outputs.
  property price 0 EUR2005; name ByP_6_price_EUR2005
  properties: water content 0.180638, wet mass 1 kg, carbon content, fossil 0.81386, dry mass 0.847 kg
- scrap copper: 0 kg; name ByP_5
  Literature value from the refrigeration machine production dataset.
  production volume 0 kg
    Calculated from production volume of reference product using the relative outputs.
  property price 0 EUR2005; name ByP_5_price_EUR2005
  properties: wet mass 1 kg, dry mass 1 kg
- used cable: -18.72 kg; name ByP_4; = (18*1.04)*-1
  Literature value from the refrigeration machine production dataset.
  18m is the length of the cable
  1.04kg/m is its weight per m
  production volume 977184 kg; = ABS(ByP_4/ used_ref_mach* used_ref_mach_RP_PV)
    Calculated from production volume of reference product using the relative outputs.
  property price 0 EUR2005; name ByP_4_price_EUR2005
  properties: carbon content, fossil 183.274, wet mass 1 kg, dry mass 1 kg
- scrap aluminium: 0 kg; name ByP_3
  Literature value from the refrigeration machine production dataset.
  production volume 0 kg
    Calculated from production volume of reference product using the relative outputs.
  property price 0 EUR2005; name ByP_3_price_EUR2005
  properties: dry mass 1 kg, wet mass 1 kg
- scrap steel: -34.6455, -0.0438005, -107.595 kg (3 entries)
  Literature value from the refrigeration machine production dataset.
  production volume 7.42722e6 kg
- waste polyurethane foam: -0.0115285, -14.6976 kg (2 entries)
  Literature value from the refrigeration machine production dataset.
  production volume 767815 kg
- waste polypropylene: -0.824333, -0.0635512, -0.0262489, -0.0249258, -0.951136, -0.0106043, -0.00480628, -6.65848 kg (8 entries)
  Literature value from the refrigeration machine production dataset.
  production volume 447045 kg
- waste plastic, industrial electronics: -4.63929e-6, -0.000307086 kg (2 entries)
  Literature value from the refrigeration machine production dataset.
  production volume 16.2721 kg
- scrap copper: -2.05706, -0.0965128, -4.33133 kg (3 entries)
  Literature value from the refrigeration machine production dataset.
  production volume 338512 kg
- scrap aluminium: -36.8715, -1.72992, -77.6362 kg (3 entries)
  Literature value from the refrigeration machine production dataset.
  production volume 6.0676e6 kg

## Emissions to nature
- Carbon dioxide, fossil [air, unspecified]: 4.5 kg; = initial_refrigerant_charge
  Estimated value. It is estimated, that the carbon dioxide, liquid used as a refrigerant is simply vented to air.
  0.27273 is carbon content of carbon dioxide, liquid.

## Extrapolations
This dataset has been extrapolated from year 2014 to the year of the calculation (2019). The uncertainty has been adjusted accordingly.

## Review by Gabor Doka 2014-12-19
passed
