# electricity, high voltage, import from IN-Western grid

Dataset: EcoSpold 2, unit process
Geography: IN-Southern grid
Time period: 2012-01-01 to 2019-12-31
Technology level: modern
Classification: ISIC rev.4 ecoinvent: 3510:Electric power generation, transmission and distribution
Scenario: Business-as-Usual
System model: Allocation at the point of substitution
Generated by: Muhammed Noor Hossain
Published in: Hossain, Muhammed Noor 2016
Database: ecoinvent
isCopyrightProtected: true
accessRestrictedTo: 1

## General comment
This dataset represents the amount of imported electricity from Indian Southern grid to Indian North-eastern grid. The import value is valid for 2012 and includes all electricity imports, independently whether used within the importing country, or re-exported. For a discussion of different ways of modeling electricity trade in LCI, please refer to the following literature:

Itten, R., Frischknecht, R., and Stucki, M. (2014) Life Cycle Inventories of Electricity Mixes and Grid. treeze Ltd., Uster, Switzerland.

## Included activities start
This activity represents the point of 'handing over' the electricity from one region to the other at the border.

## Included activities end
This dataset doesn't include any electricity losses or transmission infrastructure as these are accounted for in the market datasets.

## Time period
Annual production volume is valid for 2012-13

## Reference product
- electricity, high voltage: 1 kWh; source Central Electricity Authority 2013; CPC 17100: Electrical energy; By-product classification allocatable product
  production volume 2.2582e9 kWh
    Literature value. Taken from Annual Report 2012-13 of Central Electricity Authority, India.
  property price 0.0977 EUR2005
    Temporary price data. Calculated as 90% of purchasers price based on: 94% of the average price (to account for a 6% loss in transformation and transmission) for electricity for industrial consumersin 2005 (excluded taxes). From IEA.

## Inputs from technosphere
- electricity, high voltage: 1 kWh; undefined min 1, max 1, standardDeviation95 0, pedigree (1,1,3,1,1)
  activityLink added to better reflect the reality of the supply chain

## Extrapolations
This dataset has been extrapolated from year 2015 to the year of the calculation (2019). The uncertainty has been adjusted accordingly.
