# methane production, 96% by volume, from biogas, from high pressure network, at service station

Dataset: EcoSpold 2, unit process
Geography: RoW
Time period: 2001-01-01 to 2019-12-31
Technology level: current
Classification: ISIC rev.4 ecoinvent: 3520:Manufacture of gas; distribution of gaseous fuels through mains
Classification: EcoSpold01Categories: biomass/fuels
Synonyms: Kompogas, Naturgas
Tags: ConvertedDataset
Scenario: Business-as-Usual
System model: Allocation at the point of substitution
Share of production covered: 0 %
Generated by: Mireille Faist Emmenegger (obsolete)
Published in: Jungbluth N. 2007
Database: ecoinvent
isCopyrightProtected: true
accessRestrictedTo: 1

## General comment
The initial pressure of gas is from the high pressure network (1-5 bar). Air emissions are calculated from gas losses and composition of biogas.
[This dataset was already contained in the ecoinvent database version 2. It was not individually updated during the transfer to ecoinvent version 3. Life Cycle Impact Assessment results may still have changed, as they are affected by changes in the supply chain, i.e. in other datasets. This dataset was generated following the ecoinvent quality guidelines for version 2. It may have been subject to central changes described in the ecoinvent version 3 change report (http://www.ecoinvent.org/database/ecoinvent-version-3/reports-of-changes/), and the results of the central updates were reviewed extensively. The changes added e.g. consistent water flows and other information throughout the database. The documentation of this dataset can be found in the ecoinvent reports of version 2, which are still available via the ecoinvent website. The change report linked above covers all central changes that were made during the conversion process.]

## Included activities end
This data set includes electricity requirements of a biogas service station as well as emissions from losses.

## Geography
Data for Switzerland

## Technology
Service station with high initial gas pressure (1-5 bar)

## Time period
personal communication

## Reference product
- methane, 96% by volume, from biogas, from high pressure network, at service station: 1 kg; By-product classification allocatable product; CPC 17200: Coal gas, water gas, producer gas and similar gases, other than petroleum gases and other gaseous hydrocarbons; CAS 74-82-8
  EcoSpold01Location=CH
  production volume 3.96633 kg
    This is a placeholder value that does not reflect real-world production volumes. This dataset does not currently require a real-world production volume to work in the database framework, and no actual data were collected yet. This has no negative effect on the results of the ecoinvent database.
  property price 0.240119 EUR2005
    Calculated based on inputs: The price of the product has been calculated as a sum of the values of the material and energy inputs for this product. This value is therefore a rough estimation. It may underestimate the real price since there are additional expenses when producing any product. These expences can include for example labour costs, treatment of waste materials and profit for the producer. Please consider carefully whether this level of data quality is acceptable for your application.
  property carbon content, non-fossil 0.695496
    C content is 0.7 kg C/kg methane 96%vol (tab 19.1, ecoinvent v2.2 report 17, part 19). This can be obtained from the composition of the gas, 96% (in vol) methane, 2% (in vol) CO2. The composition in %vol was converted in % weight using density data of the different gases from tab 19.1, ecoinvent v2.2 report 17, part 19.
  property carbon content 0.695496
    carbon content on a dry matter basis (reserved; not for manual entry)
  properties: water in wet mass 0 kg, wet mass 1 kg, water content 0, carbon content, fossil 0, dry mass 1 kg, carbon allocation 0.695496 kg

## Inputs from technosphere
- electricity, medium voltage: 0 kWh; pedigree (1,1,1,1,1)
  Model from industry expert
  EcoSpold01Location=CH
  Uncertainty: Model from industry expert
- natural gas service station: 8.4821e-8 unit; lognormal variance with pedigree 0.3546, pedigree (2,4,5,5,1)
  EcoSpold01Location=CH
  Expert data for one service station
  Uncertainty: Expert data for one service station
- methane, 96% by volume, from biogas, high pressure, at user: 45.833 MJ; lognormal variance with pedigree 0.0421, pedigree (1,2,5,5,1)
  EcoSpold01Location=CH
  Estimation from industry expert
  Uncertainty: Estimation from industry expert
  properties: wet mass 0.0218341 kg, dry mass 0.0218341 kg, carbon content, non-fossil 0.695496
  note on carbon content, non-fossil: C content is 0.7 kg C/kg methane 96%vol (tab 19.1, ecoinvent v2.2 report 17, part 19). This can be obtained from the composition of the gas, 96% (in vol) methane, 2% (in vol) CO2. The composition in %vol was converted in % weight using density data of the different gases from tab 19.1, ecoinvent v2.2 report 17, part 19.
- electricity, medium voltage: 0.00219213, 0.000398875, 0.0092072, 0.0313362, 0.00676432, 0.0980756, 0.0140365, 0.0459892 kWh (8 entries); lognormal variance with pedigree 0.0421, pedigree (1,2,5,5,1)
  Model from industry expert
  EcoSpold01Location=CH
  Uncertainty: Model from industry expert

## Emissions to nature
- Hydrogen sulfide [air, urban air close to ground]: 4.0094e-9 kg; lognormal variance with pedigree 0.1732, pedigree (2,3,5,5,1)
  Emission rate from industry expert
  Uncertainty: Emission rate from industry expert
- Methane, non-fossil [air, urban air close to ground]: 0.00018125 kg; lognormal variance with pedigree 0.1732, pedigree (2,3,5,5,1)
  Emission rate from industry expert
  Uncertainty: Emission rate from industry expert
- Carbon dioxide, non-fossil [air, urban air close to ground]: 1.0376e-5 kg; lognormal variance with pedigree 0.1732, pedigree (2,3,5,5,1)
  Emission rate from industry expert
  Uncertainty: Emission rate from industry expert

## Extrapolations
none This dataset has been copied from an original dataset covering the geography CH. The uncertainty has been adjusted accordingly.

## Review by Arnaud Dauriat 2005-08-30
Passed.
