# operation, intermodal shipping container, 45-foot, high-cube

Dataset: EcoSpold 2, unit process
Geography: GLO
Time period: 2010-01-01 to 2019-12-31
Technology level: current
Classification: ISIC rev.4 ecoinvent: 2920:Manufacture of bodies (coachwork) for motor vehicles; manufacture of traile
Scenario: Business-as-Usual
System model: Allocation at the point of substitution
Generated by: Tereza Levova
Database: ecoinvent
isCopyrightProtected: true
accessRestrictedTo: 1

## General comment
This dataset represents operation of an intermodal shipping container. This datasets is expressed per 1kg of cargo being stored in the container for 1 day.
The emissions from a transport carying the container are reported in the transport dataset.

## Reference product
- operation, intermodal shipping container: 1 kg*day; CPC 65: Freight transport services; By-product classification allocatable product
  production volume 7.62e11 kg*day; = 1524*1000000000*0.05*10
    Calculated value.
    The total container cargo in 2008 was 1.3 billion tons (http://worldoceanreview.com/en/wor-1/transport/global-shipping/3/, accessed 20141027).
    The total container cargo in 2013 was 1.578 billion tons (http://www.statista.com/statistics/253987/international-seaborne-trade-carried-by-containers/, accessed 20141027).
    The global container cargo production volume is divided between different types of containers in following ratios (http://people.hofstra.edu/geotrans/eng/ch3en/conc3en/containerfleet.html);
    0.33 - 40-foot, high cube
    0.24 - 40-foot
    0.27 - 20-foot
    0.05 - 45-foot, high-cube
    0.06 - reefers
    0.05 - other types of containers
    It is estimated, that each kg transported spend 10 days in the reefer.
  property price 2.17458e-5 EUR2005
    Calculated based on inputs: The price of the product has been calculated as a sum of the values of the material and energy inputs for this product. This value is therefore a rough estimation. It may underestimate the real price since there are additional expenses when producing any product. These expences can include for example labour costs, treatment of waste materials and profit for the producer. Please consider carefully whether this level of data quality is acceptable for your application.

## Inputs from technosphere
- maintenance, intermodal shipping container, 45-foot, high-cube: 5.18816e-9 unit; = container_in; lognormal variance with pedigree 0.0186, pedigree (4,5,3,1,1)
  Calculated value. The amount of maintenance needed is the same as the amount of container infrastructure needed.
- intermodal shipping container, 45-foot, high-cube: 5.18816e-9 unit; name container_in; = 1/( lifetime_capacity_kg_day* utilization_rate); lognormal variance with pedigree 0.0186, pedigree (4,5,3,1,1)
  Calculated value.
  Standard 40-food, high-cube intermodal shipping container.
  External dimensions; length - 12.192 m, width - 2.438 m and height - 2.896 m.
  Interior dimensions: length - 12.000 m, width - 2.311 m and height - 2.2.650 m.
  Internal volume: 75.3 m3
  Maximum gross weight: 30.848 tons
  Empty weight: 3.9 tons
  Net load: 26.58 tons
  property maximum payload 27450 kg; name max_payload
  property lifetime capacity [kg*day] 7.24611e8 kg*day; name lifetime_capacity_kg_day; = (1.524E+12*0.05)/(32.9E6*0.05/ container_in_capacity_cargo)* lifetime*365*(1/0.7)
  property utilization rate 0.266; name utilization_rate; = 0.38*0.7
  property capacity, cargo 2 TEU; name container_in_capacity_cargo
  property lifetime 15 year; name lifetime
  note on lifetime capacity [kg*day]: Calculated value based on literature data. 1.52E+12 kg of cargo have been transported by different type of containers in the year 2012 (www.statista.com, accessed 20141110). 32.9 million TEU is the global capacity of all containers in operation (World Shipping Council, www.worldshipping.org, 20150203). Out of that; 27% are 20' containers 24% are 40' containers 33% are 40'HC containers 5% are 45'HC containers 50% is the utilization rate - weight, the container carry 50% (in kg) of what they could be able to carry
  note on utilization rate: Calculated value based on assumptions and literature values. The utilization rate in case of intermodal shipping containers covers several aspects; 1) How many days is the container actually being used? Based on literature (http://people.hofstra.edu/geotrans/eng/ch3en/conc3en/containerlifespan.html) and average container is 56% of its lifetime empty (not being used) and 6% of its lifetime in in repaire. Therefore it is being used only in 38% of its lifetime. 2) How much of the maximum payload is actually being transported? While the containers can carry around 26-29 ton (no matter of the container size) it does not mean, that they are actually carrying this maximum payload. It is estimated, that the container carries on average 70% of its maximum payload. The resulting utilization rate is 26.6%.

## Extrapolations
This dataset has been extrapolated from year 2014 to the year of the calculation (2019). The uncertainty has been adjusted accordingly.
