# treatment of waste wood, untreated, unsanitary landfill, wet infiltration class (500mm)

Dataset: EcoSpold 2, unit process
Geography: GLO
Time period: 2006-01-01 to 2019-12-31
Technology level: current
Classification: ISIC rev.4 ecoinvent: 3821:Treatment and disposal of non-hazardous waste
Synonyms: municipal waste landfill
Scenario: Business-as-Usual
System model: Allocation at the point of substitution
Share of production covered: 1 %
Generated by: Avraam Symeonidis
Database: ecoinvent
isCopyrightProtected: true
accessRestrictedTo: 1

## General comment
This dataset represents the activity of waste disposal of waste wood, untreated in a unsanitary landfill. Recommended use of this dataset: For untreated waste wood, which goes to disposal as part of managed communal waste mixture. // Waste composition (wet, in ppm): upper heating value 15.36 MJ/kg; lower heating value 13.99 MJ/kg; H2O 174080; O 372180; H 50163; C 401470; S 125.51; N 986.98; P 108.97; B 2.1107; Cl 330.95; Br n.a.; F 21.106; I n.a.; Ag n.a.; As 0.42213; Ba n.a.; Cd 0.20051; Co 0.086772; Cr 0.65782; Cu 4.1482; Hg 0.31976; Mn 53.118; Mo 0.8302; Ni 0.55581; Pb 27.868; Sb n.a.; Se n.a.; Sn n.a.; V n.a.; Zn 17.807; Be n.a.; Sc n.a.; Sr n.a.; Ti n.a.; Tl n.a.; W n.a.; Si n.a.; Fe 15.479; Ca 130.89; Al 6.3322; K 65.412; Mg 197.56; Na 14.071; . // Share of carbon in waste that is biogenic 100%. Share of metals in waste not oxidised and bulk-recyclable (exclude very small or thin parts) Iron: 0%; Alu: 0%; Copper: 0%. Overall degradability of waste during 100 years: 1.5%.

## Included activities start
from final waste deposition (without transports to the site)

## Included activities end
Waste-specific short-term emissions to air via landfill gas and landfill leachate. Waste-specific long-term emissions from landfill.

## Geography
Given name of landfill location is 'infiltration class 4 wet (2018)'. Landfill site with mean annual temperature (MAT) of 8 degC, mean annual precipitation (MAP) of 1100 mm/year, and net infiltration of 500 mm/year.
Climate adjustments result in an alpha t (temperature) for permafrost areas of 0.999. Total climate adjustments with alpha pt of 0.999.

## Technology
This is an inventory for an unsanitary, sub-controlled landfill for municipal solid waste. Ultimate average landfill height is 15 meters. Operation phase duration is 25 years.Percentage of landfill gas directly emitted is 100w%.
Leachate of the landfill is not treated. Based on average waste composition and climate data the end of carbonate phase is estimated to be reached 3382 years after waste deposition.

## Reference product
- waste wood, untreated: -1 kg; CPC 3928: Sawdust and wood waste and scrap; By-product classification Waste; pedigree (1,1,1,1,1)
  main reference product of this activity (supply of disposal service).
  Uncertainty: Uncertainty is not adjusted, as this is the refence product
  production volume 1 kg
    The amount of the annual production volume is a placeholder value. The contribution of this technology to the different local markets can be found in the markets themselves.
  property price 0 EUR2005
    Waste products are assigned a price of zero as they are assumed to require further treatment.
  property carbon content 0.48608
    carbon content on a dry matter basis (reserved; not for manual entry)
  properties: dry mass 0.82592 kg, calcium content 0.00015848, wet mass 1 kg, water content 0.21077, carbon content, non-fossil 0.48608, magnesium content 0.0002392, potassium content 7.9199e-5, sodium content 1.7037e-5, aluminium content 7.6668e-6, water in wet mass 0.17408 kg, heating value, gross 15.365 MJ, nickel content 6.7295e-7, chromium content 7.9647e-7, phosphorus content 0.00013193, nitrogen content 0.001195, oxygen content 0.45062, molybdenum content 1.0052e-6, chlorine content 0.0004007, copper content 5.0225e-6, arsenic content 5.111e-7, sulfur content 0.00015197, boron content 2.5556e-6, lead content 3.3741e-5, iron content 1.8741e-5, cobalt content 1.0506e-7, fluorine content 2.5555e-5, hydrogen content 0.060736, heating value, net 13.988 MJ, manganese content 6.4314e-5, zinc content 2.156e-5, cadmium content 2.4277e-7, mercury content 3.8716e-7, carbon allocation 0.401463 kg

## Inputs from technosphere
- excavation, skid-steer loader: 0.00031708 m3; lognormal variance with pedigree 0.082256, pedigree (1,1,3,1,1)
  application of daily cover.
  Uncertainty: Uncertainty calculated from uncertainty in base parameters.
- diesel, burned in building machine: 0.046738 MJ; lognormal variance with pedigree 0.082256, pedigree (1,1,3,1,1)
  for waste distribution and compaction.
  Uncertainty: Uncertainty calculated from uncertainty in base parameters.

## Emissions to nature
- Mercury [water, ground-]: 3.2817e-10 kg; lognormal variance with pedigree 0.59342, pedigree (1,1,3,1,1)
  burden from short-term leachate to groundwater in uncontrolled landfill in moist cimate.
  Uncertainty: Uncertainty calculated from unertainty of the waste composition of this waste, uncertainty in waste decomposition and short-term leaching in landfill
- Hydrogen fluoride [air, non-urban air or from high stacks]: 1.2605e-7 kg; lognormal variance with pedigree 0.40248, pedigree (1,1,3,1,1)
  burden from direct release or incineration of landfill biogas; or windblown leachate evaporite in arid climates.
  Uncertainty: Uncertainty calculated from unertainty of the waste composition of this waste, uncertainty in waste decomposition and short-term leaching in landfill
- Manganese [water, ground-]: 9.1146e-7 kg; lognormal variance with pedigree 0.33895, pedigree (1,1,3,1,1)
  (same comment as for Mercury)
- Nitrogen oxides [air, non-urban air or from high stacks]: 2.0281e-8 kg; lognormal variance with pedigree 0.31284, pedigree (1,1,3,1,1)
  burden from direct release or incineration of landfill biogas.
  Uncertainty: Uncertainty calculated from unertainty of the waste composition of this waste, uncertainty in waste decomposition and short-term leaching in landfill
- Copper, ion [water, ground-]: 3.0433e-10 kg; lognormal variance with pedigree 0.5971, pedigree (1,1,3,1,1)
  (same comment as for Mercury)
- Hydrogen chloride [air, non-urban air or from high stacks]: 1.7998e-7 kg; lognormal variance with pedigree 0.38673, pedigree (1,1,3,1,1)
  (same comment as for Hydrogen fluoride)
- Cobalt [water, ground-]: 4.1786e-10 kg; lognormal variance with pedigree 0.59575, pedigree (1,1,3,1,1)
  (same comment as for Mercury)
- Methane, non-fossil [air, non-urban air or from high stacks]: 0.0043565 kg; lognormal variance with pedigree 0.098996, pedigree (1,1,3,1,1)
  (same comment as for Nitrogen oxides)
- Chromium VI [water, ground-]: 1.1234e-10 kg; lognormal variance with pedigree 0.62907, pedigree (1,1,3,1,1)
  (same comment as for Mercury)
- Sulfur dioxide [air, non-urban air or from high stacks]: 2.454e-7 kg; lognormal variance with pedigree 0.39889, pedigree (1,1,3,1,1)
  (same comment as for Nitrogen oxides)
- Cadmium, ion [water, ground-]: 5.286e-10 kg; lognormal variance with pedigree 0.57808, pedigree (1,1,3,1,1)
  (same comment as for Mercury)
- Carbon dioxide, non-fossil [air, non-urban air or from high stacks]: 0.0094319 kg; lognormal variance with pedigree 0.002, pedigree (1,1,3,1,1)
  (same comment as for Nitrogen oxides)
- Arsenic, ion [water, ground-]: 1.136e-9 kg; lognormal variance with pedigree 0.55365, pedigree (1,1,3,1,1)
  (same comment as for Mercury)
- Occupation, dump site [natural resource, land]: 0.0023333 m2*year; lognormal variance with pedigree 0.082256, pedigree (1,1,3,1,1)
  for landfill operation phase and spontaneous renaturation.
  Uncertainty: Uncertainty calculated from uncertainty in base parameters.
- Fluoride [water, ground-]: 2.3231e-8 kg; lognormal variance with pedigree 0.45434, pedigree (1,1,3,1,1)
  (same comment as for Mercury)
- Sodium, ion [water, ground-, long-term]: 1.3199e-5 kg; lognormal variance with pedigree 0.30776, pedigree (1,1,3,1,1)
  Emissions from long-term leachate (>100a) directly from MSW landfill and indirectly via incineration of treatement sludge from leachate treatement.
  Uncertainty: Uncertainty calculated depending on waste input and uncertainty of long-term transfer coefficents in landfill.
- Chloride [water, ground-]: 1.2486e-5 kg; lognormal variance with pedigree 0.25651, pedigree (1,1,3,1,1)
  (same comment as for Mercury)
- Magnesium [water, ground-, long-term]: 0.00019573 kg; lognormal variance with pedigree 0.21987, pedigree (1,1,3,1,1)
  (same comment as for Sodium, ion)
- Boron [water, ground-]: 2.1278e-7 kg; lognormal variance with pedigree 0.39995, pedigree (1,1,3,1,1)
  (same comment as for Mercury)
- Potassium, ion [water, ground-, long-term]: 6.4695e-5 kg; lognormal variance with pedigree 0.25664, pedigree (1,1,3,1,1)
  (same comment as for Sodium, ion)
- Nitrate [water, ground-]: 1.4818e-6 kg; lognormal variance with pedigree 0.22255, pedigree (1,1,3,1,1)
  (same comment as for Mercury)
- Calcium, ion [water, ground-, long-term]: 0.00013063 kg; lognormal variance with pedigree 0.23355, pedigree (1,1,3,1,1)
  (same comment as for Sodium, ion)
- Phosphate [water, ground-]: 2.7975e-7 kg; lognormal variance with pedigree 0.40861, pedigree (1,1,3,1,1)
  (same comment as for Mercury)
- Aluminium [water, ground-, long-term]: 6.3274e-6 kg; lognormal variance with pedigree 0.33405, pedigree (1,1,3,1,1)
  (same comment as for Sodium, ion)
- Nitrite [water, ground-]: 7.6686e-7 kg; lognormal variance with pedigree 0.22255, pedigree (1,1,3,1,1)
  (same comment as for Mercury)
- Zinc, ion [water, ground-, long-term]: 1.7794e-5 kg; lognormal variance with pedigree 0.29988, pedigree (1,1,3,1,1)
  (same comment as for Sodium, ion)
- Nitrogen, organic bound [water, ground-]: 2.3029e-5 kg; lognormal variance with pedigree 0.22255, pedigree (1,1,3,1,1)
  (same comment as for Mercury)
- Lead [water, ground-, long-term]: 2.7865e-5 kg; lognormal variance with pedigree 0.28501, pedigree (1,1,3,1,1)
  (same comment as for Sodium, ion)
- Hydrogen sulfide [water, ground-]: 5.101e-8 kg; lognormal variance with pedigree 0.3437, pedigree (1,1,3,1,1)
  (same comment as for Mercury)
- Iron, ion [water, ground-, long-term]: 1.5475e-5 kg; lognormal variance with pedigree 0.30452, pedigree (1,1,3,1,1)
  (same comment as for Sodium, ion)
- Ammonium, ion [water, ground-]: 1.409e-5 kg; lognormal variance with pedigree 0.22255, pedigree (1,1,3,1,1)
  (same comment as for Mercury)
- Molybdenum [water, ground-, long-term]: 2.627e-7 kg; lognormal variance with pedigree 0.48308, pedigree (1,1,3,1,1)
  (same comment as for Sodium, ion)
- Sulfate [water, ground-]: 1.9568e-6 kg; lognormal variance with pedigree 0.3437, pedigree (1,1,3,1,1)
  (same comment as for Mercury)
- Nickel, ion [water, ground-, long-term]: 5.5532e-7 kg; lognormal variance with pedigree 0.41332, pedigree (1,1,3,1,1)
  (same comment as for Sodium, ion)
- Heat, waste [water, ground-, long-term]: 15.134 MJ; lognormal variance with pedigree 0.014755, pedigree (1,1,3,1,1)
  burden from long-term decomposition of waste (>100a).
  Uncertainty: Uncertainty calculated from unertainty of the waste composition of this waste, uncertainty in waste decomposition and short-term leaching in landfill
- Chromium VI [water, ground-, long-term]: 2.2598e-9 kg; lognormal variance with pedigree 2.4198, pedigree (1,1,3,1,1)
  (same comment as for Sodium, ion)
- TOC, Total Organic Carbon [water, ground-]: 0.00017519 kg; lognormal variance with pedigree 0.19811, pedigree (1,1,3,1,1)
  (same comment as for Mercury)
- Manganese [water, ground-, long-term]: 5.2207e-5 kg; lognormal variance with pedigree 0.26357, pedigree (1,1,3,1,1)
  (same comment as for Sodium, ion)
- BOD5, Biological Oxygen Demand [water, ground-]: 4.5362e-5 kg; lognormal variance with pedigree 0.19811, pedigree (1,1,3,1,1)
  (same comment as for Mercury)
- Mercury [water, ground-, long-term]: 3.193e-7 kg; lognormal variance with pedigree 0.43105, pedigree (1,1,3,1,1)
  (same comment as for Sodium, ion)
- DOC, Dissolved Organic Carbon [water, ground-]: 0.00017519 kg; lognormal variance with pedigree 0.19811, pedigree (1,1,3,1,1)
  (same comment as for Mercury)
- Copper, ion [water, ground-, long-term]: 4.1478e-6 kg; lognormal variance with pedigree 0.34796, pedigree (1,1,3,1,1)
  (same comment as for Sodium, ion)
- COD, Chemical Oxygen Demand [water, ground-]: 0.00019161 kg; lognormal variance with pedigree 0.19811, pedigree (1,1,3,1,1)
  (same comment as for Mercury)
- Cadmium, ion [water, ground-, long-term]: 1.9998e-7 kg; lognormal variance with pedigree 0.44594, pedigree (1,1,3,1,1)
  (same comment as for Sodium, ion)
- Sodium [air, non-urban air or from high stacks]: 2.1811e-10 kg; lognormal variance with pedigree 0.60821, pedigree (1,1,3,1,1)
  (same comment as for Hydrogen fluoride)
- Cobalt [water, ground-, long-term]: 8.6354e-8 kg; lognormal variance with pedigree 0.48245, pedigree (1,1,3,1,1)
  (same comment as for Sodium, ion)
- Heat, waste [soil, industrial]: 0.1327 MJ; lognormal variance with pedigree 0.079939, pedigree (1,1,3,1,1)
  burden from short-term decomposition of waste (0-100a).
  Uncertainty: Uncertainty calculated from unertainty of the waste composition of this waste, uncertainty in waste decomposition and short-term leaching in landfill
- Fluoride [water, ground-, long-term]: 2.0964e-5 kg; lognormal variance with pedigree 0.29424, pedigree (1,1,3,1,1)
  (same comment as for Sodium, ion)
- Magnesium [air, non-urban air or from high stacks]: 4.5662e-10 kg; lognormal variance with pedigree 0.58273, pedigree (1,1,3,1,1)
  (same comment as for Hydrogen fluoride)
- Chloride [water, ground-, long-term]: 0.00031829 kg; lognormal variance with pedigree 0.2028, pedigree (1,1,3,1,1)
  (same comment as for Sodium, ion)
- Potassium [air, non-urban air or from high stacks]: 1.7913e-10 kg; lognormal variance with pedigree 0.61398, pedigree (1,1,3,1,1)
  (same comment as for Hydrogen fluoride)
- Arsenic, ion [water, ground-, long-term]: 4.2098e-7 kg; lognormal variance with pedigree 0.42216, pedigree (1,1,3,1,1)
  (same comment as for Sodium, ion)
- Aluminium [air, non-urban air or from high stacks]: 1.1856e-12 kg; lognormal variance with pedigree 0.77756, pedigree (1,1,3,1,1)
  (same comment as for Hydrogen fluoride)
- Nitrate [water, ground-, long-term]: 4.0739e-5 kg; lognormal variance with pedigree 0.16686, pedigree (1,1,3,1,1)
  (same comment as for Sodium, ion)
- Calcium [air, non-urban air or from high stacks]: 6.3835e-11 kg; lognormal variance with pedigree 0.6466, pedigree (1,1,3,1,1)
  (same comment as for Hydrogen fluoride)
- Boron [water, ground-, long-term]: 1.8979e-6 kg; lognormal variance with pedigree 0.37025, pedigree (1,1,3,1,1)
  (same comment as for Sodium, ion)
- Lead [air, non-urban air or from high stacks]: 8.2002e-13 kg; lognormal variance with pedigree 0.78642, pedigree (1,1,3,1,1)
  (same comment as for Hydrogen fluoride)
- Phosphate [water, ground-, long-term]: 2.2436e-5 kg; lognormal variance with pedigree 0.69531, pedigree (1,1,3,1,1)
  (same comment as for Sodium, ion)
- Zinc [air, non-urban air or from high stacks]: 2.8085e-12 kg; lognormal variance with pedigree 0.74881, pedigree (1,1,3,1,1)
  (same comment as for Hydrogen fluoride)
- Magnesium [water, ground-]: 1.8265e-6 kg; lognormal variance with pedigree 0.31333, pedigree (1,1,3,1,1)
  (same comment as for Mercury)
- Nitrite [water, ground-, long-term]: 2.1084e-5 kg; lognormal variance with pedigree 0.16686, pedigree (1,1,3,1,1)
  (same comment as for Sodium, ion)
- Iron [air, non-urban air or from high stacks]: 7.9632e-13 kg; lognormal variance with pedigree 0.78859, pedigree (1,1,3,1,1)
  (same comment as for Hydrogen fluoride)
- Sodium, ion [water, ground-]: 8.7244e-7 kg; lognormal variance with pedigree 0.34885, pedigree (1,1,3,1,1)
  (same comment as for Mercury)
- Ammonium, ion [water, ground-, long-term]: 0.00038738 kg; lognormal variance with pedigree 0.16686, pedigree (1,1,3,1,1)
  (same comment as for Sodium, ion)
- Molybdenum [air, non-urban air or from high stacks]: 3.2792e-13 kg; lognormal variance with pedigree 0.82016, pedigree (1,1,3,1,1)
  (same comment as for Hydrogen fluoride)
- Potassium, ion [water, ground-]: 7.1651e-7 kg; lognormal variance with pedigree 0.34506, pedigree (1,1,3,1,1)
  (same comment as for Mercury)
- Nitrogen, organic bound [water, ground-, long-term]: 0.00063314 kg; lognormal variance with pedigree 0.16686, pedigree (1,1,3,1,1)
  (same comment as for Sodium, ion)
- Nickel [air, non-urban air or from high stacks]: 1.2103e-13 kg; lognormal variance with pedigree 0.85204, pedigree (1,1,3,1,1)
  (same comment as for Hydrogen fluoride)
- Calcium, ion [water, ground-]: 2.5534e-7 kg; lognormal variance with pedigree 0.37526, pedigree (1,1,3,1,1)
  (same comment as for Mercury)
- Hydrogen sulfide [water, ground-, long-term]: 9.0826e-6 kg; lognormal variance with pedigree 0.23495, pedigree (1,1,3,1,1)
  (same comment as for Sodium, ion)
- Manganese [air, non-urban air or from high stacks]: 2.2787e-10 kg; lognormal variance with pedigree 0.60627, pedigree (1,1,3,1,1)
  (same comment as for Hydrogen fluoride)
- Aluminium [water, ground-]: 4.7423e-9 kg; lognormal variance with pedigree 0.50666, pedigree (1,1,3,1,1)
  (same comment as for Mercury)
- Sulfate [water, ground-, long-term]: 0.00034843 kg; lognormal variance with pedigree 0.23495, pedigree (1,1,3,1,1)
  (same comment as for Sodium, ion)
- Mercury [air, non-urban air or from high stacks]: 1.3127e-10 kg; lognormal variance with pedigree 0.62333, pedigree (1,1,3,1,1)
  (same comment as for Hydrogen fluoride)
- Zinc, ion [water, ground-]: 1.2638e-8 kg; lognormal variance with pedigree 0.47424, pedigree (1,1,3,1,1)
  (same comment as for Mercury)
- DOC, Dissolved Organic Carbon [water, ground-, long-term]: 0.39545 kg; lognormal variance with pedigree 0.0078471, pedigree (1,1,3,1,1)
  (same comment as for Sodium, ion)
- Copper [air, non-urban air or from high stacks]: 8.6952e-14 kg; lognormal variance with pedigree 0.85983, pedigree (1,1,3,1,1)
  (same comment as for Hydrogen fluoride)
- Iron, ion [water, ground-]: 3.1853e-9 kg; lognormal variance with pedigree 0.51954, pedigree (1,1,3,1,1)
  (same comment as for Mercury)
- TOC, Total Organic Carbon [water, ground-, long-term]: 0.39545 kg; lognormal variance with pedigree 0.0078471, pedigree (1,1,3,1,1)
  (same comment as for Sodium, ion)
- Cobalt [air, non-urban air or from high stacks]: 1.0446e-13 kg; lognormal variance with pedigree 0.86645, pedigree (1,1,3,1,1)
  (same comment as for Hydrogen fluoride)
- Lead [water, ground-]: 2.4601e-9 kg; lognormal variance with pedigree 0.52803, pedigree (1,1,3,1,1)
  (same comment as for Mercury)
- COD, Chemical Oxygen Demand [water, ground-, long-term]: 0.43253 kg; lognormal variance with pedigree 0.0078471, pedigree (1,1,3,1,1)
  (same comment as for Sodium, ion)
- Cadmium [air, non-urban air or from high stacks]: 3.524e-12 kg; lognormal variance with pedigree 0.74233, pedigree (1,1,3,1,1)
  (same comment as for Hydrogen fluoride)
- Molybdenum [water, ground-]: 1.3117e-9 kg; lognormal variance with pedigree 0.54883, pedigree (1,1,3,1,1)
  (same comment as for Mercury)
- BOD5, Biological Oxygen Demand [water, ground-, long-term]: 0.10239 kg; lognormal variance with pedigree 0.0078471, pedigree (1,1,3,1,1)
  (same comment as for Sodium, ion)
- Chromium [air, non-urban air or from high stacks]: 2.8085e-14 kg; lognormal variance with pedigree 0.89776, pedigree (1,1,3,1,1)
  (same comment as for Hydrogen fluoride)
- Nickel, ion [water, ground-]: 4.8412e-10 kg; lognormal variance with pedigree 0.58101, pedigree (1,1,3,1,1)
  (same comment as for Mercury)
- Arsenic [air, non-urban air or from high stacks]: 1.5925e-11 kg; lognormal variance with pedigree 0.69331, pedigree (1,1,3,1,1)
  (same comment as for Hydrogen fluoride)

## Extrapolations
This dataset has been extrapolated from year 2012 to the year of the calculation (2019). The uncertainty has been adjusted accordingly.
