# heat production, hard coal coke, stove 5-15kW

Dataset: EcoSpold 2, unit process
Geography: RoW
Time period: 1988-01-01 to 2019-12-31
Technology level: current
Classification: EcoSpold01Categories: hard coal/heating systems
Classification: ISIC rev.4 ecoinvent: 3530:Steam and air conditioning supply
Tags: ConvertedDataset
Scenario: Business-as-Usual
System model: Allocation at the point of substitution
Generated by: Christian Bauer
Published in: Röder, A. 2004
Database: ecoinvent
isCopyrightProtected: true
accessRestrictedTo: 1

## General comment
The stove is assumed to fire coke. The heating value (28.6 MJ/kg) and the composition of the coke are average values available from the literature. The emission data are also taken from literature reporting measurements performed at the end of the 1980s in Germany. Size distribution of particles has been estimated on the basis of recent information from EPA. Emissions of trace elements were calculated using the ash content in the coal and average transfer coefficients for coal power plants with ash retention of 98 %, as first approximation.
[This dataset was already contained in the ecoinvent database version 2. It was not individually updated during the transfer to ecoinvent version 3. Life Cycle Impact Assessment results may still have changed, as they are affected by changes in the supply chain, i.e. in other datasets. This dataset was generated following the ecoinvent quality guidelines for version 2. It may have been subject to central changes described in the ecoinvent version 3 change report (http://www.ecoinvent.org/database/ecoinvent-version-3/reports-of-changes/), and the results of the central updates were reviewed extensively. The changes added e.g. consistent water flows and other information throughout the database. The documentation of this dataset can be found in the ecoinvent reports of version 2, which are still available via the ecoinvent website. The change report linked above covers all central changes that were made during the conversion process.]

## Included activities end
House heating. The module describes the combustion process and includes coal transport and ash disposal.

## Geography
German conditions.

## Technology
Average used in early 1990s.

## Reference product
- heat, central or small-scale, other than natural gas: 1 MJ; By-product classification allocatable product; CPC 17300: Steam and hot water
  EcoSpold01Location=RER
  production volume 1.02832e12 MJ; name heat_apv
    Assumption. This production volume does not represent a realistic value, but reflects the share of heat from coal sources on the market for heat, central or small-scale, other than natural gas.
    See talk pages for further discussion.
    A relation of 1:100 between the geographies RER and RoW was assumed.
    //Original comment //:
    IEA coal and Peat statistics for 2007 (http://www.iea.org/stats/coaldata.asp?COUNTRY_CODE=29), residential, commercial and agriculture. All coke in kg converted to MJ heat out by multiplying with 0.67 (conversion efficiency on a gross heating value basis) and dividing by 0.035 (kg/MJ gross heating value)
  property price 0.0106 EUR2005
    Average European district heat price from Ecoheatcool and Euroheat 2005-2006, Ecoheat Work package 1: The European heat market. Final report. 10.6 EUR/GJ i s the price of district heat. http://www.solarthermalworld.org/files/Ecoheatcool%20WP1%20Web.pdf?download
  properties: Corresponding fuel use 1.43 MJ

## Inputs from technosphere
- coal stove, 5-15kW: 8.2797e-7 unit; lognormal variance with pedigree 0.3532, pedigree (2,3,5,5,1)
  EcoSpold01Location=RER
  Infrastructure
  Uncertainty: infrastructure
- coke: 1.43 MJ; lognormal variance with pedigree 0.0601, pedigree (4,2,5,5,1)
  Fuel input
  EcoSpold01Location=RER
  Uncertainty: fuel input
  properties: water content 0.0638298, wet mass 0.034965 kg, dry mass 0.0328671 kg, carbon content, fossil 0.869149
  note on carbon content, fossil: 81.7% C and 6% water in wet mass (ecoinvent v2.1 report 6_VI Table 7.1)
- hard coal ash: -0.005863 kg; name hard_coal_ash; lognormal variance with pedigree 0.112, pedigree (5,1,5,5,1)
  EcoSpold01Location=PL
  Assumption: no reuse
  Uncertainty: assumption: no reuse
  production volume 6.02907e9 kg; = heat_apv*hard_coal_ash
    Calculated from the production volume of hard coal coke, burned in stove 5-15kW in proportion to the respective output amounts.
  property price 0 EUR2005; name hard_coal_ash_price_EUR2005
  properties: wet mass 1 kg, dry mass 1 kg

## Emissions to nature
- Propane [air, urban air close to ground]: 7.15e-7 kg; lognormal variance with pedigree 0.0932, pedigree (2,3,5,5,1)
  Total NMVOC and profile estimate
  Uncertainty: total NMVOC and profile estimate
- Ethane [air, urban air close to ground]: 1.0725e-6 kg; lognormal variance with pedigree 0.0932, pedigree (2,3,5,5,1)
  Total NMVOC and profile estimate
  Uncertainty: total NMVOC and profile estimate
- Toluene [air, urban air close to ground]: 7.15e-8 kg; lognormal variance with pedigree 0.0932, pedigree (2,3,5,5,1)
  Total NMVOC and profile estimate
  Uncertainty: total NMVOC and profile estimate
- Barium [air, urban air close to ground]: 1.287e-7 kg; lognormal variance with pedigree 0.728, pedigree (4,5,5,5,1)
  From trace element balance; see report for details
  Uncertainty: from trace element balance; see report for details
- Selenium [air, urban air close to ground]: 1.28414e-8 kg; lognormal variance with pedigree 0.728, pedigree (4,5,5,5,1)
  (same comment as for Barium)
- Manganese [air, urban air close to ground]: 4.5045e-8 kg; lognormal variance with pedigree 0.728, pedigree (4,5,5,5,1)
  (same comment as for Barium)
- Iron [air, urban air close to ground]: 6.3206e-6 kg; lognormal variance with pedigree 0.728, pedigree (4,5,5,5,1)
  (same comment as for Barium)
- Ethyne [air, urban air close to ground]: 3.575e-7 kg; lognormal variance with pedigree 0.0932, pedigree (2,3,5,5,1)
  Total NMVOC and profile estimate
  Uncertainty: total NMVOC and profile estimate
- Titanium [air, urban air close to ground]: 5.4197e-7 kg; lognormal variance with pedigree 0.728, pedigree (4,5,5,5,1)
  (same comment as for Barium)
- Sulfur dioxide [air, urban air close to ground]: 0.0006292 kg; lognormal variance with pedigree 0.078, pedigree (4,5,5,5,1)
  From S-balance
  Uncertainty: from S-balance
- Uranium-238 [air, urban air close to ground]: 1.43e-5 kBq; lognormal variance with pedigree 0.728, pedigree (4,5,5,5,1)
  From radioactivity of the elements; see report for details
  Uncertainty: from radioactivity of the elements; see report for details
- Potassium [air, urban air close to ground]: 1.8018e-6 kg; lognormal variance with pedigree 0.728, pedigree (4,5,5,5,1)
  (same comment as for Barium)
- Particulates, < 2.5 um [air, urban air close to ground]: 7.15e-6 kg; lognormal variance with pedigree 0.378, pedigree (4,5,5,5,1)
  Total PM and profile estimates
  Uncertainty: total PM and profile estimates
- Thallium [air, urban air close to ground]: 2.2594e-9 kg; lognormal variance with pedigree 0.728, pedigree (4,5,5,5,1)
  (same comment as for Barium)
- Dioxins, measured as 2,3,7,8-tetrachlorodibenzo-p-dioxin [air, urban air close to ground]: 7.15e-13 kg; lognormal variance with pedigree 0.3532, pedigree (2,3,5,5,1)
- Radium-226 [air, urban air close to ground]: 1.716e-5 kBq; lognormal variance with pedigree 0.728, pedigree (4,5,5,5,1)
  (same comment as for Uranium-238)
- Cadmium [air, urban air close to ground]: 2.2594e-9 kg; lognormal variance with pedigree 0.728, pedigree (4,5,5,5,1)
  (same comment as for Barium)
- NMVOC, non-methane volatile organic compounds, unspecified origin [air, urban air close to ground]: 1.0725e-6 kg; lognormal variance with pedigree 0.0932, pedigree (2,3,5,5,1)
  Total NMVOC and profile estimate
  Uncertainty: total NMVOC and profile estimate
- Methane, fossil [air, urban air close to ground]: 2.145e-5 kg; lognormal variance with pedigree 0.0932, pedigree (2,3,5,5,1)
  Typical value
  Uncertainty: typical value
- Uranium [air, urban air close to ground]: 2.574e-9 kg; lognormal variance with pedigree 0.728, pedigree (4,5,5,5,1)
  (same comment as for Barium)
- Beryllium [air, urban air close to ground]: 1.8018e-9 kg; lognormal variance with pedigree 0.728, pedigree (4,5,5,5,1)
  (same comment as for Barium)
- Ethene [air, urban air close to ground]: 2.145e-6 kg; lognormal variance with pedigree 0.0932, pedigree (2,3,5,5,1)
  Total NMVOC and profile estimate
  Uncertainty: total NMVOC and profile estimate
- Phenol [air, urban air close to ground]: 7.15e-8 kg; lognormal variance with pedigree 0.0932, pedigree (2,3,5,5,1)
  Total NMVOC and profile estimate
  Uncertainty: total NMVOC and profile estimate
- Chromium [air, urban air close to ground]: 1.27413e-8 kg; lognormal variance with pedigree 0.728, pedigree (4,5,5,5,1)
  (same comment as for Barium)
- Benzo(a)pyrene [air, urban air close to ground]: 1.43e-10 kg; lognormal variance with pedigree 0.0932, pedigree (2,3,5,5,1)
  Total NMVOC and profile estimate
  Uncertainty: total NMVOC and profile estimate
- Hydrogen fluoride [air, urban air close to ground]: 2.5311e-6 kg; lognormal variance with pedigree 0.118, pedigree (4,5,5,5,1)
  (same comment as for Barium)
- Tin [air, urban air close to ground]: 9.0376e-10 kg; lognormal variance with pedigree 0.728, pedigree (4,5,5,5,1)
  (same comment as for Barium)
- Particulates, > 10 um [air, urban air close to ground]: 5.005e-5 kg; lognormal variance with pedigree 0.118, pedigree (4,5,5,5,1)
  Total PM and profile estimates
  Uncertainty: total PM and profile estimates
- Nickel [air, urban air close to ground]: 4.2471e-8 kg; lognormal variance with pedigree 0.728, pedigree (4,5,5,5,1)
  (same comment as for Barium)
- Sodium [air, urban air close to ground]: 9.0376e-7 kg; lognormal variance with pedigree 0.728, pedigree (4,5,5,5,1)
  (same comment as for Barium)
- Lead-210 [air, urban air close to ground]: 6.6495e-5 kBq; lognormal variance with pedigree 0.728, pedigree (4,5,5,5,1)
  (same comment as for Uranium-238)
- Boron [air, urban air close to ground]: 8.008e-7 kg; lognormal variance with pedigree 0.728, pedigree (4,5,5,5,1)
  (same comment as for Barium)
- Molybdenum [air, urban air close to ground]: 3.861e-9 kg; lognormal variance with pedigree 0.728, pedigree (4,5,5,5,1)
  (same comment as for Barium)
- Thorium [air, urban air close to ground]: 2.0592e-9 kg; lognormal variance with pedigree 0.728, pedigree (4,5,5,5,1)
  (same comment as for Barium)
- Chromium VI [air, urban air close to ground]: 1.287e-10 kg; lognormal variance with pedigree 0.522, pedigree (1,1,5,5,1)
  based on range of data
- Bromine [air, urban air close to ground]: 1.35564e-8 kg; lognormal variance with pedigree 0.728, pedigree (4,5,5,5,1)
  (same comment as for Barium)
- Carbon monoxide, fossil [air, urban air close to ground]: 0.00715 kg; lognormal variance with pedigree 0.6932, pedigree (2,3,5,5,1)
  Typical value
  Uncertainty: typical value
- Vanadium [air, urban air close to ground]: 5.148e-8 kg; lognormal variance with pedigree 0.728, pedigree (4,5,5,5,1)
  (same comment as for Barium)
- Hydrocarbons, aliphatic, alkanes, unspecified [air, urban air close to ground]: 3.575e-7 kg; lognormal variance with pedigree 0.0932, pedigree (2,3,5,5,1)
  Total NMVOC and profile estimate
  Uncertainty: total NMVOC and profile estimate
- Calcium [air, urban air close to ground]: 1.8018e-6 kg; lognormal variance with pedigree 0.728, pedigree (4,5,5,5,1)
  (same comment as for Barium)
- Xylene [air, urban air close to ground]: 7.15e-8 kg; lognormal variance with pedigree 0.0932, pedigree (2,3,5,5,1)
  Total NMVOC and profile estimate
  Uncertainty: total NMVOC and profile estimate
- Carbon dioxide, fossil [air, urban air close to ground]: 0.13585 kg; lognormal variance with pedigree 0.0427, pedigree (2,2,5,5,1)
  From carbon balance
  Uncertainty: from carbon balance
- Cobalt [air, urban air close to ground]: 6.435e-9 kg; lognormal variance with pedigree 0.728, pedigree (4,5,5,5,1)
  (same comment as for Barium)
- Scandium [air, urban air close to ground]: 1.8018e-9 kg; lognormal variance with pedigree 0.728, pedigree (4,5,5,5,1)
  (same comment as for Barium)
- Thorium-232 [air, urban air close to ground]: 5.005e-6 kBq; lognormal variance with pedigree 0.728, pedigree (4,5,5,5,1)
  (same comment as for Uranium-238)
- Radon-222 [air, urban air close to ground]: 1.43e-6 kBq; lognormal variance with pedigree 0.728, pedigree (4,5,5,5,1)
  (same comment as for Uranium-238)
- Polonium-210 [air, urban air close to ground]: 0.00012155 kBq; lognormal variance with pedigree 0.728, pedigree (4,5,5,5,1)
  (same comment as for Uranium-238)
- Magnesium [air, urban air close to ground]: 5.4197e-6 kg; lognormal variance with pedigree 0.728, pedigree (4,5,5,5,1)
  (same comment as for Barium)
- Benzene [air, urban air close to ground]: 3.575e-7 kg; lognormal variance with pedigree 0.0932, pedigree (2,3,5,5,1)
  Total NMVOC and profile estimate
  Uncertainty: total NMVOC and profile estimate
- Zinc [air, urban air close to ground]: 2.2594e-7 kg; lognormal variance with pedigree 0.728, pedigree (4,5,5,5,1)
  (same comment as for Barium)
- Radium-228 [air, urban air close to ground]: 9.295e-5 kBq; lognormal variance with pedigree 0.728, pedigree (4,5,5,5,1)
  (same comment as for Uranium-238)
- Antimony [air, urban air close to ground]: 2.574e-9 kg; lognormal variance with pedigree 0.728, pedigree (4,5,5,5,1)
  (same comment as for Barium)
- Strontium [air, urban air close to ground]: 1.9305e-7 kg; lognormal variance with pedigree 0.728, pedigree (4,5,5,5,1)
  (same comment as for Barium)
- Copper [air, urban air close to ground]: 2.2165e-8 kg; lognormal variance with pedigree 0.728, pedigree (4,5,5,5,1)
  (same comment as for Barium)
- Potassium-40 [air, urban air close to ground]: 1.9305e-5 kBq; lognormal variance with pedigree 0.728, pedigree (4,5,5,5,1)
  (same comment as for Uranium-238)
- Lead [air, urban air close to ground]: 1.5444e-7 kg; lognormal variance with pedigree 0.728, pedigree (4,5,5,5,1)
  (same comment as for Barium)
- Mercury [air, urban air close to ground]: 4.8048e-9 kg; lognormal variance with pedigree 0.728, pedigree (4,5,5,5,1)
  (same comment as for Barium)
- Propene [air, urban air close to ground]: 3.575e-7 kg; lognormal variance with pedigree 0.0932, pedigree (2,3,5,5,1)
  Total NMVOC and profile estimate
  Uncertainty: total NMVOC and profile estimate
- Dinitrogen monoxide [air, urban air close to ground]: 2.145e-6 kg; lognormal variance with pedigree 0.0932, pedigree (2,3,5,5,1)
  Typical value
  Uncertainty: typical value
- Iodine [air, urban air close to ground]: 1.6302e-8 kg; lognormal variance with pedigree 0.728, pedigree (4,5,5,5,1)
  (same comment as for Barium)
- Hydrocarbons, aliphatic, unsaturated [air, urban air close to ground]: 3.575e-7 kg; lognormal variance with pedigree 0.0932, pedigree (2,3,5,5,1)
  Total NMVOC and profile estimate
  Uncertainty: total NMVOC and profile estimate
- Thorium-228 [air, urban air close to ground]: 7.865e-6 kBq; lognormal variance with pedigree 0.728, pedigree (4,5,5,5,1)
  (same comment as for Uranium-238)
- Hydrogen chloride [air, urban air close to ground]: 2.1736e-5 kg; lognormal variance with pedigree 0.118, pedigree (4,5,5,5,1)
  (same comment as for Barium)
- Aluminium [air, urban air close to ground]: 1.5301e-5 kg; lognormal variance with pedigree 0.728, pedigree (4,5,5,5,1)
  (same comment as for Barium)
- Radon-220 [air, urban air close to ground]: 1.43e-6 kBq; lognormal variance with pedigree 0.728, pedigree (4,5,5,5,1)
  (same comment as for Uranium-238)
- Nitrogen oxides [air, urban air close to ground]: 8.58e-5 kg; lognormal variance with pedigree 0.0932, pedigree (2,3,5,5,1)
  Typical value
  Uncertainty: typical value
- Silicon [air, urban air close to ground]: 2.2594e-5 kg; lognormal variance with pedigree 0.728, pedigree (4,5,5,5,1)
  (same comment as for Barium)
- Particulates, > 2.5 um, and < 10um [air, urban air close to ground]: 1.43e-5 kg; lognormal variance with pedigree 0.198, pedigree (4,5,5,5,1)
  Total PM and profile estimates
  Uncertainty: total PM and profile estimates
- Formaldehyde [air, urban air close to ground]: 1.43e-7 kg; lognormal variance with pedigree 0.0932, pedigree (2,3,5,5,1)
  Total NMVOC and profile estimate
  Uncertainty: total NMVOC and profile estimate
- Phosphorus [air, urban air close to ground]: 9.0376e-8 kg; lognormal variance with pedigree 0.728, pedigree (4,5,5,5,1)
  (same comment as for Barium)
- Hydrogen sulfide [air, urban air close to ground]: 1.43e-6 kg; lognormal variance with pedigree 0.0932, pedigree (2,3,5,5,1)
  Typical value
  Uncertainty: typical value
- Arsenic [air, urban air close to ground]: 3.8038e-8 kg; lognormal variance with pedigree 0.728, pedigree (4,5,5,5,1)
  (same comment as for Barium)

## Sampling procedure
literature

## Extrapolations
see Geography/Text This dataset has been copied from an original dataset covering the geography RER. The uncertainty has been adjusted accordingly.

## Review by Hans-Jörg Althaus 2005-07-19
passed
