# strontium sulfate quarry operation

Dataset: EcoSpold 2, unit process
Geography: GLO
Time period: 2012-01-01 to 2019-12-31
Technology level: current
Classification: EcoSpold01Categories: construction materials/additives
Classification: ISIC rev.4 ecoinvent: 0729:Mining of other non-ferrous metal ores
Synonyms: celestite; celestine
Scenario: Business-as-Usual
System model: Allocation at the point of substitution
Share of production covered: 100 %
Generated by: Catherine Reid
Published in: Kellenberger D. 2007
Database: ecoinvent
isCopyrightProtected: true
accessRestrictedTo: 1

## General comment
This dataset represents the production of celestite (strontium sulfate) used in the production of strontium carbonate. This dataset is a copy of the ecoinvent v3.01 dataset "limestone quarry operation, GLO 2002" used as proxy, Uncertainties have been adjusted accordinly and "Strontium, in ground" has been added as an exchange from the environment.
"This dataset represents the extraction of unprocessed limestone from a quarry.
Land-use for recultivation has been included; size partition of dust emissions adapted from bauxite mining. A capacity of about 380'000 tons of product per year was used to normalize the exchanges."Land-use for recultivation has been included; size partition of dust emissions adapted from bauxite mining. The value for the module are normalized using a capacity of about 380'000 tons of product per year." as cited in original dataset.

## Included activities start
"From the calcite, in ground" as cited in original dataset.

## Included activities end
"This activity ends with the unprocessed limestone, at the quarry gate.
This dataset includes blasting, all transports within the quarry (for extraction and recultivation), a part of the heating energy for "administration" buildings and the infrastructure. The land-use of the quarry is included, the land-use of the paved roads and buildings within the quarry are included in the module "limestone quarry construction".
The dataset doesn't include output of overburden material: neglected as it is only about 0.26% of mined limestone." as cited in original dataset.

## Geography
"data are only from one company in Switzerland (KFN), for some exchanges GLO-modules have been used as proxy" as cited in original dataset.

## Technology
"The company works on a technically high level; heavy machinery are operated electrically, building machines with diesel. Explosives used: Tovex at bottom and Amolith in shaft of drilled hole" as cited in original dataset.

## Time period
Arbitrary time period chosen for the proxy.

## Parameters
- fraction, process water, to air: 1 dimensionless; name fraction_PW_to_air; lognormal variance with pedigree 0.25, pedigree (5,5,5,5,5)
  Literature value (Statistics Canada, 2007 & Shaffer, K.H., 2008, Consumptive water use in the Great Lakes Basin, USGS) (Vionnet, S., Quantis Water Database - Technical Report, 2012).
  Uncertainty: No data collected. The uncertainty has been maximized.

## Reference product
- strontium sulfate, unprocessed: 1 kg; name RefProd; CPC 14290: Other non-ferrous metal ores and concentrates (other than uranium or thorium ores and concentrates); By-product classification allocatable product; CAS 7759-02-6
  production volume 3.8e8 kg
    Represents the world production of strontium minerals in 2012, source: http://minerals.usgs.gov/minerals/pubs/commodity/strontium/mcs-2013-stron.pdf.
  property price 0.1 EUR2005; name RefProd_price_EUR2005
    Expert judgement. Cross-reference: 0.000427 EUR/kg is calculated price based on inputs: The price of the product has been calculated as a sum of the values of the material and energy inputs for this product. This value is therefore a rough estimation. It may underestimate the real price since there are additional expenses when producing any product. These expences can include for example labour costs, treatment of waste materials and profit for the producer. Please consider carefully whether this level of data quality is acceptable for your application.
  property strontium content 0.477; name Sr_content
    Based on strontium sulfate stoichiometry (SrSO4), the value differs a little from the value (0.4388) found for celestite in http://minerals.usgs.gov/minerals/pubs/commodity/strontium/mcs-2013-stron.pdf.
  property carbon content 0
    carbon content on a dry matter basis (reserved; not for manual entry)
  properties: carbon content, non-fossil 0, carbon content, fossil 0, dry mass 1 kg, wet mass 1 kg, water in wet mass 0 kg, water content 0, carbon allocation 0 kg

## Inputs from technosphere
- recultivation, limestone mine: 6.52e-6 m2; lognormal variance with pedigree 0.33, pedigree (5,5,5,5,5)
  EcoSpold01Location=CH
  Uncertainty: No data collected. The uncertainty has been maximized.
- heat, central or small-scale, other than natural gas: 0.00055836 MJ; lognormal variance with pedigree 0.21, pedigree (5,5,5,5,5)
  As cited in original dataset.
  EcoSpold01Location=CH
  Uncertainty: No data collected. The uncertainty has been maximized.
- limestone quarry infrastructure: 5.25e-11 unit; lognormal variance with pedigree 0.51, pedigree (5,5,5,5,5)
  (same comment as for heat, central or small-scale, other than natural gas)
- blasting: 7.73e-5 kg; lognormal variance with pedigree 0.21, pedigree (5,5,5,5,5)
  EcoSpold01Location=RER
  As cited in original dataset.
  Uncertainty: No data collected. The uncertainty has been maximized.
- diesel, burned in building machine: 0.018 MJ; lognormal variance with pedigree 0.33, pedigree (5,5,5,5,5)
  As cited in original dataset.
  EcoSpold01Location=GLO
  Uncertainty: No data collected. The uncertainty has been maximized.

## Inputs from nature
- Transformation, to mineral extraction site [natural resource, land]: 6.52e-6 m2; lognormal variance with pedigree 0.33, pedigree (5,5,5,5,5)
  As cited in original dataset.
  Uncertainty: No data collected. The uncertainty has been maximized.
- Water, unspecified natural origin [natural resource, in water]: 2.14425e-5 m3; name water_in; source Marceau 2006; lognormal variance with pedigree 0.22, pedigree (5,5,5,5,5)
  Calculated based on literature, (Vionnet, S., Quantis Water Database - Technical Report, 2012). The water used for dust suppression is listed as process water. The evaporation rate is assumed to be 90%. It includes the process of water used for dust suppression in the mine; both off road and on road. The process boundaries are set by the boundaries of limestone mine. The process ends when the raw limestone leaves the mine for further processing. It is assumed that the evaporation rate of process water is 90%. Higher the temperatures are - more dust occurs, more water for suppression is needed, higher the evaporation rate is.
  Uncertainty: No data collected. The uncertainty has been maximized.
  property dry mass 0.1101 kg; name DM
  property wet mass 1000 kg; name WM
  property water content 9081.65; name water_content
  property water in wet mass 999.89 kg; name WWM
  property carbon content, fossil 0.0104329; name C_content_fossil
  property carbon content, non-fossil 0; name C_content_non_fossil
- Strontium, in ground [natural resource, in ground]: 0.477 kg; = RefProd * Sr_content; lognormal variance with pedigree 0.002, pedigree (1,1,3,1,1)
  Based on strontium content of reference product.
  Uncertainty: Calculated variable. Uncertainty will be determined from propagation of uncertainty factors of underlying variables. Uncertainty of actual relation between variables not accounted for at this time, although this could be included in a future update.
- Transformation, from forest, unspecified [natural resource, land]: 6.52e-6 m2; lognormal variance with pedigree 0.33, pedigree (5,5,5,5,5)
  (same comment as for Transformation, to mineral extraction site)
- Occupation, mineral extraction site [natural resource, land]: 8.48e-5 m2*year; lognormal variance with pedigree 0.25, pedigree (5,5,5,5,5)
  (same comment as for Transformation, to mineral extraction site)

## Emissions to nature
- Particulates, < 2.5 um [air, non-urban air or from high stacks]: 8e-6 kg; lognormal variance with pedigree 0.55, pedigree (5,5,5,5,5)
  (same comment as for Transformation, to mineral extraction site)
- Particulates, > 2.5 um, and < 10um [air, non-urban air or from high stacks]: 4e-5 kg; lognormal variance with pedigree 0.37, pedigree (5,5,5,5,5)
  (same comment as for Transformation, to mineral extraction site)
- Water [air, unspecified]: 2.14425e-5 m3; = (water_in*fraction_PW_to_air); lognormal variance with pedigree 0.002, pedigree (1,1,3,1,1)
  Calculated value based on literature values and expert opinion. See comments in the parametres' comment field.
  Uncertainty: Calculated variable. Uncertainty will be determined from propagation of uncertainty factors of underlying variables. Uncertainty of actual relation between variables not accounted for at this time, although this could be included in a future update.
- Particulates, > 10 um [air, non-urban air or from high stacks]: 0.000112 kg; lognormal variance with pedigree 0.29, pedigree (5,5,5,5,5)
  (same comment as for Transformation, to mineral extraction site)

## Sampling procedure
"survey" as cited in original dataset.

## Extrapolations
This dataset has been extrapolated from year 2012 to the year of the calculation (2019). The uncertainty has been adjusted accordingly.
