# heat production, light fuel oil, at boiler 10kW condensing, non-modulating

Dataset: EcoSpold 2, unit process
Geography: RoW
Time period: 1991-01-01 to 2019-12-31
Technology level: current
Classification: EcoSpold01Categories: oil/heating systems
Classification: ISIC rev.4 ecoinvent: 3530a: Steam and air conditioning supply based on liquid fuels
Tags: ConvertedDataset
Scenario: Business-as-Usual
System model: Allocation at the point of substitution
Generated by: Niels Jungbluth
Published in: Jungbluth, N. 2007
Database: ecoinvent
isCopyrightProtected: true
accessRestrictedTo: 1

## General comment
Inventory for the operation of a light fuel oil boiler. Data related to input.
[This dataset was already contained in the ecoinvent database version 2. It was not individually updated during the transfer to ecoinvent version 3. Life Cycle Impact Assessment results may still have changed, as they are affected by changes in the supply chain, i.e. in other datasets. This dataset was generated following the ecoinvent quality guidelines for version 2. It may have been subject to central changes described in the ecoinvent version 3 change report (http://www.ecoinvent.org/database/ecoinvent-version-3/reports-of-changes/), and the results of the central updates were reviewed extensively. The changes added e.g. consistent water flows and other information throughout the database. The documentation of this dataset can be found in the ecoinvent reports of version 2, which are still available via the ecoinvent website. The change report linked above covers all central changes that were made during the conversion process.]

## Included activities end
Direct air emissions from combustion, waste, effluents and electricity use.

## Geography
Assumption for operation in Switzerland.

## Technology
Non-modulating, condensing boiler sold in 2000.

## Time period
New data for regulated emissions like NOx, particles, other figures are partly based on older literature data.

## Reference product
- heat, central or small-scale, other than natural gas: 1 MJ; By-product classification allocatable product; CPC 17300: Steam and hot water
  EcoSpold01Location=CH
  production volume 2.91417e12 MJ; name heat_apv
    Assumption. The original value from the dataset was altered in order to model the correct shares of central or small-scale heat producing datasets on the market for heat, central or small-scale, other than natural gas. See talk pages for further discussion.
    //Original comment from global dataset//:
    Total heat from oil calculated from IEA Oil statistics for 2007 (http://www.iea.org/stats/oildata.asp?COUNTRY_CODE=29 ; residential, commercial and agriculture), using default IEA MJ/kg conversion factors, dividing the total evenly over 4 boiler types, multiplied by conversion efficiency of specific boiler type (1.0), all on a net heat value basis.
  property price 0.0106 EUR2005
    Average European district heat price from Ecoheatcool and Euroheat 2005-2006, Ecoheat Work package 1: The European heat market. Final report. 10.6 EUR/GJ i s the price of district heat. http://www.solarthermalworld.org/files/Ecoheatcool%20WP1%20Web.pdf?download
  property true value 0.0106
    allocation property applied in "true value" allocation // value calculated from revenue
  properties: Corresponding fuel use 1 MJ

## By-products
- heat, for reuse in municipal waste incineration only: 0 MJ; CPC 17300: Steam and hot water; By-product classification allocatable product; pedigree (1,1,1,1,1)
  Net electricity generated from this waste and used in internal MSWI plant energy redistribution.
  Uncertainty: uncertainty is calculated from uncertainties in waste composition and uncertainties in energy efficiency and the uncertainty in internal energy demand
  production volume 445627 MJ
  property exergy 0.1842 MJ; name E_th_prod_MSWI_exergy
    This exergy property is based on the exergy content of the product.
  property price 0.0106 EUR2005; name E_th_prod_MSWI_price_EUR2005
    (same comment as for heat, central or small-scale, other than natural gas)
  property true value relation 0.1842; name E_th_prod_MSWI_true_value_relation
    property to calculate "true value" from
  property true value 1.00588e-9
    allocation property applied in "true value" allocation // value calculated from true value relation
- electricity, for reuse in municipal waste incineration only: 0 kWh; CPC 17100: Electrical energy; By-product classification allocatable product; pedigree (1,1,1,1,1)
  (same comment as for heat, for reuse in municipal waste incineration only)
  production volume 62761.3 kWh
  property true value relation 3.6; name E_el_prod_MSWI_true_value_relation
    property to calculate "true value" from
  property price 0.1 EUR2005; name E_el_prod_MSWI_price_EUR2005
    Estimated to be the same price as in case of electricity, medium voltage.
  property exergy 3.6 MJ; name E_el_prod_MSWI_exergy
    This exergy property is based on the exergy content of the product.
  property true value 2.76871e-9
    (same comment as for heat, for reuse in municipal waste incineration only)

## Inputs from technosphere
- chimney: 1.3228e-6 m; lognormal variance with pedigree 0.3546, pedigree (3,3,5,5,1)
  Calculated
  EcoSpold01Location=CH
  Uncertainty: Calculated
- hazardous waste, for incineration: -4.15e-6 kg; name haz_waste; lognormal variance with pedigree 0.0546, pedigree (3,3,5,5,1)
  Literature
  EcoSpold01Location=CH
  Uncertainty: Literature
  production volume 1.20938e7 kg; = heat_apv*haz_waste
    Calculated from the production volume of light fuel oil, burned in boiler 10kW condensing, non-modulating in proportion to the respective output amounts.
  property price 0 EUR2005; name haz_waste_price_EUR2005
  properties: wet mass 1 kg, dry mass 0.75 kg, water content 0.333333, carbon content, fossil 0.554667
  note on carbon content, fossil: Tab A.6, ecoinvent v2.2 report 13_I. C content has been calculated after data in the tables, and then referred to 1 kg DM
- oil storage, 3000l: 4.4092e-7 unit; lognormal variance with pedigree 0.3546, pedigree (3,3,5,5,1)
  Calculated
  EcoSpold01Location=CH
  Uncertainty: Calculated
- electricity, low voltage: 0 kWh; pedigree (1,1,1,1,1)
  Literature
  EcoSpold01Location=CH
  Uncertainty: Literature
- condensate from light oil boiler: -9.8364e-6 m3; name condensate; lognormal variance with pedigree 0.3546, pedigree (3,3,5,5,1)
  EcoSpold01Location=CH
  Literature, basic uncertainity = 3
  Uncertainty: Literature, basic uncertainity = 3
  production volume 2.86649e7 m3; = heat_apv*condensate
    (same comment as for hazardous waste, for incineration)
  property price 0 EUR2005; name condensate_price_EUR2005
  properties: water content 2962.17, wet mass 1000 kg, carbon content, fossil 0.0740793, dry mass 0.337476 kg
  note on carbon content, fossil: 0.025 kg TOC/m3 (Tab A.18, ecoinvent v2.2 report 13_I). TOC was considered as Total Carbon.
- oil boiler, 10kW: 6.6138e-7 unit; lognormal variance with pedigree 0.3546, pedigree (3,3,5,5,1)
  Estimation 2100h use per year
  EcoSpold01Location=CH
  Uncertainty: Estimation 2100h use per year
- light fuel oil: 0 kg; pedigree (1,1,1,1,1)
  EcoSpold01Location=CH
  Literature
  Uncertainty: Literature
  properties: wet mass 1 kg, carbon content, fossil 0.862, dry mass 1 kg
- electricity, low voltage: 4.78189e-5, 8.38683e-6, 0.000137913, 0.00208565, 0.000343782, 0.00097925 kWh (6 entries); lognormal variance with pedigree 0.0446, pedigree (3,3,5,5,1)
  Literature
  EcoSpold01Location=CH
  Uncertainty: Literature
- light fuel oil: 0.000983054, 0.000141772, 0.00198404, 0.000131658, 0.000190768, 0.0199887 kg (6 entries); lognormal variance with pedigree 0.0446, pedigree (3,3,5,5,1)
  EcoSpold01Location=CH
  Literature
  Uncertainty: Literature

## Emissions to nature
- PAH, polycyclic aromatic hydrocarbons [air, urban air close to ground]: 4.6e-10 kg; lognormal variance with pedigree 0.3546, pedigree (3,3,5,5,1)
  Literature
  Uncertainty: Literature
- Methane, fossil [air, urban air close to ground]: 2e-7 kg; lognormal variance with pedigree 0.8546, pedigree (3,3,5,5,1)
  Literature, basic uncertainity estimated = 6
  Uncertainty: Literature, basic uncertainity estimated = 6
- Benzene [air, urban air close to ground]: 2e-8 kg; lognormal variance with pedigree 0.8546, pedigree (3,3,5,5,1)
  (same comment as for Methane, fossil)
- Zinc [air, urban air close to ground]: 5e-10 kg; lognormal variance with pedigree 0.6946, pedigree (3,3,5,5,1)
  Literature
  Uncertainty: Literature
- Ethane [air, urban air close to ground]: 2e-8 kg; lognormal variance with pedigree 0.8546, pedigree (3,3,5,5,1)
  (same comment as for Methane, fossil)
- Carbon dioxide, fossil [air, urban air close to ground]: 0.074 kg; lognormal variance with pedigree 0.0446, pedigree (3,3,5,5,1)
  Literature
  Uncertainty: Literature
- Acetaldehyde [air, urban air close to ground]: 2.05e-8 kg; lognormal variance with pedigree 0.8546, pedigree (3,3,5,5,1)
  (same comment as for Methane, fossil)
- Nitrogen oxides [air, urban air close to ground]: 2.75e-5 kg; lognormal variance with pedigree 0.112, pedigree (1,1,5,5,1)
  Deviation calculated
- Ethyne [air, urban air close to ground]: 1e-8 kg; lognormal variance with pedigree 0.8546, pedigree (3,3,5,5,1)
  (same comment as for Methane, fossil)
- Propanal [air, urban air close to ground]: 6e-9 kg; lognormal variance with pedigree 0.8546, pedigree (3,3,5,5,1)
  (same comment as for Methane, fossil)
- Butane [air, urban air close to ground]: 1.5e-7 kg; lognormal variance with pedigree 0.8546, pedigree (3,3,5,5,1)
  (same comment as for Methane, fossil)
- Carbon monoxide, fossil [air, urban air close to ground]: 9e-6 kg; lognormal variance with pedigree 0.932, pedigree (1,1,5,5,1)
  Deviation calculated
- Dioxins, measured as 2,3,7,8-tetrachlorodibenzo-p-dioxin [air, urban air close to ground]: 0 kg; pedigree (1,1,1,1,1)
  Literature
  Uncertainty: Literature
- Ethene [air, urban air close to ground]: 5e-8 kg; lognormal variance with pedigree 0.8546, pedigree (3,3,5,5,1)
  (same comment as for Methane, fossil)
- Particulates, < 2.5 um [air, urban air close to ground]: 5e-7 kg; lognormal variance with pedigree 0.3546, pedigree (3,3,5,5,1)
  Literature, basic uncertainty estimated = 3
  Uncertainty: Literature, basic uncertainty estimated = 3
- Hydrocarbons, aliphatic, alkanes, unspecified [air, urban air close to ground]: 2.5e-7 kg; lognormal variance with pedigree 0.8546, pedigree (3,3,5,5,1)
  (same comment as for Methane, fossil)
- Sulfur dioxide [air, urban air close to ground]: 4.5669e-5 kg; lognormal variance with pedigree 0.0446, pedigree (3,3,5,5,1)
  Calculated
  Uncertainty: Calculated
- Acrolein [air, urban air close to ground]: 1.15e-8 kg; lognormal variance with pedigree 0.8546, pedigree (3,3,5,5,1)
  (same comment as for Methane, fossil)
- Mercury [air, urban air close to ground]: 5e-10 kg; lognormal variance with pedigree 0.6946, pedigree (3,3,5,5,1)
  Literature
  Uncertainty: Literature
- Hydrocarbons, aromatic [air, urban air close to ground]: 2e-8 kg; lognormal variance with pedigree 0.8546, pedigree (3,3,5,5,1)
  (same comment as for Methane, fossil)
- Dinitrogen monoxide [air, urban air close to ground]: 7e-7 kg; lognormal variance with pedigree 0.5246, pedigree (3,3,5,5,1)
  Literature, basic uncertainty estimated = 4
  Uncertainty: Literature, basic uncertainty estimated = 4
- Hydrocarbons, aliphatic, unsaturated [air, urban air close to ground]: 2e-8 kg; lognormal variance with pedigree 0.8546, pedigree (3,3,5,5,1)
  (same comment as for Methane, fossil)
- Hydrogen fluoride [air, urban air close to ground]: 4.5e-9 kg; lognormal variance with pedigree 0.0946, pedigree (3,3,5,5,1)
  Literature
  Uncertainty: Literature
- Propene [air, urban air close to ground]: 2e-8 kg; lognormal variance with pedigree 0.8546, pedigree (3,3,5,5,1)
  (same comment as for Methane, fossil)
- Propane [air, urban air close to ground]: 3e-8 kg; lognormal variance with pedigree 0.8546, pedigree (3,3,5,5,1)
  (same comment as for Methane, fossil)
- Benzaldehyde [air, urban air close to ground]: 6e-9 kg; lognormal variance with pedigree 0.8546, pedigree (3,3,5,5,1)
  (same comment as for Methane, fossil)
- Acetone [air, urban air close to ground]: 5e-8 kg; lognormal variance with pedigree 0.8546, pedigree (3,3,5,5,1)
  (same comment as for Methane, fossil)
- Toluene [air, urban air close to ground]: 1e-8 kg; lognormal variance with pedigree 0.8546, pedigree (3,3,5,5,1)
  (same comment as for Methane, fossil)
- Formaldehyde [air, urban air close to ground]: 6e-9 kg; lognormal variance with pedigree 0.8546, pedigree (3,3,5,5,1)
  (same comment as for Methane, fossil)
- Copper [air, urban air close to ground]: 4e-10 kg; lognormal variance with pedigree 0.6946, pedigree (3,3,5,5,1)
  Literature
  Uncertainty: Literature
- Pentane [air, urban air close to ground]: 1e-7 kg; lognormal variance with pedigree 0.8546, pedigree (3,3,5,5,1)
  (same comment as for Methane, fossil)

## Sampling procedure
Data published in literature based on measurements.

## Extrapolations
Some information from other European countries has been used to determine the emission factors. This dataset has been copied from an original dataset covering the geography CH. The uncertainty has been adjusted accordingly.

## Review by Michael Spielmann (obsolete) 2006-02-16
passed
none
