# wood preservation, spray tunnel/deluging, water-based preservative, indoor use, occasionally wet

Dataset: EcoSpold 2, unit process
Geography: RoW
Time period: 2012-01-01 to 2019-12-31
Technology level: current
Classification: EcoSpold01Categories: wooden materials/refinement
Classification: ISIC rev.4 ecoinvent: 1610:Sawmilling and planing of wood
Synonyms: flow coating
Scenario: Business-as-Usual
System model: Allocation at the point of substitution
Generated by: trainee ecoinvent
Database: ecoinvent
isCopyrightProtected: true
accessRestrictedTo: 1

## General comment
This dataset covers the treatment of wood in automated spraying and deluging/flow coating equipments. The automated spraying and deluging/flow coating process is considered to be a surface treatment and not a deep penetration treatment.
Automated spraying is mostly applied at sawmills and carpentry shops, whereas deluging systems mainly operate in carpentry shops. Unlike all other industrial treatment processes, sawmill treatments aim to preserve wood in the short-term. Freshly cut wood is treated with fungicides to prevent the discoloration caused by blue stain forming fungi. This coloration depreciates the value of the wood.
Carpentry shops on the other hand fabricate wooden construction materials and treat them for long term protection against insects and fungi, e.g. by applying wood preservatives as primers before further surface treatment.
Despite some small differences in the operation and infrastructure, dipping/immersion applied by the two industrial sectors can be described by a generic "automated sparying/deluging" emission scenario (OECD 2000, p.29ff).
Automated spray/deluge systems consist of longitudinal or transversal boxes that apply a (sometimes diluted) preservative to the wood on a continuously moving convey or belt.
In the case of automated spraying,the sawn timber enters the spraying box that applies the preservative to the surface of the wood for a period of 3 - 5 seconds. The particle size of the spray is a critical parameter for the effectiveness of the treatment. Spray boxes are relatively contained. Splashguards surround the spraying boxes to eliminate any droplets of spray from the rest of the mill area. Droplets are large enough to prevent the respiration of preservative solution.
After the spray boxes, the treated wood is stacked or sorted and put into the yard for shipment off-site. At sawmills, the treated wood does not remain in storage for long time periods. Wood is generally shipped off-site to manufacturers within 2-3 days after treatment. Longer storage periods occur at carpentry shops (adapted from OECD 2000).
Deluging/flow coating is a comparable automated method of applying industrial liquid coatings that involves directing numerous individual streams of coating over one or multiple parts that move horizontally on a conveyor, e.g. during wood window manufacturing. Flow coating can be used to cover multi-dimensional surfaces of a variety of shapes. The run-off paint or wood preserverative is recollected and reused.
The following picture shows an installation for encapsulated automatic spraying as, e.g. used in sawmills:
The following picuture illustrate a deluging/flow coating installation as used in joineries for the impregnation of windows:
Application: 200 g/m2;
Characterisation of preservative: active agent: 0.45% iodopropinyl butylcarbamat, 0.075% Permethrin, 0.7% Tebocunazol; concentration for application: 100% v/v
Wood is not included in the dataset.
The process does not cause any waste water; preservatives from dripping or leaching during storage are recovered and recycled. Emissions into air and into surface water from run-off water are calculated based on emission factors (EF) as determined in OECD (2000, part 1), depending on the physical properties of the main componentes of the wood preservative. It is assumed in addition that all solvents (incl. water) are evaporated during drying and fixation. For acids and salts, no emissions into air are inventoried. The determination of emission factors is documented in the following table:
Automated spraying equipment and deluging installations differ in their layout. Given that the environmental impact of infrastructure in such processes is comparably small as compared to impacts from the production of the direct inputs and emissions, the infrastructure dataset for a deluging installation is used as a proxy for the technologies covered in this dataset.
Sources:
OECD (2000): Emission scenario document for wood preservatives, part 1. OECD series on emission scenario documents, number 2, Organisation for Economic Co-operation and Development, Paris.
Personal written communications of several producers and/or researchers (see source fields for each exchange)

## Included activities start
Service starting with the reception of the concentrated wood preservative at the factory gate

## Included activities end
The data set contains the treatment service of dried wood with a water-based wood preservative (primer) for use class 2 (indoor use, occasionally wet) in the automated spraying or deluging process. It covers the necessary inputs of the wood preservative, electricity as well as some infrastructure. For the inventorying of emissions into surface water and air, see general comment.The dataset does not include wood. Also eventual waste streams (e.g. saw dust recollected from the automated spraying or deluging equipment) are not included.

## Parameters
- efficiency of air filter: 0.75 dimensionless; name efficiency_air_filter
  According to EPA 1999 (p. 10.8-5) 'the result of one emission test on the incinerator-controlled facility indicated a VOC control efficiency of more than 99 percent'. Other emissions control devices such as knock-out tanks followed by a ventury scrubber are indicated to have a VOC control efficiency of 75% (same source).
- share of collected rainwater: 0.5 dimensionless; name share_collected_rainwater
  share of the rainwater that is colleced and lead into the sewer contrary to run-off water; default value according to OECD (2000, part 1)

## Reference product
- wood preservation, spray tunnel/deluging, water-based, indoor use, occasionally wet: 1 kg; By-product classification allocatable product; CPC 54730: Painting services
  Amount was scaled to 1.
  production volume 3.79668e8 kg; name p_preservation; = 3.65E09 * 0.5 *0.92 * 0.72 /3
    Using the GLO value of 3.65E09 kg preservative derived from Vlosky (2009), the distribution on water-based (92%), the 50% non-pressure methods, the German data of 28% dipping/immersions and 72% flow coating and the assumption of equal distribution over the 3 use classes, we obtain: 3.65E09 kg * 0.5 (non-pressure) *0.92 (water) * 0.72 (flow)/3 use classes = 4.03E7kg
  property price 1.82505 EUR2005
    Calculated based on inputs: The price of the product has been calculated as a sum of the values of the material and energy inputs for this product. This value is therefore a rough estimation. It may underestimate the real price since there are additional expenses when producing any product. These expences can include for example labour costs, treatment of waste materials and profit for the producer. Please consider carefully whether this level of data quality is acceptable for your application.

## Inputs from technosphere
- wood preservation facility, flow coating equipment: 4.35388e-6 unit; = 1/((160*(2*(0.04+0.05)*2*(1.3+1.6))*0.25)*220*25); source Uhlemann T. 2012; lognormal variance with pedigree 0.572, pedigree (4,4,3,5,3)
  160 window frames (1300 mm x 1650 mm; circumference of profile: 4 x 5 cm) per day, 220 days a year of 25 years
  Amount was scaled to the amount of reference product.
- electricity, medium voltage: 0 kWh; source Uhlemann T. 2012; pedigree (1,1,1,1,1)
  Hourly electricity consumption: 1.1 kW at a load factor of 0.5 (range: 0.2 - 0.8) for nossel stock plus 7 kWh/m3 for 3 m3 of pressurised air consumption/5 hours a day; coated area: 160/5 standardised windows (see comment field on wood preservation facility for surface calculation) at 0.25 kg preservative per m2.
  Amount was scaled to the amount of reference product.
- wood preservative, water-based, indoor use, occasionally wet: 1 kg; name preservative_concentration; lognormal variance with pedigree 0.004, pedigree (1,1,3,5,1)
  Amount was scaled to the amount of reference product.
- electricity, medium voltage: 0.00744505, 0.00135468, 0.0229734, 0.33309, 0.0476715, 0.156191 kWh (6 entries); source Uhlemann T. 2012; lognormal variance with pedigree 0.016, pedigree (1,4,3,5,1)
  (same comment as for electricity, medium voltage)

## Emissions to nature
- Carbon dioxide, fossil [air, non-urban air or from high stacks]: 0.0585641 kg; = (0.00075* preservative_concentration*0.002* C_content_fossil_Permethrin+0.02375* preservative_concentration*0.97* C_content_fossil_Diethylene_glycol+0.007* preservative_concentration*0.002*C_content_fossil_Tebuconazole+0.0045* preservative_concentration*0.021* C_content_fossil_IPBC +0.0065* preservative_concentration*0.97* C_content_fossil_Ethylene_glocol_MET +0.001* preservative_concentration*0.97* C_content_fossil_Methyl_ethyl_ketone +0.0001* preservative_concentration*0.251* C_content_fossil_HC_aromatic +((0.0251-0.01225)+0.0035)* preservative_concentration*0.97* C_content_fossil_NMVOC +0.005*preservative_concentration*0.011* C_content_fossil_Monoethanolamine)*efficiency_air_filter/12*44; lognormal variance with pedigree 0.044, pedigree (5,1,3,5,1)
  assuming that all C retained in the filter is finally converted to CO2, irrespective of the filter technology
  Amount was scaled to the amount of reference product.
  property carbon content, fossil 0.272727; name C_content_fossil
- Permethrin [air, non-urban air or from high stacks]: 3.75e-7 kg; = (1-efficiency_air_filter)*0.00075* preservative_concentration*0.002; source OECD 2000; lognormal variance with pedigree 0.172, pedigree (3,5,5,5,1)
  scenario according to (OECD 2000, p. 29ff)
  Amount was scaled to the amount of reference product.
  property carbon content, fossil 0.644027; name C_content_fossil_Permethrin
- Permethrin [water, unspecified]: 1.125e-5 kg; = (1-share_collected_rainwater)*0.00075* preservative_concentration*0.03; source OECD 2000; lognormal variance with pedigree 0.352, pedigree (3,5,5,5,1)
  (same comment as for Permethrin)
- Monoethanolamine [air, non-urban air or from high stacks]: 1.375e-5 kg; = (1-efficiency_air_filter)*0.005*preservative_concentration*0.011; source OECD 2000; lognormal variance with pedigree 0.172, pedigree (3,5,5,5,1)
  scenario according to (OECD 2000, p. 29ff.); proxy for other aminio alcohol
  Amount was scaled to the amount of reference product.
  property carbon content, fossil 0.393264; name C_content_fossil_Monoethanolamine
- Carbon dioxide, non-fossil [air, non-urban air or from high stacks]: 0.0186241 kg; = ((0.0251-0.01225)+0.0035)* preservative_concentration*0.97* C_content_non_fossil_NMVOC*efficiency_air_filter/12*44; lognormal variance with pedigree 0.044, pedigree (5,1,3,5,1)
  (same comment as for Carbon dioxide, fossil)
- Diethylene glycol [air, non-urban air or from high stacks]: 0.00575937 kg; = (1-efficiency_air_filter)*0.02375* preservative_concentration*0.97; source OECD 2000; lognormal variance with pedigree 0.172, pedigree (3,5,5,5,1)
  scenario according to (OECD 2000, p. 29ff); proxy for comparable glycol
  Amount was scaled to the amount of reference product.
  property carbon content, fossil 0.452726; name C_content_fossil_Diethylene_glycol
- Butylcarbamate, iodopropynyl [water, surface water]: 6.75e-5 kg; = (1-share_collected_rainwater)*0.0045* preservative_concentration*0.03; source OECD 2000; lognormal variance with pedigree 0.352, pedigree (3,5,5,5,1)
  (same comment as for Permethrin)
- Water [air, unspecified]: 0.00052 m3; = 0.52/1000; lognormal variance with pedigree 0.0045, pedigree (1,1,3,1,1)
  tap water plus water in preservative
- Diethylene glycol [water, surface water]: 0.00035625 kg; = (1-share_collected_rainwater)*0.02375* preservative_concentration*0.03; source OECD 2000; lognormal variance with pedigree 0.352, pedigree (3,5,5,5,1)
  (same comment as for Diethylene glycol)
- Ethylene glycol monoethyl ether [water, surface water]: 9.75e-5 kg; = (1-share_collected_rainwater)*0.0065* preservative_concentration*0.03; source OECD 2000; lognormal variance with pedigree 0.352, pedigree (3,5,5,5,1)
  scenario according to (OECD 2000, p. 29ff); proxy for comparable glycol ether
  Amount was scaled to the amount of reference product.
- Hydrocarbons, aromatic [water, surface water]: 1.5e-6 kg; = (1-share_collected_rainwater)*0.0001* preservative_concentration*0.03; source OECD 2000; lognormal variance with pedigree 0.352, pedigree (3,5,5,5,1)
  scenario according to (OECD 2000, p. 29ff); proxy
  Amount was scaled to the amount of reference product.
- Tebuconazole [water, surface water]: 0.000105 kg; = (1-share_collected_rainwater)*0.007* preservative_concentration*0.03; source OECD 2000; lognormal variance with pedigree 0.352, pedigree (3,5,5,5,1)
  (same comment as for Permethrin)
- Ethylene glycol monoethyl ether [air, non-urban air or from high stacks]: 0.00157625 kg; = (1-efficiency_air_filter)*0.0065* preservative_concentration*0.97; source OECD 2000; lognormal variance with pedigree 0.172, pedigree (3,5,5,5,1)
  (same comment as for Ethylene glycol monoethyl ether)
  property carbon content, fossil 0.533098; name C_content_fossil_Ethylene_glocol_MET
- NMVOC, non-methane volatile organic compounds, unspecified origin [air, non-urban air or from high stacks]: 0.00396487 kg; = (1-efficiency_air_filter)*((0.0251-0.01225)+0.0035)* preservative_concentration*0.97; source OECD 2000; lognormal variance with pedigree 0.172, pedigree (3,5,5,5,1)
  scenario according to (OECD 2000. p. 29ff); proxy for naphta
  Amount was scaled to the amount of reference product.
  property carbon content, fossil 0.427024; name C_content_fossil_NMVOC
  property carbon content, non-fossil 0.427024; name C_content_non_fossil_NMVOC
- Tebuconazole [air, non-urban air or from high stacks]: 3.5e-6 kg; = (1-efficiency_air_filter)*0.007* preservative_concentration*0.002; source OECD 2000; lognormal variance with pedigree 0.172, pedigree (3,5,5,5,1)
  (same comment as for Permethrin)
  property carbon content, fossil 0.624307; name C_content_fossil_Tebuconazole
- Methyl ethyl ketone [air, non-urban air or from high stacks]: 0.0002425 kg; = (1-efficiency_air_filter)*0.001* preservative_concentration*0.97; source OECD 2000; lognormal variance with pedigree 0.172, pedigree (3,5,5,5,1)
  scenario according to (OECD 2000, p. 29ff); proxy for similar ketone
  Amount was scaled to the amount of reference product.
  property carbon content, fossil 0.666288; name C_content_fossil_Methyl_ethyl_ketone
- Hydrocarbons, unspecified [water, surface water]: 0.00024525 kg; = (1-share_collected_rainwater)*((0.0251-0.01225)+0.0035)* preservative_concentration*0.03; source OECD 2000; lognormal variance with pedigree 0.352, pedigree (3,5,5,5,1)
  (same comment as for Hydrocarbons, aromatic)
- Methyl ethyl ketone [water, surface water]: 1.5e-5 kg; = (1-share_collected_rainwater)*0.001* preservative_concentration*0.03; source OECD 2000; lognormal variance with pedigree 0.352, pedigree (3,5,5,5,1)
  (same comment as for Methyl ethyl ketone)
- Monoethanolamine [water, unspecified]: 7.5e-5 kg; = (1-share_collected_rainwater)*0.005*preservative_concentration*0.03; source OECD 2000; lognormal variance with pedigree 0.352, pedigree (3,5,5,5,1)
  (same comment as for Monoethanolamine)
- Butylcarbamate, iodopropynyl [air, non-urban air or from high stacks]: 2.3625e-5 kg; = (1-efficiency_air_filter)*0.0045* preservative_concentration*0.021; source OECD 2000; lognormal variance with pedigree 0.172, pedigree (3,5,5,5,1)
  (same comment as for Permethrin)
  property carbon content, fossil 0.341527; name C_content_fossil_IPBC
- Hydrocarbons, aromatic [air, non-urban air or from high stacks]: 6.275e-6 kg; = (1-efficiency_air_filter)*0.0001* preservative_concentration*0.251; source OECD 2000; lognormal variance with pedigree 0.172, pedigree (3,5,5,5,1)
  (same comment as for Hydrocarbons, aromatic)
  property carbon content, fossil 0.911297; name C_content_fossil_HC_aromatic

## Sampling procedure
Plant measurements for input of energy, water, etc. Estimates based on literature for air-borne emissions and emissions into water.

## Extrapolations
Calculated as weighted average of existing local data

## Review by Emilia Moreno Ruiz 2015-10-07
amounts of exchanges corrected
