# nickel mine operation, sulfidic ore

Dataset: EcoSpold 2, unit process
Geography: GLO
Time period: 1994-01-01 to 2019-12-31
Technology level: current
Classification: ISIC rev.4 ecoinvent: 2420:Manufacture of basic precious and other non-ferrous metals
Tags: ConvertedDataset
Scenario: Business-as-Usual
System model: Allocation at the point of substitution
Share of production covered: 100 %
Generated by: [System]
Published in: Althaus H.-J. 2004
Database: ecoinvent
isCopyrightProtected: true
accessRestrictedTo: 1

## General comment
This dataset represents the joint production of 1 kg of nickel, 99.5% and 0.515 kg of copper, in 1994, the former being the reference product. The dataset is designed for the use of the metal as intermediate product or as raw material in the plating industry or the manufacturing of stainless steels and alloys. It is not to be used if the impact of the nickel, 99.5% is considered to be high. In such cases, a more detailed analysis depending on scope and allocation procedures has to be conducted.

## Included activities start
Mining process starting from nickel ore, in ground.

## Included activities end
This activity ends with a world-share representative mix of refining steps (such as carbonyl refining, electrowinning, and reduction with hydrogen), at the factory. The dataset includes the underground mining of the ore, the transfering of the ore to the beneficiation facility, the grounding of the ore, the gravity concentration of the ore, the flotation step, and a world-share representative mix of pyrometallurgical steps (roasting, smelting and converting) and hydrometallurgical steps. The dataset does not include the handling of tailings and overburden, nor the ammoniac and triisooctylamine consumption in copper separation by leaching step, nor the chlorine consumption and emissions in the electrolysis step.

## Geography
This module represents a global production mix. Some processes like blasting, lime and energy production and transport originate from data sets valid for Switzerland or Europe.

## Technology
Mining is done underground, followed by beneficiation trough flotation where considerable amounts of agents and lime are added. Overburden and tailings are disposed on the mining site and partly re-filled. This module covers the five major production routes, aggregated according to their market share in 1994. Sulphur dioxide in the off-gas is recovered producing sulphuric acid. For electricity mix a mix of 60% hydropower and 40% electricity at grid was chosen.
MINING:
95% of sulphidic nickel ores are mined underground in depths between 200m and 1800m, the ore is transferred to the beneficiation. Widening of the tunnels is mainly done by blasting. The overburden – material, which does not contain PGM-bearing ore – is deposed off-site and is partially refilled into the tunnels.
Emissions: The major emissions are due to mineral born pollutants in the effluents. The underground mining operations generate roughly 80 % of the dust emissions from open pit operations, since the major dust sources do not take place underground. Rain percolate through overburden and accounts to metal emissions to groundwater.
Waste: Overburden is deposed close to the mine. Acid rock drainage occurs over a long period of time.
BENEFICIATION:
After mining, the ore is first ground. In a next step it is subjected to gravity concentration to separate the metallic particles from the PGM-bearing minerals. After this first concentration step, flotation is carried out to remove the gangue from the sulphidic minerals. For neutralisation lime is added. In the flotation several organic chemicals are used as collector, frother, activator, depressor and flocculant. Sometimes cyanide is used as depressant for pyrite. Tailings usually are led to tailing heaps or ponds. As a result, nickel concentrates containing 7 - 25% Ni are produced.
Emissions: Ore handling and processing produce large amounts of dust, containing PM10 and several metals from the ore itself. Flotation produce effluents containing several organic agents used. Some of these chemicals evaporate and account for VOC emissions to air. Namely xanthates decompose hydrolytically to release carbon disulphide. Tailings effluent contains additional sulphuric acid from acid rock drainage.
Waste: Tailings are deposed as piles and in ponds. Acid rock drainage occurs over a long period of time.
METALLURGY AND REFINING:
There are many different process possibilities to win the metal. The chosen process depends on the composition of the ore, the local costs of energy carrier and the local legislation. Basically two different types can be distinguished: the hydrometallurgical and the pyrometallurgical process, which paired up with the refining processes, make up five major production routes (See Tab.1). All this routes are covered, aggregated according to their market share in 1994.

## Parameters
- fraction, process water, to air: 0.15 dimensionless; name fraction_PW_to_air; lognormal variance with pedigree 0.092025, pedigree (4,4,3,2,4)
  Literature value. In case when no industry/process specific data are available, default evaporation fraction value is used. This value is 15% and is based on literature (Statistics Canada, 2007 & Shaffer, K.H., 2008, Consumptive water use in the Great Lakes Basin, USGS & Shiklomanov, 2003, World Water Resources at the Beginning of the 21st Century) and has been approved by an expert.

## Reference product
- nickel, 99.5%: 0 kg; name RP_amount; source Hilbrans H. 1999; CPC 41422: Unwrought nickel; By-product classification allocatable product
  Class I Nickel is normally 99.7 % pure or better. Nickel is a silver-white metal. Factors that make nickel and its alloys commercially valuable commodities include strength, corrosion resistance, high ductility, good thermal and electrical conductivity, magnetic characteristics (below 340 °C) and catalytic properties. Nickel is not tarnished by air and is resistant to fluorine (F2) but is attacked by acids (except conc. HNO3). Class I nickel is marketed as cathodes, granules, powder, briquettes and rounds. Primary nickel metal powder is used in many applications including battery manufacture, coin production, welding products, fuel filters, brake linings, catalysts, cutting tools, paints, plastics, electronics, implants, and surface treatments by plasma spraying. Literature value.
  production volume 6.32e8 kg; name RP_PV
    547'684 t nickel in sulfidic raw ore in 1994 60% of global mine production 1500 million kg (http://minerals.usgs.gov/minerals/pubs/commodity/nickel/myb1-2006-nicke.xls table 10), minus the amount produced in platinum group metal mine operation in Russia (sulfidic ores)
  property price 10.4 EUR2005
    Temporary price data. Calculated as 90% of purchasers price based on: 2004 nickel price from USGS (2007) Mineral commodity summaries 2007. <http://minerals.usgs.gov/minerals/pubs/mcs/2007/mcs2007.pdf> [Accessed 25 May 2010]
  property carbon content 0
    carbon content on a dry matter basis (reserved; not for manual entry)
  property true value 10.4; name RP_amount_true_value
    allocation property applied in "true value" allocation // value calculated from revenue
  properties: water content 0, carbon content, fossil 0, wet mass 1 kg, carbon content, non-fossil 0, water in wet mass 0 kg, dry mass 1 kg, carbon allocation 0 kg
- sulfuric acid: 1 kg; name sulfuric_acid_amount; source Hilbrans H. 1999; CPC 34231: Chemical elements n.e.c.; inorganic acids except phosphoric, nitric and sulphonitric; inorganic oxygen compoun[…]; By-product classification allocatable product
  Estimated value: In the beneficiation step, For pH adjustment and leaching, the consumption value for sulphuric acid was considered with 3.74 kg / t ore mined. In the sulfuric acid production step, 11.3 kg of acid are generated per kg of Ni 99.5%. Further references: IPPC (2002) Integrated Pollution Prevention and Control (IPPC); Draft Reference Document on Best Available Techniques for Management of Tailings and Waste-Rock in Mining Activities. European Commission. Retrieved at 01.03.2003 from http://www.jrc.es/pub/english.cgi/0/733169
  production volume 6.98107e9 kg; = ABS(sulfuric_acid_amount/RP_amount)*RP_PV
    Calculated from production volume of reference product using the relative outputs.
  property price 0.031 EUR2005
    Temporary price data. Calculated as 90% of purchasers price based on: 2004 Import/Export data (total trades (USD) divided by total weight (kg) in EU27, USA, China, Japan and India) from UN Commodity Trade Statistics Database (http://data.un.org/Explorer.aspxDatabase [Accessed 2 July 2010]). Commodity: 'Sulphuric acid, oleum'
  property carbon content 0
    carbon content on a dry matter basis (reserved; not for manual entry)
  property true value 0.342426; name sulfuric_acid_amount_true_value
    allocation property applied in "true value" allocation // value calculated from revenue
  properties: wet mass 1 kg, water in wet mass 0 kg, dry mass 1 kg, carbon content, non-fossil 0, carbon content, fossil 0, water content 0, carbon allocation 0 kg

## By-products
- ammonium sulfate, as N: 0 kg; name ammonium_sulfate_amount; source Hilbrans H. 1999; CPC 34612: Ammonium sulphate; By-product classification allocatable product
  Literature value
  production volume 1.88968e8 kg; = ABS(ammonium_sulfate_amount/RP_amount)*RP_PV
    Calculated from production volume of reference product using the relative outputs.
  property price 0.38 EUR2005
    Prices are calculated on basis of Import/Export data (tonnes and US$) from UN Trade Statistics Database (http://data.un.org/Browse.aspx?d=ComTrade, accessed 7/7-2010). N, P2O5, or K2O content (http://www.fertilizer.org/ifa/Home-Page/STATISTICS/Conversions-factors)
  property carbon content 0
    carbon content on a dry matter basis (reserved; not for manual entry)
  property true value 0.11362; name ammonium_sulfate_amount_true_value
    allocation property applied in "true value" allocation // value calculated from revenue
  properties: carbon content, fossil 0, dry mass 1 kg, carbon content, non-fossil 0, water content 0, water in wet mass 0 kg, wet mass 1 kg, carbon allocation 0 kg
- copper concentrate, sulfide ore: 0 kg; name copper_conc_amount; = 0.515/0.61; source Hilbrans H. 1999; By-product classification allocatable product; CPC 14290: Other non-ferrous metal ores and concentrates (other than uranium or thorium ores and concentrates)
  Copper concentrate used as proxy for copper matte. The amount is calculated based on the amount of pure copper produced (0.515 kg, taken from the previous version of this dataset) and assuming that the copper content of the copper matte is 61% (European Copper Institute, 2018).
  Reference:
  European Copper Institute (2018). Copper matte. Retrieved from: https://copperalliance.eu/uploads/2019/04/20180131_copper-matte_csr-1-1-1-2-3-1.pdf (last accessed on the 2019-06-28).
  production volume 5.33574e8 kg; = ABS(copper_conc_amount/RP_amount)*RP_PV
    547'684 t nickel in sulfidic raw ore in 1994 Amount equal to nickel production from sulfidic ores. Source for this proportion: ecoinvent2
  property price 0.534 EUR2005; name copper_conc_amount_price_EUR2005
    Temporary price data. Calculated as 90% of purchasers price based on: Concentrate per kg Cu (3.15). Concentrate price per kg Cu 77% of refined Cu price (23% treatment and refining charges according to Barr G, Defreyne J, Jones D, Mean R (2005). On-site processing vs. sale of copper concentrates. Perth: CESL. http://www.cesl.com/DocumentViewer.aspx?elementId=152856&portalName=tc ). 2004 copper price from USGS (2007) Mineral commodity summaries 2007. <http://minerals.usgs.gov/minerals/pubs/mcs/2007/mcs2007.pdf> [Accessed 25 May 2010]
  property carbon content 0
    carbon content on a dry matter basis (reserved; not for manual entry)
  property true value 0.450836; name copper_conc_amount_true_value
    allocation property applied in "true value" allocation // value calculated from revenue
  properties: carbon content, non-fossil 0, silver content 0, wet mass 1 kg, water content 0, carbon content, fossil 0, zinc content 0, copper content 0, water in wet mass 0 kg, dry mass 1 kg, carbon allocation 0 kg

## Inputs from technosphere
- sulfidic tailings, from nickel mine operation: 0 kg; name sulfidic_tailings_amount; source Hilbrans H. 1999; pedigree (1,1,1,1,1)
  Calculated value.
  Uncertainty: r
  production volume 0 kg
    Calculated from the production volume of nickel, 99.5% in proportion to the respective output amounts.
  properties: sodium content 0.0014472, wet mass 1 kg, iron content 0.015374, aluminium content 0.014738, silicon content 0.053273, water content 0.428571, dry mass 0.7 kg, potassium content 0.0025181, oxygen content 0.89057, calcium content 0.0045972, magnesium content 0.0022359, carbon content, fossil 0.0087785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
- lime, packed: 0 kg; source Krauss U. 1999; pedigree (1,1,1,1,1)
  Modelled, based on “ISIC 2420” - pdf-document on the dedicated talk page of ecoinvent (www.ecoinvent.org/documentation) See part 'Regarding “nickel mine operation, sulfidic ore, GLO 2003” dataset'. Further references: Hilbrans H. and Hinrichs W. (1999) Stoffmengenflüsse und Energiebedarf bei der Gewinnung ausgewählter mineralischer Rohstoffe; Teilstudie Nickel. In: Geologisches Jahrbuch, Vol. Sonderhefte SH 7. Bundesanstalt für Geowissenschaften und Rohstoffe, Hannover. ISBN 3-510-95829-2.
  properties: dry mass 0.998 kg, wet mass 1 kg, carbon content, fossil 0.117492, water content 0.00200401
  note on carbon content, fossil: Table 3.1, ecoinvent v2.2 report 7, part VII, pg 3. MW CaCO3=100, MW MgCO3=84
- nickel smelter slag: -0.0301586 kg; name copper_slag_amount; source Hilbrans H. 1999; lognormal variance with pedigree 0.2861, pedigree (4,5,5,3,5)
  Calculated value: Value results from adding ammounts generated in the converter step (3.97E-01 kg ), in the smelting step (10.5 kg), in the electrolysis step (7.48E-02 kg), and in the carbonyl step (6.91E-06 kg). Proxy: 'nickel smelter slag, 0% water' is used as a proxy for airborne dust residues in the wet scrubber.
  production volume 6.952e9 kg; = ABS(copper_slag_amount/RP_amount)*RP_PV
    (same comment as for sulfidic tailings, from nickel mine operation)
  properties: wet mass 1 kg, carbon content, fossil 0.00345, dry mass 1 kg
- aluminium hydroxide factory: 2.53332e-12 unit; lognormal variance with pedigree 0.3601, pedigree (3,2,5,1,3)
  Estimation from dataset author. Proxy: 'aluminium hydroxide factory' is used as a proxy for the infrastructure of Nickel beneficiation.
- silica sand: 0.00603172 kg; source Hilbrans H. 1999; lognormal variance with pedigree 0.1102, pedigree (5,2,5,3,1)
  Modelled, based on “ISIC 2420” - pdf-document on the dedicated talk page of ecoinvent (www.ecoinvent.org/documentation) See part 'Regarding “nickel mine operation, sulfidic ore, GLO 2003” dataset'.
  properties: dry mass 0.99 kg, water content 0.010101, wet mass 1 kg
- ammonia, liquid: 0 kg; source Hilbrans H. 1999; pedigree (1,1,1,1,1)
  Literature value. Proxy: 'Ammonia, liquid' is used as a proxy for leaching agents.
  properties: dry mass 1 kg, wet mass 1 kg
- sand: 0 kg; source Hilbrans H. 1999; pedigree (1,1,1,1,1)
  Estimated value: In the mining step: Additional material, no excavation included.
  properties: dry mass 1 kg, wet mass 1 kg
- mine infrastructure, underground, non-ferrous metal: 1.50793e-11 unit; lognormal variance with pedigree 0.3601, pedigree (3,2,5,1,3)
  Estimation from dataset author.
- heat, district or industrial, natural gas: 0.040111 MJ; source Hilbrans H. 1999; lognormal variance with pedigree 0.0602, pedigree (3,2,5,3,3)
  (same comment as for silica sand)
- blasting: 0.000455121 kg; source Hilbrans H. 1999; lognormal variance with pedigree 0.0407, pedigree (2,2,5,1,1)
  Literature value.
- electricity, high voltage: 0.0240721 kWh; source Hilbrans H. 1999; lognormal variance with pedigree 0.0412, pedigree (2,3,5,1,1)
  (same comment as for silica sand)
- cement, alternative constituents 21-35%: 0 kg; source Hilbrans H. 1999; pedigree (1,1,1,1,1)
  Literature value.
  property water in wet mass 0 kg; name ceme_WWM
  property dry mass 1 kg; name ceme_DM
  property carbon content, fossil 0; name ceme_C_content_fossil
  property wet mass 1 kg; name ceme_WM
  property water content 0; name ceme_water_content
  property carbon content, non-fossil 0; name ceme_C_content_non_fossil
- heat, district or industrial, other than natural gas: 0.0787003 MJ; source Hilbrans H. 1999; lognormal variance with pedigree 0.0408, pedigree (2,2,5,3,1)
  (same comment as for silica sand)
  property corresponding fuel use, propane, furnace >100kW 0 MJ; name fuel_use
  note on corresponding fuel use, propane, furnace >100kW: Lower heating value of the fuel input related to the heat/electricity output, taken directly from ecoinvent v3.0 dataset 'heat production, natural gas, at industrial furnace >100kW, GLO 2000'.
- non-ferrous metal smelter: 1.26392e-13 unit; lognormal variance with pedigree 0.4301, pedigree (4,2,5,5,4)
  Estimation from dataset author: Including infrastructure for separation of copper.
- hydrogen, liquid: 0 kg; source Hilbrans H. 1999; pedigree (1,1,1,1,1)
  Literature value.
  properties: wet mass 1 kg, dry mass 1 kg
- conveyor belt: 1.15151e-8 m; lognormal variance with pedigree 0.0601, pedigree (3,2,5,1,3)
  Estimation from dataset author: 2000 m conveyor belts are assumed to have a capacity of 2000 t / h which gives 2E-5 m conveyor belt required per tonne mined raw ore.
- electricity, medium voltage: 0.00477055 kWh; source Hilbrans H. 1999; lognormal variance with pedigree 0.0412, pedigree (2,3,5,1,1)
  (same comment as for silica sand)
- diesel, burned in building machine: 0.030707 MJ; source Hilbrans H. 1999; lognormal variance with pedigree 0.0407, pedigree (2,2,5,1,1)
  Estimated value: Stands for the diesel consumption of the mobile equipment used for exploitation like drilling machines, scoop trams and underground trucks. Also, The infrastructure of the machines is included.
- chemical, inorganic: 0.000232221 kg; source IPPC 2002; lognormal variance with pedigree 0.16, pedigree (1,1,5,1,1)
  Literature value.
  properties: carbon content, fossil 0.003, wet mass 1 kg, dry mass 1 kg
  note on carbon content, fossil: This dataset is an unweighted average of 20 inorganic substances (listed in Tab 88.1, ecoinvent v2.2 report 8, part II), being part of the top100 chemicals included in this database. The C-content has also been calculated as an unweighted average of the C content of the substances composing this dataset.
- hydrogen cyanide: 0 kg; source IPPC 2002; pedigree (1,1,1,1,1)
  Estimated value: Sodium cyanide is produced on site.
  properties: dry mass 1 kg, wet mass 1 kg, carbon content, fossil 0.444444
- electricity, high voltage: 0.0112684 kWh; source Hilbrans H. 1999; lognormal variance with pedigree 0.0408, pedigree (2,2,5,3,1)
  (same comment as for silica sand)
- chemical, organic: 6.7994e-5 kg; source IPPC 2002; lognormal variance with pedigree 0.16, pedigree (1,1,5,1,1)
  Literature value.
  properties: dry mass 1 kg, carbon content, fossil 0.628, wet mass 1 kg
  note on carbon content, fossil: This dataset is an unweighted average of 20 organic substances (listed in Tab 88.1, ecoinvent v2.2 report 8, part II), being part of the top100 chemicals included in this database. The C-content has also been calculated as an unweighted average of the C content of the substances composing this dataset.
- sulfidic tailings, from nickel mine operation: -0.0243865, -0.100963, -0.115978, -0.0325671 kg (4 entries); source Hilbrans H. 1999; lognormal variance with pedigree 0.0408, pedigree (2,2,5,3,1)
  Calculated value.
  Uncertainty: r
  production volume 6.31368e10 kg
- lime, packed: 0.00203936, 5.19222e-5, 0.00407753 kg (3 entries); source Krauss U. 1999; lognormal variance with pedigree 0.1102, pedigree (5,2,5,3,1)
  (same comment as for lime, packed)
- ammonia, liquid: 2.35234e-5, 0.000205956 kg (2 entries); source Hilbrans H. 1999; lognormal variance with pedigree 0.0408, pedigree (2,2,5,3,1)
  Literature value. Proxy: 'Ammonia, liquid' is used as a proxy for leaching agents.
- sand: 9.82028e-6, 0.00189159, 2.26485e-5, 0.123097 kg (4 entries); source Hilbrans H. 1999; lognormal variance with pedigree 0.0407, pedigree (2,2,5,1,1)
  Estimated value: In the mining step: Additional material, no excavation included.
- cement, alternative constituents 21-35%: 0.00261158, 0.000480572, 1.98568e-5, 0.00681292 kg (4 entries); source Hilbrans H. 1999; lognormal variance with pedigree 0.0407, pedigree (2,2,5,1,1)
  Literature value.
  properties: dry mass 1 kg, wet mass 1 kg
- hydrogen, liquid: 2.24247e-6, 1.02596e-5 kg (2 entries); source Hilbrans H. 1999; lognormal variance with pedigree 0.1102, pedigree (5,2,5,3,1)
  Literature value.
- hydrogen cyanide: 3.2986e-6, 7.25692e-6 kg (2 entries); source IPPC 2002; lognormal variance with pedigree 0.16, pedigree (1,1,5,1,1)
  Estimated value: Sodium cyanide is produced on site.

## Inputs from nature
- Copper, in ground [natural resource, in ground]: 0.00177662 kg; source Hilbrans H. 1999; lognormal variance with pedigree 0.0407, pedigree (2,2,5,1,1)
  1.13% Cu in sulfide; 0.76% Cu and 0.76% Ni in ore; Literature value.
- Nickel, in ground [natural resource, in ground]: 0.00345453 kg; source Hilbrans H. 1999; lognormal variance with pedigree 0.0407, pedigree (2,2,5,1,1)
  1.13% Ni in sulfide; 0.76% Ni and 0.76% Cu in ore; Calculated value: 51 kg overburden and 110 kg crude ore per kg Class I Nickel mined (resulting in 97.2 kg tailings and 12.8 kg concentrate). 82% yield of mining beneficiation, 97% yield of metallurgy --> 79.5 overall yield.
- Water, river [natural resource, in water]: 0.000104733 m3; name water_river_input; source Hilbrans H. 1999; lognormal variance with pedigree 0.0407, pedigree (2,2,5,1,1)
  Estimated value: Because of the relative abundance of pumped ground water in the mining process, surface water is chosen here.
- Water, well, in ground [natural resource, in water]: 0.000603172 m3; name water_well_in_ground_input; source Hilbrans H. 1999; lognormal variance with pedigree 0.0407, pedigree (2,2,5,1,1)
  Calculated value.

## Emissions to nature
- Aluminium [water, surface water]: 5.20922e-8 kg; source IPPC 2002; lognormal variance with pedigree 1.37, pedigree (1,1,5,1,1)
  Modelled, based on 'ISIC 2420' - pdf-document on the dedicated talk page of ecoinvent (www.ecoinvent.org/documentation) See part 'Regarding 'nickel mine operation, sulfidic ore, GLO 2003' dataset'. Further references: Hilbrans H. and Hinrichs W. (1999) Stoffmengenflüsse und Energiebedarf bei der Gewinnung ausgewählter mineralischer Rohstoffe; Teilstudie Nickel. In: Geologisches Jahrbuch, Vol. Sonderhefte SH 7. Bundesanstalt für Geowissenschaften und Rohstoffe, Hannover. ISBN 3-510-95829-2.
- Nickel [air, non-urban air or from high stacks]: 1.45036e-6 kg; source NPI 2001; lognormal variance with pedigree 0.7101, pedigree (3,2,5,1,3)
  (same comment as for silica sand)
- Carbon dioxide, fossil [air, unspecified]: 0.00271976 kg; source IPPC 2002; lognormal variance with pedigree 0.1281, pedigree (4,2,5,1,4)
  Estimated value: Carbon dioxide from the calcination of lime added in several steps before is released at a rate of 0.44 t CO2 per tonne lime added.
  Uncertainty: e
- Arsenic [air, non-urban air or from high stacks]: 1.59841e-8 kg; source IPPC 2002; lognormal variance with pedigree 0.7101, pedigree (3,2,5,1,3)
  (same comment as for Aluminium)
- Water [water, unspecified]: 0.000601719 m3; name water_to_water_unspecified; = water_river_input*(1-fraction_PW_to_air)+water_well_in_ground_input*(1-fraction_PW_to_air); lognormal variance with pedigree 0.0807, pedigree (2,2,5,1,1)
  Calculated value based on literature values and expert opinion. See comments in the parametres' comment field.
  property dry mass 0 kg; name DM
  property carbon content, non-fossil 0; name C_content_non_fossil
  property fraction, origin: unspecified 0; name fraction_origin_unspecified_Ww
  property carbon content, fossil 0; name C_content_fossil
  property wet mass 1000 kg; name WM
  property water in wet mass 1000 kg; name WWM
  property fraction, origin: salt water 0; name fraction_origin_salt_water_Ww
  property fraction, origin: fresh water 1; name fraction_origin_fresh_water_Ww
- NMVOC, non-methane volatile organic compounds, unspecified origin [air, non-urban air or from high stacks]: 5.48339e-7 kg; source IPPC 2002; lognormal variance with pedigree 0.1001, pedigree (3,2,5,1,3)
  (same comment as for Aluminium)
- Magnesium [air, non-urban air or from high stacks]: 3.31745e-6 kg; source NPI 2001; lognormal variance with pedigree 0.1001, pedigree (3,2,5,1,3)
  (same comment as for Aluminium)
- Particulates, < 2.5 um [air, non-urban air or from high stacks]: 5.64789e-5 kg; source IPPC 2002; lognormal variance with pedigree 0.2501, pedigree (4,2,5,5,4)
  (same comment as for silica sand)
- Nickel, ion [water, surface water]: 1.54357e-8 kg; source IPPC 2002; lognormal variance with pedigree 1.37, pedigree (1,1,5,1,1)
  (same comment as for Aluminium)
- Zinc, ion [water, surface water]: 4.88021e-8 kg; source IPPC 2002; lognormal variance with pedigree 1.37, pedigree (1,1,5,1,1)
  (same comment as for Aluminium)
- Dioxins, measured as 2,3,7,8-tetrachlorodibenzo-p-dioxin [air, non-urban air or from high stacks]: 2.74169e-14 kg; source IPPC 2002; lognormal variance with pedigree 0.3601, pedigree (3,2,5,1,3)
  (same comment as for Aluminium)
- Silver [air, non-urban air or from high stacks]: 4.77055e-10 kg; source NPI 2001; lognormal variance with pedigree 0.1001, pedigree (3,2,5,1,3)
  (same comment as for silica sand)
- COD, Chemical Oxygen Demand [water, surface water]: 6.30589e-6 kg; source IPPC 2002; lognormal variance with pedigree 1.37, pedigree (1,1,5,1,1)
  (same comment as for Aluminium)
- Cyanide [water, surface water]: 1.12958e-6 kg; source IPPC 2002; lognormal variance with pedigree 0.1682, pedigree (4,2,5,3,4)
  Estimated value: 80% cyanide recovery is chosen for cyanide-abatement technology. With a reported use of 35 g NaCN per tonne ore mined; this means a direct emission of 3.75 g CN- per tonne ore mined. Further references: Anonymous (1998a) Cyanide Management. In: Best Practice Environmental Management in Mining. Environment Australia, Online-Version under: http://www.ea.gov.au/industry/sustainable/mining/booklets/cyanide/.
- Cadmium, ion [water, surface water]: 2.85136e-10 kg; source IPPC 2002; lognormal variance with pedigree 1.37, pedigree (1,1,5,1,1)
  (same comment as for Aluminium)
- Tin, ion [water, surface water]: 9.89751e-10 kg; source IPPC 2002; lognormal variance with pedigree 1.37, pedigree (1,1,5,1,1)
  (same comment as for Aluminium)
- Copper, ion [water, surface water]: 6.60748e-9 kg; source IPPC 2002; lognormal variance with pedigree 1.37, pedigree (1,1,5,1,1)
  (same comment as for Aluminium)
- Copper [air, non-urban air or from high stacks]: 1.22005e-6 kg; source NPI 2001; lognormal variance with pedigree 0.7101, pedigree (3,2,5,1,3)
  (same comment as for silica sand)
- Iron, ion [water, surface water]: 1.75468e-7 kg; source IPPC 2002; lognormal variance with pedigree 1.37, pedigree (1,1,5,1,1)
  (same comment as for Aluminium)
- Lead [air, non-urban air or from high stacks]: 9.65076e-8 kg; source NPI 2001; lognormal variance with pedigree 0.7101, pedigree (3,2,5,1,3)
  (same comment as for silica sand)
- TOC, Total Organic Carbon [water, surface water]: 2.4593e-6 kg; source IPPC 2002; lognormal variance with pedigree 1.37, pedigree (1,1,5,1,1)
  (same comment as for Aluminium)
- Nitrogen, organic bound [water, surface water]: 1.37359e-5 kg; source IPPC 2002; lognormal variance with pedigree 1.37, pedigree (1,1,5,1,1)
  (same comment as for Aluminium)
- Calcium [air, non-urban air or from high stacks]: 3.8932e-6 kg; source NPI 2001; lognormal variance with pedigree 0.1001, pedigree (3,2,5,1,3)
  (same comment as for Aluminium)
- Cobalt [water, surface water]: 4.71571e-10 kg; source IPPC 2002; lognormal variance with pedigree 1.37, pedigree (1,1,5,1,1)
  (same comment as for Aluminium)
- Particulates, > 2.5 um, and < 10um [air, non-urban air or from high stacks]: 4.98988e-5 kg; source IPPC 2002; lognormal variance with pedigree 0.5521, pedigree (3,2,5,1,5)
  (same comment as for silica sand)
- DOC, Dissolved Organic Carbon [water, surface water]: 2.4593e-6 kg; source IPPC 2002; lognormal variance with pedigree 1.37, pedigree (1,1,5,1,1)
  (same comment as for Aluminium)
- Dissolved solids [water, surface water]: 3.12553e-6 kg; source IPPC 2002; lognormal variance with pedigree 1.37, pedigree (1,1,5,1,1)
  (same comment as for Aluminium)
- Cobalt [air, non-urban air or from high stacks]: 3.34487e-6 kg; source NPI 2001; lognormal variance with pedigree 0.7101, pedigree (3,2,5,1,3)
  (same comment as for silica sand)
- Arsenic, ion [water, surface water]: 2.42914e-9 kg; source IPPC 2002; lognormal variance with pedigree 1.37, pedigree (1,1,5,1,1)
  (same comment as for Aluminium)
- Particulates, > 10 um [air, non-urban air or from high stacks]: 5.73014e-6 kg; source IPPC 2002; lognormal variance with pedigree 0.3721, pedigree (3,2,5,1,5)
  (same comment as for silica sand)
- BOD5, Biological Oxygen Demand [water, surface water]: 6.30589e-6 kg; source IPPC 2002; lognormal variance with pedigree 1.37, pedigree (1,1,5,1,1)
  (same comment as for Aluminium)
- Tin [air, non-urban air or from high stacks]: 1.79033e-8 kg; source IPPC 2002; lognormal variance with pedigree 0.7101, pedigree (3,2,5,1,3)
  (same comment as for Aluminium)
- Sulfur dioxide [air, non-urban air or from high stacks]: 0.00411254 kg; source INCO 2002; lognormal variance with pedigree 0.1401, pedigree (5,4,5,3,3)
  Modelled, based on “ISIC 2420” - pdf-document on the dedicated talk page of ecoinvent (www.ecoinvent.org/documentation) See part 'Regarding “nickel mine operation, sulfidic ore, GLO 2003” dataset'. Further references: IPPC (2002) Integrated Pollution Prevention and Control (IPPC); Draft Reference Document on Best Available Techniques for Management of Tailings and Waste-Rock in Mining Activities. European Commission. Retrieved at 01.03.2003 from http://www.jrc.es/pub/english.cgi/0/733169
- Aluminium [air, non-urban air or from high stacks]: 5.53822e-6 kg; source NPI 2001; lognormal variance with pedigree 0.1001, pedigree (3,2,5,1,3)
  (same comment as for silica sand)
- Calcium, ion [water, surface water]: 0.000412899 kg; source IPPC 2002; lognormal variance with pedigree 1.37, pedigree (1,1,5,1,1)
  (same comment as for Aluminium)
- Zinc [air, non-urban air or from high stacks]: 2.76911e-7 kg; source IPPC 2002; lognormal variance with pedigree 0.7101, pedigree (3,2,5,1,3)
  (same comment as for Aluminium)
- Manganese [water, surface water]: 1.48874e-8 kg; source IPPC 2002; lognormal variance with pedigree 1.37, pedigree (1,1,5,1,1)
  (same comment as for Aluminium)
- Sulfate [water, surface water]: 0.00142294 kg; source IPPC 2002; lognormal variance with pedigree 1.37, pedigree (1,1,5,1,1)
  (same comment as for Aluminium)
- Lead [water, surface water]: 2.2427e-9 kg; source IPPC 2002; lognormal variance with pedigree 1.37, pedigree (1,1,5,1,1)
  (same comment as for Aluminium)
- Carbon disulfide [air, non-urban air or from high stacks]: 3.01586e-5 kg; source NPI 2001; lognormal variance with pedigree 0.2501, pedigree (4,2,5,5,4)
  Estimated value: 0.53 kg carbondisulfide out of 1 kg xanthate through hydrolytical decomposition.
- Chromium, ion [water, surface water]: 1.3215e-9 kg; source IPPC 2002; lognormal variance with pedigree 1.37, pedigree (1,1,5,1,1)
  (same comment as for Aluminium)
- Mercury [water, surface water]: 3.26261e-11 kg; source IPPC 2002; lognormal variance with pedigree 1.37, pedigree (1,1,5,1,1)
  (same comment as for Aluminium)
- Water [air, unspecified]: 0.000106186 m3; name water_to_air_unspecified; = (water_river_input*fraction_PW_to_air)+(water_well_in_ground_input*fraction_PW_to_air); lognormal variance with pedigree 0.0807, pedigree (2,2,5,1,1)
  (same comment as for Water)
  property fraction, origin: fresh water 1; name fraction_origin_fresh_water
  property fraction, origin: salt water 0; name fraction_origin_salt_water
  property fraction, origin: unspecified 0; name fraction_origin_unspecified

## Sampling procedure
literature

## Extrapolations
see Geography and Technology
