# phosphate rock beneficiation, dry

Dataset: EcoSpold 2, unit process
Geography: MA
Time period: 1986-01-01 to 2019-12-31
Technology level: current
Classification: EcoSpold01Categories: chemicals/inorganics
Classification: ISIC rev.4 ecoinvent: 0891:Mining of chemical and fertilizer minerals
Tags: ConvertedDataset
Scenario: Business-as-Usual
System model: Allocation at the point of substitution
Generated by: Alex Primas
Published in: Althaus H.-J. 2007
Database: ecoinvent
isCopyrightProtected: true
accessRestrictedTo: 1

## General comment
Large uncertainties exist for data on particle emissions from transfer and storage. Also data of emissions to water and soil are uncertain due to missing data of uncontrolled run off and water use which were estimated. Energy consumption data related to mass of rock moved.
[This dataset was already contained in the ecoinvent database version 2. It was not individually updated during the transfer to ecoinvent version 3. Life Cycle Impact Assessment results may still have changed, as they are affected by changes in the supply chain, i.e. in other datasets. This dataset was generated following the ecoinvent quality guidelines for version 2. It may have been subject to central changes described in the ecoinvent version 3 change report (http://www.ecoinvent.org/database/ecoinvent-version-3/reports-of-changes/), and the results of the central updates were reviewed extensively. The changes added e.g. consistent water flows and other information throughout the database. The documentation of this dataset can be found in the ecoinvent reports of version 2, which are still available via the ecoinvent website. The change report linked above covers all central changes that were made during the conversion process.]

## Included activities end
Mining process, transport to beneficiation plant, dry processing including crushing, screening or washing and flotation.Drying orcalcination of washed rock included. Land use for mining and reclamation.

## Geography
Assumption for production in Morocco based mainly on data from Florida. Some data from Moroccan mines. Various processes with location RER used.

## Technology
U.S. technology for dry rock or dried wet rock processing. Average technology mix modelled. No specific age of technology modelled

## Time period
Time of literature publication. Measurements took place partly before this period.

## Parameters
- fraction, process water, to air: 0.34 dimensionless; name fraction_PW_to_air; lognormal variance with pedigree 0.092025, pedigree (4,4,3,2,4)
  Literature value (Statistics Canada, 2007 & Shaffer, K.H., 2008, Consumptive water use in the Great Lakes Basin, USGS) (Vionnet, S., Quantis Water Database - Technical Report, 2012).

## Reference product
- phosphate rock, as P2O5, beneficiated, dry: 1 kg; CPC 34629: Other phosphatic fertilizers, n.e.c.; By-product classification allocatable product; CAS 65996-94-3
  EcoSpold01Location=MA
  Uncertainty not applicable for output
  production volume 2.5365e9 kg
    7.2 Mt as P2O5 in 2000, 21.6 Mt as Rock in 2000
    Source: IFA production and trade statistics http://www.fertilizer.org/ifa/Home-Page/STATISTICS/Production-and-trade divided evenly between wet and dry product
  property price 0.049 EUR2005
    Calculated value based on data from United Nations Commodity Trade Statistics Database (comtrade.un.org). UN comtrade category: 251010 Natural calcium phosphates, unground. Year 2005. Using exchange rate of 1EURO = 1.209 USD. Average of price of import into 5 main markets (EU, US, JP, IN and CN).
  property carbon content 0
    carbon content on a dry matter basis (reserved; not for manual entry)
  properties: water in wet mass 0 kg, dry mass 1 kg, wet mass 1 kg, carbon content, fossil 0, water content 0, carbon content, non-fossil 0, carbon allocation 0 kg

## Inputs from technosphere
- heat, district or industrial, other than natural gas: 0.567 MJ; lognormal variance with pedigree 0.09, pedigree (1,1,5,1,1)
  2,3,3,5,4,3; Technology-mix estimated, Location RER
  EcoSpold01Location=RER
- ethylenediamine: 0.001 kg; lognormal variance with pedigree 0.2646, pedigree (3,3,5,5,5)
  Average data from U.S study; proxy used
  EcoSpold01Location=RER
  Uncertainty: Average data from U.S study; proxy used
  properties: carbon content, fossil 0.5, dry mass 1 kg, wet mass 1 kg
- electricity, medium voltage: 0.15 kWh; lognormal variance with pedigree 0.1232, pedigree (2,3,5,5,4)
  EcoSpold01Location=UCTE
  61% of world production 1994, European mix
  Uncertainty: 61% of world production 1994, European mix
- palm oil, crude: 0.0026 kg; lognormal variance with pedigree 0.2646, pedigree (3,3,5,5,5)
  EcoSpold01Location=MY
  Average data from U.S study; proxy used
  Uncertainty: Average data from U.S study; proxy used
  properties: dry mass 1 kg, wet mass 1 kg, carbon content, non-fossil 0.752881
  note on carbon content, non-fossil: C49H97O6. Palm oil (tab 17.4, ecoinvent v2.2 report 17-part 17)
- heat, district or industrial, natural gas: 0.567 MJ; lognormal variance with pedigree 0.1232, pedigree (2,3,5,5,4)
  Technology-mix estimated, Location RER
  EcoSpold01Location=RER
  Uncertainty: Technology-mix estimated, Location RER
- mine infrastructure, phosphate rock: 3.03e-11 unit; lognormal variance with pedigree 0.448, pedigree (4,5,5,5,4)
  EcoSpold01Location=MA
  Estimated with weak data from 2 sites;activityLink introduced to establish a direct link to the corresponding regional supply of this product
  Uncertainty: Estimated with weak data from 2 sites
- light fuel oil: 0.0039 kg; lognormal variance with pedigree 0.1246, pedigree (3,3,5,5,4)
  EcoSpold01Location=RER
  Average data from U.S study, Location RER
  Uncertainty: Average data from U.S study, Location RER
  properties: carbon content, fossil 0.862, dry mass 1 kg, wet mass 1 kg
- diesel, burned in building machine: 0.103 MJ; lognormal variance with pedigree 0.059225, pedigree (2,3,5,2,3)
  61% of world production 1994
  EcoSpold01Location=GLO
  Uncertainty: 61% of world production 1994
- sodium silicate, spray powder, 80%: 0.0008 kg; lognormal variance with pedigree 0.1246, pedigree (3,3,5,5,4)
  Average data from U.S study, Location RER
  EcoSpold01Location=RER
  Uncertainty: Average data from U.S study, Location RER
  properties: dry mass 1 kg, wet mass 1 kg
- soda ash, light, crystalline, heptahydrate: 0.0026 kg; lognormal variance with pedigree 0.1246, pedigree (3,3,5,5,4)
  (same comment as for sodium silicate, spray powder, 80%)
  properties: carbon content, fossil 0.0517241, wet mass 1 kg, dry mass 1 kg
- sulfuric acid: 0.0039 kg; lognormal variance with pedigree 0.1246, pedigree (3,3,5,5,4)
  (same comment as for sodium silicate, spray powder, 80%)
  properties: wet mass 1 kg, dry mass 1 kg

## Inputs from nature
- Occupation, mineral extraction site [natural resource, land]: 0.0144 m2*year; lognormal variance with pedigree 0.218, pedigree (4,5,5,5,4)
  Estimated from data of U.S. mines
  Uncertainty: Estimated from data of U.S. mines
- Fluorine, in ground [natural resource, in ground]: 0.118 kg; lognormal variance with pedigree 0.0527, pedigree (3,3,5,3,1)
  4.5% F in apatite; 3% F in ore; Data for process loss estimated
  Uncertainty: Data for process loss estimated
- Occupation, construction site [natural resource, land]: 0.0011 m2*year; lognormal variance with pedigree 0.218, pedigree (4,5,5,5,4)
  Estimated from data of U.S. mines
  Uncertainty: Estimated from data of U.S. mines
- Transformation, from mineral extraction site [natural resource, land]: 0.00072 m2; lognormal variance with pedigree 0.298, pedigree (4,5,5,5,4)
  Estimated from data of U.S. mines
  Uncertainty: Estimated from data of U.S. mines
- Phosphorus, in ground [natural resource, in ground]: 0.47 kg; lognormal variance with pedigree 0.0402, pedigree (1,2,5,3,1)
  18% P in apatite; 12% in ore; Data of year 1999 / 2000 from Morocco used
  Uncertainty: Data of year 1999 / 2000 from Morocco used
- Water, well, in ground [natural resource, in water]: 0.0038 m3; name water_well_in_ground_input; lognormal variance with pedigree 0.148, pedigree (4,5,5,5,4)
  Estimated from data of U.S. mines
  Uncertainty: Estimated from data of U.S. mines
- Transformation, from pasture, man made [natural resource, land]: 0.00072 m2; lognormal variance with pedigree 0.298, pedigree (4,5,5,5,4)
  Estimated from data of U.S. mines
  Uncertainty: Estimated from data of U.S. mines
- Transformation, to mineral extraction site [natural resource, land]: 0.00072 m2; lognormal variance with pedigree 0.298, pedigree (4,5,5,5,4)
  Estimated from data of U.S. mines
  Uncertainty: Estimated from data of U.S. mines
- Transformation, to pasture, man made [natural resource, land]: 0.00072 m2; lognormal variance with pedigree 0.298, pedigree (4,5,5,5,4)
  Estimated from data of U.S. mines
  Uncertainty: Estimated from data of U.S. mines

## Emissions to nature
- Particulates, > 2.5 um, and < 10um [air, non-urban air or from high stacks]: 0.00092 kg; lognormal variance with pedigree 0.23, pedigree (3,5,5,5,3)
  U.S. data from 1970 and data of coal mining
  Uncertainty: U.S. data from 1970 and data of coal mining
- Toluene [water, surface water]: 2.03e-7 kg; lognormal variance with pedigree 0.436, pedigree (3,4,5,5,4)
  Data from 1 U.S. mine (1990) and estimates
  Uncertainty: Data from 1 U.S. mine (1990) and estimates
- Oils, unspecified [soil, industrial]: 0.00193 kg; lognormal variance with pedigree 0.39, pedigree (5,5,5,5,5)
  Estimation from data of chemical demand
  Uncertainty: Estimation from data of chemical demand
- Particulates, > 10 um [air, non-urban air or from high stacks]: 0.00176 kg; lognormal variance with pedigree 0.15, pedigree (3,5,5,5,3)
  (same comment as for Particulates, > 2.5 um, and < 10um)
- Water [water, unspecified]: 0.002508 m3; name water_to_water_unspecified; = water_well_in_ground_input*(1-fraction_PW_to_air); lognormal variance with pedigree 0.0807, pedigree (2,2,5,1,1)
  Calculated value based on literature values and expert opinion. See comments in the parametres' comment field.
  property fraction, origin: unspecified 0; name fraction_origin_unspecified_Ww
  property fraction, origin: fresh water 1; name fraction_origin_fresh_water_Ww
  property carbon content, non-fossil 0; name C_content_non_fossil
  property dry mass 0 kg; name DM
  property wet mass 1000 kg; name WM
  property water in wet mass 1000 kg; name WWM
  property carbon content, fossil 0; name C_content_fossil
  property fraction, origin: salt water 0; name fraction_origin_salt_water_Ww
- DOC, Dissolved Organic Carbon [water, surface water]: 1.86e-7 kg; lognormal variance with pedigree 0.188, pedigree (4,5,5,5,4)
  Calculated from measured data
  Uncertainty: Calculated from measured data
- Water [air, unspecified]: 0.001292 m3; name water_to_air_unspecified; = (water_well_in_ground_input*fraction_PW_to_air); lognormal variance with pedigree 0.0807, pedigree (2,2,5,1,1)
  (same comment as for Water)
  property fraction, origin: fresh water 1; name fraction_origin_fresh_water
  property fraction, origin: salt water 0; name fraction_origin_salt_water
  property fraction, origin: unspecified 0; name fraction_origin_unspecified
- Lead-210 [air, non-urban air or from high stacks]: 0.00282 kBq; lognormal variance with pedigree 0.426, pedigree (4,5,5,5,3)
  Calculated from dust emissions
  Uncertainty: Calculated from dust emissions
- Radioactive species, alpha emitters [water, surface water]: 0.00164 kBq; lognormal variance with pedigree 0.436, pedigree (3,4,5,5,4)
  (same comment as for Toluene)
- Sulfate [water, surface water]: 0.00112 kg; lognormal variance with pedigree 0.176, pedigree (3,4,5,5,4)
  (same comment as for Toluene)
- BOD5, Biological Oxygen Demand [water, surface water]: 0.000252 kg; lognormal variance with pedigree 0.188, pedigree (4,5,5,5,4)
  Calculated from measured data
  Uncertainty: Calculated from measured data
- Hydrogen fluoride [air, non-urban air or from high stacks]: 1.18e-5 kg; lognormal variance with pedigree 0.2126, pedigree (2,4,5,5,3)
  U.S. data from 1973
  Uncertainty: U.S. data from 1973
- Thorium-232 [air, non-urban air or from high stacks]: 5e-5 kBq; lognormal variance with pedigree 0.426, pedigree (4,5,5,5,3)
  Calculated from dust emissions
  Uncertainty: Calculated from dust emissions
- Thorium-230 [air, non-urban air or from high stacks]: 0.0047 kBq; lognormal variance with pedigree 0.426, pedigree (4,5,5,5,3)
  Calculated from dust emissions
  Uncertainty: Calculated from dust emissions
- Uranium-238 [air, non-urban air or from high stacks]: 0.0047 kBq; lognormal variance with pedigree 0.426, pedigree (4,5,5,5,3)
  Calculated from dust emissions
  Uncertainty: Calculated from dust emissions
- Uranium-234 [air, non-urban air or from high stacks]: 0.0047 kBq; lognormal variance with pedigree 0.426, pedigree (4,5,5,5,3)
  Calculated from dust emissions
  Uncertainty: Calculated from dust emissions
- Particulates, < 2.5 um [air, non-urban air or from high stacks]: 0.00046 kg; lognormal variance with pedigree 0.42, pedigree (3,5,5,5,3)
  (same comment as for Particulates, > 2.5 um, and < 10um)
- Carbon dioxide, fossil [air, non-urban air or from high stacks]: 0.0243 kg; lognormal variance with pedigree 0.0526, pedigree (2,4,5,1,1)
  Data from 1 mine in Morocco
  Uncertainty: Data from 1 mine in Morocco
- Fluoride [water, surface water]: 1.69e-5 kg; lognormal variance with pedigree 0.176, pedigree (3,4,5,5,4)
  (same comment as for Toluene)
- TOC, Total Organic Carbon [water, surface water]: 6.78e-5 kg; lognormal variance with pedigree 0.188, pedigree (4,5,5,5,4)
  Calculated from measured data
  Uncertainty: Calculated from measured data
- Radium-226 [air, non-urban air or from high stacks]: 0.00501 kBq; lognormal variance with pedigree 0.426, pedigree (4,5,5,5,3)
  Calculated from dust emissions
  Uncertainty: Calculated from dust emissions
- Nitrogen [water, surface water]: 1.32e-5 kg; lognormal variance with pedigree 0.176, pedigree (3,4,5,5,4)
  (same comment as for Toluene)
- COD, Chemical Oxygen Demand [water, surface water]: 0.000252 kg; lognormal variance with pedigree 0.188, pedigree (4,5,5,5,4)
  Calculated from measured data
  Uncertainty: Calculated from measured data
- Phosphorus [water, surface water]: 3.39e-5 kg; lognormal variance with pedigree 0.176, pedigree (3,4,5,5,4)
  (same comment as for Toluene)
- Polonium-210 [air, non-urban air or from high stacks]: 0.00282 kBq; lognormal variance with pedigree 0.426, pedigree (4,5,5,5,3)
  Calculated from dust emissions
  Uncertainty: Calculated from dust emissions
- Suspended solids, unspecified [water, surface water]: 8.47e-5 kg; lognormal variance with pedigree 0.176, pedigree (3,4,5,5,4)
  (same comment as for Toluene)

## Sampling procedure
Data for emissions and land use based on various studies from Florida. Energy data based on a world-wide survey and some assumptions. Further data from Moroccan studies, literature and estimations.

## Extrapolations
This dataset has been extrapolated from year 2001 to the year of the calculation (2019). The uncertainty has been adjusted accordingly.

## Review by Roland Hischier 2003-08-26
Passed.
