# wood preservation facility construction, flow coating equipment

Dataset: EcoSpold 2, unit process
Geography: GLO
Time period: 2012-01-01 to 2019-12-31
Technology level: current
Classification: ISIC rev.4 ecoinvent: 4290:Construction of other civil engineering projects
Classification: EcoSpold01Categories: wooden materials/extraction
Scenario: Business-as-Usual
System model: Allocation at the point of substitution
Generated by: Frank Werner
Database: ecoinvent
isCopyrightProtected: true
accessRestrictedTo: 1

## General comment
Flow coating is an automated method of applying industrial liquid coatings that involves directing numerous individual streams of coating over one or multiple parts that move horizontally on a conveyor. Flow coating can be used to cover multi-dimensional surfaces of a variety of shapes. The run-off paint or wood preserverative is recollected and reused.
The dataset represents a modern flow coating equipment with a estimated througput of about window frames per hour and an estimated service life of 20 years (according to producer information.
This data should only be used to consider the infrastructure needed for preservative treatment of wood if this is not relevant.

## Included activities start
Infrastructure dataset containing the main elements of the facility.

## Included activities end
Material (production and disposal) needed for a flow coating equipment, e.g. used for wood preservation in windows production. Maintenance is disregarded

## Geography
Data from Germany and Switzerland. Location of plant within Europe of minor importance

## Reference product
- wood preservation facility, flow coating equipment: 1 unit; By-product classification allocatable product; CPC 53269: Other constructions for manufacturing
  production volume 1000 unit; name p_flow_coating_equipment
    estimated based on estimated production volume
  property price 9143 EUR2005
    Calculated based on inputs: The price of the product has been calculated as a sum of the values of the material and energy inputs for this product. This value is therefore a rough estimation. It may underestimate the real price since there are additional expenses when producing any product. These expences can include for example labour costs, treatment of waste materials and profit for the producer. Please consider carefully whether this level of data quality is acceptable for your application.
  property true value 9143
    allocation property applied in "true value" allocation // value calculated from revenue

## By-products
- iron scrap, unsorted: 0 kg; source European Aluminium Association 2008; CPC 39310: Slag, dross, scalings and other waste from the manufacture of iron or steel; By-product classification Recyclable; pedigree (1,1,1,1,1)
  production volume 21.0378 kg
  property price 0.149 EUR2005; name ironScrapAmount_price_EUR2005
    Temporary price data. Calculated as 90% of purchasers price based on: estimated at 85% of sorted scrap
  property carbon content 0
    carbon content on a dry matter basis (reserved; not for manual entry)
  property true value 0.00104488
    allocation property applied in "true value" allocation // value calculated from revenue
  properties: water in wet mass 0 kg, water content 0, carbon content, fossil 0, carbon content, non-fossil 0, dry mass 1 kg, wet mass 1 kg, carbon allocation 0 kg
- aluminium oxide, non-metallurgical: 0 kg; source European Aluminium Association 2008; CPC 41432: Alumina (aluminium oxide), except artificial corundum; By-product classification allocatable product; CAS 1344-28-1; pedigree (1,1,1,1,1)
  production volume 1323.83 kg
  property carbon content, non-fossil 0; name C_content_non_fossil
  property price 0.28 EUR2005; name Al2O3Amount_price_EUR2005
    From UN trade database. http://data.un.org/ Import data from the largest economies of the world are used (Brazil, India, USA, China, Japan and EU-27).
  property dry mass 1 kg; name DM
  property water content 0; name water_content
  property wet mass 1 kg; name WM
  property water in wet mass 0 kg; name WWM
  property carbon content, fossil 0; name C_content_fossil
  property carbon content 0
    carbon content on a dry matter basis (reserved; not for manual entry)
  property true value 0.123558
    allocation property applied in "true value" allocation // value calculated from revenue
  properties: carbon allocation 0 kg
- aluminium, cast alloy: 0 kg; source European Aluminium Association 2008; By-product classification allocatable product; CPC 41431: Unwrought aluminium; pedigree (1,1,1,1,1)
  EcoSpold01Location=RER
  production volume 12374.9 kg
  property price 1.3 EUR2005; name castAlloyAmount_price_EUR2005
    Temporary price data. Calculated as 90% of purchasers price based on: Source: London Metal Exchange, Aluminium alloy price for 2005
  property carbon content 0
    carbon content on a dry matter basis (reserved; not for manual entry)
  property true value 5.36245
    allocation property applied in "true value" allocation // value calculated from revenue
  properties: water in wet mass 0 kg, carbon content, non-fossil 0, water content 0, dry mass 1 kg, carbon content, fossil 0, wet mass 1 kg, carbon allocation 0 kg
- heat, for reuse in municipal waste incineration only: 0 MJ; CPC 17300: Steam and hot water; By-product classification allocatable product; pedigree (1,1,1,1,1)
  Net electricity generated from this waste and used in internal MSWI plant energy redistribution.
  Uncertainty: uncertainty is calculated from uncertainties in waste composition and uncertainties in energy efficiency and the uncertainty in internal energy demand
  production volume 574040 MJ
  property exergy 0.1842 MJ; name E_th_prod_MSWI_exergy
    This exergy property is based on the exergy content of the product.
  property true value relation 0.1842; name E_th_prod_MSWI_true_value_relation
    property to calculate "true value" from
  property price 0.0106 EUR2005; name E_th_prod_MSWI_price_EUR2005
    Average European district heat price from Ecoheatcool and Euroheat 2005-2006, Ecoheat Work package 1: The European heat market. Final report. 10.6 EUR/GJ i s the price of district heat. http://www.solarthermalworld.org/files/Ecoheatcool%20WP1%20Web.pdf?download
  property true value 1.25873
    allocation property applied in "true value" allocation // value calculated from true value relation
- electricity, for reuse in municipal waste incineration only: 0 kWh; CPC 17100: Electrical energy; By-product classification allocatable product; pedigree (1,1,1,1,1)
  (same comment as for heat, for reuse in municipal waste incineration only)
  production volume 81477.9 kWh
  property exergy 3.6 MJ; name E_el_prod_MSWI_exergy
    This exergy property is based on the exergy content of the product.
  property true value relation 3.6; name E_el_prod_MSWI_true_value_relation
    property to calculate "true value" from
  property price 0.1 EUR2005; name E_el_prod_MSWI_price_EUR2005
    Estimated to be the same price as in case of electricity, medium voltage.
  property true value 3.487
    (same comment as for heat, for reuse in municipal waste incineration only)
- aluminium, wrought alloy: 0 kg; source European Aluminium Association 2008; By-product classification allocatable product; CPC 4153: Semi-finished products of aluminium or aluminium alloys; pedigree (1,1,1,1,1)
  production volume 5417.49 kg
  property price 1.44 EUR2005; name secondaryAluminiumOutput_price_EUR2005
    Estimated based on literature values and expert judgement. Aluminium ccast alloys are about 90% of the price of aluminium wrought alloys.
  property carbon content 0
    carbon content on a dry matter basis (reserved; not for manual entry)
  property true value 2.60039
    allocation property applied in "true value" allocation // value calculated from revenue
  properties: wet mass 1 kg, water content 0, carbon content, fossil 0, water in wet mass 0 kg, carbon content, non-fossil 0, dry mass 1 kg, carbon allocation 0 kg
- iron scrap, sorted, pressed: 0 kg; By-product classification Recyclable; CPC 39310: Slag, dross, scalings and other waste from the manufacture of iron or steel; pedigree (1,1,1,1,1)
  Iron scrap recovered from this waste.
  production volume 112965 kg
  property price 0.175 EUR2005
    Temporary price data. Calculated as 90% of purchasers price based on: 2005 import and export prices (total trades (USD) divided by total weight (kg) in biggest economies of the world: EU27, USA, Brasil, China, India, Japan and Russia) from UN Commodity Trade Statistics Database (http://data.un.org/Explorer.aspxDatabase [Accessed 2011.06.20]). Commodity: Waste or scrap, of cast iron
  property carbon content 0
    carbon content on a dry matter basis (reserved; not for manual entry)
  property true value 0.133385
    allocation property applied in "true value" allocation // value calculated from revenue
  properties: water content 0, water in wet mass 0 kg, carbon content, fossil 0, dry mass 1 kg, carbon content, non-fossil 0, wet mass 1 kg, carbon allocation 0 kg
- zinc concentrate: 0 kg; CPC 14290: Other non-ferrous metal ores and concentrates (other than uranium or thorium ores and concentrates); By-product classification allocatable product
  Calculated value from the knowledge of the properties of both products.
  production volume 36.7514 kg
  property price 0.38 EUR2005; name ByP_price_EUR2005
    Temporary price data. Calculated as 90% of purchasers price based on: Zinc content in concentrate 53%. Concentrate price per kg Zn 86.5% of refined Zn price (13.5% treatment charges according to CHR Metals Limited 2005: Dynamic cost curves. http://www.minecost.com/dynamic.pdf). 2004 zinc price from USGS (2007) Mineral commodity summaries 2007. <http://minerals.usgs.gov/minerals/pubs/mcs/2007/mcs2007.pdf> [Accessed 25 May 2010]
  property zinc content 0.53; name zinc_C_zinc_concentrate
    Zinc content on a dry matter basis. Value taken from teh "zinc mine operation" /GLO dataset.
  property dry mass 1 kg; name DM_zinc_concentrate
  property carbon content 0
    carbon content on a dry matter basis (reserved; not for manual entry)
  property true value 0.000287109
    allocation property applied in "true value" allocation // value calculated from revenue
  properties: wet mass 1 kg, water content 0, carbon content, non-fossil 0, carbon content, fossil 0, water in wet mass 0 kg, carbon allocation 0 kg

## Inputs from technosphere
- section bar extrusion, aluminium: 19.9717 kg; = m_aluminium; source Uhlemann T. 2012; lognormal variance with pedigree 0.00200245, pedigree (1,1,3,1,1)
  calculated from aluminium input
- aluminium alloy, AlMg3: 19.9717 kg; name m_aluminium; source Uhlemann T. 2012; lognormal variance with pedigree 0.0282, pedigree (2,3,3,1,1)
  property dry mass 1 kg; name m_aluminium_DM
  property wet mass 1 kg; name m_aluminium_WM
- building, hall: 59.915 m2; = 20*3; lognormal variance with pedigree 0.552, pedigree (1,1,3,1,1)
  Rough estimate, incl. drying zone
  EcoSpold01Location=CH
- scrap aluminium: 0 kg; name w_aluminium; source Uhlemann T. 2012; pedigree (1,1,1,1,1)
  = disposal aluminium
  production volume 0 kg
    Calculated from production volume of reference product using the relative outputs.
  property wet mass 1 kg; name w_aluminium_WM
  property dry mass 1 kg; name w_aluminium_DM
- steel, chromium steel 18/8, hot rolled: 689.023 kg; name m_chromium_steel; source Uhlemann T. 2012; lognormal variance with pedigree 0.0451, pedigree (3,5,3,3,3)
  EcoSpold01Location=RER
  property carbon content, fossil 0.0008; name C_content_fossil_chromium_steel
  properties: dry mass 1 kg, wet mass 1 kg
  note on carbon content, fossil: Stainless steel model is the grade 304 steel (18/8 stainless, 18% chromium 8% nickel; max. 0.08% C)
- nylon 6: 0 kg; name m_nylon; source Uhlemann T. 2012; pedigree (1,1,1,1,1)
  property carbon content, fossil 0.637168; name C_content_fossil_nylon
  property wet mass 1 kg; name m_nylon_WM
  property dry mass 1 kg; name m_nylon_DM
- electronics, for control units: 7.48938 kg; name m_electronics; source Uhlemann T. 2012; lognormal variance with pedigree 0.0296, pedigree (2,4,3,1,1)
  property carbon content, non-fossil 0.00013442; name C_content_non_fossil_electronics
  property water in wet mass 0 kg; name WWM
  property dry mass 1 kg; name m_electronics_DM
  property carbon content, fossil 0.337146; name C_content_fossil_electronics
  property wet mass 1 kg; name m_electronics_WM
  property water content 0; name water_content
- waste plastic, mixture: 0 kg; name w_nylon; source Uhlemann T. 2012; pedigree (1,1,1,1,1)
  = disposal nylon; adjusted for humidity
  production volume 0 kg
    Calculated from production volume of reference product using the relative outputs.
  property wet mass 1 kg; name WM
  property dry mass 0.847 kg; name DM_plastic_mixture
  properties: carbon content, fossil 0.747344, water content 0.180638
- waste electric and electronic equipment: -7.48938 kg; name w_electronics; = (m_electronics)*-1; source Uhlemann T. 2012; lognormal variance with pedigree 0.00200989, pedigree (1,1,3,1,1)
  = disposal of electronic control unit
  production volume 7500 kg; = Ref('17022f83-d42a-4d85-ae2a-0a5e8e0f5520', 'ProductionVolume') * (w_electronics / Ref('17022f83-d42a-4d85-ae2a-0a5e8e0f5520'))
    Calculated from production volume of reference product using the relative outputs.
  property water content 0; name w_electronics_water_content
  property dry mass 1 kg; name w_electronics_DM
  property wet mass 1 kg; name w_electronics_WM
  property carbon content, non-fossil 0.00013442; name w_electronics_C_content_non_fossil
  property water in wet mass 0 kg; name w_electronics_WWM
  property carbon content, fossil 0.337146; name w_electronics_C_content_fossil
- synthetic rubber: 29.9575 kg; name m_synthetic_rubber; source Uhlemann T. 2012; lognormal variance with pedigree 0.0296, pedigree (2,4,3,1,1)
  sealings and tubes
  property wet mass 1 kg; name m_synthetic_rubber_WM
  property dry mass 1 kg; name m_synthetic_rubber_DM
  property carbon content, fossil 0.871949; name C_content_fossil_synthetic_rubber
- steel, unalloyed: 327.036 kg; name m_steel_unalloyed; source Uhlemann T. 2012; lognormal variance with pedigree 0.0296, pedigree (2,4,3,1,1)
  property wet mass 1 kg; name m_steel_unalloyed_WM
  property dry mass 1 kg; name m_steel_unalloyed_DM
  property carbon content, fossil 0.0025; name C_content_fossil_steel_unalloyed
- scrap steel: 0 kg; pedigree (1,1,1,1,1)
  calculated from steel input
  production volume 0 kg
    Calculated from production volume of reference product using the relative outputs.
  properties: dry mass 1 kg, carbon content, fossil 0.0025, wet mass 1 kg
- waste rubber, unspecified: 0 kg; name w_rubber; source Uhlemann T. 2012; pedigree (1,1,1,1,1)
  = disposal rubber
  production volume 0 kg
    Calculated from production volume of reference product using the relative outputs.
  property dry mass 1 kg; name w_rubber_DM
  properties: carbon content, fossil 0.853
- sheet rolling, steel: 327.036 kg; = m_steel_unalloyed; source Uhlemann T. 2012; lognormal variance with pedigree 0.00200001, pedigree (1,1,3,1,1)
  calculated from steel input
- sheet rolling, chromium steel: 689.023 kg; = m_chromium_steel; source Uhlemann T. 2012; lognormal variance with pedigree 0.002, pedigree (1,1,3,1,1)
  For production of equipment
  EcoSpold01Location=RER
- scrap aluminium: -6.33517, -0.297232, -13.3393 kg (3 entries); source Uhlemann T. 2012; lognormal variance with pedigree 0.00200353, pedigree (1,1,3,1,1)
  = disposal aluminium
  production volume 20000 kg
    Calculated from production volume of reference product using the relative outputs.
  properties: wet mass 1 kg, dry mass 1 kg
- nylon 6: 0.165062, 0.33423 kg (2 entries); source Uhlemann T. 2012; lognormal variance with pedigree 0.0296, pedigree (2,4,3,1,1)
  properties: carbon content, fossil 0.637168, wet mass 1 kg, dry mass 1 kg
- waste plastic, mixture: -0.0567405, -0.00437436, -0.00180677, -0.00171569, -0.0654686, -0.000729913, -0.000330826, -0.458316 kg (8 entries); source Uhlemann T. 2012; lognormal variance with pedigree 0.00511606, pedigree (1,1,3,1,1)
  = disposal nylon; adjusted for humidity
  production volume 590.319 kg
    Calculated from production volume of reference product using the relative outputs.
  properties: wet mass 1 kg, carbon content, fossil 0.747344, dry mass 0.847 kg, water content 0.180638
- scrap steel: -247.406, -0.312782, -768.341 kg (3 entries); lognormal variance with pedigree 0.031, pedigree (3,4,3,1,1)
  calculated from steel input
  production volume 1.0175e6 kg
    Calculated from production volume of reference product using the relative outputs.
- waste rubber, unspecified: -14.6708, -0.615878, -14.6708 kg (3 entries); source Uhlemann T. 2012; lognormal variance with pedigree 0.00200168, pedigree (1,1,3,1,1)
  = disposal rubber
  production volume 30000 kg
    Calculated from production volume of reference product using the relative outputs.
  properties: dry mass 1 kg, carbon content, fossil 0.853

## Sampling procedure
Producer information

## Review by Sirje Vares 2013-10-11
Data related to the all datasets in submission, wood preservation facility constructions (dipping/immersion tank, hot/cold dipping tank, oscillating pressure vessel, vacuum pressure vessel and flow coating equipment), is reviewed and all reviewers’ comments are taken into account. The main uncertainty was annual production volumes but these are also adjusted according to the proposition.
In this case the data provider related, in his submissions, into the existing dataset properties which wasn’t fully completed and some data not existing but the data provider overcame these shortcomings by adding missing values and needed comments (also comments about the data which is new and not related to the master data). This kind of problems should be solved in next future in master data level.

## Review by Emilia Moreno Ruiz 2015-03-02
broken formula fixed
