# apricot production

Dataset: EcoSpold 2, unit process
Geography: ES
Time period: 2009-01-01 to 2019-12-31
Technology level: current
Classification: ISIC rev.4 ecoinvent: 0124:Growing of pome fruits and stone fruits
Tags: WFLDB
Scenario: Business-as-Usual
System model: Allocation at the point of substitution
Generated by: Tuija Waldvogel
Published in: Nemecek T. 2015
Database: ecoinvent
isCopyrightProtected: true
accessRestrictedTo: 1

## General comment
This dataset represents the production of 1 kg of apricots. The average yield from 2009 - 2012 is 19 t/ha. The data are representative for apricots production in Spain from the region Murcia used for the export market. Mineral NPK fertiliser input is 55-50-70 kg/ha. No organic fertilisers are applied. Total active ingredients (a.i.) applied as pesticides amount to 6.1 kg a.i./ha.
The dataset was modelled within the project 'World Food LCA database (WFLDB)'. The aim of this project was to provide inventories of a broad variety of agricultural products and processes and to cover for each product at least 50% of the global export market. The export share of apricots produced in Spain amounts to 11% of the global export (tonnage exported in 2010). The production system regarded in this dataset aimed at representing apricots produced in Spain for the export market.
PEF-Quality: data quality rating (DQR) = 2.8 (i.e. good quality). This dataset refers to an average situation; for specific situations exchanges might differ substantially due to site specific parameters

## Included activities start
This activity starts with the nursery producing fruit tree seedlings, i.e. grafted young trees to be planted.

## Included activities end
This activity ends with the waste treatment after the clearing of the orchard (rooting up the trees). The dataset includes all activities of a year in a year in the productive phase of the orchard including the establishment phase per year of lifetime (20 years, 156 trees/ha planted), the clearing of the orchard including waste treatment.
The establishment phase of the orchard includes tree nursery, soil cultivation, planting trees, sowing grass, and irrigation. Fertiliser and pesticide use in a year of the establishment phase is assumed to be half of the amount of a year in the productive phase.
The productive phase of the orchard includes machine operations, corresponding infrastructure, fuel use and sheds. Machine operations in the productive phase are: soil cultivation (mulching, mowing), fertiliser and pesticide application, harvesting and irrigation. Further, direct field emissions and land use change are included. At the end of the productive phase the orchard is cleared by rooting up the trees.

Heavy metal uptake by the crop is considered.
The inputs of seedlings, fertilisers and pesticides as well as packaging of fertilisers and pesticides are considered.

## Technology
Conventional production

## Parameters
- LUC_crop_specific: 1
  This parameter allows to switch between a 'crop specific' and a 'country specific' approach when calculating the LUC of a crop. By default, the chosen approach is 'crop specific', so the value of the parameter is 1. If you want to apply a 'country specific' approach, turn the parameter to 0.
- heavyMetalUptakeSwitch: 1

## Reference product
- apricot: 1 kg; By-product classification allocatable product; CPC 01343: Apricots
  Reference flow: Yield = 19000 kg/ha table fruit quality
  production volume 9.5054e7 kg
    Source: FAOSTAT. Average, 2009-2012
  property price 2.94 EUR2005
    Calculated value based on data from United Nations Commodity Trade Statistics Database (comtrade.un.org). UN comtrade category: 80910 Apricots, fresh. Year: 2010. Using exchange rate of 1EURO = 1.209 USD. Average of price of import into 5 main markets (EU, US, JP, IN and CN).
  property carbon content, non-fossil 0.412732
    calculation: C-content of components according to ecoinvent report No. 15a. Source of composition: Souci, S.W., Fachmann, W., Kraut, H. (Hg.: Bundesminsiterium fur Ernahrung, Landwirtschaft und Forsten, Bonn) 'Die Zusammensetzung der Lebensmittel - Nahrwerttabellen', medpharm Scientific Publishers Stuttgart, CRC Press; 2000. Peach used as proxy.
  property carbon content 0.412732
    carbon content on a dry matter basis (reserved; not for manual entry)
  property true value 2.94
    allocation property applied in "true value" allocation // value calculated from revenue
  properties: wet mass 1 kg, water in wet mass 0.460335 kg, water content 0.853, dry mass 0.539665 kg, carbon content, fossil 0, carbon allocation 0.222737 kg

## By-products
- electricity, for reuse in municipal waste incineration only: 0 kWh; CPC 17100: Electrical energy; By-product classification allocatable product; pedigree (1,1,1,1,1)
  Net electricity generated from this waste and used in internal MSWI plant energy redistribution.
  Uncertainty: uncertainty is calculated from uncertainties in waste composition and uncertainties in energy efficiency and the uncertainty in internal energy demand
  production volume 622339 kWh
  property true value relation 3.6; name E_el_prod_MSWI_true_value_relation
    property to calculate "true value" from
  property price 0.1 EUR2005; name E_el_prod_MSWI_price_EUR2005
    Estimated to be the same price as in case of electricity, medium voltage.
  property exergy 3.6 MJ; name E_el_prod_MSWI_exergy
    This exergy property is based on the exergy content of the product.
  property true value 0.000844289
    allocation property applied in "true value" allocation // value calculated from true value relation
- heat, for reuse in municipal waste incineration only: 0 MJ; CPC 17300: Steam and hot water; By-product classification allocatable product; pedigree (1,1,1,1,1)
  (same comment as for electricity, for reuse in municipal waste incineration only)
  production volume 4.5027e6 MJ
  property exergy 0.1842 MJ; name E_th_prod_MSWI_exergy
    This exergy property is based on the exergy content of the product.
  property price 0.0106 EUR2005; name E_th_prod_MSWI_price_EUR2005
    Average European district heat price from Ecoheatcool and Euroheat 2005-2006, Ecoheat Work package 1: The European heat market. Final report. 10.6 EUR/GJ i s the price of district heat. http://www.solarthermalworld.org/files/Ecoheatcool%20WP1%20Web.pdf?download
  property true value relation 0.1842; name E_th_prod_MSWI_true_value_relation
    property to calculate "true value" from
  property true value 0.000312553
    (same comment as for electricity, for reuse in municipal waste incineration only)

## Inputs from technosphere
- phenoxy-compound: 3.58911e-6 kg; lognormal variance with pedigree 0.00784984, pedigree (2,2,3,1,1)
  Proxy: Source for total amount of pesticides: literature (Cerutti et al. 2013). Active ingredient is calculated based on Ecoinvent dataset Apricot FR. For calculations see supporting documentation 'WFLDB-Documentation.pdf' (https://ecoquery.ecoinvent.org/File/Reports).
  properties: dry mass 1 kg, carbon content, fossil 0.532559, wet mass 1 kg
- phthalimide-compound: 0.000203061 kg; lognormal variance with pedigree 0.00784984, pedigree (2,2,3,1,1)
  (same comment as for phenoxy-compound)
  properties: wet mass 1 kg, dry mass 1 kg, carbon content, fossil 0.361204
- ammonium nitrate, as N: 0.000367487 kg; source Luis Angel Lopez 2015; lognormal variance with pedigree 0.118177, pedigree (2,1,3,1,1)
  Calculated based on literature values or expert estimation: The total amount of nutrient (Personal written communication, Luis Angel Lopez, Yara, 2015) multiplied by the share of fertiliser type (Personal written communication, Luis Angel Lopez, Yara, 2015). See supporting documentation 'WFLDB-Documentation.pdf' chapter 'Fertiliser application' for L3 and L4 data (https://ecoquery.ecoinvent.org/File/Reports).
  Corresponds to 6.99 kg/ha
  properties: dry mass 1 kg, wet mass 1 kg
- glyphosate: 1.58331e-5 kg; lognormal variance with pedigree 0.00784984, pedigree (2,2,3,1,1)
  (same comment as for phenoxy-compound)
  properties: carbon content, fossil 0.214286, wet mass 1 kg, dry mass 1 kg
- potassium sulfate, as K2O: 0.00107463 kg; source Luis Angel Lopez 2015; lognormal variance with pedigree 0.118177, pedigree (2,1,3,1,1)
  Calculated based on literature values or expert estimation: The total amount of nutrient (Personal written communication, Luis Angel Lopez, Yara, 2015) multiplied by the share of fertiliser type (Personal written communication, Luis Angel Lopez, Yara, 2015). See supporting documentation 'WFLDB-Documentation.pdf' chapter 'Fertiliser application' for L3 and L4 data (https://ecoquery.ecoinvent.org/File/Reports).
  Corresponds to 20.4 kg/ha
  properties: wet mass 1 kg, dry mass 1 kg
- ammonium sulfate, as N: 0.000732659 kg; source Luis Angel Lopez 2015; lognormal variance with pedigree 0.118177, pedigree (2,1,3,1,1)
  Calculated based on literature values or expert estimation: The total amount of nutrient (Personal written communication, Luis Angel Lopez, Yara, 2015) multiplied by the share of fertiliser type (Personal written communication, Luis Angel Lopez, Yara, 2015). See supporting documentation 'WFLDB-Documentation.pdf' chapter 'Fertiliser application' for L3 and L4 data (https://ecoquery.ecoinvent.org/File/Reports).
  properties: wet mass 1 kg, dry mass 1 kg
- fruit tree seedling, for planting: 0.000410365 unit; source Pérez-Pastor A. 2014; lognormal variance with pedigree 0.118177, pedigree (2,1,3,1,1)
  Literature value or expert estimation (Perez-Pastor et al. 2014). This is the number of trees per ha divided by the lifetime years of the orchard.
  properties: dry mass 0.578035 kg, wet mass 1 kg, carbon content, non-fossil 0.439481, water content 0.73
  note on carbon content, non-fossil: calculation: C-content of components according to ecoinvent report No. 15a. Source of composition: https://ndb.nal.usda.gov/ndb/search/. Unspecific seedling used as proxy.
- mulching: 5.26109e-5 ha; lognormal variance with pedigree 0.118177, pedigree (2,1,3,1,1)
  Proxy from Apricot FR.
- urea, as N: 0.000188663 kg; source Luis Angel Lopez 2015; lognormal variance with pedigree 0.118177, pedigree (2,1,3,1,1)
  (same comment as for ammonium sulfate, as N)
  properties: dry mass 1 kg, carbon content, fossil 0.2, wet mass 1 kg
- planting tree: 0.000410365 unit; source Pérez-Pastor A. 2014; lognormal variance with pedigree 0.118177, pedigree (2,1,3,1,1)
  (same comment as for fruit tree seedling, for planting)
- application of plant protection product, by field sprayer: 0.000368276 ha; lognormal variance with pedigree 0.118664, pedigree (2,2,3,1,1)
  Proxy from Apricot FR. Field sprayer used as a proxy for pesticide application in orchards. Corresponds to 7 applications per year.
- fertilising, by broadcaster: 0.000105222 ha; lognormal variance with pedigree 0.118177, pedigree (2,1,3,1,1)
  Proxy from Apricot FR. Corresponds to 2 applications per year.
- phosphate rock, as P2O5, beneficiated, dry: 0.000414311 kg; source Luis Angel Lopez 2015; lognormal variance with pedigree 0.118177, pedigree (2,1,3,1,1)
  Calculated based on literature values or expert estimation: The total amount of nutrient (Personal written communication, Luis Angel Lopez, Yara, 2015) multiplied by the share of fertiliser type (Personal written communication, Luis Angel Lopez, Yara, 2015). See supporting documentation 'WFLDB-Documentation.pdf' chapter 'Fertiliser application' for L3 and L4 data (https://ecoquery.ecoinvent.org/File/Reports).
  Corresponds to 7.88 kg/ha
  properties: wet mass 1 kg, dry mass 1 kg
- establishing orchard: 0.000410365 unit; source Pérez-Pastor A. 2014; lognormal variance with pedigree 0.118177, pedigree (2,1,3,1,1)
  (same comment as for fruit tree seedling, for planting)
- packaging, for fertilisers: 0.0184138 kg; lognormal variance with pedigree 0.0532, pedigree (4,3,3,5,4)
  Total amount of active substance/s of fertilisers needed for the production of 'apricot' is calculated to be circa 9.21E-03 kg. Fertiliser/s used in this dataset is/are: 'ammonium nitrate, as N', 'ammonium sulfate, as N', 'nitrogen fertiliser, as N', 'phosphate fertiliser, as P2O5', 'phosphate rock, as P2O5, beneficiated, dry', 'potassium chloride, as K2O', 'potassium fertiliser, as K2O', 'potassium sulfate, as K2O', 'urea, as N'. The total amount of active substance/s is doubled in order to account for the packaging of the dilluted product of fertiliser/s that is/are applied. Therefore, 1.84E-02 kg of packaging for fertilisers is justified with this exchange.
  properties: price 0.0642 EUR2005, dry mass 1 kg, carbon content, fossil 0.825301, wet mass 1 kg
  note on carbon content, fossil: Considering a chemical formula (C2H4)n for polyethylene, carbon content-fossil is calculated to be 0.856286 kg of Carbon per kg of dry mass.
- transport, tractor and trailer, agricultural: 0.00199921 metric ton*km; lognormal variance with pedigree 0.156439, pedigree (4,1,3,1,1)
  On-farm transport: Yield (in tonnes) multiplied by the average distance from field to farm. The distance was assumed to be 2 km (proxy).
- potassium chloride, as K2O: 0.00131917 kg; source Luis Angel Lopez 2015; lognormal variance with pedigree 0.118177, pedigree (2,1,3,1,1)
  Calculated based on literature values or expert estimation: The total amount of nutrient (Personal written communication, Luis Angel Lopez, Yara, 2015) multiplied by the share of fertiliser type (Personal written communication, Luis Angel Lopez, Yara, 2015). See supporting documentation 'WFLDB-Documentation.pdf' chapter 'Fertiliser application' for L3 and L4 data (https://ecoquery.ecoinvent.org/File/Reports).
  Corresponds to 25.1 kg/ha
  properties: dry mass 1 kg, wet mass 1 kg
- waste wood, untreated: -0.0701303 kg; lognormal variance with pedigree 0.118177, pedigree (2,1,3,1,1)
  Wood from trees after 1-2 years of sorrage at the field (20% water) per lifetime year (20 years) of the orchard
  production volume 6.66879e6 kg
    Calculated from the reference product amount and production volume
  properties: wet mass 1 kg, dry mass 0.8 kg, water content 0.25, carbon content, non-fossil 0.48632
- irrigation: 0.983592 m3; lognormal variance with pedigree 0.118177, pedigree (2,1,3,1,1)
  Calculated value: The total amount of water used for irrigation (calculated from evapotranspiration, Pfister et al. 2011) multiplied by the country-share of irrigation technique (Abrisqueta et al. 2001). See supporting documentation 'WFLDB-Documentation.pdf' chapter 'Water use for irrigation' for L1 data (https://ecoquery.ecoinvent.org/File/Reports).
  properties: water content 9089.91, wet mass 1000 kg, dry mass 0.11 kg
- cyclic N-compound: 9.85481e-5 kg; lognormal variance with pedigree 0.00784984, pedigree (2,2,3,1,1)
  (same comment as for phenoxy-compound)
  properties: dry mass 1 kg, wet mass 1 kg, carbon content, fossil 0.641962
- potassium fertiliser, as K2O: 0.00128897 kg; source Luis Angel Lopez 2015; lognormal variance with pedigree 0.118177, pedigree (2,1,3,1,1)
  Calculated based on literature values or expert estimation: The total amount of nutrient (Personal written communication, Luis Angel Lopez, Yara, 2015) multiplied by the share of fertiliser type (Personal written communication, Luis Angel Lopez, Yara, 2015). See supporting documentation 'WFLDB-Documentation.pdf' chapter 'Fertiliser application' for L3 and L4 data (https://ecoquery.ecoinvent.org/File/Reports).
  Corresponds to 24.5 kg/ha
  properties: wet mass 1 kg, dry mass 1 kg
- nitrogen fertiliser, as N: 0.00160479 kg; source Luis Angel Lopez 2015; lognormal variance with pedigree 0.118177, pedigree (2,1,3,1,1)
  Calculated based on literature values or expert estimation: The total amount of nutrient (Personal written communication, Luis Angel Lopez, Yara, 2015) multiplied by the share of fertiliser type (Personal written communication, Luis Angel Lopez, Yara, 2015). See supporting documentation 'WFLDB-Documentation.pdf' chapter 'Fertiliser application' for L3 and L4 data (https://ecoquery.ecoinvent.org/File/Reports).
  Corresponds to 5.5 kg/ha
  properties: wet mass 1 kg, dry mass 1 kg
- packaging, for pesticides: 0.000642063 kg; lognormal variance with pedigree 0.0532, pedigree (4,3,3,5,4)
  Total amount of active substance/s of pesticides needed for the production of apricot is calculated to be circa 3.21E-04 kg. Pesticide/s used in this dataset is/are: 'cyclic N-compound', 'glyphosate', 'phenoxy-compound', 'phthalimide-compound'. The total amount of active substance/s is doubled in order to account for the packaging of the dilluted product of pesticide/s that is/are applied. Therefore, 6.42E-04 kg of packaging for pesticides is justified with this exchange.
  properties: carbon content, fossil 0.85714, dry mass 1 kg, price 0.0642 EUR2005, wet mass 1 kg
- mowing, by motor mower: 0.000210444 ha; lognormal variance with pedigree 0.118177, pedigree (2,1,3,1,1)
  Proxy from Apricot FR.
- phosphate fertiliser, as P2O5: 0.00221623 kg; source Luis Angel Lopez 2015; lognormal variance with pedigree 0.118177, pedigree (2,1,3,1,1)
  Calculated based on literature values or expert estimation: The total amount of nutrient (Personal written communication, Luis Angel Lopez, Yara, 2015) multiplied by the share of fertiliser type (Personal written communication, Luis Angel Lopez, Yara, 2015). See supporting documentation 'WFLDB-Documentation.pdf' chapter 'Fertiliser application' for L3 and L4 data (https://ecoquery.ecoinvent.org/File/Reports).
  Corresponds to 7.5 kg/ha
  properties: wet mass 1 kg, dry mass 1 kg

## Inputs from nature
- Transformation, from permanent crop, irrigated [natural resource, land]: 0.0263054 m2; lognormal variance with pedigree 0.0382144, pedigree (2,1,3,1,1)
  10000 m2 divided by the life time of the perennial crop (20 years).
- Occupation, permanent crop, irrigated [natural resource, land]: 0.527529 m2*year; lognormal variance with pedigree 0.0140616, pedigree (2,1,3,1,1)
  Related to the duration from harvest date of previous crop to harvest date of main crop.
- Transformation, to permanent crop, irrigated [natural resource, land]: 0.0263054 m2; lognormal variance with pedigree 0.0382144, pedigree (2,1,3,1,1)
  10000 m2 divided by the life time of the perennial crop (20 years).
- Carbon dioxide, in air [natural resource, in air]: 0.255873 kg; lognormal variance with pedigree 0.00784984, pedigree (2,2,3,1,1)
  CO2 uptake by biomass
- Energy, gross calorific value, in biomass [natural resource, biotic]: 2.71051 MJ; lognormal variance with pedigree 0.00784984, pedigree (2,2,3,1,1)
  Gross energy content is related to MJ/kg dry matter of product. Source: ecoinvent data

## Emissions to nature
- Iprodion [soil, agricultural]: 9.14833e-5 kg; lognormal variance with pedigree 0.0387216, pedigree (2,2,3,1,1)
  Calculated value - 100% emission in soil. See 'WFLDB-Guidelines.pdf', available at https://ecoquery.ecoinvent.org/File/Reports.
- Zinc, ion [water, surface water]: 1.81876e-7 kg; source Freiermuth R.  2006; lognormal variance with pedigree 0.350938, pedigree (2,2,3,1,1)
  Calculated value - Freiermuth (2006). See 'WFLDB-Guidelines.pdf', available at https://ecoquery.ecoinvent.org/File/Reports.
- Cadmium, ion [water, ground-]: 2.12427e-9 kg; source Freiermuth R.  2006; lognormal variance with pedigree 0.350938, pedigree (2,2,3,1,1)
  (same comment as for Zinc, ion)
- Lead [water, surface water]: 3.602e-8 kg; source Freiermuth R.  2006; lognormal variance with pedigree 0.350938, pedigree (2,2,3,1,1)
  (same comment as for Zinc, ion)
- Chromium, ion [water, ground-]: 1.00755e-6 kg; source Freiermuth R.  2006; lognormal variance with pedigree 0.350938, pedigree (2,2,3,1,1)
  (same comment as for Zinc, ion)
- Copper, ion [water, ground-]: 1.47032e-7 kg; source Freiermuth R.  2006; lognormal variance with pedigree 0.350938, pedigree (2,2,3,1,1)
  (same comment as for Zinc, ion)
- Nickel, ion [water, surface water]: 9.35264e-8 kg; source Freiermuth R.  2006; lognormal variance with pedigree 0.350938, pedigree (2,2,3,1,1)
  (same comment as for Zinc, ion)
- Carbon dioxide, fossil [air, non-urban air or from high stacks]: 0.00059061 kg; lognormal variance with pedigree 0.00784984, pedigree (2,2,3,1,1)
  Calculated value - CO2 emissions from urea and lime. See 'WFLDB-Guidelines.pdf', available at https://ecoquery.ecoinvent.org/File/Reports.
- Lead [water, ground-]: 6.5932e-9 kg; source Freiermuth R.  2006; lognormal variance with pedigree 0.350938, pedigree (2,2,3,1,1)
  (same comment as for Zinc, ion)
- Ammonia [air, non-urban air or from high stacks]: 0.000284904 kg; source EEA 2013; lognormal variance with pedigree 0.0387216, pedigree (2,2,3,1,1)
  Calculated value - EMEP/EEA (2013). See 'WFLDB-Guidelines.pdf', available at https://ecoquery.ecoinvent.org/File/Reports.
- Mercury [water, ground-]: 5.9566e-11 kg; source Freiermuth R.  2006; lognormal variance with pedigree 0.350938, pedigree (2,2,3,1,1)
  (same comment as for Zinc, ion)
- Indoxacarb [soil, agricultural]: 7.06484e-6 kg; lognormal variance with pedigree 0.0387216, pedigree (2,2,3,1,1)
  (same comment as for Iprodion)
- Nickel, ion [water, ground-]: 6.79364e-12 kg; source Freiermuth R.  2006; lognormal variance with pedigree 0.350938, pedigree (2,2,3,1,1)
  (same comment as for Zinc, ion)
- Dinitrogen monoxide [air, non-urban air or from high stacks]: 6.50809e-5 kg; source IPCC 2006; lognormal variance with pedigree 0.118664, pedigree (2,2,3,1,1)
  Calculated value - IPCC (2006). See 'WFLDB-Guidelines.pdf', available at https://ecoquery.ecoinvent.org/File/Reports.
- Zinc, ion [water, ground-]: 6.48166e-7 kg; source Freiermuth R.  2006; lognormal variance with pedigree 0.350938, pedigree (2,2,3,1,1)
  (same comment as for Zinc, ion)
- Phosphate [water, ground-]: 9.69987e-6 kg; source Prasuhn V.  2006; lognormal variance with pedigree 0.169866, pedigree (2,2,3,1,1)
  Calculated value - Prasuhn (2006). See 'WFLDB-Guidelines.pdf', available at https://ecoquery.ecoinvent.org/File/Reports.
- Water [air, non-urban air or from high stacks]: 0.478022 m3; lognormal variance with pedigree 0.118177, pedigree (2,1,3,1,1)
  Calculated value - Emission calculated from water balance. See 'WFLDB-Guidelines.pdf', available at https://ecoquery.ecoinvent.org/File/Reports.
- Water [water, surface water]: 0.404451 m3; lognormal variance with pedigree 0.118177, pedigree (2,1,3,1,1)
  (same comment as for Water)
- Phosphate [water, surface water]: 4.54695e-5 kg; source Prasuhn V.  2006; lognormal variance with pedigree 0.169866, pedigree (2,2,3,1,1)
  (same comment as for Phosphate)
- Cadmium [soil, agricultural]: 1.33605e-7 kg; = 1.48584210526e-07 + ( - 1.492638e-08)*heavyMetalUptakeSwitch; source Freiermuth R.  2006
  Comment on mathematicalRelation:
  1.48584210526e-07 from Calculated value - Freiermuth (2006). See 'WFLDB-Guidelines.pdf', available at https://ecoquery.ecoinvent.org/File/Reports.
  -1.492638e-08 from Crop, default, heavy metals uptake model
  Heavy metal uptake can be excluded by setting the parameter heavyMetalUptakeSwitch to zero.
- Water [water, ground-]: 0.101113 m3; lognormal variance with pedigree 0.118177, pedigree (2,1,3,1,1)
  (same comment as for Water)
- Phosphorus [water, surface water]: 4.63802e-6 kg; source Prasuhn V.  2006; lognormal variance with pedigree 0.169866, pedigree (2,2,3,1,1)
  Calculated value - Prasuhn (2006) and SQCB-Erosion. See 'WFLDB-Guidelines.pdf', available at https://ecoquery.ecoinvent.org/File/Reports.
- Chromium, ion [water, surface water]: 1.6896e-7 kg; source Freiermuth R.  2006; lognormal variance with pedigree 0.350938, pedigree (2,2,3,1,1)
  (same comment as for Zinc, ion)
- Chromium [soil, agricultural]: 4.89587e-7 kg; = 5.69894736842e-07 + ( - 8.0115e-08)*heavyMetalUptakeSwitch; source Freiermuth R.  2006
  Comment on mathematicalRelation:
  5.69894736842e-07 from Calculated value - Freiermuth (2006). See 'WFLDB-Guidelines.pdf', available at https://ecoquery.ecoinvent.org/File/Reports.
  -8.0115e-08 from Crop, default, heavy metals uptake model
  Heavy metal uptake can be excluded by setting the parameter heavyMetalUptakeSwitch to zero.
- Lead [soil, agricultural]: 1.36811e-7 kg; = 2.16357894737e-07 + ( - 7.949319e-08)*heavyMetalUptakeSwitch; source Freiermuth R.  2006
  Comment on mathematicalRelation:
  2.16357894737e-07 from Calculated value - Freiermuth (2006). See 'WFLDB-Guidelines.pdf', available at https://ecoquery.ecoinvent.org/File/Reports.
  -7.949319e-08 from Crop, default, heavy metals uptake model
  Heavy metal uptake can be excluded by setting the parameter heavyMetalUptakeSwitch to zero.
- Copper [soil, agricultural]: -8.996e-7 kg; = 7.42e-08 + ( - 9.741543e-07)*heavyMetalUptakeSwitch; source Freiermuth R.  2006
  Comment on mathematicalRelation:
  7.42e-08 from Calculated value - Freiermuth (2006). See 'WFLDB-Guidelines.pdf', available at https://ecoquery.ecoinvent.org/File/Reports.
  -9.741543e-07 from Crop, default, heavy metals uptake model
  Heavy metal uptake can be excluded by setting the parameter heavyMetalUptakeSwitch to zero.
- Mercury [soil, agricultural]: -3.69291e-9 kg; = 2.26736842105e-09 + ( - 5.961732e-09)*heavyMetalUptakeSwitch; source Freiermuth R.  2006
  Comment on mathematicalRelation:
  2.26736842105e-09 from Calculated value - Freiermuth (2006). See 'WFLDB-Guidelines.pdf', available at https://ecoquery.ecoinvent.org/File/Reports.
  -5.961732e-09 from Crop, default, heavy metals uptake model
  Heavy metal uptake can be excluded by setting the parameter heavyMetalUptakeSwitch to zero.
- Cadmium, ion [water, surface water]: 1.71711e-9 kg; source Freiermuth R.  2006; lognormal variance with pedigree 0.350938, pedigree (2,2,3,1,1)
  (same comment as for Zinc, ion)
- Nickel [soil, agricultural]: 9.54115e-8 kg; = 2.49005263158e-07 + ( - 1.535562e-07)*heavyMetalUptakeSwitch; source Freiermuth R.  2006
  Comment on mathematicalRelation:
  2.49005263158e-07 from Calculated value - Freiermuth (2006). See 'WFLDB-Guidelines.pdf', available at https://ecoquery.ecoinvent.org/File/Reports.
  -1.535562e-07 from Crop, default, heavy metals uptake model
  Heavy metal uptake can be excluded by setting the parameter heavyMetalUptakeSwitch to zero.
- Zinc [soil, agricultural]: -2.71116e-6 kg; = 1.99515789474e-06 + ( - 4.707381e-06)*heavyMetalUptakeSwitch; source Freiermuth R.  2006
  Comment on mathematicalRelation:
  1.99515789474e-06 from Calculated value - Freiermuth (2006). See 'WFLDB-Guidelines.pdf', available at https://ecoquery.ecoinvent.org/File/Reports.
  -4.707381e-06 from Crop, default, heavy metals uptake model
  Heavy metal uptake can be excluded by setting the parameter heavyMetalUptakeSwitch to zero.
- Captan [soil, agricultural]: 0.000203061 kg; lognormal variance with pedigree 0.0387216, pedigree (2,2,3,1,1)
  (same comment as for Iprodion)
- Copper, ion [water, surface water]: 2.10554e-7 kg; source Freiermuth R.  2006; lognormal variance with pedigree 0.350938, pedigree (2,2,3,1,1)
  (same comment as for Zinc, ion)
- Nitrogen oxides [air, non-urban air or from high stacks]: 0.000114092 kg; source EEA 2013; lognormal variance with pedigree 0.118664, pedigree (2,2,3,1,1)
  Calculated value - EEA/EMEP (2013). See 'WFLDB-Guidelines.pdf', available at https://ecoquery.ecoinvent.org/File/Reports.
- Glyphosate [soil, agricultural]: 1.58331e-5 kg; lognormal variance with pedigree 0.0387216, pedigree (2,2,3,1,1)
  (same comment as for Iprodion)
- 2,4-D [soil, agricultural]: 3.58911e-6 kg; lognormal variance with pedigree 0.0387216, pedigree (2,2,3,1,1)
  (same comment as for Iprodion)
- Mercury [water, surface water]: 2.63596e-10 kg; source Freiermuth R.  2006; lognormal variance with pedigree 0.350938, pedigree (2,2,3,1,1)
  (same comment as for Zinc, ion)

## Sampling procedure
WFLDB Methodological Guidelines for the Life Cycle Inventory of Agricultural Products in the latest version, available at: https://ecoquery.ecoinvent.org/File/Reports. Data sources: Data were categorised from level 0 (L0) to level (L4) as follows: L0 = estimate, proxy; L1 = statistical data (e.g. FAOSTAT); L2 = L1 adapted to crop and country; L3 = literature data or L1 resp. L2 data approved by experts; medium detailing (i.e. kg of total N-fertiliser); L4 = L3 data of high detailing (i.e. portion N-fertiliser types).In this dataset data were obtained for yield: L3; Fertilisers: L4; Pesticides: L1; Machinery: L0; Irrigation: L2. For information regarding the calculation of individual exchanges see supporting documentation WFLDB-Documentation.pdf.

## Extrapolations
If used, extrapolations are documented on the flow level.

## Review by Assumpció ANTON 2016-05-30
Be aware that the use of statistics in input calculations could provide some specific inputs not common for specific crops, this should be corrected if better information is available and better reflexed in DQR . Currently, I would dissent for some of good marks provided, being a revision of criteria applied advisable.

Pesticides will need to be amended periodically checking for update of pesticides' ban.
