# white asparagus production

Dataset: EcoSpold 2, unit process
Geography: CN
Time period: 2009-01-01 to 2019-12-31
Technology level: current
Classification: ISIC rev.4 ecoinvent: 0113:Growing of vegetables and melons, roots and tubers
Tags: WFLDB
Scenario: Business-as-Usual
System model: Allocation at the point of substitution
Generated by: Eliane Riedener
Published in: Nemecek T. 2015
Database: ecoinvent
isCopyrightProtected: true
accessRestrictedTo: 1

## General comment
This dataset represents the production of 1 kg of asparagus. The average yield from 2009 - 2012 is 5.3 t/ha. The data are representative for asparagus production in China for the export market based on average data over the country. Mineral NPK fertiliser input is 80-60-40 kg/ha. Organic fertilisers applied amount to 0.17 m3/ha of liquid manure and 0.14 t/ha of solid manure. Total active ingredients (a.i.) applied as pesticides amount to 3.6 kg a.i./ha.
The dataset was modelled within the project 'World Food LCA database (WFLDB)'. The aim of this project was to provide inventories of a broad variety of agricultural products and processes and to cover for each product at least 50% of the global export market. The share of asparagus produced in China amounts to 88% of the global production (tonnage produced in 2010). The production system regarded in this dataset aimed at representing asparagus produced in China for the export market.
PEF-Quality: data quality rating (DQR) = 2.8 (i.e. good quality). This dataset refers to an average situation; for specific situations exchanges might differ substantially due to site specific parameters

## Included activities start
This activity starts with the nursery producing asparagus crown (seedlings).

## Included activities end
This activity ends with the removal of asparagus roots after the productive phase (7 years). The dataset includes all activities of a year in a year in the productive phase of the asparagus field including the establishment phase (2 years) per year of lifetime (9 years).
The establishment phase of the asparagus field includes the nursery, manual planting, soil cultivation (plough), fertilisation (manure) and PE foil.
The productive phase of the asparagus field includes machine operations, corresponding infrastructure, fuel use and sheds. Machine operations in the productive phase are: soil cultivation, fertiliser and pesticide application, manual harvesting and irrigation. Further, direct field emissions and land use change are included. At the end of the productive phase the field is cleared by removing the asparagus roots.
Heavy metal uptake by the crop is considered.
The inputs of asparagus crowns (seedlings), fertilisers and pesticides as well as packaging of fertilisers and pesticides are considered. The dataset doesn't include emissions from manure storage because these are within the system boundary of animal production. Heavy metal uptake by the crop is considered.
Statistical data from FAO used to assess land use change is incomplete for China. The original land use of 40.9% of annual cropland and 100% of perennial cropland transformed in the last 20 years is unknown. Land use change impacts may therefore be underestimated.

## Technology
Conventional production

## Parameters
- LUC_crop_specific: 1
  This parameter allows to switch between a 'crop specific' and a 'country specific' approach when calculating the LUC of a crop. By default, the chosen approach is 'crop specific', so the value of the parameter is 1. If you want to apply a 'country specific' approach, turn the parameter to 0.
- heavyMetalUptakeSwitch: 1

## Reference product
- white asparagus: 1 kg; By-product classification allocatable product; CPC 01211: Asparagus
  Reference flow: Yield = 5302.6 kg/ha
  production volume 6.92788e9 kg
    Source: FAOSTAT. Average, 2009-2012
  property price 2.57 EUR2005
    Calculated from the trade statistics for the year 2005 published by the UN (COMTRADE database, accessed 20151105) as an average of 5 biggest importers of asparagus in the world; USA, DE, JP, CA and FR. Comtrade cathegory: 70920: Asparagus, fresh or chilled.
  property carbon content 0.03149
    carbon content on a dry matter basis (reserved; not for manual entry)
  properties: wet mass 1 kg, carbon content, non-fossil 0.03149, carbon content, fossil 0, water content 13.0845, water in wet mass 0.929 kg, dry mass 0.071 kg, carbon allocation 0.00223579 kg

## Inputs from technosphere
- diphenylether-compound: 1.78638e-5 kg; lognormal variance with pedigree 0.00784984, pedigree (2,2,3,1,1)
  Proxy: Source for total amount of pesticides: extrapolated from MEXALCA. Active ingredient is calculated based on Ecoinvent dataset Asparagus FR. For calculations see supporting documentation 'WFLDB-Documentation.pdf' (https://ecoquery.ecoinvent.org/File/Reports).
  properties: carbon content, fossil 0.560061, wet mass 1 kg, dry mass 1 kg
- manure, solid, cattle: 0.0173606 kg; source Miles Harriman 2015; lognormal variance with pedigree 0.118177, pedigree (2,1,3,1,1)
  Calculated based on literature values: The total amount of manure (Personal written communication, Miles Harriman, Yara, 2015) multiplied by the country-share of manure per animal category (FAOSTAT 2015). See supporting documentation 'WFLDB-Documentation.pdf' chapter 'Fertiliser application' (https://ecoquery.ecoinvent.org/File/Reports).
  Corresponds to 92.1 kg/ha
  properties: water content 3.5454, wet mass 1 kg, dry mass 0.22 kg, carbon content, non-fossil 0.441
- pyrethroid-compound: 5.06873e-7 kg; lognormal variance with pedigree 0.00784984, pedigree (2,2,3,1,1)
  (same comment as for diphenylether-compound)
  properties: wet mass 1 kg, carbon content, fossil 0.623, dry mass 1 kg
- tillage, ploughing: 2.69415e-5 ha; lognormal variance with pedigree 0.118177, pedigree (2,1,3,1,1)
  Proxy: Similar crop and country used.
- asparagus seedling, for planting: 0.673519 unit; lognormal variance with pedigree 0.00784984, pedigree (2,2,3,1,1)
  Proxy: Similar crop and country used.
  properties: water content 0.73, wet mass 1 kg, carbon content, non-fossil 0.439481, dry mass 0.578035 kg
  note on carbon content, non-fossil: calculation: C-content of components according to ecoinvent report No. 15a. Source of composition: https://ndb.nal.usda.gov/ndb/search/. Unspecific seedling used as proxy.
- poultry manure, dried: 0.00876813 kg; source Miles Harriman 2015; lognormal variance with pedigree 0.118177, pedigree (2,1,3,1,1)
  Calculated based on literature values: The total amount of manure (Personal written communication, Miles Harriman, Yara, 2015) multiplied by the country-share of manure per animal category (FAOSTAT 2015). See supporting documentation 'WFLDB-Documentation.pdf' chapter 'Fertiliser application' (https://ecoquery.ecoinvent.org/File/Reports).
  Corresponds to 46.5 kg/ha
  properties: nickel content 4e-5, nitrogen content 0.532, potassium content 0.024, wet mass 1 kg, dry mass 0.865 kg, mercury content 2e-7, lead content 2.92e-6, copper content 4.38e-5, cadmium content 2.92e-7, phosphorus content 0.0167, zinc content 0.000349, carbon content, non-fossil 0.33389, water content 0.156069
- horticultural fleece: 0.269415 m2; lognormal variance with pedigree 0.118177, pedigree (2,1,3,1,1)
  Proxy: Similar crop and country used. Amount of fleece used to cover 1kg of asparagus
  properties: carbon content, fossil 0.85714, wet mass 1 kg, dry mass 1 kg
  note on carbon content, fossil: Polypropylene is formed by the polymerisation of propylene, C3H6
- tillage, harrowing, by spring tine harrow: 0.000188587 ha; lognormal variance with pedigree 0.118177, pedigree (2,1,3,1,1)
  Proxy: Similar crop and country used.
- irrigation: 0.771133 m3; lognormal variance with pedigree 0.118177, pedigree (2,1,3,1,1)
  Calculated value: The total amount of water used for irrigation (calculated from evapotranspiration, Pfister et al. 2011) multiplied by the country-share of irrigation technique (WFLDB-Guidelines.pdf, Appendix 6.1). See supporting documentation 'WFLDB-Documentation.pdf' chapter 'Water use for irrigation' for L2 data (https://ecoquery.ecoinvent.org/File/Reports).
  properties: dry mass 0.11 kg, wet mass 1000 kg, water content 9089.91
- liquid manure spreading, by vacuum tanker: 3.29989e-5 m3; lognormal variance with pedigree 0.118177, pedigree (2,1,3,1,1)
  This amount corresponds to the input of liquid manure.
- packaging, for pesticides: 0.00135786 kg; lognormal variance with pedigree 0.0532, pedigree (4,3,3,5,4)
  Total amount of active substance/s of pesticides needed for the production of white asparagus is calculated to be circa 6.79E-04 kg. Pesticide/s used in this dataset is/are: '[thio]carbamate-compound', 'acetamide-anillide-compound, unspecified', 'cyclic N-compound', 'dinitroaniline-compound', 'diphenylether-compound', 'dithiocarbamate-compound', 'nitrile-compound', 'organophosphorus-compound, unspecified', 'pyrethroid-compound', 'triazine-compound, unspecified'. The total amount of active substance/s is doubled in order to account for the packaging of the dilluted product of pesticide/s that is/are applied. Therefore, 1.36E-03 kg of packaging for pesticides is justified with this exchange.
  properties: dry mass 1 kg, wet mass 1 kg, price 0.0642 EUR2005, carbon content, fossil 0.85714
- application of plant protection product, by field sprayer: 0.00150869 ha; lognormal variance with pedigree 0.118664, pedigree (2,2,3,1,1)
  Proxy: Extrapolated using a modified MEXALCA-approach (Roches et al. 2010; Nemecek et al. 2012). See supporting documentation 'WFLDB-Documentation.pdf' chapter 'Machinery processes' for L1 data (https://ecoquery.ecoinvent.org/File/Reports). Corresponds to 8 applications per year.
- packaging, for fertilisers: 0.0678912 kg; lognormal variance with pedigree 0.0532, pedigree (4,3,3,5,4)
  Total amount of active substance/s of fertilisers needed for the production of 'white asparagus' is calculated to be circa 3.39E-02 kg. Fertiliser/s used in this dataset is/are: 'ammonium nitrate, as N', 'phosphate fertiliser, as P2O5', 'potassium chloride, as K2O', 'urea, as N'. The total amount of active substance/s is doubled in order to account for the packaging of the dilluted product of fertiliser/s that is/are applied. Therefore, 6.79E-02 kg of packaging for fertilisers is justified with this exchange.
  properties: price 0.0642 EUR2005, dry mass 1 kg, wet mass 1 kg, carbon content, fossil 0.825301
  note on carbon content, fossil: Considering a chemical formula (C2H4)n for polyethylene, carbon content-fossil is calculated to be 0.856286 kg of Carbon per kg of dry mass.
- fertilising, by broadcaster: 0.00056576 ha; lognormal variance with pedigree 0.118177, pedigree (2,1,3,1,1)
  Proxy: Similar crop and country used. Corresponds to 3 applications per year.
- transport, tractor and trailer, agricultural: 0.00199996 metric ton*km; lognormal variance with pedigree 0.156439, pedigree (4,1,3,1,1)
  On-farm transport: Yield (in tonnes) multiplied by the average distance from field to farm. The distance was assumed to be 2 km (proxy).
- solid manure loading and spreading, by hydraulic loader and spreader: 0.0261287 kg; lognormal variance with pedigree 0.118177, pedigree (2,1,3,1,1)
  This amount corresponds the input of solid manure.
- [thio]carbamate-compound: 3.40456e-5 kg; lognormal variance with pedigree 0.00784984, pedigree (2,2,3,1,1)
  (same comment as for diphenylether-compound)
  properties: wet mass 1 kg, carbon content, fossil 0.626349, dry mass 1 kg
- acetamide-anillide-compound, unspecified: 0.000135674 kg; lognormal variance with pedigree 0.00784984, pedigree (2,2,3,1,1)
  (same comment as for diphenylether-compound)
  properties: carbon content, fossil 0.659175, dry mass 1 kg, wet mass 1 kg
- land use change, annual crop: 0.000124731 ha; = 0.000124731263908*LUC_crop_specific+2.42333949383e-05*(1-LUC_crop_specific)
  Calculated value. Land use change (LUC) combines land transformation areas calculated with the adapted 'Direct Land Use Change Assessment Tool' version 2014 developed by Blonk Consultants and the carbon losses from soil organic carbon (SOC) and vegetation (VEG) as calculated in ecoinvent v3. See 'WFLDB-Guidelines.pdf', available at https://ecoquery.ecoinvent.org/File/Reports.
- ammonium nitrate, as N: 0.00452608 kg; source Miles Harriman 2015; lognormal variance with pedigree 0.118177, pedigree (2,1,3,1,1)
  Calculated based on literature values or expert estimation: The total amount of nutrient (Personal written communication, Miles Harriman, Yara, 2015) multiplied by the share of fertiliser type (Personal written communication, Miles Harriman, Yara, 2015). See supporting documentation 'WFLDB-Documentation.pdf' chapter 'Fertiliser application' for L3 and L4 data (https://ecoquery.ecoinvent.org/File/Reports).
  Corresponds to 24.0 kg/ha
  properties: dry mass 1 kg, wet mass 1 kg
- cyclic N-compound: 2.7986e-5 kg; lognormal variance with pedigree 0.00784984, pedigree (2,2,3,1,1)
  (same comment as for diphenylether-compound)
  properties: dry mass 1 kg, carbon content, fossil 0.641962, wet mass 1 kg
- urea, as N: 0.0105609 kg; source Miles Harriman 2015; lognormal variance with pedigree 0.118177, pedigree (2,1,3,1,1)
  Calculated based on literature values or expert estimation: The total amount of nutrient (Personal written communication, Miles Harriman, Yara, 2015) multiplied by the share of fertiliser type (Personal written communication, Miles Harriman, Yara, 2015). See supporting documentation 'WFLDB-Documentation.pdf' chapter 'Fertiliser application' for L3 and L4 data (https://ecoquery.ecoinvent.org/File/Reports).
  Corresponds to 56.0 kg/ha
  properties: wet mass 1 kg, dry mass 1 kg, carbon content, fossil 0.2
- dinitroaniline-compound: 8.29289e-5 kg; lognormal variance with pedigree 0.00784984, pedigree (2,2,3,1,1)
  (same comment as for diphenylether-compound)
  properties: dry mass 1 kg, carbon content, fossil 0.55516, wet mass 1 kg
- phosphate fertiliser, as P2O5: 0.0113152 kg; source Miles Harriman 2015; lognormal variance with pedigree 0.118177, pedigree (2,1,3,1,1)
  Calculated based on literature values or expert estimation: The total amount of nutrient (Personal written communication, Miles Harriman, Yara, 2015) multiplied by the share of fertiliser type (Personal written communication, Miles Harriman, Yara, 2015). See supporting documentation 'WFLDB-Documentation.pdf' chapter 'Fertiliser application' for L3 and L4 data (https://ecoquery.ecoinvent.org/File/Reports).
  Corresponds to 60.0 kg/ha
  properties: dry mass 1 kg, wet mass 1 kg
- dithiocarbamate-compound: 4.76384e-5 kg; lognormal variance with pedigree 0.00784984, pedigree (2,2,3,1,1)
  (same comment as for diphenylether-compound)
  properties: wet mass 1 kg, carbon content, fossil 0.179339, dry mass 1 kg
- potassium chloride, as K2O: 0.00754347 kg; source Miles Harriman 2015; lognormal variance with pedigree 0.118177, pedigree (2,1,3,1,1)
  Calculated based on literature values or expert estimation: The total amount of nutrient (Personal written communication, Miles Harriman, Yara, 2015) multiplied by the share of fertiliser type (Personal written communication, Miles Harriman, Yara, 2015). See supporting documentation 'WFLDB-Documentation.pdf' chapter 'Fertiliser application' for L3 and L4 data (https://ecoquery.ecoinvent.org/File/Reports).
  Corresponds to 40.0 kg/ha
  properties: wet mass 1 kg, dry mass 1 kg
- nitrile-compound: 5.55781e-5 kg; lognormal variance with pedigree 0.00784984, pedigree (2,2,3,1,1)
  (same comment as for diphenylether-compound)
  properties: wet mass 1 kg, carbon content, fossil 0.344995, dry mass 1 kg
- manure, liquid, cattle: 0.0177284 kg; source Miles Harriman 2015; lognormal variance with pedigree 0.118177, pedigree (2,1,3,1,1)
  Calculated based on literature values: The total amount of manure (Personal written communication, Miles Harriman, Yara, 2015) multiplied by the country-share of manure per animal category (FAOSTAT 2015). See supporting documentation 'WFLDB-Documentation.pdf' chapter 'Fertiliser application' (https://ecoquery.ecoinvent.org/File/Reports).
  Corresponds to 0.094 m3/ha
  properties: wet mass 1 kg, dry mass 0.075 kg, water content 12.333, carbon content, non-fossil 0.68
- organophosphorus-compound, unspecified: 0.000254071 kg; lognormal variance with pedigree 0.00784984, pedigree (2,2,3,1,1)
  (same comment as for diphenylether-compound)
  properties: wet mass 1 kg, carbon content, fossil 0.260898, dry mass 1 kg
- manure, liquid, swine: 0.0134539 kg; source Miles Harriman 2015; lognormal variance with pedigree 0.118177, pedigree (2,1,3,1,1)
  Calculated based on literature values: The total amount of manure (Personal written communication, Miles Harriman, Yara, 2015) multiplied by the country-share of manure per animal category (FAOSTAT 2015). See supporting documentation 'WFLDB-Documentation.pdf' chapter 'Fertiliser application' (https://ecoquery.ecoinvent.org/File/Reports).
  Corresponds to 0.0713 m3/ha
  properties: water content 19, carbon content, non-fossil 0.64, dry mass 0.05 kg, wet mass 1 kg
- triazine-compound, unspecified: 2.26378e-5 kg; lognormal variance with pedigree 0.00784984, pedigree (2,2,3,1,1)
  (same comment as for diphenylether-compound)
  properties: carbon content, fossil 0.475616, dry mass 1 kg, wet mass 1 kg
- poultry manure, fresh: 0.000908273 kg; source Miles Harriman 2015; lognormal variance with pedigree 0.118177, pedigree (2,1,3,1,1)
  Calculated based on literature values: The total amount of manure (Personal written communication, Miles Harriman, Yara, 2015) multiplied by the country-share of manure per animal category (FAOSTAT 2015). See supporting documentation 'WFLDB-Documentation.pdf' chapter 'Fertiliser application' (https://ecoquery.ecoinvent.org/File/Reports).
  Corresponds to 0.00963 m3/ha
  properties: wet mass 1 kg, dry mass 0.38 kg, water content 1.63158, carbon content, non-fossil 0.33389

## Inputs from nature
- Carbon dioxide, in air [natural resource, in air]: 0.139332 kg; lognormal variance with pedigree 0.00784984, pedigree (2,2,3,1,1)
  CO2 uptake by biomass
- Occupation, annual crop [natural resource, land]: 1.89096 m2*year; lognormal variance with pedigree 0.0140616, pedigree (2,1,3,1,1)
  Related to the duration from harvest date of previous crop to harvest date of main crop.
- Transformation, from arable land, unspecified use [natural resource, land]: 0.209541 m2; lognormal variance with pedigree 0.0382144, pedigree (2,1,3,1,1)
  10000 m2 divided by the life time of the perennial crop (9 years).
- Transformation, to arable land, unspecified use [natural resource, land]: 0.209541 m2; lognormal variance with pedigree 0.0382144, pedigree (2,1,3,1,1)
  10000 m2 divided by the life time of the perennial crop (9 years).
- Energy, gross calorific value, in biomass [natural resource, biotic]: 1.47599 MJ; lognormal variance with pedigree 0.00784984, pedigree (2,2,3,1,1)
  Gross energy content is related to MJ/kg dry matter of product. Source: ecoinvent data.

## Emissions to nature
- Zinc [soil, agricultural]: 7.72788e-6 kg; = 1.02896692189e-05 + ( - 2.5617916871e-06)*heavyMetalUptakeSwitch; source Freiermuth R.  2006
  Comment on mathematicalRelation:
  1.02896692189e-05 from Calculated value - Freiermuth (2006). See 'WFLDB-Guidelines.pdf', available at https://ecoquery.ecoinvent.org/File/Reports.
  -2.5617916871e-06 from Crop, default, heavy metals uptake model
  Heavy metal uptake can be excluded by setting the parameter heavyMetalUptakeSwitch to zero.
- Acetamiprid [soil, agricultural]: 9.88541e-6 kg; lognormal variance with pedigree 0.0387216, pedigree (2,2,3,1,1)
  Calculated value - 100% emission in soil. See 'WFLDB-Guidelines.pdf', available at https://ecoquery.ecoinvent.org/File/Reports.
- Azoxystrobin [soil, agricultural]: 5.40608e-5 kg; lognormal variance with pedigree 0.0387216, pedigree (2,2,3,1,1)
  (same comment as for Acetamiprid)
- Lead [water, ground-]: 1.89341e-8 kg; source Freiermuth R.  2006; lognormal variance with pedigree 0.350938, pedigree (2,2,3,1,1)
  Calculated value - Freiermuth (2006). See 'WFLDB-Guidelines.pdf', available at https://ecoquery.ecoinvent.org/File/Reports. This emission might be overestimated in case of basic soils.
- Boscalid [soil, agricultural]: 0.00013197 kg; lognormal variance with pedigree 0.0387216, pedigree (2,2,3,1,1)
  (same comment as for Acetamiprid)
- Nickel, ion [water, surface water]: 3.38645e-7 kg; source Freiermuth R.  2006; lognormal variance with pedigree 0.350938, pedigree (2,2,3,1,1)
  Calculated value - Freiermuth (2006). See 'WFLDB-Guidelines.pdf', available at https://ecoquery.ecoinvent.org/File/Reports.
- Cadmium, ion [water, surface water]: 5.76755e-9 kg; source Freiermuth R.  2006; lognormal variance with pedigree 0.350938, pedigree (2,2,3,1,1)
  (same comment as for Nickel, ion)
- Difenoconazole [soil, agricultural]: 1.5446e-5 kg; lognormal variance with pedigree 0.0387216, pedigree (2,2,3,1,1)
  (same comment as for Acetamiprid)
- Nitrate [water, ground-]: 0.0454452 kg; source Faist Emmenegger M. 2009; lognormal variance with pedigree 0.169866, pedigree (2,2,3,1,1)
- Mancozeb [soil, agricultural]: 4.63379e-5 kg; lognormal variance with pedigree 0.0387216, pedigree (2,2,3,1,1)
  (same comment as for Acetamiprid)
- Cadmium, ion [water, ground-]: 7.71433e-9 kg; source Freiermuth R.  2006; lognormal variance with pedigree 0.350938, pedigree (2,2,3,1,1)
  (same comment as for Lead)
- Pyraclostrobin (prop) [soil, agricultural]: 3.31161e-5 kg; lognormal variance with pedigree 0.0387216, pedigree (2,2,3,1,1)
  (same comment as for Acetamiprid)
- Copper, ion [water, ground-]: 5.59235e-7 kg; source Freiermuth R.  2006; lognormal variance with pedigree 0.350938, pedigree (2,2,3,1,1)
  (same comment as for Lead)
- Clomazone [soil, agricultural]: 1.89058e-6 kg; lognormal variance with pedigree 0.0387216, pedigree (2,2,3,1,1)
  (same comment as for Acetamiprid)
- Nitrogen oxides [air, non-urban air or from high stacks]: 0.000598159 kg; source EEA 2013; lognormal variance with pedigree 0.118664, pedigree (2,2,3,1,1)
  Calculated value - EEA/EMEP (2013). See 'WFLDB-Guidelines.pdf', available at https://ecoquery.ecoinvent.org/File/Reports.
- Cycloxydim [soil, agricultural]: 1.85351e-5 kg; lognormal variance with pedigree 0.0387216, pedigree (2,2,3,1,1)
  (same comment as for Acetamiprid)
- Fluazifop [soil, agricultural]: 1.73761e-5 kg; lognormal variance with pedigree 0.0387216, pedigree (2,2,3,1,1)
  (same comment as for Acetamiprid)
- Glufosinate [soil, agricultural]: 0.000185351 kg; lognormal variance with pedigree 0.0387216, pedigree (2,2,3,1,1)
  (same comment as for Acetamiprid)
- Chromium, ion [water, ground-]: 3.64293e-6 kg; source Freiermuth R.  2006; lognormal variance with pedigree 0.350938, pedigree (2,2,3,1,1)
  (same comment as for Lead)
- Lead [water, surface water]: 9.56795e-8 kg; source Freiermuth R.  2006; lognormal variance with pedigree 0.350938, pedigree (2,2,3,1,1)
  (same comment as for Nickel, ion)
- Metribuzin [soil, agricultural]: 2.20197e-5 kg; lognormal variance with pedigree 0.0387216, pedigree (2,2,3,1,1)
  (same comment as for Acetamiprid)
- Dinitrogen monoxide [air, non-urban air or from high stacks]: 0.000446151 kg; source IPCC 2006; lognormal variance with pedigree 0.118664, pedigree (2,2,3,1,1)
  Calculated value - IPCC (2006). See 'WFLDB-Guidelines.pdf', available at https://ecoquery.ecoinvent.org/File/Reports.
- Carbon dioxide, fossil [air, non-urban air or from high stacks]: 0.0165805 kg; lognormal variance with pedigree 0.00784984, pedigree (2,2,3,1,1)
  Calculated value - CO2 emissions from urea and lime. See 'WFLDB-Guidelines.pdf', available at https://ecoquery.ecoinvent.org/File/Reports.
- Oryzalin [soil, agricultural]: 8.06649e-5 kg; lognormal variance with pedigree 0.0387216, pedigree (2,2,3,1,1)
  (same comment as for Acetamiprid)
- Dimethoate [soil, agricultural]: 6.17838e-5 kg; lognormal variance with pedigree 0.0387216, pedigree (2,2,3,1,1)
  (same comment as for Acetamiprid)
- Ammonia [air, non-urban air or from high stacks]: 0.00277732 kg; source EEA 2013; lognormal variance with pedigree 0.0387216, pedigree (2,2,3,1,1)
  Calculated value - EMEP/EEA (2013). See 'WFLDB-Guidelines.pdf', available at https://ecoquery.ecoinvent.org/File/Reports.
- Mercury [water, ground-]: 1.5413e-10 kg; source Freiermuth R.  2006; lognormal variance with pedigree 0.350938, pedigree (2,2,3,1,1)
  (same comment as for Lead)
- Zinc, ion [water, ground-]: 2.79203e-6 kg; source Freiermuth R.  2006; lognormal variance with pedigree 0.350938, pedigree (2,2,3,1,1)
  (same comment as for Lead)
- Water [water, surface water]: 0.322351 m3; lognormal variance with pedigree 0.118177, pedigree (2,1,3,1,1)
  Calculated value - Emission calculated from water balance. See 'WFLDB-Guidelines.pdf', available at https://ecoquery.ecoinvent.org/File/Reports.
- Deltamethrin [soil, agricultural]: 3.07683e-7 kg; lognormal variance with pedigree 0.0387216, pedigree (2,2,3,1,1)
  (same comment as for Acetamiprid)
- Copper, ion [water, surface water]: 7.41485e-7 kg; source Freiermuth R.  2006; lognormal variance with pedigree 0.350938, pedigree (2,2,3,1,1)
  (same comment as for Nickel, ion)
- Chromium, ion [water, surface water]: 5.64949e-7 kg; source Freiermuth R.  2006; lognormal variance with pedigree 0.350938, pedigree (2,2,3,1,1)
  (same comment as for Nickel, ion)
- Water [water, ground-]: 0.0805869 m3; lognormal variance with pedigree 0.118177, pedigree (2,1,3,1,1)
  (same comment as for Water)
- Water [air, non-urban air or from high stacks]: 0.368197 m3; lognormal variance with pedigree 0.118177, pedigree (2,1,3,1,1)
  (same comment as for Water)
- Lambda-cyhalothrin [soil, agricultural]: 1.85351e-7 kg; lognormal variance with pedigree 0.0387216, pedigree (2,2,3,1,1)
  (same comment as for Acetamiprid)
- Phosphorus [water, surface water]: 1.57932e-5 kg; source Prasuhn V.  2006; lognormal variance with pedigree 0.169866, pedigree (2,2,3,1,1)
  Calculated value - Prasuhn (2006) and SQCB-Erosion. See 'WFLDB-Guidelines.pdf', available at https://ecoquery.ecoinvent.org/File/Reports.
- Cadmium [soil, agricultural]: 5.63408e-7 kg; = 5.71530947083e-07 + ( - 8.12304680723e-09)*heavyMetalUptakeSwitch; source Freiermuth R.  2006
  Comment on mathematicalRelation:
  5.71530947083e-07 from Calculated value - Freiermuth (2006). See 'WFLDB-Guidelines.pdf', available at https://ecoquery.ecoinvent.org/File/Reports.
  -8.12304680723e-09 from Crop, default, heavy metals uptake model
  Heavy metal uptake can be excluded by setting the parameter heavyMetalUptakeSwitch to zero.
- Chromium [soil, agricultural]: 2.60001e-6 kg; = 2.64360879569e-06 + ( - 4.35991777619e-08)*heavyMetalUptakeSwitch; source Freiermuth R.  2006
  Comment on mathematicalRelation:
  2.64360879569e-06 from Calculated value - Freiermuth (2006). See 'WFLDB-Guidelines.pdf', available at https://ecoquery.ecoinvent.org/File/Reports.
  -4.35991777619e-08 from Crop, default, heavy metals uptake model
  Heavy metal uptake can be excluded by setting the parameter heavyMetalUptakeSwitch to zero.
- Copper [soil, agricultural]: 2.51682e-7 kg; = 7.81824010863e-07 + ( - 5.30142002037e-07)*heavyMetalUptakeSwitch; source Freiermuth R.  2006
  Comment on mathematicalRelation:
  7.81824010863e-07 from Calculated value - Freiermuth (2006). See 'WFLDB-Guidelines.pdf', available at https://ecoquery.ecoinvent.org/File/Reports.
  -5.30142002037e-07 from Crop, default, heavy metals uptake model
  Heavy metal uptake can be excluded by setting the parameter heavyMetalUptakeSwitch to zero.
- Mercury [water, surface water]: 1.11162e-9 kg; source Freiermuth R.  2006; lognormal variance with pedigree 0.350938, pedigree (2,2,3,1,1)
  (same comment as for Nickel, ion)
- Lead [soil, agricultural]: 5.48506e-7 kg; = 5.91766303323e-07 + ( - 4.32607841436e-08)*heavyMetalUptakeSwitch; source Freiermuth R.  2006
  Comment on mathematicalRelation:
  5.91766303323e-07 from Calculated value - Freiermuth (2006). See 'WFLDB-Guidelines.pdf', available at https://ecoquery.ecoinvent.org/File/Reports.
  -4.32607841436e-08 from Crop, default, heavy metals uptake model
  Heavy metal uptake can be excluded by setting the parameter heavyMetalUptakeSwitch to zero.
- Zinc, ion [water, surface water]: 7.22212e-7 kg; source Freiermuth R.  2006; lognormal variance with pedigree 0.350938, pedigree (2,2,3,1,1)
  (same comment as for Nickel, ion)
- Mercury [soil, agricultural]: 1.13381e-8 kg; = 1.45824689775e-08 + ( - 3.24441881341e-09)*heavyMetalUptakeSwitch; source Freiermuth R.  2006
  Comment on mathematicalRelation:
  1.45824689775e-08 from Calculated value - Freiermuth (2006). See 'WFLDB-Guidelines.pdf', available at https://ecoquery.ecoinvent.org/File/Reports.
  Heavy metal uptake can be excluded by setting the parameter heavyMetalUptakeSwitch to zero.
- Phosphate [water, ground-]: 4.05744e-5 kg; source Prasuhn V.  2006; lognormal variance with pedigree 0.169866, pedigree (2,2,3,1,1)
  Calculated value - Prasuhn (2006). See 'WFLDB-Guidelines.pdf', available at https://ecoquery.ecoinvent.org/File/Reports. This emission might be overestimated in case of basic soils.
- Nickel [soil, agricultural]: 1.08235e-6 kg; = 1.16591860597e-06 + ( - 8.35664240184e-08)*heavyMetalUptakeSwitch; source Freiermuth R.  2006
  Comment on mathematicalRelation:
  1.16591860597e-06 from Calculated value - Freiermuth (2006). See 'WFLDB-Guidelines.pdf', available at https://ecoquery.ecoinvent.org/File/Reports.
  -8.35664240184e-08 from Crop, default, heavy metals uptake model
  Heavy metal uptake can be excluded by setting the parameter heavyMetalUptakeSwitch to zero.

## Sampling procedure
WFLDB Methodological Guidelines for the Life Cycle Inventory of Agricultural Products in the latest version, available at: (Report section: https://v30.ecoquery.ecoinvent.org/File/Reports). Data sources: Data were categorised from level 0 (L0) to level (L4) as follows: L0 = estimate, proxy; L1 = statistical data (e.g. FAOSTAT); L2 = L1 adapted to crop and country; L3 = literature data or L1 resp. L2 data approved by experts; medium detailing (i.e. kg of total N-fertiliser); L4 = L3 data of high detailing (i.e. portion N-fertiliser types).In this dataset data were obtained for yield: L3; Fertilisers: L4; Pesticides: L1; Machinery: L0 (proxy from asparagus FR); Irrigation: L2. For information regarding the calculation of individual exchanges see supporting documentation WFLDB-Documentation.pdf.

## Extrapolations
This dataset has been extrapolated from year 2012 to the year of the calculation (2019). The uncertainty has been adjusted accordingly.

## Review by Assumpció ANTON 2016-05-30
Be aware that the use of statistics in input calculations could provide some specific inputs not common for specific crops, this should be corrected if better information is available and better reflexed in DQR . Currently, I would dissent for some of good marks provided, being a revision of criteria applied advisable.

Pesticides will need to be amended periodically checking for update of pesticides' ban.
