# electricity production, natural gas, aluminium industry

Dataset: EcoSpold 2, unit process
Geography: IAI Area, South America
Time period: 2015-01-01 to 2019-12-31
Technology level: current
Classification: ISIC rev.4 ecoinvent: 3510:Electric power generation, transmission and distribution
Classification: EcoSpold01Categories: hard coal/power plants
Tags: re-labelling activity; electricity, primary aluminium industry
Scenario: Business-as-Usual
System model: Allocation at the point of substitution
Generated by: Pascal Lesage
Database: ecoinvent
isCopyrightProtected: true
accessRestrictedTo: 1

## General comment
This is a dataset used to create an aluminium industry specific electricity market for 'aluminium production Area 3' (South America). IThe production volume represents the total amount of electricity from natural gas used in the region for aluminium production (electrolysis and ingot casting). The dataset also identifies the countries providing the electricity from natural gas fired power plants.
Electricity markets specific to the aluminium-industry are needed in an LCI database because primary aluminium production is very energy intensive, and hence the location of production plants is often determined by access to large amounts of cheap electricity, which often results in an electricity mix that is different from the general grid mix of the countries where the production plants are located.
It is assumed that the production of electricity in general and in aluminium industry specific power plants is identical. Details on actual electricity generation with each technology can be found in the corresponding datasets.
Calculations are detailed in the report 'Calculating grid mixes for the aluminium industry in ecoinvent v3', available on the ecoinvent website.

## Included activities start
Re-labelling dataset, not representing a real transformation activity. Conceptually, the activity can be said to start with the production of electricity.

## Included activities end
Re-labelling dataset, not representing a real transformation activity. Conceptually, the activity can be said to end with a given amount of high voltage electricity labelled as specifically used for the production of electricity.

## Geography
Aluminium producing South American countries (AR, BR, VE)

## Time period
Production volume updated with 2015 data from IAI

## Reference product
- electricity, high voltage, aluminium industry: 1 kWh; = RoW+BR_m+BR_se+BR_ne; CPC 17100: Electrical energy; By-product classification allocatable product
  Expressed as sum of contributing technologies (inputs) to allow uncertainty analysis: each technology share is uncertain, and in a Monte Carlo analysis will always be normalized by the sum contribution of each technology
  production volume 6.08883e9 kWh
    The production volume, which is ultimately used to determine the share of natural gas-based electricity in the downstream market for aluminium industry specific high voltage electricity, is calculated by multiplying the following data:
    (1) public estimates of the electricity mix used to produce aluminium in the 'aluminium production region 3' (South America), provided by the International Aluminium Institute (IAI), see http://www.world-aluminium.org/statistics/. These estimates are based on the subset of aluminium producers that provide information to the IAI.
    (2) primary aluminium production volumes of each aluminium producing country in Area 3, also provided by IAI.
    (3) global average electricity requirements, per tonne primary aluminium, for both Söderberg and prebake electrolysis technologies, as well as the Area 3-specific proportion of aluminium produced by each technology.
    (4) electricity compensating line and transformation losses from production to consumption as medium voltage electricity, Losses estimated using country-level ecoinvent v3 data for Brazil and ROW data for other Area 3.2 aluminium producing countries.
    (5) electricity consumed in ingot casting.
  property price 0.0977 EUR2005
    Calculated in temporary price data. 94% of the average price (to account for a 6% loss in transformation and transmission) for electricity for industrial consumersin 2005 (excluded taxes). From IEA.

## Inputs from technosphere
- electricity, high voltage: 0.201901 kWh; name BR_se; = 0.343427311595*0.5879
  Calculated amount (see general comments). 0.34 kWh are supplied from Brazil. This amount is split over electricity production from natural gas in the different Brazilian grids according to their annual production volumes. 58.79% of electricity produced in conventional natural gas plants in Brazil, is produced in the South-eastern grid area.
- electricity, high voltage: 0.0435122 kWh; name BR_m; = 0.343427311595*0.1267; lognormal variance with pedigree 0.0053, pedigree (3,2,3,1,2)
  Calculated amount (see general comments). 0.34 kWh are supplied from Brazil. This amount is split over electricity production from natural gas in the different Brazilian grids according to their annual production volumes. 12.67% of electricity produced in conventional natural gas plants in Brazil, is produced in the Mid-western grid area.
- electricity, high voltage: 0.656573 kWh; name RoW; lognormal variance with pedigree 0.0192, pedigree (4,5,3,1,2)
  Calculated amount (see general comments). Activity link to GLO due to the electricity production of some aluminium producing countries not being modeled in ecoinvent, see general comments.
- electricity, high voltage: 0.0980142 kWh; name BR_ne; = 0.343427311595*0.2854
  Calculated amount (see general comments). 0.34 kWh are supplied from Brazil. This amount is split over electricity production from natural gas in the different Brazilian grids according to their annual production volumes. 28.54% of electricity produced in conventional natural gas plants in Brazil, is produced in the North-eastern grid area.

## Sampling procedure
IAI data used for total electricity used in the production of aluminium that is from natural gas power plants. Data based on 100% of regional aluminium production.

## Extrapolations
This dataset has been extrapolated from year 2015 to the year of the calculation (2019). The uncertainty has been adjusted accordingly.
