# treatment of waste bitumen sheet, municipal incineration with fly ash extraction

Dataset: EcoSpold 2, unit process
Geography: CH
Time period: 2006-01-01 to 2019-12-31
Technology level: current
Classification: ISIC rev.4 ecoinvent: 3821:Treatment and disposal of non-hazardous waste
Synonyms: municipal waste incineration; Siedlungsabfallverbrennung; Kehrichtverbrennung
Scenario: Business-as-Usual
System model: Allocation at the point of substitution
Share of production covered: 100 %
Generated by: Gabor Doka
Published in: Doka G. 2015
Database: ecoinvent
isCopyrightProtected: true
accessRestrictedTo: 1

## General comment
This dataset represents the activity of waste disposal of waste bitumen sheet in a municipal solid waste incinerator (MSWI) // Recommended use of this dataset: For disposal of bulk or small parts of bitumen sheet (waste building product). Contains 24% inorganic filler. // Inventoried waste contains 6% PE; 7% PS; 24% inert material; 63% bitumen; . // Waste composition (wet, in ppm): upper heating value 31.37 MJ/kg; lower heating value 30.06 MJ/kg; H2O 8922.8; O 139330; H 75813; C 633560; S 25273; N 3363.8; P 2.52; B n.a.; Cl 166.94; Br 62.324; F 1.8605; I n.a.; Ag n.a.; As 0.67925; Ba 27.039; Cd 3.6703; Co 2.5151; Cr 3.7414; Cu 13.161; Hg 0.073095; Mn 7.2257; Mo 0.3528; Ni 64.455; Pb 3.0312; Sb 3.5197; Se 0.38932; Sn 58.077; V 309.39; Zn 78.943; Be 0.062696; Sc n.a.; Sr 11.097; Ti 125.39; Tl 0.050157; W n.a.; Si 112000; Fe 392.12; Ca 159.13; Al 29.489; K n.a.; Mg 5.7538; Na 205.81; // Share of carbon in waste that is biogenic 0%. // Share of metals in waste not oxidised and bulk-recyclable (exclude very small or thin parts) Iron: 0%; Alu: 0%; Copper: 0%. // Recovery of metal scrap from bottom ash to recycling: 0g iron scrap, 0g aluminium scrap, 0g copper scrap. From this waste, the FLUWA process in the technology mix recovers 0.00402kg (DM) of a hydroxide sludge to be recycled in zinc furnaces. // Ultimately one kg of this waste produces 0.3551 kg of bottom ash (can include some washed ash) and 0.01447 kg of residues, which are landfilled (technology mix). Additional solidification of residues with 0.00579 kg of cement.Net energy production: 3.91MJ/kg electric energy and 7.58MJ/kg thermal energy. //

## Included activities start
waste incineration from waste reception gate and delivery into waste bunker at incinerator plant site (without transports to the incinerator)

## Included activities end
Waste-specific short-term emissions to water from leachate. Long-term emissions from landfill to ground water.

## Geography
Specific to the technology mix encountered in Switzerland in 2012.

## Technology
average Swiss MSWI plants in 2010 (grate incinerators) with electrostatic precipitator for fly ash (ESP), wet flue gas scrubber and 25% SNCR , 42.77% SCR-high dust , 32.68% SCR-low dust -DeNOx facilities and 0% without Denox (weighted according to mass of burnt waste, representing Swiss average). Efficiency of iron scrap separation from slag : 58%. Efficiency of non-ferrous scrap separation from slag : 31%. The technology mix for this dataset includes a filter ash treatment (FLUWA) of a share of 46.22%. Gross electric efficiency technology mix 15.84% and Gross thermal efficiency technology mix 28.51%

## Time period
Waste composition as given in literature reference, theoretical data or other source. Transfer coefficients for modern MSWI.

## Reference product
- waste bitumen sheet: 0 kg; CPC 39: Wastes or scraps; By-product classification Waste
  Main reference product of this activity (supply of disposal service).
  production volume 0 kg
    based on corresponding global production volume of MSW fraction in conventional MSWI (wo fly ash extraction) and scaled down to annual Swiss incinerated MSW mass of 3.02 mio. tonnes.
  property price 0 EUR2005
    Waste products are assigned a price of zero as they are assumed to require further treatment.
  property carbon content 0.63926
    carbon content on a dry matter basis (reserved; not for manual entry)
  properties: dry mass 0.99108 kg, hydrogen content 0.076495, barium content 2.7283e-5, fluorine content 1.8773e-6, oxygen content 0.14058, sulfur content 0.025501, bromine content 6.2885e-5, phosphorus content 2.5427e-6, nitrogen content 0.0033941, cobalt content 2.5378e-6, nickel content 6.5036e-5, chromium content 3.7751e-6, copper content 1.328e-5, arsenic content 6.8536e-7, cadmium content 3.7033e-6, chlorine content 0.00016844, mercury content 7.3753e-8, lead content 3.0585e-6, molybdenum content 3.5598e-7, manganese content 7.2908e-6, antimony content 3.5513e-6, titanium content 0.00012652, zinc content 7.9654e-5, beryllium content 6.3261e-8, tin content 5.86e-5, selenium content 3.9283e-7, silicon content 0.11301, vanadium content 0.00031217, sodium content 0.00020767, strontium content 1.1197e-5, carbon content, fossil 0.63926, magnesium content 5.8056e-6, thallium content 5.0609e-8, calcium content 0.00016056, water content 0.0090031, wet mass 1 kg, iron content 0.00039565, water in wet mass 0.0089228 kg, aluminium content 2.9754e-5, carbon allocation 0.633558 kg
- heat, for reuse in municipal waste incineration only: 1 MJ; CPC 17300: Steam and hot water; By-product classification allocatable product; pedigree (1,1,1,1,1)
  Net useful heat generated from this waste and used in internal MSWI plant energy redistribution.
  Uncertainty: uncertainty is calculated from uncertainties in waste composition and uncertainties in energy efficiency and the uncertainty in internal energy demand
  production volume 9.2963e7 MJ

## By-products
- heat, for reuse in municipal waste incineration only: 0 MJ; name E_th_prod_MSWI; CPC 17300: Steam and hot water; By-product classification allocatable product; pedigree (1,1,1,1,1)
  (same comment as for heat, for reuse in municipal waste incineration only)
  production volume 0 MJ
    calculated in proportion to reference product waste input to incinerator
  property true value relation 0.1842; name E_th_prod_MSWI_true_value_relation
    property to calculate "true value" from
  property exergy 0.1842 MJ; name E_th_prod_MSWI_exergy
    This exergy property is based on the exergy content of the product.
  property price 0.0106 EUR2005; name E_th_prod_MSWI_price_EUR2005
    Average European district heat price from Ecoheatcool and Euroheat 2005-2006, Ecoheat Work package 1: The European heat market. Final report. 10.6 EUR/GJ i s the price of district heat. http://www.solarthermalworld.org/files/Ecoheatcool%20WP1%20Web.pdf?download
- electricity, for reuse in municipal waste incineration only: 0 kWh; name E_el_prod_MSWI; CPC 17100: Electrical energy; By-product classification allocatable product; pedigree (1,1,1,1,1)
  Net electricity generated from this waste and used in internal MSWI plant energy redistribution.
  Uncertainty: uncertainty is calculated from uncertainties in waste composition and uncertainties in energy efficiency and the uncertainty in internal energy demand
  production volume 0 kWh
    calculated in proportion to reference product waste input to incinerator
  property true value relation 3.6; name E_el_prod_MSWI_true_value_relation
    property to calculate "true value" from
  property exergy 3.6 MJ; name E_el_prod_MSWI_exergy
    This exergy property is based on the exergy content of the product.
  property price 0.1 EUR2005; name E_el_prod_MSWI_price_EUR2005
    Estimated to be the same price as in case of electricity, medium voltage.
- zinc concentrate: 0 kg; CPC 14290: Other non-ferrous metal ores and concentrates (other than uranium or thorium ores and concentrates); By-product classification allocatable product
  Calculated value from the knowledge of the properties of both products.
  property price 0.38 EUR2005; name ByP_price_EUR2005
    Temporary price data. Calculated as 90% of purchasers price based on: Zinc content in concentrate 53%. Concentrate price per kg Zn 86.5% of refined Zn price (13.5% treatment charges according to CHR Metals Limited 2005: Dynamic cost curves. http://www.minecost.com/dynamic.pdf). 2004 zinc price from USGS (2007) Mineral commodity summaries 2007. <http://minerals.usgs.gov/minerals/pubs/mcs/2007/mcs2007.pdf> [Accessed 25 May 2010]
  property zinc content 0.53; name zinc_C_zinc_concentrate
    Zinc content on a dry matter basis. Value taken from teh "zinc mine operation" /GLO dataset.
  property dry mass 1 kg; name DM_zinc_concentrate
  property carbon content 0
    carbon content on a dry matter basis (reserved; not for manual entry)
  properties: wet mass 1 kg, water content 0, carbon content, non-fossil 0, carbon content, fossil 0, water in wet mass 0 kg, carbon allocation 0 kg

## Inputs from technosphere
- sodium hydroxide, without water, in 50% solution state: 4.49182e-5 kg; lognormal variance with pedigree 0.13845, pedigree (1,1,3,1,1)
  Auxilliary inputs for the flue gas treatment stage of the incinerator plant, and partially in the filter ash treatment (FLUWA).
  Uncertainty: uncertainty calculated from uncertainty in average NaOH input, of transfer coefficients in the incinerator, and the uncertainty of the waste composition of this waste
  properties: wet mass 1 kg, dry mass 1 kg
- process-specific burdens, slag landfill: 0 kg; pedigree (1,1,1,1,1)
  Mass-specific expenditures required for landfilling of bottom ash.;activityLink introduced to establish a direct link to the corresponding regional supply of this product
  Uncertainty: uncertainty is calculated from uncertainties in waste composition and transfer coefficients in incinerator
- heat, district or industrial, natural gas: 0 MJ; pedigree (1,1,1,1,1)
  Input to DeNOx stage, to heat up flue gas in low-dust SCR.
  Uncertainty: uncertainty calculated from uncertainty in average DeNOx input, uncertainty in the share of thermal NOx, uncertainty of nitrogen content in average municipal waste and the uncertainty in nitrogen content in *this* waste.
- transport, freight, lorry, unspecified: 0 metric ton*km; pedigree (1,1,1,1,1)
  Transport services to transport incineration residues to landfills and filter ash to external treatments (FLUWA).
  Uncertainty: uncertainty calculated from uncertainty of the waste composition of this waste, uncertainty of transfer coefficients and the uncertainty in generic transportation distances
- hydrochloric acid, without water, in 30% solution state: 0 kg; pedigree (1,1,1,1,1)
  Auxilliary inputs for the wastewater treatment stage of the incinerator plant.
  Uncertainty: uncertainty calculated from uncertainty in average HCl input, of transfer coefficients in the incinerator, and the uncertainty of the waste composition of this waste
  properties: wet mass 1 kg, dry mass 1 kg
- municipal waste incineration facility: 0 unit
  Demands per kilogram waste.
- process-specific burdens, residual material landfill: 0 kg; pedigree (1,1,1,1,1)
  Mass-specific expenditures required for landfilling of incineration residues.;activityLink introduced to establish a direct link to the corresponding regional supply of this product
  Uncertainty: uncertainty is calculated from uncertainties in waste composition and transfer coefficients in incinerator
- titanium dioxide: 0 kg; pedigree (1,1,1,1,1)
  Input to DeNOx stage (TiO2 catalyst carrier)
  Uncertainty: uncertainty calculated from uncertainty in average DeNOx input, uncertainty in the share of thermal NOx, uncertainty of nitrogen content in average municipal waste and the uncertainty in nitrogen content in *this* waste.
  properties: dry mass 1 kg, wet mass 1 kg
- iron (III) chloride, without water, in 40% solution state: 0 kg; pedigree (1,1,1,1,1)
  Auxilliary inputs for the wastewater treatment stage of the incinerator plant.
  Uncertainty: uncertainty calculated from uncertainty in average FeCl3 input, of transfer coefficients in the incinerator, and the uncertainty of the waste composition of this waste
  properties: dry mass 1 kg, wet mass 1 kg
- residual material landfill: 0 unit; pedigree (1,1,1,1,1)
  Landfill infrastructure required for landfilling of incineration residues.
  Uncertainty: uncertainty is calculated from uncertainties in waste composition and transfer coefficients in incinerator
- chemical, organic: 1.35956e-5 kg; lognormal variance with pedigree 1.3045, pedigree (1,1,3,1,1)
  Auxilliary inputs for the wastewater treatment stage of the incinerator plant. Proxy for (pure) Trisodium-trimercapto-s-triazine (CAS 17766-26-6), used as 15% diluted solution, aka TMT15.
  Uncertainty: uncertainty calculated from uncertainty in average TMT15 input, of transfer coefficients in the incinerator, and the uncertainty of the waste composition of this waste
  properties: dry mass 1 kg, carbon content, fossil 0.628, wet mass 1 kg
- spent activated carbon with mercury: 0 kg; pedigree (1,1,1,1,1)
  Spent ion exchanger charged with mercury, from FLUWA filter ash treatment, approximated here with Spent activated carbon with mercury, deposited undergound in a polyethylene Big Bag.
  Uncertainty: uncertainty calculated from uncertainty in of transfer coefficients in the incinerator, and the uncertainty of the waste composition of this waste.
  production volume 0 kg; = ABS(Ref('0423e508-6886-4d3b-88a8-abfa1100b1d5', 'ProductionVolume') * (Ref('74cf150d-e276-48de-b93e-161eaa588938') / Ref('0423e508-6886-4d3b-88a8-abfa1100b1d5')))
    Calculated from production volume of reference product using the relative outputs.
  properties: dry mass 1 kg, wet mass 1 kg, carbon content, fossil 0.6
- chromium oxide, flakes: 0 kg; pedigree (1,1,1,1,1)
  Input to DeNOx stage. Active component in SCR catalyst (vanadium pentoxide, V2O5), here approximated with the available chromium trioxide.
  Uncertainty: uncertainty calculated from uncertainty in average DeNOx input, uncertainty in the share of thermal NOx, uncertainty of nitrogen content in average municipal waste and the uncertainty in nitrogen content in *this* waste.
  properties: dry mass 1 kg, wet mass 1 kg
- chemical, inorganic: 4.90229e-7 kg; lognormal variance with pedigree 0.10242, pedigree (1,1,3,1,1)
  Auxilliary inputs for the wastewater treatment stage of the incinerator plant. Proxy for Polyelectrolyte.
  Uncertainty: uncertainty calculated from uncertainty in average Polyelectrolyte input, of transfer coefficients in the incinerator, and the uncertainty of the waste composition of this waste
  properties: wet mass 1 kg, dry mass 1 kg, carbon content, fossil 0.003
- hydrogen peroxide, without water, in 50% solution state: 0 kg; pedigree (1,1,1,1,1)
  Auxilliary oxidising agent for filter ash treatment (FLUWA).
  Uncertainty: uncertainty calculated from uncertainty in of transfer coefficients in the incinerator, and the uncertainty of the waste composition of this waste
  properties: dry mass 1 kg, wet mass 1 kg
- cement, unspecified: 0.00227399 kg; lognormal variance with pedigree 0.063052, pedigree (1,1,3,1,1)
  Cement required for solidification of landfilled residual material.
  Uncertainty: Uncertainty calculated from uncertainty of the waste composition of this waste, of transfer coefficients in the incinerator and of the solidification recipe.
  properties: wet mass 1 kg, dry mass 1 kg
- metalliferous hydroxide sludge: 0 kg; pedigree (1,1,1,1,1)
  Metalliferous hydroxide sludge from filter ash leaching (FLUWA).
  Uncertainty: uncertainty is calculated from uncertainties in waste composition and transfer coefficients to filter ash in incinerator and the uncertainty of the transfer coefficients of the FLUWA process.
  production volume 0 kg
    calculated in proportion to reference product waste input to incinerator
  properties: vanadium content 0.0004385, zinc content 0.0034645, calcium content 0.00039942, sodium content 0.00042064, carbon content, fossil 0.0081996, wet mass 1 kg, dry mass 0.25 kg, water content 3, price 0.0042 EUR2005, chlorine content 0.0010015, sulfur content 0.38673, oxygen content 0.59861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
- cationic resin: 0 kg; pedigree (1,1,1,1,1)
  Auxilliary input for mercury removal in filter ash treatment (FLUWA).
  Uncertainty: uncertainty calculated from uncertainty in of transfer coefficients in the incinerator, and the uncertainty of the waste composition of this waste
  properties: carbon content, fossil 0.521606, dry mass 0.5 kg, water content 1, wet mass 1 kg
- waste cement, hydrated: 0 kg; pedigree (1,1,1,1,1)
  Hydrated cement output for solidification of landfilled residual material.
  Uncertainty: Uncertainty calculated from uncertainty of the waste composition of this waste and transfer coefficients in the incinerator and of the solidification recipe.
  production volume 0 kg
    calculated in proportion to reference product waste input to incinerator
  properties: wet mass 1 kg, dry mass 1 kg
- slag landfill: 0 unit; pedigree (1,1,1,1,1)
  Landfill infrastructure required for landfilling of bottom ash.
  Uncertainty: uncertainty is calculated from uncertainties in waste composition and transfer coefficients in incinerator
- water, decarbonised: 9.24277e-5 kg; lognormal variance with pedigree 0.63655, pedigree (1,1,3,1,1)
  Incinerator process water used in flue gas scrubber stage.
  Uncertainty: uncertainty calculated from uncertainty in average water input, and the uncertainty of the waste composition of this waste
  properties: wet mass 1 kg
- ammonia, liquid: 0 kg; pedigree (1,1,1,1,1)
  Input to DeNOx stage (100% NH3).
  Uncertainty: uncertainty calculated from uncertainty in average DeNOx input, uncertainty in the share of thermal NOx, uncertainty of nitrogen content in average municipal waste and the uncertainty in nitrogen content in *this* waste.
  properties: dry mass 1 kg, wet mass 1 kg
- waste wood, untreated: -1.47636e-5 kg; lognormal variance with pedigree 0.0407, pedigree (1,3,5,3,1)
  EcoSpold01Location=CH
  production volume 6.468e8 kg
- ethoxylated alcohol (AE7): 1.10727e-6 kg; lognormal variance with pedigree 0.0407, pedigree (1,3,5,3,1)
  Calculated value. The value of 0.006 kg of ethoxylated alcohol, production mix has been allocated to the concrete ethoxylated alcohols. The ratio between (AE3) and (AE7) is used the same as in case of the original eiv2 "ethoxylated alcohol, production mix" dataset.
- polyethylene, low density, granulate: 4.39563e-7 kg; lognormal variance with pedigree 0.0407, pedigree (1,3,5,3,1)
  EcoSpold01Location=RER
- aluminium, wrought alloy: 9.90282e-5 kg; lognormal variance with pedigree 0.0407, pedigree (1,3,5,3,1)
  EcoSpold01Location=RER
- sodium chlorate, powder: 4.05999e-6 kg; lognormal variance with pedigree 0.0407, pedigree (1,3,5,3,1)
  EcoSpold01Location=RER
- wastewater, unpolluted: -0.000169551 m3; lognormal variance with pedigree 0.0407, pedigree (1,3,5,3,1)
  EcoSpold01Location=CH
  Calculated value based on literature values and expert opinion. See comments in the parametres' comment field.
  production volume 7.42809e9 m3
- sulfuric acid: 5.38871e-5 kg; lognormal variance with pedigree 0.0407, pedigree (1,3,5,3,1)
  EcoSpold01Location=RER
- nitric acid, without water, in 50% solution state: 1.10727e-5 kg; lognormal variance with pedigree 0.0407, pedigree (1,3,5,3,1)
  EcoSpold01Location=RER
- heat, district or industrial, other than natural gas: 0.00289366 MJ; lognormal variance with pedigree 0.0407, pedigree (1,3,5,3,1)
  EcoSpold01Location=RER
- ethoxylated alcohol (AE3): 1.10727e-6 kg; lognormal variance with pedigree 0.0407, pedigree (1,3,5,3,1)
  (same comment as for ethoxylated alcohol (AE7))
- lubricating oil: 1.02315e-5 kg; lognormal variance with pedigree 0.0407, pedigree (1,3,5,3,1)
  EcoSpold01Location=RER
- aluminium sulfate, powder: 5.20417e-6 kg; lognormal variance with pedigree 0.0407, pedigree (1,3,5,3,1)
  EcoSpold01Location=RER
- wood chips, dry, measured as dry mass: 1.10406e-5 kg; lognormal variance with pedigree 0.0407, pedigree (1,3,5,3,1)
  EcoSpold01Location=RER
- white spirit: 4.61362e-8 kg; lognormal variance with pedigree 0.0407, pedigree (1,3,5,3,1)
  EcoSpold01Location=RER
- electricity, medium voltage: 0.00369917 kWh; lognormal variance with pedigree 0.0407, pedigree (1,3,5,3,1)
  EcoSpold01Location=UCTE
- waste bitumen sheet: -0.000609495 kg; lognormal variance with pedigree 0.0407, pedigree (1,3,5,3,1)
  EcoSpold01Location=CH
  production volume 4.44675e8 kg
- chemical factory, organics: 1.72055e-12 unit; lognormal variance with pedigree 0.68, pedigree (5,5,5,5,5)
  EcoSpold01Location=RER
  activityLink introduced to establish a direct link to the corresponding regional supply of this product
- scrap aluminium: -6.22734e-6, -2.92172e-7 kg (2 suppliers, which the file names only by identifier); sum of these -6.51951e-6 kg; lognormal variance with pedigree 0.0407, pedigree (1,3,5,3,1)
  EcoSpold01Location=CH
  production volume 2.4255e8 kg
- water, decarbonised: 0.145562, 0.0293447, 0.0964909, 0.00532687 kg (4 suppliers, which the file names only by identifier); sum of these 0.276725 kg; lognormal variance with pedigree 0.0407, pedigree (1,3,5,3,1)
  EcoSpold01Location=RER
- hazardous waste, for incineration: -4.4961e-7, -1.17525e-8 kg (2 suppliers, which the file names only by identifier); sum of these -4.61362e-7 kg; lognormal variance with pedigree 0.0407, pedigree (1,3,5,3,1)
  EcoSpold01Location=CH
  production volume 2.02125e7 kg
- heat, district or industrial, natural gas: 0.00298407 MJ; lognormal variance with pedigree 0.0513, pedigree (2,3,5,3,1)
  EcoSpold01Location=RER
- pitch: 0.00498774, 0.00058242 kg (2 suppliers, which the file names only by identifier); sum of these 0.00557016 kg; lognormal variance with pedigree 0.0527, pedigree (2,4,5,3,1)
  EcoSpold01Location=RER
- waste glass: -7.32689e-6 kg; lognormal variance with pedigree 0.0707, pedigree (2,4,5,3,3)
  EcoSpold01Location=CH
  production volume 0.00261 kg
- sand: 0.00469132 kg; lognormal variance with pedigree 0.0527, pedigree (2,4,5,3,1)
  EcoSpold01Location=CH
- sheet rolling, aluminium: 0.000196292 kg; lognormal variance with pedigree 0.0541, pedigree (3,4,5,3,1)
  (same comment as for chemical factory, organics)
- lime: 0.000891864 kg; lognormal variance with pedigree 0.05, pedigree (1,1,5,1,1)
  composite
  EcoSpold01Location=CH
- fleece, polyethylene: 1.90871e-5 kg; lognormal variance with pedigree 0.0527, pedigree (2,4,5,3,1)
  EcoSpold01Location=RER
- municipal solid waste: -4.17786e-6 kg; lognormal variance with pedigree 0.0707, pedigree (2,4,5,3,3)
  EcoSpold01Location=CH
  production volume 0.0044 kg
- synthetic rubber: 3.93048e-5 kg; lognormal variance with pedigree 0.0527, pedigree (2,4,5,3,1)
  EcoSpold01Location=RER
- polypropylene, granulate: 1.47484e-6 kg; lognormal variance with pedigree 0.0527, pedigree (2,4,5,3,1)
  EcoSpold01Location=RER
- extrusion, plastic film: 3.96876e-6 kg; lognormal variance with pedigree 0.0527, pedigree (2,4,5,3,1)
  activityLink introduced to establish a direct link to the corresponding regional supply of this product
  EcoSpold01Location=RER
- glass fibre: 2.79616e-5 kg; lognormal variance with pedigree 0.0527, pedigree (2,4,5,3,1)
  EcoSpold01Location=RER
- corrugated board box: 1.86652e-6 kg; lognormal variance with pedigree 0.0421, pedigree (1,2,5,5,1)
  This flow is issued during the process "selective coating, copper sheet, sputtering" which is used as an input in bitumen seal production. The ecoinvent dataset with the same name has been merged into this activity. This flow refers to 1 m2 of selective coat, copper sheet, sputter deposition. 0.2 m2 are used as an input for bitumen seal production.
  Uncertainty: Questionnaire
- wastewater, from residence: -2.39378e-8 m3
  This flow is issued during the process "selective coating, copper sheet, sputtering" which is used as an input in bitumen seal production. The ecoinvent dataset with the same name has been merged into this activity. This flow refers to 1 m2 of selective coat, copper sheet, sputter deposition. 0.2 m2 are used as an input for bitumen seal production.
  production volume 6.00356e-5 m3
- oxygen, liquid: 9.58567e-8 kg; lognormal variance with pedigree 0.0421, pedigree (1,2,5,5,1)
  (same comment as for corrugated board box)
- nitrogen, liquid: 1.91924e-7 kg; lognormal variance with pedigree 0.0421, pedigree (1,2,5,5,1)
  (same comment as for corrugated board box)
- tap water: 0.000763057 kg; lognormal variance with pedigree 0.0546, pedigree (3,3,5,5,1)
  (same comment as for corrugated board box)
- argon, liquid: 3.45885e-7 kg; lognormal variance with pedigree 0.0421, pedigree (1,2,5,5,1)
  This flow is issued during the process "selective coating, copper sheet, sputtering" which is used as an input in bitumen seal production. The ecoinvent dataset with the same name has been merged into this activity. This flow refers to 1 m2 of selective coat, copper sheet, sputter deposition. 0.2 m2 are used as an input for bitumen seal production.
  Uncertainty: Questionnaire (plus helium)
- metal coating facility: 3.51158e-11 unit; lognormal variance with pedigree 0.3421, pedigree (1,2,5,5,1)
  (same comment as for corrugated board box)
- light fuel oil: 6.53808e-7 kg; lognormal variance with pedigree 0.0421, pedigree (1,2,5,5,1)
  This flow is issued during the process "selective coating, copper sheet, sputtering" which is used as an input in bitumen seal production. The ecoinvent dataset with the same name has been merged into this activity. This flow refers to 1 m2 of selective coat, copper sheet, sputter deposition. 0.2 m2 are used as an input for bitumen seal production.
  Uncertainty: Questionnaire, including heating
- kraft paper, bleached: 5.85263e-8 kg; lognormal variance with pedigree 0.0421, pedigree (1,2,5,5,1)
  (same comment as for corrugated board box)
- diesel, burned in building machine: 3.50501e-5 MJ; lognormal variance with pedigree 0.0421, pedigree (1,2,5,5,1)
  This flow is issued during the process "selective coating, copper sheet, sputtering" which is used as an input in bitumen seal production. The ecoinvent dataset with the same name has been merged into this activity. This flow refers to 1 m2 of selective coat, copper sheet, sputter deposition. 0.2 m2 are used as an input for bitumen seal production.
  Uncertainty: Questionnaire, use for vehicles in plant operation
- waste mineral oil: -7.96716e-8, -1.84352e-9 kg (2 suppliers, which the file names only by identifier); sum of these -8.15151e-8 kg
  (same comment as for wastewater, from residence)
  production volume 0.000204438 kg
- reinforcing steel: 0.00190488 kg; lognormal variance with pedigree 0.4312, pedigree (2,3,5,1,4)
  Adapted from figures for MSWI
  EcoSpold01Location=RER
  Uncertainty: & basic uncertainty of 3; adapted from figures for MSWI
- steel, chromium steel 18/8, hot rolled: 4.28876e-5 kg; lognormal variance with pedigree 0.4312, pedigree (2,3,5,1,4)
  EcoSpold01Location=RER
  Adapted from figures for MSWI
  Uncertainty: & basic uncertainty of 3; adapted from figures for MSWI
- waste concrete, not reinforced: -0.00698595 kg; lognormal variance with pedigree 0.4312, pedigree (2,3,5,1,4)
  EcoSpold01Location=CH
  Adapted from figures for MSWI
  Uncertainty: & basic uncertainty of 3; adapted from figures for MSWI
  production volume 3.6e6 kg
- gravel, round: 0.0159416 kg; lognormal variance with pedigree 0.4312, pedigree (2,3,5,1,4)
  (same comment as for waste concrete, not reinforced)
- waste reinforced concrete: -0.0218962 kg; lognormal variance with pedigree 0.4312, pedigree (2,3,5,1,4)
  (same comment as for waste concrete, not reinforced)
  production volume 1.48e7 kg
- waste mineral wool: -2.87127e-6 kg; lognormal variance with pedigree 0.0401, pedigree (1,2,5,1,1)
  EcoSpold01Location=CH
  Modelled, based on "Agricultural Buildings" - pdf-document on the dedicated talk page of ecoinvent (www.ecoinvent.org/talk-pages)
  production volume 14.3 kg
- polyurethane, rigid foam: 2.34463e-7 kg; lognormal variance with pedigree 0.0401, pedigree (1,2,5,1,1)
  EcoSpold01Location=RER
  Modelled, based on "Agricultural Buildings" - pdf-document on the dedicated talk page of ecoinvent (www.ecoinvent.org/talk-pages)
- waste polystyrene isolation, flame-retardant: -7.33822e-8 kg; lognormal variance with pedigree 0.0401, pedigree (1,2,5,1,1)
  (same comment as for waste mineral wool)
  production volume 46.1 kg
- copper: 9.49722e-7 kg; lognormal variance with pedigree 0.0401, pedigree (1,2,5,1,1)
  Modelled, based on "Agricultural Buildings" - pdf-document on the dedicated talk page of ecoinvent (www.ecoinvent.org/talk-pages)
  EcoSpold01Location=RER
- particle board, for indoor use: 1.64044e-10 m3; lognormal variance with pedigree 0.0401, pedigree (1,2,5,1,1)
  (same comment as for copper)
- kraft paper, unbleached: 9.17317e-8 kg; lognormal variance with pedigree 0.0401, pedigree (1,2,5,1,1)
  (same comment as for polyurethane, rigid foam)
- electricity, low voltage: 8.40596e-8 kWh; lognormal variance with pedigree 0.0401, pedigree (1,2,5,1,1)
  (same comment as for waste mineral wool)
- glass fibre reinforced plastic, polyester resin, hand lay-up: 7.45949e-9 kg; lognormal variance with pedigree 0.0401, pedigree (1,2,5,1,1)
  (same comment as for polyurethane, rigid foam)
- waste brick: -5.41476e-6 kg; lognormal variance with pedigree 0.0401, pedigree (1,2,5,1,1)
  (same comment as for waste mineral wool)
  production volume 2200 kg
- waste building wood, chrome preserved: -1.60703e-7 kg; lognormal variance with pedigree 0.0401, pedigree (1,2,5,1,1)
  (same comment as for waste mineral wool)
  production volume 498 kg
- fibre cement facing tile: 6.27928e-7 kg; lognormal variance with pedigree 0.0401, pedigree (1,2,5,1,1)
  Modelled, based on "Agricultural Buildings" - pdf-document on the dedicated talk page of ecoinvent (www.ecoinvent.org/talk-pages)
  EcoSpold01Location=CH
- waste polyurethane foam: -2.8026e-8 kg; lognormal variance with pedigree 0.0401, pedigree (1,2,5,1,1)
  (same comment as for fibre cement facing tile)
  production volume 5.43 kg
- epoxy resin, liquid: 6.64875e-8 kg; lognormal variance with pedigree 0.0401, pedigree (1,2,5,1,1)
  (same comment as for polyurethane, rigid foam)
- excavation, hydraulic digger: 5.60017e-6 m3; lognormal variance with pedigree 0.0401, pedigree (1,2,5,1,1)
  (same comment as for polyurethane, rigid foam)
- zinc coat, coils: 1.87477e-8 m2; lognormal variance with pedigree 0.0401, pedigree (1,2,5,1,1)
  (same comment as for polyurethane, rigid foam)
- aluminium, cast alloy: 8.65304e-7 kg; lognormal variance with pedigree 0.0401, pedigree (1,2,5,1,1)
  (same comment as for copper)
- waste polyethylene/polypropylene product: -3.56389e-6 kg; lognormal variance with pedigree 0.0401, pedigree (1,2,5,1,1)
  (same comment as for fibre cement facing tile)
  production volume 91.9 kg
- waste cement in concrete and mortar: -2.45817e-6 kg; lognormal variance with pedigree 0.0401, pedigree (1,2,5,1,1)
  (same comment as for fibre cement facing tile)
  production volume 539 kg
- sheet rolling, steel: 8.82125e-8 kg; lognormal variance with pedigree 0.0401, pedigree (1,2,5,1,1)
  (same comment as for polyurethane, rigid foam)
- waste glass: -2.03746e-9 kg; lognormal variance with pedigree 0.0401, pedigree (1,2,5,1,1)
  (same comment as for fibre cement facing tile)
  production volume 8.79 kg
- lean concrete: 2.26645e-9 m3; lognormal variance with pedigree 0.0401, pedigree (1,2,5,1,1)
  (same comment as for waste mineral wool)
- cement, Portland: 1.42067e-6 kg; lognormal variance with pedigree 0.0401, pedigree (1,2,5,1,1)
  (same comment as for waste mineral wool)
- cast iron: 8.77968e-6 kg; lognormal variance with pedigree 0.0401, pedigree (1,2,5,1,1)
  (same comment as for polyurethane, rigid foam)
- polystyrene foam slab: 9.89685e-9 kg; lognormal variance with pedigree 0.0401, pedigree (1,2,5,1,1)
  (same comment as for copper)
- steel, low-alloyed, hot rolled: 0.000696764 kg; lognormal variance with pedigree 0.0401, pedigree (1,2,5,1,1)
  (same comment as for copper)
- cement mortar: 1.14668e-6 kg; lognormal variance with pedigree 0.0401, pedigree (1,2,5,1,1)
  (same comment as for waste mineral wool)
- glued laminated timber, for indoor use: 3.9993e-10 m3; lognormal variance with pedigree 0.0401, pedigree (1,2,5,1,1)
  (same comment as for copper)
- excavation, skid-steer loader: 3.41089e-8 m3; lognormal variance with pedigree 0.0401, pedigree (1,2,5,1,1)
  Modelled, based on "Agricultural Buildings" - pdf-document on the dedicated talk page of ecoinvent (www.ecoinvent.org/talk-pages);activityLink introduced to establish a direct link to the corresponding regional supply of this product
  EcoSpold01Location=RER
- zinc coat, pieces: 2.90861e-8 m2; lognormal variance with pedigree 0.0401, pedigree (1,2,5,1,1)
  (same comment as for copper)
- waste bitumen: -7.06883e-7 kg; lognormal variance with pedigree 0.0401, pedigree (1,2,5,1,1)
  (same comment as for fibre cement facing tile)
  production volume 1080 kg
- waste glass sheet: -5.00285e-7 kg; lognormal variance with pedigree 0.0401, pedigree (1,2,5,1,1)
  (same comment as for waste mineral wool)
  production volume 238 kg
- sanitary ceramics: 4.73724e-7 kg; lognormal variance with pedigree 0.0401, pedigree (1,2,5,1,1)
  (same comment as for waste mineral wool)
- fibre cement corrugated slab: 1.10144e-7 kg; lognormal variance with pedigree 0.0401, pedigree (1,2,5,1,1)
  (same comment as for waste mineral wool)
- waste wood, untreated: -1.88435e-6 kg; lognormal variance with pedigree 0.0401, pedigree (1,2,5,1,1)
  (same comment as for waste mineral wool)
  production volume 3060 kg
- waste plastic, mixture: -1.38286e-9 kg; lognormal variance with pedigree 0.0401, pedigree (1,2,5,1,1)
  (same comment as for waste mineral wool)
  production volume 5.86 kg
- waste fibreboard: -1.06841e-7 kg; lognormal variance with pedigree 0.0401, pedigree (1,2,5,1,1)
  (same comment as for waste mineral wool)
  production volume 718 kg
- concrete, normal: 1.8104e-8 m3; lognormal variance with pedigree 0.0401, pedigree (1,2,5,1,1)
  (same comment as for fibre cement facing tile)
- flat glass, uncoated: 2.65487e-8 kg; lognormal variance with pedigree 0.0401, pedigree (1,2,5,1,1)
  (same comment as for polyurethane, rigid foam)
- waste bulk iron, excluding reinforcement: -0.000697727 kg; lognormal variance with pedigree 0.0401, pedigree (1,2,5,1,1)
  (same comment as for waste mineral wool)
  production volume 1070 kg
- clay brick: 4.62468e-6 kg; lognormal variance with pedigree 0.0401, pedigree (1,2,5,1,1)
  (same comment as for polyurethane, rigid foam)
- sawnwood, softwood, dried (u=20%), planed: 3.68358e-9 m3; lognormal variance with pedigree 0.0401, pedigree (1,2,5,1,1)
  (same comment as for polyurethane, rigid foam)
- polyethylene, high density, granulate: 2.43863e-6 kg; lognormal variance with pedigree 0.0401, pedigree (1,2,5,1,1)
  (same comment as for copper)
- stone wool: 8.0666e-8 kg; lognormal variance with pedigree 0.0401, pedigree (1,2,5,1,1)
  (same comment as for waste mineral wool)
- roof tile: 5.3465e-8 kg; lognormal variance with pedigree 0.0401, pedigree (1,2,5,1,1)
  (same comment as for polyurethane, rigid foam)
- calendering, rigid sheets: 1.79277e-9 kg; lognormal variance with pedigree 0.0401, pedigree (1,2,5,1,1)
  (same comment as for polyurethane, rigid foam)
- waste sealing sheet, polyvinylchloride: -1.79277e-9 kg; lognormal variance with pedigree 0.0401, pedigree (1,2,5,1,1)
  (same comment as for waste mineral wool)
  production volume 1.49 kg
- polyvinylchloride, bulk polymerised: 4.17204e-8 kg; lognormal variance with pedigree 0.0401, pedigree (1,2,5,1,1)
  (same comment as for polyurethane, rigid foam)
- waste polyvinylchloride product: -3.99276e-8 kg; lognormal variance with pedigree 0.0401, pedigree (1,2,5,1,1)
  (same comment as for waste mineral wool)
  production volume 7.64 kg
- alkyd paint, white, without solvent, in 60% solution state: 6.6988e-6 kg; lognormal variance with pedigree 0.146, pedigree (4,5,5,1,4)
  EcoSpold01Location=RER
  Estimation based on data for fuel storage
  Uncertainty: Estimation based on data for fuel storage
- waste paint on metal: -6.6988e-6 kg; lognormal variance with pedigree 0.146, pedigree (4,5,5,1,4)
  Same amount as for material imput
  EcoSpold01Location=CH
  Uncertainty: Same amount as for material imput
  production volume 4000 kg
- concrete, sole plate and foundation: 1.43187e-6 m3; lognormal variance with pedigree 0.208, pedigree (5,5,5,1,4)
  EcoSpold01Location=CH
  Estimation based on theoretical calculation
  Uncertainty: Estimation based on theoretical calculation
- limestone, crushed, washed: 2.11709e-5 kg; lognormal variance with pedigree 0.3401, pedigree (1,2,5,1,1)
  EcoSpold01Location=CH
  Data from 3 plants
  Uncertainty: & basic uncertainty of 3; Data from 3 plants
- concrete, high exacting requirements: 9.85485e-7 m3; lognormal variance with pedigree 0.3401, pedigree (1,2,5,1,1)
  (same comment as for limestone, crushed, washed)
- electricity, medium voltage: 3.74399e-8 kWh; lognormal variance with pedigree 0.3401, pedigree (1,2,5,1,1)
  Data from 3 plants
  EcoSpold01Location=CH
  Uncertainty: & basic uncertainty of 3; Data from 3 plants
- tap water: 0.00012029 kg; lognormal variance with pedigree 0.3401, pedigree (1,2,5,1,1)
  EcoSpold01Location=RER
  Data from 3 plants
  Uncertainty: & basic uncertainty of 3; Data from 3 plants
- stone wool, packed: 8.60353e-7 kg; lognormal variance with pedigree 0.3401, pedigree (1,2,5,1,1)
  (same comment as for electricity, medium voltage)
- waste reinforcement steel: -8.20901e-6 kg; lognormal variance with pedigree 0.0512, pedigree (2,3,5,1,1)
  Estimation for materials used
  EcoSpold01Location=CH
  Uncertainty: Estimation for materials used
  production volume 21278 kg
- brass: 8.39419e-10 kg; lognormal variance with pedigree 0.0512, pedigree (2,3,5,1,1)
  EcoSpold01Location=CH
  Literature
  Uncertainty: Literature
- waste polyurethane: -2.06437e-7 kg; lognormal variance with pedigree 0.0512, pedigree (2,3,5,1,1)
  (same comment as for waste reinforcement steel)
  production volume 535.09 kg
- bitumen seal: 2.06437e-7 kg; lognormal variance with pedigree 0.0512, pedigree (2,3,5,1,1)
  EcoSpold01Location=RER
  Literature
  Uncertainty: Literature
- waste rubber, unspecified: -1.27649e-8 kg; lognormal variance with pedigree 0.0512, pedigree (2,3,5,1,1)
  EcoSpold01Location=CH
  Estimation for materials used
  Uncertainty: Estimation for materials used
  production volume 33.087 kg
- tetrafluoroethylene: 2.29141e-11 kg; lognormal variance with pedigree 0.0512, pedigree (2,3,5,1,1)
  EcoSpold01Location=RER
  Literature
  Uncertainty: Literature
- zinc: 5.6585e-8 kg; lognormal variance with pedigree 0.0512, pedigree (2,3,5,1,1)
  EcoSpold01Location=RER
  Literature
  Uncertainty: Literature

## Inputs from nature
- Oxygen [natural resource, in air]: 0 kg; pedigree (1,1,1,1,1)
  Oxygen from ambient air needed to combust and oxidise this waste. Net demand, i.e. without O2 leaving the plant in flue gas uncombusted.
  Uncertainty: uncertainty is calculated from uncertainties in waste composition and transfer coefficients to flue gas and soild residues in incinerator
- Occupation, construction site [natural resource, land]: 1.47754e-5 m2*year; lognormal variance with pedigree 0.186, pedigree (4,5,5,1,4)
  Adapted from figures for MSWI. estimate on land area, production volume and building, operation and demolition time
  Uncertainty: & basic uncertainty of 1.5; adapted from figures for MSWI. estimate on land area, production volume and building, operation and demolition time
- Transformation, to industrial area [natural resource, land]: 5.54674e-6 m2; lognormal variance with pedigree 0.276, pedigree (4,5,5,1,4)
  Adapted from figures for MSWI. estimate on land area and production volume
  Uncertainty: & basic uncertainty of 2; adapted from figures for MSWI. estimate on land area and production volume
- Occupation, industrial area [natural resource, land]: 0.000253753 m2*year; lognormal variance with pedigree 0.186, pedigree (4,5,5,1,4)
  (same comment as for Occupation, construction site)
- Transformation, from unspecified [natural resource, land]: 5.0501e-6 m2; lognormal variance with pedigree 0.276, pedigree (4,5,5,1,4)
  (same comment as for Transformation, to industrial area)
- Transformation, from pasture, man made [natural resource, land]: 5.39548e-7 m2; lognormal variance with pedigree 0.1601, pedigree (1,2,5,1,1)
  Modelled, based on "Agricultural Buildings" - pdf-document on the dedicated talk page of ecoinvent (www.ecoinvent.org/talk-pages)
- Occupation, urban, discontinuously built [natural resource, land]: 2.11194e-6 m2*year; lognormal variance with pedigree 0.0801, pedigree (1,2,5,1,1)
  (same comment as for Transformation, from pasture, man made)
- Transformation, to urban, discontinuously built [natural resource, land]: 4.22811e-8 m2; lognormal variance with pedigree 0.1601, pedigree (1,2,5,1,1)
  (same comment as for Transformation, from pasture, man made)

## Emissions to nature
- Iron, ion [water, ground-, long-term]: 0 kg; pedigree (1,1,1,1,1)
  Long-term emissions from landfilling of incineration residues.
  Uncertainty: uncertainty is calculated from uncertainties in waste composition and transfer coefficients in incinerator and landfills.
- Selenium [water, surface water]: 0 kg; pedigree (1,1,1,1,1)
  Emissions to water from waste composition and transfer coefficients in incinerator and landfills.
  Uncertainty: uncertainty is calculated from uncertainties in waste composition and transfer coefficients in incinerator and landfills
- Molybdenum [air, urban air close to ground]: 0 kg; pedigree (1,1,1,1,1)
  Emission to air from waste composition and transfer coefficients.
  Uncertainty: uncertainty is calculated from uncertainties in waste composition and transfer coefficients in incinerator
- Calcium, ion [water, ground-, long-term]: 0 kg; pedigree (1,1,1,1,1)
  (same comment as for Iron, ion)
- Tin, ion [water, surface water]: 0 kg; pedigree (1,1,1,1,1)
  (same comment as for Selenium)
- Nickel [air, urban air close to ground]: 0 kg; pedigree (1,1,1,1,1)
  (same comment as for Molybdenum)
- Aluminium [water, ground-, long-term]: 0 kg; pedigree (1,1,1,1,1)
  (same comment as for Iron, ion)
- Vanadium, ion [water, surface water]: 0 kg; pedigree (1,1,1,1,1)
  (same comment as for Selenium)
- Lead [air, urban air close to ground]: 0 kg; pedigree (1,1,1,1,1)
  (same comment as for Molybdenum)
- Magnesium [water, ground-, long-term]: 0 kg; pedigree (1,1,1,1,1)
  (same comment as for Iron, ion)
- Zinc, ion [water, surface water]: 0 kg; pedigree (1,1,1,1,1)
  (same comment as for Selenium)
- Antimony [air, urban air close to ground]: 0 kg; pedigree (1,1,1,1,1)
  (same comment as for Molybdenum)
- Sodium, ion [water, ground-, long-term]: 0 kg; pedigree (1,1,1,1,1)
  (same comment as for Iron, ion)
- Beryllium [water, surface water]: 0 kg; pedigree (1,1,1,1,1)
  (same comment as for Selenium)
- Aluminium [water, surface water]: 0 kg; pedigree (1,1,1,1,1)
  (same comment as for Selenium)
- Selenium [air, urban air close to ground]: 0 kg; pedigree (1,1,1,1,1)
  (same comment as for Molybdenum)
- NMVOC, non-methane volatile organic compounds, unspecified origin [air, urban air close to ground]: 0 kg; pedigree (1,1,1,1,1)
  Incomplete combustion product emitted to air.
  Uncertainty: uncertainty calculated from uncertainty in average operation emissions, and the uncertainty of the flue gas volume from this waste.
- Strontium [water, surface water]: 0 kg; pedigree (1,1,1,1,1)
  (same comment as for Selenium)
- Magnesium [water, surface water]: 0 kg; pedigree (1,1,1,1,1)
  (same comment as for Selenium)
- Tin [air, urban air close to ground]: 0 kg; pedigree (1,1,1,1,1)
  (same comment as for Molybdenum)
- Particulates, < 2.5 um [air, urban air close to ground]: 0 kg; pedigree (1,1,1,1,1)
  (same comment as for NMVOC, non-methane volatile organic compounds, unspecified origin)
- Titanium, ion [water, surface water]: 0 kg; pedigree (1,1,1,1,1)
  (same comment as for Selenium)
- Sodium, ion [water, surface water]: 0 kg; pedigree (1,1,1,1,1)
  (same comment as for Selenium)
- Vanadium [air, urban air close to ground]: 0 kg; pedigree (1,1,1,1,1)
  (same comment as for Molybdenum)
- Particulates, > 2.5 um, and < 10um [air, urban air close to ground]: 0 kg; pedigree (1,1,1,1,1)
  (same comment as for NMVOC, non-methane volatile organic compounds, unspecified origin)
- Thallium [water, surface water]: 0 kg; pedigree (1,1,1,1,1)
  (same comment as for Selenium)
- COD, Chemical Oxygen Demand [water, ground-, long-term]: 0 kg; pedigree (1,1,1,1,1)
  (same comment as for Iron, ion)
- Zinc [air, urban air close to ground]: 0 kg; pedigree (1,1,1,1,1)
  (same comment as for Molybdenum)
- Dioxins, measured as 2,3,7,8-tetrachlorodibenzo-p-dioxin [air, urban air close to ground]: 0 kg; pedigree (1,1,1,1,1)
  (same comment as for NMVOC, non-methane volatile organic compounds, unspecified origin)
- Silicon [water, surface water]: 0 kg; pedigree (1,1,1,1,1)
  (same comment as for Selenium)
- Chromium, ion [water, surface water]: 0 kg; pedigree (1,1,1,1,1)
  (same comment as for Selenium)
- Strontium [air, urban air close to ground]: 0 kg; pedigree (1,1,1,1,1)
  (same comment as for Molybdenum)
- Benzene [air, urban air close to ground]: 0 kg; pedigree (1,1,1,1,1)
  (same comment as for NMVOC, non-methane volatile organic compounds, unspecified origin)
- Iron, ion [water, surface water]: 0 kg; pedigree (1,1,1,1,1)
  (same comment as for Selenium)
- DOC, Dissolved Organic Carbon [water, ground-, long-term]: 0 kg; pedigree (1,1,1,1,1)
  (same comment as for Iron, ion)
- Titanium [air, urban air close to ground]: 0 kg; pedigree (1,1,1,1,1)
  (same comment as for Molybdenum)
- Toluene [air, urban air close to ground]: 0 kg; pedigree (1,1,1,1,1)
  (same comment as for NMVOC, non-methane volatile organic compounds, unspecified origin)
- Calcium, ion [water, surface water]: 0 kg; pedigree (1,1,1,1,1)
  (same comment as for Selenium)
- BOD5, Biological Oxygen Demand [water, ground-, long-term]: 0 kg; pedigree (1,1,1,1,1)
  (same comment as for Iron, ion)
- Thallium [air, urban air close to ground]: 0 kg; pedigree (1,1,1,1,1)
  (same comment as for Molybdenum)
- Benzene, pentachloro- [air, urban air close to ground]: 0 kg; pedigree (1,1,1,1,1)
  (same comment as for NMVOC, non-methane volatile organic compounds, unspecified origin)
- TOC, Total Organic Carbon [water, ground-, long-term]: 0 kg; pedigree (1,1,1,1,1)
  (same comment as for Iron, ion)
- Silicon [air, urban air close to ground]: 0 kg; pedigree (1,1,1,1,1)
  (same comment as for Molybdenum)
- Benzene, hexachloro- [air, urban air close to ground]: 0 kg; pedigree (1,1,1,1,1)
  (same comment as for NMVOC, non-methane volatile organic compounds, unspecified origin)
- Sulfate [water, ground-, long-term]: 0 kg; pedigree (1,1,1,1,1)
  (same comment as for Iron, ion)
- Iron [air, urban air close to ground]: 0 kg; pedigree (1,1,1,1,1)
  (same comment as for Molybdenum)
- Phenol, pentachloro- [air, urban air close to ground]: 0 kg; pedigree (1,1,1,1,1)
  (same comment as for NMVOC, non-methane volatile organic compounds, unspecified origin)
- Nitrate [water, ground-, long-term]: 0 kg; pedigree (1,1,1,1,1)
  (same comment as for Iron, ion)
- Calcium [air, urban air close to ground]: 0 kg; pedigree (1,1,1,1,1)
  (same comment as for Molybdenum)
- Benzo(a)pyrene [air, urban air close to ground]: 0 kg; pedigree (1,1,1,1,1)
  (same comment as for NMVOC, non-methane volatile organic compounds, unspecified origin)
- Phosphate [water, ground-, long-term]: 0 kg; pedigree (1,1,1,1,1)
  (same comment as for Iron, ion)
- Aluminium [air, urban air close to ground]: 0 kg; pedigree (1,1,1,1,1)
  (same comment as for Molybdenum)
- Heat, waste [air, urban air close to ground]: 0 MJ; pedigree (1,1,1,1,1)
  Waste heat generated from heating value of this waste plus any electricity required to process it.
  Uncertainty: uncertainty is calculated from uncertainties in waste composition and uncertainties in energy efficiency and the uncertainty in internal energy demand
- Chloride [water, ground-, long-term]: 0 kg; pedigree (1,1,1,1,1)
  (same comment as for Iron, ion)
- Magnesium [air, urban air close to ground]: 0 kg; pedigree (1,1,1,1,1)
  (same comment as for Molybdenum)
- Heat, waste [water, surface water]: 0 MJ; pedigree (1,1,1,1,1)
  (same comment as for Heat, waste)
- Bromine [water, ground-, long-term]: 0 kg; pedigree (1,1,1,1,1)
  (same comment as for Iron, ion)
- COD, Chemical Oxygen Demand [water, surface water]: 0 kg; pedigree (1,1,1,1,1)
  (same comment as for Selenium)
- Water [air, urban air close to ground]: 0 m3; pedigree (1,1,1,1,1)
  Water vapour from waste humidity, hydrogen oxidation and part of the process water.
  Uncertainty: Uncertainty calculated from uncertainty in waste composition, process water input and the uncertainty of fraction to air.
- Fluoride [water, ground-, long-term]: 0 kg; pedigree (1,1,1,1,1)
  (same comment as for Iron, ion)
- Sodium [air, urban air close to ground]: 0 kg; pedigree (1,1,1,1,1)
  (same comment as for Molybdenum)
- Arsenic, ion [water, ground-, long-term]: 0 kg; pedigree (1,1,1,1,1)
  (same comment as for Iron, ion)
- BOD5, Biological Oxygen Demand [water, surface water]: 0 kg; pedigree (1,1,1,1,1)
  (same comment as for Selenium)
- Water [water, surface water]: 0 m3; pedigree (1,1,1,1,1)
  Process water released to surface water.
  Uncertainty: uncertainty calculated from uncertainty in process water input and the uncertainty of fraction to surface water.
- Barium [water, ground-, long-term]: 0 kg; pedigree (1,1,1,1,1)
  (same comment as for Iron, ion)
- DOC, Dissolved Organic Carbon [water, surface water]: 0 kg; pedigree (1,1,1,1,1)
  (same comment as for Selenium)
- Carbon monoxide, fossil [air, urban air close to ground]: 0 kg; pedigree (1,1,1,1,1)
  (same comment as for NMVOC, non-methane volatile organic compounds, unspecified origin)
- Cadmium, ion [water, ground-, long-term]: 0 kg; pedigree (1,1,1,1,1)
  (same comment as for Iron, ion)
- Sulfate [water, surface water]: 0 kg; pedigree (1,1,1,1,1)
  (same comment as for Selenium)
- Carbon dioxide, fossil [air, urban air close to ground]: 0 kg; pedigree (1,1,1,1,1)
  (same comment as for Molybdenum)
- Cobalt [water, ground-, long-term]: 0 kg; pedigree (1,1,1,1,1)
  (same comment as for Iron, ion)
- TOC, Total Organic Carbon [water, surface water]: 0 kg; pedigree (1,1,1,1,1)
  (same comment as for Selenium)
- Methane, fossil [air, urban air close to ground]: 0 kg; pedigree (1,1,1,1,1)
  (same comment as for NMVOC, non-methane volatile organic compounds, unspecified origin)
- Chromium VI [water, ground-, long-term]: 0 kg; pedigree (1,1,1,1,1)
  (same comment as for Iron, ion)
- Nitrate [water, surface water]: 0 kg; pedigree (1,1,1,1,1)
  (same comment as for Selenium)
- Sulfur dioxide [air, urban air close to ground]: 0 kg; pedigree (1,1,1,1,1)
  (same comment as for Molybdenum)
- Copper, ion [water, ground-, long-term]: 0 kg; pedigree (1,1,1,1,1)
  (same comment as for Iron, ion)
- Phosphate [water, surface water]: 0 kg; pedigree (1,1,1,1,1)
  (same comment as for Selenium)
- Nitrogen oxides [air, urban air close to ground]: 0 kg; pedigree (1,1,1,1,1)
  Sum of fuel-Nox and thermal-NOx emitted to air after DeNOx stage.
  Uncertainty: uncertainty calculated from uncertainty in average N-emissions and uncertainty in the share of thermal NOx and the uncertainty in nitrogen content in *this* waste.
- Mercury [water, ground-, long-term]: 0 kg; pedigree (1,1,1,1,1)
  (same comment as for Iron, ion)
- Chloride [water, surface water]: 0 kg; pedigree (1,1,1,1,1)
  (same comment as for Selenium)
- Ammonia [air, urban air close to ground]: 0 kg; pedigree (1,1,1,1,1)
  Nitrogen species emitted to air after DeNOx stage.
  Uncertainty: uncertainty calculated from uncertainty in average N-emissions and uncertainty in the share of thermal NOx and the uncertainty in nitrogen content in *this* waste.
- Manganese [water, ground-, long-term]: 0 kg; pedigree (1,1,1,1,1)
  (same comment as for Iron, ion)
- Bromine [water, surface water]: 0 kg; pedigree (1,1,1,1,1)
  (same comment as for Selenium)
- Dinitrogen monoxide [air, urban air close to ground]: 0 kg; pedigree (1,1,1,1,1)
  (same comment as for Ammonia)
- Molybdenum [water, ground-, long-term]: 0 kg; pedigree (1,1,1,1,1)
  (same comment as for Iron, ion)
- Fluoride [water, surface water]: 0 kg; pedigree (1,1,1,1,1)
  (same comment as for Selenium)
- Cyanide [air, urban air close to ground]: 0 kg; pedigree (1,1,1,1,1)
  (same comment as for Ammonia)
- Nickel, ion [water, ground-, long-term]: 0 kg; pedigree (1,1,1,1,1)
  (same comment as for Iron, ion)
- Arsenic, ion [water, surface water]: 0 kg; pedigree (1,1,1,1,1)
  (same comment as for Selenium)
- Phosphorus [air, urban air close to ground]: 0 kg; pedigree (1,1,1,1,1)
  (same comment as for Molybdenum)
- Lead [water, ground-, long-term]: 0 kg; pedigree (1,1,1,1,1)
  (same comment as for Iron, ion)
- Barium [water, surface water]: 0 kg; pedigree (1,1,1,1,1)
  (same comment as for Selenium)
- Hydrogen chloride [air, urban air close to ground]: 0 kg; pedigree (1,1,1,1,1)
  (same comment as for Molybdenum)
- Antimony [water, ground-, long-term]: 0 kg; pedigree (1,1,1,1,1)
  (same comment as for Iron, ion)
- Cadmium, ion [water, surface water]: 0 kg; pedigree (1,1,1,1,1)
  (same comment as for Selenium)
- Bromine [air, urban air close to ground]: 0 kg; pedigree (1,1,1,1,1)
  (same comment as for Molybdenum)
- Selenium [water, ground-, long-term]: 0 kg; pedigree (1,1,1,1,1)
  (same comment as for Iron, ion)
- Cobalt [water, surface water]: 0 kg; pedigree (1,1,1,1,1)
  (same comment as for Selenium)
- Hydrogen fluoride [air, urban air close to ground]: 0 kg; pedigree (1,1,1,1,1)
  (same comment as for Molybdenum)
- Tin, ion [water, ground-, long-term]: 0 kg; pedigree (1,1,1,1,1)
  (same comment as for Iron, ion)
- Chromium VI [water, surface water]: 0 kg; pedigree (1,1,1,1,1)
  (same comment as for Selenium)
- Arsenic [air, urban air close to ground]: 0 kg; pedigree (1,1,1,1,1)
  (same comment as for Molybdenum)
- Vanadium, ion [water, ground-, long-term]: 0 kg; pedigree (1,1,1,1,1)
  (same comment as for Iron, ion)
- Copper, ion [water, surface water]: 0 kg; pedigree (1,1,1,1,1)
  (same comment as for Selenium)
- Barium [air, urban air close to ground]: 0 kg; pedigree (1,1,1,1,1)
  (same comment as for Molybdenum)
- Zinc, ion [water, ground-, long-term]: 0 kg; pedigree (1,1,1,1,1)
  (same comment as for Iron, ion)
- Mercury [water, surface water]: 0 kg; pedigree (1,1,1,1,1)
  (same comment as for Selenium)
- Cadmium [air, urban air close to ground]: 0 kg; pedigree (1,1,1,1,1)
  (same comment as for Molybdenum)
- Beryllium [water, ground-, long-term]: 0 kg; pedigree (1,1,1,1,1)
  (same comment as for Iron, ion)
- Manganese [water, surface water]: 0 kg; pedigree (1,1,1,1,1)
  (same comment as for Selenium)
- Cobalt [air, urban air close to ground]: 0 kg; pedigree (1,1,1,1,1)
  (same comment as for Molybdenum)
- Strontium [water, ground-, long-term]: 0 kg; pedigree (1,1,1,1,1)
  (same comment as for Iron, ion)
- Molybdenum [water, surface water]: 0 kg; pedigree (1,1,1,1,1)
  (same comment as for Selenium)
- Chromium [air, urban air close to ground]: 0 kg; pedigree (1,1,1,1,1)
  (same comment as for Molybdenum)
- Titanium, ion [water, ground-, long-term]: 0 kg; pedigree (1,1,1,1,1)
  (same comment as for Iron, ion)
- Nickel, ion [water, surface water]: 0 kg; pedigree (1,1,1,1,1)
  (same comment as for Selenium)
- Copper [air, urban air close to ground]: 0 kg; pedigree (1,1,1,1,1)
  (same comment as for Molybdenum)
- Thallium [water, ground-, long-term]: 0 kg; pedigree (1,1,1,1,1)
  (same comment as for Iron, ion)
- Lead [water, surface water]: 0 kg; pedigree (1,1,1,1,1)
  (same comment as for Selenium)
- Mercury [air, urban air close to ground]: 0 kg; pedigree (1,1,1,1,1)
  (same comment as for Molybdenum)
- Silicon [water, ground-, long-term]: 0 kg; pedigree (1,1,1,1,1)
  (same comment as for Iron, ion)
- Antimony [water, surface water]: 0 kg; pedigree (1,1,1,1,1)
  (same comment as for Selenium)
- Manganese [air, urban air close to ground]: 0 kg; pedigree (1,1,1,1,1)
  (same comment as for Molybdenum)
- Copper, ion [water, unspecified]: 5.53635e-9 kg; lognormal variance with pedigree 0.6907, pedigree (1,3,5,3,1)
- Zinc, ion [water, unspecified]: 1.6609e-8 kg; lognormal variance with pedigree 0.6907, pedigree (1,3,5,3,1)
- Tin, ion [water, unspecified]: 4.61362e-8 kg; lognormal variance with pedigree 0.6907, pedigree (1,3,5,3,1)
- Iron, ion [water, unspecified]: 8.30452e-9 kg; lognormal variance with pedigree 0.6907, pedigree (1,3,5,3,1)
- Chloride [water, unspecified]: 2.45814e-6 kg; lognormal variance with pedigree 0.0807, pedigree (1,3,5,3,1)
- Sodium, ion [water, unspecified]: 1.59816e-5 kg; lognormal variance with pedigree 0.6907, pedigree (1,3,5,3,1)
- Water [air, unspecified]: 0.000107399 m3; lognormal variance with pedigree 0.0807, pedigree (2,2,5,1,1)
  Calculated value based on literature values and expert opinion. See comments in the parametres' comment field.
- Manganese [water, unspecified]: 4.72435e-8 kg; lognormal variance with pedigree 0.6907, pedigree (1,3,5,3,1)
- Particulates, > 2.5 um, and < 10um [air, unspecified]: 4.98271e-9 kg; lognormal variance with pedigree 0.1607, pedigree (1,3,5,3,1)
- Aluminium [water, unspecified]: 5.53635e-7 kg; lognormal variance with pedigree 0.6907, pedigree (1,3,5,3,1)
- Lead [water, unspecified]: 7.3818e-9 kg; lognormal variance with pedigree 0.6907, pedigree (1,3,5,3,1)
- Cadmium, ion [water, unspecified]: 2.76817e-10 kg; lognormal variance with pedigree 0.6907, pedigree (1,3,5,3,1)
- Sulfate [water, unspecified]: 4.17071e-5 kg; lognormal variance with pedigree 0.0807, pedigree (1,3,5,3,1)
- Nickel, ion [water, unspecified]: 8.04616e-8 kg; lognormal variance with pedigree 0.6907, pedigree (1,3,5,3,1)
- NMVOC, non-methane volatile organic compounds, unspecified origin [air, unspecified]: 7.48627e-6 kg; lognormal variance with pedigree 0.1727, pedigree (2,4,5,3,1)
- Benzo(a)pyrene [air, unspecified]: 2.59438e-11 kg; lognormal variance with pedigree 0.69, pedigree (1,1,5,1,1)
  estimation
- Water [water, unspecified]: 7.50845e-7 m3; lognormal variance with pedigree 1.21, pedigree (5,5,5,5,5)
  (same comment as for wastewater, from residence)
- NMVOC, non-methane volatile organic compounds, unspecified origin [air, non-urban air or from high stacks]: 4.52169e-6 kg; lognormal variance with pedigree 0.406, pedigree (4,5,5,1,5)
  Estimated from data for fuel storage tanks
  Uncertainty: Estimated from data for fuel storage tanks
