# laser machining, metal, with CO2-laser, 4000W power

Dataset: EcoSpold 2, unit process
Geography: CA-QC
Time period: 2006-01-01 to 2019-12-31
Technology level: current
Classification: EcoSpold01Categories: metals/chipless shaping
Classification: ISIC rev.4 ecoinvent: 2592:Treatment and coating of metals; machining
Tags: recontextualization
Scenario: Business-as-Usual
System model: Allocation at the point of substitution
Share of production covered: 0 %
Generated by: Pascal Lesage
Published in: Steiner, R. 2007
Database: ecoinvent
isCopyrightProtected: true
accessRestrictedTo: 1

## General comment
The reference for laser machining is its operation at 100% power for 1 hour. It does not include the input of the material processed. This need to be added separately. The dataset can be used when metals are treated with a YAG laser of the capacity indicated. Factory infrastructure needs to be added. Data are based on manufacturers' data (weight and power consumption) and literature (air emissions).
[This dataset was already contained in the ecoinvent database version 2. It was not individually updated during the transfer to ecoinvent version 3. Life Cycle Impact Assessment results may still have changed, as they are affected by changes in the supply chain, i.e. in other datasets. This dataset was generated following the ecoinvent quality guidelines for version 2. It may have been subject to central changes described in the ecoinvent version 3 change report (http://www.ecoinvent.org/database/ecoinvent-version-3/reports-of-changes/), and the results of the central updates were reviewed extensively. The changes added e.g. consistent water flows and other information throughout the database. The documentation of this dataset can be found in the ecoinvent reports of version 2, which are still available via the ecoinvent website. The change report linked above covers all central changes that were made during the conversion process.]
Child dataset exchanges identical to GLO dataset. Created to enable linking to regional markets (e.g. for electricity). Data quality indicators adjusted accordingly.

## Included activities end
This dataset includes work piece feeder, laser system, cooling and control system. Any additional equipment such as possibly necessary ventilation or additional security installations are not included. It includes the input of process gases, of energy and of the laser equipment. Further factory infrastructure (halls, buildings) are not included. The dataset includes process specific air emissions.

## Geography
Geographical coverage encompasses the industrialised countries.
Child dataset exchanges identical to GLO dataset. Created to enable linking to regional markets (e.g. for electricity). Data quality indicators adjusted accordingly.

## Technology
TruFlow series of CO2 lasers and TrueLaser processing machine

## Parameters
- Quebec gross domestic product 2011: 3.11e11 USD(2011); name quebecGDP2011; lognormal variance with pedigree 0.0006, pedigree (1,1,1,1,1)
  Quebec Gross domestic product for 2011, expressed in 2011 USD. Source: Institut de la statistique du Québec. Converted from CAD to USD using a yearly average exchange rate of 0.989 CAD/USD (Source: bank of Canada).
- world gross domestic product 2011: 7e13 USD(2011); name worldGDP2011; lognormal variance with pedigree 0.0006, pedigree (1,1,1,1,1)
  World Gross domestic product for 2011, expressed in 2011 USD. Source: World Bank.

## Reference product
- laser machining, metal, with CO2-laser, 4000W power: 1 hour; CPC 88731: Metal treatment and coating services; By-product classification allocatable product
  EcoSpold01Location=RER
  production volume 0.0177714 hour; = PARENTVALUE * quebecGDP2011/worldGDP2011
    Gross approximation of Quebec production volume using relative value of Quebec GDP to world GDP
  property price 7.38656 EUR2005
    Calculated based on inputs: The price of the product has been calculated as a sum of the values of the material and energy inputs for this product. This value is therefore a rough estimation. It may underestimate the real price since there are additional expenses when producing any product. These expences can include for example labour costs, treatment of waste materials and profit for the producer. Please consider carefully whether this level of data quality is acceptable for your application.

## Inputs from technosphere
- helium: 0.00212 kg; lognormal variance with pedigree 0.0206, pedigree (1,3,4,5,1)
  Manufacturer data
  EcoSpold01Location=GLO
  Uncertainty: manufacturer data
  properties: wet mass 1 kg, dry mass 1 kg
- nitrogen, liquid: 0.00686 kg; lognormal variance with pedigree 0.0206, pedigree (1,3,4,5,1)
  EcoSpold01Location=RER
  Manufacturer data
  Uncertainty: manufacturer data
  properties: dry mass 1 kg, wet mass 1 kg
- metal working machine, unspecified: 0.246 kg; lognormal variance with pedigree 0.4406, pedigree (4,3,5,5,4)
  Estimated
  EcoSpold01Location=RER
  Uncertainty: estimated
- carbon dioxide, liquid: 0.0018 kg; lognormal variance with pedigree 0.0206, pedigree (1,3,4,5,1)
  EcoSpold01Location=RER
  Manufacturer data
  Uncertainty: manufacturer data
  properties: carbon content, fossil 0.272727, dry mass 1 kg, wet mass 1 kg
- electricity, low voltage: 65 kWh; lognormal variance with pedigree 0.0206, pedigree (1,3,4,5,1)
  Manufacturer data
  EcoSpold01Location=UCTE
  Uncertainty: manufacturer data

## Emissions to nature
- Particulates, < 2.5 um [air, urban air close to ground]: 0.000362 kg; lognormal variance with pedigree 0.3712, pedigree (2,3,5,5,3)
  Estimated air emissions
  Uncertainty: estimated air emissions
- Nitrogen oxides [air, urban air close to ground]: 0.00192 kg; lognormal variance with pedigree 0.1112, pedigree (2,3,5,5,3)
  Estimated air emissions
  Uncertainty: estimated air emissions
- Ozone [air, urban air close to ground]: 0.000564 kg; lognormal variance with pedigree 0.1112, pedigree (2,3,5,5,3)
  Estimated air emissions
  Uncertainty: estimated air emissions
- Helium [air, urban air close to ground]: 0.00212 kg; lognormal variance with pedigree 0.0606, pedigree (1,3,4,5,1)
  Due to gas input
  Uncertainty: due to gas input
- Carbon dioxide, fossil [air, urban air close to ground]: 0.0018 kg; lognormal variance with pedigree 0.0206, pedigree (1,3,4,5,1)
  Due to gas input
  Uncertainty: due to gas input

## Extrapolations
This dataset has been extrapolated from year 2007 to the year of the calculation (2019). The uncertainty has been adjusted accordingly.

## Review by Sébastien Humbert 2007-09-05
passed
none
