# electricity, high voltage, import from BG

Dataset: EcoSpold 2, unit process
Geography: MK
Time period: 2012-01-01 to 2019-12-31
Technology level: current
Classification: ISIC rev.4 ecoinvent: 3510:Electric power generation, transmission and distribution
Scenario: Business-as-Usual
System model: Allocation at the point of substitution
Generated by: Karin Treyer
Published in: Itten R. 2012
Database: ecoinvent
isCopyrightProtected: true
accessRestrictedTo: 1

## General comment
This dataset represents the amount of imported electricity from a specific geography to this country. The import value is valid for 2014 and includes all electricity imports, independently whether used within the importing country, or re-exported. For a discussion of different ways of modeling electricity trade in LCI, please refer to (Itten & Frischknecht 2014).

## Included activities start
This activity represents the point of 'handing over' the electricity from one country to the other at the border.

## Included activities end
This dataset doesn't include any electricity losses or transmission infrastructure as these are accounted for in the market datasets.

## Reference product
- electricity, high voltage: 1 kWh; CPC 17100: Electrical energy; By-product classification allocatable product
  production volume 1.86953e9 kWh
    Import data from ENTSO-E for 2014. ENTSO-E. 2017. Interactive database: Detailed electricity exchange (in GWh). Export country, import country and time period can be chosen. https://www.entsoe.eu/db-query/exchange/detailed-electricity-exchange, in accordance with data as presented in the IEA statistics.
    ENTSO-E. 2017. Interactive database: Detailed electricity exchange (in GWh). Export country, import country and time period can be chosen. https://www.entsoe.eu/db-query/exchange/detailed-electricity-exchange
    IEA electricity information (2016 edition). Part II - World and OECD overview. Table 1.1 World electricity production, imports, exports, final consumption, 2014 (TWh).
  property price 0.0977 EUR2005
    Temporary price data. Calculated as 90% of purchasers price based on: 94% of the average price (to account for a 6% loss in transformation and transmission) for electricity for industrial consumersin 2005 (excluded taxes). From IEA.

## Inputs from technosphere
- electricity, high voltage: 1 kWh; undefined min 1, max 1, standardDeviation95 0, pedigree (1,1,3,1,1)
  activityLink added to better reflect the reality of the supply chain

## Extrapolations
This dataset has been extrapolated from year 2012 to the year of the calculation (2019). The uncertainty has been adjusted accordingly.

## Review by Carl Vadenbo 2015-08-04
The update of the whole electricity sector for the ecoinvent v3.2 database consist of hundreds of datasets. All these datasets have passed through a streamlined review processes where the underlying modelling of production volumes, technology shares and efficiencies was reviewed in detail prior to the datasets being submitted to the database.
