# garage construction, wood, non-insulated, fire-protected

Dataset: EcoSpold 2, unit process
Geography: RoW
Time period: 2009-01-01 to 2019-12-31
Technology level: current
Classification: ISIC rev.4 ecoinvent: 4100:Construction of buildings
Tags: WFLDB
Scenario: Business-as-Usual
System model: Allocation at the point of substitution
Generated by: [System]
Database: ecoinvent
isCopyrightProtected: true
accessRestrictedTo: 1

## General comment
This global dataset is a copy of the regional CH dataset, except for the following modifications.
The production volume represents the global annual production.
The geographicalCorrelation score of every pedigree matrix of was changed to '5'.
The comments below were part of the CH regional dataset.
This dataset represents the construction of 1 m2 of a wooden garage as typically used in farms for the storage of machinery. Features of the model: Building volume: 630 m3; Useable space: 111 m2; Service life span: 50 years.
The garage comprises of a ceiling with non-flammable material and is not insulated. It is a simple construction of wooden walls without insulation material as required for parking vehicles with combustion engine; light basement with concrete.
The repair percentage and the depreciation period of individual construction elements come from Agroscope Tanikon’s Modular Construction Standards for Farm Building Costs (Hilty & Herzog 2000). The construction variants were compiled by D. Herzog, Agroscope Tanikon.
This dataset refers to an average situation; for specific situations exchanges might differ substantially due to site specific parameters.

## Included activities start
The activity starts with the construction of the building.

## Included activities end
Elements included are: Closed garage, concrete floor, non insulated wood construction, flame-resistant; not included are: non-flame-resistant part of the shed
The activity ends with the disposal of the building material, i.e. brick, bulk iron, concrete, plastics, and waste wood.

## Technology
The calculation of the construction materials employed is based on Agroscope PBK+ (Modular Construction Standards for Farm Building Costs +) System (Dux 2004). Based on construction variants for model buildings, the necessary building materials for construction, repair and replacement are calculated with the aid of the PBK+ database. In addition, the consumption of energy and auxiliary materials during operation of the building can be determined.

## Reference product
- garage, wood, non-insulated, fire-protected: 1 m2; CPC 53121: Industrial buildings; By-product classification allocatable product
  production volume 1.4277e7 m2
    Assumption: one garage (111m2) per farm, 50 years lifetime, 58'323 farms in CH. Extrapolated to GLO with GDP Factor CH/GLO
  property price 177.944 EUR2005
    Calculated based on inputs: The price of the product has been calculated as a sum of the values of the material and energy inputs for this product. This value is therefore a rough estimation. It may underestimate the real price since there are additional expenses when producing any product. These expences can include for example labour costs, treatment of waste materials and profit for the producer. Please consider carefully whether this level of data quality is acceptable for your application.
  property true value 177.944
    allocation property applied in "true value" allocation // value calculated from revenue
  properties: Surface 111 m2, lifetime 50 year

## By-products
- electricity, for reuse in municipal waste incineration only: 0 kWh; CPC 17100: Electrical energy; By-product classification allocatable product; pedigree (1,1,1,1,1)
  Net electricity generated from this waste and used in internal MSWI plant energy redistribution.
  Uncertainty: uncertainty is calculated from uncertainties in waste composition and uncertainties in energy efficiency and the uncertainty in internal energy demand
  property exergy 3.6 MJ; name E_el_prod_MSWI_exergy
    This exergy property is based on the exergy content of the product.
  property true value relation 3.6; name E_el_prod_MSWI_true_value_relation
    property to calculate "true value" from
  property price 0.1 EUR2005; name E_el_prod_MSWI_price_EUR2005
    Estimated to be the same price as in case of electricity, medium voltage.
  property true value 4.34515
    allocation property applied in "true value" allocation // value calculated from true value relation
- heat, for reuse in municipal waste incineration only: 0 MJ; CPC 17300: Steam and hot water; By-product classification allocatable product; pedigree (1,1,1,1,1)
  (same comment as for electricity, for reuse in municipal waste incineration only)
  property price 0.0106 EUR2005; name E_th_prod_MSWI_price_EUR2005
    Average European district heat price from Ecoheatcool and Euroheat 2005-2006, Ecoheat Work package 1: The European heat market. Final report. 10.6 EUR/GJ i s the price of district heat. http://www.solarthermalworld.org/files/Ecoheatcool%20WP1%20Web.pdf?download
  property true value relation 0.1842; name E_th_prod_MSWI_true_value_relation
    property to calculate "true value" from
  property exergy 0.1842 MJ; name E_th_prod_MSWI_exergy
    This exergy property is based on the exergy content of the product.
  property true value 1.60852
    (same comment as for electricity, for reuse in municipal waste incineration only)
- iron scrap, sorted, pressed: 0 kg; By-product classification Recyclable; CPC 39310: Slag, dross, scalings and other waste from the manufacture of iron or steel; pedigree (1,1,1,1,1)
  Iron scrap recovered from this waste.
  property price 0.175 EUR2005
    Temporary price data. Calculated as 90% of purchasers price based on: 2005 import and export prices (total trades (USD) divided by total weight (kg) in biggest economies of the world: EU27, USA, Brasil, China, India, Japan and Russia) from UN Commodity Trade Statistics Database (http://data.un.org/Explorer.aspxDatabase [Accessed 2011.06.20]). Commodity: Waste or scrap, of cast iron
  property carbon content 0
    carbon content on a dry matter basis (reserved; not for manual entry)
  property true value 0.000225433
    allocation property applied in "true value" allocation // value calculated from revenue
  properties: water content 0, water in wet mass 0 kg, carbon content, fossil 0, dry mass 1 kg, carbon content, non-fossil 0, wet mass 1 kg, carbon allocation 0 kg
- copper: 0 kg; source Rentz O. 1999; By-product classification allocatable product; CPC 41413: Refined copper and copper alloys, unwrought; master alloys of copper
  Literature value. Copper uses: Before end-use copper is manufactured into semi fabricated products, such as shapes and ingots (known as 'semis'). These manufacturing processes are subdivided into hot working, cold working and, if necessary, process annealing. Few of the semis are ready for use as such. They more typically travel to first-stage manufacturers, who make metal rods, wire, and casting, and then to component manufacturers who produce such things as motors, valves, and insulated cables The components in turn are incorporated by final-stage manufacturers into a variety of finished products - automobiles, commercial buildings, residential housing, and so forth. These uses account for about 79% of the world-wide consumption of copper.
  properties: dry mass 1 kg, water in wet mass 0 kg, wet mass 1 kg, carbon content, non-fossil 0, water content 0, price 5.52 EUR2005, carbon content, fossil 0, carbon content 0, carbon allocation 0 kg, true value 0.839807
- zinc concentrate: 0 kg; CPC 14290: Other non-ferrous metal ores and concentrates (other than uranium or thorium ores and concentrates); By-product classification allocatable product
  Calculated value from the knowledge of the properties of both products.
  property price 0.38 EUR2005; name ByP_price_EUR2005
    Temporary price data. Calculated as 90% of purchasers price based on: Zinc content in concentrate 53%. Concentrate price per kg Zn 86.5% of refined Zn price (13.5% treatment charges according to CHR Metals Limited 2005: Dynamic cost curves. http://www.minecost.com/dynamic.pdf). 2004 zinc price from USGS (2007) Mineral commodity summaries 2007. <http://minerals.usgs.gov/minerals/pubs/mcs/2007/mcs2007.pdf> [Accessed 25 May 2010]
  property zinc content 0.53; name zinc_C_zinc_concentrate
    Zinc content on a dry matter basis. Value taken from teh "zinc mine operation" /GLO dataset.
  property dry mass 1 kg; name DM_zinc_concentrate
  property carbon content 0
    carbon content on a dry matter basis (reserved; not for manual entry)
  property true value 4.58876e-11
    allocation property applied in "true value" allocation // value calculated from revenue
  properties: wet mass 1 kg, water content 0, carbon content, non-fossil 0, carbon content, fossil 0, water in wet mass 0 kg, carbon allocation 0 kg

## Inputs from technosphere
- electricity, low voltage: 0 kWh; pedigree (1,1,1,1,1)
- waste reinforced concrete: 0 kg; pedigree (1,1,1,1,1)
  Corresponds to 4'250'255.82kg from the whole building with 50 years life time, 111 m2 usable space and 630 m3 volume.
  production volume 0 kg
    Calculated from reference product production volume, reference product amount and byproduct amount.
  properties: wet mass 1 kg, dry mass 0.99418 kg, water content 0.00585407
- extrusion, plastic pipes: 0.0268624 kg; lognormal variance with pedigree 0.0401216, pedigree (1,2,3,5,1)
  Corresponds to 154.78kg for the whole building with 50 years life time, 111 m2 usable space and 630 m3 volume.
- waste building wood, chrome preserved: -56.1059 kg; lognormal variance with pedigree 0.0401216, pedigree (1,2,3,5,1)
  Corresponds to 323'276.4kg from the whole building with 50 years life time, 111 m2 usable space and 630 m3 volume.
  production volume 0 kg
    (same comment as for waste reinforced concrete)
  properties: wet mass 1 kg, dry mass 0.8 kg, water content 0.25, carbon content, non-fossil 0.5
- fibre cement facing tile: 37.2094 kg; lognormal variance with pedigree 0.0401216, pedigree (1,2,3,5,1)
  Corresponds to 214'396.5kg for the whole building with 50 years life time, 111 m2 usable space and 630 m3 volume.
  properties: carbon content, fossil 0.0201818, wet mass 1 kg, carbon content, non-fossil 0.0115, dry mass 1 kg
- waste wood, untreated: 0 kg; pedigree (1,1,1,1,1)
  Corresponds to 786'368.07kg from the whole building with 50 years life time, 111 m2 usable space and 630 m3 volume.
  production volume 0 kg
    Calculated from the reference product amount and production volume
  properties: wet mass 1 kg, dry mass 0.8 kg, water content 0.25, carbon content, non-fossil 0.48632
- fibre cement roof slate: 6.5324 kg; lognormal variance with pedigree 0.0401216, pedigree (1,2,3,5,1)
  Corresponds to 37'638.99kg for the whole building with 50 years life time, 111 m2 usable space and 630 m3 volume.
  properties: dry mass 1 kg, carbon content, non-fossil 0.01288, carbon content, fossil 0.0141818, wet mass 1 kg
- scrap copper: 0 kg
  Corresponds to 3568.15.22kg from the whole building with 50 years life time, 111 m2 usable space and 630 m3 volume.
  production volume 0 kg
    Calculated from production volume of reference product using the relative outputs.
  properties: dry mass 1 kg, wet mass 1 kg
- glued laminated timber, for indoor use: 0.0469842 m3; lognormal variance with pedigree 0.0401216, pedigree (1,2,3,5,1)
  Corresponds to 270.72m3 for the whole building with 50 years life time, 111 m2 usable space and 630 m3 volume.
  properties: carbon content, non-fossil 0.478422, dry mass 380.531 kg, water content 0.13, carbon content, fossil 0.0128964, wet mass 430 kg
- gravel, round: 367.355 kg; lognormal variance with pedigree 0.0401216, pedigree (1,2,3,5,1)
  Corresponds to 2'116'659kg for the whole building with 50 years life time, 111 m2 usable space and 630 m3 volume. After the demolition of the garage, the gravel stays in the ground.
  properties: dry mass 1 kg, wet mass 1 kg
- polyethylene, high density, granulate: 0.0268624 kg; lognormal variance with pedigree 0.0401216, pedigree (1,2,3,5,1)
  (same comment as for extrusion, plastic pipes)
  properties: carbon content, fossil 0.857143, wet mass 1 kg, dry mass 1 kg
- lean concrete: 0.0110906 m3; lognormal variance with pedigree 0.0401216, pedigree (1,2,3,5,1)
  properties: wet mass 2190 kg, dry mass 2080 kg, water content 0.0528846
- cement, Portland: 0 kg; pedigree (1,1,1,1,1)
  Corresponds to 325'435.35kg for the whole building with 50 years life time, 111 m2 usable space and 630 m3 volume.
  properties: dry mass 1 kg, wet mass 1 kg
- reinforcing steel: 10.2314 kg; lognormal variance with pedigree 0.0401216, pedigree (1,2,3,5,1)
  Corresponds to 58'952.1kg for the whole building with 50 years life time, 111 m2 usable space and 630 m3 volume.
  properties: carbon content, fossil 0.004, wet mass 1 kg, dry mass 1 kg
- sheet rolling, copper: 0.619267 kg; lognormal variance with pedigree 0.0401216, pedigree (1,2,3,5,1)
  Corresponds to 3'568.15kg for the whole building with 50 years life time, 111 m2 usable space and 630 m3 volume.
- sawnwood, softwood, dried (u=20%), planed: 0.319222 m3; lognormal variance with pedigree 0.0401216, pedigree (1,2,3,5,1)
  Corresponds to 1'839.32m3 for the whole building with 50 years life time, 111 m2 usable space and 630 m3 volume.
  properties: wet mass 540 kg, dry mass 450 kg, carbon content, non-fossil 0.494, water content 0.2
- zinc coat, pieces: 0.0612245 m2; lognormal variance with pedigree 0.0401216, pedigree (1,2,3,5,1)
  Corresponds to 352.77m2 for the whole building with 50 years life time, 111 m2 usable space and 630 m3 volume.
- cast iron: 0.881264 kg; lognormal variance with pedigree 0.0401216, pedigree (1,2,3,5,1)
  Corresponds to 5'077.75kg for the whole building with 50 years life time, 111 m2 usable space and 630 m3 volume.
  properties: carbon content, fossil 0.04, wet mass 1 kg, dry mass 1 kg
- waste brick: 0 kg; pedigree (1,1,1,1,1)
  Corresponds to 252'036.6kg from the whole building with 50 years life time, 111 m2 usable space and 630 m3 volume.
  production volume 0 kg
    (same comment as for waste reinforced concrete)
  properties: dry mass 1 kg, wet mass 1 kg
- concrete, normal: 0 m3; pedigree (1,1,1,1,1)
  Corresponds to 1'864.47m3 for the whole building with 50 years life time, 111 m2 usable space and 630 m3 volume.
  properties: dry mass 2190 kg, wet mass 2380 kg, water content 0.086758
- waste bulk iron, excluding reinforcement: 0 kg; pedigree (1,1,1,1,1)
  Corresponds to 5077.75kg from the whole building with 50 years life time, 111 m2 usable space and 630 m3 volume.
  production volume 0 kg
    (same comment as for waste reinforced concrete)
  properties: dry mass 1 kg, wet mass 1 kg
- copper: 0.619267 kg; lognormal variance with pedigree 0.0401216, pedigree (1,2,3,5,1)
  (same comment as for sheet rolling, copper)
  properties: dry mass 1 kg, wet mass 1 kg
- waste cement in concrete and mortar: 0 kg; pedigree (1,1,1,1,1)
  Corresponds to 570'928.5kg from the whole building with 50 years life time, 111 m2 usable space and 630 m3 volume.
  production volume 0 kg
    (same comment as for waste reinforced concrete)
  properties: wet mass 1 kg, dry mass 0.995 kg, water content 0.00502513
- excavation, hydraulic digger: 0.344748 m3; lognormal variance with pedigree 0.0401216, pedigree (1,2,3,5,1)
  Corresponds to 1'986.4m3 for the whole building with 50 years life time, 111 m2 usable space and 630 m3 volume.
- waste concrete, not reinforced: 0 kg; pedigree (1,1,1,1,1)
  Corresponds to 140'581.5kg from the whole building with 50 years life time, 111 m2 usable space and 630 m3 volume.
  production volume 0 kg
    (same comment as for waste reinforced concrete)
  properties: wet mass 1 kg, dry mass 1 kg
- excavation, skid-steer loader: 0.0166349 m3; lognormal variance with pedigree 0.0401216, pedigree (1,2,3,5,1)
  Corresponds to 95.85m3 for the whole building with 50 years life time, 111 m2 usable space and 630 m3 volume.
- waste polyethylene: 0 kg; pedigree (1,1,1,1,1)
  Corresponds to 154.78kg from the whole building with 50 years life time, 111 m2 usable space and 630 m3 volume.
  production volume 0 kg
    (same comment as for waste reinforced concrete)
  properties: dry mass 0.996 kg, wet mass 1 kg, carbon content, fossil 0.825301, water content 0.00401606
- electricity, low voltage: 0.0255819, 0.00448674, 0.10176, 0.364834, 0.07378, 1.11577, 0.183915, 0.523874 kWh (8 entries); lognormal variance with pedigree 0.0511992, pedigree (3,2,3,5,1)
- waste reinforced concrete: -48.3016, -689.348 kg (2 entries); lognormal variance with pedigree 0.0401216, pedigree (1,2,3,5,1)
  (same comment as for waste reinforced concrete)
- waste wood, untreated: -8.30057, -1.03064, -0.0753515, -2.89476, -0.437329, -0.69138, -12.9241, -110.123 kg (8 entries); lognormal variance with pedigree 0.0401216, pedigree (1,2,3,5,1)
  (same comment as for waste wood, untreated)
- scrap copper: -0.199404, -0.419863 kg (2 entries)
  (same comment as for scrap copper)
- cement, Portland: 5.73625, 0.184969, 0.320572, 0.262963, 5.54227, 6.4179, 0.270142, 37.7456 kg (8 entries); lognormal variance with pedigree 0.0401216, pedigree (1,2,3,5,1)
  (same comment as for cement, Portland)
- waste brick: -0.568488, -43.1735 kg (2 entries); lognormal variance with pedigree 0.0401216, pedigree (1,2,3,5,1)
  (same comment as for waste brick)
- concrete, normal: 0.00742954, 0.000774148, 0.00626727, 0.00352534, 0.0149288, 0.00050354, 0.290157 m3 (7 entries); lognormal variance with pedigree 0.0401216, pedigree (1,2,3,5,1)
  (same comment as for concrete, normal)
- waste bulk iron, excluding reinforcement: -0.286176, -0.595089 kg (2 entries); lognormal variance with pedigree 0.0401216, pedigree (1,2,3,5,1)
  (same comment as for waste bulk iron, excluding reinforcement)
- waste cement in concrete and mortar: -28.0292, -71.0578 kg (2 entries); lognormal variance with pedigree 0.0401216, pedigree (1,2,3,5,1)
  (same comment as for waste cement in concrete and mortar)
- waste concrete, not reinforced: -1.59762, -22.8009 kg (2 entries); lognormal variance with pedigree 0.0401216, pedigree (1,2,3,5,1)
  (same comment as for waste concrete, not reinforced)
- waste polyethylene: -0.00298823, -0.000199662, -1.51001e-5, -8.24675e-5, -3.33159e-5, -7.83106e-5, -0.00254611, -0.0209192 kg (8 entries); lognormal variance with pedigree 0.0401216, pedigree (1,2,3,5,1)
  (same comment as for waste polyethylene)

## Inputs from nature
- Transformation, to urban, discontinuously built [natural resource, land]: 2.99467 m2; lognormal variance with pedigree 0.484553, pedigree (1,2,3,5,1)
- Occupation, urban, discontinuously built [natural resource, land]: 149.733 m2*year; lognormal variance with pedigree 0.202131, pedigree (1,2,3,5,1)
- Occupation, construction site [natural resource, land]: 2.99467 m2*year; lognormal variance with pedigree 0.202131, pedigree (1,2,3,5,1)
- Transformation, from pasture, man made [natural resource, land]: 2.99467 m2; lognormal variance with pedigree 0.484553, pedigree (1,2,3,5,1)

## Emissions to nature
- Heat, waste [air, non-urban air or from high stacks]: 8.61827 MJ; lognormal variance with pedigree 0.00648048, pedigree (1,2,3,5,1)
  Corresponds to 49'657.52MJ from the whole building with 50 years life time, 111 m2 usable space and 630 m3 volume.

## Sampling procedure
Features of the model used: Building volume: 630 m3; Useable space: 111 m2; Service life span: 50 years.
The repair percentage and the depreciation period of individual construction elements come from ART Tanikon’s Modular Construction Standards for Farm Building Costs (Hilty & Herzog 2000). The construction variants were compiled by D. Herzog, ART Tanikon.

## Extrapolations
The amount of the exchanges are copy from a regional dataset.
