# treatment of waste plastic, industrial electronics, municipal incineration

Dataset: EcoSpold 2, unit process
Geography: CH
Time period: 1994-01-01 to 2019-12-31
Technology level: outdated
Classification: ISIC rev.4 ecoinvent: 3821:Treatment and disposal of non-hazardous waste
Classification: EcoSpold01Categories: waste management/municipal incineration
Synonyms: larger plastic parts in industrial electronics
Tags: Treatment; ConvertedDataset
Scenario: Business-as-Usual
System model: Allocation at the point of substitution
Generated by: Gabor Doka (obsolete)
Published in: Doka G. 2007
Database: ecoinvent
isCopyrightProtected: true
accessRestrictedTo: 1

## General comment
Inventoried waste contains 100% Plastics from electronic industrial goods; .
waste composition (wet, in ppm): upper heating value 36.24 MJ/kg; lower heating value 34.78 MJ/kg; H2O 7213.7; O 62000; H 73000; C 808000; S 400; N 13500; P 400; B n.a.; Cl 6400; Br 4200; F 370; I n.a.; Ag n.a.; As 5; Ba 217; Cd 186; Co 29.478; Cr 71; Cu 3194.1; Hg 0.3; Mn 9.8; Mo 4; Ni 299; Pb 165; Sb 4795.2; Se 1.9596; Sn 139; V 1; Zn 520; Be 0.46656; Sc n.a.; Sr 82.582; Ti 4767; Tl 0.37325; W n.a.; Si 2383; Fe 1673; Ca 3047; Al 2773; K 1; Mg n.a.; Na 151;
Share of carbon in waste that is biogenic 0%.
Share of iron in waste that is metallic/recyclable 0%.
Net energy produced in MSWI: 4MJ/kg waste electric energy and 8.05MJ/kg waste thermal energy
Allocation of energy production: no substitution or expansion. Total burden allocated to waste disposal function of MSWI.
One kg of this waste produces 0.03569 kg of slag and 0.017 kg of residues, which are landfilled. Additional solidification with 0.006801 kg of cement.
[This dataset was already contained in the ecoinvent database version 2. It was not individually updated during the transfer to ecoinvent version 3. Life Cycle Impact Assessment results may still have changed, as they are affected by changes in the supply chain, i.e. in other datasets. This dataset was generated following the ecoinvent quality guidelines for version 2. It may have been subject to central changes described in the ecoinvent version 3 change report (http://www.ecoinvent.org/database/ecoinvent-version-3/reports-of-changes/), and the results of the central updates were reviewed extensively. The changes added e.g. consistent water flows and other information throughout the database. The documentation of this dataset can be found in the ecoinvent reports of version 2, which are still available via the ecoinvent website. The change report linked above covers all central changes that were made during the conversion process.]

## Included activities end
waste-specific air and water emisions from incineration, auxiliary material consumption for flue gas cleaning. Short-term emissions to river water and long-term emisisons to ground water from slag compartment (from bottom slag) and residual material landfill (from solidified fly ashes and scrubber slugde). Process energy demands for MSWI.

## Geography
Specific to the technology mix encountered in Switzerland in 2000. Well applicable to modern incineration practices in Europe, North America or Japan.

## Technology
replaced by newer incineration technology with fly ash extraction. Average Swiss MSWI plants in 2000 with electrostatic precipitator for fly ash (ESP), wet flue gas scrubber and 29.4% SNCR , 32.2% SCR-high dust , 24.6% SCR-low dust -DeNOx facilities and 13.8% without Denox (by burnt waste, according to Swiss average). Share of waste incinerated in plants with magnetic scrap separation from slag : 50%. Gross electric efficiency technology mix 12.997% and Gross thermal efficiency technology mix 25.57%

## Time period
Waste composition as given in literature reference, theoretical data or other source. Transfer coefficients for modern Swiss MSWI. Emission speciation based on early 90ies data.

## Reference product
- waste plastic, industrial electronics: -1 kg; CPC 39270: Waste, parings and scrap of plastics; By-product classification Waste
  EcoSpold01Location=CH
  production volume 0 kg
    outdated. Replaced by newer incineration technology with fly ash extraction.
  property price 0 EUR2005
    Waste products are assigned a price of zero as they are assumed to require further treatment.
  property carbon content, fossil 0.81386
    C content in 1 kg DM was calculated using data in Tab A.2, ecoinvent v2.2 report 13_I
  property carbon content 0.81386
    carbon content on a dry matter basis (reserved; not for manual entry)
  properties: wet mass 1 kg, dry mass 0.847 kg, carbon content, non-fossil 0, water content 0.180638, water in wet mass 0.153 kg, carbon allocation 0.689339 kg

## Inputs from technosphere
- chemical, inorganic: 2.23e-5 kg; lognormal variance with pedigree 0.36, pedigree (1,1,5,1,1)
  Proxy for Polyelectrolyte. uncertainty calculated from uncertainty in average auxiliary material input, and the unertainty of the waste composition of this waste
  EcoSpold01Location=GLO
  properties: wet mass 1 kg, carbon content, fossil 0.003, dry mass 1 kg
  note on carbon content, fossil: This dataset is an unweighted average of 20 inorganic substances (listed in Tab 88.1, ecoinvent v2.2 report 8, part II), being part of the top100 chemicals included in this database. The C-content has also been calculated as an unweighted average of the C content of the substances composing this dataset.
- process-specific burdens, residual material landfill: 0.017 kg; lognormal variance with pedigree 0.11, pedigree (1,1,5,1,1)
  EcoSpold01Location=CH
  uncertainty is calculated from uncertainties in waste composition and transfer coefficients in incinerator;activityLink introduced to establish a direct link to the corresponding regional supply of this product
- chemical, organic: 0.00074 kg; lognormal variance with pedigree 0.93, pedigree (1,1,5,1,1)
  Proxy for TMT15. uncertainty calculated from uncertainty in average auxiliary material input, and the unertainty of the waste composition of this waste
  EcoSpold01Location=GLO
  properties: dry mass 1 kg, wet mass 1 kg, carbon content, fossil 0.628
  note on carbon content, fossil: This dataset is an unweighted average of 20 organic substances (listed in Tab 88.1, ecoinvent v2.2 report 8, part II), being part of the top100 chemicals included in this database. The C-content has also been calculated as an unweighted average of the C content of the substances composing this dataset.
- waste cement, hydrated: -0.017 kg; lognormal variance with pedigree 0.12, pedigree (1,1,5,1,1)
  Hydrated cement for solidification of landfilled residual material. Uncertainty calculated from unertainty of the waste composition of this waste and transfer coefficients in the incinerator and of the solidification recipe.
  EcoSpold01Location=CH
  production volume 0 kg; = Ref('cb6b32e2-6ff0-43d9-9a17-8d5d9cf49a19', 'ProductionVolume')* (Ref('bca493d7-d403-4d5f-ad86-70a6aff8266b')*-1)
    Calculated from the production volume of waste plastic, industrial electronics, 15.3% water in proportion to the respective output amounts.
  properties: dry mass 1 kg, wet mass 1 kg
- process-specific burdens, municipal waste incineration: 1 kg; lognormal variance with pedigree 0.04, pedigree (1,1,5,1,1)
  EcoSpold01Location=CH
  demands per kilogram waste. uncertainty is heeded in the module;activityLink introduced to establish a direct link to the corresponding regional supply of this product
- iron (III) chloride, without water, in 40% solution state: 0.000564 kg; lognormal variance with pedigree 0.32, pedigree (1,1,5,1,1)
  EcoSpold01Location=CH
  uncertainty calculated from uncertainty in average auxiliary material input, and the unertainty of the waste composition of this waste
  properties: dry mass 1 kg, wet mass 1 kg
- ammonia, liquid: 0.000681 kg; lognormal variance with pedigree 1.29, pedigree (1,1,5,1,1)
  EcoSpold01Location=CH
  uncertainty calculated from uncertainty in average DeNOx input, uncertainty in the share of thermal NOx, uncertainty of nitrogen content in average municipal waste and the unertainty in nitrogen content in *this* waste.
  properties: dry mass 1 kg, wet mass 1 kg
- slag landfill: 6.34e-11 unit; lognormal variance with pedigree 0.08, pedigree (1,1,5,1,1)
  uncertainty is calculated from uncertainties in waste composition and transfer coefficients in incinerator
  EcoSpold01Location=CH
- cement, unspecified: 0.0068 kg; lognormal variance with pedigree 0.12, pedigree (1,1,5,1,1)
  EcoSpold01Location=CH
  Cement for solidification of landfilled residual material. Uncertainty calculated from unertainty of the waste composition of this waste, of transfer coefficients in the incinerator and of the solidification recipe.
  properties: wet mass 1 kg, dry mass 1 kg
- chromium oxide, flakes: 3.98e-7 kg; lognormal variance with pedigree 2, pedigree (1,1,5,1,1)
  EcoSpold01Location=RER
  Proxy for vanadium pentoxide V2O5 in SCR catalyst, uncertainty calculated from uncertainty in average DeNOx input, uncertainty in the share of thermal NOx, uncertainty of nitrogen content in average municipal waste and the unertainty in nitrogen content in *this* waste.
  properties: wet mass 1 kg, dry mass 1 kg
- quicklime, milled, packed: 0.00112 kg; lognormal variance with pedigree 0.46, pedigree (1,1,5,1,1)
  uncertainty calculated from uncertainty in average auxiliary material input, and the unertainty of the waste composition of this waste
  EcoSpold01Location=CH
  properties: wet mass 1 kg, water content 0.010101, dry mass 0.99 kg
- hydrochloric acid, without water, in 30% solution state: 1.34e-5 kg; lognormal variance with pedigree 0.36, pedigree (1,1,5,1,1)
  EcoSpold01Location=RER
  uncertainty calculated from uncertainty in average auxiliary material input, and the unertainty of the waste composition of this waste
  properties: dry mass 1 kg, wet mass 1 kg
- process-specific burdens, slag landfill: 0.0357 kg; lognormal variance with pedigree 0.08, pedigree (1,1,5,1,1)
  uncertainty is calculated from uncertainties in waste composition and transfer coefficients in incinerator;activityLink introduced to establish a direct link to the corresponding regional supply of this product
  EcoSpold01Location=CH
- titanium dioxide: 1.95e-5 kg; lognormal variance with pedigree 2, pedigree (1,1,5,1,1)
  EcoSpold01Location=RER
  uncertainty calculated from uncertainty in average DeNOx input, uncertainty in the share of thermal NOx, uncertainty of nitrogen content in average municipal waste and the unertainty in nitrogen content in *this* waste.
  properties: dry mass 1 kg, wet mass 1 kg
- municipal waste incineration facility: 2.5e-10 unit; lognormal variance with pedigree 0.04, pedigree (1,1,5,1,1)
  EcoSpold01Location=CH
  demands per kilogram waste. uncertainty is heeded in the module
- residual material landfill: 3.54e-11 unit; lognormal variance with pedigree 0.11, pedigree (1,1,5,1,1)
  (same comment as for slag landfill)
- heat, district or industrial, natural gas: 0.05976 MJ; lognormal variance with pedigree 1.29, pedigree (1,1,5,1,1)
  (same comment as for titanium dioxide)
- sodium hydroxide, without water, in 50% solution state: 0.00647 kg; lognormal variance with pedigree 0.44, pedigree (1,1,5,1,1)
  uncertainty calculated from uncertainty in average auxiliary material input, and the unertainty of the waste composition of this waste
  EcoSpold01Location=RER
  properties: dry mass 1 kg, wet mass 1 kg

## Emissions to nature
- Arsenic, ion [water, ground-, long-term]: 2.75e-6 kg; lognormal variance with pedigree 1.4, pedigree (1,1,5,1,1)
  Long-term emissions from landfilling of incineration residues. uncertainty is calculated from uncertainties in waste composition and transfer coefficients in incinerator and landfills.
- Sodium, ion [water, surface water]: 3.26e-5 kg; lognormal variance with pedigree 0.53, pedigree (1,1,5,1,1)
  uncertainty is calculated from uncertainties in waste composition and transfer coefficients in incinerator and landfills
- Fluoride [water, ground-, long-term]: 0.00033 kg; lognormal variance with pedigree 0.54, pedigree (1,1,5,1,1)
  (same comment as for Arsenic, ion)
- Cyanide [air, urban air close to ground]: 1.22e-5 kg; lognormal variance with pedigree 1.4, pedigree (1,1,5,1,1)
  uncertainty calculated from uncertainty in average N-emissions, uncertainty in the share of thermal NOx, uncertainty of nitrogen content in average municipal waste and the unertainty in nitrogen content in *this* waste.
- Sulfur dioxide [air, urban air close to ground]: 1.7e-6 kg; lognormal variance with pedigree 0.83, pedigree (1,1,5,1,1)
  uncertainty is calculated from uncertainties in waste composition and transfer coefficients in incinerator
- Barium [water, ground-, long-term]: 0.000193 kg; lognormal variance with pedigree 0.95, pedigree (1,1,5,1,1)
  (same comment as for Arsenic, ion)
- Silicon [water, surface water]: 5.05e-7 kg; lognormal variance with pedigree 0.77, pedigree (1,1,5,1,1)
  (same comment as for Sodium, ion)
- Beryllium [water, surface water]: 2.9e-10 kg; lognormal variance with pedigree 1.94, pedigree (1,1,5,1,1)
  (same comment as for Sodium, ion)
- Potassium, ion [water, ground-, long-term]: 8.24e-7 kg; lognormal variance with pedigree 1.22, pedigree (1,1,5,1,1)
  (same comment as for Arsenic, ion)
- Phosphorus [air, urban air close to ground]: 4e-7 kg; lognormal variance with pedigree 0.84, pedigree (1,1,5,1,1)
  (same comment as for Sulfur dioxide)
- COD, Chemical Oxygen Demand [water, ground-, long-term]: 0.0199 kg; lognormal variance with pedigree 0.05, pedigree (1,1,5,1,1)
  (same comment as for Arsenic, ion)
- TOC, Total Organic Carbon [water, ground-, long-term]: 0.00789 kg; lognormal variance with pedigree 0.05, pedigree (1,1,5,1,1)
  (same comment as for Arsenic, ion)
- Beryllium [air, urban air close to ground]: 4.67e-10 kg; lognormal variance with pedigree 1.73, pedigree (1,1,5,1,1)
  (same comment as for Sulfur dioxide)
- Manganese [air, urban air close to ground]: 5.34e-14 kg; lognormal variance with pedigree 1.43, pedigree (1,1,5,1,1)
  (same comment as for Sulfur dioxide)
- Bromine [air, urban air close to ground]: 1.26e-5 kg; lognormal variance with pedigree 0.53, pedigree (1,1,5,1,1)
  (same comment as for Sulfur dioxide)
- Antimony [air, urban air close to ground]: 1.87e-11 kg; lognormal variance with pedigree 0.63, pedigree (1,1,5,1,1)
  (same comment as for Sulfur dioxide)
- Chromium, ion [water, surface water]: 2.26e-7 kg; lognormal variance with pedigree 1.06, pedigree (1,1,5,1,1)
  (same comment as for Sodium, ion)
- Calcium, ion [water, ground-, long-term]: 0.00265 kg; lognormal variance with pedigree 0.53, pedigree (1,1,5,1,1)
  (same comment as for Arsenic, ion)
- Copper, ion [water, surface water]: 1.3e-7 kg; lognormal variance with pedigree 1.22, pedigree (1,1,5,1,1)
  (same comment as for Sodium, ion)
- Carbon monoxide, fossil [air, urban air close to ground]: 0.000223 kg; lognormal variance with pedigree 0.690625, pedigree (1,3,5,2,1)
  Literature data from switzerland and germany adapted to plant age distribution in switzerland
  Uncertainty: & basic uncertainty of 5; literature data from switzerland and germany adapted to plant age distribution in switzerland
- Dinitrogen monoxide [air, urban air close to ground]: 5.7e-5 kg; lognormal variance with pedigree 1.4, pedigree (1,1,5,1,1)
  (same comment as for Cyanide)
- Mercury [water, ground-, long-term]: 1.56e-8 kg; lognormal variance with pedigree 3.51, pedigree (1,1,5,1,1)
  (same comment as for Arsenic, ion)
- Methane, fossil [air, urban air close to ground]: 6.38e-6 kg; lognormal variance with pedigree 0.091225, pedigree (2,3,5,2,1)
  Confidential data from 5 plants in Switzerland and Germany
  Uncertainty: & basic uncertainty of 1.5; confidential data from 5 plants in Switzerland and Germany
- Nitrate [water, surface water]: 0.000173 kg; lognormal variance with pedigree 0.28, pedigree (1,1,5,1,1)
  (same comment as for Sodium, ion)
- Nitrogen oxides [air, urban air close to ground]: 0.00043 kg; lognormal variance with pedigree 1.4, pedigree (1,1,5,1,1)
  (same comment as for Cyanide)
- Thallium [water, surface water]: 2.29e-10 kg; lognormal variance with pedigree 1.91, pedigree (1,1,5,1,1)
  (same comment as for Sodium, ion)
- Nickel, ion [water, ground-, long-term]: 0.00028 kg; lognormal variance with pedigree 0.82, pedigree (1,1,5,1,1)
  (same comment as for Arsenic, ion)
- Beryllium [water, ground-, long-term]: 3.76e-7 kg; lognormal variance with pedigree 1.49, pedigree (1,1,5,1,1)
  (same comment as for Arsenic, ion)
- Cobalt [water, ground-, long-term]: 2.58e-5 kg; lognormal variance with pedigree 1.12, pedigree (1,1,5,1,1)
  (same comment as for Arsenic, ion)
- Potassium [air, urban air close to ground]: 3.01e-9 kg; lognormal variance with pedigree 1.62, pedigree (1,1,5,1,1)
  (same comment as for Sulfur dioxide)
- Strontium [air, urban air close to ground]: 8.26e-9 kg; lognormal variance with pedigree 1.06, pedigree (1,1,5,1,1)
  (same comment as for Sulfur dioxide)
- Cobalt [water, surface water]: 5.04e-9 kg; lognormal variance with pedigree 1.61, pedigree (1,1,5,1,1)
  (same comment as for Sodium, ion)
- Nitrate [water, ground-, long-term]: 0.000485 kg; lognormal variance with pedigree 0.38, pedigree (1,1,5,1,1)
  (same comment as for Arsenic, ion)
- Vanadium, ion [water, surface water]: 6.75e-10 kg; lognormal variance with pedigree 1.74, pedigree (1,1,5,1,1)
  (same comment as for Sodium, ion)
- DOC, Dissolved Organic Carbon [water, surface water]: 2.22e-5 kg; lognormal variance with pedigree 0.27, pedigree (1,1,5,1,1)
  (same comment as for Sodium, ion)
- Arsenic, ion [water, surface water]: 2.25e-6 kg; lognormal variance with pedigree 1.17, pedigree (1,1,5,1,1)
  (same comment as for Sodium, ion)
- Lead [air, urban air close to ground]: 6.12e-9 kg; lognormal variance with pedigree 0.98, pedigree (1,1,5,1,1)
  (same comment as for Sulfur dioxide)
- Tin [air, urban air close to ground]: 1.84e-7 kg; lognormal variance with pedigree 0.98, pedigree (1,1,5,1,1)
  (same comment as for Sulfur dioxide)
- BOD5, Biological Oxygen Demand [water, surface water]: 3.02e-5 kg; lognormal variance with pedigree 0.16, pedigree (1,1,5,1,1)
  (same comment as for Sodium, ion)
- Antimony [water, ground-, long-term]: 0.00306 kg; lognormal variance with pedigree 0.39, pedigree (1,1,5,1,1)
  (same comment as for Arsenic, ion)
- Zinc [air, urban air close to ground]: 8.5e-9 kg; lognormal variance with pedigree 0.83, pedigree (1,1,5,1,1)
  (same comment as for Sulfur dioxide)
- Iron, ion [water, ground-, long-term]: 0.000784 kg; lognormal variance with pedigree 1.4, pedigree (1,1,5,1,1)
  (same comment as for Arsenic, ion)
- Molybdenum [water, ground-, long-term]: 3.31e-6 kg; lognormal variance with pedigree 1.42, pedigree (1,1,5,1,1)
  (same comment as for Arsenic, ion)
- Mercury [air, urban air close to ground]: 1.04e-14 kg; lognormal variance with pedigree 1.86, pedigree (1,1,5,1,1)
  (same comment as for Sulfur dioxide)
- Nickel [air, urban air close to ground]: 1.29e-11 kg; lognormal variance with pedigree 0.96, pedigree (1,1,5,1,1)
  (same comment as for Sulfur dioxide)
- Strontium [water, ground-, long-term]: 8.25e-5 kg; lognormal variance with pedigree 1.03, pedigree (1,1,5,1,1)
  (same comment as for Arsenic, ion)
- Chromium VI [water, ground-, long-term]: 7.52e-6 kg; lognormal variance with pedigree 1.28, pedigree (1,1,5,1,1)
  (same comment as for Arsenic, ion)
- Bromine [water, ground-, long-term]: 0.000734 kg; lognormal variance with pedigree 0.52, pedigree (1,1,5,1,1)
  (same comment as for Arsenic, ion)
- Thallium [water, ground-, long-term]: 2.18e-7 kg; lognormal variance with pedigree 1.31, pedigree (1,1,5,1,1)
  (same comment as for Arsenic, ion)
- Silicon [water, ground-, long-term]: 0.000207 kg; lognormal variance with pedigree 5.39, pedigree (1,1,5,1,1)
  (same comment as for Arsenic, ion)
- Tin, ion [water, surface water]: 5.16e-9 kg; lognormal variance with pedigree 1.12, pedigree (1,1,5,1,1)
  (same comment as for Sodium, ion)
- Iron [air, urban air close to ground]: 5.59e-8 kg; lognormal variance with pedigree 0.68, pedigree (1,1,5,1,1)
  (same comment as for Sulfur dioxide)
- Barium [air, urban air close to ground]: 2.17e-7 kg; lognormal variance with pedigree 0.92, pedigree (1,1,5,1,1)
  (same comment as for Sulfur dioxide)
- Sodium, ion [water, ground-, long-term]: 0.000117 kg; lognormal variance with pedigree 0.65, pedigree (1,1,5,1,1)
  (same comment as for Arsenic, ion)
- Chloride [water, surface water]: 0.00625 kg; lognormal variance with pedigree 0.42, pedigree (1,1,5,1,1)
  (same comment as for Sodium, ion)
- Phosphate [water, surface water]: 7.82e-8 kg; lognormal variance with pedigree 1.12, pedigree (1,1,5,1,1)
  (same comment as for Sodium, ion)
- Barium [water, surface water]: 2.98e-8 kg; lognormal variance with pedigree 1.78, pedigree (1,1,5,1,1)
  (same comment as for Sodium, ion)
- Calcium [air, urban air close to ground]: 5.08e-6 kg; lognormal variance with pedigree 0.57, pedigree (1,1,5,1,1)
  (same comment as for Sulfur dioxide)
- Zinc, ion [water, ground-, long-term]: 8.06e-6 kg; lognormal variance with pedigree 5.41, pedigree (1,1,5,1,1)
  (same comment as for Arsenic, ion)
- Aluminium [water, ground-, long-term]: 0.00205 kg; lognormal variance with pedigree 0.53, pedigree (1,1,5,1,1)
  (same comment as for Arsenic, ion)
- Molybdenum [air, urban air close to ground]: 8e-9 kg; lognormal variance with pedigree 1.44, pedigree (1,1,5,1,1)
  (same comment as for Sulfur dioxide)
- COD, Chemical Oxygen Demand [water, surface water]: 5.4e-5 kg; lognormal variance with pedigree 0.28, pedigree (1,1,5,1,1)
  (same comment as for Sodium, ion)
- Thallium [air, urban air close to ground]: 3.73e-10 kg; lognormal variance with pedigree 1.76, pedigree (1,1,5,1,1)
  (same comment as for Sulfur dioxide)
- BOD5, Biological Oxygen Demand [water, ground-, long-term]: 0.00652 kg; lognormal variance with pedigree 0.05, pedigree (1,1,5,1,1)
  (same comment as for Arsenic, ion)
- Tin, ion [water, ground-, long-term]: 6.99e-5 kg; lognormal variance with pedigree 1.34, pedigree (1,1,5,1,1)
  (same comment as for Arsenic, ion)
- Selenium [water, surface water]: 6.38e-7 kg; lognormal variance with pedigree 1.21, pedigree (1,1,5,1,1)
  (same comment as for Sodium, ion)
- Titanium, ion [water, surface water]: 2.3e-8 kg; lognormal variance with pedigree 1.86, pedigree (1,1,5,1,1)
  (same comment as for Sodium, ion)
- Cadmium, ion [water, ground-, long-term]: 1.87e-6 kg; lognormal variance with pedigree 6.78, pedigree (1,1,5,1,1)
  (same comment as for Arsenic, ion)
- Hydrogen fluoride [air, urban air close to ground]: 1.95e-7 kg; lognormal variance with pedigree 0.85, pedigree (1,1,5,1,1)
  (same comment as for Sulfur dioxide)
- Lead [water, surface water]: 4.6e-9 kg; lognormal variance with pedigree 1, pedigree (1,1,5,1,1)
  (same comment as for Sodium, ion)
- Copper [air, urban air close to ground]: 2.36e-8 kg; lognormal variance with pedigree 0.6, pedigree (1,1,5,1,1)
  (same comment as for Sulfur dioxide)
- Cadmium, ion [water, surface water]: 8.44e-8 kg; lognormal variance with pedigree 0.9, pedigree (1,1,5,1,1)
  (same comment as for Sodium, ion)
- Aluminium [water, surface water]: 2.31e-7 kg; lognormal variance with pedigree 0.96, pedigree (1,1,5,1,1)
  (same comment as for Sodium, ion)
- Iron, ion [water, surface water]: 5.73e-7 kg; lognormal variance with pedigree 0.62, pedigree (1,1,5,1,1)
  (same comment as for Sodium, ion)
- Zinc, ion [water, surface water]: 9.56e-8 kg; lognormal variance with pedigree 0.7, pedigree (1,1,5,1,1)
  (same comment as for Sodium, ion)
- Chromium VI [water, surface water]: 2.31e-6 kg; lognormal variance with pedigree 1, pedigree (1,1,5,1,1)
  (same comment as for Sodium, ion)
- Selenium [air, urban air close to ground]: 9.85e-15 kg; lognormal variance with pedigree 1.64, pedigree (1,1,5,1,1)
  (same comment as for Sulfur dioxide)
- Carbon dioxide, fossil [air, urban air close to ground]: 2.93 kg; lognormal variance with pedigree 0.04, pedigree (1,1,5,1,1)
  (same comment as for Sulfur dioxide)
- Selenium [water, ground-, long-term]: 1.32e-6 kg; lognormal variance with pedigree 1.03, pedigree (1,1,5,1,1)
  (same comment as for Arsenic, ion)
- Aluminium [air, urban air close to ground]: 4.33e-6 kg; lognormal variance with pedigree 0.58, pedigree (1,1,5,1,1)
  (same comment as for Sulfur dioxide)
- Chloride [water, ground-, long-term]: 0.000151 kg; lognormal variance with pedigree 0.22, pedigree (1,1,5,1,1)
  (same comment as for Arsenic, ion)
- Titanium, ion [water, ground-, long-term]: 0.00143 kg; lognormal variance with pedigree 0.86, pedigree (1,1,5,1,1)
  (same comment as for Arsenic, ion)
- Manganese [water, surface water]: 5.48e-10 kg; lognormal variance with pedigree 2.06, pedigree (1,1,5,1,1)
  (same comment as for Sodium, ion)
- Manganese [water, ground-, long-term]: 8.44e-6 kg; lognormal variance with pedigree 1.39, pedigree (1,1,5,1,1)
  (same comment as for Arsenic, ion)
- Hydrogen chloride [air, urban air close to ground]: 7.11e-8 kg; lognormal variance with pedigree 0.51, pedigree (1,1,5,1,1)
  (same comment as for Sulfur dioxide)
- Sulfate [water, ground-, long-term]: 0.001 kg; lognormal variance with pedigree 0.49, pedigree (1,1,5,1,1)
  (same comment as for Arsenic, ion)
- Silicon [air, urban air close to ground]: 5.55e-6 kg; lognormal variance with pedigree 0.6, pedigree (1,1,5,1,1)
  (same comment as for Sulfur dioxide)
- Vanadium [air, urban air close to ground]: 1e-10 kg; lognormal variance with pedigree 1.64, pedigree (1,1,5,1,1)
  (same comment as for Sulfur dioxide)
- Arsenic [air, urban air close to ground]: 5.1e-14 kg; lognormal variance with pedigree 1.52, pedigree (1,1,5,1,1)
  (same comment as for Sulfur dioxide)
- Titanium [air, urban air close to ground]: 4.77e-6 kg; lognormal variance with pedigree 0.52, pedigree (1,1,5,1,1)
  (same comment as for Sulfur dioxide)
- DOC, Dissolved Organic Carbon [water, ground-, long-term]: 0.00789 kg; lognormal variance with pedigree 0.05, pedigree (1,1,5,1,1)
  (same comment as for Arsenic, ion)
- Fluoride [water, surface water]: 2.84e-5 kg; lognormal variance with pedigree 0.57, pedigree (1,1,5,1,1)
  (same comment as for Sodium, ion)
- Chromium [air, urban air close to ground]: 5.25e-12 kg; lognormal variance with pedigree 1.14, pedigree (1,1,5,1,1)
  (same comment as for Sulfur dioxide)
- Molybdenum [water, surface water]: 6.83e-7 kg; lognormal variance with pedigree 0.94, pedigree (1,1,5,1,1)
  (same comment as for Sodium, ion)
- Nickel, ion [water, surface water]: 1.88e-7 kg; lognormal variance with pedigree 1.44, pedigree (1,1,5,1,1)
  (same comment as for Sodium, ion)
- Phosphate [water, ground-, long-term]: 4.68e-5 kg; lognormal variance with pedigree 5.04, pedigree (1,1,5,1,1)
  (same comment as for Arsenic, ion)
- Ammonia [air, urban air close to ground]: 1.07e-5 kg; lognormal variance with pedigree 1.4, pedigree (1,1,5,1,1)
  (same comment as for Cyanide)
- Calcium, ion [water, surface water]: 1.15e-5 kg; lognormal variance with pedigree 1.01, pedigree (1,1,5,1,1)
  (same comment as for Sodium, ion)
- Sulfate [water, surface water]: 0.000194 kg; lognormal variance with pedigree 0.41, pedigree (1,1,5,1,1)
  (same comment as for Sodium, ion)
- Lead [water, ground-, long-term]: 1.18e-5 kg; lognormal variance with pedigree 7, pedigree (1,1,5,1,1)
  (same comment as for Arsenic, ion)
- Strontium [water, surface water]: 5.2e-8 kg; lognormal variance with pedigree 1.74, pedigree (1,1,5,1,1)
  (same comment as for Sodium, ion)
- Vanadium, ion [water, ground-, long-term]: 1.72e-7 kg; lognormal variance with pedigree 2.32, pedigree (1,1,5,1,1)
  (same comment as for Arsenic, ion)
- Cadmium [air, urban air close to ground]: 1.02e-8 kg; lognormal variance with pedigree 0.96, pedigree (1,1,5,1,1)
  (same comment as for Sulfur dioxide)
- Cobalt [air, urban air close to ground]: 9.36e-13 kg; lognormal variance with pedigree 1.27, pedigree (1,1,5,1,1)
  (same comment as for Sulfur dioxide)
- Copper, ion [water, ground-, long-term]: 0.00258 kg; lognormal variance with pedigree 0.54, pedigree (1,1,5,1,1)
  (same comment as for Arsenic, ion)
- Antimony [water, surface water]: 0.00166 kg; lognormal variance with pedigree 0.42, pedigree (1,1,5,1,1)
  (same comment as for Sodium, ion)
- TOC, Total Organic Carbon [water, surface water]: 2.22e-5 kg; lognormal variance with pedigree 0.27, pedigree (1,1,5,1,1)
  (same comment as for Sodium, ion)
- Bromine [water, surface water]: 0.00346 kg; lognormal variance with pedigree 0.42, pedigree (1,1,5,1,1)
  (same comment as for Sodium, ion)
- Sodium [air, urban air close to ground]: 1.42e-6 kg; lognormal variance with pedigree 0.96, pedigree (1,1,5,1,1)
  (same comment as for Sulfur dioxide)
- Potassium, ion [water, surface water]: 1.73e-7 kg; lognormal variance with pedigree 1.08, pedigree (1,1,5,1,1)
  (same comment as for Sodium, ion)
- Mercury [water, surface water]: 3.21e-9 kg; lognormal variance with pedigree 1.73, pedigree (1,1,5,1,1)
  (same comment as for Sodium, ion)

## Sampling procedure
waste-specific calculation based on literature data

## Extrapolations
This dataset has been extrapolated from year 2000 to the year of the calculation (2019). The uncertainty has been adjusted accordingly.

## Review by Niels Jungbluth 2003-07-15
Passed. Calculation for standard deviation 95 of, i.e., infrastructure,
land occupation, transport services or other services can differ from
standard Pedigree approach used in this project and figures obtained by
this procedure.
