# lorry production, 16 metric ton

Dataset: EcoSpold 2, unit process
Geography: RoW
Time period: 1998-01-01 to 2019-12-31
Technology level: current
Classification: EcoSpold01Categories: transport systems/road
Classification: ISIC rev.4 ecoinvent: 2910:Manufacture of motor vehicles
Scenario: Business-as-Usual
System model: Allocation at the point of substitution
Generated by: Michael Spielmann (obsolete)
Published in: Spielmann M. 2007
Database: ecoinvent
isCopyrightProtected: true
accessRestrictedTo: 1

## General comment
Based on "lorry production, 16 metric ton, RER 2002". Material consumption values refer to the production of one average lorry in the referring weight class (net weight 6800t). Total Kilometric performance: 5.40E+05. Interventions for manufacturing processes of vehicles are independent of weight class. The disposal of lorry is included too.

## Included activities start
The dataset starts with the material used for the production of the lorry.

## Included activities end
The inventory includes processes of material, energy and water use in vehicle manufacturing (final assembly, engine production and manufacturing of metal parts). Rail and road transport of materials is accounted for. Plant infrastructure is included, addressing issues such as land use, building, road and parking construction. Vehicle disposal is as well included.

## Geography
Extrapolated from "lorry production, 16 metric ton, RER 2002". Vehicle manufacturing data are taken from one production site in Germany.

## Technology
Current production technology, environmental issues have been addressed in the past.

## Time period
The material consumption represents a current 16t vehicle (Volvo FH). The data for vehicle production are representative for lorry production of one German company with an environmental management system. The data includes the final assembly (2000), engine production (2002) and the manufacturing of metal parts (2002).
References:
Volvo Truck Corporation (2004) Environmental product declaration: Volvo 8500 Low-Entry. Download of March from http://www.volvo.com/bus/global/engb/
volvogroup/core+values/environment/downloads.htm.
MAN Nutzfahrzeuge AG (2000) Umwelterklärung 1999. MAN Nutzfahrzeuge AG, München
MAN Nutzfahrzeuge AG (2002) Umwelterklärung 2002. MAN Nutzfahrzeuge AG, München
Frischknecht R. and Jungbluth N. (2003) Code of Practice. Final report ecoinvent 2000 No. 2. ESU-services, Uster, Swiss Centre for Life Cycle Inventories, Duebendorf, CH, Online-Version under: www.ecoinvent.ch.
Doka G. (2003) Life Cycle Inventories of Waste Treatment Services. Final report ecoinvent 2000 No. 13. EMPA St. Gallen, Swiss Centre for Life
Cycle Inventories, Duebendorf, CH, Online-Version under:
www.ecoinvent.ch.

## Parameters
- fraction, tap water, to air: 0.15; name fraction_TW_to_air; = fraction_PW_to_air; lognormal variance with pedigree 0.092025, pedigree (4,4,3,2,4)
  Calculated value. See comment in the other parametres present in this dataset. Tap water is considered to be always used as process water, thus process water fractions to air are applied to all tap water input flows to calculate the amount of water consumed in the processes.
- fraction, process water, to air: 0.15 dimensionless; name fraction_PW_to_air; lognormal variance with pedigree 0.092025, pedigree (4,4,3,2,4)
  Literature value. In case when no industry/process specific data are available, default evaporation fraction value is used. This value is 15% and is based on literature (Statistics Canada, 2007 & Shaffer, K.H., 2008, Consumptive water use in the Great Lakes Basin, USGS & Shiklomanov, 2003, World Water Resources at the Beginning of the 21st Century) and has been approved by an expert.

## Reference product
- lorry, 16 metric ton: 1 unit; CPC 49114: Motor vehicles n.e.c. for the transport of goods; By-product classification allocatable product
  EcoSpold01Location=RER
  production volume 2.67763 unit
    This is a placeholder value that does not reflect real-world production volumes. This dataset does not currently require a real-world production volume to work in the database framework, and no actual data were collected yet. This has no negative effect on the results of the ecoinvent database.
  property price 21720 EUR2005
    The calculated value based on literature (10859 Euro) has been re-evaluated by an expert in the field and it was concluded, that the price in reality is app. 2 times higher. Calculated based on literature; 2003-2004 data are only from 2004. According to Industrial Commodity Statistics Yearbook 2005, volume 1. Physical Quantity Data. UN. New York 2008 (hard copy ). The price divided by the number of production units of two of the highest producing countries in EU27 (Spain in 2004 and Germany in 2005) in this database. US$ converted to according to http://en.wikipedia.org/wiki/Table_of_historical_exchange_rates downloaded 2 July 2009. This is average prices of all trucks in each of the two countries. NOTE that the price for an average truck is about 3 times higher in Germany than in Spain, most likely reflecting the higher production price and smaller average size of trucks.
  property true value 21720
    allocation property applied in "true value" allocation // value calculated from revenue

## By-products
- electricity, for reuse in municipal waste incineration only: 0 kWh; CPC 17100: Electrical energy; By-product classification allocatable product; pedigree (1,1,1,1,1)
  Net electricity generated from this waste and used in internal MSWI plant energy redistribution.
  Uncertainty: uncertainty is calculated from uncertainties in waste composition and uncertainties in energy efficiency and the uncertainty in internal energy demand
  production volume 69.7737 kWh
  property exergy 3.6 MJ; name E_el_prod_MSWI_exergy
    This exergy property is based on the exergy content of the product.
  property true value relation 3.6; name E_el_prod_MSWI_true_value_relation
    property to calculate "true value" from
  property price 0.1 EUR2005; name E_el_prod_MSWI_price_EUR2005
    Estimated to be the same price as in case of electricity, medium voltage.
  property true value 3.34999
    allocation property applied in "true value" allocation // value calculated from true value relation
- heat, for reuse in municipal waste incineration only: 0 MJ; CPC 17300: Steam and hot water; By-product classification allocatable product; pedigree (1,1,1,1,1)
  Net useful heat generated from this waste and used in internal MSWI plant energy redistribution.
  Uncertainty: uncertainty is calculated from uncertainties in waste composition and uncertainties in energy efficiency and the uncertainty in internal energy demand
  production volume 497.413 MJ
  property true value relation 0.1842; name E_th_prod_MSWI_true_value_relation
    property to calculate "true value" from
  property exergy 0.1842 MJ; name E_th_prod_MSWI_exergy
    This exergy property is based on the exergy content of the product.
  property price 0.0106 EUR2005; name E_th_prod_MSWI_price_EUR2005
    Average European district heat price from Ecoheatcool and Euroheat 2005-2006, Ecoheat Work package 1: The European heat market. Final report. 10.6 EUR/GJ i s the price of district heat. http://www.solarthermalworld.org/files/Ecoheatcool%20WP1%20Web.pdf?download
  property true value 1.22195
    (same comment as for electricity, for reuse in municipal waste incineration only)
- zinc concentrate: 0 kg; CPC 14290: Other non-ferrous metal ores and concentrates (other than uranium or thorium ores and concentrates); By-product classification allocatable product
  Calculated value from the knowledge of the properties of both products.
  production volume 0.0147985 kg
  property price 0.38 EUR2005; name ByP_price_EUR2005
    Temporary price data. Calculated as 90% of purchasers price based on: Zinc content in concentrate 53%. Concentrate price per kg Zn 86.5% of refined Zn price (13.5% treatment charges according to CHR Metals Limited 2005: Dynamic cost curves. http://www.minecost.com/dynamic.pdf). 2004 zinc price from USGS (2007) Mineral commodity summaries 2007. <http://minerals.usgs.gov/minerals/pubs/mcs/2007/mcs2007.pdf> [Accessed 25 May 2010]
  property zinc content 0.53; name zinc_C_zinc_concentrate
    Zinc content on a dry matter basis. Value taken from teh "zinc mine operation" /GLO dataset.
  property dry mass 1 kg; name DM_zinc_concentrate
  property carbon content 0
    carbon content on a dry matter basis (reserved; not for manual entry)
  property true value 0.00210015
    allocation property applied in "true value" allocation // value calculated from revenue
  properties: wet mass 1 kg, water content 0, carbon content, non-fossil 0, carbon content, fossil 0, water in wet mass 0 kg, carbon allocation 0 kg

## Inputs from technosphere
- lead: 73.6045 kg; source Volvo Truck Corporation 2004; lognormal variance with pedigree 0.052, pedigree (1,1,5,5,1)
  EcoSpold01Location=RER
  Estimated value. Based on the material composition of a Volvo FH as available from product declaration.
  properties: wet mass 1 kg, dry mass 1 kg
- brass: 19.9958 kg; source Volvo Truck Corporation 2004; lognormal variance with pedigree 0.162, pedigree (1,1,5,5,1)
  EcoSpold01Location=CH
  Estimated value. Based on the material composition of a Volovo FH as available from product declaration.
  properties: dry mass 1 kg, wet mass 1 kg
- diesel: 0 kg; source MAN Nutzfahrzeuge AG 2000; pedigree (1,1,1,1,1)
  Literature value. Diesel is used for engine testing and the operation of fork-lifters. The latter is modeled as building machine. Energy expenditures for stationary combustion processes are available from environmental reports of a German lorry manufacturer MAN Nutzfahrzeuge AG (2000) and MAN Nutzfahrzeuge AG (2002). The data is available for various manufacturing sites performing different tasks in the manufacturing chain. The total value used in this study comprises stamping processes, metal part and wiring harness manufacturing, engine production and testing as well as the final assembly.
  Additional references:
  MAN Nutzfahrzeuge AG (2002) Umwelterklärung 2002. MAN Nutzfahrzeuge AG, München.
  EcoSpold01Location=RER
  properties: carbon content, fossil 0.865, wet mass 1 kg, dry mass 1 kg
  note on carbon content, fossil: C-content of diesel is 86.5% (ecoinvent v2.2 report 6_IV, Tab 3.14)
- pitch: 0 kg; source Volvo Truck Corporation 2004; pedigree (1,1,1,1,1)
  EcoSpold01Location=RER
  Estimated value. Based on the material composition of a Volovo FH as available from product declaration.
  properties: wet mass 1 kg, carbon content, fossil 0.83, dry mass 1 kg
- copper: 29.9937 kg; source Volvo Truck Corporation 2004; lognormal variance with pedigree 0.162, pedigree (1,1,5,5,1)
  Estimated value. Based on the material composition of a Volovo FH as available from product declaration.
  EcoSpold01Location=RER
  properties: dry mass 1 kg, wet mass 1 kg
- polyethylene, high density, granulate: 229.952 kg; source Volvo Truck Corporation 2004; lognormal variance with pedigree 0.162, pedigree (1,1,5,5,1)
  Estimated value. Based on the material composition of a Volvo FH as available from product declaration.
  EcoSpold01Location=RER
  properties: wet mass 1 kg, dry mass 1 kg, carbon content, fossil 0.857143
  note on carbon content, fossil: Polyethylene is formed out of a huge amount of ethylene monomers (C2H4) (ecoinvent v2.2 report 11_II). MW=28 g/mol
- electronics, for control units: 29.9937 kg; source Volvo Truck Corporation 2004; lognormal variance with pedigree 0.052, pedigree (1,1,5,5,1)
  (same comment as for lead)
  properties: carbon content, non-fossil 0.00013442, wet mass 1 kg, dry mass 1 kg, carbon content, fossil 0.337146
  note on carbon content, non-fossil: The control unit has a composition of 46% steel (housing), 32% plastics, 14% printed wiring boards and 8% cables (various types).;
- sodium hydroxide, without water, in 50% solution state: 0.38092 kg; source MAN Nutzfahrzeuge AG 2000; lognormal variance with pedigree 0.052, pedigree (1,1,5,5,1)
  EcoSpold01Location=RER
  Literature value. Data represent MAN production sites in Germany and comprises: final truck assembly, engine manufacturing, manufacturing of metal parts. Data available from environmental reports of the company.
  Additional references:
  MAN Nutzfahrzeuge AG (2002) Umwelterklärung 2002. MAN Nutzfahrzeuge AG, München
  properties: wet mass 1 kg, dry mass 1 kg
- nitric acid, without water, in 50% solution state: 0.0984793 kg; source MAN Nutzfahrzeuge AG 2000; lognormal variance with pedigree 0.052, pedigree (1,1,5,5,1)
  (same comment as for sodium hydroxide, without water, in 50% solution state)
  properties: dry mass 1 kg, wet mass 1 kg
- pig iron: 1629.66 kg; source Volvo Truck Corporation 2004; lognormal variance with pedigree 0.082, pedigree (1,1,5,5,1)
  Estimated value. Based on the material composition of a Volvo FH as available from product declaration.
  EcoSpold01Location=GLO
  properties: wet mass 1 kg, carbon content, fossil 0.045, dry mass 1 kg
  note on carbon content, fossil: Pig iron is the iron produced in the blast furnace. It is an alloy of 94% Fe and more than 2% C (world average 4.5%). (ecoinvent v2.2 report 10_partII)
- lime, hydrated, packed: 0.309935 kg; source MAN Nutzfahrzeuge AG 2000; lognormal variance with pedigree 0.2106, pedigree (5,5,5,5,5)
  EcoSpold01Location=CH
  Literature value. Data represent MAN production sites in Germany and comprises: final truck assembly, engine manufacturing, manufacturing of metal parts. Data available from environmental reports of the company. For Ca(OH)2, 50% H2O is assumed.
  Additional references:
  MAN Nutzfahrzeuge AG (2002) Umwelterklärung 2002. MAN Nutzfahrzeuge AG, München
  Uncertainty: 2, 50% H2O is assumed.
  properties: dry mass 0.997 kg, water content 0.00300903, wet mass 1 kg
- flat glass, uncoated: 44.9905 kg; source Volvo Truck Corporation 2004; lognormal variance with pedigree 0.082, pedigree (1,1,5,5,1)
  (same comment as for lead)
  properties: dry mass 1 kg, wet mass 1 kg
- propylene glycol, liquid: 21.9954 kg; source Volvo Truck Corporation 2004; lognormal variance with pedigree 0.052, pedigree (1,1,5,5,1)
  (same comment as for polyethylene, high density, granulate)
  properties: dry mass 1 kg, carbon content, fossil 0.473684, wet mass 1 kg
- diesel, burned in building machine: 20.0958 MJ; source MAN Nutzfahrzeuge AG 2000; lognormal variance with pedigree 0.342, pedigree (1,1,5,5,1)
  Literature value. Diesel is used for engine testing and the operation of fork-lifters. The latter is modeled as building machine. Energy expenditures for stationary combustion processes are available from environmental reports of a German lorry manufacturer MAN Nutzfahrzeuge AG (2000) and MAN Nutzfahrzeuge AG (2002). The data is available for various manufacturing sites performing different tasks in the manufacturing chain. The total value used in this study comprises stamping processes, metal part and wiring harness manufacturing, engine production and testing as well as the final assembly.
  Additional references:
  MAN Nutzfahrzeuge AG (2002) Umwelterklärung 2002. MAN Nutzfahrzeuge AG, München.
  EcoSpold01Location=GLO
- cast iron: 1449.69 kg; source Volvo Truck Corporation 2004; lognormal variance with pedigree 0.082, pedigree (1,1,5,5,1)
  (same comment as for copper)
  properties: wet mass 1 kg, carbon content, fossil 0.04, dry mass 1 kg
  note on carbon content, fossil: Cast iron is made by remelting pig iron in small furnaces (e.g. cupola furnaces or electric arc furnaces) and poured into moulds to make castings. It usually contains 2% to 6% carbon (ecoinvent v2.2 report 10_partII). An average content of 4% was considered
- steel, chromium steel 18/8, hot rolled: 4.99895 kg; source Volvo Truck Corporation 2004; lognormal variance with pedigree 0.162, pedigree (1,1,5,5,1)
  (same comment as for polyethylene, high density, granulate)
  properties: carbon content, fossil 0.0008, dry mass 1 kg, wet mass 1 kg
  note on carbon content, fossil: Stainless steel model is the grade 304 steel (18/8 stainless, 18% chromium 8% nickel; max. 0.08% C)
- synthetic rubber: 374.921 kg; source Volvo Truck Corporation 2004; lognormal variance with pedigree 0.082, pedigree (1,1,5,5,1)
  (same comment as for polyethylene, high density, granulate)
  properties: carbon content, fossil 0.871949, dry mass 1 kg, wet mass 1 kg
  note on carbon content, fossil: EPDM (Ethylene-propene-diene terpolymer) rubber is a terpolymer of ethylene, propene, and a diene with the residual unsaturated portion of the diene in the side chain (ecoinvent v2.2 report 7-part XX & Ullmann). Chemical formula (deduced from Evidences of Solvent-Induced Miscibility in Polychloroprene-co-Ethylene-Propene Diene Terpolymer Blends, Dubey et al., Journal of Applied Polymer Science, 2009, 111:1884–1891): C20H35
- wastewater from lorry production: -2.17954 m3; source MAN Nutzfahrzeuge AG 2000; lognormal variance with pedigree 0.052, pedigree (1,1,5,5,1)
  Literature value. Data represent MAN production sites in Germany and comprises: final truck assembly, engine manufacturing, manufacturing of metal parts. Data available from environmental reports of the company.
  Additional references:
  MAN Nutzfahrzeuge AG (2002) Umwelterklärung 2002. MAN Nutzfahrzeuge AG, München
  EcoSpold01Location=CH
  production volume 6.54 m3
    Calculated from the production volume of lorry, 16 metric ton in proportion to the respective output amounts.
  properties: dry mass 0.337476 kg, water content 2962.17, wet mass 1000 kg
- used lorry, 16 metric ton: -0.999789 unit; lognormal variance with pedigree 0.344, pedigree (3,1,5,5,1)
  Uncertainty: own calculations
  production volume 2.67763 unit; = Ref('23e89720-f0d8-4561-a2cf-3496116843c1', 'ProductionVolume') * ((Ref('bb7b5176-375f-4343-906b-32bc4c287d09')*-1) / Ref('23e89720-f0d8-4561-a2cf-3496116843c1'))
    Calculated from production volume of reference product using the relative outputs.
  property carbon content, fossil 0.113894; name C_content_fossil
  property carbon content, non-fossil 0.0012201; name C_content_non_fossil
  property water in wet mass 0 kg; name WWM
  property water content 0; name water_content
  property wet mass 6800 kg; name WM
  property dry mass 6800 kg; name DM
- wire drawing, copper: 29.9937 kg; source Volvo Truck Corporation 2004; lognormal variance with pedigree 0.162, pedigree (1,1,5,5,1)
  (same comment as for polyethylene, high density, granulate)
- alkyd paint, white, without solvent, in 60% solution state: 39.9916 kg; source Volvo Truck Corporation 2004; lognormal variance with pedigree 0.082, pedigree (1,1,5,5,1)
  (same comment as for copper)
  properties: wet mass 1 kg, dry mass 1 kg, carbon content, fossil 0.140367, carbon content, non-fossil 0.199629
  note on carbon content, fossil: C content was calculated as an addition of C content in the raw materials.
- stone wool, packed: 9.99789 kg; source Volvo Truck Corporation 2004; lognormal variance with pedigree 0.052, pedigree (1,1,5,5,1)
  Estimated value. Based on the material composition of a Volvo FH as available from product declaration.
  EcoSpold01Location=CH
  properties: carbon content, fossil 0.015401, dry mass 1 kg, wet mass 1 kg
  note on carbon content, fossil: The chemical composition of the glass fibres used in the rock wool production is similar to the composition of naturally cooled volcano basalt and has a composition listed in Tab. 3.1 and 3.2 in ecoinvent v2.2 report 16, part XIV. Rock wool contains: a minimum of 96% mineral fibres,between 0.5 and 3.0 weight percent of phenolic resin depending on the specific product characteristics, and about 0.2 percent mineral oil (ecoinvent v2.2 report 16, part XIV). An average composition of 1.8% phenolic resin, 0.2% mineral oil, and 98% mineral fibres has been assumed and used to calculate C content of the rock wool
- aluminium, wrought alloy: 146.169 kg; = 0.68*215; source Volvo Truck Corporation 2004; lognormal variance with pedigree 0.162, pedigree (1,1,5,5,1)
  215 kg aluminium, production mix. Estimated value. Based on the material composition of a Volovo FH as available from product declaration.
  0.68: part of aluminium, wrought alloy in aluminium, production mix. Based on the aluminium, production mix in ecoinvent v2.2.
  properties: wet mass 1 kg, dry mass 1 kg
- wastewater, average: -15.8967 m3; source MAN Nutzfahrzeuge AG 2000; lognormal variance with pedigree 0.052, pedigree (1,1,5,5,1)
  EcoSpold01Location=CH
  Literature value. Data represent MAN production sites in Germany and comprises: final truck assembly, engine manufacturing, manufacturing of metal parts. Data available from environmental reports of the company.
  Additional references:
  MAN Nutzfahrzeuge AG (2002) Umwelterklärung 2002. MAN Nutzfahrzeuge AG, München
  production volume 47.7 m3
    (same comment as for wastewater from lorry production)
  properties: carbon content, non-fossil 0.194039, dry mass 0.346837 kg, wet mass 1000 kg, water content 2882.2
  note on carbon content, non-fossil: 0.0673 kg TOC/m3 (Tab A.17, ecoinvent v2.2 report 13_I). TOC was considered as Total Carbon.
- electricity, medium voltage: 0 kWh; source MAN Nutzfahrzeuge AG 2000; pedigree (1,1,1,1,1)
  EcoSpold01Location=UCTE
  Literature value. Energy expenditures for stationary combustion processes are available from environmental reports of a German lorry manufacturer MAN Nutzfahrzeuge AG (2000)andMAN Nutzfahrzeuge AG (2000). The data is available for various manufacturing sites performing different tasks in the manufacturing chain. The total value used in this study comprises stamping processes, metal part and wiring harness manufacturing, engine production and testing as well as the final assembly.
  Additional references:
  MAN Nutzfahrzeuge AG (2002) Umwelterklärung 2002. MAN Nutzfahrzeuge AG, München.
- lubricating oil: 62.0869 kg; source MAN Nutzfahrzeuge AG 2000; lognormal variance with pedigree 0.162, pedigree (1,1,5,5,1)
  (same comment as for sodium hydroxide, without water, in 50% solution state)
  properties: dry mass 1 kg, wet mass 1 kg, carbon content, fossil 0.75
  note on carbon content, fossil: Lubricating oil is produced from diesel. C-content/dry mass of fats and oils considered 75%, from: ecoinvent v2.2 report, n 15a, pg 40
- steel, low-alloyed, hot rolled: 11.3976 kg; source Volvo Truck Corporation 2004; lognormal variance with pedigree 1.372, pedigree (1,1,5,5,1)
  (same comment as for lead)
  properties: carbon content, fossil 0.005, dry mass 1 kg, wet mass 1 kg
  note on carbon content, fossil: Low alloyed steel composition given in Tab. 3.2 ecoinvent v2.2 report 10_partII. Steel assumed to have a C content of 0.5%
- tap water: 0 kg; name tap_water_input; source MAN Nutzfahrzeuge AG 2002; pedigree (1,1,1,1,1)
  EcoSpold01Location=RER
  Calculated value. About 95% of the consumed tap water and groundwater are used in the final assembly of vehicles (own calculations based on MAN Nutzfahrzeuge AG (2002)).
  properties: dry mass 0.000337476 kg, carbon content, fossil 0.00178991, water content 2962.17, wet mass 1 kg
  note on carbon content, fossil: Bicarbonate content is 2.93 mol/m3. CO2 content is 0.1 mol/m3 (ecoinvent v2.2 report 8, Tab 93.1).
- road vehicle factory: 8.72816e-7 unit; lognormal variance with pedigree 0.342, pedigree (1,1,5,5,1)
  EcoSpold01Location=RER
  Estimated value. Expenditures for the infrastructure of a road vehicle plant have been estimated and linked to vehicle manufacturing.
- acetic acid, without water, in 98% solution state: 0.0659861 kg; source MAN Nutzfahrzeuge AG 2000; lognormal variance with pedigree 0.052, pedigree (1,1,5,5,1)
  (same comment as for sodium hydroxide, without water, in 50% solution state)
  properties: wet mass 1 kg, carbon content, fossil 0.400016, dry mass 1 kg
- sulfuric acid: 27.8941 kg; source Volvo Truck Corporation 2004; lognormal variance with pedigree 0.052, pedigree (1,1,5,5,1)
  (same comment as for polyethylene, high density, granulate)
  properties: dry mass 1 kg, wet mass 1 kg
- heat, district or industrial, other than natural gas: 0 MJ; source MAN Nutzfahrzeuge AG 2000; pedigree (1,1,1,1,1)
  EcoSpold01Location=RER
  Literature value. Energy expenditures for stationary combustion processes are available from environmental reports of a German lorry manufacturer MAN Nutzfahrzeuge AG (2000)andMAN Nutzfahrzeuge AG (2000). The data is available for various manufacturing sites performing different tasks in the manufacturing chain. The total value used in this study comprises stamping processes, metal part and wiring harness manufacturing, engine production and testing as well as the final assembly.
  Additional references:
  MAN Nutzfahrzeuge AG (2002) Umwelterklärung 2002. MAN Nutzfahrzeuge AG, München.
- sheet rolling, steel: 417.912 kg; source Volvo Truck Corporation 2004; lognormal variance with pedigree 0.052, pedigree (1,1,5,5,1)
  (same comment as for lead)
- section bar rolling, steel: 1629.66 kg; source Volvo Truck Corporation 2004; lognormal variance with pedigree 0.082, pedigree (1,1,5,5,1)
  (same comment as for polyethylene, high density, granulate)
- heat, district or industrial, natural gas: 0 MJ; source MAN Nutzfahrzeuge AG 2000; pedigree (1,1,1,1,1)
  Literature value. Energy expenditures for stationary combustion processes are available from environmental reports of a German lorry manufacturer MAN Nutzfahrzeuge AG (2000)andMAN Nutzfahrzeuge AG (2000). The data is available for various manufacturing sites performing different tasks in the manufacturing chain. The total value used in this study comprises stamping processes, metal part and wiring harness manufacturing, engine production and testing as well as the final assembly.
  Additional references:
  MAN Nutzfahrzeuge AG (2002) Umwelterklärung 2002. MAN Nutzfahrzeuge AG, München.
  EcoSpold01Location=RER
- aluminium, cast alloy: 68.7855 kg; = 0.32*215; source Volvo Truck Corporation 2004; lognormal variance with pedigree 0.162, pedigree (1,1,5,5,1)
  215 kg aluminium, production mix. Estimated value. Based on the material composition of a Volovo FH as available from product declaration.
  0.32: part of aluminium cast alloy in aluminium, production mix. Based on the aluminium, production mix in ecoinvent v2.2.
  properties: wet mass 1 kg, dry mass 1 kg
- hydrochloric acid, without water, in 30% solution state: 0.18896 kg; source MAN Nutzfahrzeuge AG 2000; lognormal variance with pedigree 0.052, pedigree (1,1,5,5,1)
  (same comment as for sodium hydroxide, without water, in 50% solution state)
  properties: dry mass 1 kg, wet mass 1 kg
- reinforcing steel: 2259.52 kg; source Volvo Truck Corporation 2004; lognormal variance with pedigree 0.052, pedigree (1,1,5,5,1)
  (same comment as for polyethylene, high density, granulate)
  properties: carbon content, fossil 0.004, wet mass 1 kg, dry mass 1 kg
- diesel: 7.15329, 0.343888, 14.437, 1.01125, 1.46164, 142.558 kg (6 entries); source MAN Nutzfahrzeuge AG 2000; lognormal variance with pedigree 0.342, pedigree (1,1,5,5,1)
  (same comment as for diesel)
- pitch: 0.540458, 0.0308017, 1.39408, 0.0624883, 0.0892079, 7.88086 kg (6 entries); source Volvo Truck Corporation 2004; lognormal variance with pedigree 0.052, pedigree (1,1,5,5,1)
  (same comment as for pitch)
- electricity, medium voltage: 62.0371, 11.2881, 191.43, 2775.53, 397.231, 1301.49 kWh (6 entries); source MAN Nutzfahrzeuge AG 2000; lognormal variance with pedigree 0.052, pedigree (1,1,5,5,1)
  (same comment as for electricity, medium voltage)
- tap water: 30.7227, 255.229, 50.7743, 1280.33, 33.3074, 94.7424, 14651.4 kg (7 entries); source MAN Nutzfahrzeuge AG 2002; lognormal variance with pedigree 0.052, pedigree (1,1,5,5,1)
  (same comment as for tap water)
- heat, district or industrial, other than natural gas: 0.385601, 860.133 MJ (2 entries); source MAN Nutzfahrzeuge AG 2000; lognormal variance with pedigree 0.052, pedigree (1,1,5,5,1)
  (same comment as for heat, district or industrial, other than natural gas)
- heat, district or industrial, natural gas: 561.278, 31731.9 MJ (2 entries); source MAN Nutzfahrzeuge AG 2000; lognormal variance with pedigree 0.052, pedigree (1,1,5,5,1)
  (same comment as for heat, district or industrial, natural gas)

## Inputs from nature
- Water, well, in ground [natural resource, in water]: 69.4854 m3; name water_well_in_ground_input; source MAN Nutzfahrzeuge AG 2002; lognormal variance with pedigree 0.052, pedigree (1,1,5,5,1)
  Calculated value. About 95% of the consumed tap water and groundwater are used in the final assembly of vehicles (own calculations based on MAN Nutzfahrzeuge AG (2002)).

## Emissions to nature
- Carbon dioxide, fossil [air, unspecified]: 632.867 kg; source MAN Nutzfahrzeuge AG 2000; lognormal variance with pedigree 0.162, pedigree (1,1,5,5,1)
  Calculated value. Based on the diesel consumption for engine testing, direct environmental emissions to air are calculated, employing the emission profile of a lorry 28t empty. Is assumed that diesel is used for engine testing and the operation of fork-lifters. The latter is modeled as building machine.Energy expenditures for stationary combustion processes are available from environmental reports of a German lorry manufacturer MAN Nutzfahrzeuge AG (2000) and MAN Nutzfahrzeuge AG (2002).
  Additional references:
  MAN Nutzfahrzeuge AG (2002) Umwelterklärung 2002. MAN Nutzfahrzeuge AG, München.
- Selenium [air, unspecified]: 1.72964e-6 kg; source MAN Nutzfahrzeuge AG 2000; lognormal variance with pedigree 0.692, pedigree (1,1,5,5,1)
  (same comment as for Carbon dioxide, fossil)
- Particulates, > 10 um [air, unspecified]: 0.0108977 kg; source MAN Nutzfahrzeuge AG 2000; lognormal variance with pedigree 0.162, pedigree (1,1,5,5,1)
  (same comment as for Carbon dioxide, fossil)
- Nickel [air, unspecified]: 1.20975e-5 kg; source MAN Nutzfahrzeuge AG 2000; lognormal variance with pedigree 0.692, pedigree (1,1,5,5,1)
  (same comment as for Carbon dioxide, fossil)
- DOC, Dissolved Organic Carbon [water, unspecified]: 0.0550884 kg; source Frischknecht R. 2003; lognormal variance with pedigree 0.162, pedigree (1,1,5,5,1)
  Calculated value according to ecoinvent quality guidelines Frischknecht et al. (2003).
- Water [air, unspecified]: 12.8823 m3; name water_to_air_unspecified; = (tap_water_input/1000)*fraction_TW_to_air+water_well_in_ground_input*fraction_PW_to_air; lognormal variance with pedigree 0.130025, pedigree (4,4,5,2,4)
  Calculated value based on literature values and expert opinion. See comments in the parametres' comment field.
  property fraction, origin: salt water 0; name fraction_origin_salt_water
  property fraction, origin: fresh water 1; name fraction_origin_fresh_water
  property fraction, origin: unspecified 0; name fraction_origin_unspecified
- Benzene [air, unspecified]: 0.0130972 kg; source MAN Nutzfahrzeuge AG 2000; lognormal variance with pedigree 0.162, pedigree (1,1,5,5,1)
  (same comment as for Carbon dioxide, fossil)
- Water [water, unspecified]: 54.9234 m3; name water_to_water_unspecified; = (tap_water_input/1000)*(1-fraction_TW_to_air)+water_well_in_ground_input*(1-fraction_PW_to_air)-2.18-15.9; lognormal variance with pedigree 0.130025, pedigree (4,4,5,2,4)
  (same comment as for Water)
  property fraction, origin: unspecified 0; name fraction_origin_unspecified_Ww
  property fraction, origin: fresh water 1; name fraction_origin_fresh_water_Ww
  property fraction, origin: salt water 0; name fraction_origin_salt_water_Ww
- Toluene [air, unspecified]: 0.00550884 kg; source MAN Nutzfahrzeuge AG 2000; lognormal variance with pedigree 0.162, pedigree (1,1,5,5,1)
  (same comment as for Carbon dioxide, fossil)
- BOD5, Biological Oxygen Demand [water, unspecified]: 0.125973 kg; source Frischknecht R. 2003; lognormal variance with pedigree 0.162, pedigree (1,1,5,5,1)
  Calculated value according to ecoinvent quality guidelines Frischknecht et al. (2003).
- Cadmium [air, unspecified]: 1.72964e-6 kg; source MAN Nutzfahrzeuge AG 2000; lognormal variance with pedigree 0.692, pedigree (1,1,5,5,1)
  (same comment as for Carbon dioxide, fossil)
- Particulates, < 2.5 um [air, unspecified]: 0.253947 kg; source MAN Nutzfahrzeuge AG 2000; lognormal variance with pedigree 0.162, pedigree (1,1,5,5,1)
  (same comment as for Carbon dioxide, fossil)
- Mercury [air, unspecified]: 3.44927e-9 kg; source MAN Nutzfahrzeuge AG 2000; lognormal variance with pedigree 0.692, pedigree (1,1,5,5,1)
  (same comment as for Carbon dioxide, fossil)
- Particulates, > 2.5 um, and < 10um [air, unspecified]: 0.0211955 kg; source MAN Nutzfahrzeuge AG 2000; lognormal variance with pedigree 0.162, pedigree (1,1,5,5,1)
  (same comment as for Carbon dioxide, fossil)
- Chromium [air, unspecified]: 0.000292938 kg; source MAN Nutzfahrzeuge AG 2000; lognormal variance with pedigree 0.692, pedigree (1,1,5,5,1)
  (same comment as for Carbon dioxide, fossil)
- NMVOC, non-methane volatile organic compounds, unspecified origin [air, unspecified]: 7.86834 kg; source MAN Nutzfahrzeuge AG 2000; lognormal variance with pedigree 0.162, pedigree (1,1,5,5,1)
  (same comment as for Carbon dioxide, fossil)
- Nitrogen oxides [air, unspecified]: 5.99874 kg; source MAN Nutzfahrzeuge AG 2000; lognormal variance with pedigree 0.162, pedigree (1,1,5,5,1)
  (same comment as for Carbon dioxide, fossil)
- Lead [air, unspecified]: 1.8996e-8 kg; source MAN Nutzfahrzeuge AG 2000; lognormal variance with pedigree 0.692, pedigree (1,1,5,5,1)
  (same comment as for Carbon dioxide, fossil)
- Carbon monoxide, fossil [air, unspecified]: 0.972795 kg; source MAN Nutzfahrzeuge AG 2000; lognormal variance with pedigree 0.162, pedigree (1,1,5,5,1)
  (same comment as for Carbon dioxide, fossil)
- COD, Chemical Oxygen Demand [water, unspecified]: 0.125973 kg; source MAN Nutzfahrzeuge AG 2002; lognormal variance with pedigree 0.162, pedigree (1,1,5,5,1)
  Literature value. For automotive stamping, a Chemical Oxygen Demand (COD) is reported MAN Nutzfahrzeuge AG (2002) with 12800 kg/year resulting in a specific COD of 0.126 kg/vehicle.
- Zinc [air, unspecified]: 0.000172964 kg; source MAN Nutzfahrzeuge AG 2000; lognormal variance with pedigree 0.692, pedigree (1,1,5,5,1)
  (same comment as for Carbon dioxide, fossil)
- Copper [air, unspecified]: 0.000292938 kg; source MAN Nutzfahrzeuge AG 2000; lognormal variance with pedigree 0.692, pedigree (1,1,5,5,1)
  (same comment as for Carbon dioxide, fossil)
- Sulfur dioxide [air, unspecified]: 0.119975 kg; source MAN Nutzfahrzeuge AG 2000; lognormal variance with pedigree 0.162, pedigree (1,1,5,5,1)
  (same comment as for Carbon dioxide, fossil)
- TOC, Total Organic Carbon [water, unspecified]: 0.0550884 kg; source Frischknecht R. 2003; lognormal variance with pedigree 0.162, pedigree (1,1,5,5,1)
  Calculated value according to ecoinvent quality guidelines Frischknecht et al. (2003).
- Ammonia [air, unspecified]: 0.0222953 kg; source MAN Nutzfahrzeuge AG 2000; lognormal variance with pedigree 0.162, pedigree (1,1,5,5,1)
  (same comment as for Carbon dioxide, fossil)
- Dinitrogen monoxide [air, unspecified]: 0.0222953 kg; source MAN Nutzfahrzeuge AG 2000; lognormal variance with pedigree 0.162, pedigree (1,1,5,5,1)
  (same comment as for Carbon dioxide, fossil)
- Xylene [air, unspecified]: 0.00550884 kg; source MAN Nutzfahrzeuge AG 2000; lognormal variance with pedigree 0.162, pedigree (1,1,5,5,1)
  (same comment as for Carbon dioxide, fossil)
- Methane, fossil [air, unspecified]: 0.0164965 kg; source MAN Nutzfahrzeuge AG 2000; lognormal variance with pedigree 0.162, pedigree (1,1,5,5,1)
  (same comment as for Carbon dioxide, fossil)

## Sampling procedure
Manufacturing data is taken from an environmental report of one production site. Additional data was generated via oral communcation.

## Extrapolations
Data from one production site in Germany is used as an first estimate for Europe This dataset has been copied from an original dataset covering the geography RER. The uncertainty has been adjusted accordingly.

## Review by Carl Vadenbo 2012-06-28
In preparation for the release of ecoinvent v3.0, the output of 'used lorry, 16 metric ton' was removed from the various 'transport, lorry, 16t' datasets and added to 'lorry, 16t, RER' in ecoinvent v2.2 and renamed and extrapolated to 'lorry production, 16 metric ton, GLO 2002'. The added exchange of by-product/waste was reviewed and the new dataset was accepted for inclusion into the ecoinvent database on 2012.07.05. The uncertainty information has only been adjusted for geographical representativeness in GLO, and consequently needs to be revised before subsequent releases of the database.

## Review by Niels Jungbluth 2006-09-27
passed.
