# glider production, electric scooter

Dataset: EcoSpold 2, unit process
Geography: GLO
Time period: 2000-01-01 to 2019-12-31
Technology level: current
Classification: EcoSpold01Categories: transport systems/road
Classification: ISIC rev.4 ecoinvent: 3091:Manufacture of motorcycles
Synonyms: eScooter, eRoller
Scenario: Business-as-Usual
System model: Allocation at the point of substitution
Generated by: Andrea Del Duce
Published in: M. Leuenberger 2010
Database: ecoinvent
isCopyrightProtected: true
accessRestrictedTo: 1

## General comment
The dataset reflects a scooter running 60-70 km/h at max. speed. Manufacturing in Asia. It describes the body of an electric vehicle, without electric drivetrain and without battery. The dataset has been created by taking the dataset made by Leuenberger for ecoinvent v2.2 and removing the battery and electric motor. These will be described in other datasets in order to have overall a modular structure. Hence, the remaining material quantities, comments and uncertainties all originate from the dataset described in "Life Cycle Assessment of two wheel vehicles" (Leuenberger, 2010).
[This dataset was already contained in the ecoinvent database version 2. It was not individually updated during the transfer to ecoinvent version 3. Life Cycle Impact Assessment results may still have changed, as they are affected by changes in the supply chain, i.e. in other datasets. This dataset was generated following the ecoinvent quality guidelines for version 2. It may have been subject to central changes described in the ecoinvent version 3 change report (http://www.ecoinvent.org/database/ecoinvent-version-3/reports-of-changes/), and the results of the central updates were reviewed extensively. The changes added e.g. consistent water flows and other information throughout the database. The documentation of this dataset can be found in the ecoinvent reports of version 2, which are still available via the ecoinvent website. The change report linked above covers all central changes that were made during the conversion process.]

## Included activities start
This data set includes all processes and materials for eScooter manufacturing, excluding the battery and the electric drivetrain.

## Included activities end
The dataset returns the finished product as well as waste deriving from production.

## Geography
Data based on manufacturing in Asia.

## Technology
Automised production of small e-scooters.

## Parameters
- fraction, process water, to air: 0.15 dimensionless; name fraction_PW_to_air; lognormal variance with pedigree 0.092025, pedigree (4,4,3,2,4)
  Literature value. In case when no industry/process specific data are available, default evaporation fraction value is used. This value is 15% and is based on literature (Statistics Canada, 2007 & Shaffer, K.H., 2008, Consumptive water use in the Great Lakes Basin, USGS & Shiklomanov, 2003, World Water Resources at the Beginning of the 21st Century) and has been approved by an expert.
- fraction, tap water, to air: 0.15; name fraction_TW_to_air; = fraction_PW_to_air; lognormal variance with pedigree 0.092025, pedigree (4,4,3,2,4)
  Calculated value. See comment in the other parametres present in this dataset. Tap water is considered to be always used as process water, thus process water fractions to air are applied to all tap water input flows to calculate the amount of water consumed in the processes.

## Reference product
- iron scrap, unsorted: 1 kg; CPC 39310: Slag, dross, scalings and other waste from the manufacture of iron or steel; By-product classification Recyclable; pedigree (1,1,1,1,1)
  Production waste. Waste factors taken from F. Habermacher 2011.
  production volume 3.8777e7 kg; = Ref('7a0c28c6-50ab-46e0-8738-eb54faa808d1', 'ProductionVolume') * (Ref('825d5036-53a7-4cfb-836d-bc1fabb8b7e8') / Ref('7a0c28c6-50ab-46e0-8738-eb54faa808d1'))
    Calculated from production volume of reference product using the relative outputs.
  property price 0.149 EUR2005
    Temporary price data. Calculated as 90% of purchasers price based on: estimated at 85% of sorted scrap
  property carbon content 0
    carbon content on a dry matter basis (reserved; not for manual entry)
  property true value 7.43941
    allocation property applied in "true value" allocation // value calculated from revenue
  properties: water content 0, wet mass 1 kg, carbon content, non-fossil 0, carbon content, fossil 0, dry mass 1 kg, water in wet mass 0 kg, carbon allocation 0 kg
- glider, for electric scooter: 0 kg; By-product classification allocatable product; CPC 49941: Parts and accessories of motorcycles and side-cars
  production volume 6.213e7 kg
    Rough estimate based on 1% electric scooters out of 466E6 world two wheeler production projection between 2010 and 2016.(www.electric-bicycle-guide.com)
  property price 8.37 EUR2005
    Calculated value based on estimates and literature. The price of the batterry is 32.06euro/kg. The weight of a battery for an electric scooter is 30kg (producer's information: http://vespino.ch/?page_id=6, accessed 20130726). The market price for an electric scooter is approximatelly 4600euro (producer's information: http://vespino.ch/?page_id=6, accessed: 20130726). It is estimated, that the basic price is 1/3 lower than the market price (expert judgement). The basic price of a scooter without batterry is then calculated to be ((4600*2/3)-(32.06*30)=) 2105euro. The ratio between the price of powertrain and glider in case of electric cars is 1:17 (for more details see the comment field of these products' prices). The resulting prices are 8.4euro/kg of glider, for electric scooter and 142euro/kg of powertrain, for electric scooter. The price is considered to be the same (142euro/kg) for all the parts of the powertrain, such as motor, controller and charger.
  property true value 669.6
    allocation property applied in "true value" allocation // value calculated from revenue

## By-products
- copper: 0 kg; source Rentz O. 1999; By-product classification allocatable product; CPC 41413: Refined copper and copper alloys, unwrought; master alloys of copper
  Literature value. Copper uses: Before end-use copper is manufactured into semi fabricated products, such as shapes and ingots (known as 'semis'). These manufacturing processes are subdivided into hot working, cold working and, if necessary, process annealing. Few of the semis are ready for use as such. They more typically travel to first-stage manufacturers, who make metal rods, wire, and casting, and then to component manufacturers who produce such things as motors, valves, and insulated cables The components in turn are incorporated by final-stage manufacturers into a variety of finished products - automobiles, commercial buildings, residential housing, and so forth. These uses account for about 79% of the world-wide consumption of copper.
  production volume 569786 kg
  properties: dry mass 1 kg, water in wet mass 0 kg, wet mass 1 kg, carbon content, non-fossil 0, water content 0, price 5.52 EUR2005, carbon content, fossil 0, carbon content 0, carbon allocation 0 kg, true value 4.04986
- electricity, for reuse in municipal waste incineration only: 0 kWh; CPC 17100: Electrical energy; By-product classification allocatable product; pedigree (1,1,1,1,1)
  Net electricity generated from this waste and used in internal MSWI plant energy redistribution.
  Uncertainty: uncertainty is calculated from uncertainties in waste composition and uncertainties in energy efficiency and the uncertainty in internal energy demand
  production volume 9.79395e6 kWh
  property exergy 3.6 MJ; name E_el_prod_MSWI_exergy
    This exergy property is based on the exergy content of the product.
  property true value relation 3.6; name E_el_prod_MSWI_true_value_relation
    property to calculate "true value" from
  property price 0.1 EUR2005; name E_el_prod_MSWI_price_EUR2005
    Estimated to be the same price as in case of electricity, medium voltage.
  property true value 1.61552
    allocation property applied in "true value" allocation // value calculated from true value relation
- heat, for reuse in municipal waste incineration only: 0 MJ; CPC 17300: Steam and hot water; By-product classification allocatable product; pedigree (1,1,1,1,1)
  Net useful heat generated from this waste and used in internal MSWI plant energy redistribution.
  Uncertainty: uncertainty is calculated from uncertainties in waste composition and uncertainties in energy efficiency and the uncertainty in internal energy demand
  production volume 6.90061e7 MJ
  property true value relation 0.1842; name E_th_prod_MSWI_true_value_relation
    property to calculate "true value" from
  property exergy 0.1842 MJ; name E_th_prod_MSWI_exergy
    This exergy property is based on the exergy content of the product.
  property price 0.0106 EUR2005; name E_th_prod_MSWI_price_EUR2005
    Average European district heat price from Ecoheatcool and Euroheat 2005-2006, Ecoheat Work package 1: The European heat market. Final report. 10.6 EUR/GJ i s the price of district heat. http://www.solarthermalworld.org/files/Ecoheatcool%20WP1%20Web.pdf?download
  property true value 0.582431
    (same comment as for electricity, for reuse in municipal waste incineration only)
- zinc concentrate: 0 kg; CPC 14290: Other non-ferrous metal ores and concentrates (other than uranium or thorium ores and concentrates); By-product classification allocatable product
  Calculated value from the knowledge of the properties of both products.
  production volume 25.0286 kg
  property price 0.38 EUR2005; name ByP_price_EUR2005
    Temporary price data. Calculated as 90% of purchasers price based on: Zinc content in concentrate 53%. Concentrate price per kg Zn 86.5% of refined Zn price (13.5% treatment charges according to CHR Metals Limited 2005: Dynamic cost curves. http://www.minecost.com/dynamic.pdf). 2004 zinc price from USGS (2007) Mineral commodity summaries 2007. <http://minerals.usgs.gov/minerals/pubs/mcs/2007/mcs2007.pdf> [Accessed 25 May 2010]
  property zinc content 0.53; name zinc_C_zinc_concentrate
    Zinc content on a dry matter basis. Value taken from teh "zinc mine operation" /GLO dataset.
  property dry mass 1 kg; name DM_zinc_concentrate
  property carbon content 0
    carbon content on a dry matter basis (reserved; not for manual entry)
  property true value 1.22464e-5
    allocation property applied in "true value" allocation // value calculated from revenue
  properties: wet mass 1 kg, water content 0, carbon content, non-fossil 0, carbon content, fossil 0, water in wet mass 0 kg, carbon allocation 0 kg
- aluminium oxide, non-metallurgical: 0 kg; source European Aluminium Association 2008; CPC 41432: Alumina (aluminium oxide), except artificial corundum; By-product classification allocatable product; CAS 1344-28-1; pedigree (1,1,1,1,1)
  production volume 630144 kg
  property carbon content, non-fossil 0; name C_content_non_fossil
  property price 0.28 EUR2005; name Al2O3Amount_price_EUR2005
    From UN trade database. http://data.un.org/ Import data from the largest economies of the world are used (Brazil, India, USA, China, Japan and EU-27).
  property dry mass 1 kg; name DM
  property water content 0; name water_content
  property wet mass 1 kg; name WM
  property water in wet mass 0 kg; name WWM
  property carbon content, fossil 0; name C_content_fossil
  property carbon content 0
    carbon content on a dry matter basis (reserved; not for manual entry)
  property true value 0.20482
    allocation property applied in "true value" allocation // value calculated from revenue
  properties: carbon allocation 0 kg
- aluminium, cast alloy: 0 kg; source European Aluminium Association 2008; By-product classification allocatable product; CPC 41431: Unwrought aluminium; pedigree (1,1,1,1,1)
  EcoSpold01Location=RER
  production volume 5.89045e6 kg
  property price 1.3 EUR2005; name castAlloyAmount_price_EUR2005
  properties: water in wet mass 0 kg, carbon content, non-fossil 0, water content 0, dry mass 1 kg, carbon content, fossil 0, wet mass 1 kg, carbon content 0, carbon allocation 0 kg, true value 8.88926
- aluminium, wrought alloy: 0 kg; source European Aluminium Association 2008; By-product classification allocatable product; CPC 4153: Semi-finished products of aluminium or aluminium alloys; pedigree (1,1,1,1,1)
  production volume 3.03385e6 kg
  property price 1.44 EUR2005; name secondaryAluminiumOutput_price_EUR2005
  properties: wet mass 1 kg, water content 0, carbon content, fossil 0, water in wet mass 0 kg, carbon content, non-fossil 0, dry mass 1 kg, carbon content 0, carbon allocation 0 kg, true value 4.80776
- iron scrap, sorted, pressed: 0 kg; By-product classification Recyclable; CPC 39310: Slag, dross, scalings and other waste from the manufacture of iron or steel; pedigree (1,1,1,1,1)
  metallic iron scrap removed from ash reamains and recycled.
  Uncertainty: uncertainty is calculated from uncertainties in waste composition and transfer coefficients to soild residues
  production volume 106861 kg
  property price 0.175 EUR2005
    Temporary price data. Calculated as 90% of purchasers price based on: 2005 import and export prices (total trades (USD) divided by total weight (kg) in biggest economies of the world: EU27, USA, Brasil, China, India, Japan and Russia) from UN Commodity Trade Statistics Database (http://data.un.org/Explorer.aspxDatabase [Accessed 2011.06.20]). Commodity: Waste or scrap, of cast iron
  property carbon content 0
    carbon content on a dry matter basis (reserved; not for manual entry)
  property true value 0.0240794
    allocation property applied in "true value" allocation // value calculated from revenue
  properties: carbon content, non-fossil 0, wet mass 1 kg, dry mass 1 kg, water content 0, carbon content, fossil 0, water in wet mass 0 kg, carbon allocation 0 kg
- aluminium alloy, AlLi: 0 kg; By-product classification allocatable product; CPC 41431: Unwrought aluminium
  reference flow
  production volume 200.096 kg
  property price 3.6 EUR2005; name ref_price_EUR2005
    Literature value (http://www.economist.com/news/business/21576714-mining-industry-has-enriched-chile-its-future-precarious-copper-solution). Average price between 20015 and 2013.
  property carbon content 0
    carbon content on a dry matter basis (reserved; not for manual entry)
  property true value 0.000818172
    allocation property applied in "true value" allocation // value calculated from revenue
  properties: carbon content, non-fossil 0, carbon content, fossil 0, dry mass 1 kg, wet mass 1 kg, water in wet mass 0 kg, carbon allocation 0 kg
- ground granulated blast furnace slag: 0 kg; By-product classification allocatable product; CPC 37440: Portland cement, aluminous cement, slag cement and similar hydraulic cements, except in the form of clinkers
  Functional unit of LCI by Marceau & VanGeem (2003) was 1 short ton of slag cement (GGBFS) output which was converted to 907.18 kg for the present inventory.
  production volume 22.9155 kg
  property water content 0; name GGBFS_water_content
  property carbon content, non-fossil 0; name GGBFS_C_content_non_fossil
  property water in wet mass 0 kg; name GGBFS_WWM
  property carbon content, fossil 0; name GGBFS_C_content_fossil
    Industry value; Arcelor Mittal, chemical composition of blast furnace slag (http://www.cst.com.br/english/products/co_products/catalog_products/blast_slag/blast_slag.asp, accessed: 20121003).
  property price 0.0615 EUR2005; name GGBFS_price_EUR2005
    2005 import and export prices (total trades (USD) divided by total weight (kg) in China, India, USA, Japan, Russia and Europe, major producers and consumers (http://www.cementchina.net/freport/showfre.asp?id=749) from UN Commodity Trade Statistics Database (http://data.un.org/Explorer.aspxDatabase [Accessed 2 July 2010]). Commodity: Cement (portland, aluminious, slag or hydraulic)
  property carbon content 0
    carbon content on a dry matter basis (reserved; not for manual entry)
  property true value 1.60069e-6
    allocation property applied in "true value" allocation // value calculated from revenue
  properties: wet mass 1 kg, dry mass 1 kg, carbon allocation 0 kg
- granulated blast furnace slag: 0 kg; By-product classification allocatable product
  production volume 94.8674 kg
  property wet mass 1 kg; name GBFS_WM
  property dry mass 1 kg; name GBFS_DM
  property price 0.0615 EUR2005; name GBFS_price_EUR2005
    (same comment as for ground granulated blast furnace slag)
  property water in wet mass 0 kg; name GBFS_WWM
  property carbon content, non-fossil 0; name GBFS_C_content_non_fossil
    biogene carbon content on a dry matter basis
  property carbon content, fossil 0; name GBFS_C_content_fossil
    fossil carbon content on a dry matter basis
  property water content 0; name GBFS_water_content
  property carbon content 0
    carbon content on a dry matter basis (reserved; not for manual entry)
  property true value 6.62668e-6
    allocation property applied in "true value" allocation // value calculated from revenue
  properties: carbon allocation 0 kg
- aluminium alloy, metal matrix composite: 0 kg; CPC 41431: Unwrought aluminium; By-product classification allocatable product
  reference flow
  production volume 161.778 kg
  property water content 0; name Al_MMC_water_content
  property carbon content, non-fossil 0; name Al_MMC_C_content_non_fossil
    biogene carbon content on a dry matter basis
  property price 6.2 EUR2005; name ref_price_EUR2005
    (same comment as for aluminium alloy, AlLi)
  property carbon content, fossil 0.0475; name Al_MMC_C_content_fossil
    fossil carbon content on a dry matter basis
  property dry mass 1 kg; name Al_MMC_DM
  property water in wet mass 0 kg; name Al_MMC_WWM
  property wet mass 1 kg; name Al_MMC_WM
  property carbon content 0.0475
    carbon content on a dry matter basis (reserved; not for manual entry)
  property true value 0.00113924
    allocation property applied in "true value" allocation // value calculated from revenue
  properties: carbon allocation 0.0475 kg
- aluminium, primary, cast alloy slab from continuous casting: 0 kg; CPC 41431: Unwrought aluminium; By-product classification allocatable product
  reference flow
  production volume 10367 kg
  property price 3.67 EUR2005; name ref_price_EUR2005
    Estimated to be the same as in case of aluminium, primary, liquid.
  property carbon content 0
    carbon content on a dry matter basis (reserved; not for manual entry)
  property true value 0.0432137
    allocation property applied in "true value" allocation // value calculated from revenue
  properties: wet mass 1 kg, carbon content, fossil 0, water content 0, carbon content, non-fossil 0, water in wet mass 0 kg, dry mass 1 kg, carbon allocation 0 kg

## Inputs from technosphere
- used glider, from electric scooter: -0.00553657 kg
  production volume 6.213e7 kg; = Ref('7a0c28c6-50ab-46e0-8738-eb54faa808d1', 'ProductionVolume') * ((Ref('0ef06e40-582a-4724-b783-99e3ab001f10')*-1) / Ref('7a0c28c6-50ab-46e0-8738-eb54faa808d1'))
    Calculated from production volume of reference product using the relative outputs.
- aluminium scrap, new: 0 kg; pedigree (1,1,1,1,1)
  Production waste. Waste factors taken from F. Habermacher 2011.
  production volume 0 kg
    Calculated from production volume of reference product using the relative outputs.
  property water content 0; name water_content
  property dry mass 1 kg; name DM
  property water in wet mass 0 kg; name WWM
  property carbon content, fossil 0; name C_content_fossil
  property carbon content, non-fossil 0; name C_content_non_fossil
  property wet mass 1 kg; name WM
  properties: price 0.806 EUR2005
- polyvinylchloride, suspension polymerised: 1.8497e-5 kg; source M. Leuenberger 2010; lognormal variance with pedigree 0.0466, pedigree (4,3,4,5,3)
  15% of passenger car
  EcoSpold01Location=RER
  Uncertainty: 15% of passenger car
  properties: dry mass 1 kg, wet mass 1 kg, carbon content, fossil 0.387097
  note on carbon content, fossil: Monomer is vynyl chloride, C2H3Cl (ecoinvent v2.2 report 11_II). MW=62 g/mol
- nickel, 99.5%: 6.48332e-6 kg; source M. Leuenberger 2010; lognormal variance with pedigree 0.1306, pedigree (4,3,5,5,4)
  EcoSpold01Location=GLO
  Weight ratio scooter:passenger car
  Uncertainty: weight ratio scooter:passenger car
  properties: dry mass 1 kg, wet mass 1 kg
- wire drawing, copper: 4.67729e-5 kg; source M. Leuenberger 2010; lognormal variance with pedigree 0.1306, pedigree (4,3,5,5,4)
  EcoSpold01Location=RER
  Weight ratio scooter:passenger car
  Uncertainty: weight ratio scooter:passenger car
- synthetic rubber: 0.000204223 kg; source M. Leuenberger 2010; lognormal variance with pedigree 0.1306, pedigree (4,3,5,5,4)
  (same comment as for wire drawing, copper)
  properties: carbon content, fossil 0.871949, wet mass 1 kg, dry mass 1 kg
  note on carbon content, fossil: EPDM (Ethylene-propene-diene terpolymer) rubber is a terpolymer of ethylene, propene, and a diene with the residual unsaturated portion of the diene in the side chain (ecoinvent v2.2 report 7-part XX & Ullmann). Chemical formula (deduced from Evidences of Solvent-Induced Miscibility in Polychloroprene-co-Ethylene-Propene Diene Terpolymer Blends, Dubey et al., Journal of Applied Polymer Science, 2009, 111:1884–1891): C20H35
- aluminium, wrought alloy: 0.000705912 kg; source M. Leuenberger 2010; lognormal variance with pedigree 0.0912, pedigree (4,3,5,5,4)
  properties: wet mass 1 kg, dry mass 1 kg
- reinforcing steel: 0.00308318 kg; source M. Leuenberger 2010; lognormal variance with pedigree 0.0466, pedigree (4,3,4,5,3)
  5% of passenger car
  EcoSpold01Location=RER
  Uncertainty: 5% of passenger car
  properties: wet mass 1 kg, carbon content, fossil 0.004, dry mass 1 kg
- steel, low-alloyed, hot rolled: 0.000458462 kg; source M. Leuenberger 2010; lognormal variance with pedigree 0.1306, pedigree (4,3,5,5,4)
  Weight ratio scooter:passenger car
  EcoSpold01Location=RER
  Uncertainty: weight ratio scooter:passenger car
  properties: dry mass 1 kg, wet mass 1 kg, carbon content, fossil 0.005
  note on carbon content, fossil: Low alloyed steel composition given in Tab. 3.2 ecoinvent v2.2 report 10_partII. Steel assumed to have a C content of 0.5%
- polypropylene, granulate: 0.000508672 kg; source M. Leuenberger 2010; lognormal variance with pedigree 0.0466, pedigree (4,3,4,5,3)
  15% of passenger car
  EcoSpold01Location=RER
  Uncertainty: 15% of passenger car
  properties: dry mass 1 kg, carbon content, fossil 0.857143, wet mass 1 kg
  note on carbon content, fossil: Polypropylene is formed by the polymerisation of propylene, C3H6 (ecoinvent v2.2 report 11_II)
- chromium: 1.1114e-5 kg; source M. Leuenberger 2010; lognormal variance with pedigree 0.1306, pedigree (4,3,5,5,4)
  (same comment as for steel, low-alloyed, hot rolled)
  properties: dry mass 1 kg, wet mass 1 kg
- heat, district or industrial, natural gas: 0.00714996 MJ; source M. Leuenberger 2010; lognormal variance with pedigree 0.0366, pedigree (4,3,4,5,3)
  EcoSpold01Location=RER
  50% of Environmental report Honda, 2008
  Uncertainty: 50% of Environmental report Honda, 2008
- sheet rolling, steel: 0.00187205 kg; source M. Leuenberger 2010; lognormal variance with pedigree 0.0466, pedigree (4,3,4,5,3)
  EcoSpold01Location=RER
  5% of passenger car
  Uncertainty: 5% of passenger car
- road vehicle factory: 1.3476e-12 unit; source M. Leuenberger 2010; lognormal variance with pedigree 0.4306, pedigree (4,3,5,5,4)
  (same comment as for wire drawing, copper)
- copper: 4.67729e-5 kg; source M. Leuenberger 2010; lognormal variance with pedigree 0.1306, pedigree (4,3,5,5,4)
  (same comment as for wire drawing, copper)
  properties: dry mass 1 kg, wet mass 1 kg
- injection moulding: 0.00105887 kg; source M. Leuenberger 2010; lognormal variance with pedigree 0.1306, pedigree (4,3,5,5,4)
  All HDPE
  EcoSpold01Location=RER
  Uncertainty: All HDPE
- aluminium, cast alloy: 0.000332194 kg; source M. Leuenberger 2010; lognormal variance with pedigree 0.0912, pedigree (4,3,5,5,4)
  properties: wet mass 1 kg, dry mass 1 kg
- heat, district or industrial, other than natural gas: 0.000264302 MJ; source M. Leuenberger 2010; lognormal variance with pedigree 0.0366, pedigree (4,3,4,5,3)
  50% of Environmental report Honda, 2008
  EcoSpold01Location=RER
  Uncertainty: 50% of Environmental report Honda, 2008
- alkyd paint, white, without solvent, in 60% solution state: 0 kg; source M. Leuenberger 2010; pedigree (1,1,1,1,1)
  (same comment as for wire drawing, copper)
  properties: carbon content, fossil 0.140367, dry mass 1 kg, wet mass 1 kg, carbon content, non-fossil 0.199629
  note on carbon content, fossil: C content was calculated as an addition of C content in the raw materials.
- polyethylene, high density, granulate: 0.00105887 kg; source M. Leuenberger 2010; lognormal variance with pedigree 0.0466, pedigree (4,3,4,5,3)
  EcoSpold01Location=RER
  15% of passenger car
  Uncertainty: 15% of passenger car
  properties: dry mass 1 kg, carbon content, fossil 0.857143, wet mass 1 kg
  note on carbon content, fossil: Polyethylene is formed out of a huge amount of ethylene monomers (C2H4) (ecoinvent v2.2 report 11_II). MW=28 g/mol
- tap water: 0.0149114 kg; name tap_water_input; source M. Leuenberger 2010; lognormal variance with pedigree 0.1306, pedigree (4,3,5,5,4)
  (same comment as for steel, low-alloyed, hot rolled)
  properties: water content 2962.17, carbon content, fossil 0.00178991, dry mass 0.000337476 kg, wet mass 1 kg
  note on carbon content, fossil: Bicarbonate content is 2.93 mol/m3. CO2 content is 0.1 mol/m3 (ecoinvent v2.2 report 8, Tab 93.1).
- electricity, medium voltage: 0.00124573 kWh; source M. Leuenberger 2010; lognormal variance with pedigree 0.0366, pedigree (4,3,4,5,3)
  50% of Environmental report Honda, 2008
  EcoSpold01Location=JP
  Uncertainty: 50% of Environmental report Honda, 2008
- section bar rolling, steel: 0.000940109 kg; source M. Leuenberger 2010; lognormal variance with pedigree 0.1306, pedigree (4,3,5,5,4)
  (same comment as for steel, low-alloyed, hot rolled)
- ethylene, average: 0 kg; source M. Leuenberger 2010; pedigree (1,1,1,1,1)
  (same comment as for steel, low-alloyed, hot rolled)
  properties: dry mass 1 kg, wet mass 1 kg, carbon content, fossil 0.857143
- zinc: 2.72766e-5 kg; source M. Leuenberger 2010; lognormal variance with pedigree 0.1306, pedigree (4,3,5,5,4)
  (same comment as for steel, low-alloyed, hot rolled)
  properties: wet mass 1 kg, dry mass 1 kg
- aluminium scrap, new: -1.10974e-5, -8.30242e-5 kg (2 entries); lognormal variance with pedigree 0.0518, pedigree (2,4,5,4,3)
  Production waste. Waste factors taken from F. Habermacher 2011.
  production volume 1.05621e6 kg
  properties: dry mass 1 kg, price 0.806 EUR2005, wet mass 1 kg
- alkyd paint, white, without solvent, in 60% solution state: 5.00949e-6, 2.37807e-5 kg (2 entries); source M. Leuenberger 2010; lognormal variance with pedigree 0.1306, pedigree (4,3,5,5,4)
  (same comment as for wire drawing, copper)
- ethylene, average: 2.93532e-5, 8.89343e-7, 5.54289e-5 kg (3 entries); source M. Leuenberger 2010; lognormal variance with pedigree 0.1306, pedigree (4,3,5,5,4)
  (same comment as for steel, low-alloyed, hot rolled)

## Emissions to nature
- Phosphate [water, surface water]: 4.63092e-9 kg; source M. Leuenberger 2010; lognormal variance with pedigree 0.1306, pedigree (4,3,5,5,4)
  Weight ratio scooter:passenger car
  Uncertainty: weight ratio scooter:passenger car
- Water [air, unspecified]: 2.2367e-6 m3; name water_to_air_unspecified; = (tap_water_input/1000)*fraction_TW_to_air; lognormal variance with pedigree 0.130025, pedigree (4,4,5,2,4)
  Calculated value based on literature values and expert opinion. See comments in the parametres' comment field.
  property fraction, origin: salt water 0; name fraction_origin_salt_water
  property fraction, origin: fresh water 1; name fraction_origin_fresh_water
  property fraction, origin: unspecified 0; name fraction_origin_unspecified
- BOD5, Biological Oxygen Demand [water, surface water]: 1.20406e-7 kg; source M. Leuenberger 2010; lognormal variance with pedigree 0.1306, pedigree (4,3,5,5,4)
  Weight ratio scooter:passenger car
  Uncertainty: weight ratio scooter:passenger car
- NMVOC, non-methane volatile organic compounds, unspecified origin [air, unspecified]: 2.22286e-5 kg; source M. Leuenberger 2010; lognormal variance with pedigree 0.1306, pedigree (4,3,5,5,4)
  Weight ratio scooter:passenger car
  Uncertainty: weight ratio scooter:passenger car
- Water [water, unspecified]: 1.26747e-5 m3; name water_to_water_unspecified; = (tap_water_input/1000)*(1-fraction_TW_to_air); lognormal variance with pedigree 0.130025, pedigree (4,4,5,2,4)
  (same comment as for Water)
  property fraction, origin: salt water 0; name fraction_origin_salt_water_Ww
  property fraction, origin: unspecified 0; name fraction_origin_unspecified_Ww
  property fraction, origin: fresh water 1; name fraction_origin_fresh_water_Ww
- TOC, Total Organic Carbon [water, surface water]: 3.31015e-7 kg; source M. Leuenberger 2010; lognormal variance with pedigree 0.1306, pedigree (4,3,5,5,4)
  Calculated by default as TOC (gC) = COD/2.7 (COD measured in g O2). Should more correctly be calculated from the carbon content of the specified emissions to water.
  Uncertainty: weight ratio scooter:passenger car
- DOC, Dissolved Organic Carbon [water, surface water]: 3.31015e-7 kg; source M. Leuenberger 2010; lognormal variance with pedigree 0.1306, pedigree (4,3,5,5,4)
  Calculated as equal to TOC.
  Uncertainty: weight ratio scooter:passenger car
- COD, Chemical Oxygen Demand [water, surface water]: 8.9374e-7 kg; source M. Leuenberger 2010; lognormal variance with pedigree 0.1306, pedigree (4,3,5,5,4)
  Weight ratio scooter:passenger car
  Uncertainty: weight ratio scooter:passenger car

## Sampling procedure
Literature, manufacturer data

## Extrapolations
All values extrapolated from BEV production. Some adaptations made for change of material. This dataset has been copied from an original dataset covering the geography RER. The uncertainty has been adjusted accordingly.

## Review by Christian Bauer 2012-05-25
passed
