# electricity production, oil

Dataset: EcoSpold 2, unit process
Geography: HICC
Time period: 1980-01-01 to 2019-12-31
Technology level: current
Classification: ISIC rev.4 ecoinvent: 3510a: Electric power generation based on liquid fuels
Classification: EcoSpold01Categories: oil/power plants
Synonyms: petroleum; heavy fuel oil
Tags: United States; fossil fuels; oil power
Scenario: Business-as-Usual
System model: Allocation at the point of substitution
Generated by: Karin Treyer
Published in: Jungbluth, N. 2007
Database: ecoinvent
isCopyrightProtected: true
accessRestrictedTo: 1

## General comment
This dataset represents the production of high voltage electricity at a grid-connected oil power plant with a capacity of 500 MW in US - Hawaiian Islands Coordinating Council in 2012.
Emissions are in general calculated/estimated based on the fuel oil type S, European quality. This dataset has been built on the basis of oil electricity production datasets in version 2 of the ecoinvent database which were elaborated by N. Jungbluth 2007 (see main publication in modelling and administrative). The values and emissions are a weighted average of emissions in all datasets in version 2 (which are considered as the global values) multiplied with an efficiency scaling factor. The datasets in version 2 were valid for the following countries: AT, BE, BR, GR, CN, CS, CZ, DE, DK, ES, FI, FR, GB, GR, HR, HU, IE, IT, JP, MK, NL, NO, PT, PL, SE, SI, SK. Weighting was made with electricity production data in those countries based on IEA/OECD 2010. The weighted averages are taken as global values and then scaled with a factor derived from the comparison of the global average efficiency and the efficiency valid for this dataset in order to account for a higher or lower fuel input for the production of 1 kWh, respectively. Nothing else than the efficiency has been adjusted in this dataset; besides that no new data collection has taken place
Comments:
- sulfur content of the oil is not adapted to local/average conditions.
- CO2 emissions are presented for the combustion and for the flue gas treatment
- Extensive comments on emissions can be found in Jungbluth 2007, on which this dataset is based on.
Emissions to the water are from flue gas treatment. Most of these data come from two power plants in Portugal (EDP 2001) and data from Slowakia
EDP (2001) Environmental Report 2000. Electricidade de Portugal, S.A., Lisboa, PT, retrieved from: www.edp.pt.
Slovenské elektrárne (2002) Environment Report 2001, Bratislave, SK, retrieved from: www.seas.sk.
IEA/OECD. 2010. Electricity Information 2010. International Energy Agency (IEA), Paris Cedex (FR). Part IV. Detailed OECD Electricity And Heat Data.

## Included activities start
From the constructed power plant ready to produce electricity and from the fuel ready to be used.

## Included activities end
This activity ends with 1kWh of high voltage electricity produced at the power plant and arrived at the busbar.

This dataset includes all energy use, use of chemicals, emissions to air and water including treatment of flue gasses and effluents. In an oil power plant, water is needed for cooling, feed water for the steam circuit, for the flue gas treatment, or other cleaning. This dataset only considers water use (evaporation) for cooling and steam circuit.

## Technology
Electricity production in a conventional oil power plant with a capacity of 500 MWe.

## Time period
The Annual Production Volume is valid for the year 2012.

## Parameters
- average efficiency of oil power plants, country: 0.369 dimensionless; name efficiency_oil_country; lognormal variance with pedigree 0.016725, pedigree (4,2,1,2,3)
  Literature value/calculated value. Data from the US Energy Information Administration for net electricity production and fuel consumption for electricity generation with petroleum liquids. The same value is applied to the datasets modelling electricity only and CHP plants (lack of more detailed data).
  EIA. 2013. Statistics on electricity - Electricity data browser. Generation and thermal output. Net generation for electric power, annual // Consumption for electricity generation (Btu) for electric power. U.S. Energy Information Administration; Independent Statistics&Analysis.
  nan
- fraction, cooling water, to air: 0.0216287; name fraction_CW_to_air; = (WConsumption_EP_oil_recirculatingCS*recirculating_CS_fraction_from_allCS+WConsumption_EP_oil_onceT_andCP_CS*once_through_andCP_CS_fractio_from_allCS)/(WWithdrawal_EP_oil_recirculating_CS*recirculating_CS_fraction_from_allCS+WWithdrawal_EP_oil_onceT_andCP_CS*once_through_andCP_CS_fractio_from_allCS); lognormal variance with pedigree 0.092025, pedigree (4,4,3,2,4)
  Calculated value
  nan
- once-through and cooling pond cooling systems as a fraction of all cooling syste: 0.52 dimensionless; name once_through_andCP_CS_fractio_from_allCS; lognormal variance with pedigree 0.092025, pedigree (4,4,3,2,4)
  Calculated as an average of data available for Europe (Floerke, 2008, Future changes of freshwater needs in the electricity production sector) and USA (NERL, 2011, Estimating freshwater needs to meet future thermoelectric generation requirements).
  nan
- factor: input of MJ for the production of 1 kWh: 9.7561 MJ/kWh; name factor_MJ_kWh; = 1*3.6/efficiency_oil_country; lognormal variance with pedigree 0.0006, pedigree (1,1,1,1,1)
  Calculated value. 3.6 MJ = 1kWh.
  nan
- fraction, water, decarbonised, to air: 0.0216287; name fraction_WDC_to_air; = fraction_CW_to_air; lognormal variance with pedigree 0.092025, pedigree (4,4,3,2,4)
  Calculated value. See comments in the other parametres present in this dataset. Decarbonised water is considered to be always used as cooling water, thus cooling water fractions to air are applied to all carbonised water input flows to calculate the amount of water consumed in the processes.
  nan
- relation between the global and the country's efficiency of oil power plants: 1.00271 dimensionless; name relation_global_country; = efficiency_oil_global/ efficiency_oil_country; undefined min 1, max 1, standardDeviation95 0, pedigree (1,1,1,1,1)
  This factor brings the amounts of the exchanges in the global dataset into relation with the amounts in the country datasets.
  nan
- gross electricity production: 0 kWh; name gross_electricity; pedigree (1,1,1,1,1)
  This parameter is inherited from the parent dataset but is not needed in this dataset.
  nan
- losses from gross electricity production: 0.06 dimensionless; name gross_net_electricity; undefined min 0.06, max 0.06, standardDeviation95 0, pedigree (1,1,1,1,1)
  Calculated value. Own use of electricity plants in this country in 2012. For the OECD countries, the OECD iLibrary provides gross and net electricity values for the specific sector 'Total Fuel Combustion', from which the loss value is being calculated. This value is then applied to all fossil fuel datasets, as no data on a more detailed level were available.
  OECD. 2014. IEA Electricity Information Statistics: OECD - Electricity and heat generation. OECD iLibrary. Online database. DOI : 10.1787/elect-data-en
  nan
  Uncertainty: generic IEA value used
- recirculating cooling system as a fraction of all cooling systems: 0.48 dimensionless; name recirculating_CS_fraction_from_allCS; lognormal variance with pedigree 0.092025, pedigree (4,4,3,2,4)
  (same comment as for once-through and cooling pond cooling systems as a fraction of all coo)
- water withdrawal, electricity production from oil, recirculating CS: 0.0021 m3/kWh; name WWithdrawal_EP_oil_recirculating_CS; lognormal variance with pedigree 0.092025, pedigree (4,4,3,2,4)
  Estimated based on literature (Scown, 2011, Water Footprint of U.S. Transportation Fuels, SI).
  nan
- water withdrawal, electricity production from oil, once-T and coolingP CS: 0.098 m3/kWh; name WWithdrawal_EP_oil_onceT_andCP_CS; lognormal variance with pedigree 0.092025, pedigree (4,4,3,2,4)
  (same comment as for water withdrawal, electricity production from oil, recirculating CS)
- water consumption, electricity production from oil, once-T and coolingP CS: 0.0005 m3/kWh; name WConsumption_EP_oil_onceT_andCP_CS; lognormal variance with pedigree 0.092025, pedigree (4,4,3,2,4)
  (same comment as for water withdrawal, electricity production from oil, recirculating CS)
- fraction, water, completely softened, to air: 0.15; name fraction_WCS_to_air; = fraction_PW_to_air; lognormal variance with pedigree 0.092025, pedigree (4,4,3,2,4)
  Calculated value. See comment in the other parametres present in this dataset. Water, completely softened is considered to be always used as process water, thus process water fractions to air are applied to all water, completely softened input flows to calculate the amount of water consumed in the processes.
  nan
- average efficiency of oil power plants, global: 0.37 dimensionless; name efficiency_oil_global; lognormal variance with pedigree 0.003325, pedigree (3,2,1,2,2)
  Literature value/calculated value. Net electrical efficiency based on the lower heating value (LHV).
  For all OECD countries, the IEA Electricity information 2014 provides data for the year 2012 on fuel input (TJ, Net calorific value NCV) and gross electricity production (GWh) as well as heat production (TJ) in tables 8 and 9 for each country for electricity only and Combined Heat and Power (CHP) plants each. Together with the information on own use (see parameter 'losses'), the net electrical efficiency based on the NCV is calculated.
  For all non-OECD countries, data from the IEA Energy balances of non-OECD countries 2014 have been used. These tables do not always provide information on how much of the electricity has been produced in electricity only and in CHP plants, but often give the total value only.
  IEA. 2014. Electricity Information 2014. ISBN 978-92-64-21692-1. International Energy Agency (IEA), Paris Cedex (FR).
  IEA/OECD. 2014. Energy balances of non-OECD countries 2014. International Energy Agency (IEA), Paris Cedex (FR).
  nan
- fraction, process water, to air: 0.15 dimensionless; name fraction_PW_to_air; lognormal variance with pedigree 0.092025, pedigree (4,4,3,2,4)
  Literature value. In case when no industry/process specific data are available, default evaporation fraction value is used. This value is 15% and is based on literature (Statistics Canada, 2007 & Shaffer, K.H., 2008, Consumptive water use in the Great Lakes Basin, USGS & Shiklomanov, 2003, World Water Resources at the Beginning of the 21st Century) and has been approved by an expert.
  nan
- water consumption, electricity production from oil, recirculating CS: 0.0018 m3/kWh; name WConsumption_EP_oil_recirculatingCS; lognormal variance with pedigree 0.092025, pedigree (4,4,3,2,4)
  (same comment as for water withdrawal, electricity production from oil, recirculating CS)

## Reference product
- electricity, high voltage: 1 kWh; name electricity; CPC 17100: Electrical energy; By-product classification allocatable product
  production volume 4.69e9 kWh; name apv_electricity
    Literature value. Data from the US Energy Information Administration for 2012, which provides data on net electricity production in each US State with various energy sources. Data from the States were aggregated on the level of US NERC regions. Data were given for the electricity production with total natural gas. This total production is split to production in electricity/CHP plants with a simple or combined cycle. This split is made based on information for total US (not specific to this NERC region) in the IEA electricity information (amount of electricity produced in electricity only and CHP plants) and information on installed electrical capacity with natural gas in the WEPP database.
    EIA. 2014. Statistics on electricity - Electricity data browser. Generation and thermal output. Net generation for electric power, annual. U.S. Energy Information Administration; Independent Statistics&Analysis.
    IEA. 2014. Electricity Information 2014. ISBN 978-92-64-21692-1. International Energy Agency (IEA), Paris Cedex (FR).
    WEPP 2014. World Electric Power Plants Database. PLATTS McGraw Hill Financial. http://www.platts.com/products/world-electric-power-plants-database
  property price 0.0977 EUR2005
    Temporary price data. Calculated as 90% of purchasers price based on: 94% of the average price (to account for a 6% loss in transformation and transmission) for electricity for industrial consumersin 2005 (excluded taxes). From IEA.
  property true value 0.0977; name electricity_true_value
    allocation property applied in "true value" allocation // value calculated from revenue

## By-products
- electricity, for reuse in municipal waste incineration only: 0 kWh; CPC 17100: Electrical energy; By-product classification allocatable product; pedigree (1,1,1,1,1)
  Net electricity generated from this waste and used in internal MSWI plant energy redistribution.
  Uncertainty: uncertainty is calculated from uncertainties in waste composition and uncertainties in energy efficiency and the uncertainty in internal energy demand
  production volume 17927.9 kWh
  property exergy 3.6 MJ; name E_el_prod_MSWI_exergy
    This exergy property is based on the exergy content of the product.
  property true value relation 3.6; name E_el_prod_MSWI_true_value_relation
    property to calculate "true value" from
  property price 0.1 EUR2005; name E_el_prod_MSWI_price_EUR2005
    Estimated to be the same price as in case of electricity, medium voltage.
  property true value 4.9462e-7
    allocation property applied in "true value" allocation // value calculated from true value relation
- iron scrap, sorted, pressed: 0 kg; By-product classification Recyclable; CPC 39310: Slag, dross, scalings and other waste from the manufacture of iron or steel; pedigree (1,1,1,1,1)
  Iron scrap recovered from this waste.
  Uncertainty: uncertainty calculated from uncertainty in waste composition, uncertainty of share of recyclable metal, uncertainty of transfer coefficient to bottom ash, uncertainty of the efficiency of scrap removal in MSWI plant.
  production volume 2256.77 kg
  property price 0.175 EUR2005
    Temporary price data. Calculated as 90% of purchasers price based on: 2005 import and export prices (total trades (USD) divided by total weight (kg) in biggest economies of the world: EU27, USA, Brasil, China, India, Japan and Russia) from UN Commodity Trade Statistics Database (http://data.un.org/Explorer.aspxDatabase [Accessed 2011.06.20]). Commodity: Waste or scrap, of cast iron
  property carbon content 0
    carbon content on a dry matter basis (reserved; not for manual entry)
  property true value 8.42079e-8
    allocation property applied in "true value" allocation // value calculated from revenue
  properties: dry mass 1 kg, water content 0, carbon content, non-fossil 0, water in wet mass 0 kg, carbon content, fossil 0, wet mass 1 kg, carbon allocation 0 kg
- heat, for reuse in municipal waste incineration only: 0 MJ; CPC 17300: Steam and hot water; By-product classification allocatable product; pedigree (1,1,1,1,1)
  (same comment as for electricity, for reuse in municipal waste incineration only)
  production volume 132430 MJ
  property exergy 0.1842 MJ; name E_th_prod_MSWI_exergy
    This exergy property is based on the exergy content of the product.
  property true value relation 0.1842; name E_th_prod_MSWI_true_value_relation
    property to calculate "true value" from
  property price 0.0106 EUR2005; name E_th_prod_MSWI_price_EUR2005
    Average European district heat price from Ecoheatcool and Euroheat 2005-2006, Ecoheat Work package 1: The European heat market. Final report. 10.6 EUR/GJ i s the price of district heat. http://www.solarthermalworld.org/files/Ecoheatcool%20WP1%20Web.pdf?download
  property true value 1.86947e-7
    (same comment as for electricity, for reuse in municipal waste incineration only)
- iron scrap, unsorted: 0 kg; source European Aluminium Association 2008; CPC 39310: Slag, dross, scalings and other waste from the manufacture of iron or steel; By-product classification Recyclable; pedigree (1,1,1,1,1)
  production volume 0.0642076 kg
  property price 0.149 EUR2005; name ironScrapAmount_price_EUR2005
    Temporary price data. Calculated as 90% of purchasers price based on: estimated at 85% of sorted scrap
  property carbon content 0
    carbon content on a dry matter basis (reserved; not for manual entry)
  property true value 2.03986e-12
    allocation property applied in "true value" allocation // value calculated from revenue
  properties: water in wet mass 0 kg, water content 0, carbon content, fossil 0, carbon content, non-fossil 0, dry mass 1 kg, wet mass 1 kg, carbon allocation 0 kg
- aluminium oxide, non-metallurgical: 0 kg; source European Aluminium Association 2008; CPC 41432: Alumina (aluminium oxide), except artificial corundum; By-product classification allocatable product; CAS 1344-28-1; pedigree (1,1,1,1,1)
  production volume 4.04034 kg
  property carbon content, non-fossil 0; name C_content_non_fossil
  property price 0.28 EUR2005; name Al2O3Amount_price_EUR2005
    From UN trade database. http://data.un.org/ Import data from the largest economies of the world are used (Brazil, India, USA, China, Japan and EU-27).
  property dry mass 1 kg; name DM
  property water content 0; name water_content
  property wet mass 1 kg; name WM
  property water in wet mass 0 kg; name WWM
  property carbon content, fossil 0; name C_content_fossil
  property carbon content 0
    carbon content on a dry matter basis (reserved; not for manual entry)
  property true value 2.41214e-10
    allocation property applied in "true value" allocation // value calculated from revenue
  properties: carbon allocation 0 kg
- aluminium, cast alloy: 0 kg; source European Aluminium Association 2008; By-product classification allocatable product; CPC 41431: Unwrought aluminium; pedigree (1,1,1,1,1)
  EcoSpold01Location=RER
  production volume 37.7682 kg
  property price 1.3 EUR2005; name castAlloyAmount_price_EUR2005
    Temporary price data. Calculated as 90% of purchasers price based on: Source: London Metal Exchange, Aluminium alloy price for 2005
  property carbon content 0
    carbon content on a dry matter basis (reserved; not for manual entry)
  property true value 1.04688e-8
    allocation property applied in "true value" allocation // value calculated from revenue
  properties: water in wet mass 0 kg, carbon content, non-fossil 0, water content 0, dry mass 1 kg, carbon content, fossil 0, wet mass 1 kg, carbon allocation 0 kg
- aluminium, wrought alloy: 0 kg; source European Aluminium Association 2008; By-product classification allocatable product; CPC 4153: Semi-finished products of aluminium or aluminium alloys; pedigree (1,1,1,1,1)
  production volume 16.5342 kg
  property price 1.44 EUR2005; name secondaryAluminiumOutput_price_EUR2005
    Estimated based on literature values and expert judgement. Aluminium ccast alloys are about 90% of the price of aluminium wrought alloys.
  property carbon content 0
    carbon content on a dry matter basis (reserved; not for manual entry)
  property true value 5.0766e-9
    allocation property applied in "true value" allocation // value calculated from revenue
  properties: wet mass 1 kg, water content 0, carbon content, fossil 0, water in wet mass 0 kg, carbon content, non-fossil 0, dry mass 1 kg, carbon allocation 0 kg
- copper: 0 kg; source Rentz O. 1999; By-product classification allocatable product; CPC 41413: Refined copper and copper alloys, unwrought; master alloys of copper
  Literature value. Copper uses: Before end-use copper is manufactured into semi fabricated products, such as shapes and ingots (known as 'semis'). These manufacturing processes are subdivided into hot working, cold working and, if necessary, process annealing. Few of the semis are ready for use as such. They more typically travel to first-stage manufacturers, who make metal rods, wire, and casting, and then to component manufacturers who produce such things as motors, valves, and insulated cables The components in turn are incorporated by final-stage manufacturers into a variety of finished products - automobiles, commercial buildings, residential housing, and so forth. These uses account for about 79% of the world-wide consumption of copper.
  production volume 71.8331 kg
  property price 5.52 EUR2005
    Literature value (http://www.economist.com/news/business/21576714-mining-industry-has-enriched-chile-its-future-precarious-copper-solution). Average price between 20015 and 2013.
  property carbon content 0
    carbon content on a dry matter basis (reserved; not for manual entry)
  property true value 8.45456e-8
    allocation property applied in "true value" allocation // value calculated from revenue
  properties: dry mass 1 kg, water in wet mass 0 kg, wet mass 1 kg, carbon content, non-fossil 0, water content 0, carbon content, fossil 0, carbon allocation 0 kg
- zinc concentrate: 0 kg; CPC 14290: Other non-ferrous metal ores and concentrates (other than uranium or thorium ores and concentrates); By-product classification allocatable product
  Calculated value from the knowledge of the properties of both products.
  production volume 5.70159e-8 kg
  property price 0.38 EUR2005; name ByP_price_EUR2005
    Temporary price data. Calculated as 90% of purchasers price based on: Zinc content in concentrate 53%. Concentrate price per kg Zn 86.5% of refined Zn price (13.5% treatment charges according to CHR Metals Limited 2005: Dynamic cost curves. http://www.minecost.com/dynamic.pdf). 2004 zinc price from USGS (2007) Mineral commodity summaries 2007. <http://minerals.usgs.gov/minerals/pubs/mcs/2007/mcs2007.pdf> [Accessed 25 May 2010]
  property zinc content 0.53; name zinc_C_zinc_concentrate
    Zinc content on a dry matter basis. Value taken from teh "zinc mine operation" /GLO dataset.
  property dry mass 1 kg; name DM_zinc_concentrate
  property carbon content 0
    carbon content on a dry matter basis (reserved; not for manual entry)
  property true value 4.61963e-18
    allocation property applied in "true value" allocation // value calculated from revenue
  properties: wet mass 1 kg, water content 0, carbon content, non-fossil 0, carbon content, fossil 0, water in wet mass 0 kg, carbon allocation 0 kg

## Inputs from technosphere
- water, decarbonised: 0.525154 kg; name water_decarbonised_input; = 0.52373934843876 * relation_global_country; source Jungbluth, N. 2007, p. Tab. 12.10 p. 228; lognormal variance with pedigree 0.0439, pedigree (2,2,5,5,2)
  Literature value/estimation. Estimation based on several literature sources:
  Frischknecht R., Bollens U., Bosshart S., Ciot M., Ciseri L., Doka G., Dones R., Gantner U., Hischier R. and Martin A. (1996) Ökoinventare von Energiesystemen: Grundlagen für den ökologischen Vergleich von Energiesystemen und den Einbezug von Energiesystemen in Ökobilanzen für die Schweiz. 3. Gruppe Energie - Stoffe - Umwelt (ESU), Eidgenössische Technische Hochschule Zürich und Sektion Ganzheitliche Systemanalysen, Paul Scherrer Institut, Villigen, Bundesamt für Energie (Hrsg.), Bern, CH, retrieved from: www.energieforschung.ch.
  Powergen (2001) Environment Report 2000. Powergen UK, Coventry, UK, retrieved from: www.pgen.com
  ESB (1997) Environmental Review 1997. Electricity Supply Board, Dublin, IE, retrieved from: www.esb.ie
  EDP (2001) Environmental Report 2000. Electricidade de Portugal, S.A., Lisboa, PT, retrieved from: www.edp.pt
  IPPC (2001b) Integrated Pollution Prevention and Control (IPPC): Draft Reference Document on Best Available Techniques for Large Combustion Plants. European Commission Directorate-General JRC, Joint Research Centre, Seville, Spain, retrieved from: http://eippcb.jrc.es.
  properties: wet mass 1 kg
- limestone, crushed, washed: 0.0142887 kg; = 0.0142502047575074 * relation_global_country; source Jungbluth, N. 2007, p. Tab. 12.11 p. 228; lognormal variance with pedigree 0.0226, pedigree (2,4,4,5,1)
  Literature value for flue gas treatment.
  IPPC (2001b) Integrated Pollution Prevention and Control (IPPC): Draft Reference Document on Best Available Techniques for Large Combustion Plants. European Commission Directorate- eneral JRC, Joint Research Centre, Seville, Spain, retrieved from: http://eippcb.jrc.es.
  properties: carbon content, fossil 0.117257, water content 0.00200401, wet mass 1 kg, dry mass 0.998 kg
  note on carbon content, fossil: Table 3.1, ecoinvent v2.2 report 7, part VII, pg 3. MW CaCO3=100, MW MgCO3=84. C content of limestone is 0.117257 kg/kg DM
- ammonia, liquid: 0.00065625 kg; = 0.000654482227803382 * relation_global_country; source Jungbluth, N. 2007, p. Tab. 12.11 p. 228; lognormal variance with pedigree 0.0226, pedigree (2,4,4,5,1)
  (same comment as for limestone, crushed, washed)
  properties: dry mass 1 kg, wet mass 1 kg
- fly ash and scrubber sludge: -2.74702e-5 kg; name fly_ash; = (2.73962181380553E-05 * relation_global_country)*-1; source Jungbluth, N. 2007, p. Tab. 12.27, p. 238; lognormal variance with pedigree 0.0433, pedigree (2,2,5,5,1)
  Average of literature data
  production volume 128836 kg; = apv_electricity * fly_ash
    Calculated from the production volume of electricity produced in proportion to the respective output amounts.
  property price 0 EUR2005; name fly_ash_price_EUR2005
  properties: carbon content, fossil 0.167, dry mass 0.1 kg, wet mass 1 kg, water content 9
  note on carbon content, fossil: Tab A.6, ecoinvent v2.2 report 13_I. C content has been calculated after data in the tables, and then referred to 1 kg DM
- bilge oil: -2.22004e-5 kg; name bilge_oil; = (2.21405798675039E-05 * relation_global_country)*-1; source Jungbluth, N. 2007; lognormal variance with pedigree 0.0438, pedigree (2,3,5,5,1)
  Average of literature data
  production volume 104121 kg; = apv_electricity * bilge_oil
    (same comment as for fly ash and scrubber sludge)
  property price 0 EUR2005; name bilge_oil_price_EUR2005
  properties: dry mass 0.1 kg, water content 9, carbon content, fossil 0.84, wet mass 1 kg
- waste mineral oil: -0.000568967 kg; name waste_oil; = (0.000567434011587811 * relation_global_country)*-1; source Jungbluth, N. 2007; lognormal variance with pedigree 0.0438, pedigree (2,3,5,5,1)
  Average of literature data
  production volume 2.66848e6 kg; = apv_electricity *waste_oil
    (same comment as for fly ash and scrubber sludge)
  property price 0 EUR2005; name waste_oil_price_EUR2005
  properties: wet mass 1 kg, dry mass 0.9 kg, water content 0.111111, carbon content, fossil 0.864444
- municipal solid waste: -0.000156316 kg; name municipal_waste; = (0.000155895267385992 * relation_global_country)*-1; source Jungbluth, N. 2007; lognormal variance with pedigree 0.0058, pedigree (2,3,3,5,1)
  Average of literature data
  production volume 733130 kg; = apv_electricity * municipal_waste
    (same comment as for fly ash and scrubber sludge)
  property price 0 EUR2005; name municipal_waste_price_EUR2005
  properties: water content 0.297017, wet mass 1 kg, carbon content, non-fossil 0.261655, dry mass 0.771 kg, carbon content, fossil 0.171549
  note on carbon content, non-fossil: MSW composition in tab 4.1, ecoinvent v2.2 report 13_I. C content referred to 1 kg DM
- lignite ash: -0.000589515 kg; name lignite_ash; = (0.000587926601413295 * relation_global_country)*-1; source Jungbluth, N. 2007; lognormal variance with pedigree 0.0438, pedigree (2,3,5,5,1)
  Average of literature data
  production volume 2.76485e6 kg; = apv_electricity * lignite_ash
    (same comment as for fly ash and scrubber sludge)
  property price 0 EUR2005; name lignite_ash_price_EUR2005
  properties: wet mass 1 kg, dry mass 1 kg
- residue from cooling tower: -0.000141207 kg; name cooling_tower; = (0.000140826964829544 * relation_global_country)*-1; source Jungbluth, N. 2007, p. Tab. 12.27, p. 238; lognormal variance with pedigree 0.0438, pedigree (2,3,5,5,1)
  Average of literature data
  production volume 662268 kg; = apv_electricity * cooling_tower
    (same comment as for fly ash and scrubber sludge)
  property price 0 EUR2005; name cooling_tower_price_EUR2005
  properties: dry mass 0.7 kg, carbon content, fossil 0.0544233, wet mass 1 kg, water content 0.428571
- water, completely softened: 0.105427 kg; name water_softened_input; = 0.105143225836924 * relation_global_country; source Jungbluth, N. 2007, p. Tab. 12.10 p. 228; lognormal variance with pedigree 0.0439, pedigree (2,2,5,5,2)
  (same comment as for water, decarbonised)
  properties: wet mass 1 kg
- oil power plant, 500MW: 1.2832e-11 unit; = 1.27974335560263E-11 * relation_global_country; source Jungbluth, N. 2007; lognormal variance with pedigree 0.3506, pedigree (2,5,5,5,1)
  Estimation based on case study
- heavy fuel oil: 0.253235 kg; = 0.252552604756268 * relation_global_country; source Jungbluth, N. 2007; lognormal variance with pedigree 0.0433, pedigree (2,2,5,5,1)
  Literature data for heating value
  properties: dry mass 1 kg, carbon content, fossil 0.849, wet mass 1 kg

## Inputs from nature
- Water, cooling, unspecified natural origin [natural resource, in water]: 0.0520695 m3; name water_cooling_UNO_input; = ((recirculating_CS_fraction_from_allCS*WWithdrawal_EP_oil_recirculating_CS)+(once_through_andCP_CS_fractio_from_allCS*WWithdrawal_EP_oil_onceT_andCP_CS))/9.737*(1/efficiency_oil_country*3.6); source Jungbluth, N. 2007, p. Tab. 12.10 p. 228; lognormal variance with pedigree 0.3432, pedigree (2,3,5,5,1)
  (same comment as for water, decarbonised)

## Emissions to nature
- Acetic acid [air, urban air close to ground]: 1.07309e-5 kg; = 1.07020073585515E-05 * relation_global_country; source Jungbluth, N. 2007; lognormal variance with pedigree 0.132, pedigree (1,1,5,5,1)
  Calculation based on VOC emission. Deviation calculated from ranges
- Hydrocarbons, aliphatic, unsaturated [air, urban air close to ground]: 5.36555e-7 kg; = 5.35109739033632E-07 * relation_global_country; source Jungbluth, N. 2007; lognormal variance with pedigree 0.1233, pedigree (2,2,5,5,2)
  Calculation based on VOC emission. Deviation calculated from ranges
- Hypochlorite [water, surface water]: 3.67915e-6 kg; = 3.66923603392927E-06 * relation_global_country; source Jungbluth, N. 2007; lognormal variance with pedigree 0.072, pedigree (3,4,4,5,3)
  Literature
- Hypochlorite [water, ocean]: 3.58876e-6 kg; = 3.57908785086596E-06 * relation_global_country; source Jungbluth, N. 2007; lognormal variance with pedigree 0.062, pedigree (3,4,4,5,3)
  Literature
- Acetaldehyde [air, urban air close to ground]: 2.62805e-6 kg; = 2.62096973868199E-06 * relation_global_country; source Jungbluth, N. 2007; lognormal variance with pedigree 0.132, pedigree (1,1,5,5,1)
  Calculation based on VOC emission. Deviation calculated from ranges
- Particulates, < 2.5 um [air, urban air close to ground]: 9.15729e-5 kg; = 9.13261684426324E-05 * relation_global_country; source Jungbluth, N. 2007, p. Tab. 12.17 / Tab. 12.18; lognormal variance with pedigree 0.3187, pedigree (2,2,4,5,3)
  Literature value/estimation. Compilation from different sources - see Tab. 12.17 fo details. Particle emissions mainly depend on the composition of the fuel, the type of combustion and the combustion conditions.
  Particle size fractions are adopted from Berdowski et al .2002 (see Tab. 12.18).
  Berdowski J., Visschedijk A., Creemers E. and Pulles T. (2002) The Coordinated European Programme on Particulate Matter Emission Inventories, Projections and Guidance (CEPMEIP) Database. TNO-MEP, Apeldoorn, NL, retrieved from: www.air.sk/tno/cepmeip/
- Arsenic [air, urban air close to ground]: 7.25794e-8 kg; = 7.23838706169984E-08 * relation_global_country; source Jungbluth, N. 2007, p. Tab. 12.23, Tab. 12.24; lognormal variance with pedigree 1.1933, pedigree (2,2,5,5,2)
  Literature data, calculation, estimation. See tab 12.23 with element concentrations in dust (Pacyna 1982, Pacyna 1991); and tab. 12.24 with emission factors of heavy metals in fuel oil S (Richardson 1999, Powergen 2001).
  J.M. Pacyna, 'Estimation of Emission Factors of Trace Metals from Oil-Fired Power Plants', Norvegian Institute for Air Research (NILU), Lillestrøm 1982
  J. Pacyna, 'Trace Element Emissions from Coal-, and Oil- power Plants in Europe. Methodology of Calculations', Norvegian Institute for Air Research (NILU), Lillestrøm 1982
  J.M. Pacyna, 'Emission Factors of Atmospheric Cd, Pb and Zn for Major Source Categories in Europe in 1950 through 1985', Norvegian Institute for Air Research (NILU), Lillestrøm 1991
  Richardson S. (1999) Atmospheric Emission Inventory Guidebook. Second Edition. EMEP: Co-operative Programme for Monitoring and Evaluation of the Long Range Transmission of Air Pollutants in Europe, CORINAIR: The Core Inventory of Air Emissions in Europe, EEA: European Environment Agency, Copenhagen, DK.
  Powergen (2001) Environment Report 2000. Powergen UK, Coventry, UK, retrieved from: www.pgen.com.
- Sulfur dioxide [air, urban air close to ground]: 0.00448504 kg; = 0.00447296246485209 * relation_global_country; source Jungbluth, N. 2007, p. Tab. 12.14 p. 230; lognormal variance with pedigree 0.0039, pedigree (2,2,3,1,2)
  Literature value. Data from eGrid 2010, valid for the year 2010.
  eGrid. The Emissions & Generation Resource Integrated Database. Year 2010 eGRID 9th edition Version 1.0 . United States Environmental Protection Agency.
- AOX, Adsorbable Organic Halogen as Cl [water, surface water]: 6.52658e-8 kg; = 6.50899387734297E-08 * relation_global_country; source Jungbluth, N. 2007, p. Tab. 12.26, p. 238; lognormal variance with pedigree 0.0439, pedigree (2,2,5,5,2)
  Literature data/estimations. See Tab. 12.26 for details: concentration of pollutants in the wastewater of oil power plants and of flue gas treatment as well as in the condensate and feed water preparation. Mean of values for Europe, range of concentrations.
  Slovenské elektrárne (2002) Environment Report 2001, Bratislave, SK, retrieved from: www.seas.sk.
  EDP (2001) Environmental Report 2000. Electricidade de Portugal, S.A., Lisboa, PT, retrieved from: www.edp.pt.
  IPPC (2001b) Integrated Pollution Prevention and Control (IPPC): Draft Reference Document on Best Available Techniques for Large Combustion Plants. European Commission Directorate- General JRC, Joint Research Centre, Seville, Spain, retrieved from: http://eippcb.jrc.es.
- Ethanol [air, urban air close to ground]: 5.36555e-6 kg; = 5.35109739033632E-06 * relation_global_country; source Jungbluth, N. 2007; lognormal variance with pedigree 0.1233, pedigree (2,2,5,5,2)
  Calculation based on VOC emission. Deviation calculated from ranges
- Zinc [air, urban air close to ground]: 2.63925e-7 kg; = 2.63213980145308E-07 * relation_global_country; source Jungbluth, N. 2007; lognormal variance with pedigree 1.2433, pedigree (2,2,5,5,2)
  Calculation based on particle emission. Deviation calculated from ranges
- Iron, ion [water, surface water]: 1.28818e-6 kg; = 1.28470679989333E-06 * relation_global_country; source Jungbluth, N. 2007, p. Tab. 12.26, p. 238; lognormal variance with pedigree 0.2733, pedigree (2,2,5,5,2)
  (same comment as for AOX, Adsorbable Organic Halogen as Cl)
- Formaldehyde [air, urban air close to ground]: 8.04838e-6 kg; = 8.02669478279528E-06 * relation_global_country; source Jungbluth, N. 2007, p. Tab. 12.19, Tab. 12.20; lognormal variance with pedigree 0.1233, pedigree (2,2,5,5,2)
  Literature/calculation/estimation. Calculation based on VOC emissions in Tab. 12.19 (compilation of different sources) and Veldt 1991.
  C. Veldt, 'Default Emission Factors (VOC Profiles), Draft Report, Corinair Inventory Part 7, Commission of the European Community, September 1991
- Cadmium [air, urban air close to ground]: 3.475e-8 kg; = 3.46564315860632E-08 * relation_global_country; source Jungbluth, N. 2007, p. Tab. 12.23, Tab. 12.24; lognormal variance with pedigree 1.2433, pedigree (2,2,5,5,2)
  (same comment as for Arsenic)
- Cobalt [air, urban air close to ground]: 3.8489e-7 kg; = 3.83853480105306E-07 * relation_global_country; source Jungbluth, N. 2007, p. Tab. 12.23, Tab. 12.24; lognormal variance with pedigree 1.2433, pedigree (2,2,5,5,2)
  (same comment as for Arsenic)
- Hydrogen fluoride [air, urban air close to ground]: 3.1252e-7 kg; = 3.11677927046195E-07 * relation_global_country; source Jungbluth, N. 2007, p. Tab. 12.25; lognormal variance with pedigree 0.0912, pedigree (2,3,5,5,3)
  Literature data/calculation. See Tab. 12.25 for details.
- Water [air, unspecified]: 0.00115337 m3; name water_to_air_unspecified; = (water_softened_input/1000)*fraction_WCS_to_air+(water_decarbonised_input/1000)*fraction_WDC_to_air+water_cooling_UNO_input*fraction_CW_to_air; lognormal variance with pedigree 0.098025, pedigree (4,4,4,2,4)
  Calculated value based on literature values and expert opinion. See comments in the parametres' comment field.
  property fraction, origin: fresh water 0.0256067; name fraction_origin_fresh_water
  property fraction, origin: unspecified 0.974393; name fraction_origin_unspecified
  property fraction, origin: salt water 0; name fraction_origin_salt_water
- Water [water, unspecified]: 0.0515467 m3; name water_to_water_unspecified; = (water_softened_input/1000)*(1-fraction_WCS_to_air)+(water_decarbonised_input/1000)*(1-fraction_WDC_to_air)+water_cooling_UNO_input*(1-fraction_CW_to_air); lognormal variance with pedigree 0.098025, pedigree (4,4,4,2,4)
  (same comment as for Water)
  property fraction, origin: fresh water 0.0127368; name fraction_origin_fresh_water_Ww
  property fraction, origin: unspecified 0.987263; name fraction_origin_unspecified_Ww
  property fraction, origin: salt water 0; name fraction_origin_salt_water_Ww
- Tin, ion [water, surface water]: 1.22493e-9 kg; = 1.22162689595615E-09 * relation_global_country; source Jungbluth, N. 2007, p. Tab. 12.26, p. 238; lognormal variance with pedigree 0.0439, pedigree (2,2,5,5,2)
  (same comment as for AOX, Adsorbable Organic Halogen as Cl)
- Sulfide [water, surface water]: 5.51237e-7 kg; = 5.49752460070304E-07 * relation_global_country; source Jungbluth, N. 2007, p. Tab. 12.26, p. 238; lognormal variance with pedigree 0.3033, pedigree (2,2,5,5,2)
  (same comment as for AOX, Adsorbable Organic Halogen as Cl)
- Cadmium, ion [water, surface water]: 2.98078e-9 kg; = 2.97275399353465E-09 * relation_global_country; source Jungbluth, N. 2007, p. Tab. 12.26, p. 238; lognormal variance with pedigree 0.4533, pedigree (2,2,5,5,2)
  (same comment as for AOX, Adsorbable Organic Halogen as Cl)
- Vanadium [air, urban air close to ground]: 1.07434e-5 kg; = 1.07144316567474E-05 * relation_global_country; source Jungbluth, N. 2007; lognormal variance with pedigree 1.4233, pedigree (2,2,5,5,2)
  Calculation based on particle emission. Deviation calculated from ranges
- Propane [air, urban air close to ground]: 5.36555e-7 kg; = 5.35109739033632E-07 * relation_global_country; source Jungbluth, N. 2007, p. Tab. 12.19, Tab. 12.20; lognormal variance with pedigree 0.1233, pedigree (2,2,5,5,2)
  (same comment as for Formaldehyde)
- Nickel, ion [water, surface water]: 1.82035e-7 kg; = 1.81544893999945E-07 * relation_global_country; source Jungbluth, N. 2007, p. Tab. 12.26, p. 238; lognormal variance with pedigree 0.3733, pedigree (2,2,5,5,2)
  (same comment as for AOX, Adsorbable Organic Halogen as Cl)
- Chromium VI [air, urban air close to ground]: 3.23121e-9 kg; = 3.22250125169589E-09 * relation_global_country; source Jungbluth, N. 2007, p. Tab. 12.23, Tab. 12.24; lognormal variance with pedigree 2.2526, pedigree (3,3,4,5,1)
  (same comment as for Arsenic)
- Ammonia [air, urban air close to ground]: 1.12883e-6 kg; = 1.12579399262229E-06 * relation_global_country; source Jungbluth, N. 2007, p. p.232; lognormal variance with pedigree 1.0433, pedigree (2,2,5,5,2)
  Literature value/estimation. Compilation from different sources
- Carbon monoxide, fossil [air, urban air close to ground]: 0.000128669 kg; = 0.000128322586737377 * relation_global_country; source Jungbluth, N. 2007, p. Tab. 12.13, p. 229; lognormal variance with pedigree 0.1933, pedigree (2,2,5,5,2)
  Literature value/estimation. Compilation from different sources - see Tab. 12.13 for details.
- TOC, Total Organic Carbon [water, surface water]: 1.05345e-5 kg; = 1.05061549900062E-05 * relation_global_country; source Jungbluth, N. 2007, p. Tab. 12.26, p. 238; lognormal variance with pedigree 0.0439, pedigree (2,2,5,5,2)
  (same comment as for AOX, Adsorbable Organic Halogen as Cl)
- Dioxins, measured as 2,3,7,8-tetrachlorodibenzo-p-dioxin [air, urban air close to ground]: 1.06052e-13 kg; = 1.05766153371863E-13 * relation_global_country; source Jungbluth, N. 2007, p. Tab. 12.22 p. 235; lognormal variance with pedigree 0.3452, pedigree (2,4,5,5,2)
  Measurement made in Great Britain (Powergen 2001) and estimation (see Tab. 12.22)
  Powergen (2001) Environment Report 2000. Powergen UK, Coventry, UK, retrieved from: www.pgen.com.
- Copper, ion [water, surface water]: 2.59017e-8 kg; = 2.58319599150767E-08 * relation_global_country; source Jungbluth, N. 2007, p. Tab. 12.26, p. 238; lognormal variance with pedigree 0.7533, pedigree (2,2,5,5,2)
  (same comment as for AOX, Adsorbable Organic Halogen as Cl)
- Sulfite [water, surface water]: 1.8497e-5 kg; = 1.84471359144431E-05 * relation_global_country; source Jungbluth, N. 2007, p. Tab. 12.26, p. 238; lognormal variance with pedigree 0.0633, pedigree (2,2,5,5,2)
  (same comment as for AOX, Adsorbable Organic Halogen as Cl)
- Beryllium [air, urban air close to ground]: 5.79065e-10 kg; = 5.77505028146857E-10 * relation_global_country; source Jungbluth, N. 2007; lognormal variance with pedigree 0.6626, pedigree (3,3,4,5,1)
  Literature
- Vanadium, ion [water, surface water]: 3.73163e-7 kg; = 3.72158241611466E-07 * relation_global_country; source Jungbluth, N. 2007, p. Tab. 12.26, p. 238; lognormal variance with pedigree 0.7033, pedigree (2,2,5,5,2)
  (same comment as for AOX, Adsorbable Organic Halogen as Cl)
- Chloride [water, surface water]: 0.000250626 kg; = 0.000249950716155834 * relation_global_country; source Jungbluth, N. 2007, p. Tab. 12.26, p. 238; lognormal variance with pedigree 0.9233, pedigree (2,2,5,5,2)
  (same comment as for AOX, Adsorbable Organic Halogen as Cl)
- Hydrocarbons, aliphatic, alkanes, unspecified [air, urban air close to ground]: 1.07309e-5 kg; = 1.07020073585515E-05 * relation_global_country; source Jungbluth, N. 2007; lognormal variance with pedigree 0.1233, pedigree (2,2,5,5,2)
  Calculation based on VOC emission. Deviation calculated from ranges
- Chromium, ion [water, surface water]: 3.12496e-8 kg; = 3.11653979581671E-08 * relation_global_country; source Jungbluth, N. 2007, p. Tab. 12.26, p. 238; lognormal variance with pedigree 0.6633, pedigree (2,2,5,5,2)
  (same comment as for AOX, Adsorbable Organic Halogen as Cl)
- COD, Chemical Oxygen Demand [water, surface water]: 1.97036e-5 kg; = 1.96505045960835E-05 * relation_global_country; source Jungbluth, N. 2007, p. Tab. 12.26, p. 238; lognormal variance with pedigree 0.5133, pedigree (2,2,5,5,2)
  (same comment as for AOX, Adsorbable Organic Halogen as Cl)
- Carbon dioxide, fossil [air, unspecified]: 0.00641559 kg; = 0.00639830258807689 * relation_global_country; source Jungbluth, N. 2007, p. Tab. 12.29, Tab. 12.30; lognormal variance with pedigree 0.0606, pedigree (2,5,5,5,1)
  Literature value. CO2 emissions from flue gas treatment with limestone use.
- Carbon dioxide, fossil [air, urban air close to ground]: 0.812132 kg; = 0.809944632370249 * relation_global_country; source Jungbluth, N. 2007, p. Tab. 12.12, p. 229; lognormal variance with pedigree 0.0039, pedigree (2,2,3,1,2)
  (same comment as for Sulfur dioxide)
- Cobalt [water, surface water]: 2.44996e-9 kg; = 2.44335526523885E-09 * relation_global_country; source Jungbluth, N. 2007, p. Tab. 12.26, p. 238; lognormal variance with pedigree 0.0439, pedigree (2,2,5,5,2)
  (same comment as for AOX, Adsorbable Organic Halogen as Cl)
- Methanol [air, urban air close to ground]: 5.36555e-6 kg; = 5.35109739033632E-06 * relation_global_country; source Jungbluth, N. 2007; lognormal variance with pedigree 0.1233, pedigree (2,2,5,5,2)
  Calculation based on VOC emission. Deviation calculated from ranges
- Nitrogen oxides [air, urban air close to ground]: 0.00271778 kg; = 0.00271045614138409 * relation_global_country; source Jungbluth, N. 2007, p. Tab. 12.15 p. 231; lognormal variance with pedigree 0.0433, pedigree (2,2,3,1,2)
  (same comment as for Sulfur dioxide)
- BOD5, Biological Oxygen Demand [water, surface water]: 1.80147e-5 kg; = 1.79661764796503E-05 * relation_global_country; source Jungbluth, N. 2007, p. Tab. 12.26, p. 238; lognormal variance with pedigree 0.3233, pedigree (2,2,5,5,2)
  (same comment as for AOX, Adsorbable Organic Halogen as Cl)
- Sulfate [water, surface water]: 0.00204876 kg; = 0.0020432380627013 * relation_global_country; source Jungbluth, N. 2007, p. Tab. 12.26, p. 238; lognormal variance with pedigree 0.0533, pedigree (2,2,5,5,2)
  (same comment as for AOX, Adsorbable Organic Halogen as Cl)
- Thallium [water, surface water]: 3.79744e-8 kg; = 3.78720561033709E-08 * relation_global_country; source Jungbluth, N. 2007, p. Tab. 12.26, p. 238; lognormal variance with pedigree 0.0439, pedigree (2,2,5,5,2)
  (same comment as for AOX, Adsorbable Organic Halogen as Cl)
- Chromium [air, urban air close to ground]: 1.25415e-7 kg; = 1.25077099991164E-07 * relation_global_country; source Jungbluth, N. 2007, p. Tab. 12.23, Tab. 12.24; lognormal variance with pedigree 1.4553, pedigree (2,2,3,5,2)
  (same comment as for Arsenic)
- Sodium [air, urban air close to ground]: 3.11482e-6 kg; = 3.1064245220551E-06 * relation_global_country; source Jungbluth, N. 2007, p. Tab. 12.25; lognormal variance with pedigree 0.0706, pedigree (3,3,4,5,3)
  Literature data/calculation. See Tab. 12.25 for details.
- Lead [air, urban air close to ground]: 3.61641e-7 kg; = 3.60667186373267E-07 * relation_global_country; source Jungbluth, N. 2007; lognormal variance with pedigree 1.2433, pedigree (2,2,5,5,2)
  Calculation based on particle emission. Deviation calculated from ranges
- Lead [water, surface water]: 5.1163e-8 kg; = 5.10252130314862E-08 * relation_global_country; source Jungbluth, N. 2007, p. Tab. 12.26, p. 238; lognormal variance with pedigree 0.5333, pedigree (2,2,5,5,2)
  (same comment as for AOX, Adsorbable Organic Halogen as Cl)
- Particulates, > 2.5 um, and < 10um [air, urban air close to ground]: 6.24196e-5 kg; = 6.22514591785016E-05 * relation_global_country; source Jungbluth, N. 2007, p. Tab. 12.17 / Tab. 12.18; lognormal variance with pedigree 0.1387, pedigree (2,2,4,5,3)
  (same comment as for Particulates, < 2.5 um)
- Hydrocarbons, unspecified [water, surface water]: 3.80501e-7 kg; = 3.79476313314415E-07 * relation_global_country; source Jungbluth, N. 2007, p. Tab. 12.26, p. 238; lognormal variance with pedigree 0.0733, pedigree (2,2,5,5,2)
  (same comment as for AOX, Adsorbable Organic Halogen as Cl)
- Zinc, ion [water, surface water]: 6.4772e-8 kg; = 6.4597469671174E-08 * relation_global_country; source Jungbluth, N. 2007, p. Tab. 12.26, p. 238; lognormal variance with pedigree 0.2933, pedigree (2,2,5,5,2)
  (same comment as for AOX, Adsorbable Organic Halogen as Cl)
- PAH, polycyclic aromatic hydrocarbons [air, urban air close to ground]: 1.84117e-8 kg; = 1.83620897840367E-08 * relation_global_country; source Jungbluth, N. 2007, p. Tab. 12.21, p. 235; lognormal variance with pedigree 0.3306, pedigree (2,4,4,5,3)
  Literature value/estimation. Compilation of different emissions from Masclet et al. 1987- see Tab. 12.21 for details.
  P. Masclet, M.A. Bresson, G. Mouvier, 'Polycyclic Aromatic Hydrocarbons Emitted by Power Stations, and the Influence of Combustion Conditions', in Fuel Vol. 66, Nr. 4, S. 556-562
- Hydrogen chloride [air, urban air close to ground]: 4.68261e-7 kg; = 4.6699915314895E-07 * relation_global_country; source Jungbluth, N. 2007, p. Tab. 12.25; lognormal variance with pedigree 0.0912, pedigree (2,3,5,5,3)
  Literature data/calculation. See Tab. 12.25 for details.
- Mercury [air, urban air close to ground]: 1.55741e-9 kg; = 1.55321226102755E-09 * relation_global_country; source Jungbluth, N. 2007; lognormal variance with pedigree 1.6633, pedigree (2,2,5,5,2)
  Calculation from ranges
- Mercury [water, surface water]: 1.28625e-9 kg; = 1.28278935719047E-09 * relation_global_country; source Jungbluth, N. 2007, p. Tab. 12.26, p. 238; lognormal variance with pedigree 0.5933, pedigree (2,2,5,5,2)
  (same comment as for AOX, Adsorbable Organic Halogen as Cl)
- DOC, Dissolved Organic Carbon [water, surface water]: 1.01704e-6 kg; = 1.01430469569203E-06 * relation_global_country; source Jungbluth, N. 2007; lognormal variance with pedigree 0.0439, pedigree (2,2,5,5,2)
  Calculated as equal to TOC.
- Methane, fossil [air, urban air close to ground]: 5.36555e-5 kg; = 5.35109739033632E-05 * relation_global_country; source Jungbluth, N. 2007, p. Tab. 12.19, Tab. 12.20; lognormal variance with pedigree 0.1233, pedigree (2,2,5,5,2)
  (same comment as for Formaldehyde)
- Arsenic, ion [water, surface water]: 1.22493e-9 kg; = 1.22162689595615E-09 * relation_global_country; source Jungbluth, N. 2007, p. Tab. 12.26, p. 238; lognormal variance with pedigree 0.0439, pedigree (2,2,5,5,2)
  (same comment as for AOX, Adsorbable Organic Halogen as Cl)
- Benzene [air, urban air close to ground]: 5.36555e-7 kg; = 5.35109739033632E-07 * relation_global_country; source Jungbluth, N. 2007; lognormal variance with pedigree 0.1233, pedigree (2,2,5,5,2)
  Calculation based on VOC emission. Deviation calculated from ranges
- Oils, unspecified [water, surface water]: 5.81118e-7 kg; = 5.79552688181026E-07 * relation_global_country; source Jungbluth, N. 2007, p. Tab. 12.26, p. 238; lognormal variance with pedigree 0.0633, pedigree (2,2,5,5,2)
  (same comment as for AOX, Adsorbable Organic Halogen as Cl)
- Fluoride [water, surface water]: 2.0825e-6 kg; = 2.07688744963416E-06 * relation_global_country; source Jungbluth, N. 2007, p. Tab. 12.26, p. 238; lognormal variance with pedigree 0.7933, pedigree (2,2,5,5,2)
  (same comment as for AOX, Adsorbable Organic Halogen as Cl)
- Dinitrogen monoxide [air, urban air close to ground]: 4.18565e-5 kg; = 4.17437183887658E-05 * relation_global_country; source Jungbluth, N. 2007, p. Tab. 12.16 p. 232; lognormal variance with pedigree 0.3833, pedigree (2,2,5,5,2)
  Literature value/estimation. Compilation from different sources - see Tab. 12.16 for details.
- Nickel [air, urban air close to ground]: 2.96865e-6 kg; = 2.96065189134384E-06 * relation_global_country; source Jungbluth, N. 2007; lognormal variance with pedigree 1.2433, pedigree (2,2,5,5,2)
  Calculation based on particle emission. Deviation calculated from ranges
- Hydrocarbons, aromatic [air, urban air close to ground]: 1.07309e-7 kg; = 1.07020073585515E-07 * relation_global_country; source Jungbluth, N. 2007; lognormal variance with pedigree 0.1233, pedigree (2,2,5,5,2)
  Calculation based on VOC emission. Deviation calculated from ranges
- Iron [air, urban air close to ground]: 7.2679e-7 kg; = 7.24832388479523E-07 * relation_global_country; source Jungbluth, N. 2007; lognormal variance with pedigree 0.6806, pedigree (3,3,4,5,3)
  Literature
- Calcium [air, urban air close to ground]: 3.11482e-7 kg; = 3.1064245220551E-07 * relation_global_country; source Jungbluth, N. 2007, p. Tab. 12.25; lognormal variance with pedigree 0.0606, pedigree (3,3,4,5,3)
  Literature data/calculation. See Tab. 12.25 for details.
- Benzo(a)pyrene [air, urban air close to ground]: 1.55741e-10 kg; = 1.55321226102755E-10 * relation_global_country; source Jungbluth, N. 2007; lognormal variance with pedigree 0.3726, pedigree (3,3,5,5,3)
  Literature
- Manganese [air, urban air close to ground]: 1.20966e-7 kg; = 1.20639782314836E-07 * relation_global_country; source Jungbluth, N. 2007, p. Tab. 12.23, Tab. 12.24; lognormal variance with pedigree 1.2433, pedigree (2,2,5,5,2)
  (same comment as for Arsenic)
- Manganese [water, surface water]: 3.67488e-8 kg; = 3.66498257602651E-08 * relation_global_country; source Jungbluth, N. 2007, p. Tab. 12.26, p. 238; lognormal variance with pedigree 0.0439, pedigree (2,2,5,5,2)
  (same comment as for AOX, Adsorbable Organic Halogen as Cl)
- Suspended solids, unspecified [water, surface water]: 2.25982e-5 kg; = 2.25373034350681E-05 * relation_global_country; source Jungbluth, N. 2007, p. Tab. 12.26, p. 238; lognormal variance with pedigree 0.0833, pedigree (2,2,5,5,2)
  (same comment as for AOX, Adsorbable Organic Halogen as Cl)
- Selenium [air, urban air close to ground]: 5.49844e-8 kg; = 5.48363096904992E-08 * relation_global_country; source Jungbluth, N. 2007; lognormal variance with pedigree 1.2433, pedigree (2,2,5,5,2)
  Calculation based on particle emission. Deviation calculated from ranges
- Copper [air, urban air close to ground]: 4.96735e-7 kg; = 4.95396522447329E-07 * relation_global_country; source Jungbluth, N. 2007, p. Tab. 12.23, Tab. 12.24; lognormal variance with pedigree 1.3433, pedigree (2,2,5,5,2)
  (same comment as for Arsenic)
- Nitrogen [water, surface water]: 8.37471e-5 kg; = 8.3521456053517E-05 * relation_global_country; source Jungbluth, N. 2007, p. Tab. 12.26, p. 238; lognormal variance with pedigree 0.0633, pedigree (2,2,5,5,2)
  (same comment as for AOX, Adsorbable Organic Halogen as Cl)
- Molybdenum [air, urban air close to ground]: 8.35764e-8 kg; = 8.33512865956363E-08 * relation_global_country; source Jungbluth, N. 2007; lognormal variance with pedigree 1.2433, pedigree (2,2,5,5,2)
  Calculation based on particle emission. Deviation calculated from ranges
- Phosphorus [water, surface water]: 1.89872e-7 kg; = 1.8936030125843E-07 * relation_global_country; source Jungbluth, N. 2007, p. Tab. 12.26, p. 238; lognormal variance with pedigree 0.0439, pedigree (2,2,5,5,2)
  (same comment as for AOX, Adsorbable Organic Halogen as Cl)
- Particulates, > 10 um [air, urban air close to ground]: 6.59449e-5 kg; = 6.57672660175277E-05 * relation_global_country; source Jungbluth, N. 2007, p. Tab. 12.17 / Tab. 12.18; lognormal variance with pedigree 0.0587, pedigree (2,2,4,5,3)
  (same comment as for Particulates, < 2.5 um)
- Acetone [air, urban air close to ground]: 2.62805e-6 kg; = 2.62096973868199E-06 * relation_global_country; source Jungbluth, N. 2007; lognormal variance with pedigree 0.132, pedigree (1,1,5,5,1)
  Calculation based on VOC emission. Deviation calculated from ranges

## Sampling procedure
Literature, environmental reports and questionnaires

## Extrapolations
The exchanges in this datasets are a weighted average of the following country oil datasets in the ecoinvent database (weighting with electricity production):
AT, BE, BR, GR, CN, CS, CZ, DE, DK, ES, FI, FR, GB, GR, HR, HU, IE, IT, JP, MK, NL, NO, PT, PL, SE, SI, SK.
For details see comment for parameter 'average efficiency of oil power plants, global'

Child exchanges are put into relation to the parent exchanges by means of average efficiency of oil power plants in the country and global average efficiency of oil power plants.

## Review by Carl Vadenbo 2015-07-14
The update of the whole electricity sector for the ecoinvent v3.2 database consist of hundreds of datasets. All these datasets have passed through a streamlined review processes where the underlying modelling of production volumes, technology shares and efficiencies was reviewed in detail prior to the datasets being submitted to the database.
