# inverter production, 500kW

Dataset: EcoSpold 2, unit process
Geography: RER
Time period: 2004-01-01 to 2019-12-31
Technology level: current
Classification: ISIC rev.4 ecoinvent: 2790:Manufacture of other electrical equipment
Classification: EcoSpold01Categories: photovoltaic/production of components
Synonyms: inverse rectifier
Tags: ConvertedDataset
Scenario: Business-as-Usual
System model: Allocation at the point of substitution
Generated by: Matthias Tuchschmid (obsolete)
Published in: Jungbluth, N. 2007
Database: ecoinvent
isCopyrightProtected: true
accessRestrictedTo: 1

## General comment
Production of an inverter (500kW) with an efficiency of 95.4% (total efficiency factor which includes MPP-Tracking) for photovoltaic plant. Total weight about 3000 kg.
[This dataset was already contained in the ecoinvent database version 2. It was not individually updated during the transfer to ecoinvent version 3. Life Cycle Impact Assessment results may still have changed, as they are affected by changes in the supply chain, i.e. in other datasets. This dataset was generated following the ecoinvent quality guidelines for version 2. It may have been subject to central changes described in the ecoinvent version 3 change report (http://www.ecoinvent.org/database/ecoinvent-version-3/reports-of-changes/), and the results of the central updates were reviewed extensively. The changes added e.g. consistent water flows and other information throughout the database. The documentation of this dataset can be found in the ecoinvent reports of version 2, which are still available via the ecoinvent website. The change report linked above covers all central changes that were made during the conversion process.]

## Included activities end
Materials, packaging and electricity use for the production of an inverse rectifier. Disposal of the product after use.

## Geography
Production in RER.

## Technology
Inverter for a photovoltaic grid-connected system with a capacity of 500kWp.

## Reference product
- inverter, 500kW: 1 unit; CPC 4717: Parts for the goods of classes 4711, 4712 and 4714 to 4716; By-product classification allocatable product
  EcoSpold01Location=RER
  production volume 1.32237 unit
    This is a placeholder value that does not reflect real-world production volumes. This dataset does not currently require a real-world production volume to work in the database framework, and no actual data were collected yet. This has no negative effect on the results of the ecoinvent database. The placeholder value of this activity was scaled according to the nominal GDP of 2005 (source: United Nations, http://data.un.org/Glossary.aspx?q=GDP+%28current+US%24%29, accessed 20130726) to reflect an appropriate share of the global production volume, which is also a placeholder value.
  property price 12060 EUR2005
    EU27 I/O database-68 Electronic machinery (4.02 EURO2003/kg dry soilds) in the 'EU & DK Input Output Database' Weight of the inverter is 3000kg.
  property true value 12060
    allocation property applied in "true value" allocation // value calculated from revenue

## By-products
- electricity, for reuse in municipal waste incineration only: 0 kWh; CPC 17100: Electrical energy; By-product classification allocatable product; pedigree (1,1,1,1,1)
  Net electricity generated from this waste and used in internal MSWI plant energy redistribution.
  Uncertainty: uncertainty is calculated from uncertainties in waste composition and uncertainties in energy efficiency and the uncertainty in internal energy demand
  production volume 287.358 kWh
  property true value relation 3.6; name E_el_prod_MSWI_true_value_relation
    property to calculate "true value" from
  property exergy 3.6 MJ; name E_el_prod_MSWI_exergy
    This exergy property is based on the exergy content of the product.
  property price 0.1 EUR2005; name E_el_prod_MSWI_price_EUR2005
    Estimated to be the same price as in case of electricity, medium voltage.
  property true value 36.8206
    allocation property applied in "true value" allocation // value calculated from true value relation
- heat, for reuse in municipal waste incineration only: 0 MJ; CPC 17300: Steam and hot water; By-product classification allocatable product; pedigree (1,1,1,1,1)
  Net useful heat generated from this waste and used in internal MSWI plant energy redistribution.
  Uncertainty: uncertainty is calculated from uncertainties in waste composition and uncertainties in energy efficiency and the uncertainty in internal energy demand
  production volume 1999.34 MJ
  property true value relation 0.1842; name E_th_prod_MSWI_true_value_relation
    property to calculate "true value" from
  property exergy 0.1842 MJ; name E_th_prod_MSWI_exergy
    This exergy property is based on the exergy content of the product.
  property price 0.0106 EUR2005; name E_th_prod_MSWI_price_EUR2005
    Average European district heat price from Ecoheatcool and Euroheat 2005-2006, Ecoheat Work package 1: The European heat market. Final report. 10.6 EUR/GJ i s the price of district heat. http://www.solarthermalworld.org/files/Ecoheatcool%20WP1%20Web.pdf?download
  property true value 13.1082
    (same comment as for electricity, for reuse in municipal waste incineration only)
- zinc concentrate: 0 kg; CPC 14290: Other non-ferrous metal ores and concentrates (other than uranium or thorium ores and concentrates); By-product classification allocatable product
  Calculated value from the knowledge of the properties of both products.
  production volume 0.0482012 kg
  property price 0.38 EUR2005; name ByP_price_EUR2005
    Temporary price data. Calculated as 90% of purchasers price based on: Zinc content in concentrate 53%. Concentrate price per kg Zn 86.5% of refined Zn price (13.5% treatment charges according to CHR Metals Limited 2005: Dynamic cost curves. http://www.minecost.com/dynamic.pdf). 2004 zinc price from USGS (2007) Mineral commodity summaries 2007. <http://minerals.usgs.gov/minerals/pubs/mcs/2007/mcs2007.pdf> [Accessed 25 May 2010]
  property zinc content 0.53; name zinc_C_zinc_concentrate
    Zinc content on a dry matter basis. Value taken from teh "zinc mine operation" /GLO dataset.
  property dry mass 1 kg; name DM_zinc_concentrate
  property carbon content 0
    carbon content on a dry matter basis (reserved; not for manual entry)
  property true value 0.0183164
    allocation property applied in "true value" allocation // value calculated from revenue
  properties: wet mass 1 kg, water content 0, carbon content, non-fossil 0, carbon content, fossil 0, water in wet mass 0 kg, carbon allocation 0 kg
- lead: 0 kg; CPC 41441: Lead, unwrought; By-product classification allocatable product
  EcoSpold01Location=SE
  production volume 0.781974 kg
  property price 0.744 EUR2005
    Temporary price data. Calculated as 90% of purchasers price based on: Source: ecoinvent v2 report 10-part IX, Tab 5.10 & 2.5
  property carbon content 0
    carbon content on a dry matter basis (reserved; not for manual entry)
  property true value 0.581789
    allocation property applied in "true value" allocation // value calculated from revenue
  properties: wet mass 1 kg, water content 0, carbon content, non-fossil 0, carbon content, fossil 0, dry mass 1 kg, water in wet mass 0 kg, carbon allocation 0 kg
- copper: 0 kg; By-product classification allocatable product; CPC 41413: Refined copper and copper alloys, unwrought; master alloys of copper
  EcoSpold01Location=SE
  production volume 11.584 kg
  properties: water content 0, water in wet mass 0 kg, carbon content, fossil 0, carbon content, non-fossil 0, dry mass 1 kg, wet mass 1 kg, price 5.52 EUR2005, carbon content 0, carbon allocation 0 kg, true value 63.9437
- nickel, 99.5%: 0 kg; CPC 41422: Unwrought nickel; By-product classification allocatable product
  EcoSpold01Location=SE
  production volume 1.63235 kg
  property price 10.4 EUR2005
    Temporary price data. Calculated as 90% of purchasers price based on: 2004 nickel price from USGS (2007) Mineral commodity summaries 2007. <http://minerals.usgs.gov/minerals/pubs/mcs/2007/mcs2007.pdf> [Accessed 25 May 2010]
  property carbon content 0
    carbon content on a dry matter basis (reserved; not for manual entry)
  property true value 16.9764
    allocation property applied in "true value" allocation // value calculated from revenue
  properties: water in wet mass 0 kg, wet mass 1 kg, carbon content, non-fossil 0, dry mass 1 kg, water content 0, carbon content, fossil 0, carbon allocation 0 kg
- silver: 0 kg; CPC 41310: Silver (including silver plated with gold or platinum), unwrought or in semi-manufactured forms, or in powder […]; By-product classification allocatable product; CAS 7440-22-4
  EcoSpold01Location=SE
  production volume 0.269566 kg
  property price 178 EUR2005
    (same comment as for lead)
  property carbon content 0
    carbon content on a dry matter basis (reserved; not for manual entry)
  property true value 47.9828
    allocation property applied in "true value" allocation // value calculated from revenue
  properties: wet mass 1 kg, carbon content, non-fossil 0, dry mass 1 kg, water content 0, carbon content, fossil 0, water in wet mass 0 kg, carbon allocation 0 kg
- palladium: 0 kg; CPC 4160: Other non-ferrous metals and articles thereof (including waste and scrap of some metals); cermets and articles […]; By-product classification allocatable product
  EcoSpold01Location=SE
  production volume 0.0149223 kg
  property price 5640 EUR2005
    Temporary price data. Calculated as 90% of purchasers price based on: 2004 price from USGS (2007) Mineral commodity summaries 2007. <http://minerals.usgs.gov/minerals/pubs/mcs/2007/mcs2007.pdf> [Accessed 25 May 2010]
  property carbon content 0
    carbon content on a dry matter basis (reserved; not for manual entry)
  property true value 84.1616
    allocation property applied in "true value" allocation // value calculated from revenue
  properties: wet mass 1 kg, carbon content, fossil 0, water in wet mass 0 kg, water content 0, carbon content, non-fossil 0, dry mass 1 kg, carbon allocation 0 kg
- gold: 0 kg; CPC 41320: Gold (including gold plated with platinum), unwrought or in semi-manufactured forms, or in powder form; By-product classification allocatable product; CAS 7440-57-5
  EcoSpold01Location=SE
  production volume 0.00818331 kg
  property price 10600 EUR2005
    Temporary price data. Calculated as 90% of purchasers price based on: Source: ecoinvent v2 report 10-part IX, Tab 2.5
  property carbon content 0
    carbon content on a dry matter basis (reserved; not for manual entry)
  property true value 86.7431
    allocation property applied in "true value" allocation // value calculated from revenue
  properties: wet mass 1 kg, carbon content, fossil 0, dry mass 1 kg, carbon content, non-fossil 0, water content 0, water in wet mass 0 kg, carbon allocation 0 kg
- waste paperboard, sorted: 0 kg; CPC 39240: Waste and scrap of paper or paperboard; By-product classification Recyclable; pedigree (1,1,1,1,1)
  It is assumed that 86.3% (wet weight) of waste paperboard, unsorted is segregated to waste paperboard, sorted. Waste paper, sorted is later used in recycling industry where maximum 79% of it, is transformed into new paperboard.
  production volume 11.7368 kg
  property price 0.0436 EUR2005; name ByP_waste_paperboard_sorted_price_EUR200
    Estimated value; three different sources were used to determine the price for waste paperboard, sorted. 35 AUD/tonne (http://larimer.org/solidwaste/charts/Current.htm, accessed 20130328), 70 GBP/tonne (http://www.letsrecycle.com/prices/waste%20paper, accessed 20130328) and 20 USD/tonne (http://www.oxpaperboard.com/1/post/2013/03/ox-paperboard-announces-price-adjustment-to-uncoated-recycled-paperboard.html, accessed 20130328).
  property water content 0.243781; = WWM_waste_paperboard_sorted/ DM_waste_paperboard_sorted
  property water in wet mass 0.196 kg; name WWM_waste_paperboard_sorted; = WM_waste_paperboard_sorted- DM_waste_paperboard_sorted
  property dry mass 0.804 kg; name DM_waste_paperboard_sorted
  property wet mass 1 kg; name WM_waste_paperboard_sorted
  property carbon content 0.483259
    carbon content on a dry matter basis (reserved; not for manual entry)
  property true value 0.511724
    allocation property applied in "true value" allocation // value calculated from revenue
  properties: carbon content, non-fossil 0.483259, carbon content, fossil 0, carbon allocation 0.38854 kg

## Inputs from technosphere
- sheet rolling, steel: 1397.35 kg; lognormal variance with pedigree 0.0686, pedigree (4,3,5,1,1)
  EcoSpold01Location=RER
  Literature (de Wild 2006), Calculation
  Uncertainty: Literature (de Wild 2006), Calculation
- glass fibre reinforced plastic, polyester resin, hand lay-up: 42.7561 kg; lognormal variance with pedigree 0.0686, pedigree (4,3,5,1,1)
  Literature (de Wild 2006), Calculation
  EcoSpold01Location=RER
  Uncertainty: Literature (de Wild 2006), Calculation
  properties: dry mass 1 kg, carbon content, fossil 0.246639, wet mass 1 kg
  note on carbon content, fossil: C content was calculated as an addition of C content in the product components (60% glass fibre, 40% polyester resin)
- electric connector, wire clamp: 46.06 kg; lognormal variance with pedigree 0.0686, pedigree (4,3,5,1,1)
  Literature (de Wild 2006), Calculation
  EcoSpold01Location=GLO
  Uncertainty: Literature (de Wild 2006), Calculation
  properties: carbon content, fossil 0.19653, dry mass 1 kg, wet mass 1 kg
  note on carbon content, fossil: Calculated as the addition of C contents in the product composition
- diode, glass-, for through-hole mounting: 0.0456713 kg; lognormal variance with pedigree 0.0686, pedigree (4,3,5,1,1)
  EcoSpold01Location=GLO
  Literature (de Wild 2006), Calculation
  Uncertainty: Literature (de Wild 2006), Calculation
  properties: carbon content, fossil 0.0203273, wet mass 1 kg, dry mass 1 kg
- capacitor, film type, for through-hole mounting: 0.33136 kg; lognormal variance with pedigree 0.0686, pedigree (4,3,5,1,1)
  (same comment as for electric connector, wire clamp)
  properties: dry mass 1 kg, carbon content, fossil 0.278876, wet mass 1 kg
  note on carbon content, fossil: Calculated as the addition of C contents in the product composition, and referred to 1 kg capacitors, and then to 1 kg DM
- wire drawing, copper: 325.53 kg; lognormal variance with pedigree 0.0686, pedigree (4,3,5,1,1)
  (same comment as for sheet rolling, steel)
- capacitor, tantalum-, for through-hole mounting: 0.0223498 kg; lognormal variance with pedigree 0.0686, pedigree (4,3,5,1,1)
  (same comment as for electric connector, wire clamp)
  properties: carbon content, fossil 0.181224, wet mass 1 kg, dry mass 1 kg
- resistor, metal film type, through-hole mounting: 0.00485865 kg; lognormal variance with pedigree 0.0686, pedigree (4,3,5,1,1)
  (same comment as for electric connector, wire clamp)
  properties: dry mass 1 kg, carbon content, fossil 0.029003, wet mass 1 kg
  note on carbon content, fossil: Calculated as the addition of C contents in the product composition, and referred to 1 kg DM resistor.
- inductor, ring core choke type: 0.341077 kg; lognormal variance with pedigree 0.0686, pedigree (4,3,5,1,1)
  (same comment as for electric connector, wire clamp)
  properties: carbon content, fossil 0.445934, dry mass 1 kg, wet mass 1 kg
  note on carbon content, fossil: Calculated as the addition of C contents in the product composition, and referred to 1 kg DM inductor
- metal working factory: 1.31718e-6 unit; lognormal variance with pedigree 0.37, pedigree (4,4,5,1,1)
  EcoSpold01Location=RER
  Calculation, based on annual production of electronic component production plant
  Uncertainty: Calculation, based on annual production of electronic component production plant
- transistor, wired, small size, through-hole mounting: 0.0369258 kg; lognormal variance with pedigree 0.0686, pedigree (4,3,5,1,1)
  (same comment as for diode, glass-, for through-hole mounting)
  properties: dry mass 1 kg, wet mass 1 kg, carbon content, fossil 0.080338
  note on carbon content, fossil: Calculated as the addition of C contents in the product composition, and referred to 1 kg DM transistor.
- waste mineral oil: 0 kg; pedigree (1,1,1,1,1)
  Calculation, different geographical location
  EcoSpold01Location=CH
  Uncertainty: Calculation, different geographical location
  production volume 0 kg
    Calculated from the production volume of inverter, 500kW in proportion to the respective output amounts.
  properties: wet mass 1 kg, water content 0.111111, dry mass 0.9 kg, carbon content, fossil 0.864444
  note on carbon content, fossil: Tab A.6, ecoinvent v2.2 report 13_I. C content has been calculated after data in the tables, and then referred to 1 kg DM
- waste plastic, industrial electronics: -223.498 kg; lognormal variance with pedigree 0.0706, pedigree (4,3,5,5,1)
  EcoSpold01Location=CH
  Calculation, different geographical location
  Uncertainty: Calculation, different geographical location
  production volume 230 kg
    (same comment as for waste mineral oil)
  properties: water content 0.180638, dry mass 0.847 kg, wet mass 1 kg, carbon content, fossil 0.81386
  note on carbon content, fossil: C content in 1 kg DM was calculated using data in Tab A.2, ecoinvent v2.2 report 13_I
- lubricating oil: 856.095 kg; lognormal variance with pedigree 0.2686, pedigree (4,3,5,1,5)
  (same comment as for sheet rolling, steel)
  properties: carbon content, fossil 0.75, wet mass 1 kg, dry mass 1 kg
  note on carbon content, fossil: Lubricating oil is produced from diesel. C-content/dry mass of fats and oils considered 75%, from: ecoinvent v2.2 report, n 15a, pg 40
- used printed wiring boards: -47.4846 kg; lognormal variance with pedigree 0.0706, pedigree (4,3,5,5,1)
  EcoSpold01Location=GLO
  Calculation, different geographical location
  Uncertainty: Calculation, different geographical location
  production volume 48.866 kg
    (same comment as for waste mineral oil)
  properties: carbon content, non-fossil 0.000960142, wet mass 1 kg, carbon content, fossil 0.193742, dry mass 1 kg
  note on carbon content, non-fossil: Composition of printed wiring boards used to calculate C content
- injection moulding: 68.9929 kg; lognormal variance with pedigree 0.0686, pedigree (4,3,5,1,1)
  (same comment as for sheet rolling, steel)
- printed wiring board, for through-hole mounting, Pb free surface: 0.109125 m2; = 0.2246*0.5; lognormal variance with pedigree 0.0686, pedigree (4,3,5,1,1)
  Literature (de Wild 2006), Calculation
  This original value from production mix has been replaced by 2 flows. Each has 50% share in the production mix.
  Uncertainty: Literature (de Wild 2006), Calculation
  properties: carbon content, fossil 0.210221, dry mass 3.08 kg, wet mass 3.08 kg
- steel, low-alloyed, hot rolled: 1397.35 kg; lognormal variance with pedigree 0.0686, pedigree (4,3,5,1,1)
  EcoSpold01Location=RER
  Literature (de Wild 2006), recycled after use, Calculation
  Uncertainty: Literature (de Wild 2006), recycled after use, Calculation
  properties: wet mass 1 kg, dry mass 1 kg, carbon content, fossil 0.005
  note on carbon content, fossil: Low alloyed steel composition given in Tab. 3.2 ecoinvent v2.2 report 10_partII. Steel assumed to have a C content of 0.5%
- copper: 325.53 kg; lognormal variance with pedigree 0.0686, pedigree (4,3,5,1,1)
  Literature (de Wild 2006), recycled after use, Calculation
  EcoSpold01Location=RER
  Uncertainty: Literature (de Wild 2006), recycled after use, Calculation
  properties: wet mass 1 kg, dry mass 1 kg
- capacitor, electrolyte type, > 2cm height: 0.248763 kg; lognormal variance with pedigree 0.0686, pedigree (4,3,5,1,1)
  (same comment as for diode, glass-, for through-hole mounting)
  properties: wet mass 1 kg, carbon content, non-fossil 0.0349727, dry mass 1 kg, carbon content, fossil 0.16971
- polystyrene foam slab: 1.55477 kg; lognormal variance with pedigree 0.0686, pedigree (4,3,5,1,1)
  EcoSpold01Location=RER
  Literature (Schwarz 1992)
  Uncertainty: Literature (Schwarz 1992)
  properties: carbon content, fossil 0.859091, dry mass 1 kg, wet mass 1 kg
  note on carbon content, fossil: XPS consists in 91% of polystyrene, 7% of blowing agent and the re-maining 2% are flame retardants (bromine compounds) and other additives (ecoinvent v2.2 report 7, part XIV, pg69). The chemical formula of polystyrene is (C8H8)n. Here, the blowing agent is CO2.
- electricity, medium voltage: 4448.39 kWh; lognormal variance with pedigree 0.0686, pedigree (4,3,5,1,1)
  Literature (Schwarz 1992)
  EcoSpold01Location=UCTE
  Uncertainty: Literature (Schwarz 1992)
- polyethylene, high density, granulate: 21.3781 kg; lognormal variance with pedigree 0.0686, pedigree (4,3,5,1,1)
  (same comment as for glass fibre reinforced plastic, polyester resin, hand lay-up)
  properties: carbon content, fossil 0.857143, dry mass 1 kg, wet mass 1 kg
  note on carbon content, fossil: Polyethylene is formed out of a huge amount of ethylene monomers (C2H4) (ecoinvent v2.2 report 11_II). MW=28 g/mol
- alkyd paint, white, without solvent, in 60% solution state: 21.3781 kg; lognormal variance with pedigree 0.2686, pedigree (4,3,5,1,5)
  (same comment as for glass fibre reinforced plastic, polyester resin, hand lay-up)
  properties: carbon content, fossil 0.140367, dry mass 1 kg, wet mass 1 kg, carbon content, non-fossil 0.199629
  note on carbon content, fossil: C content was calculated as an addition of C content in the raw materials.
- aluminium, cast alloy: 127.297 kg; lognormal variance with pedigree 0.0686, pedigree (4,3,5,1,1)
  (same comment as for copper)
  properties: wet mass 1 kg, dry mass 1 kg
- corrugated board box: 13.2155 kg; lognormal variance with pedigree 0.07, pedigree (4,4,5,1,1)
  EcoSpold01Location=RER
  Calculation, based on estimated dimension of inverse rectifier
  Uncertainty: Calculation, based on estimated dimension of inverse rectifier
  properties: water content 0.0582011, wet mass 1 kg, carbon content, fossil 0.000656085, carbon content, non-fossil 0.432275, dry mass 0.945 kg
  note on carbon content, fossil: Fossil C content was calculated after fossil C contents of chemicals used in the production of board (Tab 10-15 & 10.16 ecoinvent v2.2 report 11_III, part 10)
  note on carbon content, non-fossil: Biogenic C content was calculated after biogenic C contents of chemicals used in the production of board (Tab 10.15 & 10.16, ecoinvent v2.2 report 11_III, part 10).
- integrated circuit, logic type: 0.0272085 kg; lognormal variance with pedigree 0.0686, pedigree (4,3,5,1,1)
  (same comment as for electric connector, wire clamp)
  properties: dry mass 1 kg, carbon content, fossil 0.221701, wet mass 1 kg
- waste polystyrene: -1.55477 kg; lognormal variance with pedigree 0.0706, pedigree (4,3,5,5,1)
  (same comment as for waste plastic, industrial electronics)
  production volume 1.6 kg
    (same comment as for waste mineral oil)
  properties: wet mass 1 kg, water content 0.00200401, dry mass 0.998 kg, carbon content, fossil 0.922579
- glass fibre reinforced plastic, polyamide, injection moulded: 68.9929 kg; lognormal variance with pedigree 0.0686, pedigree (4,3,5,1,1)
  (same comment as for glass fibre reinforced plastic, polyester resin, hand lay-up)
  properties: wet mass 1 kg, dry mass 1 kg, carbon content, fossil 0.446018
  note on carbon content, fossil: Polyamide resin assimilate to Nylon 66 (ecoinvent v2.2 report 7_XIII). Nylon 66 is derived from hexamethylene diamine and adipic acid and has the following structure: -(HN-(CH2)6-NH-CO-(CH2)4-CO)n- (ecoinvent v2.2 report 11_II), C12H22N2O2. MW=226 g/mol. Here Nylon 66 is – mainly for improved stiffness and stability – modified with glass fibres. The glass fibre content in the product is assumed of 30%. (ecoinvent v2.2 report 11_II)
- printed wiring board, for through-hole mounting, Pb containing surface: 0.109125 m2; = 0.2246*0.5; lognormal variance with pedigree 0.0686, pedigree (4,3,5,1,1)
  (same comment as for printed wiring board, for through-hole mounting, Pb free surface)
  property dry mass 3.08 kg; name DM
  property water content 0; name water_content
  property wet mass 3.08 kg; name WM
  property carbon content, fossil 0.203154; name C_content_fossil
  property carbon content, non-fossil 0; name C_content_non_fossil
  property water in wet mass 0 kg; name WWM
- section bar extrusion, aluminium: 127.297 kg; lognormal variance with pedigree 0.0686, pedigree (4,3,5,1,1)
  (same comment as for glass fibre reinforced plastic, polyester resin, hand lay-up)
- fleece, polyethylene: 0.291519 kg; lognormal variance with pedigree 0.0686, pedigree (4,3,5,1,1)
  Literature (Schwarz 1992)
  EcoSpold01Location=RER
  Uncertainty: Literature (Schwarz 1992)
  properties: dry mass 1 kg, carbon content, fossil 0.857143, wet mass 1 kg
- waste polyethylene: -1.55477 kg; lognormal variance with pedigree 0.0706, pedigree (4,3,5,5,1)
  (same comment as for waste mineral oil)
  production volume 1.6 kg
    (same comment as for waste mineral oil)
  properties: dry mass 0.996 kg, carbon content, fossil 0.825301, wet mass 1 kg, water content 0.00401606
  note on carbon content, fossil: C content in 1 kg DM was calculated using data in Tab A.1, ecoinvent v2.2 report 13_I
- waste paperboard, unsorted: -13.2155 kg; lognormal variance with pedigree 0.0706, pedigree (4,3,5,5,1)
  (same comment as for waste plastic, industrial electronics)
  production volume 13.6 kg
    (same comment as for waste mineral oil)
  properties: price 0.03924 EUR2005, wet mass 1 kg, carbon content, non-fossil 0.483259, water content 0.243781, dry mass 0.804 kg
  note on carbon content, non-fossil: C content was calculated for 1 kg DM, using data in Tab A.3, ecoinvent v2.2 report 13_I.
- waste mineral oil: -836.733, -19.3612 kg (2 entries); lognormal variance with pedigree 0.0706, pedigree (4,3,5,5,1)
  (same comment as for waste mineral oil)
  production volume 881 kg

## Sampling procedure
Detailed analysis of materials for one product

## Review by Christian Bauer 2009-02-15
passed
none
