# lime production, hydraulic

Dataset: EcoSpold 2, unit process
Geography: CH
Time period: 1997-01-01 to 2019-12-31
Technology level: current
Classification: ISIC rev.4 ecoinvent: 2394:Manufacture of cement, lime and plaster
Classification: EcoSpold01Categories: construction materials/binder
Synonyms: Drehrohrofen; rotary kiln; clinker; Klinker; Zement; cement
Tags: ConvertedDataset
Scenario: Business-as-Usual
System model: Allocation at the point of substitution
Share of production covered: 70 %
Generated by: Tina Künniger
Published in: Kellenberger D. 2004
Database: ecoinvent
isCopyrightProtected: true
accessRestrictedTo: 1

## General comment
Contrary to clinker production, in this module no waste materials as fuel or secondary raw materials are included. Accordingly, no CO2-emissions from burning of waste are included. Other air emissions, assumed proportional to the fuel use, are estimated to be 88% of the emissions from the clinker calcination process, because the energy consumption is assumed to be 88% of the uses for clinker making.
[This dataset was already contained in the ecoinvent database version 2. It was not individually updated during the transfer to ecoinvent version 3. Life Cycle Impact Assessment results may still have changed, as they are affected by changes in the supply chain, i.e. in other datasets. This dataset was generated following the ecoinvent quality guidelines for version 2. It may have been subject to central changes described in the ecoinvent version 3 change report (http://www.ecoinvent.org/database/ecoinvent-version-3/reports-of-changes/), and the results of the central updates were reviewed extensively. The changes added e.g. consistent water flows and other information throughout the database. The documentation of this dataset can be found in the ecoinvent reports of version 2, which are still available via the ecoinvent website. The change report linked above covers all central changes that were made during the conversion process.]

## Included activities end
Includes the whole manufacturing process to burn hydraulic lime (raw material provision, grinding and mixing; rotary kiln process), internal processes (transport, etc.). For the infrastructure only the rotary kiln is taken into account (as material consumption). No administration is included.

## Geography
For some exchanges RER-modules have been used as proxy

## Technology
Copy of the clinker production technology with mainly adjustments of the energy amount and the emissions. Additionally some water for the hydration has been included.

## Parameters
- fraction, process water, to air: 0.15 dimensionless; name fraction_PW_to_air; lognormal variance with pedigree 0.092025, pedigree (4,4,3,2,4)
  Literature value. In case when no industry/process specific data are available, default evaporation fraction value is used. This value is 15% and is based on literature (Statistics Canada, 2007 & Shaffer, K.H., 2008, Consumptive water use in the Great Lakes Basin, USGS & Shiklomanov, 2003, World Water Resources at the Beginning of the 21st Century) and has been approved by an expert.
- fraction, tap water, to air: 0.15; name fraction_TW_to_air; = fraction_PW_to_air; lognormal variance with pedigree 0.092025, pedigree (4,4,3,2,4)
  Calculated value. See comment in the other parametres present in this dataset. Tap water is considered to be always used as process water, thus process water fractions to air are applied to all tap water input flows to calculate the amount of water consumed in the processes.

## Reference product
- lime, hydraulic: 1 kg; CPC 37420: Quicklime, slaked lime and hydraulic lime; By-product classification allocatable product
  production volume 0.0336675 kg
    This is a placeholder value that does not reflect real-world production volumes. This dataset does not currently require a real-world production volume to work in the database framework, and no actual data were collected yet. This has no negative effect on the results of the ecoinvent database. The placeholder value of this activity was scaled according to the nominal GDP of 2005 (source: United Nations, http://data.un.org/Glossary.aspx?q=GDP+%28current+US%24%29, accessed 20130726) to reflect an appropriate share of the global production volume, which is also a placeholder value.
  property carbon content 0
    carbon content on a dry matter basis (reserved; not for manual entry)
  property true value 1.77
    allocation property applied in "true value" allocation // value calculated from revenue
  properties: price 1.77 EUR2005, dry mass 1 kg, water in wet mass 0 kg, carbon content, fossil 0, water content 0, wet mass 1 kg, carbon content, non-fossil 0, carbon allocation 0 kg

## By-products
- electricity, for reuse in municipal waste incineration only: 0 kWh; CPC 17100: Electrical energy; By-product classification allocatable product; pedigree (1,1,1,1,1)
  Net electricity generated from this waste and used in internal MSWI plant energy redistribution.
  Uncertainty: uncertainty is calculated from uncertainties in waste composition and uncertainties in energy efficiency and the uncertainty in internal energy demand
  production volume 1.72471e-5 kWh
  property exergy 3.6 MJ; name E_el_prod_MSWI_exergy
    This exergy property is based on the exergy content of the product.
  property true value relation 3.6; name E_el_prod_MSWI_true_value_relation
    property to calculate "true value" from
  property price 0.1 EUR2005; name E_el_prod_MSWI_price_EUR2005
    Estimated to be the same price as in case of electricity, medium voltage.
  property true value 2.23052e-6
    allocation property applied in "true value" allocation // value calculated from true value relation
- iron scrap, sorted, pressed: 0 kg; By-product classification Recyclable; CPC 39310: Slag, dross, scalings and other waste from the manufacture of iron or steel; pedigree (1,1,1,1,1)
  Iron scrap recovered from this waste.
  Uncertainty: uncertainty calculated from uncertainty in waste composition, uncertainty of share of recyclable metal, uncertainty of transfer coefficient to bottom ash, uncertainty of the efficiency of scrap removal in MSWI plant.
  production volume 4.3659e-7 kg
  property price 0.175 EUR2005
    Temporary price data. Calculated as 90% of purchasers price based on: 2005 import and export prices (total trades (USD) divided by total weight (kg) in biggest economies of the world: EU27, USA, Brasil, China, India, Japan and Russia) from UN Commodity Trade Statistics Database (http://data.un.org/Explorer.aspxDatabase [Accessed 2011.06.20]). Commodity: Waste or scrap, of cast iron
  property carbon content 0
    carbon content on a dry matter basis (reserved; not for manual entry)
  property true value 7.64032e-8
    allocation property applied in "true value" allocation // value calculated from revenue
  properties: carbon content, fossil 0, dry mass 1 kg, carbon content, non-fossil 0, water in wet mass 0 kg, wet mass 1 kg, water content 0, carbon allocation 0 kg
- heat, for reuse in municipal waste incineration only: 0 MJ; CPC 17300: Steam and hot water; By-product classification allocatable product; pedigree (1,1,1,1,1)
  Net useful heat generated from this waste and used in internal MSWI plant energy redistribution.
  Uncertainty: uncertainty is calculated from uncertainties in waste composition and uncertainties in energy efficiency and the uncertainty in internal energy demand
  production volume 0.000126999 MJ
  property exergy 0.1842 MJ; name E_th_prod_MSWI_exergy
    This exergy property is based on the exergy content of the product.
  property true value relation 0.1842; name E_th_prod_MSWI_true_value_relation
    property to calculate "true value" from
  property price 0.0106 EUR2005; name E_th_prod_MSWI_price_EUR2005
    Average European district heat price from Ecoheatcool and Euroheat 2005-2006, Ecoheat Work package 1: The European heat market. Final report. 10.6 EUR/GJ i s the price of district heat. http://www.solarthermalworld.org/files/Ecoheatcool%20WP1%20Web.pdf?download
  property true value 8.40385e-7
    (same comment as for electricity, for reuse in municipal waste incineration only)
- iron scrap, unsorted: 0 kg; source European Aluminium Association 2008; CPC 39310: Slag, dross, scalings and other waste from the manufacture of iron or steel; By-product classification Recyclable; pedigree (1,1,1,1,1)
  production volume 6.1585e-11 kg
  property price 0.149 EUR2005; name ironScrapAmount_price_EUR2005
    Temporary price data. Calculated as 90% of purchasers price based on: estimated at 85% of sorted scrap
  property carbon content 0
    carbon content on a dry matter basis (reserved; not for manual entry)
  property true value 9.17616e-12
    allocation property applied in "true value" allocation // value calculated from revenue
  properties: water in wet mass 0 kg, water content 0, carbon content, fossil 0, carbon content, non-fossil 0, dry mass 1 kg, wet mass 1 kg, carbon allocation 0 kg
- aluminium oxide, non-metallurgical: 0 kg; source European Aluminium Association 2008; CPC 41432: Alumina (aluminium oxide), except artificial corundum; By-product classification allocatable product; CAS 1344-28-1; pedigree (1,1,1,1,1)
  production volume 3.87531e-9 kg
  property carbon content, non-fossil 0; name C_content_non_fossil
  property price 0.28 EUR2005; name Al2O3Amount_price_EUR2005
    From UN trade database. http://data.un.org/ Import data from the largest economies of the world are used (Brazil, India, USA, China, Japan and EU-27).
  property dry mass 1 kg; name DM
  property water content 0; name water_content
  property wet mass 1 kg; name WM
  property water in wet mass 0 kg; name WWM
  property carbon content, fossil 0; name C_content_fossil
  property carbon content 0
    carbon content on a dry matter basis (reserved; not for manual entry)
  property true value 1.08509e-9
    allocation property applied in "true value" allocation // value calculated from revenue
  properties: carbon allocation 0 kg
- aluminium, cast alloy: 0 kg; source European Aluminium Association 2008; By-product classification allocatable product; CPC 41431: Unwrought aluminium; pedigree (1,1,1,1,1)
  EcoSpold01Location=RER
  production volume 3.62256e-8 kg
  property price 1.3 EUR2005; name castAlloyAmount_price_EUR2005
    Temporary price data. Calculated as 90% of purchasers price based on: Source: London Metal Exchange, Aluminium alloy price for 2005
  property carbon content 0
    carbon content on a dry matter basis (reserved; not for manual entry)
  property true value 4.70932e-8
    allocation property applied in "true value" allocation // value calculated from revenue
  properties: water in wet mass 0 kg, carbon content, non-fossil 0, water content 0, dry mass 1 kg, carbon content, fossil 0, wet mass 1 kg, carbon allocation 0 kg
- aluminium, wrought alloy: 0 kg; source European Aluminium Association 2008; By-product classification allocatable product; CPC 4153: Semi-finished products of aluminium or aluminium alloys; pedigree (1,1,1,1,1)
  production volume 1.58589e-8 kg
  property price 1.44 EUR2005; name secondaryAluminiumOutput_price_EUR2005
    Estimated based on literature values and expert judgement. Aluminium ccast alloys are about 90% of the price of aluminium wrought alloys.
  property carbon content 0
    carbon content on a dry matter basis (reserved; not for manual entry)
  property true value 2.28368e-8
    allocation property applied in "true value" allocation // value calculated from revenue
  properties: wet mass 1 kg, water content 0, carbon content, fossil 0, water in wet mass 0 kg, carbon content, non-fossil 0, dry mass 1 kg, carbon allocation 0 kg
- copper: 0 kg; source Rentz O. 1999; By-product classification allocatable product; CPC 41413: Refined copper and copper alloys, unwrought; master alloys of copper
  Literature value. Copper uses: Before end-use copper is manufactured into semi fabricated products, such as shapes and ingots (known as 'semis'). These manufacturing processes are subdivided into hot working, cold working and, if necessary, process annealing. Few of the semis are ready for use as such. They more typically travel to first-stage manufacturers, who make metal rods, wire, and casting, and then to component manufacturers who produce such things as motors, valves, and insulated cables The components in turn are incorporated by final-stage manufacturers into a variety of finished products - automobiles, commercial buildings, residential housing, and so forth. These uses account for about 79% of the world-wide consumption of copper.
  production volume 4.20457e-9 kg
  property price 5.52 EUR2005
    Literature value (http://www.economist.com/news/business/21576714-mining-industry-has-enriched-chile-its-future-precarious-copper-solution). Average price between 20015 and 2013.
  property carbon content 0
    carbon content on a dry matter basis (reserved; not for manual entry)
  property true value 2.32092e-8
    allocation property applied in "true value" allocation // value calculated from revenue
  properties: dry mass 1 kg, water in wet mass 0 kg, wet mass 1 kg, carbon content, non-fossil 0, water content 0, carbon content, fossil 0, carbon allocation 0 kg
- zinc concentrate: 0 kg; CPC 14290: Other non-ferrous metal ores and concentrates (other than uranium or thorium ores and concentrates); By-product classification allocatable product
  Calculated value from the knowledge of the properties of both products.
  production volume 1.06303e-8 kg
  property price 0.38 EUR2005; name ByP_price_EUR2005
    Temporary price data. Calculated as 90% of purchasers price based on: Zinc content in concentrate 53%. Concentrate price per kg Zn 86.5% of refined Zn price (13.5% treatment charges according to CHR Metals Limited 2005: Dynamic cost curves. http://www.minecost.com/dynamic.pdf). 2004 zinc price from USGS (2007) Mineral commodity summaries 2007. <http://minerals.usgs.gov/minerals/pubs/mcs/2007/mcs2007.pdf> [Accessed 25 May 2010]
  property zinc content 0.53; name zinc_C_zinc_concentrate
    Zinc content on a dry matter basis. Value taken from teh "zinc mine operation" /GLO dataset.
  property dry mass 1 kg; name DM_zinc_concentrate
  property carbon content 0
    carbon content on a dry matter basis (reserved; not for manual entry)
  property true value 4.03951e-9
    allocation property applied in "true value" allocation // value calculated from revenue
  properties: wet mass 1 kg, water content 0, carbon content, non-fossil 0, carbon content, fossil 0, water in wet mass 0 kg, carbon allocation 0 kg

## Inputs from technosphere
All rows: lognormal variance with pedigree 0.69, pedigree (1,1,5,1,1)
- refractory, fireclay, packed: 8.20998e-5 kg
  estimation
  properties: dry mass 1 kg, wet mass 1 kg
- heavy fuel oil: 0.0368999 kg
  estimation
  properties: dry mass 1 kg, carbon content, fossil 0.849, wet mass 1 kg
- lime: 1.42 kg
  estimation
  properties: dry mass 1 kg, wet mass 1 kg, carbon content, fossil 0.120005
- refractory, high aluminium oxide, packed: 0.000137 kg
  estimation
  properties: wet mass 1 kg, dry mass 1 kg
- bauxite: 0.00012 kg
  estimation
  properties: wet mass 1 kg, dry mass 1 kg
- refractory, basic, packed: 0.00019 kg
  estimation
  properties: dry mass 1 kg, wet mass 1 kg
- clay: 0.330999 kg
  estimation
  properties: dry mass 0.965 kg, water content 0.0362694, wet mass 1 kg
- lubricating oil: 4.70999e-5 kg
  estimation
  properties: carbon content, fossil 0.75, dry mass 1 kg, wet mass 1 kg
  note on carbon content, fossil: Lubricating oil is produced from diesel. C-content/dry mass of fats and oils considered 75%, from: ecoinvent v2.2 report, n 15a, pg 40
- ammonia, liquid: 0.000907998 kg
  estimation
  properties: wet mass 1 kg, dry mass 1 kg
- lime, hydrated, loose weight: 0.00391999 kg
  estimation
  properties: dry mass 0.997 kg, water content 0.00300903, wet mass 1 kg
- electricity, medium voltage: 0.0579999 kWh
  estimation
- industrial machine, heavy, unspecified: 3.75999e-5 kg
  estimation
- hard coal: 0.0511999 kg
  estimation
  properties: dry mass 0.94 kg, wet mass 1 kg, water content 0.0638298, carbon content, fossil 0.845
  note on carbon content, fossil: C content 75-94% (specified in Tab 1.1, report 6, part VI). A mean content of 0.845 kg C/ kg dry hard coal was considered
- tap water: 0.339999 kg; name tap_water_input
  estimation
  properties: wet mass 1 kg, carbon content, fossil 0.00178991, water content 2962.17, dry mass 0.000337476 kg
  note on carbon content, fossil: Bicarbonate content is 2.93 mol/m3. CO2 content is 0.1 mol/m3 (ecoinvent v2.2 report 8, Tab 93.1).
- steel, chromium steel 18/8, hot rolled: 5.85999e-5 kg
  estimation
  properties: dry mass 1 kg, carbon content, fossil 0.0008, wet mass 1 kg
  note on carbon content, fossil: Stainless steel model is the grade 304 steel (18/8 stainless, 18% chromium 8% nickel; max. 0.08% C)
- inert waste, for final disposal: -7.99999e-5 kg
  estimation
  production volume 8e-5 kg
    Calculated from the production volume of lime, hydraulic in proportion to the respective output amounts.
  properties: dry mass 0.995 kg, wet mass 1 kg, water content 0.00502513
- sand: 0.00925998 kg
  estimation
  properties: wet mass 1 kg, dry mass 1 kg
- cement factory: 6.26999e-12 unit
  estimation
  This exchange has an activity link directly to the producing activity because the product is primarily consumed in the same geographical area where it is produced.
- municipal solid waste: -4.49999e-5 kg
  estimation
  production volume 4.5e-5 kg
    (same comment as for inert waste, for final disposal)
  properties: dry mass 0.771 kg, carbon content, fossil 0.171549, wet mass 1 kg, water content 0.297017, carbon content, non-fossil 0.261655
  note on carbon content, fossil: MSW composition in tab 4.1, ecoinvent v2.2 report 13_I. C content referred to 1 kg DM
- diesel, burned in building machine: 0.0134 MJ
  estimation

## Inputs from nature
- Water, unspecified natural origin [natural resource, in water]: 0.00128 m3; name water_UNO_input; source SCA - Slag Cement Association 2003; lognormal variance with pedigree 0.052625, pedigree (3,3,5,2,1)
  estimation
  Calculated based on literature, (Vionnet, S., Quantis Water Database - Technical Report, 2012).
  estimation
  Calculated based on literature, (Vionnet, S., Quantis Water Database - Technical Report, 2012).

## Emissions to nature
- Copper [air, unspecified]: 1.23e-8 kg; lognormal variance with pedigree 0.69, pedigree (1,1,5,1,1)
  estimation
- Vanadium [air, unspecified]: 4.39999e-9 kg; lognormal variance with pedigree 0.69, pedigree (1,1,5,1,1)
  estimation
- Tin [air, unspecified]: 7.91999e-9 kg; lognormal variance with pedigree 0.69, pedigree (1,1,5,1,1)
  estimation
- Water [water, unspecified]: 0.001377 m3; name water_to_water_unspecified; = (tap_water_input/1000)*(1-fraction_TW_to_air)+water_UNO_input*(1-fraction_PW_to_air); lognormal variance with pedigree 0.0807, pedigree (2,2,5,1,1)
  Calculated value based on literature values and expert opinion. See comments in the parametres' comment field.
  property water in wet mass 1000 kg; name WWM
  property dry mass 0 kg; name DM
  property fraction, origin: unspecified 0.790123; name fraction_origin_unspecified_Ww
  property wet mass 1000 kg; name WM
  property carbon content, non-fossil 0; name C_content_non_fossil
  property carbon content, fossil 0; name C_content_fossil
  property fraction, origin: fresh water 0.209877; name fraction_origin_fresh_water_Ww
  property fraction, origin: salt water 0; name fraction_origin_salt_water_Ww
- Mercury [air, unspecified]: 2.89999e-8 kg; lognormal variance with pedigree 0.69, pedigree (1,1,5,1,1)
  estimation
- Particulates, > 10 um [air, non-urban air or from high stacks]: 4.97999e-6 kg; lognormal variance with pedigree 0.69, pedigree (1,1,5,1,1)
  estimation
- Methane, fossil [air, unspecified]: 7.80999e-6 kg; lognormal variance with pedigree 0.69, pedigree (1,1,5,1,1)
  estimation
- Carbon dioxide, fossil [air, unspecified]: 0.753999 kg; lognormal variance with pedigree 0.69, pedigree (1,1,5,1,1)
  estimation
- Cobalt [air, unspecified]: 3.51999e-9 kg; lognormal variance with pedigree 0.69, pedigree (1,1,5,1,1)
  estimation
- Dioxins, measured as 2,3,7,8-tetrachlorodibenzo-p-dioxin [air, unspecified]: 8.43998e-13 kg; lognormal variance with pedigree 0.69, pedigree (1,1,5,1,1)
  estimation
- Antimony [air, unspecified]: 1.76e-9 kg; lognormal variance with pedigree 0.69, pedigree (1,1,5,1,1)
  estimation
- Arsenic [air, unspecified]: 1.06e-8 kg; lognormal variance with pedigree 0.69, pedigree (1,1,5,1,1)
  estimation
- Carbon monoxide, fossil [air, unspecified]: 0.000414999 kg; lognormal variance with pedigree 0.69, pedigree (1,1,5,1,1)
  estimation
- Ammonia [air, unspecified]: 2.01e-5 kg; lognormal variance with pedigree 0.69, pedigree (1,1,5,1,1)
  estimation
- Zinc [air, unspecified]: 5.27999e-8 kg; lognormal variance with pedigree 0.69, pedigree (1,1,5,1,1)
  estimation
- Beryllium [air, unspecified]: 2.64e-9 kg; lognormal variance with pedigree 0.69, pedigree (1,1,5,1,1)
  estimation
- Chromium VI [air, unspecified]: 4.83999e-10 kg; lognormal variance with pedigree 0.69, pedigree (1,1,5,1,1)
  estimation
- Particulates, < 2.5 um [air, non-urban air or from high stacks]: 2.12e-5 kg; lognormal variance with pedigree 0.69, pedigree (1,1,5,1,1)
  estimation
- Hydrogen chloride [air, unspecified]: 5.54999e-6 kg; lognormal variance with pedigree 0.69, pedigree (1,1,5,1,1)
  estimation
- Nitrogen oxides [air, unspecified]: 0.000949998 kg; lognormal variance with pedigree 0.69, pedigree (1,1,5,1,1)
  estimation
- Chromium [air, unspecified]: 1.28e-9 kg; lognormal variance with pedigree 0.69, pedigree (1,1,5,1,1)
  estimation
- NMVOC, non-methane volatile organic compounds, unspecified origin [air, unspecified]: 4.95999e-5 kg; lognormal variance with pedigree 0.69, pedigree (1,1,5,1,1)
  estimation
- Water [air, unspecified]: 0.000243 m3; name water_to_air_unspecified; = (tap_water_input/1000*fraction_TW_to_air)+(water_UNO_input*fraction_PW_to_air); lognormal variance with pedigree 0.0807, pedigree (2,2,5,1,1)
  (same comment as for Water)
  property fraction, origin: fresh water 0.209877; name fraction_origin_fresh_water
  property fraction, origin: salt water 0; name fraction_origin_salt_water
  property fraction, origin: unspecified 0.790123; name fraction_origin_unspecified
- Sulfur dioxide [air, unspecified]: 0.000312999 kg; lognormal variance with pedigree 0.69, pedigree (1,1,5,1,1)
  estimation
- Cadmium [air, unspecified]: 6.15999e-9 kg; lognormal variance with pedigree 0.69, pedigree (1,1,5,1,1)
  estimation
- Particulates, > 2.5 um, and < 10um [air, non-urban air or from high stacks]: 6.96999e-6 kg; lognormal variance with pedigree 0.69, pedigree (1,1,5,1,1)
  estimation
- Selenium [air, unspecified]: 1.76e-9 kg; lognormal variance with pedigree 0.69, pedigree (1,1,5,1,1)
  estimation
- Nickel [air, unspecified]: 4.39999e-9 kg; lognormal variance with pedigree 0.69, pedigree (1,1,5,1,1)
  estimation
- Thallium [air, unspecified]: 1.14e-8 kg; lognormal variance with pedigree 0.69, pedigree (1,1,5,1,1)
  estimation
- Lead [air, unspecified]: 7.47999e-8 kg; lognormal variance with pedigree 0.69, pedigree (1,1,5,1,1)
  estimation

## Sampling procedure
Data adapted from module 'clinker, at plant' based on literature

## Extrapolations
See geography

## Review by Roberto Dones 2004-04-14
passed
