# sand-lime brick production

Dataset: EcoSpold 2, unit process
Geography: DE
Time period: 1993-01-01 to 2019-12-31
Technology level: current
Classification: EcoSpold01Categories: construction materials/bricks
Classification: ISIC rev.4 ecoinvent: 2395:Manufacture of articles of concrete, cement and plaster
Tags: ConvertedDataset
Scenario: Business-as-Usual
System model: Allocation at the point of substitution
Generated by: Daniel Kellenberger (obsolete)
Published in: Kellenberger D. 2004
Database: ecoinvent
isCopyrightProtected: true
accessRestrictedTo: 1

## General comment
This dataset represents the production of 1 kg of sand-lime brick. It is assumed a company that has a yearly production of 120.000 tons and a lifespan of 50 years. The air emissions should all stem from combustion processes, and additional air emissions are not measured.

## Included activities start
From sand, quicklime and limestone at the factory gate.

## Included activities end
The activity ends with the sandlime brick produced at the plant. The dataset includes the whole manufacturing process to produce sand-lime bricks (raw material provision, raw material mixing, forming by pressing, hardening by autoclave, packing, and storage), transports to plant, and infrastructure. The dataset doesn't include material and energy requirement for administration, and additional air emissions as they are included in the corresponding modules for boilers.

## Geography
Data is based on German companies.

## Technology
The current technology in Germany is considered.
The raw materials used for the production of sand-lime bricks are shown in the table.
The additives usually used are milled limestone and milled quartz. Rarely also basalt, grey wacke or gravel but no chemical additives are used. There is no information about the usage of additional additives. For colouring of the bricks, especially for fair faced bricks and facings, iron and chromium oxide pigments are common.
The production process is divided in the five following steps:
1. Limestone and sand from local mines are stored in the company’s silos. The raw materials are mixed in a share of one part limestone and twelve parts sand. The raw mixture is transported by conveyor belt into a reaction vessel.
2. Inside the reaction vessel the quick lime is slaked to hydrated lime (Ca(OH)2). This process takes usually about 4 hours. If necessary, a pre-mixer adds water to the mixture to bring it up to pressing humidity.
3. By full automatic working presses the raw moulded blanks are formed with a pressure of usually 15 N/mm2 (maximum 25 N/mm2). The raw moulded blanks are then stored on a hardening wagon.
4. The hardening of the raw moulded blanks takes place in the pressure vessel with a saturated steam at a pressure of 12 to 16 bar, a temperature of 160 to 200°C, and for a time period of 4 to 8 hours. The previous values are depending on the amounts of the components and the strength to be reached. At the hardening process the hot steam etches silicic acid on the surface of the sand granules. The silicic acid compounds form together with the adhesive hydrated lime crystalline material which epitaxy on the sand granules and stick them together in a solid way.
5. After hardening and cooling down, the sand-lime bricks are ready for use.

## Parameters
- fraction, tap water, to air: 0.15; name fraction_TW_to_air; = fraction_PW_to_air; lognormal variance with pedigree 0.092025, pedigree (4,4,3,2,4)
  Calculated value. See comment in the other parametres present in this dataset. Tap water is considered to be always used as process water, thus process water fractions to air are applied to all tap water input flows to calculate the amount of water consumed in the processes.
- fraction, process water, to air: 0.15 dimensionless; name fraction_PW_to_air; lognormal variance with pedigree 0.092025, pedigree (4,4,3,2,4)
  Literature value. In case when no industry/process specific data are available, default evaporation fraction value is used. This value is 15% and is based on literature (Statistics Canada, 2007 & Shaffer, K.H., 2008, Consumptive water use in the Great Lakes Basin, USGS & Shiklomanov, 2003, World Water Resources at the Beginning of the 21st Century) and has been approved by an expert.

## Reference product
- sand-lime brick: 1 kg; source Starzner S. and Wurmer-Weiss P.  2000; CPC 37540: Tiles, flagstones, bricks and similar articles, of cement, concrete or artificial stone; By-product classification allocatable product
  EcoSpold01Location=DE
  Sand-lime bricks are made from limestone and sand (Starzner & Wurmer-Weiss (2000)). After intensive mixing with water it is consolidated. Forming and hardening under steam pressure completes the process.
  Sand-lime lightweight bricks are insulating bricks with a low apparent density (ρ = 700 to 900 kg/m3).
  The most important use of sand-lime bricks in the building sector are: Masonry (supporting walls, parting wall, casing), fair-faced brickwork and Facing/Casing.
  production volume 0.242058 kg
    This is a placeholder value that does not reflect real-world production volumes. This dataset does not currently require a real-world production volume to work in the database framework, and no actual data were collected yet. This has no negative effect on the results of the ecoinvent database. The placeholder value of this activity was scaled according to the nominal GDP of 2005 (source: United Nations, http://data.un.org/Glossary.aspx?q=GDP+%28current+US%24%29, accessed 20130726) to reflect an appropriate share of the global production volume, which is also a placeholder value.
  property carbon content, non-fossil 0
    0.067kg CO2 absorbed/kg brick, pg 10, ecoinvent v2.2 report 7, part X
  property carbon content, fossil 0.067
    0.067kg CO2 absorbed/kg brick, pg 10, ecoinvent v2.2 report 7, part X
  property carbon content 0.067
    carbon content on a dry matter basis (reserved; not for manual entry)
  property true value 1.77
    allocation property applied in "true value" allocation // value calculated from revenue
  properties: price 1.77 EUR2005, water content 0, water in wet mass 0 kg, dry mass 1 kg, wet mass 1 kg, carbon allocation 0.067 kg

## By-products
- heat, for reuse in municipal waste incineration only: 0 MJ; CPC 17300: Steam and hot water; By-product classification allocatable product; pedigree (1,1,1,1,1)
  Net electricity generated from this waste and used in internal MSWI plant energy redistribution.
  Uncertainty: uncertainty is calculated from uncertainties in waste composition and uncertainties in energy efficiency and the uncertainty in internal energy demand
  production volume 0.000359451 MJ
  property exergy 0.1842 MJ; name E_th_prod_MSWI_exergy
    This exergy property is based on the exergy content of the product.
  property price 0.0106 EUR2005; name E_th_prod_MSWI_price_EUR2005
    Average European district heat price from Ecoheatcool and Euroheat 2005-2006, Ecoheat Work package 1: The European heat market. Final report. 10.6 EUR/GJ i s the price of district heat. http://www.solarthermalworld.org/files/Ecoheatcool%20WP1%20Web.pdf?download
  property true value relation 0.1842; name E_th_prod_MSWI_true_value_relation
    property to calculate "true value" from
  property true value 2.37966e-6
    allocation property applied in "true value" allocation // value calculated from true value relation
- electricity, for reuse in municipal waste incineration only: 0 kWh; CPC 17100: Electrical energy; By-product classification allocatable product; pedigree (1,1,1,1,1)
  (same comment as for heat, for reuse in municipal waste incineration only)
  production volume 4.86793e-5 kWh
  property price 0.1 EUR2005; name E_el_prod_MSWI_price_EUR2005
    Estimated to be the same price as in case of electricity, medium voltage.
  property exergy 3.6 MJ; name E_el_prod_MSWI_exergy
    This exergy property is based on the exergy content of the product.
  property true value relation 3.6; name E_el_prod_MSWI_true_value_relation
    property to calculate "true value" from
  property true value 6.29845e-6
    (same comment as for heat, for reuse in municipal waste incineration only)
- iron scrap, sorted, pressed: 0 kg; By-product classification Recyclable; CPC 39310: Slag, dross, scalings and other waste from the manufacture of iron or steel; pedigree (1,1,1,1,1)
  Iron scrap recovered from this waste.
  Uncertainty: uncertainty calculated from uncertainty in waste composition, uncertainty of share of recyclable metal, uncertainty of transfer coefficient to bottom ash, uncertainty of the efficiency of scrap removal in MSWI plant.
  production volume 1.21637e-6 kg
  property price 0.175 EUR2005
    Temporary price data. Calculated as 90% of purchasers price based on: 2005 import and export prices (total trades (USD) divided by total weight (kg) in biggest economies of the world: EU27, USA, Brasil, China, India, Japan and Russia) from UN Commodity Trade Statistics Database (http://data.un.org/Explorer.aspxDatabase [Accessed 2011.06.20]). Commodity: Waste or scrap, of cast iron
  property carbon content 0
    carbon content on a dry matter basis (reserved; not for manual entry)
  property true value 2.12864e-7
    allocation property applied in "true value" allocation // value calculated from revenue
  properties: dry mass 1 kg, water content 0, carbon content, non-fossil 0, water in wet mass 0 kg, carbon content, fossil 0, wet mass 1 kg, carbon allocation 0 kg
- iron scrap, unsorted: 0 kg; source European Aluminium Association 2008; CPC 39310: Slag, dross, scalings and other waste from the manufacture of iron or steel; By-product classification Recyclable; pedigree (1,1,1,1,1)
  production volume 1.7172e-10 kg
  property price 0.149 EUR2005; name ironScrapAmount_price_EUR2005
    Temporary price data. Calculated as 90% of purchasers price based on: estimated at 85% of sorted scrap
  property carbon content 0
    carbon content on a dry matter basis (reserved; not for manual entry)
  property true value 2.55863e-11
    allocation property applied in "true value" allocation // value calculated from revenue
  properties: water in wet mass 0 kg, water content 0, carbon content, fossil 0, carbon content, non-fossil 0, dry mass 1 kg, wet mass 1 kg, carbon allocation 0 kg
- aluminium oxide, non-metallurgical: 0 kg; source European Aluminium Association 2008; CPC 41432: Alumina (aluminium oxide), except artificial corundum; By-product classification allocatable product; CAS 1344-28-1; pedigree (1,1,1,1,1)
  production volume 1.08057e-8 kg
  property carbon content, non-fossil 0; name C_content_non_fossil
  property price 0.28 EUR2005; name Al2O3Amount_price_EUR2005
    From UN trade database. http://data.un.org/ Import data from the largest economies of the world are used (Brazil, India, USA, China, Japan and EU-27).
  property dry mass 1 kg; name DM
  property water content 0; name water_content
  property wet mass 1 kg; name WM
  property water in wet mass 0 kg; name WWM
  property carbon content, fossil 0; name C_content_fossil
  property carbon content 0
    carbon content on a dry matter basis (reserved; not for manual entry)
  property true value 3.02559e-9
    allocation property applied in "true value" allocation // value calculated from revenue
  properties: carbon allocation 0 kg
- aluminium, cast alloy: 0 kg; source European Aluminium Association 2008; By-product classification allocatable product; CPC 41431: Unwrought aluminium; pedigree (1,1,1,1,1)
  EcoSpold01Location=RER
  production volume 1.01009e-7 kg
  property price 1.3 EUR2005; name castAlloyAmount_price_EUR2005
    Temporary price data. Calculated as 90% of purchasers price based on: Source: London Metal Exchange, Aluminium alloy price for 2005
  property carbon content 0
    carbon content on a dry matter basis (reserved; not for manual entry)
  property true value 1.31312e-7
    allocation property applied in "true value" allocation // value calculated from revenue
  properties: water in wet mass 0 kg, carbon content, non-fossil 0, water content 0, dry mass 1 kg, carbon content, fossil 0, wet mass 1 kg, carbon allocation 0 kg
- aluminium, wrought alloy: 0 kg; source European Aluminium Association 2008; By-product classification allocatable product; CPC 4153: Semi-finished products of aluminium or aluminium alloys; pedigree (1,1,1,1,1)
  production volume 4.42199e-8 kg
  property price 1.44 EUR2005; name secondaryAluminiumOutput_price_EUR2005
    Estimated based on literature values and expert judgement. Aluminium ccast alloys are about 90% of the price of aluminium wrought alloys.
  property carbon content 0
    carbon content on a dry matter basis (reserved; not for manual entry)
  property true value 6.36767e-8
    allocation property applied in "true value" allocation // value calculated from revenue
  properties: wet mass 1 kg, water content 0, carbon content, fossil 0, water in wet mass 0 kg, carbon content, non-fossil 0, dry mass 1 kg, carbon allocation 0 kg
- copper: 0 kg; source Rentz O. 1999; By-product classification allocatable product; CPC 41413: Refined copper and copper alloys, unwrought; master alloys of copper
  Literature value. Copper uses: Before end-use copper is manufactured into semi fabricated products, such as shapes and ingots (known as 'semis'). These manufacturing processes are subdivided into hot working, cold working and, if necessary, process annealing. Few of the semis are ready for use as such. They more typically travel to first-stage manufacturers, who make metal rods, wire, and casting, and then to component manufacturers who produce such things as motors, valves, and insulated cables The components in turn are incorporated by final-stage manufacturers into a variety of finished products - automobiles, commercial buildings, residential housing, and so forth. These uses account for about 79% of the world-wide consumption of copper.
  production volume 1.16866e-8 kg
  property price 5.52 EUR2005
    Literature value (http://www.economist.com/news/business/21576714-mining-industry-has-enriched-chile-its-future-precarious-copper-solution). Average price between 20015 and 2013.
  property carbon content 0
    carbon content on a dry matter basis (reserved; not for manual entry)
  property true value 6.45098e-8
    allocation property applied in "true value" allocation // value calculated from revenue
  properties: dry mass 1 kg, water in wet mass 0 kg, wet mass 1 kg, carbon content, non-fossil 0, water content 0, carbon content, fossil 0, carbon allocation 0 kg
- zinc concentrate: 0 kg; CPC 14290: Other non-ferrous metal ores and concentrates (other than uranium or thorium ores and concentrates); By-product classification allocatable product
  Calculated value from the knowledge of the properties of both products.
  production volume 9.27594e-18 kg
  property price 0.38 EUR2005; name ByP_price_EUR2005
    Temporary price data. Calculated as 90% of purchasers price based on: Zinc content in concentrate 53%. Concentrate price per kg Zn 86.5% of refined Zn price (13.5% treatment charges according to CHR Metals Limited 2005: Dynamic cost curves. http://www.minecost.com/dynamic.pdf). 2004 zinc price from USGS (2007) Mineral commodity summaries 2007. <http://minerals.usgs.gov/minerals/pubs/mcs/2007/mcs2007.pdf> [Accessed 25 May 2010]
  property zinc content 0.53; name zinc_C_zinc_concentrate
    Zinc content on a dry matter basis. Value taken from teh "zinc mine operation" /GLO dataset.
  property dry mass 1 kg; name DM_zinc_concentrate
  property carbon content 0
    carbon content on a dry matter basis (reserved; not for manual entry)
  property true value 3.52486e-18
    allocation property applied in "true value" allocation // value calculated from revenue
  properties: wet mass 1 kg, water content 0, carbon content, non-fossil 0, carbon content, fossil 0, water in wet mass 0 kg, carbon allocation 0 kg

## Inputs from technosphere
- clay pit infrastructure: 1.66999e-10 unit; lognormal variance with pedigree 0.508, pedigree (5,5,5,1,4)
  EcoSpold01Location=CH
  Proxy. As no specific data on the land-use are available, the infrastructure module for clay products has been used as proxy. The difference of the density of clay brick to sand-lime brick is about the same as the difference between the yearly production volumes of the German plant producing sand-lime brick and the Swiss plant producing clay brick. This justifies the direct use of the infrastructure module for the clay brick as proxy for the sand-lime brick.
  The average yearly production output of one company “Xella Baustoffe GmbH”. in Germany is about 120'000 tons. The amount comes from the information on the total yearly production volume, which is converted to weight. The lifetime considered is 50 years.
- heat, district or industrial, natural gas: 0.147999 MJ; source Cordes R. 1996; lognormal variance with pedigree 0.0587, pedigree (1,3,5,3,3)
  EcoSpold01Location=RER
  Estimation, based on literature value. According to Starzner & Wurmer-Weiss (2000)he primary energy consumption for the production of sand-lime brick including limestone production changes with the mixing formula between 738 and 907 MJ/t. In average it is 845 MJ/t.
  However, as the limestone and additives production and the transport to the user are excluded, the total amount of primary energy used for the sub-processes “autoclaving” and “other processes” (0.405 MJ/kg) is about equal to the total amount of energy consumed in the factory (0.404 MJ/kg).
  The main fuels used in Germany are natural gas, heavy and light fuel oil. The share taken into account is based on the distribution in year 1994: 56% light fuel oil, 4% heavy fuel oil and 40% natural gas.
  Further reference:
  Starzner S. and Wurmer-Weiss P. (2000) ECOBIS 2000, ökologisches Baustoffinformationssystem.
- tap water: 0.224999 kg; name tap_water_input; source Cordes R. 1996; lognormal variance with pedigree 0.0587, pedigree (1,3,5,3,3)
  EcoSpold01Location=RER
  Literature value.
  properties: dry mass 0.000337476 kg, wet mass 1 kg, water content 2962.17, carbon content, fossil 0.00178991
  note on carbon content, fossil: Bicarbonate content is 2.93 mol/m3. CO2 content is 0.1 mol/m3 (ecoinvent v2.2 report 8, Tab 93.1).
- heat, district or industrial, other than natural gas: 0.221799 MJ; source Cordes R. 1996; lognormal variance with pedigree 0.0587, pedigree (1,3,5,3,3)
  EcoSpold01Location=CH
  Estimation, based on literature value. According to Starzner & Wurmer-Weiss (2000)he primary energy consumption for the production of sand-lime brick including limestone production changes with the mixing formula between 738 and 907 MJ/t. In average it is 845 MJ/t.
  However, as the limestone and additives production and the transport to the user are excluded, the total amount of primary energy used for the sub-processes “autoclaving” and “other processes” (0.405 MJ/kg) is about equal to the total amount of energy consumed in the factory (0.404 MJ/kg).
  The main fuels used in Germany are natural gas, heavy and light fuel oil. The share taken into account is based on the distribution in year 1994: 56% light fuel oil, 4% heavy fuel oil and 40% natural gas.
  Further reference:
  Starzner S. and Wurmer-Weiss P. (2000) ECOBIS 2000, ökologisches Baustoffinformationssystem.
- wastewater from concrete production: -8.32996e-5 m3; name wastewater_output; source Cordes R. 1996; lognormal variance with pedigree 0.0987, pedigree (1,3,5,3,3)
  Proxy, based on literature value. The wastewater of the sand-lime brick production has a similar COD amount as concrete production (0.0122 kg/m3) and is expected to be similarly composed. The wastewater amount is a literature value.
  EcoSpold01Location=CH
  production volume 8.33e-5 m3
    Calculated from the production volume of sand-lime brick in proportion to the respective output amounts.
  property price 0 EUR2005; name wastewater_output_price_EUR2005
  properties: wet mass 1000 kg, carbon content, fossil 0.027074, dry mass 0.449139 kg, water content 2225.48
  note on carbon content, fossil: TOC =0.01216 kg/m3 (Tab A.20, ecoinvent v2.2 report 13_I). TOC was considered as Total Carbon.
- quicklime, milled, packed: 0.0854996 kg; source Cordes R. 1996; lognormal variance with pedigree 0.0587, pedigree (1,3,5,3,3)
  Literature value. Quicklime is used as raw material.
  EcoSpold01Location=CH
  properties: water content 0.010101, wet mass 1 kg, dry mass 0.99 kg
- sand: 0.947995 kg; source Cordes R. 1996; lognormal variance with pedigree 0.0587, pedigree (1,3,5,3,3)
  EcoSpold01Location=CH
  Literature value. Silica sand is used as raw material.
  properties: wet mass 1 kg, dry mass 1 kg
- electricity, medium voltage: 0.00961995 kWh; source Cordes R. 1996; lognormal variance with pedigree 0.0587, pedigree (1,3,5,3,3)
  (same comment as for heat, district or industrial, other than natural gas)
- packing, clay product: 0.999995 kg; lognormal variance with pedigree 0.208, pedigree (5,5,5,1,4)
  Proxy.
  EcoSpold01Location=CH
- municipal solid waste: -0.000124999 kg; source Cordes R. 1996; lognormal variance with pedigree 0.0587, pedigree (1,3,5,3,3)
  EcoSpold01Location=CH
  Literature value. Most waste is re-used in the process. The residual industrial waste is 0.0005 m3.
  production volume 0.000125 kg
    (same comment as for wastewater from concrete production)
  properties: carbon content, non-fossil 0.261655, wet mass 1 kg, dry mass 0.771 kg, carbon content, fossil 0.171549, water content 0.297017
  note on carbon content, non-fossil: MSW composition in tab 4.1, ecoinvent v2.2 report 13_I. C content referred to 1 kg DM
- lime, packed: 0.0332998 kg; source Cordes R. 1996; lognormal variance with pedigree 0.0587, pedigree (1,3,5,3,3)
  Proxy, based on literature value. Milled limestone and quartz are used as additive. Limestone is used as proxy.
  EcoSpold01Location=CH
  properties: water content 0.00200401, dry mass 0.998 kg, wet mass 1 kg, carbon content, fossil 0.117492
  note on carbon content, fossil: Table 3.1, ecoinvent v2.2 report 7, part VII, pg 3. MW CaCO3=100, MW MgCO3=84

## Emissions to nature
- Water [water, unspecified]: 0.000107949 m3; name water_to_water_unspecified; = (tap_water_input/1000)*(1-fraction_TW_to_air)-(wastewater_output*-1); lognormal variance with pedigree 0.0807, pedigree (2,2,5,1,1)
  Calculated value based on literature values and expert opinion. See comments in the parametres' comment field.
  property wet mass 1000 kg; name WM
  property dry mass 0 kg; name DM
  property fraction, origin: fresh water 1; name fraction_origin_fresh_water_Ww
  property water in wet mass 1000 kg; name WWM
  property carbon content, non-fossil 0; name C_content_non_fossil
  property carbon content, fossil 0; name C_content_fossil
  property fraction, origin: unspecified 0; name fraction_origin_unspecified_Ww
  property fraction, origin: salt water 0; name fraction_origin_salt_water_Ww
- Water [air, unspecified]: 3.37498e-5 m3; name water_to_air_unspecified; = (tap_water_input/1000*fraction_TW_to_air); lognormal variance with pedigree 0.0807, pedigree (2,2,5,1,1)
  (same comment as for Water)
  property fraction, origin: salt water 0; name fraction_origin_salt_water
  property fraction, origin: unspecified 0; name fraction_origin_unspecified
  property fraction, origin: fresh water 1; name fraction_origin_fresh_water

## Sampling procedure
Data is based on 14 sand-lime brick companies in Germany. Literature data is average data.

## Review by Roland Hischier 2011-09-22
Transfer of documentation done.

## Review by Roberto Dones 2005-07-19
passed

## Review by Emilia Moreno Ruiz 2015-11-12
CO2 intake removed, as occur during brick lifetime, not during its production (correction by Frank Werner)
