# concrete production, 20MPa, self-construction, with Portland cement

Dataset: EcoSpold 2, unit process
Geography: RoW
Time period: 2014-01-01 to 2019-12-31
Technology level: current
Classification: EcoSpold01Categories: construction materials/concrete
Classification: ISIC rev.4 ecoinvent: 2395:Manufacture of articles of concrete, cement and plaster
Synonyms: self-construction concrete
Scenario: Business-as-Usual
System model: Allocation at the point of substitution
Generated by: [System]
Published in: Gmünder S. 2017
Database: ecoinvent
isCopyrightProtected: false
accessRestrictedTo: 1

## General comment
This dataset represents the production of 20MPa ready-mix concrete in Peru. Density: 2'358 kg/m³ - w/c: 0.65. Ingredients (for 1 m³): cement type ICo 300 kg, Water 195 kg, Gravel 1116 kg, Sand 744kg, Admixtures (retarder 0.3%cem and superplastisizers 0.7%cem) in total 3kg/m3.

## Included activities start
From reception of raw materials at the construction site.

## Included activities end
This activity ends after concrete mixing at the construction site.

The dataset includes the whole manufacturing processes to produce self-construction concrete, but does not include the on site mixing infrastrucutre.

Water for washing is included.

Concrete losses of 3% are considered.

## Geography
Representative production of self-construction concrete 20 MPa with Portland cement in Peru. Data based from main cement producers and personal comunications with local experts.
The uncertainy has been adjusted accordingly.

## Technology
Represent the current technology for self-construction concrete production in Peru.

## Time period
The production volume of 2016 is considered. The data from sustainability reports goes from 2014 to 2016. Data have been reported with the production volume of corresponding year.

## Parameters
- water to cement ratio: 0.67 dimensionless; name w_c_ratio; lognormal variance with pedigree 0.0046, pedigree (3,4,1,1,1)
- losses: 0.03 dimensionless; lognormal variance with pedigree 0.018, pedigree (4,5,1,5,1)
  Estimated value. Losses due to returned concrete from construction sites.
- water withdrawal, per cubic meter of concrete: 316.275 kg/m3; name water_withdrawal; lognormal variance with pedigree 0.0046, pedigree (3,4,1,1,1)
  Calculated value. The water cement ratio (w/c) is 0.67. In addition, 60kg is assumed for other water uses such as washing, dust treatment, irrigation, etc.
- total aggregates: 1721 kg/m3; name aggregates_tot; lognormal variance with pedigree 0.0046, pedigree (3,4,1,1,1)
  Estimated value. The mix design contains 1721 kg /m3 of aggregates (Pimentel, 2017).

## Reference product
- concrete, 20MPa: 1 m3; name concrete; By-product classification allocatable product; CPC 37510: Non-refractory mortars and concretes
  reference flow
  production volume 3.76181e6 m3; name concrete_PV
    The global production volume was calculated as follows:
    1) The total production volume of each country was calculated
    2) The production volume was scaled based construction output (*)
    3) The average of the results was assumed to be the GLO PV
    4) The share of each different technology per country was calculated
    5) The weighted average of the shares for each country was used to split the GLO PV into different technologies
    (*)
    Construction output assumed per country
    Country Share
    ZA 0.50%
    BR 2.01%
    CH 0.36%
    CO 0.58%
    IN 9.67%
    PE 0.31%
    CA-QC 0.37%
    RNA without CA-QC 9.03%
    Source:
    OECD. 2018. Input-Output Tables. http://www.oecd.org/trade/input-outputtables.htm.
    United Nations Statistics Division. 2019. UN data. A world of information. http://data.un.org/.
    Timmer, M.P., E. Dietzenbacher, B. Los, R. Stehrer, and G.J. de Vries. 2015. An Illustrated User Guide to the World Input-Output Database: the Case of Global Automotive Production. Review of International Economics 23(3): 575-605. http://doi.wiley.com/10.1111/roie.12178.
    The data was adjusted based on PPP, data from:
    The World Bank. 2019. World Bank Open Data. https://data.worldbank.org/
  property dry mass 2103.5 kg; name dry_mass; = cement/(1+losses)+ aggregates_tot
  property wet mass 2359.78 kg; name wet_mass; = dry_mass+ (w_c_ratio*cement)/(1+losses)
  property gravel content 1063.58 kg; = gravel
    calculated
  property sand content 709.052 kg; = sand
    calculated
  property water content 0.121833; = water_in_wet_mass/dry_mass
  property cement content 393.975 kg; = cement
  property water in wet mass 256.275 kg; name water_in_wet_mass; = wet_mass-dry_mass
  property price 185 EUR2005; name concrete_price_EUR2005
    Estimated to be the same price as in case of concrete, normal (Data are not easily available. Therefore, an average price of products supplied by the activities in the same ISIC 3 code has been applied.This price is obtained as '_49 Concrete, asphalt and other mineral products, EU27 virgin, EU27' in the 'EU & DK Input Output Database' (available in SimaPro). The price is assumed to be valid for both RER2003, RER 2004, world 2003 and world 2004. Multiplied by density.).
  property carbon content 0
    carbon content on a dry matter basis (reserved; not for manual entry)
  property true value 185; name concrete_true_value
    allocation property applied in "true value" allocation // value calculated from revenue
  properties: carbon content, fossil 0, carbon allocation 0 kg

## By-products
- electricity, for reuse in municipal waste incineration only: 0 kWh; CPC 17100: Electrical energy; By-product classification allocatable product; pedigree (1,1,1,1,1)
  Net electricity generated from this waste and used in internal MSWI plant energy redistribution.
  Uncertainty: uncertainty is calculated from uncertainties in waste composition and uncertainties in energy efficiency and the uncertainty in internal energy demand
  production volume 235831 kWh
  property exergy 3.6 MJ; name E_el_prod_MSWI_exergy
    This exergy property is based on the exergy content of the product.
  property true value relation 3.6; name E_el_prod_MSWI_true_value_relation
    property to calculate "true value" from
  property price 0.1 EUR2005; name E_el_prod_MSWI_price_EUR2005
    Estimated to be the same price as in case of electricity, medium voltage.
  property true value 0.00405606
    allocation property applied in "true value" allocation // value calculated from true value relation
- heat, for reuse in municipal waste incineration only: 0 MJ; CPC 17300: Steam and hot water; By-product classification allocatable product; pedigree (1,1,1,1,1)
  Net useful heat generated from this waste and used in internal MSWI plant energy redistribution.
  Uncertainty: uncertainty is calculated from uncertainties in waste composition and uncertainties in energy efficiency and the uncertainty in internal energy demand
  production volume 1.66053e6 MJ
  property true value relation 0.1842; name E_th_prod_MSWI_true_value_relation
    property to calculate "true value" from
  property exergy 0.1842 MJ; name E_th_prod_MSWI_exergy
    This exergy property is based on the exergy content of the product.
  property price 0.0106 EUR2005; name E_th_prod_MSWI_price_EUR2005
    Average European district heat price from Ecoheatcool and Euroheat 2005-2006, Ecoheat Work package 1: The European heat market. Final report. 10.6 EUR/GJ i s the price of district heat. http://www.solarthermalworld.org/files/Ecoheatcool%20WP1%20Web.pdf?download
  property true value 0.00146425
    (same comment as for electricity, for reuse in municipal waste incineration only)
- zinc concentrate: 0 kg; CPC 14290: Other non-ferrous metal ores and concentrates (other than uranium or thorium ores and concentrates); By-product classification allocatable product
  Calculated value from the knowledge of the properties of both products.
  production volume 159.389 kg
  property price 0.38 EUR2005; name ByP_price_EUR2005
    Temporary price data. Calculated as 90% of purchasers price based on: Zinc content in concentrate 53%. Concentrate price per kg Zn 86.5% of refined Zn price (13.5% treatment charges according to CHR Metals Limited 2005: Dynamic cost curves. http://www.minecost.com/dynamic.pdf). 2004 zinc price from USGS (2007) Mineral commodity summaries 2007. <http://minerals.usgs.gov/minerals/pubs/mcs/2007/mcs2007.pdf> [Accessed 25 May 2010]
  property zinc content 0.53; name zinc_C_zinc_concentrate
    Zinc content on a dry matter basis. Value taken from teh "zinc mine operation" /GLO dataset.
  property dry mass 1 kg; name DM_zinc_concentrate
  property carbon content 0
    carbon content on a dry matter basis (reserved; not for manual entry)
  property true value 6.87423e-7
    allocation property applied in "true value" allocation // value calculated from revenue
  properties: wet mass 1 kg, water content 0, carbon content, non-fossil 0, carbon content, fossil 0, water in wet mass 0 kg, carbon allocation 0 kg
- iron scrap, sorted, pressed: 0 kg; By-product classification Recyclable; CPC 39310: Slag, dross, scalings and other waste from the manufacture of iron or steel; pedigree (1,1,1,1,1)
  Iron scrap recovered from this waste.
  Uncertainty: uncertainty calculated from uncertainty in waste composition, uncertainty of share of recyclable metal, uncertainty of transfer coefficient to bottom ash, uncertainty of the efficiency of scrap removal in MSWI plant.
  production volume 9939.92 kg
  property price 0.175 EUR2005
    Temporary price data. Calculated as 90% of purchasers price based on: 2005 import and export prices (total trades (USD) divided by total weight (kg) in biggest economies of the world: EU27, USA, Brasil, China, India, Japan and Russia) from UN Commodity Trade Statistics Database (http://data.un.org/Explorer.aspxDatabase [Accessed 2011.06.20]). Commodity: Waste or scrap, of cast iron
  property carbon content 0
    carbon content on a dry matter basis (reserved; not for manual entry)
  property true value 1.27971e-5
    allocation property applied in "true value" allocation // value calculated from revenue
  properties: wet mass 1 kg, water in wet mass 0 kg, carbon content, non-fossil 0, carbon content, fossil 0, dry mass 1 kg, water content 0, carbon allocation 0 kg

## Inputs from technosphere
- waste concrete: 0 kg; name waste_concrete; pedigree (1,1,1,1,1)
  Calculated value.
  production volume 0 kg
    Calculated from production volume of reference product using the relative outputs.
  property price 0 EUR2005; name waste_concrete_price_EUR2005
  properties: water content 1, wet mass 1 kg, dry mass 0.5 kg
- scrap steel: 0 kg; pedigree (1,1,1,1,1)
  Calculated value.
  Uncertainty: Basic uncertainty from original dataset, completeness score adjusted
  production volume 0 kg
    Calculated from production volume of reference product using the relative outputs.
  properties: dry mass 1 kg, wet mass 1 kg
- wastewater from concrete production: -0.0247193 m3; name Water_to_water; = ((water_withdrawal- water_in_wet_mass)*.4/1000*(1+losses))*-1; lognormal variance with pedigree 0.0115, pedigree (2,3,2,3,1)
  Calculated value. The water balance is established taking into account the total water input (withdrawal) minus the outputs, which include the water contained in the concrete, the water evaporated and the water infiltrated. In general, no waste water is produced. The water incorporated in the concrete correspond to the cement amount multiplied by w/c ratio. The share of the water evaporated to air and the water infiltrated is calculated based on the sustainability reports from Argos (60% evaporated).
  EcoSpold01Location=CH
  production volume 92991.9 m3; name waste_water; = concrete_PV*water_to_water/concrete
    This dataset is a copy of the corresponding PE dataset.
  property price 0 EUR2005; name Water_to_water_price_EUR2005
  property dry mass 0.449139 kg; name Water_to_water_DM
  property water content 2225.48; name Water_to_water_water_content
  property water in wet mass 999.551 kg; name Water_to_water_WWM
  properties: carbon content, fossil 0.027074, wet mass 1000 kg
  note on carbon content, fossil: TOC =0.01216 kg/m3 (Tab A.20, ecoinvent v2.2 report 13_I). TOC was considered as Total Carbon.
- lubricating oil: 0.0498985 kg; name lub_oil; source Kellenberger D. 2007; lognormal variance with pedigree 0.3068, pedigree (2,5,2,5,1)
  EcoSpold01Location=RER
  Calculated value. Weighted average amount from 34 concrete plants in Brazil is used (Silva 2018).
  Silva, F. B., Oliveira, L. A., Passuello, A. C. B., Moraga, G. L., Silva, V. G., Silva, M. G., Saade, M. R. M., Gmünder, S., Myers, N. , Life Cycle Inventories of cement and concrete production in Latin America, 3 - SeparatePublication
  Uncertainty: Variance of logtransformed data calculated based on the sample's coefficient of variation.
  properties: carbon content, fossil 0.75, wet mass 1 kg, dry mass 1 kg
  note on carbon content, fossil: Lubricating oil is produced from diesel. C-content/dry mass of fats and oils considered 75%, from: ecoinvent v2.2 report, n 15a, pg 40
- steel, low-alloyed, hot rolled: 0.0237993 kg; name steel; source Kellenberger D. 2007; lognormal variance with pedigree 0.0226, pedigree (2,5,3,5,1)
  EcoSpold01Location=RER
  Literature value. From ecoinvent dataset "concrete production, 25 MPa, RNA only, GLO, 2006-2006l". Access date: 10.10.2017.
  Uncertainty: Basic uncertainty from original dataset, completeness score adjusted
  properties: carbon content, fossil 0.005, wet mass 1 kg, dry mass 1 kg
  note on carbon content, fossil: Low alloyed steel composition given in Tab. 3.2 ecoinvent v2.2 report 10_partII. Steel assumed to have a C content of 0.5%
- waste mineral oil: 0 kg; pedigree (1,1,1,1,1)
  (same comment as for scrap steel)
  production volume 0 kg
    Calculated from production volume of reference product using the relative outputs.
  properties: water content 0.111111, carbon content, fossil 0.864444, dry mass 0.9 kg, wet mass 1 kg
  note on carbon content, fossil: Tab A.6, ecoinvent v2.2 report 13_I. C content has been calculated after data in the tables, and then referred to 1 kg DM
- sand: 0 kg; source Manuel Lascarro 2017; pedigree (1,1,1,1,1)
  Estimated value. The mix design contains 1721 kg /m3 of aggregates. The aggregates are composed by a mix of 40% of sand and 60% of gravels (Ing. Pimentel, 2017).
  Uncertainty: Calculated variable. Uncertainty will be determined from propagation of uncertainty factors of underlying variables.
  properties: dry mass 1 kg, wet mass 1 kg
- waste rubber, unspecified: 0 kg; pedigree (1,1,1,1,1)
  Calculated value.
  Uncertainty: Variance of logtransformed data calculated based on the sample's coefficient of variation.
  production volume 0 kg
    Calculated from production volume of reference product using the relative outputs.
  properties: dry mass 1 kg, wet mass 1 kg, carbon content, fossil 0.853
- synthetic rubber: 0.034499 kg; name rub; source Kellenberger D. 2007; lognormal variance with pedigree 0.7308, pedigree (2,5,2,5,1)
  Calculated value. Weighted average amount from 34 concrete plants in Brazil is used (Silva 2018).
  Silva, F. B., Oliveira, L. A., Passuello, A. C. B., Moraga, G. L., Silva, V. G., Silva, M. G., Saade, M. R. M., Gmünder, S., Myers, N. , Life Cycle Inventories of cement and concrete production in Latin America, 3 - SeparatePublication
  EcoSpold01Location=RER
  Uncertainty: Variance of logtransformed data calculated based on the sample's coefficient of variation.
  properties: carbon content, fossil 0.871949, dry mass 1 kg, wet mass 1 kg
  note on carbon content, fossil: EPDM (Ethylene-propene-diene terpolymer) rubber is a terpolymer of ethylene, propene, and a diene with the residual unsaturated portion of the diene in the side chain (ecoinvent v2.2 report 7-part XX & Ullmann). Chemical formula (deduced from Evidences of Solvent-Induced Miscibility in Polychloroprene-co-Ethylene-Propene Diene Terpolymer Blends, Dubey et al., Journal of Applied Polymer Science, 2009, 111:1884–1891): C20H35
- tap water: 0 kg; pedigree (1,1,1,1,1)
  Calculated value.
  EcoSpold01Location=CH
  Uncertainty: Calculated variable. Uncertainty will be determined from propagation of uncertainty factors of underlying variables.
  properties: water content 2962.17, wet mass 1 kg, dry mass 0.000337476 kg, carbon content, fossil 0.00178991
  note on carbon content, fossil: Bicarbonate content is 2.93 mol/m3. CO2 content is 0.1 mol/m3 (ecoinvent v2.2 report 8, Tab 93.1).
- gravel, crushed: 0 kg; name gravel; pedigree (1,1,1,1,1)
  (same comment as for sand)
  properties: wet mass 1 kg, dry mass 1 kg
- cement, Portland: 0 kg; name cement; pedigree (1,1,1,1,1)
  Estimated value. 380 kg /m3 in Peru (9 bags of 42.5 kg) for self construction concrete 20MPa (Ing. Guerra, 2017)
  Uncertainty: Calculated variable. Uncertainty will be determined from propagation of uncertainty factors of underlying variables.
  properties: dry mass 1 kg, wet mass 1 kg
- electricity, medium voltage: 0 kWh; pedigree (1,1,1,1,1)
  Calculated value. the average consumption of electricity has been estimated by measuring the average specifications of concrete mixers commonly used in building sites. An average concrete mixer produces 200l (0.2m3). The power of the motor is around 2kW and production capacity of 2.4m3/h (Various, 2017). The electricity consumption is then 0.833 kWh/m3 of concrete.
  EcoSpold01Location=CH
  Uncertainty: There is an important variability of energy consumption between plants
- waste concrete: -0.249408, -70.5417 kg (2 entries); lognormal variance with pedigree 0.0208, pedigree (2,5,2,5,1)
  Calculated value.
  production volume 2.66311e8 kg
- scrap steel: -3.00502e-5, -0.0237692 kg (2 entries); lognormal variance with pedigree 0.0226, pedigree (2,5,3,5,1)
  (same comment as for scrap steel)
  production volume 89531 kg
- waste mineral oil: -0.00112849, -0.04877 kg (2 entries); lognormal variance with pedigree 0.0226, pedigree (2,5,3,5,1)
  (same comment as for scrap steel)
  production volume 187714 kg
- sand: 3.61884, 697.066, 8.34613 kg (3 entries); source Manuel Lascarro 2017; lognormal variance with pedigree 0.0188, pedigree (4,5,2,5,1)
  (same comment as for sand)
- waste rubber, unspecified: -0.00138991, -0.0331091 kg (2 entries); lognormal variance with pedigree 0.3068, pedigree (2,5,2,5,1)
  (same comment as for waste rubber, unspecified)
  production volume 129782 kg
- tap water: 0.366543, 130.529, 3.04506, 0.605773, 15.2752, 1.13034, 174.802 kg (7 entries); lognormal variance with pedigree 0.0268, pedigree (4,5,2,5,3)
  (same comment as for tap water)
- gravel, crushed: 857.868, 187.39, 1.13265, 17.1556 kg (4 entries); lognormal variance with pedigree 0.0188, pedigree (4,5,2,5,1)
  (same comment as for sand)
- cement, Portland: 40.1922, 1.29602, 1.8425, 0.46624, 38.833, 44.9683, 1.8928, 264.472 kg (8 entries); lognormal variance with pedigree 0.0108, pedigree (4,3,2,5,1)
  (same comment as for cement, Portland)
- electricity, medium voltage: 0.00539227, 0.00267247, 0.0253021, 0.00904013, 0.000340918, 0.00279857, 0.000427394, 0.000708784, 1.4238e-5, 0.000577931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 kWh (29 entries); lognormal variance with pedigree 0.0208, pedigree (2,5,2,5,1)
  (same comment as for electricity, medium voltage)

## Emissions to nature
- Water [air, unspecified]: 0.0370789 m3; name Water_to_air; = (water_withdrawal- water_in_wet_mass)*.6/1000*(1+losses); lognormal variance with pedigree 0.0114, pedigree (2,5,2,5,1)
  Calculated value. The water balance is established taking into account the total water input (withdrawal) minus the outputs, which include the water contained in the concrete, the water evaporated and the water infiltrated. In general, no waste water is produced. The water incorporated in the concrete correspond to the cement amount multiplied by w/c ratio. The share of the water evaporated to air and the water infiltrated is calculated based on the sustainability reports from Argos (60% evaporated).
  Uncertainty: Calculated variable. Uncertainty will be determined from propagation of uncertainty factors of underlying variables.

## Sampling procedure
The 1:2:2.5 concrete recipe is considered as the most commonly used mix design for self-construction in Peru, based on personal communication with the concrete association (Ing. Pimentel, 2017).

Unit flows were calculated by dividing the amounts of inputs and outputs by the total concrete production in mass.

## Extrapolations
The main values are considered representative for a typical production of ready mix concrete for building construction in Peru.

Extrapolated from the corresponding PE dataset.

The auxiliary material (rubber, lube oil) are based on a sampling of 34 concrete plants in Brazil.
