# ethanol production from sugar beet

Dataset: EcoSpold 2, unit process
Geography: RoW
Time period: 2000-01-01 to 2019-12-31
Technology level: current
Classification: ISIC rev.4 ecoinvent: 19a: Liquid and gaseous fuels from biomass
Classification: EcoSpold01Categories: biomass/fuels
Tags: ConvertedDataset
Scenario: Business-as-Usual
System model: Allocation at the point of substitution
Share of production covered: 12 %
Generated by: Jürgen Sutter
Published in: Jungbluth N. 2007
Database: ecoinvent
isCopyrightProtected: true
accessRestrictedTo: 1

## General comment
The multioutput-process "sugar beets, to fermentation" delivers the co-products Ethanol, 95% in H20, from sugar beets", "beets chips", and vinasse. The allocation is based on economic criteria. World production of ethanol from sugar beets is around 10 Mio hl per year.
[This dataset was already contained in the ecoinvent database version 2. It was not individually updated during the transfer to ecoinvent version 3. Life Cycle Impact Assessment results may still have changed, as they are affected by changes in the supply chain, i.e. in other datasets. This dataset was generated following the ecoinvent quality guidelines for version 2. It may have been subject to central changes described in the ecoinvent version 3 change report (http://www.ecoinvent.org/database/ecoinvent-version-3/reports-of-changes/), and the results of the central updates were reviewed extensively. The changes added e.g. consistent water flows and other information throughout the database. The documentation of this dataset can be found in the ecoinvent reports of version 2, which are still available via the ecoinvent website. The change report linked above covers all central changes that were made during the conversion process.]

## Included activities end
Fermentation of sugar beets including materials, energy uses, infrastructure, and emissions.

## Geography
The inventory is modelled with data from a plant in Finland.

## Technology
Production of ethanol from sugar beets with extraction, fermentation, and distillation of ethanol.

## Time period
Time of publications.

## Parameters
- fraction, tap water, to air: 0
- fraction, cooling water, cooling pond system, to air: 0.032; lognormal variance with pedigree 0.0413, pedigree (2,3,1,3,1)
- fraction, cooling water, recirculating system, to air: 0.771; lognormal variance with pedigree 0.0413, pedigree (2,3,1,3,1)
- fraction, process water, to air: 0 dimensionless
- fraction, cooling water, to air: 0.64; lognormal variance with pedigree 0.092025, pedigree (4,4,3,2,4)
- fraction, cooling water, once-through system, to air: 0.004; lognormal variance with pedigree 0.0413, pedigree (2,3,1,3,1)

## Reference product
- ethanol, without water, in 95% solution state, from fermentation: 0 kg; name RP; CPC 35491: Biodiesel; By-product classification allocatable product; CAS 64-17-5
  EcoSpold01Location=CH
  production volume 5.8223e8 kg; name PVRP
    29% of ethanol production in Europe (2.5E+9 litres); 0.79 kg/l; Sources: Amount: F. O. Licht World Ethanol and Biofuels Report, vol. 4, no. 17 (9 May 2006), p. 395. Share on crops: Balat M, Balat H. (2009): Recent trends in global production and utilization of bio-ethanol fuel. Applied Energy 86:2273–2282
  property price 0.324 EUR2005
    Temporary price data. Calculated as 90% of purchasers price based on: 2005 prices from FAPRI2007, 2009. Agricultural outlook. (http://www.fapri.missouri.edu/outreach/publications/ag_outlook.asp?current_page=outreach; accessed 22/06/10). Unit conversion from US gallon to kg - 1 gallon = 3.7856 liter * 0.789 kg/liter (ethanol density) = 2.9868 kg
  property carbon content 0.521739
    carbon content on a dry matter basis (reserved; not for manual entry)
  property true value 0.324; name RP_true_value
    allocation property applied in "true value" allocation // value calculated from revenue
  properties: water content 0, carbon content, fossil 0, water in wet mass 0 kg, wet mass 1 kg, carbon content, non-fossil 0.521739, dry mass 1 kg, carbon allocation 0.521739 kg
- vinasse, from fermentation of sugar beet: 1 kg; name BP2; CPC 39149: Beet-pulp and other waste of sugar manufacture; By-product classification Recyclable
  EcoSpold01Location=CH
  production volume 4.1606e9 kg; = PVRP*BP2/RP
    The world production of ethanol from sugar beets is around 10 Mio hl per year.
    Calculated from the production volume of ethanol, without water, in 95% solution state, from fermentation in proportion to the respective output amounts.
  property price 0.012 EUR2005
    Temporary price data. Calculated as 90% of purchasers price based on: Calculated as 1/10 of the price of sugar beet pulp based on the difference in dry matter content
  property carbon content, non-fossil 0.12867
    The carbon content of the vinasse (2.5 % dry matter) was calculated as 0.12867 kg per dry matter (ecoinvent v2.2 report n 17, pg 281)
  property carbon content 0.12867
    carbon content on a dry matter basis (reserved; not for manual entry)
  property true value 0.0857516; name BP2_true_value
    allocation property applied in "true value" allocation // value calculated from revenue
  properties: carbon content, fossil 0, water content 39, wet mass 1 kg, dry mass 0.025 kg, water in wet mass 0.975 kg, carbon allocation 0.00321675 kg

## By-products
- protein feed, 100% crude: 0 kg; source Agroscope 2011; By-product classification allocatable product; CPC 23319: Preparations used in animal feeding n.e.c.; pedigree (1,1,1,1,1)
  Calculated based on crude protein content of sugar beet pulp (0.09kg/kg dry mass). The dry mass of the reference product is 0.25kg/kg.
  production volume 2.4628e7 kg
  property price 0.424 EUR2005; name protein_output_price_EUR2005
    Based on protein content and energy feed, gross content in soybean meal and prices per kg of soybean meal. Assumed soybean meal is the most used feed. Soybean meal 2004 prices for World import/export data (tonnes and US$) from FaoStat statistics (http://faostat.fao.org/site/535/default.aspx#ancor, TRADE)- [Accessed 24 May 2010]. See calculations for protein /energy content
  property carbon content, non-fossil 0.53
    considered pure protein (ecoinvent v2.2 report 17, pg 288). C-content in protein is estimated to be 53% ( from "Evolutionary and Biochemical Aspects", A.D. Kay and T. Vrede (in Global Ecology, 2010, Elsevier B.V., S.E. Jørgensen Ed.).
  property carbon content 0.53
    carbon content on a dry matter basis (reserved; not for manual entry)
  property true value 0.0179349
    allocation property applied in "true value" allocation // value calculated from revenue
  properties: wet mass 1 kg, water content 0, water in wet mass 0 kg, carbon content, fossil 0, dry mass 1 kg, carbon allocation 0.53 kg
- energy feed, gross: 0 MJ; source Agroscope 2011; CPC 23319: Preparations used in animal feeding n.e.c.; By-product classification allocatable product; pedigree (1,1,1,1,1)
  Calculated based on gross energy of sugar beet pulp (16.92MJ/kg dry mass). The dry mass of the reference product is 0.25kg/kg.
  production volume 4.63006e9 MJ
  property price 0.0108 EUR2005; name gross_enery_output_1_price_EUR2005
    Based on energy feed, gross content in soybean meal and prices per kg of soybean meal. Assumed soybean meal is the most used feed. Soybean meal 2004 prices for World import/export data (tonnes and US$) from FaoStat statistics (http://faostat.fao.org/site/535/default.aspx#ancor, TRADE)- [Accessed 24 May 2010]. See calculations for protein /energy content
  property carbon content 0
    carbon content on a dry matter basis (reserved; not for manual entry)
  property true value 0.0858847
    allocation property applied in "true value" allocation // value calculated from revenue
  properties: water content 0, wet mass 1 kg, carbon content, fossil 0, water in wet mass 0 kg, dry mass 1 kg, carbon content, non-fossil 0, carbon allocation 0 kg

## Inputs from technosphere
- heat, central or small-scale, other than natural gas: 0 MJ; pedigree (1,1,1,1,1)
  Kaltschmidt 1997
  EcoSpold01Location=CH
  Uncertainty: Kaltschmidt 1997
- ethanol fermentation plant: 1.19617e-11 unit; lognormal variance with pedigree 0.3626, pedigree (2,4,5,5,3)
  EcoSpold01Location=CH
  Estimation
  Uncertainty: Estimation
- heat, district or industrial, natural gas: 0 MJ; pedigree (1,1,1,1,1)
  Eners 2005
  EcoSpold01Location=RER
  Uncertainty: Eners 2005
- tap water: 0 kg; pedigree (1,1,1,1,1)
  EcoSpold01Location=CH
  Eners 2005
  Uncertainty: Eners 2005
  properties: dry mass 0.000337476 kg, carbon content, fossil 0.00178991, water content 2962.17, wet mass 1 kg
  note on carbon content, fossil: Bicarbonate content is 2.93 mol/m3. CO2 content is 0.1 mol/m3 (ecoinvent v2.2 report 8, Tab 93.1).
- sugar beet pulp: -0.043927 kg; name BP1
  EcoSpold01Location=CH
  production volume 1.09458e9 kg; = PVRP*BP1/RP
    (same comment as for vinasse, from fermentation of sugar beet)
  properties: water content 3, dry mass 0.25 kg, carbon content, non-fossil 0.44213, price 0.133 EUR2005, wet mass 1 kg
  note on carbon content, non-fossil: Composition data obtained from Beet, Pulp Wet in (http://beefmagazine.com/images/2009%20feed%20table.pdf). First, composition data were refered to 1 kg dry mass. Then, C-contents were calculated considering a C-content/dry mass of 46% in carbohydrates (including fibres), 53% in proteins and 75% in fats. All data from "Evolutionary and Biochemical Aspects", A.D. Kay and T. Vrede (in Global Ecology, 2010, Elsevier B.V., S.E. Jørgensen Ed.).
- sodium phosphate: 0.000161109 kg; lognormal variance with pedigree 0.0426, pedigree (1,3,5,5,1)
  EcoSpold01Location=RER
  Eners 2005
  Uncertainty: Eners 2005
  properties: dry mass 1 kg, wet mass 1 kg
- sodium sulfate, anhydrite: 0.000107413 kg; lognormal variance with pedigree 0.0426, pedigree (1,3,5,5,1)
  Eners 2005
  EcoSpold01Location=RER
  Uncertainty: Eners 2005
  properties: dry mass 1 kg, wet mass 1 kg
- electricity, medium voltage: 0 kWh; pedigree (1,1,1,1,1)
  Eners 2005
  EcoSpold01Location=CH
  Uncertainty: Eners 2005
- sulfuric acid: 0.000806124 kg; lognormal variance with pedigree 0.0426, pedigree (1,3,5,5,1)
  Eners 2005
  EcoSpold01Location=RER
  Uncertainty: Eners 2005
  properties: wet mass 1 kg, dry mass 1 kg
- sugar beet: 0.269408 kg; lognormal variance with pedigree 0.0426, pedigree (1,3,5,5,1)
  EcoSpold01Location=CH
  Eners 2005
  Uncertainty: Eners 2005
  properties: dry mass 0.23 kg, carbon content, non-fossil 0.433043, wet mass 1 kg, water content 3.34783
  note on carbon content, non-fossil: Composition data obtained from Beets raw, in (http://www.nal.usda.gov/fnic/foodcomp/search/). First, composition data were refered to 1 kg dry mass. Then, C-contents were calculated considering a C-content/dry mass of 46% in carbohydrates (including fibres), 53% in proteins and 75% in fats. All data from "Evolutionary and Biochemical Aspects", A.D. Kay and T. Vrede (in Global Ecology, 2010, Elsevier B.V., S.E. Jørgensen Ed.).
- heat, central or small-scale, other than natural gas: 0.000227801, 0.0159367 MJ (2 entries); lognormal variance with pedigree 0.042, pedigree (1,1,5,5,1)
  Kaltschmidt 1997
  EcoSpold01Location=CH
  Uncertainty: Kaltschmidt 1997
- heat, district or industrial, natural gas: 0.00110456, 0.0251681, 0.0624462 MJ (3 entries); lognormal variance with pedigree 0.0426, pedigree (1,3,5,5,1)
  Eners 2005
  EcoSpold01Location=RER
  Uncertainty: Eners 2005
- tap water: 2.88845e-5, 0.000239958, 4.77364e-5, 0.0102645, 0.00120372, 3.13145e-5, 8.90737e-5, 0.0137748 kg (8 entries); lognormal variance with pedigree 0.0426, pedigree (1,3,5,5,1)
  EcoSpold01Location=CH
  Eners 2005
  Uncertainty: Eners 2005
- electricity, medium voltage: 5.24536e-5, 9.54434e-6, 0.000220311, 0.000749818, 0.000161858, 0.00234677, 0.000335867, 0.00110044 kWh (8 entries); lognormal variance with pedigree 0.0426, pedigree (1,3,5,5,1)
  Eners 2005
  EcoSpold01Location=CH
  Uncertainty: Eners 2005

## Inputs from nature
- Water, cooling, unspecified natural origin [natural resource, in water]: 1.40998e-8 m3; lognormal variance with pedigree 0.0426, pedigree (1,3,5,5,1)
  Eners 2005
  Uncertainty: Eners 2005

## Emissions to nature
- Water [water, unspecified]: 2.56851e-5 m3; lognormal variance with pedigree 0.0827, pedigree (2,2,5,5,1)
  Calculated value based on literature values and expert opinion. See comments in the parametres' comment field.
  property water in wet mass 1000 kg; name WWM
  property wet mass 1000 kg; name WM
  property carbon content, fossil 0; name C_content_fossil
  property dry mass 0 kg; name DM
  property carbon content, non-fossil 0; name C_content_non_fossil
- Water [air, unspecified]: 9.02523e-9 m3; lognormal variance with pedigree 0.0827, pedigree (2,2,5,5,1)
  (same comment as for Water)
- Carbon dioxide, non-fossil [air, urban air close to ground]: 0.0225118 kg; lognormal variance with pedigree 0.0606, pedigree (4,3,5,5,1)
  Calculated from the carbon balance
  Uncertainty: Calculated from the carbon balance

## Sampling procedure
Literature data

## Extrapolations
Some data are derived from other or unknown plants or have been estimated. This dataset has been copied from an original dataset covering the geography CH. The uncertainty has been adjusted accordingly.

## Review by Niels Jungbluth 2006-05-05
Passed.
