# nuclear spent fuel conditioning facility construction

Dataset: EcoSpold 2, unit process
Geography: CN
Time period: 2002-01-01 to 2019-12-31
Technology level: current
Classification: EcoSpold01Categories: nuclear power/waste treatment
Classification: ISIC rev.4 ecoinvent: 4290:Construction of other civil engineering projects
Tags: ConvertedDataset
Scenario: Business-as-Usual
System model: Allocation at the point of substitution
Generated by: Roberto Dones
Published in: Dones, R. 2007
Database: ecoinvent
isCopyrightProtected: true
accessRestrictedTo: 1

## General comment
Datasets established on the basis of the modelling for CH. The assumed area and the volume of the building have been estimated from a preliminary aerial view of the CH design. Concrete for shielding and weight of machines are rough estimations. Used CN electricity mix and (coal) freight train transport. This dataset has been developed with the goal to serve a preliminary estimation of the Chinese nuclear chain for the Chinese electricity mix. Hence, it cannot be used for comparisons of conditioning among countries.
[This dataset was already contained in the ecoinvent database version 2. It was not individually updated during the transfer to ecoinvent version 3. Life Cycle Impact Assessment results may still have changed, as they are affected by changes in the supply chain, i.e. in other datasets. This dataset was generated following the ecoinvent quality guidelines for version 2. It may have been subject to central changes described in the ecoinvent version 3 change report (http://www.ecoinvent.org/database/ecoinvent-version-3/reports-of-changes/), and the results of the central updates were reviewed extensively. The changes added e.g. consistent water flows and other information throughout the database. The documentation of this dataset can be found in the ecoinvent reports of version 2, which are still available via the ecoinvent website. The change report linked above covers all central changes that were made during the conversion process.]

## Included activities end
It includes land use, building, cranes and other mashines, concrete for shielding and its lining, transport of materials and mashines, and disposal of concrete for shielding. The disposal of the building is in the used module.

## Geography
Swiss conditions adapted to China.

## Technology
Estimation of current technologies

## Reference product
- nuclear spent fuel conditioning facility: 1 unit; CPC 54290: General construction services of other civil engineering works; By-product classification allocatable product
  EcoSpold01Location=CN
  production volume 0.0870946 unit
    Calculated from electricity demand, using the input/output relationships of the datasets
  property price 1.20512e8 EUR2005
    EU27 I/O database(in the 'EU & DK Input Output Database' (available in SimaPro)); -79 Building, non-residential EU 27 (calculated to be 38.169 EUR2003/kg). Based on consumption of (_53 Iron basic, virgin, EU27;7.25517782294095E-3 kg/EUR building; 0.45 EUR2003 per kg DS), (_61 Iron, after first processing, EU27;5.8766830719783E-3kg/EUR building; 0.62 EUR2003 per kg DS), (_65 Fabricated metal products, except machinery, EU27; 8.9167022775554E-3 kg/EUR building; 3.63 EUR2003 per kg DS) and (_66 Machinery and equipment n.e.c., EU27;4.15071881936446E-3 kg/EUR building; 5.71 EUR2003 per kg DS) -3181500 kg
  property true value 1.20512e8
    allocation property applied in "true value" allocation // value calculated from revenue

## By-products
- heat, for reuse in municipal waste incineration only: 0 MJ; CPC 17300: Steam and hot water; By-product classification allocatable product; pedigree (1,1,1,1,1)
  Net electricity generated from this waste and used in internal MSWI plant energy redistribution.
  Uncertainty: uncertainty is calculated from uncertainties in waste composition and uncertainties in energy efficiency and the uncertainty in internal energy demand
  production volume 0.0448889 MJ
  property exergy 0.1842 MJ; name E_th_prod_MSWI_exergy
    This exergy property is based on the exergy content of the product.
  property price 0.0106 EUR2005; name E_th_prod_MSWI_price_EUR2005
    Average European district heat price from Ecoheatcool and Euroheat 2005-2006, Ecoheat Work package 1: The European heat market. Final report. 10.6 EUR/GJ i s the price of district heat. http://www.solarthermalworld.org/files/Ecoheatcool%20WP1%20Web.pdf?download
  property true value relation 0.1842; name E_th_prod_MSWI_true_value_relation
    property to calculate "true value" from
  property true value 0.00339032
    allocation property applied in "true value" allocation // value calculated from true value relation
- electricity, for reuse in municipal waste incineration only: 0 kWh; CPC 17100: Electrical energy; By-product classification allocatable product; pedigree (1,1,1,1,1)
  (same comment as for heat, for reuse in municipal waste incineration only)
  production volume 0.00632157 kWh
  property true value relation 3.6; name E_el_prod_MSWI_true_value_relation
    property to calculate "true value" from
  property price 0.1 EUR2005; name E_el_prod_MSWI_price_EUR2005
    Estimated to be the same price as in case of electricity, medium voltage.
  property exergy 3.6 MJ; name E_el_prod_MSWI_exergy
    This exergy property is based on the exergy content of the product.
  property true value 0.00933123
    (same comment as for heat, for reuse in municipal waste incineration only)

## Inputs from technosphere
- steel, chromium steel 18/8, hot rolled: 5000 kg; lognormal variance with pedigree 0.34, pedigree (1,1,5,1,1)
  EcoSpold01Location=RER
  own assumption
  properties: carbon content, fossil 0.0008, dry mass 1 kg, wet mass 1 kg
  note on carbon content, fossil: Stainless steel model is the grade 304 steel (18/8 stainless, 18% chromium 8% nickel; max. 0.08% C)
- industrial machine, heavy, unspecified: 50000 kg; lognormal variance with pedigree 0.34, pedigree (1,1,5,1,1)
  own assumption
  EcoSpold01Location=RER
- concrete, normal: 250 m3; lognormal variance with pedigree 0.34, pedigree (1,1,5,1,1)
  EcoSpold01Location=CH
  own assumption
  properties: water content 0.086758, wet mass 2380 kg, dry mass 2190 kg
- building, multi-storey: 130000 m3; lognormal variance with pedigree 0.16, pedigree (1,1,5,1,1)
  EcoSpold01Location=RER
  own assumption
- waste concrete, not reinforced: -600000 kg; lognormal variance with pedigree 0.34, pedigree (1,1,5,1,1)
  EcoSpold01Location=CH
  own assumption
  production volume 52256.8 kg
    Calculated from the production volume of nuclear spent fuel conditioning facility in proportion to the respective output amounts.
  properties: wet mass 1 kg, dry mass 1 kg

## Inputs from nature
- Transformation, to industrial area [natural resource, land]: 22500 m2; lognormal variance with pedigree 0.16, pedigree (1,1,5,1,1)
  own estimation
- Transformation, from unspecified [natural resource, land]: 22500 m2; lognormal variance with pedigree 0.16, pedigree (1,1,5,1,1)
  own estimation
- Transformation, from industrial area [natural resource, land]: 22500 m2; lognormal variance with pedigree 0.16, pedigree (1,1,5,1,1)
  own estimation
- Transformation, to unspecified [natural resource, land]: 22500 m2; lognormal variance with pedigree 0.16, pedigree (1,1,5,1,1)
  own estimation
- Occupation, industrial area [natural resource, land]: 450000 m2*year; lognormal variance with pedigree 0.25, pedigree (1,1,5,1,1)
  own estimation

## Sampling procedure
Literature

## Review by Rolf Frischknecht 2007-09-05
passed
