# treatment of wastewater, average, capacity 1.1E10l/year

Dataset: EcoSpold 2, unit process
Geography: CH
Time period: 1994-01-01 to 2019-12-31
Technology level: current
Classification: ISIC rev.4 ecoinvent: 3700:Sewerage
Classification: EcoSpold01Categories: waste management/wastewater treatment
Tags: Treatment; ConvertedDataset
Scenario: Business-as-Usual
System model: Allocation at the point of substitution
Generated by: Gabor Doka (obsolete)
Published in: Doka G. 2008
Database: ecoinvent
isCopyrightProtected: true
accessRestrictedTo: 1

## General comment
Wastewater purified in a moderatly large municipal wastewater treatment plant (capacity class 2), with an average capacity size of 71100 per-captia-equivalents PCE.
Wastewater contains (in kg/m3): COD: 0.1556 (GSD=122.5%); BOD: 0.1036 (GSD=122.5%); DOC: 0.04575 (GSD=122.5%); TOC: 0.0673 (GSD=122.5%); SO4-S: 0.044 (GSD=122.5%); S part.: 0.002 (GSD=122.5%); NH4-N: 0.01495 (GSD=122.5%); NO3-N: 0.00105 (GSD=122.5%); NO2-N: 0.0004 (GSD=122.5%); N part.: 0.003279 (GSD=122.5%); N org. solv.: 0.008392 (GSD=122.5%); PO4-P: 0.002459 (GSD=122.5%); P part.: 0.0006147 (GSD=122.5%); Cl: 0.03003 (GSD=224.1%); F: 0.00003277 (GSD=224.1%); As: 0.0000009 (GSD=224.1%); Cd: 0.0000002806 (GSD=223.8%); Co: 0.000001618 (GSD=223.8%); Cr: 0.00001223 (GSD=223.8%); Cu: 0.00003744 (GSD=223.8%); Hg: 0.0000002 (GSD=223.8%); Mn: 0.000053 (GSD=224.1%); Mo: 0.0000009574 (GSD=223.8%); Ni: 0.000006589 (GSD=223.8%); Pb: 0.000008631 (GSD=223.8%); Sn: 0.0000034 (GSD=224.1%); Zn: 0.0001094 (GSD=223.8%); Si: 0.003126 (GSD=224.1%); Fe: 0.007093 (GSD=224.1%); Ca: 0.05083 (GSD=224.1%); Al: 0.001038 (GSD=224.1%); K: 0.0003989 (GSD=224.1%); Mg: 0.005707 (GSD=224.1%); Na: 0.002186 (GSD=224.1%);
[This dataset was already contained in the ecoinvent database version 2. It was not individually updated during the transfer to ecoinvent version 3. Life Cycle Impact Assessment results may still have changed, as they are affected by changes in the supply chain, i.e. in other datasets. This dataset was generated following the ecoinvent quality guidelines for version 2. It may have been subject to central changes described in the ecoinvent version 3 change report (http://www.ecoinvent.org/database/ecoinvent-version-3/reports-of-changes/), and the results of the central updates were reviewed extensively. The changes added e.g. consistent water flows and other information throughout the database. The documentation of this dataset can be found in the ecoinvent reports of version 2, which are still available via the ecoinvent website. The change report linked above covers all central changes that were made during the conversion process.]

## Included activities end
Infrastructure materials for municipal wastewater treatment plant, transports, dismantling. Land use burdens.

## Geography
Specific to the technology mix encountered in Switzerland in 2000. Well applicable to modern treatment practices in Europe, North America or Japan.

## Technology
Three stage wastewater treatment (mechanical, biological, chemical) including sludge digestion (fermentation) according to the average technology in Switzerland

## Parameters
- fraction, process water, to air: 0.1 dimensionless; name fraction_PW_to_air; lognormal variance with pedigree 0.092025, pedigree (4,4,3,2,4)
  Literature value (Statistics Canada, 2007 & Shaffer, K.H., 2008, Consumptive water use in the Great Lakes Basin, USGS) (Vionnet, S., Quantis Water Database - Technical Report, 2012).

## Reference product
- wastewater, average: -1 m3; CPC 39920: Sewage sludge; By-product classification Waste
  production volume 1.88446e9 m3
    (year 2000) source: ecoinvent v2, report 13IV p.2
  property price 0 EUR2005
    Waste products are assigned a price of zero as they are assumed to require further treatment.
  property carbon content, non-fossil 0.194039
    0.0673 kg TOC/m3 (Tab A.17, ecoinvent v2.2 report 13_I). TOC was considered as Total Carbon.
  property carbon content 0.194039
    carbon content on a dry matter basis (reserved; not for manual entry)
  properties: carbon content, fossil 0, water content 2882.2, water in wet mass 999.653 kg, dry mass 0.346837 kg, wet mass 1000 kg, carbon allocation 0.0673 kg

## By-products
- electricity, for reuse in municipal waste incineration only: 0 kWh; CPC 17100: Electrical energy; By-product classification allocatable product; pedigree (1,1,1,1,1)
  Net electricity generated from this waste and used in internal MSWI plant energy redistribution.
  Uncertainty: uncertainty is calculated from uncertainties in waste composition and uncertainties in energy efficiency and the uncertainty in internal energy demand
  property exergy 3.6 MJ; name E_el_prod_MSWI_exergy
    This exergy property is based on the exergy content of the product.
  property true value relation 3.6; name E_el_prod_MSWI_true_value_relation
    property to calculate "true value" from
  property price 0.1 EUR2005; name E_el_prod_MSWI_price_EUR2005
    Estimated to be the same price as in case of electricity, medium voltage.
- heat, for reuse in municipal waste incineration only: 0 MJ; CPC 17300: Steam and hot water; By-product classification allocatable product; pedigree (1,1,1,1,1)
  Net useful heat generated from this waste and used in internal MSWI plant energy redistribution.
  Uncertainty: uncertainty is calculated from uncertainties in waste composition and uncertainties in energy efficiency and the uncertainty in internal energy demand
  property true value relation 0.1842; name E_th_prod_MSWI_true_value_relation
    property to calculate "true value" from
  property exergy 0.1842 MJ; name E_th_prod_MSWI_exergy
    This exergy property is based on the exergy content of the product.
  property price 0.0106 EUR2005; name E_th_prod_MSWI_price_EUR2005
    Average European district heat price from Ecoheatcool and Euroheat 2005-2006, Ecoheat Work package 1: The European heat market. Final report. 10.6 EUR/GJ i s the price of district heat. http://www.solarthermalworld.org/files/Ecoheatcool%20WP1%20Web.pdf?download
- zinc concentrate: 0 kg; CPC 14290: Other non-ferrous metal ores and concentrates (other than uranium or thorium ores and concentrates); By-product classification allocatable product
  Calculated value from the knowledge of the properties of both products.
  property price 0.38 EUR2005; name ByP_price_EUR2005
    Temporary price data. Calculated as 90% of purchasers price based on: Zinc content in concentrate 53%. Concentrate price per kg Zn 86.5% of refined Zn price (13.5% treatment charges according to CHR Metals Limited 2005: Dynamic cost curves. http://www.minecost.com/dynamic.pdf). 2004 zinc price from USGS (2007) Mineral commodity summaries 2007. <http://minerals.usgs.gov/minerals/pubs/mcs/2007/mcs2007.pdf> [Accessed 25 May 2010]
  property zinc content 0.53; name zinc_C_zinc_concentrate
    Zinc content on a dry matter basis. Value taken from teh "zinc mine operation" /GLO dataset.
  property dry mass 1 kg; name DM_zinc_concentrate
  property carbon content 0
    carbon content on a dry matter basis (reserved; not for manual entry)
  properties: wet mass 1 kg, water content 0, carbon content, non-fossil 0, carbon content, fossil 0, water in wet mass 0 kg, carbon allocation 0 kg

## Inputs from technosphere
- wastewater treatment facility, capacity 1.1E10l/year: 1.9883e-9 unit; lognormal variance with pedigree 0.04, pedigree (1,1,5,1,1)
  uncertainty heeded in exchanges of the module
  This exchange has an activity link directly to the producing activity because the product is primarily consumed in the same geographical area where it is produced.
- heat, district or industrial, natural gas: 0.00632448 MJ; lognormal variance with pedigree 0.22, pedigree (1,1,5,1,1)
  burden from sludge incineration. Uncertainty calculated from wastewater composition and treatment model
- sewer grid, 1.1E10l/year, 242 km: 1.6832e-7 km; lognormal variance with pedigree 0.04, pedigree (1,1,5,1,1)
  (same comment as for wastewater treatment facility, capacity 1.1E10l/year)
- electricity, high voltage: 0.018642 kWh; lognormal variance with pedigree 0.49, pedigree (1,1,5,1,1)
  (same comment as for heat, district or industrial, natural gas)
- process-specific burdens, municipal waste incineration: 0.12967 kg; lognormal variance with pedigree 0.04, pedigree (1,1,5,1,1)
  burden from sludge incineration. Uncertainty calculated from wastewater composition and treatment model;activityLink introduced to establish a direct link to the corresponding regional supply of this product
- hydrochloric acid, without water, in 30% solution state: 3.9503e-7 kg; lognormal variance with pedigree 0.08, pedigree (1,1,5,1,1)
  (same comment as for heat, district or industrial, natural gas)
  properties: wet mass 1 kg, dry mass 1 kg
- iron (III) chloride, without water, in 40% solution state: 0.015947 kg; lognormal variance with pedigree 0.1, pedigree (1,1,5,1,1)
  direct wastewater treatment plant burden plus burden from sludge incineration. Uncertainty calculated from wastewater composition and treatment model
  properties: wet mass 1 kg, dry mass 1 kg
- waste graphical paper: -0.0155 kg; lognormal variance with pedigree 0.04, pedigree (1,1,5,1,1)
  direct wastewater treatment plant burden. Uncertainty calculated from wastewater composition and treatment model
  production volume 2.92091e7 kg; = (Ref('32ae4676-5940-493e-b1eb-d36fb4d858bc')*-1)* Ref('14d0fb5e-3dee-4449-abb7-f45969cdba0b', 'ProductionVolume')/ABS( Ref('14d0fb5e-3dee-4449-abb7-f45969cdba0b'))
    Calculated from the production volume of sewage, average in proportion to the respective output amounts.
  properties: water content 0.126126, dry mass 0.888 kg, wet mass 1 kg, carbon content, non-fossil 0.454955
- quicklime, milled, packed: 1.2537e-6 kg; lognormal variance with pedigree 0.08, pedigree (1,1,5,1,1)
  (same comment as for heat, district or industrial, natural gas)
  properties: dry mass 0.99 kg, water content 0.010101, wet mass 1 kg
- waste plastic, mixture: -0.0155 kg; lognormal variance with pedigree 0.04, pedigree (1,1,5,1,1)
  (same comment as for waste graphical paper)
  production volume 2.92091e7 kg; = (Ref('286a05fd-75e4-4205-85e2-0477d106317a')*-1)* Ref('14d0fb5e-3dee-4449-abb7-f45969cdba0b', 'ProductionVolume')/ABS( Ref('14d0fb5e-3dee-4449-abb7-f45969cdba0b'))
    (same comment as for waste graphical paper)
  properties: water content 0.180638, carbon content, fossil 0.747344, dry mass 0.847 kg, wet mass 1 kg
  note on carbon content, fossil: C content in 1 kg DM was calculated using data in Tab A.2, ecoinvent v2.2 report 13_I
- liquid manure spreading, by vacuum tanker: 0.00032716 m3; lognormal variance with pedigree 0.04, pedigree (1,1,5,1,1)
  burden from sludge spreading. Uncertainty calculated from wastewater composition and treatment model
  This exchange has an activity link directly to the producing activity because the product is primarily consumed in the same geographical area where it is produced.
- waste cement, hydrated: -0.0037022 kg; lognormal variance with pedigree 0.08, pedigree (1,1,5,1,1)
  (same comment as for heat, district or industrial, natural gas)
  production volume 6.97664e6 kg; = (Ref('fb5ab242-cf54-4bdc-85b6-fbf93e87d74d')*-1)* Ref('14d0fb5e-3dee-4449-abb7-f45969cdba0b', 'ProductionVolume')/ABS( Ref('14d0fb5e-3dee-4449-abb7-f45969cdba0b'))
    (same comment as for waste graphical paper)
  properties: wet mass 1 kg, dry mass 1 kg
- chemical, organic: 5.2547e-7 kg; lognormal variance with pedigree 0.43, pedigree (1,1,5,1,1)
  (same comment as for heat, district or industrial, natural gas)
  properties: wet mass 1 kg, dry mass 1 kg, carbon content, fossil 0.628
  note on carbon content, fossil: This dataset is an unweighted average of 20 organic substances (listed in Tab 88.1, ecoinvent v2.2 report 8, part II), being part of the top100 chemicals included in this database. The C-content has also been calculated as an unweighted average of the C content of the substances composing this dataset.
- electricity, low voltage: 0.20571 kWh; lognormal variance with pedigree 0.06, pedigree (1,1,5,1,1)
  (same comment as for waste graphical paper)
- heat, district or industrial, other than natural gas: 0.10875 MJ; lognormal variance with pedigree 0.05, pedigree (1,1,5,1,1)
  (same comment as for heat, district or industrial, natural gas)
- titanium dioxide: 2.0626e-6 kg; lognormal variance with pedigree 0.54, pedigree (1,1,5,1,1)
  (same comment as for heat, district or industrial, natural gas)
  properties: dry mass 1 kg, wet mass 1 kg
- residual material landfill: 7.7129e-12 unit; lognormal variance with pedigree 0.07, pedigree (1,1,5,1,1)
  (same comment as for heat, district or industrial, natural gas)
- chromium oxide, flakes: 4.2095e-8 kg; lognormal variance with pedigree 0.54, pedigree (1,1,5,1,1)
  (same comment as for heat, district or industrial, natural gas)
  properties: wet mass 1 kg, dry mass 1 kg
- slag landfill: 4.1979e-11 unit; lognormal variance with pedigree 0.07, pedigree (1,1,5,1,1)
  (same comment as for heat, district or industrial, natural gas)
- process-specific burdens, slag landfill: 0.023613 kg; lognormal variance with pedigree 0.07, pedigree (1,1,5,1,1)
  (same comment as for process-specific burdens, municipal waste incineration)
- municipal waste incineration facility: 3.2417e-11 unit; lognormal variance with pedigree 0.04, pedigree (1,1,5,1,1)
  (same comment as for heat, district or industrial, natural gas)
- ammonia, liquid: 7.2058e-5 kg; lognormal variance with pedigree 0.22, pedigree (1,1,5,1,1)
  (same comment as for heat, district or industrial, natural gas)
  properties: dry mass 1 kg, wet mass 1 kg
- aluminium sulfate, powder: 0.0031512 kg; lognormal variance with pedigree 0.1, pedigree (1,1,5,1,1)
  (same comment as for waste graphical paper)
  properties: dry mass 1 kg, wet mass 1 kg
- chemical, inorganic: 6.5839e-7 kg; lognormal variance with pedigree 0.08, pedigree (1,1,5,1,1)
  (same comment as for heat, district or industrial, natural gas)
  properties: dry mass 1 kg, carbon content, fossil 0.003, wet mass 1 kg
  note on carbon content, fossil: This dataset is an unweighted average of 20 inorganic substances (listed in Tab 88.1, ecoinvent v2.2 report 8, part II), being part of the top100 chemicals included in this database. The C-content has also been calculated as an unweighted average of the C content of the substances composing this dataset.
- cement, unspecified: 0.0014809 kg; lognormal variance with pedigree 0.08, pedigree (1,1,5,1,1)
  (same comment as for heat, district or industrial, natural gas)
  properties: dry mass 1 kg, wet mass 1 kg
- sodium hydroxide, without water, in 50% solution state: 0.00035213 kg; lognormal variance with pedigree 0.09, pedigree (1,1,5,1,1)
  (same comment as for heat, district or industrial, natural gas)
  properties: dry mass 1 kg, wet mass 1 kg
- iron sulfate: 0.01166 kg; lognormal variance with pedigree 0.1, pedigree (1,1,5,1,1)
  (same comment as for waste graphical paper)
  properties: wet mass 1 kg, dry mass 1 kg
- process-specific burdens, residual material landfill: 0.0037022 kg; lognormal variance with pedigree 0.07, pedigree (1,1,5,1,1)
  (same comment as for process-specific burdens, municipal waste incineration)

## Emissions to nature
- Nickel [air, urban air close to ground]: 6.8642e-14 kg; lognormal variance with pedigree 0.81, pedigree (1,1,5,1,1)
  direct digester gas emission plus emission from sludge incineration. Uncertainty calculated from wastewater composition and treatment model
- Chromium VI [water, surface water]: 6.3282e-6 kg; lognormal variance with pedigree 0.64, pedigree (1,1,5,1,1)
  sewer overload discharge plus direct wastewater treatment plant emission plus emission from sludge incineration. Uncertainty calculated from wastewater composition and treatment model
- Aluminium [water, ground-, long-term]: 0.00066857 kg; lognormal variance with pedigree 0.46, pedigree (1,1,5,1,1)
  emission from sludge incineration. Uncertainty calculated from wastewater composition and treatment model
- Sulfate [water, ground-, long-term]: 0.002367 kg; lognormal variance with pedigree 0.1, pedigree (1,1,5,1,1)
  (same comment as for Aluminium)
- Cadmium, ion [water, surface water]: 1.4246e-7 kg; lognormal variance with pedigree 0.66, pedigree (1,1,5,1,1)
  (same comment as for Chromium VI)
- Nickel, ion [water, ground-, long-term]: 1.4891e-6 kg; lognormal variance with pedigree 0.71, pedigree (1,1,5,1,1)
  (same comment as for Aluminium)
- Arsenic, ion [water, surface water]: 7.5922e-7 kg; lognormal variance with pedigree 0.61, pedigree (1,1,5,1,1)
  (same comment as for Chromium VI)
- Lead [water, ground-, long-term]: 3.3568e-7 kg; lognormal variance with pedigree 6.92, pedigree (1,1,5,1,1)
  (same comment as for Aluminium)
- Tin [air, urban air close to ground]: 1.6092e-9 kg; lognormal variance with pedigree 0.73, pedigree (1,1,5,1,1)
  (same comment as for Nickel)
- DOC, Dissolved Organic Carbon [water, surface water]: 0.0075378 kg; lognormal variance with pedigree 0.08, pedigree (1,1,5,1,1)
  (same comment as for Chromium VI)
- Chromium [soil, agricultural]: 2.3299e-6 kg; lognormal variance with pedigree 0.71, pedigree (1,1,5,1,1)
  emission from sludge spreading. Uncertainty calculated from wastewater composition and treatment model
- Phosphate [water, ground-, long-term]: 0.00015578 kg; lognormal variance with pedigree 4.25, pedigree (1,1,5,1,1)
  (same comment as for Aluminium)
- Water [air, unspecified]: 0.1 m3; name water_to_air_unspecified; lognormal variance with pedigree 0.0807, pedigree (2,2,5,1,1)
  Calculated value based on water balance.
  property fraction, origin: fresh water 0; name fraction_origin_fresh_water
  property fraction, origin: unspecified 1; name fraction_origin_unspecified
  property fraction, origin: salt water 0; name fraction_origin_salt_water
- DOC, Dissolved Organic Carbon [water, ground-, long-term]: 0.00010355 kg; lognormal variance with pedigree 0.11, pedigree (1,1,5,1,1)
  (same comment as for Aluminium)
- Mercury [water, surface water]: 6.274e-8 kg; lognormal variance with pedigree 0.64, pedigree (1,1,5,1,1)
  (same comment as for Chromium VI)
- Water [water, unspecified]: 0.9 m3; name water_to_water_unspecified; lognormal variance with pedigree 0.0807, pedigree (2,2,5,1,1)
  Calculated value based on water balance.
  property fraction, origin: salt water 0; name fraction_origin_salt_water_Ww
  property dry mass 0 kg; name DM
  property carbon content, fossil 0; name C_content_fossil
  property water in wet mass 1000 kg; name WWM
  property carbon content, non-fossil 0; name C_content_non_fossil
  property fraction, origin: unspecified 0; name fraction_origin_unspecified_Ww
  property wet mass 1000 kg; name WM
  property fraction, origin: fresh water 1; name fraction_origin_fresh_water_Ww
- Methane, non-fossil [air, urban air close to ground]: 0.0005024 kg; lognormal variance with pedigree 0.14, pedigree (1,1,5,1,1)
  (same comment as for Nickel)
- Phosphate [water, surface water]: 0.0027041 kg; lognormal variance with pedigree 0.08, pedigree (1,1,5,1,1)
  sewer overload discharge plus direct wastewater treatment plant emission plus emission from sludge incineration plus emission from sludge spreading. Uncertainty calculated from wastewater composition and treatment model
- Nitrogen oxides [air, urban air close to ground]: 0.00069993 kg; lognormal variance with pedigree 0.08, pedigree (1,1,5,1,1)
  (same comment as for Nickel)
- Phosphorus [air, urban air close to ground]: 1.3301e-6 kg; lognormal variance with pedigree 0.1, pedigree (1,1,5,1,1)
  (same comment as for Nickel)
- Aluminium [water, surface water]: 6.232e-5 kg; lognormal variance with pedigree 0.55, pedigree (1,1,5,1,1)
  (same comment as for Chromium VI)
- Cadmium [soil, agricultural]: 5.3452e-8 kg; lognormal variance with pedigree 0.71, pedigree (1,1,5,1,1)
  (same comment as for Chromium)
- Tin, ion [water, surface water]: 1.4223e-6 kg; lognormal variance with pedigree 0.66, pedigree (1,1,5,1,1)
  (same comment as for Chromium VI)
- Cobalt [water, ground-, long-term]: 4.2779e-7 kg; lognormal variance with pedigree 0.71, pedigree (1,1,5,1,1)
  (same comment as for Aluminium)
- Ammonia [air, urban air close to ground]: 0.00035613 kg; lognormal variance with pedigree 0.28, pedigree (1,1,5,1,1)
  direct digester gas emission plus emission from sludge incineration plus emission from sludge spreading. Uncertainty calculated from wastewater composition and treatment model
- Aluminium [air, urban air close to ground]: 1.4113e-6 kg; lognormal variance with pedigree 0.47, pedigree (1,1,5,1,1)
  (same comment as for Nickel)
- Silicon [air, urban air close to ground]: 4.1957e-6 kg; lognormal variance with pedigree 0.73, pedigree (1,1,5,1,1)
  (same comment as for Nickel)
- Cobalt [water, surface water]: 8.2109e-7 kg; lognormal variance with pedigree 0.66, pedigree (1,1,5,1,1)
  (same comment as for Chromium VI)
- Aluminium [soil, agricultural]: 0.00056973 kg; lognormal variance with pedigree 0.46, pedigree (1,1,5,1,1)
  (same comment as for Chromium)
- Tin, ion [water, ground-, long-term]: 6.0968e-7 kg; lognormal variance with pedigree 1.26, pedigree (1,1,5,1,1)
  (same comment as for Aluminium)
- Calcium, ion [water, surface water]: 0.045858 kg; lognormal variance with pedigree 0.67, pedigree (1,1,5,1,1)
  (same comment as for Chromium VI)
- Magnesium [water, surface water]: 0.0051484 kg; lognormal variance with pedigree 0.67, pedigree (1,1,5,1,1)
  (same comment as for Chromium VI)
- Silicon [water, ground-, long-term]: 0.0001565 kg; lognormal variance with pedigree 5.46, pedigree (1,1,5,1,1)
  (same comment as for Aluminium)
- Molybdenum [water, surface water]: 5.3529e-7 kg; lognormal variance with pedigree 0.58, pedigree (1,1,5,1,1)
  (same comment as for Chromium VI)
- Zinc [air, urban air close to ground]: 7.5692e-10 kg; lognormal variance with pedigree 0.76, pedigree (1,1,5,1,1)
  (same comment as for Nickel)
- Calcium, ion [water, ground-, long-term]: 0.0026613 kg; lognormal variance with pedigree 0.71, pedigree (1,1,5,1,1)
  (same comment as for Aluminium)
- Dinitrogen monoxide [air, urban air close to ground]: 0.00010363 kg; lognormal variance with pedigree 0.07, pedigree (1,1,5,1,1)
  direct wastewater treatment plant emission plus direct digester gas emission plus emission from sludge incineration plus emission from sludge spreading. Uncertainty calculated from wastewater composition and treatment model
- Chromium [air, urban air close to ground]: 2.7317e-13 kg; lognormal variance with pedigree 0.8, pedigree (1,1,5,1,1)
  (same comment as for Nickel)
- Tin [soil, agricultural]: 7.6487e-7 kg; lognormal variance with pedigree 0.71, pedigree (1,1,5,1,1)
  (same comment as for Chromium)
- Fluoride [water, surface water]: 3.2769e-5 kg; lognormal variance with pedigree 0.67, pedigree (1,1,5,1,1)
  (same comment as for Chromium VI)
- Carbon monoxide, non-fossil [air, urban air close to ground]: 0.00017096 kg; lognormal variance with pedigree 0.15, pedigree (1,1,5,1,1)
  (same comment as for Nickel)
- Cadmium, ion [water, ground-, long-term]: 8.5046e-10 kg; lognormal variance with pedigree 6.9, pedigree (1,1,5,1,1)
  (same comment as for Aluminium)
- Arsenic, ion [water, ground-, long-term]: 6.5411e-8 kg; lognormal variance with pedigree 0.71, pedigree (1,1,5,1,1)
  (same comment as for Aluminium)
- BOD5, Biological Oxygen Demand [water, surface water]: 0.0098229 kg; lognormal variance with pedigree 0.07, pedigree (1,1,5,1,1)
  (same comment as for Chromium VI)
- Magnesium [soil, agricultural]: 0.00021652 kg; lognormal variance with pedigree 0.71, pedigree (1,1,5,1,1)
  (same comment as for Chromium)
- Molybdenum [water, ground-, long-term]: 2.392e-7 kg; lognormal variance with pedigree 0.71, pedigree (1,1,5,1,1)
  (same comment as for Aluminium)
- Copper, ion [water, ground-, long-term]: 1.3747e-5 kg; lognormal variance with pedigree 0.73, pedigree (1,1,5,1,1)
  (same comment as for Aluminium)
- Cadmium [air, urban air close to ground]: 4.7295e-12 kg; lognormal variance with pedigree 0.74, pedigree (1,1,5,1,1)
  (same comment as for Nickel)
- Zinc, ion [water, ground-, long-term]: 7.1834e-7 kg; lognormal variance with pedigree 5.51, pedigree (1,1,5,1,1)
  (same comment as for Aluminium)
- COD, Chemical Oxygen Demand [water, ground-, long-term]: 0.00026168 kg; lognormal variance with pedigree 0.11, pedigree (1,1,5,1,1)
  (same comment as for Aluminium)
- Iron [air, urban air close to ground]: 2.7169e-7 kg; lognormal variance with pedigree 0.2, pedigree (1,1,5,1,1)
  (same comment as for Nickel)
- Cyanide [air, urban air close to ground]: 1.2855e-6 kg; lognormal variance with pedigree 0.24, pedigree (1,1,5,1,1)
  (same comment as for Aluminium)
- Chloride [water, surface water]: 0.040484 kg; lognormal variance with pedigree 0.48, pedigree (1,1,5,1,1)
  (same comment as for Chromium VI)
- Manganese [water, surface water]: 2.6898e-5 kg; lognormal variance with pedigree 0.66, pedigree (1,1,5,1,1)
  (same comment as for Chromium VI)
- Molybdenum [air, urban air close to ground]: 5.7835e-10 kg; lognormal variance with pedigree 0.73, pedigree (1,1,5,1,1)
  (same comment as for Nickel)
- Iron [soil, agricultural]: 0.0051323 kg; lognormal variance with pedigree 0.16, pedigree (1,1,5,1,1)
  (same comment as for Chromium)
- Copper [soil, agricultural]: 1.0725e-5 kg; lognormal variance with pedigree 0.71, pedigree (1,1,5,1,1)
  (same comment as for Chromium)
- Manganese [water, ground-, long-term]: 1.3784e-5 kg; lognormal variance with pedigree 0.87, pedigree (1,1,5,1,1)
  (same comment as for Aluminium)
- Arsenic [air, urban air close to ground]: 2.5337e-10 kg; lognormal variance with pedigree 0.73, pedigree (1,1,5,1,1)
  (same comment as for Nickel)
- Chromium VI [water, ground-, long-term]: 3.911e-7 kg; lognormal variance with pedigree 1.09, pedigree (1,1,5,1,1)
  (same comment as for Aluminium)
- NMVOC, non-methane volatile organic compounds, unspecified origin [air, urban air close to ground]: 2.2813e-6 kg; lognormal variance with pedigree 0.26, pedigree (1,1,5,1,1)
  direct digester gas emission. Uncertainty calculated from wastewater composition and treatment model
- Magnesium [air, urban air close to ground]: 4.7278e-7 kg; lognormal variance with pedigree 0.73, pedigree (1,1,5,1,1)
  (same comment as for Nickel)
- Lead [soil, agricultural]: 2.9713e-6 kg; lognormal variance with pedigree 0.71, pedigree (1,1,5,1,1)
  (same comment as for Chromium)
- Phosphate [water, ground-]: 1.4652e-5 kg; lognormal variance with pedigree 0.13, pedigree (1,1,5,1,1)
  (same comment as for Chromium)
- Copper [air, urban air close to ground]: 1.2554e-10 kg; lognormal variance with pedigree 0.76, pedigree (1,1,5,1,1)
  (same comment as for Nickel)
- Potassium, ion [water, surface water]: 0.0003989 kg; lognormal variance with pedigree 0.67, pedigree (1,1,5,1,1)
  (same comment as for Chromium VI)
- Manganese [air, urban air close to ground]: 8.7161e-14 kg; lognormal variance with pedigree 0.83, pedigree (1,1,5,1,1)
  (same comment as for Nickel)
- BOD5, Biological Oxygen Demand [water, ground-, long-term]: 8.5596e-5 kg; lognormal variance with pedigree 0.11, pedigree (1,1,5,1,1)
  (same comment as for Aluminium)
- Iron, ion [water, surface water]: 0.0036024 kg; lognormal variance with pedigree 0.66, pedigree (1,1,5,1,1)
  (same comment as for Chromium VI)
- Lead [air, urban air close to ground]: 1.7517e-10 kg; lognormal variance with pedigree 0.75, pedigree (1,1,5,1,1)
  (same comment as for Nickel)
- Silicon [soil, agricultural]: 0.0011366 kg; lognormal variance with pedigree 0.71, pedigree (1,1,5,1,1)
  (same comment as for Chromium)
- COD, Chemical Oxygen Demand [water, surface water]: 0.030152 kg; lognormal variance with pedigree 0.08, pedigree (1,1,5,1,1)
  (same comment as for Chromium VI)
- Cobalt [air, urban air close to ground]: 1.5513e-14 kg; lognormal variance with pedigree 0.81, pedigree (1,1,5,1,1)
  (same comment as for Nickel)
- Nitrogen [water, surface water]: 0.00049 kg; lognormal variance with pedigree 0.08, pedigree (1,1,5,1,1)
  direct wastewater treatment plant emission. Uncertainty calculated from wastewater composition and treatment model
- Zinc, ion [water, surface water]: 3.381e-5 kg; lognormal variance with pedigree 0.65, pedigree (1,1,5,1,1)
  (same comment as for Chromium VI)
- Magnesium [water, ground-, long-term]: 0.00031695 kg; lognormal variance with pedigree 0.71, pedigree (1,1,5,1,1)
  (same comment as for Aluminium)
- Nitrate [water, surface water]: 0.048305 kg; lognormal variance with pedigree 0.06, pedigree (1,1,5,1,1)
  (same comment as for Chromium VI)
- Manganese [soil, agricultural]: 1.0095e-5 kg; lognormal variance with pedigree 0.71, pedigree (1,1,5,1,1)
  (same comment as for Chromium)
- Lead [water, surface water]: 9.4873e-7 kg; lognormal variance with pedigree 0.6, pedigree (1,1,5,1,1)
  (same comment as for Chromium VI)
- Carbon [soil, agricultural]: 0.0066874 kg; lognormal variance with pedigree 0.1, pedigree (1,1,5,1,1)
  (same comment as for Chromium)
- Calcium [soil, agricultural]: 0.0019286 kg; lognormal variance with pedigree 0.71, pedigree (1,1,5,1,1)
  (same comment as for Chromium)
- Copper, ion [water, surface water]: 9.7125e-6 kg; lognormal variance with pedigree 0.65, pedigree (1,1,5,1,1)
  (same comment as for Chromium VI)
- Ammonium, ion [water, surface water]: 0.011027 kg; lognormal variance with pedigree 0.06, pedigree (1,1,5,1,1)
  (same comment as for Nitrogen)
- Nitrite [water, surface water]: 0.000644 kg; lognormal variance with pedigree 0.08, pedigree (1,1,5,1,1)
  (same comment as for Nitrogen)
- Arsenic [soil, agricultural]: 7.5114e-8 kg; lognormal variance with pedigree 0.71, pedigree (1,1,5,1,1)
  (same comment as for Chromium)
- Nitrate [water, ground-, long-term]: 5.1309e-5 kg; lognormal variance with pedigree 0.08, pedigree (1,1,5,1,1)
  (same comment as for Aluminium)
- Sulfur dioxide [air, urban air close to ground]: 0.00088615 kg; lognormal variance with pedigree 0.1, pedigree (1,1,5,1,1)
  (same comment as for Nickel)
- Mercury [water, ground-, long-term]: 4.4099e-9 kg; lognormal variance with pedigree 2.97, pedigree (1,1,5,1,1)
  (same comment as for Aluminium)
- Silicon [water, surface water]: 0.00018788 kg; lognormal variance with pedigree 0.57, pedigree (1,1,5,1,1)
  (same comment as for Chromium VI)
- Sodium, ion [water, surface water]: 0.002186 kg; lognormal variance with pedigree 0.67, pedigree (1,1,5,1,1)
  (same comment as for Chromium VI)
- TOC, Total Organic Carbon [water, ground-, long-term]: 0.00010355 kg; lognormal variance with pedigree 0.11, pedigree (1,1,5,1,1)
  (same comment as for Aluminium)
- Mercury [soil, agricultural]: 5.3452e-8 kg; lognormal variance with pedigree 0.71, pedigree (1,1,5,1,1)
  (same comment as for Chromium)
- Nickel, ion [water, surface water]: 3.9966e-6 kg; lognormal variance with pedigree 0.66, pedigree (1,1,5,1,1)
  (same comment as for Chromium VI)
- Carbon dioxide, non-fossil [air, urban air close to ground]: 0.19253 kg; lognormal variance with pedigree 0.06, pedigree (1,1,5,1,1)
  direct wastewater treatment plant emission plus direct digester gas emission plus emission from sludge incineration. Uncertainty calculated from wastewater composition and treatment model
- Cobalt [soil, agricultural]: 3.0813e-7 kg; lognormal variance with pedigree 0.71, pedigree (1,1,5,1,1)
  (same comment as for Chromium)
- Mercury [air, urban air close to ground]: 3.3683e-13 kg; lognormal variance with pedigree 0.74, pedigree (1,1,5,1,1)
  (same comment as for Nickel)
- Nickel [soil, agricultural]: 1.003e-6 kg; lognormal variance with pedigree 0.71, pedigree (1,1,5,1,1)
  (same comment as for Chromium)
- Sulfur [soil, agricultural]: 0.00059517 kg; lognormal variance with pedigree 0.11, pedigree (1,1,5,1,1)
  (same comment as for Chromium)
- Chromium, ion [water, surface water]: 1.1775e-8 kg; lognormal variance with pedigree 0.72, pedigree (1,1,5,1,1)
  (same comment as for Aluminium)
- Molybdenum [soil, agricultural]: 1.8236e-7 kg; lognormal variance with pedigree 0.71, pedigree (1,1,5,1,1)
  (same comment as for Chromium)
- Zinc [soil, agricultural]: 2.9219e-5 kg; lognormal variance with pedigree 0.71, pedigree (1,1,5,1,1)
  (same comment as for Chromium)
- Iron, ion [water, ground-, long-term]: 0.003812 kg; lognormal variance with pedigree 0.99, pedigree (1,1,5,1,1)
  (same comment as for Aluminium)
- TOC, Total Organic Carbon [water, surface water]: 0.0072994 kg; lognormal variance with pedigree 0.08, pedigree (1,1,5,1,1)
  (same comment as for Chromium VI)
- Calcium [air, urban air close to ground]: 5.0981e-6 kg; lognormal variance with pedigree 0.73, pedigree (1,1,5,1,1)
  (same comment as for Nickel)
- Sulfate [water, surface water]: 0.1449 kg; lognormal variance with pedigree 0.08, pedigree (1,1,5,1,1)
  (same comment as for Chromium VI)

## Extrapolations
This dataset has been extrapolated from year 2000 to the year of the calculation (2019). The uncertainty has been adjusted accordingly.

## Review by Niels Jungbluth 2009-01-22
passed.
