# wood preservation, oscillating pressure method, inorganic salt, containing Cr, outdoor use, ground contact

Dataset: EcoSpold 2, unit process
Geography: RER
Time period: 2012-01-01 to 2019-12-31
Technology level: current
Classification: EcoSpold01Categories: wooden materials/refinement
Classification: ISIC rev.4 ecoinvent: 1610:Sawmilling and planing of wood
Scenario: Business-as-Usual
System model: Allocation at the point of substitution
Generated by: trainee ecoinvent
Published in: Künniger T. 2000
Database: ecoinvent
isCopyrightProtected: true
accessRestrictedTo: 1

## General comment
This dataset covers the treatment of undried timber with inorganic CCB (chromium, copper, boron) salt with the oscillating pressure method.
Wood is not included in the dataset.
Pressure processes have been used for more than 150 years for impregnating wood with preservatives. The choice of the pressure process depends on the intended use, the nature and quality of the preservative, and the moisture level of the wood at the time of treatment.The oscillating pressure method was developed to impregnate green cordwood, particularly roundwood that is difficult to treat in the dry state. In this process, vacuum and pressure phases alternate, wheregy the phase changeover occurs in tess than a second. During the vacuum phases a small quantity of liquid is sucked out of the wood, and in the compression phases the salt solution is pressed in. As the impregnation period continues the pressure phases increase in lenght. For example, with green spruces, ca. 400 phase changes occur during the ca. 22-h impregnation process. Here the sap still present in the wood is continuously replaced by preservative liquid with an increase in the impregnation of the sapwood. For wood that is difficult to impregnate, the oscillating pressure method gives better impregnation and greated penetration depths than the vacuum-pressure method (also called full-cell or saturation impregnation method). Only water-borne preservaties are used.
The following figure illustrates the prinicple of the oscillating pressure method.
Depending on the use class envisaged for the treated timber, the following preservative inputs can be assumed (for softwood): use class 3: 7.5 kg/m3 for spruce and fir and 9 kg/m3 for pine; use class 4: 12 kg/m3 for spruce, fir and pine (according to requirements for Lignum quality label for pressure impregnated wood (status 11/2011).
In a variation of the oscillating pressure method, the usual vacuum phases are omitted (e.g. in the "Hamburg"-method). In intervals of minutes, pressure is produced slowly in the cyclinder, maintained for a short time, and then reduced to atmospheric again. The lenghts of the cycles is of the order of minutes and remains constant during the impegnation process. The number of cycles is considerably fewer than in the conventional oscillating pressure process. By usingt the air compressed in the wood, the sap is continually enriched and replaced by salt preservative solution.
In principle, the process can be carried out in any pressure plant, provided that automatic plant control for cyclic pressure changes is available. The following figure provides a schematic of an oscillating pressure plant.
The process does not cause any waste water; preservatives from dripping or leaching during storage are recovered and recycled. Emissions into surface water from run-off water are calculated based on emission factors (EF) as determined in OECD (2000, part 1), depending on the physical properties of the main componentes of the wood preservative. It is assumed in addition that all solvents (incl. water) are evaporated during drying and fixation. For acids and salts, no emissions into air are inventoried. The determination of emission factors is documented in the following table:
For detailed modelling and scenario assumptions, see dataset.
Sources:
OECD (2000): Emission scenario document for wood preservatives, part 1. OECD series on emission scenario documents, number 2, Organisation for Economic Co-operation and Development, Paris.
Künniger, T. and K. Richter (2000): Ökobilanzen von Konstruktionen im Garten- und Landschaftsbau [Environmental assessment of constructions of garden and landscape architecture]. Eidg. Materialprüfungs- und Forschungsanstalt (EMPA), Dübendorf.
Personal written communications of several producers and/or researchers (see source fields for each exchange)

## Included activities start
Service starting with the reception of the wood preservative at the factory gate

## Included activities end
The data set contains the treatment service of undried wood with wood preservative based on inorganic CCB salts with the oscillating pressure method. It covers the necessary inputs of the wood preservative, electricity, ingredients for waste water/surface water treatment as well as some infrastructure. For the inventorying of emissions into surface water and air, see general comment. The dataset does not include wood. Also eventual waste streams (e.g. saw dust recollected from the pressure vessel) are not included.

## Parameters
- share of collected rainwater: 0.5 dimensionless; name share_collected_rainwater
  share of the rainwater that is colleced and lead into the sewer contrary to run-off water; default value according to OECD (2000, part 1)
- efficiency of air filter: 0.75 dimensionless; name efficiency_air_filter
  According to EPA 1999 (p. 10.8-5) 'the result of one emission test on the incinerator-controlled facility indicated a VOC control efficiency of more than 99 percent'. Other emissions control devices such as knock-out tanks followed by a ventury scrubber are indicated to have a VOC control efficiency of 75% (same source).

## Reference product
- wood preservation, oscillating pressure method, inorganic salt, containing Cr, outdoor use, ground contact: 1 kg; CPC 54730: Painting services; By-product classification allocatable product
  production volume 2.53872e6 kg; name p_preservation; = 2100 * 1000/3429519*16584000 * 0.5* 0.5
    estimated from annual production of salt-based preservatives for pressure treatment in DE: 2000-2200 t (OECD 2000), extrapolated to RER via GDP, assuming 50% Cr-free preservatives and 50% oscillating pressure method/50% vacuum pressure.
  property price 0.989 EUR2005
    Calculated based on inputs: The price of the product has been calculated as a sum of the values of the material and energy inputs for this product. This value is therefore a rough estimation. It may underestimate the real price since there are additional expenses when producing any product. These expences can include for example labour costs, treatment of waste materials and profit for the producer. Please consider carefully whether this level of data quality is acceptable for your application.

## Inputs from technosphere
- sodium hydroxide, without water, in 50% solution state: 0.010656 kg; = share_collected_rainwater*0.333/0.5*0.32/10; source Leuenberger H. 2012; lognormal variance with pedigree 0.0039, pedigree (2,3,3,3,1)
  Used for treatment of wastewater, mainly from recollection of rainwater from storage area; consumption largely depending on annual rainfall, less on production volume; adaption to 32% concentration. Normalized to 1 kg preservative, assume an average input of 10 kg/m3.
  properties: dry mass 1 kg, wet mass 1 kg
- wood preservation facility, oscillating pressure method: 2.22222e-7 unit; = 1/6000/75/10; source Leuenberger H. 2012; lognormal variance with pedigree 0.372, pedigree (3,5,3,1,1)
  per 6000 m3/year over 75 years with an average input of 10 kg preservative/m3
- electricity, medium voltage: 1.15 kWh; = 41.4/3.6/10; source Künniger T. 2000; lognormal variance with pedigree 0.016, pedigree (1,4,3,5,1)
  Conversion from MJ to kWh; value confirmed personal communication by Mr. H. Leuenberger, Holzmprägnierwerk Waldkirch. Normalized to 1 kg preservative, assume an average input of 10 kg/m3
- tap water: 15 kg; name m_tapwater; = 150/10; source Leuenberger H. 2012; lognormal variance with pedigree 0.0039, pedigree (2,3,3,3,1)
  Used as process water. Normalized to 1 kg preservative, assume an average input of 10 kg/m3.
  property carbon content, fossil 0.00178991; name C_content_fossil
  property wet mass 1 kg; name WM
  property water in wet mass 0.999663 kg; name WWM
  property dry mass 0.000337476 kg; name DM
  property carbon content, non-fossil 0; name C_content_non_fossil
  property water content 2962.17; name water_content
- wood preservative, inorganic salt, containing Cr: 1 kg; source Künniger T. 2000; lognormal variance with pedigree 0.002, pedigree (1,1,3,1,1)
  input of preservative
  properties: wet mass 1 kg, dry mass 1 kg
- sulfuric acid: 0.025 kg; = share_collected_rainwater*0.5/10; source Leuenberger H. 2012; lognormal variance with pedigree 0.0039, pedigree (2,3,3,3,1)
  used for treatment of wastewater, mainly from recollection of rainwater from storage area; consumption largely depending on annual rainfall, less on production volume. Normalized to 1 kg preservative, assume an average input of 10 kg/m3.
  properties: wet mass 1 kg, dry mass 1 kg

## Emissions to nature
- Sodium, ion [water, unspecified]: 0.000167476 kg; = (1-share_collected_rainwater)*0.10/412*2*23*0.03; source OECD 2000; lognormal variance with pedigree 0.0045, pedigree (1,1,3,1,1)
  from disodium octaborate (molar relations)
- Water [air, unspecified]: 0.0152735 m3; = (m_tapwater+0.2735)/1000; lognormal variance with pedigree 0.0045, pedigree (1,1,3,1,1)
  tap water plus water in preservative
- Nitrite [water, unspecified]: 0.000375 kg; = (1-share_collected_rainwater)*0.025*0.03; source OECD 2000; lognormal variance with pedigree 0.0901, pedigree (3,5,5,3,1)
  from nitric acid
- Borate [water, unspecified]: 0.00362656 kg; = (1-share_collected_rainwater)*(0.10*((412-2*23)/412)*0.03+0.12/61.83*(10.8+4*(16+1))*0.03); source OECD 2000; lognormal variance with pedigree 0.0901, pedigree (3,5,5,3,1)
  as octoborate ions from disodium octaborate and tetrahydroxy borate (B(OH4)) ions from boric acid; molar relations x emission factor
- Dichromate [water, unspecified]: 0.0034322 kg; = (1-share_collected_rainwater)*0.25/118*52/(2*52)*(2*52+7*16)*0.03; source OECD 2000; lognormal variance with pedigree 0.0901, pedigree (3,5,5,3,1)
  from chromic acid, converted to equivalent of dichromate ([Cr2O2]2-) per chrome in chromic acid (molar relations).
- Copper, ion [water, unspecified]: 3.98734e-6 kg; = (1-share_collected_rainwater)*0.1/(63+16)*63*0.0001; source OECD 2000; lognormal variance with pedigree 0.0901, pedigree (3,5,5,3,1)
  proxy for copper (II)oxid solved in acids; molar relation x emission factor

## Sampling procedure
Plant measurements for input of energy, water, etc. Estimates based on literature for air-borne emissions and emissions into water.

## Extrapolations
This dataset has been extrapolated from year 2012 to the year of the calculation (2019). The uncertainty has been adjusted accordingly.
