# treatment of automobile catalyst

Dataset: EcoSpold 2, unit process
Geography: RER
Time period: 1995-01-01 to 2019-12-31
Technology level: current
Classification: ISIC rev.4 ecoinvent: 2420:Manufacture of basic precious and other non-ferrous metals
Classification: EcoSpold01Categories: metals/extraction
Synonyms: platinumgroup metal
Tags: ConvertedDataset
Scenario: Business-as-Usual
System model: Allocation at the point of substitution
Share of production covered: 4.6 %
Generated by: Mischa Classen
Published in: Althaus H.-J. 2000
Database: ecoinvent
isCopyrightProtected: true
accessRestrictedTo: 1

## General comment
This dataset describes the production of 0.264 kg of secondary palladium, 0.208 kg of secondary rhodium, and 0.528 kg of secondary platinum, by means of treatment of automobile catalysts, in 2002. 400 kg of spent automobile catalyst are recycled in the process. Other sources of secondary PGM are neglected. The smelter slag disposal is inventoried as disposal of inert material, thus neglecting potentially important (but unknown) heavy metal emissions. Process data is deemed non satisfactory.
[This dataset was already contained in the ecoinvent database version 2. It was not individually updated during the transfer to ecoinvent version 3. Life Cycle Impact Assessment results may still have changed, as they are affected by changes in the supply chain, i.e. in other datasets. This dataset was generated following the ecoinvent quality guidelines for version 2. It may have been subject to central changes described in the ecoinvent version 3 change report (http://www.ecoinvent.org/database/ecoinvent-version-3/reports-of-changes/), and the results of the central updates were reviewed extensively. The changes added e.g. consistent water flows and other information throughout the database. The documentation of this dataset can be found in the ecoinvent reports of version 2, which are still available via the ecoinvent website. The change report linked above covers all central changes that were made during the conversion process.]

## Included activities start
From the collection of spoiled automobile catalysts, at different locations outside the factory.

## Included activities end
This activity ends with an hydrometallurgical purification step, at the factory gate.

The dataset includes the transportation of scrap to the intermediary dealer, beneficiation of the collected scrap, a pirometallurgy step, and the production, application and emissions of most importante agents.

## Geography
Data for Germany are used in this module for Europe. Some agents used like lime or transport originate from data sets are valid only for Switzerland.

## Technology
The production process consists of three steps: Collection, Beneficiation and Refining.
COLLECTION:
Spoiled automotive catalysts are bought by specialised enterprises from different origins. Part of it originates from scrap dealer recycling end-of-life cars. Further more during the cars operating phase, defective catalysts are exchanged in garages. The third sources is the production waste, i. e. defective catalysts which do not reach market. In most cases, there are fix agreements between the different supplier and the intermediary trade. Although the trade with PGM containing scrap is risky. Motor car manufacturer built up their own internal recycling systems with their contractor garages and gained access to exchanged catalysts.
Emissions: Emissions during collection are gases from transportation and dust from dismantling. Also in this step the combustion leads to emissions of SO2. No serious water emissions are reported.
BENEFICIATION:
The catalysts are dismantled and then sold to refining companies. Refineries too have long-term contracts with the intermediary trade.
Emissions: Emissions during beneficiation are gases from transportation and dust from dismantling. Also in this step the combustion leads to emissions of SO2. No serious water emissions are reported.
REFINING:
The scrap first is shredded and then pyrometallurgicaly processed: The scrap is smelted in an electric arc furnace, and the ceramic wafer is slagged. The PGMs are concentrated in the collector metal, usually copper. Low-content PGM scrap is often smelted together with other non-ferrous metal matte. This is cheap, but effects a high loss in PGM. The collector matte from the furnace then is treated hydrometallurgically by re-precipitation. In this step usually production scrap from other industries (glass, chemical laboratories) is joined. The overall PGM-yield is 98 % for platinum and 85 % for rhodium.
Emissions: Dust and metals are generally emitted from incinerators and furnaces. VOC can be emitted from solvent extraction processes, while organic compounds, namely dioxins, can be emitted from smelting stages resulting from the poor combustion of oil and plastic in the feed material. All these emissions are subject to abatement technologies and controlling. Effluents from refining contain considerable amounts of metals and organic substances.
Waste: Solid residues from pyrometallurgical step are usually re-used in copper facilities, final residues generally comprise hydroxide filter cakes.
References:
Hagelücken C. (2001b) Die Märkte der Katalysatormetalle Platin, Palladium und Rhodium. In: Autoabgaskatalysatoren, Vol. 612. pp. 95-115. Expert Verlag, Renningen. Online-Version under: http://www.dmc-2.de/pmc_eng/Veroeffentlichungen_2/Die%20M%C3%A4rkte%20der%20Katalysatormetalle%20Pt%20Pd%20Rh.pdf.

## Reference product
- spent automobile catalyst: 0 kg; name sa_catalyst_RP; source Hochfeld C. 1997; By-product classification Recyclable; CPC 39990: Other wastes n.e.c.
  Estimation: Average recoverable PGM content 0.25%.
  production volume 0 kg; name sa_catalyst_RP_PV; = 5508181.8*0.33059
    Calculated in relationship to the amount of palladium produced in this activity.
  property price 0 EUR2005
    Price assumed to be zero as the material needs further treatment
- palladium: 1 kg; CPC 4160: Other non-ferrous metals and articles thereof (including waste and scrap of some metals); cermets and articles […]; By-product classification allocatable product
  EcoSpold01Location=RER
  Palladium is silvery-white in colour, just like platinum. Its melting point is the lowest of all PMG, but it is still high compared to other popular metals. It is also the least dense of the PMGs. It has also high temperature stability and corrosion resistance. The rarest of all PGMs apart from iridium, palladium is also a good oxidation catalyst, conductive, oxidation resistant and ductile when annealed.
  Palladium has the ability to absorb big amounts of hydrogen. This makes it an efficient and safe hydrogen storage medium and purifier. It is also used in chemical processes that require hydrogen exchange between two reactants, such as that which produces butadiene and cyclohexane, the raw materials for synthetic rubber and nylon.
  Palladium's catalytic qualities make it necessary in catalytic converters and air purification equipment. Its chemical stability and electrical conductivity lead to more effective and durable plating than using gold in electronic components.
  Estimation from dataset author.
  production volume 1201.83 kg

## By-products
- platinum: 0 kg; name platinum_byP; CPC 41330: Platinum, unwrought or in semi-manufactured forms, or in powder form; By-product classification allocatable product
  Platinum is a silvery-white metal and is probably best known for its use in jewellery. However, jewellery actually represents only about 38% of overall platinum use, an equivalent volume of platinum is used in catalytic converters, with the remaining 20% being used in other industrial applications.
  Platinum is hard and extremely dense. Platinum and its relatives, iridium and osmium, are the most dense metals known (platinum is nearly twice as dense as lead and 11% more dense than gold). It has a high melting point and high temperature stability and corrosion resistance; and it is a good oxidation catalyst, conductive and oxidation resistant. It’s biological compatibility makes it an important component in medical applications.
  Estimation from dataset author.
  EcoSpold01Location=RER
  production volume 0 kg; = platinum_byP/ABS( sa_catalyst_RP)*sa_catalyst_RP_PV
    Calculated in relationship to the amount of palladium produced in this activity.
  property price 20600 EUR2005
    Temporary price data. Calculated as 90% of purchasers price based on: 2004 price from USGS (2007) Mineral commodity summaries 2007. <http://minerals.usgs.gov/minerals/pubs/mcs/2007/mcs2007.pdf> [Accessed 25 May 2010]
  property carbon content 0
    carbon content on a dry matter basis (reserved; not for manual entry)
  properties: carbon content, fossil 0, wet mass 1 kg, water content 0, water in wet mass 0 kg, dry mass 1 kg, carbon content, non-fossil 0, carbon allocation 0 kg
- palladium: 0 kg; name palladium_byP; CPC 4160: Other non-ferrous metals and articles thereof (including waste and scrap of some metals); cermets and articles […]; By-product classification allocatable product
  (same comment as for palladium)
  production volume 0 kg; = palladium_byP/ABS( sa_catalyst_RP)*sa_catalyst_RP_PV
    Calculated based on literature data and estimates. The annual global production volume of palladium in 2005 is 219 ton (http://minerals.usgs.gov/minerals/pubs/commodity/platinum/platimcs07.pdf). It is calculated, that the amount of secondary palladium is approximatelly 8.3%, i.e. 18.2 ton. It is estimated, that 20% of this amount is produced by treatment of automotive catalyst. The local production volume is calculated by scaling the global production volume using GDP of 2005 (source: United Nations, http://data.un.org/Glossary.aspx?q=GDP+%28current+US%24%29, accessed 20130726 and 20130312).
  property price 5640 EUR2005
    (same comment as for platinum)
  property carbon content 0
    carbon content on a dry matter basis (reserved; not for manual entry)
  properties: dry mass 1 kg, wet mass 1 kg, water content 0, water in wet mass 0 kg, carbon content, fossil 0, carbon content, non-fossil 0, carbon allocation 0 kg
- rhodium: 0 kg; name rhodium_byP; By-product classification allocatable product; CPC 4160: Other non-ferrous metals and articles thereof (including waste and scrap of some metals); cermets and articles […]
  Rhodium's hardness makes it an alloying agent to harden platinum. With this hardness, along with its high melting point, high temperature stability and corrosion resistance, rhodium is used in many industrial processes such as glass, glass fibre and nitric acid production. Like other PGMs, Rhodium has catalytic qualities, an thus is used in catalytic converters.
  Estimation from dataset author.
  EcoSpold01Location=RER
  production volume 0 kg; = rhodium_byP/ABS( sa_catalyst_RP)*sa_catalyst_RP_PV
    Calculated in relationship to the amount of palladium produced in this activity.
  property price 23800 EUR2005
    (same comment as for platinum)
  property carbon content 0
    carbon content on a dry matter basis (reserved; not for manual entry)
  properties: water content 0, wet mass 1 kg, carbon content, non-fossil 0, water in wet mass 0 kg, carbon content, fossil 0, dry mass 1 kg, carbon allocation 0 kg

## Inputs from technosphere
- electricity, medium voltage: 0 kWh; source Hochfeld C. 1997; pedigree (1,1,1,1,1)
  EcoSpold01Location=UCTE
  Calculated value: Total emission values result from the addition of the emissions values of the following steps: Beneficiation and refining.
  BENEFICIATION: 20 KWh
  Literature value: This consumption is for the grinding, for 1 big German plant.
  REFINING: 600 KWh
  Literature value: This comsumption is for the smelting, for 1 big German plant.
- chemical factory, organics: 0 unit; source IPPC 2001; pedigree (1,1,1,1,1)
  EcoSpold01Location=RER
  Modelled, based on “ISIC 2420” - pdf-document on the dedicated talk page of ecoinvent (www.ecoinvent.org/documentation)
  See part Regarding “treatment of automobile catalyst, RER 2002” dataset.
- inert waste, for final disposal: 0 kg; name inert_waste; source Hochfeld C. 1997; pedigree (1,1,1,1,1)
  Literature value.
  EcoSpold01Location=CH
  production volume 0 kg; = inert_waste/ABS( sa_catalyst_RP)*sa_catalyst_RP_PV
    Calculated in relationship to the amount of palladium produced in this activity.
  property price 0 EUR2005; name inert_waste_price_EUR2005
  properties: water content 0.00502513, wet mass 1 kg, dry mass 0.995 kg
- lime, hydrated, loose weight: 0 kg; source Hochfeld C. 1997; pedigree (1,1,1,1,1)
  EcoSpold01Location=CH
  Literature value.
  properties: dry mass 0.997 kg, water content 0.00300903, wet mass 1 kg
- heat, district or industrial, natural gas: 0 MJ; source IPPC 2001; pedigree (1,1,1,1,1)
  Modelled, based on “ISIC 2420” - pdf-document on the dedicated talk page of ecoinvent (www.ecoinvent.org/documentation)
  See part Regarding “treatment of automobile catalyst, RER 2002” dataset.
  EcoSpold01Location=RER
- copper: 3.80119 kg; source Hochfeld C. 1997; lognormal variance with pedigree 0.1301, pedigree (4,2,5,5,4)
  EcoSpold01Location=RER
  Literature value.
  properties: dry mass 1 kg, wet mass 1 kg
- electricity, medium voltage: 1060.03 kWh; source Hischier R. 2007; lognormal variance with pedigree 0.0513, pedigree (2,3,5,3,1)
  Value taken from shredding of electric waste. Pedigree matrix changed accordingly. Original comment:literature values - based on survey of European companies
  EcoSpold01Location=UCTE
  Uncertainty: literature values - based on survey of European companies
- waste plastic, mixture: -0.71347, -0.0550043, -0.0227188, -0.0215736, -0.823219, -0.00917812, -0.00415989, -5.76299 kg (8 suppliers, which the file names only by identifier); sum of these -7.41231 kg; source H.-J. Althaus 2010; lognormal variance with pedigree 0.0504, pedigree (2,3,5,4,3)
  Sum of plastic materials in ICE dataset. The final output has been calculated based on ecoinvent transfer coefficients from weee shredding (ecoinvent report 18, p.21). Details on the materialization of the ICE are given in Althaus and Gauch 2010.
- lead: 24.7077 kg; source H.-J. Althaus 2010; lognormal variance with pedigree 0.0444, pedigree (2,4,5,4,2)
  Based on a Volkswagen Golf A4 materialization.
- ethylene glycol: 13.3042 kg; source H.-J. Althaus 2010; lognormal variance with pedigree 0.0444, pedigree (2,4,5,4,2)
  Based on a Volkswagen Golf A4 materialization.
- synthetic rubber: 5.70178 kg; source H.-J. Althaus 2010; lognormal variance with pedigree 0.0444, pedigree (2,4,5,4,2)
  Based on a Volkswagen Golf A4 materialization.
- steel, low-alloyed, hot rolled: 205.635 kg; source H.-J. Althaus 2010; lognormal variance with pedigree 0.0444, pedigree (2,4,5,4,2)
  Based on a Volkswagen Golf A4 materialization.
- used internal combustion engine, from passenger car: -522.663 kg; source H.-J. Althaus 2010
  production volume 1.65e10 kg
- wire drawing, copper: 3.80119 kg; source H.-J. Althaus 2010; lognormal variance with pedigree 0.0444, pedigree (2,4,5,4,2)
  Based on a Volkswagen Golf A4 materialization.
- injection moulding: 25.0878 kg; source H.-J. Althaus 2010; lognormal variance with pedigree 0.0444, pedigree (2,4,5,4,2)
  Based on a Volkswagen Golf A4 materialization.
- heat, district or industrial, natural gas: 1099.65 MJ; source H.-J. Althaus 2010; lognormal variance with pedigree 0.0444, pedigree (2,4,5,4,2)
  Extrapolated from ecoinvent v2.2 passenger car.
- polyphenylene sulfide: 52.2663 kg; source H.-J. Althaus 2010; lognormal variance with pedigree 0.0444, pedigree (2,4,5,4,2)
  Based on a Volkswagen Golf A4 materialization.
- heat, district or industrial, other than natural gas: 31.2063 MJ; source H.-J. Althaus 2010; lognormal variance with pedigree 0.0444, pedigree (2,4,5,4,2)
  Extrapolated from ecoinvent v2.2 passenger car.
- road vehicle factory: 1.44144e-7 unit; source H.-J. Althaus 2010; lognormal variance with pedigree 0.0444, pedigree (2,4,5,4,2)
  Based on a Volkswagen Golf A4 materialization.
- aluminium, cast alloy: 323.234 kg; source H.-J. Althaus 2010; lognormal variance with pedigree 0.0444, pedigree (2,4,5,4,2)
  Based on a Volkswagen Golf A4 materialization.
- platinum: 0.00304095 kg; source H.-J. Althaus 2010; lognormal variance with pedigree 0.0444, pedigree (2,4,5,4,2)
  Based on a Volkswagen Golf A4 materialization.
- tap water: 1594.99 kg; source H.-J. Althaus 2010; lognormal variance with pedigree 0.0444, pedigree (2,4,5,4,2)
  Based on a Volkswagen Golf A4 materialization.
- palladium: 0.000570178 kg; source H.-J. Althaus 2010; lognormal variance with pedigree 0.0444, pedigree (2,4,5,4,2)
  Based on a Volkswagen Golf A4 materialization.
- reinforcing steel: 79.8249 kg; source H.-J. Althaus 2010; lognormal variance with pedigree 0.0444, pedigree (2,4,5,4,2)
  Based on a Volkswagen Golf A4 materialization.
- polyethylene, high density, granulate: 29.2691 kg; source H.-J. Althaus 2010; lognormal variance with pedigree 0.0444, pedigree (2,4,5,4,2)
  Based on a Volkswagen Golf A4 materialization.
- aluminium scrap, new: -7.6222, -57.0246 kg (2 suppliers, which the file names only by identifier); sum of these -64.6468 kg; source H.-J. Althaus 2010; lognormal variance with pedigree 0.0444, pedigree (2,4,5,4,2)
  Scrap fraction from production process.
  production volume 2.04084e9 kg
- sulfuric acid: 0.281856, 1.61874 kg (2 suppliers, which the file names only by identifier); sum of these 1.90059 kg; source H.-J. Althaus 2010; lognormal variance with pedigree 0.0444, pedigree (2,4,5,4,2)
  Based on a Volkswagen Golf A4 materialization.
- lubricating oil: 1.98418, 9.41938 kg (2 suppliers, which the file names only by identifier); sum of these 11.4036 kg; source H.-J. Althaus 2010; lognormal variance with pedigree 0.0444, pedigree (2,4,5,4,2)
  Based on a Volkswagen Golf A4 materialization.

## Emissions to nature
- Particulates, > 10 um [air, non-urban air or from high stacks]: 0 kg; source IPPC 2001; pedigree (1,1,1,1,1)
  Modelled, based on “ISIC 2420” - pdf-document on the dedicated talk page of ecoinvent (www.ecoinvent.org/documentation)
  See part Regarding “treatment of automobile catalyst, RER 2002” dataset.
- Nitrogen oxides [air, non-urban air or from high stacks]: 0 kg; source IPPC 2001; pedigree (1,1,1,1,1)
  (same comment as for Particulates, > 10 um)
- Particulates, < 2.5 um [air, non-urban air or from high stacks]: 0 kg; source IPPC 2001; pedigree (1,1,1,1,1)
  (same comment as for Particulates, > 10 um)
- Carbon dioxide, fossil [air, unspecified]: 0 kg; pedigree (1,1,1,1,1)
  Estimation from dataset author.
- Sulfur dioxide [air, non-urban air or from high stacks]: 0 kg; source IPPC 2001; pedigree (1,1,1,1,1)
  (same comment as for Particulates, > 10 um)
- Particulates, > 2.5 um, and < 10um [air, non-urban air or from high stacks]: 0 kg; source IPPC 2001; pedigree (1,1,1,1,1)
  (same comment as for Particulates, > 10 um)
- BOD5, Biological Oxygen Demand [water, unspecified]: 0.0128788 kg; source H.-J. Althaus 2010; lognormal variance with pedigree 0.0838, pedigree (2,4,5,4,2)
  Extrapolated from ecoinvent v2.2 passenger car.
- Water [air, unspecified]: 0.239249 m3; lognormal variance with pedigree 0.130025, pedigree (4,4,5,2,4)
  Calculated value based on literature values and expert opinion. See comments in the parametres' comment field.
- Phosphate [water, unspecified]: 0.000495338 kg; source H.-J. Althaus 2010; lognormal variance with pedigree 0.0838, pedigree (2,4,5,4,2)
  Extrapolated from ecoinvent v2.2 passenger car.
- TOC, Total Organic Carbon [water, unspecified]: 0.0354074 kg; lognormal variance with pedigree 0.0838, pedigree (2,4,5,4,2)
  Derived from COD as described in ecoinvent 3 Data Quality Guidelines (p. 49, paragraph 5.9.7). The same Pedigree matrix value as COD has been used.
- COD, Chemical Oxygen Demand [water, unspecified]: 0.0956004 kg; source H.-J. Althaus 2010; lognormal variance with pedigree 0.0838, pedigree (2,4,5,4,2)
  Extrapolated from ecoinvent v2.2 passenger car.
- DOC, Dissolved Organic Carbon [water, unspecified]: 0.0354074 kg; lognormal variance with pedigree 0.0838, pedigree (2,4,5,4,2)
  (same comment as for TOC, Total Organic Carbon)
- Water [water, unspecified]: 1.35574 m3; lognormal variance with pedigree 0.130025, pedigree (4,4,5,2,4)
  (same comment as for Water)
- NMVOC, non-methane volatile organic compounds, unspecified origin [air, unspecified]: 2.37763 kg; source H.-J. Althaus 2010; lognormal variance with pedigree 0.0838, pedigree (2,4,5,4,2)
  Extrapolated from ecoinvent v2.2 passenger car.

## Sampling procedure
Literature

## Extrapolations
see Geography and Technology

## Review by Emilia Moreno Ruiz 2014-05-26
PV adjusted

## Review by Roland Hischier 2011-12-09
Transfer of documentation done.

## Review by Roland Hischier 2004-05-28
Passed.
