# almond production

Dataset: EcoSpold 2, unit process
Geography: CN
Time period: 2009-01-01 to 2019-12-31
Technology level: current
Classification: ISIC rev.4 ecoinvent: 0125:Growing of other tree and bush fruits and nuts
Tags: WFLDB
Scenario: Business-as-Usual
System model: Allocation at the point of substitution
Generated by: Eliane Riedener
Published in: Nemecek T. 2015
Database: ecoinvent
isCopyrightProtected: true
accessRestrictedTo: 1

## General comment
This dataset represents the production of 1 kg of almonds. The average yield from 2009 - 2012 is 2.9 t/ha. The data are representative for almond production in China used for the export market. Mineral NPK fertiliser input is 103-30-29 kg/ha. No organic fertilisers are applied. Total active ingredients (a.i.) applied as pesticides amount to 11.1 kg a.i./ha.
The dataset was modelled within the project 'World Food LCA database (WFLDB)'. The aim of this project was to provide inventories of a broad variety of agricultural products and processes and to cover for each product at least 50% of the global export market. The export share of almonds produced in China amounts to 17% of the global export (tonnage exported in 2010). The production system regarded in this dataset aimed at representing almonds produced in China for the export market.
PEF-Quality: data quality rating (DQR) = 3.0 (i.e. good quality). This dataset refers to an average situation; for specific situations exchanges might differ substantially due to site specific parameters

## Included activities start
This activity starts with the nursery producing tree seedlings, i.e. grafted young trees to be planted.

## Included activities end
This activity ends with the waste treatment after the clearing of the orchard (rooting up the trees). The dataset includes all activities of a year in a year in the productive phase of the orchard including the establishment phase per year of lifetime (29 years, 249 trees/ha planted), the clearing of the orchard including waste treatment.
The establishment phase of the orchard includes tree nursery, soil cultivation, planting trees, sowing grass, and irrigation. Fertiliser and pesticide use in a year of the establishment phase is assumed to be half of the amount of a year in the productive phase.
The productive phase of the orchard includes machine operations, corresponding infrastructure, fuel use and sheds. Machine operations in the productive phase are: soil cultivation (mulching, mowing), fertiliser and pesticide application, prune, harvesting and irrigation. Further, direct field emissions and land use change are included. At the end of the productive phase the orchard is cleared by rooting up the trees.

Heavy metal uptake by the crop is considered.
The inputs of seedlings, fertilisers and pesticides as well as packaging of fertilisers and pesticides are considered.
Statistical data from FAO used to assess land use change is incomplete for China. The original land use of 40.9% of annual cropland and 100% of perennial cropland transformed in the last 20 years is unknown. Land use change impacts may therefore be underestimated.

## Technology
Conventional production

## Parameters
- LUC_crop_specific: 1
  This parameter allows to switch between a 'crop specific' and a 'country specific' approach when calculating the LUC of a crop. By default, the chosen approach is 'crop specific', so the value of the parameter is 1. If you want to apply a 'country specific' approach, turn the parameter to 0.
- heavyMetalUptakeSwitch: 1

## Reference product
- almond: 1 kg; CPC 01371: Almonds, in shell; By-product classification allocatable product
  Reference flow: Yield = 2922 kg/ha
  production volume 3.95e7 kg
    Source: FAOSTAT. Average, 2009-2012
  property price 5.6 EUR2005
    Calculated value based on data from United Nations Commodity Trade Statistics Database (comtrade.un.org). UN comtrade category: 80212 Almonds, fresh or dried, shelled. Year: 2005. Using exchange rate of 1EURO = 1.209 USD. Average of price of import into 5 main markets (EU, US, JP, IN and CN).
  property carbon content, non-fossil 0.626559
    calculation: C-content of components according to ecoinvent report No. 15a. Source of composition: Souci, S.W., Fachmann, W., Kraut, H. (Hg.: Bundesminsiterium fur Ernahrung, Landwirtschaft und Forsten, Bonn) 'Die Zusammensetzung der Lebensmittel - Nahrwerttabellen', medpharm Scientific Publishers Stuttgart, CRC Press; 2000.
  property carbon content 0.626559
    carbon content on a dry matter basis (reserved; not for manual entry)
  property true value 5.6
    allocation property applied in "true value" allocation // value calculated from revenue
  properties: carbon content, fossil 0, dry mass 0.946522 kg, water content 0.0565, water in wet mass 0.0534785 kg, wet mass 1 kg, carbon allocation 0.593052 kg

## By-products
- electricity, for reuse in municipal waste incineration only: 0 kWh; CPC 17100: Electrical energy; By-product classification allocatable product; pedigree (1,1,1,1,1)
  Net electricity generated from this waste and used in internal MSWI plant energy redistribution.
  Uncertainty: uncertainty is calculated from uncertainties in waste composition and uncertainties in energy efficiency and the uncertainty in internal energy demand
  production volume 875434 kWh
  property true value relation 3.6; name E_el_prod_MSWI_true_value_relation
    property to calculate "true value" from
  property price 0.1 EUR2005; name E_el_prod_MSWI_price_EUR2005
    Estimated to be the same price as in case of electricity, medium voltage.
  property exergy 3.6 MJ; name E_el_prod_MSWI_exergy
    This exergy property is based on the exergy content of the product.
  property true value 0.00285799
    allocation property applied in "true value" allocation // value calculated from true value relation
- heat, for reuse in municipal waste incineration only: 0 MJ; CPC 17300: Steam and hot water; By-product classification allocatable product; pedigree (1,1,1,1,1)
  (same comment as for electricity, for reuse in municipal waste incineration only)
  production volume 6.33388e6 MJ
  property exergy 0.1842 MJ; name E_th_prod_MSWI_exergy
    This exergy property is based on the exergy content of the product.
  property price 0.0106 EUR2005; name E_th_prod_MSWI_price_EUR2005
    Average European district heat price from Ecoheatcool and Euroheat 2005-2006, Ecoheat Work package 1: The European heat market. Final report. 10.6 EUR/GJ i s the price of district heat. http://www.solarthermalworld.org/files/Ecoheatcool%20WP1%20Web.pdf?download
  property true value relation 0.1842; name E_th_prod_MSWI_true_value_relation
    property to calculate "true value" from
  property true value 0.00105802
    (same comment as for electricity, for reuse in municipal waste incineration only)

## Inputs from technosphere
- swath, by rotary windrower: 0.00034198 ha; lognormal variance with pedigree 0.118177, pedigree (2,1,3,1,1)
  Estimation based on a modified MEXALCA-approach (Roches et al. 2010; Nemecek et al. 2012): See supporting documentation 'WFLDB-Documentation.pdf' chapter 'Machinery processes' for L2 data (https://ecoquery.ecoinvent.org/File/Reports).
- planting tree: 0.00293453 unit; lognormal variance with pedigree 0.118177, pedigree (2,1,3,1,1)
  Proxy: Similar crop and country used. This is the number of trees per ha divided by the lifetime years of the orchard.
- hoeing: 0.00034198 ha; lognormal variance with pedigree 0.118177, pedigree (2,1,3,1,1)
  (same comment as for swath, by rotary windrower)
- urea, as N: 0.0246568 kg; source Miles Harriman 2015; lognormal variance with pedigree 0.118177, pedigree (2,1,3,1,1)
  Calculated based on literature values or expert estimation: The total amount of nutrient (Personal written communication, Miles Harriman, Yara, 2015) multiplied by the share of fertiliser type (Personal written communication, Miles Harriman, Yara, 2015). See supporting documentation 'WFLDB-Documentation.pdf' chapter 'Fertiliser application' for L3 and L4 data (https://ecoquery.ecoinvent.org/File/Reports).
  Corresponds to 72.1 kg/ha
  properties: wet mass 1 kg, carbon content, fossil 0.2, dry mass 1 kg
- irrigation: 0.72934 m3; lognormal variance with pedigree 0.118177, pedigree (2,1,3,1,1)
  Calculated value: The total amount of water used for irrigation (calculated from evapotranspiration, Pfister et al. 2011) multiplied by the country-share of irrigation technique (WFLDB-Guidelines.pdf, Appendix 6.1). See supporting documentation 'WFLDB-Documentation.pdf' chapter 'Water use for irrigation' for L2 data (https://ecoquery.ecoinvent.org/File/Reports).
  properties: wet mass 1000 kg, water content 9089.91, dry mass 0.11 kg
- organophosphorus-compound, unspecified: 6.02625e-5 kg; lognormal variance with pedigree 0.00784984, pedigree (2,2,3,1,1)
  Proxy: Source for total amount of pesticides: extrapolated from MEXALCA. Active ingredient is calculated based on Ecoinvent dataset Almonds US. For calculations see supporting documentation 'WFLDB-Documentation.pdf' (https://ecoquery.ecoinvent.org/File/Reports).
  properties: wet mass 1 kg, carbon content, fossil 0.260898, dry mass 1 kg
- transport, tractor and trailer, agricultural: 0.00383873 metric ton*km; lognormal variance with pedigree 0.156439, pedigree (4,1,3,1,1)
  On-farm transport: Yield (in tonnes) multiplied by the average distance from field to farm. The distance was obtained by extrapolation (modified MEXALCA approach). See supporting documentation 'WFLDB-Documentation.pdf' chapter 'Machinery processes' (https://ecoquery.ecoinvent.org/File/Reports). Corresponds to 11.2tkm/ha.
- phosphate fertiliser, as P2O5: 0.0102594 kg; source Miles Harriman 2015; lognormal variance with pedigree 0.118177, pedigree (2,1,3,1,1)
  Calculated based on literature values or expert estimation: The total amount of nutrient (Personal written communication, Miles Harriman, Yara, 2015) multiplied by the share of fertiliser type (Personal written communication, Miles Harriman, Yara, 2015). See supporting documentation 'WFLDB-Documentation.pdf' chapter 'Fertiliser application' for L3 and L4 data (https://ecoquery.ecoinvent.org/File/Reports).
  Corresponds to 30.0 kg/ha
  properties: wet mass 1 kg, dry mass 1 kg
- ammonium nitrate, as N: 0.0105672 kg; source Miles Harriman 2015; lognormal variance with pedigree 0.118177, pedigree (2,1,3,1,1)
  Calculated based on literature values or expert estimation: The total amount of nutrient (Personal written communication, Miles Harriman, Yara, 2015) multiplied by the share of fertiliser type (Personal written communication, Miles Harriman, Yara, 2015). See supporting documentation 'WFLDB-Documentation.pdf' chapter 'Fertiliser application' for L3 and L4 data (https://ecoquery.ecoinvent.org/File/Reports).
  Corresponds to 30.9 kg/ha
  properties: dry mass 1 kg, wet mass 1 kg
- [sulfonyl]urea-compound: 0.000125751 kg; lognormal variance with pedigree 0.00784984, pedigree (2,2,3,1,1)
  (same comment as for organophosphorus-compound, unspecified)
  properties: wet mass 1 kg, dry mass 1 kg, carbon content, fossil 0.540853
- potassium chloride, as K2O: 0.00991743 kg; source Miles Harriman 2015; lognormal variance with pedigree 0.118177, pedigree (2,1,3,1,1)
  Calculated based on literature values or expert estimation: The total amount of nutrient (Personal written communication, Miles Harriman, Yara, 2015) multiplied by the share of fertiliser type (Personal written communication, Miles Harriman, Yara, 2015). See supporting documentation 'WFLDB-Documentation.pdf' chapter 'Fertiliser application' for L3 and L4 data (https://ecoquery.ecoinvent.org/File/Reports).
  Corresponds to 29.0 kg/ha
  properties: dry mass 1 kg, wet mass 1 kg
- waste wood, untreated: -0.45586 kg; lognormal variance with pedigree 0.118177, pedigree (2,1,3,1,1)
  Wood from trees after 1-2 years of sorrage at the field (20% water) per lifetime year (20 years) of the orchard
  production volume 1.80191e7 kg
    Calculated from the reference product amount and production volume
  properties: wet mass 1 kg, carbon content, non-fossil 0.48632, dry mass 0.8 kg, water content 0.25
- glyphosate: 0.000301742 kg; lognormal variance with pedigree 0.00784984, pedigree (2,2,3,1,1)
  (same comment as for organophosphorus-compound, unspecified)
  properties: wet mass 1 kg, dry mass 1 kg, carbon content, fossil 0.214286
- mowing, by rotary mower: 0.00205188 ha; lognormal variance with pedigree 0.118177, pedigree (2,1,3,1,1)
  Proxy: Similar crop and country used (Almonds US).
- zinc: 0.00200874 kg; lognormal variance with pedigree 0.00784984, pedigree (2,2,3,1,1)
  (same comment as for organophosphorus-compound, unspecified)
  properties: wet mass 1 kg, dry mass 1 kg
- packaging, for fertilisers: 0.110802 kg; lognormal variance with pedigree 0.0532, pedigree (4,3,3,5,4)
  Total amount of active substance/s of fertilisers needed for the production of 'almond' is calculated to be circa 5.54E-02 kg. Fertiliser/s used in this dataset is/are: 'ammonium nitrate, as N', 'phosphate fertiliser, as P2O5', 'potassium chloride, as K2O', 'urea, as N'. The total amount of active substance/s is doubled in order to account for the packaging of the dilluted product of fertiliser/s that is/are applied. Therefore, 1.11E-01 kg of packaging for fertilisers is justified with this exchange.
  properties: price 0.0642 EUR2005, carbon content, fossil 0.825301, dry mass 1 kg, wet mass 1 kg
  note on carbon content, fossil: Considering a chemical formula (C2H4)n for polyethylene, carbon content-fossil is calculated to be 0.856286 kg of Carbon per kg of dry mass.
- fertilising, by broadcaster: 0.000573946 ha; lognormal variance with pedigree 0.118177, pedigree (2,1,3,1,1)
  Proxy: Extrapolated using a modified MEXALCA-approach (Roches et al. 2010; Nemecek et al. 2012). See supporting documentation 'WFLDB-Documentation.pdf' chapter 'Machinery processes' for L1 data (https://ecoquery.ecoinvent.org/File/Reports). Corresponds to 1.68 applications per year
- packaging, for pesticides: 0.00758992 kg; lognormal variance with pedigree 0.0532, pedigree (4,3,3,5,4)
  Total amount of active substance/s of pesticides needed for the production of almond is calculated to be circa 3.80E-03 kg. Pesticide/s used in this dataset is/are: '[sulfonyl]urea-compound', 'benzimidazole-compound', 'glyphosate', 'nitrile-compound', 'organophosphorus-compound, unspecified', 'zinc'. The total amount of active substance/s is doubled in order to account for the packaging of the dilluted product of pesticide/s that is/are applied. Therefore, 7.60E-03 kg of packaging for pesticides is justified with this exchange.
  properties: wet mass 1 kg, carbon content, fossil 0.85714, dry mass 1 kg, price 0.0642 EUR2005
- benzimidazole-compound: 0.00120697 kg; lognormal variance with pedigree 0.00784984, pedigree (2,2,3,1,1)
  (same comment as for organophosphorus-compound, unspecified)
  properties: dry mass 1 kg, carbon content, fossil 0.529668, wet mass 1 kg
- establishing orchard: 0.00293453 unit; lognormal variance with pedigree 0.118177, pedigree (2,1,3,1,1)
  (same comment as for planting tree)
- application of plant protection product, by field sprayer: 0.00145212 ha; lognormal variance with pedigree 0.118664, pedigree (2,2,3,1,1)
  Proxy: Extrapolated using a modified MEXALCA-approach (Roches et al. 2010; Nemecek et al. 2012). See supporting documentation 'WFLDB-Documentation.pdf' chapter 'Machinery processes' for L1 data (https://ecoquery.ecoinvent.org/File/Reports). Field sprayer used as a proxy for pesticide application in orchards. Corresponds to 4,25 applications per year
- fruit tree seedling, for planting: 0.00293453 unit; lognormal variance with pedigree 0.118177, pedigree (2,1,3,1,1)
  (same comment as for planting tree)
  properties: water content 0.73, carbon content, non-fossil 0.439481, wet mass 1 kg, dry mass 0.578035 kg
  note on carbon content, non-fossil: calculation: C-content of components according to ecoinvent report No. 15a. Source of composition: https://ndb.nal.usda.gov/ndb/search/. Unspecific seedling used as proxy.
- nitrile-compound: 9.14958e-5 kg; lognormal variance with pedigree 0.00784984, pedigree (2,2,3,1,1)
  (same comment as for organophosphorus-compound, unspecified)
  properties: wet mass 1 kg, carbon content, fossil 0.344995, dry mass 1 kg
- land use change, perennial crop: 8.31013e-5 ha; = 8.31593716847e-05*LUC_crop_specific+4.39752232983e-05*(1-LUC_crop_specific)
  Calculated value. Land use change (LUC) combines land transformation areas calculated with the adapted 'Direct Land Use Change Assessment Tool' version 2014 developed by Blonk Consultants and the carbon losses from soil organic carbon (SOC) and vegetation (VEG) as calculated in ecoinvent v3. See 'WFLDB-Guidelines.pdf', available at https://ecoquery.ecoinvent.org/File/Reports.

## Inputs from nature
- Transformation, from permanent crop, irrigated [natural resource, land]: 0.17099 m2; lognormal variance with pedigree 0.0382144, pedigree (2,1,3,1,1)
  10000 m2 divided by the life time of the perennial crop (20 years).
- Occupation, permanent crop, irrigated [natural resource, land]: 3.42904 m2*year; lognormal variance with pedigree 0.0140616, pedigree (2,1,3,1,1)
  Related to the duration from harvest date of previous crop to harvest date of main crop.
- Carbon dioxide, in air [natural resource, in air]: 2.16292 kg; lognormal variance with pedigree 0.00784984, pedigree (2,2,3,1,1)
  CO2 uptake by biomass
- Transformation, to permanent crop, irrigated [natural resource, land]: 0.17099 m2; lognormal variance with pedigree 0.0382144, pedigree (2,1,3,1,1)
  10000 m2 divided by the life time of the perennial crop (20 years).
- Energy, gross calorific value, in biomass [natural resource, biotic]: 29.3269 MJ; lognormal variance with pedigree 0.00784984, pedigree (2,2,3,1,1)
  Gross energy content is related to MJ/kg dry matter of product. Source: ecoinvent data

## Emissions to nature
- Ammonia [air, non-urban air or from high stacks]: 0.00638272 kg; source EEA 2013; lognormal variance with pedigree 0.0387216, pedigree (2,2,3,1,1)
  Calculated value - EMEP/EEA (2013). See 'WFLDB-Guidelines.pdf', available at https://ecoquery.ecoinvent.org/File/Reports.
- Mercury [water, ground-]: 4.06239e-10 kg; source Freiermuth R.  2006; lognormal variance with pedigree 0.350938, pedigree (2,2,3,1,1)
  Calculated value - Freiermuth (2006). See 'WFLDB-Guidelines.pdf', available at https://ecoquery.ecoinvent.org/File/Reports. This emission might be overestimated in case of basic soils.
- Water [air, non-urban air or from high stacks]: 0.348239 m3; lognormal variance with pedigree 0.118177, pedigree (2,1,3,1,1)
  Calculated value - Emission calculated from water balance. See 'WFLDB-Guidelines.pdf', available at https://ecoquery.ecoinvent.org/File/Reports.
- Nickel, ion [water, ground-]: 4.27954e-11 kg; source Freiermuth R.  2006; lognormal variance with pedigree 0.350938, pedigree (2,2,3,1,1)
  (same comment as for Mercury)
- Dinitrogen monoxide [air, non-urban air or from high stacks]: 0.000856373 kg; source IPCC 2006; lognormal variance with pedigree 0.118664, pedigree (2,2,3,1,1)
  Calculated value - IPCC (2006). See 'WFLDB-Guidelines.pdf', available at https://ecoquery.ecoinvent.org/File/Reports.
- Zinc, ion [water, ground-]: 3.30357e-6 kg; source Freiermuth R.  2006; lognormal variance with pedigree 0.350938, pedigree (2,2,3,1,1)
  (same comment as for Mercury)
- Phosphate [water, surface water]: 0.000282425 kg; source Prasuhn V.  2006; lognormal variance with pedigree 0.169866, pedigree (2,2,3,1,1)
  Calculated value - Prasuhn (2006). See 'WFLDB-Guidelines.pdf', available at https://ecoquery.ecoinvent.org/File/Reports.
- Water [water, surface water]: 0.304876 m3; lognormal variance with pedigree 0.118177, pedigree (2,1,3,1,1)
  (same comment as for Water)
- Phosphorus [water, surface water]: 2.34253e-5 kg; source Prasuhn V.  2006; lognormal variance with pedigree 0.169866, pedigree (2,2,3,1,1)
  Calculated value - Prasuhn (2006) and SQCB-Erosion. See 'WFLDB-Guidelines.pdf', available at https://ecoquery.ecoinvent.org/File/Reports.
- Water [water, ground-]: 0.0762206 m3; lognormal variance with pedigree 0.118177, pedigree (2,1,3,1,1)
  (same comment as for Water)
- Mercury [soil, agricultural]: -1.98078e-8 kg; = 1.84429006536e-08 + ( - 3.82645672633e-08)*heavyMetalUptakeSwitch; source Freiermuth R.  2006
  Comment on mathematicalRelation:
  1.84429006536e-08 from Calculated value - Freiermuth (2006). See 'WFLDB-Guidelines.pdf', available at https://ecoquery.ecoinvent.org/File/Reports.
  Heavy metal uptake can be excluded by setting the parameter heavyMetalUptakeSwitch to zero.
- Nitrate [water, ground-]: 0.0427073 kg; source Faist Emmenegger M. 2009; lognormal variance with pedigree 0.169866, pedigree (2,2,3,1,1)
- Cadmium [soil, agricultural]: 4.17132e-7 kg; = 5.13226788953e-07 + ( - 9.58029430889e-08)*heavyMetalUptakeSwitch; source Freiermuth R.  2006
  Comment on mathematicalRelation:
  5.13226788953e-07 from Calculated value - Freiermuth (2006). See 'WFLDB-Guidelines.pdf', available at https://ecoquery.ecoinvent.org/File/Reports.
  -9.58029430889e-08 from Crop, default, heavy metals uptake model
  Heavy metal uptake can be excluded by setting the parameter heavyMetalUptakeSwitch to zero.
- Chromium [soil, agricultural]: -1.03759e-6 kg; = -5.24109373396e-07 + ( - 5.14207248212e-07)*heavyMetalUptakeSwitch; source Freiermuth R.  2006
  Comment on mathematicalRelation:
  -5.24109373396e-07 from Calculated value - Freiermuth (2006). See 'WFLDB-Guidelines.pdf', available at https://ecoquery.ecoinvent.org/File/Reports.
  -5.14207248212e-07 from Crop, default, heavy metals uptake model
  Heavy metal uptake can be excluded by setting the parameter heavyMetalUptakeSwitch to zero.
- Phosphate [water, ground-]: 6.30509e-5 kg; source Prasuhn V.  2006; lognormal variance with pedigree 0.169866, pedigree (2,2,3,1,1)
  Calculated value - Prasuhn (2006). See 'WFLDB-Guidelines.pdf', available at https://ecoquery.ecoinvent.org/File/Reports. This emission might be overestimated in case of basic soils.
- Zinc [soil, agricultural]: 0.00197572 kg; = 0.00200731118032 + ( - 3.02136857055e-05)*heavyMetalUptakeSwitch; source Freiermuth R.  2006
  Comment on mathematicalRelation:
  0.00200731118032 from Calculated value - Freiermuth (2006). See 'WFLDB-Guidelines.pdf', available at https://ecoquery.ecoinvent.org/File/Reports.
  Heavy metal uptake can be excluded by setting the parameter heavyMetalUptakeSwitch to zero.
- Azoxystrobin [soil, agricultural]: 8.61723e-5 kg; lognormal variance with pedigree 0.0387216, pedigree (2,2,3,1,1)
  Calculated value - 100% emission in soil. See 'WFLDB-Guidelines.pdf', available at https://ecoquery.ecoinvent.org/File/Reports.
- Cadmium, ion [water, surface water]: 7.42782e-9 kg; source Freiermuth R.  2006; lognormal variance with pedigree 0.350938, pedigree (2,2,3,1,1)
  Calculated value - Freiermuth (2006). See 'WFLDB-Guidelines.pdf', available at https://ecoquery.ecoinvent.org/File/Reports.
- Chlorothalonil [soil, agricultural]: 0.00113799 kg; lognormal variance with pedigree 0.0387216, pedigree (2,2,3,1,1)
  (same comment as for Azoxystrobin)
- Chromium, ion [water, surface water]: 7.91616e-7 kg; source Freiermuth R.  2006; lognormal variance with pedigree 0.350938, pedigree (2,2,3,1,1)
  (same comment as for Cadmium, ion)
- Cyprodinil [soil, agricultural]: 9.26101e-8 kg; lognormal variance with pedigree 0.0387216, pedigree (2,2,3,1,1)
  (same comment as for Azoxystrobin)
- Copper, ion [water, surface water]: 9.58537e-7 kg; source Freiermuth R.  2006; lognormal variance with pedigree 0.350938, pedigree (2,2,3,1,1)
  (same comment as for Cadmium, ion)
- Glufosinate [soil, agricultural]: 5.68185e-5 kg; lognormal variance with pedigree 0.0387216, pedigree (2,2,3,1,1)
  (same comment as for Azoxystrobin)
- Lead [water, surface water]: 8.94758e-8 kg; source Freiermuth R.  2006; lognormal variance with pedigree 0.350938, pedigree (2,2,3,1,1)
  (same comment as for Cadmium, ion)
- Nickel [soil, agricultural]: 2.77393e-7 kg; = 1.26316690052e-06 + ( - 9.85579617398e-07)*heavyMetalUptakeSwitch; source Freiermuth R.  2006
  Comment on mathematicalRelation:
  1.26316690052e-06 from Calculated value - Freiermuth (2006). See 'WFLDB-Guidelines.pdf', available at https://ecoquery.ecoinvent.org/File/Reports.
  -9.85579617398e-07 from Crop, default, heavy metals uptake model
  Heavy metal uptake can be excluded by setting the parameter heavyMetalUptakeSwitch to zero.
- Glyphosate [soil, agricultural]: 0.000284498 kg; lognormal variance with pedigree 0.0387216, pedigree (2,2,3,1,1)
  (same comment as for Azoxystrobin)
- Mercury [water, surface water]: 1.45855e-9 kg; source Freiermuth R.  2006; lognormal variance with pedigree 0.350938, pedigree (2,2,3,1,1)
  (same comment as for Cadmium, ion)
- Copper [soil, agricultural]: -6.17726e-6 kg; = 7.08976421067e-08 + ( - 6.2524770884e-06)*heavyMetalUptakeSwitch; source Freiermuth R.  2006
  Comment on mathematicalRelation:
  7.08976421067e-08 from Calculated value - Freiermuth (2006). See 'WFLDB-Guidelines.pdf', available at https://ecoquery.ecoinvent.org/File/Reports.
  -6.2524770884e-06 from Crop, default, heavy metals uptake model
  Heavy metal uptake can be excluded by setting the parameter heavyMetalUptakeSwitch to zero.
- Oxyfluorfen [soil, agricultural]: 0.000118541 kg; lognormal variance with pedigree 0.0387216, pedigree (2,2,3,1,1)
  (same comment as for Azoxystrobin)
- Nickel, ion [water, surface water]: 4.10308e-7 kg; source Freiermuth R.  2006; lognormal variance with pedigree 0.350938, pedigree (2,2,3,1,1)
  (same comment as for Cadmium, ion)
- Rimsulfuron [soil, agricultural]: 2.46963e-8 kg; lognormal variance with pedigree 0.0387216, pedigree (2,2,3,1,1)
  (same comment as for Azoxystrobin)
- Zinc, ion [water, surface water]: 7.22913e-7 kg; source Freiermuth R.  2006; lognormal variance with pedigree 0.350938, pedigree (2,2,3,1,1)
  (same comment as for Cadmium, ion)
- Abamectin [soil, agricultural]: 6.70007e-6 kg; lognormal variance with pedigree 0.0387216, pedigree (2,2,3,1,1)
  (same comment as for Azoxystrobin)
- Cadmium, ion [water, ground-]: 1.18253e-8 kg; source Freiermuth R.  2006; lognormal variance with pedigree 0.350938, pedigree (2,2,3,1,1)
  (same comment as for Mercury)
- Methoxyfenozide [soil, agricultural]: 0.000106533 kg; lognormal variance with pedigree 0.0387216, pedigree (2,2,3,1,1)
  (same comment as for Azoxystrobin)
- Chromium, ion [water, ground-]: 6.07392e-6 kg; source Freiermuth R.  2006; lognormal variance with pedigree 0.350938, pedigree (2,2,3,1,1)
  (same comment as for Mercury)
- Carbon dioxide, fossil [air, non-urban air or from high stacks]: 0.0387122 kg; lognormal variance with pedigree 0.00784984, pedigree (2,2,3,1,1)
  Calculated value - CO2 emissions from urea and lime. See 'WFLDB-Guidelines.pdf', available at https://ecoquery.ecoinvent.org/File/Reports.
- Lead [water, ground-]: 2.10793e-8 kg; source Freiermuth R.  2006; lognormal variance with pedigree 0.350938, pedigree (2,2,3,1,1)
  (same comment as for Mercury)
- Lead [soil, agricultural]: 1.09809e-7 kg; = 6.20101981452e-07 + ( - 5.10216245166e-07)*heavyMetalUptakeSwitch; source Freiermuth R.  2006
  Comment on mathematicalRelation:
  6.20101981452e-07 from Calculated value - Freiermuth (2006). See 'WFLDB-Guidelines.pdf', available at https://ecoquery.ecoinvent.org/File/Reports.
  -5.10216245166e-07 from Crop, default, heavy metals uptake model
  Heavy metal uptake can be excluded by setting the parameter heavyMetalUptakeSwitch to zero.
- Nitrogen oxides [air, non-urban air or from high stacks]: 0.00138882 kg; source EEA 2013; lognormal variance with pedigree 0.118664, pedigree (2,2,3,1,1)
  Calculated value - EEA/EMEP (2013). See 'WFLDB-Guidelines.pdf', available at https://ecoquery.ecoinvent.org/File/Reports.
- Copper, ion [water, ground-]: 8.61004e-7 kg; source Freiermuth R.  2006; lognormal variance with pedigree 0.350938, pedigree (2,2,3,1,1)
  (same comment as for Mercury)

## Sampling procedure
WFLDB Methodological Guidelines for the Life Cycle Inventory of Agricultural Products in the latest version, available at: (Report section: https://v30.ecoquery.ecoinvent.org/File/Reports). Data sources: Data were categorised from level 0 (L0) to level (L4) as follows: L0 = estimate, proxy; L1 = statistical data (e.g. FAOSTAT); L2 = L1 adapted to crop and country; L3 = literature data or L1 resp. L2 data approved by experts; medium detailing (i.e. kg of total N-fertiliser); L4 = L3 data of high detailing (i.e. portion N-fertiliser types).In this dataset data were obtained for yield: L3; Fertilisers: L4; Pesticides: L1; Machinery: L1; Irrigation: L2. For information regarding the calculation of individual exchanges see supporting documentation WFLDB-Documentation.pdf.

## Extrapolations
If used, extrapolations are documented on the flow level.

## Review by Assumpció ANTON 2016-05-30
Be aware that the use of statistics in input calculations could provide some specific inputs not common for specific crops, this should be corrected if better information is available and better reflexed in DQR . Currently, I would dissent for some of good marks provided, being a revision of criteria applied advisable.

Pesticides will need to be amended periodically checking for update of pesticides' ban.
