# oxidation of methanol

Dataset: EcoSpold 2, unit process
Geography: RER
Time period: 1997-01-01 to 2020-12-31
Technology level: current
Classification: ISIC rev.4 ecoinvent: 2011:Manufacture of basic chemicals
Synonyms: Formalin; Methylene oxide; Formol; Oxomethane; Methanal
Scenario: Business-as-Usual
System model: Allocation at the point of substitution
Generated by: Mike Chudacoff
Published in: Althaus H.-J. 2007
Database: ecoinvent
isCopyrightProtected: true
accessRestrictedTo: 1

## General comment
This dataset represents the production of 1 kg of formaldehyde by oxidation of methanol. This process also produces steam, which carries part of the total environmental burdens. Formaldehyde is an organic chemical, which is a colorless gas at ambient temperature that has
a pungent, suffocating odor and polymerizes in the presence of acids or alkali agents. Formaldehyde is used for the production of:
- a large variety of resins generated through reaction with other compounds such as phenol or urea. These resins are used as adhesives, bonding agents, glues, paints, coating and other applications;
- MDI (methyl diisocyanate), for polyurethanes;
- polyoxymethylene, a formaldehyde polymer used as an engineering plastic;
- polyols for water-soluble paints and coatings;
- hydraulic fluids and lubricants, etc.
Formaldehyde is produced industrially by the oxidation/dehydrogenation of methanol (silver catalyst process) or by oxidation of methanol with air (Formox process). This dataset represents an average of these two processes. It is based on literature data.
References:
Althaus H.-J., Chudacoff M., Hischier R., Jungbluth N., Osses M. and Primas A. (2007) Life Cycle Inventories of Chemicals. Final report ecoinvent data v2.0 No. 8. Swiss Centre for Life Cycle Inventories, Dübendorf, CH.
Gendorf (2016) Umwelterklärung 2015, Werk Gendorf Industriepark, www.gendorf.de.

## Included activities start
The activity starts when the raw materials enter the process.

## Included activities end
This activity ends with the production of formaldehyde. It includes the processing of methanol, energy consumption, estimated infrastructure use, as well as emissions to water and air.

## Geography
The data in this dataset are not geography-specific. Some values are based on data from a large chemical factory located in Germany. These are assumed to be valid for this geography.

## Technology
Represents a current cross-section of actual plants in Europe. The inventory is based on 100% formaldehyde production. The inputs and outputs are an average of the Silver and Formox processes.
Silver process:
Initially, methanol is dehydrogenated and subsequently there is combustion of hydrogen overall resulting in the production of formaldehyde and water. The raction takes place with air over a crystalline silver catalyst.
Formox process:
Methanol is directly oxidized by air over a metal oxide catalyst at a temperature of 470 °C. excess heat is removed with an oil-transfer medium. The product gases are cooled, absorbed in water, and an aqueous 37% formaldehyde solution is obtained. (Wells, 1999)
References:
G. Margaret Wells, “Handbook of Petrochemicals and Processes”, 2nd edition, Ashgate, 1999
Althaus H.-J., Chudacoff M., Hischier R., Jungbluth N., Osses M. and Primas A. (2007) Life Cycle Inventories of Chemicals. Final report ecoinvent data v2.0 No. 8. Swiss Centre for Life Cycle Inventories, Dübendorf, CH.

## Time period
The data in this dataset come from different years, but overall form the most realistic picture of the production. Some values are based on data published by the Gendorf factory that were collected between 2011 and 2015. The time period has been adjusted accordingly. For more details, see the comments of the exchanges.

## Reference product
- formaldehyde: 1 kg; name RP; CPC 34170: Ethers, alcohol peroxides, ether peroxides, epoxides, acetals and hemiacetals, and their halogenated, sulphona[…]; By-product classification allocatable product; CAS 50-00-0
  Formaldehyde is an organic chemical, which is a colorless gas at ambient temperature that has a pungent, suffocating odor and polymerizes in the presence of acids or alkali agents. Formaldehyde is used for the production of:
  - a large variety of resins generated through reaction with other compounds such as phenol or urea. These resins are used as adhesives, bonding agents, glues, paints, coating and other applications;
  - MDI (methyl diisocyanate), for polyurethanes;
  - polyoxymethylene, a formaldehyde polymer used as an engineering plastic;
  - polyols for water-soluble paints and coatings;
  - hydraulic fluids and lubricants, etc.
  production volume 4.057e9 kg; name RP_PV
    Unknown
    Source: http://pubs.acs.org/cen/coverstory/84/8428factsandfigures.html (Chemical & Engineering News, 2006 vol 84) downloaded 22 May 2009. Data are for EU-25.
  property price 0.239 EUR2005
    Temporary price data. Calculated as 90% of purchasers price based on: 2004 import/export prices (total trades (USD) divided by total weight (kg) in EU27, USA, China, Japan and India) from UN data - Methanal (formaldehyde) (http://data.un.org/Data.aspx?q=Formaldehyde&d=ComTrade&f=_l1Code%3a30%3bcmdCode%3a291211; accessed 1 June 10).
  property carbon content 0.4
    carbon content on a dry matter basis (reserved; not for manual entry)
  property true value 0.239; name RP_true_value
    allocation property applied in "true value" allocation // value calculated from revenue
  properties: dry mass 1 kg, carbon content, fossil 0.4, carbon content, non-fossil 0, wet mass 1 kg, water in wet mass 0 kg, water content 0, carbon allocation 0.4 kg

## By-products
- steam, in chemical industry: 0 kg; name BP_steam_in_chemical_industry; By-product classification allocatable product; CPC 17300: Steam and hot water; CAS 108-31-6
  production volume 9.3311e9 kg; = RP_PV*BP_steam_in_chemical_industry/ABS(RP)
    Calculated from the production volume of formaldehyde in proportion to the respective output amounts.
  property price 0.0396281 EUR2005
    Calculated based on inputs: The price of the product has been calculated as a sum of the values of the material and energy inputs for this product. This value is therefore a rough estimation. It may underestimate the real price since there are additional expenses when producing any product. These expences can include for example labour costs, treatment of waste materials and profit for the producer. Please consider carefully whether this level of data quality is acceptable for your application.
  property carbon content 0
    carbon content on a dry matter basis (reserved; not for manual entry)
  property true value 0.0911446; name BP_steam_in_chemical_indust_true_value_0
    allocation property applied in "true value" allocation // value calculated from revenue
  properties: wet mass 1 kg, water in wet mass 0.9999 kg, carbon content, fossil 0, dry mass 0.0001 kg, carbon content, non-fossil 0, water content 9999, carbon allocation 0 kg

## Inputs from technosphere
- chemical factory, organics: 2.8957e-10 unit; lognormal variance with pedigree 0.309225, pedigree (2,3,1,2,3)
  Calculated based on literature data published by the industry. For this activity, no information was readily available concerning infrastructure and land-use. Therefore, the infrastructure is estimated based on data from two chemical factories, the BASF site of Ludwigshafen and the chemical factory in Gendorf (which are both located in Germany), which produce a wide range of chemical substances. Based on this data, the following assumptions are made: the built area amounts to about 4.2 ha, the plant has an average output of 50'000 t/a and a lifespan of fifty years. The estimated infrastructure amount is therefore 4.00 E-10 units per kg of produced chemical.
  References:
  Althaus H.-J., Chudacoff M., Hischier R., Jungbluth N., Osses M. and Primas A. (2007) Life Cycle Inventories of Chemicals. ecoinvent report No. 8, v2.0. EMPA Dübendorf, Swiss Centre for Life Cycle Inventories, Dübendorf, CH.
  Gendorf (2000) Umwelterklärung 2000, Werk Gendorf. Werk Gendorf, Burgkirchen.
- nitrogen, liquid: 0.0137546 kg; lognormal variance with pedigree 0.009825, pedigree (2,3,1,2,3)
  Calculated based on literature data published by the industry. This value is a 5-year average of data (2011 - 2015) published by the Gendorf factory (Gendorf, 2016, Umwelterklärung, www.gendorf.de), (Gendorf, 2015, Umwelterklärung, www.gendorf.de), (Gendorf, 2014, Umwelterklärung, www.gendorf.de). The amount of nitrogen used per kg of chemical substance produced is calculated using literature data published by the Gendorf factory based in Germany, which produces a wide range of chemical substances. The factory produced 1657400 tonnes of chemical substances in the year 2015 (Gendorf, 2016, Umwelterklärung, www.gendorf.de) and 740000 tonnes of intermediate products. The reported amount of nitrogen used in 2015 was 33512400 Nm3 (Gendorf, 2016, Umwelterklärung, www.gendorf.de). One Nm3 of nitrogen is equal to 1.2506 kg. The resulting amount of nitrogen - the 5-year average (2011 - 2015, weighted by production volume) is 0.019 kg/kg. Nitrogen is mainly used during the production of chemicals for 'blanketing', which is the process of applying gas to the vapour space of a container or vessel in order to control its composition.
  properties: wet mass 1 kg, dry mass 1 kg
- spent Formox catalyst base from formaldehyde production: -0.0361963 kg; name BP_spent_Formox_catalyst_base_from_forma; lognormal variance with pedigree 0.058125, pedigree (4,2,1,2,1)
  Disposal of catalyst base material.
  Uncertainty: d
  production volume 2.0285e8 kg; = RP_PV*BP_spent_Formox_catalyst_base_from_forma/ABS(RP)
    (same comment as for steam, in chemical industry)
  property price 0 EUR2005; name BP_spent_Formox_catalyst_b_price_EUR2005
  properties: wet mass 1 kg, dry mass 1 kg
- electricity, medium voltage: 0.108589 kWh; lognormal variance with pedigree 0.010725, pedigree (2,2,1,2,1)
  Electricity
  Uncertainty: e
- methanol: 0.86871 kg; lognormal variance with pedigree 0.010725, pedigree (2,2,1,2,1)
  Precursor
  Uncertainty: p
  properties: dry mass 1 kg, wet mass 1 kg, carbon content, fossil 0.375

## Emissions to nature
- Carbon monoxide, fossil [air, urban air close to ground]: 7.23925e-5 kg; lognormal variance with pedigree 0.010725, pedigree (2,2,1,2,1)
  Emissions
  Uncertainty: e
- Nitrogen [air, unspecified]: 0.0137546 kg; lognormal variance with pedigree 0.009825, pedigree (2,3,1,2,3)
  Calculated value. The amount of nitrogen released to air is equal to the amount of nitrogen entering the activity.
- Particulates, > 2.5 um, and < 10um [air, urban air close to ground]: 3.61963e-6 kg; lognormal variance with pedigree 0.010725, pedigree (2,2,1,2,1)
  Emissions
  Uncertainty: e
- Carbon dioxide, fossil [air, urban air close to ground]: 0.0796318 kg; lognormal variance with pedigree 0.010725, pedigree (2,2,1,2,1)
  Emissions
  Uncertainty: e
- Methanol [air, urban air close to ground]: 2.24417e-5 kg; lognormal variance with pedigree 0.010725, pedigree (2,2,1,2,1)
  Emissions
  Uncertainty: e
- NMVOC, non-methane volatile organic compounds, unspecified origin [air, urban air close to ground]: 2.17178e-6 kg; lognormal variance with pedigree 0.010725, pedigree (2,2,1,2,1)
  Emissions
  Uncertainty: e
- Formaldehyde [air, urban air close to ground]: 1.80981e-5 kg; lognormal variance with pedigree 0.010725, pedigree (2,2,1,2,1)
  Emissions
  Uncertainty: e
- Nitrogen oxides [air, urban air close to ground]: 0.000275092 kg; lognormal variance with pedigree 0.010725, pedigree (2,2,1,2,1)
  Emissions
  Uncertainty: e

## Sampling procedure
Data based on literature and estimations. Some values are calculated based on data from a large chemical factory located in Germany. For more details, see the comments of the exchanges.

## Review by Gregor Wernet 2017-08-04
This dataset was additionally reviewed in a separate review process by Eric Johnson of Atlantic Consulting as well as Emilia Moreno Ruiz and Gregor Wernet of ecoinvent.
