# maleic anhydride production by direct oxidation of n-butane

Dataset: EcoSpold 2, unit process
Geography: RoW
Time period: 1997-01-01 to 2020-12-31
Technology level: current
Classification: ISIC rev.4 ecoinvent: 2011:Manufacture of basic chemicals
Synonyms: Maleic acid anhydride; 108-31-6; 2,5-Furandione; Furan-2,5-dione; Toxilic anhydride
Scenario: Business-as-Usual
System model: Allocation at the point of substitution
Generated by: Mike Chudacoff
Published in: Althaus H.-J. 2007
Database: ecoinvent
isCopyrightProtected: true
accessRestrictedTo: 1

## General comment
This dataset represents the production of 1 kg of maleic anhydride, with steam as by product. Maleic anhydride is an organic chemical compound which consists of white crystalline flakes that have a pungent, acrid odor. It is soluble in acetone, ether and petroleum. According to (IPPC Chemicals, 2002), maleic anhydride is used to produce unsaturated polyesters, fumaric and maleic acid, and is also used as an intermediate for the production of pesticides.
This dataset models the production of maleic anhydride by direct oxidation of n-butane, which represents roughly 75% of the production in Europe. The inventory is based on literature data. The water exchanges are approximated based on data from a large chemical factory (Gendorf 2016).
References:
Althaus H.-J., Chudacoff M., Hischier R., Jungbluth N., Osses M. and Primas A. (2007) Life Cycle Inventories of Chemicals. ecoinvent report No. 8, v2.0. EMPA Dübendorf, Swiss Centre for Life Cycle Inventories, Dübendorf, CH.
Gendorf (2016) Umwelterklärung 2015, Werk Gendorf Industriepark, www.gendorf.de.

## Included activities start
The activity starts when the raw materials enter the process.

## Included activities end
This activity ends with the production of maleic anhydride, with steam as a byproduct. All precursors and infrastructure are included.

## Geography
The data in this dataset are not geography-specific. Some values are based on data from a large chemical factory located in Germany. These are assumed to be valid for this geography.

## Technology
Air is mixed with superheated butane and feed into a reactor containing catalysts. The reaction is highly exothermic and is used to produce steam. The reaction gases are cooled and maleic anhydride is condensed and removed from the vapor stream. This is carried out quickly in order to avoid the production of maleic acid formed from the water in the reaction gases. Maleic acid is also recovered from the water scrubber. Waste gases are burned. (Wells, 1999)
2 C4H10 + 7 O2 -> C4H2O3 + 8 H2O
The reaction occurs at slightly elevated pressure and temperatures of 400 – 430 °C. In the reaction area, n-butane and air can be fed to a fluid-bed catalytic reactor to produce maleic anhydride. Cooling coils are included in the fluid bed to generate high-pressure steam N-butane can also be is vaporized, mixed with air and catalytically oxidized in a fixed bed tubular reactor. (Lonza maleic website).
References:
Althaus H.-J., Chudacoff M., Hischier R., Jungbluth N., Osses M. and Primas A. (2007) Life Cycle Inventories of Chemicals. ecoinvent report No. 8, v2.0. EMPA Dübendorf, Swiss Centre for Life Cycle Inventories, Dübendorf, CH.

## Time period
The data in this dataset come from different years, but overall form the most realistic picture of the production. Some values are based on data published by the Gendorf factory that were collected between 2011 and 2015. The time period has been adjusted accordingly. For more details, see the comments of the exchanges.

## Reference product
- steam, in chemical industry: 1 kg; name BP_steam_in_chemical_industry; By-product classification allocatable product; CPC 17300: Steam and hot water; CAS 108-31-6
  Highly exothermic production processes, producing steam as a by-product.
  production volume 3.6246e9 kg; = RP_PV*BP_steam_in_chemical_industry/ABS(RP)
    Calculated from the production volume of maleic anhydride in proportion to the respective output amounts.
  property price 0.0396281 EUR2005
    Calculated based on inputs: The price of the product has been calculated as a sum of the values of the material and energy inputs for this product. This value is therefore a rough estimation. It may underestimate the real price since there are additional expenses when producing any product. These expences can include for example labour costs, treatment of waste materials and profit for the producer. Please consider carefully whether this level of data quality is acceptable for your application.
  property carbon content 0
    carbon content on a dry matter basis (reserved; not for manual entry)
  property true value 0.277397; name BP_steam_in_chemical_indust_true_value_0
    allocation property applied in "true value" allocation // value calculated from revenue
  properties: water content 9999, carbon content, fossil 0, water in wet mass 0.9999 kg, carbon content, non-fossil 0, wet mass 1 kg, dry mass 0.0001 kg, carbon allocation 0 kg
- maleic anhydride: 0 kg; name RP; By-product classification allocatable product; CPC 34140: Carboxylic acids and their anhydrides, halides, peroxides and peroxyacids and their halogenated, sulphonated, […]; CAS 108-31-6
  Maleic anhydride is an organic chemical compound which consists of white crystalline flakes that have a pungent, acrid odor. It is soluble in acetone, ether and petroleum. According to (IPPC Chemicals, 2002), maleic anhydride is used to produce unsaturated polyesters, fumaric and maleic acid, and is also used as an intermediate for the production of pesticides.
  Reference(s):
  European Comission, Directionate General, Joint Reserach Center, 'Reference Documetn on Best Available Techniques in the Large Volume Organic Chemical Industry', February 2002
  production volume 5.178e8 kg; name RP_PV
    Year 2000 capacity according to http://www.southalabama.edu/chemistry/barletta/felthouse.pdf
  property price 0.792 EUR2005
    Temporary price data. Calculated as 90% of purchasers price based on: 2004 prices for leading producing European country from Import/Export data (US$ and tonnes) from UN Commodity Trade Statistics Database (http://data.un.org/Explorer.aspxDatabase [Accessed 2 July 2010]). Commodity: Maleic anhydride
  property carbon content 0.489955
    carbon content on a dry matter basis (reserved; not for manual entry)
  property true value 0.792; name RP_true_value
    allocation property applied in "true value" allocation // value calculated from revenue
  properties: dry mass 1 kg, water in wet mass 0 kg, water content 0, wet mass 1 kg, carbon content, non-fossil 0, carbon content, fossil 0.489955, carbon allocation 0.489955 kg

## By-products
- heat, for reuse in municipal waste incineration only: 0 MJ; CPC 17300: Steam and hot water; By-product classification allocatable product; pedigree (1,1,1,1,1)
  Net electricity generated from this waste and used in internal MSWI plant energy redistribution.
  Uncertainty: uncertainty is calculated from uncertainties in waste composition and uncertainties in energy efficiency and the uncertainty in internal energy demand
  production volume 76.6333 MJ
  property exergy 0.1842 MJ; name E_th_prod_MSWI_exergy
    This exergy property is based on the exergy content of the product.
  property price 0.0106 EUR2005; name E_th_prod_MSWI_price_EUR2005
    Average European district heat price from Ecoheatcool and Euroheat 2005-2006, Ecoheat Work package 1: The European heat market. Final report. 10.6 EUR/GJ i s the price of district heat. http://www.solarthermalworld.org/files/Ecoheatcool%20WP1%20Web.pdf?download
  property true value relation 0.1842; name E_th_prod_MSWI_true_value_relation
    property to calculate "true value" from
  property true value 9.76396e-10
    allocation property applied in "true value" allocation // value calculated from true value relation
- electricity, for reuse in municipal waste incineration only: 0 kWh; CPC 17100: Electrical energy; By-product classification allocatable product; pedigree (1,1,1,1,1)
  (same comment as for heat, for reuse in municipal waste incineration only)
  production volume 10.5994 kWh
  property price 0.1 EUR2005; name E_el_prod_MSWI_price_EUR2005
    Estimated to be the same price as in case of electricity, medium voltage.
  property exergy 3.6 MJ; name E_el_prod_MSWI_exergy
    This exergy property is based on the exergy content of the product.
  property true value relation 3.6; name E_el_prod_MSWI_true_value_relation
    property to calculate "true value" from
  property true value 2.6394e-9
    (same comment as for heat, for reuse in municipal waste incineration only)

## Inputs from technosphere
- chemical factory, organics: 1.48226e-11 unit; lognormal variance with pedigree 0.3098, pedigree (2,3,1,4,3)
  Calculated based on literature data published by the industry. For this activity, no information was readily available concerning infrastructure and land-use. Therefore, the infrastructure is estimated based on data from two chemical factories, the BASF site of Ludwigshafen and the chemical factory in Gendorf (which are both located in Germany), which produce a wide range of chemical substances. Based on this data, the following assumptions are made: the built area amounts to about 4.2 ha, the plant has an average output of 50'000 t/a and a lifespan of fifty years. The estimated infrastructure amount is therefore 4.00 E-10 units per kg of produced chemical.
  References:
  Althaus H.-J., Chudacoff M., Hischier R., Jungbluth N., Osses M. and Primas A. (2007) Life Cycle Inventories of Chemicals. ecoinvent report No. 8, v2.0. EMPA Dübendorf, Swiss Centre for Life Cycle Inventories, Dübendorf, CH.
  Gendorf (2000) Umwelterklärung 2000, Werk Gendorf. Werk Gendorf, Burgkirchen.
- electricity, medium voltage: 0 kWh; pedigree (1,1,1,1,1)
  Power
  Uncertainty: p
- tap water: 0 kg; pedigree (1,1,1,1,1)
  Calculated based on literature data published by the industry. This value is a 5-year average of data (2011 - 2015) published by the Gendorf factory (Gendorf, 2016, Umwelterklärung, www.gendorf.de), (Gendorf, 2015, Umwelterklärung, www.gendorf.de), (Gendorf, 2014, Umwelterklärung, www.gendorf.de). The amount of tap water per kg of chemical substance produced is calculated using literature data published by the Gendorf factory based in Germany, which produces a wide range of chemical substances. The factory produced 1657400 tonnes of chemical substances in the year 2015 (Gendorf, 2016, Umwelterklärung, www.gendorf.de) and 740000 tonnes of intermediate products. The amount of tap water consumed in the year 2015 was 55100 tonnes (Gendorf, 2016, Umwelterklärung, www.gendorf.de). The resulting amount of tap water is 0.023 kg/kg of chemical product produced. The 5-year average (2011 - 2015, weighted by production volume) is 0.026 kg/kg.
  properties: dry mass 0.000337476 kg, wet mass 1 kg, water content 2962.17, carbon content, fossil 0.00178991
  note on carbon content, fossil: Bicarbonate content is 2.93 mol/m3. CO2 content is 0.1 mol/m3 (ecoinvent v2.2 report 8, Tab 93.1).
- wastewater, average: -1.00053e-7 m3; name BP_wastewater_average; lognormal variance with pedigree 0.0104, pedigree (2,3,1,4,3)
  Calculated based on literature data published by the industry. This value is a 5-year average of data (2011 - 2015) published by the Gendorf factory (Gendorf, 2016, Umwelterklärung, www.gendorf.de), (Gendorf, 2015, Umwelterklärung, www.gendorf.de), (Gendorf, 2014, Umwelterklärung, www.gendorf.de). The amount of wastewater (which is later on treated in the municipal WWTP) per kg of chemical substance produced is calculated using literature data published by the Gendorf factory based in Germany, which produces a wide range of chemical substances. The factory produced 1657400 tonnes of chemical substances in the year 2015 (Gendorf, 2016, Umwelterklärung, www.gendorf.de) and 740000 tonnes of intermediate products. The amount of wastewater which is later on treated in the municipal WWTP in the year 2015 was 1200 tonnes (Gendorf, 2016, Umwelterklärung, www.gendorf.de). The resulting amount of wastewater is 2.7E-06 m3/kg of chemical product produced.
  production volume 1398.06 m3; = RP_PV*BP_wastewater_average/ABS(RP)
    (same comment as for steam, in chemical industry)
  property price 0 EUR2005; name BP_wastewater_average_price_EUR2005
  properties: dry mass 0.346837 kg, wet mass 1000 kg, water content 2882.2, carbon content, non-fossil 0.194039
  note on carbon content, non-fossil: 0.0673 kg TOC/m3 (Tab A.17, ecoinvent v2.2 report 13_I). TOC was considered as Total Carbon.
- liquefied petroleum gas: 0 kg; pedigree (1,1,1,1,1)
  Precursor
  Uncertainty: p
  properties: wet mass 1 kg, carbon content, fossil 0.821863, dry mass 1 kg
- electricity, medium voltage: 0.000582116, 0.000105921, 0.00179625, 0.0260438, 0.00372736, 0.0122123 kWh (6 entries); lognormal variance with pedigree 0.02, pedigree (1,5,1,5,1)
  Power
  Uncertainty: p
- tap water: 1.80528e-6, 1.49974e-5, 2.98352e-6, 7.52327e-5, 1.95716e-6, 5.5671e-6, 0.000860925 kg (7 entries); lognormal variance with pedigree 0.0104, pedigree (2,3,1,4,3)
  (same comment as for tap water)
- liquefied petroleum gas: 0.00204788, 0.00727373, 0.00064288, 0.00014309, 0.0306545 kg (5 entries); lognormal variance with pedigree 0.0127, pedigree (2,2,1,5,1)
  Precursor
  Uncertainty: p

## Inputs from nature
- Water, river [natural resource, in water]: 3.18686e-5 m3; lognormal variance with pedigree 0.0104, pedigree (2,3,1,4,3)
  Calculated based on literature data published by the industry. This value is a 5-year average of data (2011 - 2015) published by the Gendorf factory (Gendorf, 2016, Umwelterklärung, www.gendorf.de), (Gendorf, 2015, Umwelterklärung, www.gendorf.de), (Gendorf, 2014, Umwelterklärung, www.gendorf.de). The amount of groundwater and surface water (river) extracted per kg of chemical substance produced is calculated using literature data published by the Gendorf factory based in Germany, which produces a wide range of chemical substances. The factory produced 1657400 tonnes of chemical substances in the year 2015 (Gendorf, 2016, Umwelterklärung, www.gendorf.de) and 740000 tonnes of intermediate products. The amount of groundwater and surface water (river) extracted in the year 2015 was 19950000 tonnes and 21488100 tonnes respectively (Gendorf, 2016, Umwelterklärung, www.gendorf.de).
- Water, cooling, unspecified natural origin [natural resource, in water]: 0.000607726 m3; lognormal variance with pedigree 0.0104, pedigree (2,3,1,4,3)
  Calculated based on literature data published by the industry. This value is a 5-year average of data (2011 - 2015) published by the Gendorf factory (Gendorf, 2016, Umwelterklärung, www.gendorf.de), (Gendorf, 2015, Umwelterklärung, www.gendorf.de), (Gendorf, 2014, Umwelterklärung, www.gendorf.de). The amount of water for cooling extracted per kg of chemical substance produced is calculated using literature data published by the Gendorf factory based in Germany, which produces a wide range of chemical substances. The factory produced 1657400 tonnes of chemical substances in the year 2015 (Gendorf, 2016, Umwelterklärung, www.gendorf.de) and 740000 tonnes of intermediate products. The reported amounts of water extracted as groundwater and surface water (river) are assumed to be used entirely for cooling purposes.
- Water, well, in ground [natural resource, in water]: 3.07569e-5 m3; lognormal variance with pedigree 0.0104, pedigree (2,3,1,4,3)
  (same comment as for Water, river)

## Emissions to nature
- Carbon dioxide, fossil [air, urban air close to ground]: 0.0458759 kg; lognormal variance with pedigree 0.0127, pedigree (2,2,1,5,1)
  Emission
  Uncertainty: e
- Butane [air, urban air close to ground]: 1.48226e-6 kg; lognormal variance with pedigree 0.0127, pedigree (2,2,1,5,1)
  Emission
  Uncertainty: e
- Water [water, unspecified]: 0.000618843 m3; lognormal variance with pedigree 0.0104, pedigree (2,3,1,4,3)
  Calculated based on literature data published by the industry (Gendorf, 2016, Umwelterklärung, www.gendorf.de). The amount of water released back to the environment consists of the amount of process water treated in the internal WWTP and then released back to the environment and the amount of cooling water released back to the environment.
- Water [air, unspecified]: 5.18791e-5 m3; lognormal variance with pedigree 0.0104, pedigree (2,3,1,4,3)
  Calculated to ensure the water balance. In general, in the case of recirculating cooling systems, 77% of the water input evaporates to air. In case of once-through cooling systems, 4% of the water input evaporates to air. The process water has in the chemical industry an average evaporation rate of 20.5%. In the specific case of the Gendorf factory, the calculated evaporation rate based on the data published is 6.3%. This matches the qualitative information, that the majority of the cooling systems in Gendorf are once-through and that the amount of cooling water used is significantly higher than the amount of process water used (Gendorf, 2016, Umwelterklärung, www.gendorf.de).

## Sampling procedure
Literature data. Some values are calculated based on data from a large chemical factory located in Germany. For more details, see the comments of the exchanges.

## Extrapolations
This dataset has been copied from an original dataset covering the geography RER. The uncertainty has been adjusted accordingly.

## Review by Gregor Wernet 2017-08-04
This dataset was additionally reviewed in a separate review process by Eric Johnson of Atlantic Consulting as well as Emilia Moreno Ruiz and Gregor Wernet of ecoinvent.
