# frozen fish sticks production, hake

Dataset: EcoSpold 2, unit process
Geography: RER
Time period: 2011-01-01 to 2019-12-31
Technology level: current
Classification: ISIC rev.4 ecoinvent: 1075:Manufacture of prepared meals and dishes
Scenario: Business-as-Usual
System model: Allocation at the point of substitution
Generated by: Ian Vázquez-Rowe
Published in: Vázquez-Rowe, I. 2013
Database: ecoinvent
isCopyrightProtected: true
accessRestrictedTo: 1

## General comment
This activity represents the processing of a multi-ingredient hake product, referred to as fish sticks or fish fingers, at a fish processing factory. The main product is fish blocks of Patagonian grenadier (Macrunorus magellanicus). These fish blocks are marine freighted and once they arrive at the port's premises, they are delivered in refrigerated lorries to the processing plant. Two other important products are breadcrumbs and a wheat flour mix that are used in the battering. These are produced in a mill near the seafood processing plant and transported by truck.

## Included activities start
Seafood processing factory in SouthWest Europe activities include the reception of hake fish blocks and their processing until they are transformed into fish fingers in a multi-ingredient final product.

## Included activities end
Distribution from factory to wholesalers was excluded. Packaging is excluded. Packaging in this particular product is constituted by 22.98 grams of carton and 1.17 grams of polyethylene.

## Geography
Data collected at a processing plant in NW Spain. Fish blocks marine freighted from Latin America to a port in NW Spain and then transported by truck to the processing plant. Two other important products are breadcrumbs and a wheat flour mix that are used in the battering. These are produced in a mill near the seafood processing plant and transported by truck.

## Technology
Mainly with machinery. Manual process is limited to detecting amorphous fish sticks that are separated prior to packaging.

## Time period
Data were collected for average conditions in year 2011.

## Parameters
- Sunflower seed conversion to oil: 0.4 kg/kg; name sunflower; triangular min 0.35, mostLikely 0.4, max 0.45, pedigree (4,4,3,3,2)
  The conversion of sunflower seed to sunflower oil was obtained from a report from FAO (http://www.fao.org/docrep/012/al375e/al375e.pdf). A 40% conversion rate was assumed.
- OilMillProdVol: 4e6 kg; name oilMillProdVol; lognormal variance with pedigree 0.013225, pedigree (4,4,3,2,2)
  Amount of refined sunflower oil for a reference mill in Spain.
- Sunflower Oil: 0.01121 kg; name sunoil; lognormal variance with pedigree 0.0026, pedigree (1,1,3,1,1)
  Amount of sunflower oil used.

## Reference product
- frozen fish sticks, hake: 0 kg; By-product classification allocatable product
  323.47 grams of fish sticks is the mass content of the ten (10) fish sticks (i.e., fish fingers) contained in one cardboard package ready for distribution and sale. The package itself weighs 25.97 grams.
  production volume 0.2892 kg
    Production volume calculated on the basis of the European GDP as a proportion of global GDP (i.e., world GDP= 1).
  property price 3.5 EUR2005
    Based on expert judgement the price for this product is estimated to be 3.5 EUR per kg
  property carbon content 0.48
    carbon content on a dry matter basis (reserved; not for manual entry)
  property true value 1.13214
    allocation property applied in "true value" allocation // value calculated from revenue
  properties: dry mass 0.55 kg, ash content 0.015 kg, water content 0.818182, carbon content, non-fossil 0.48, wet mass 1 kg, protein content 0.13, carbon content, fossil 0, water in wet mass 0.45 kg, carbon allocation 0.264 kg
- protein feed, 100% crude: 1 kg; source Vázquez-Rowe, I. 2013; By-product classification allocatable product; CPC 23319: Preparations used in animal feeding n.e.c.; pedigree (1,1,1,1,1)
  Residual breadcrumbs and broken fish blocks that are destined for animal feed.
  Uncertainty: Uncertainty linked to the likelihood that the fish block and breadcrumbs residues may be treated or separated.
  production volume 0.0088422 kg; = Ref('acf519fa-6550-4428-93fe-84be6c6864ff', 'ProductionVolume') * (Ref('8e0d936b-da6a-49f5-9ca2-de2726e1c852') / Ref('acf519fa-6550-4428-93fe-84be6c6864ff'))
    Calculated from production volume of reference product using the relative outputs.
  property price 0.424 EUR2005
    Based on protein content and energy feed, gross content in soybean meal and prices per kg of soybean meal. Assumed soybean meal is the most used feed. Soybean meal 2004 prices for World import/export data (tonnes and US$) from FaoStat statistics (http://faostat.fao.org/site/535/default.aspx#ancor, TRADE)- [Accessed 24 May 2010]. See calculations for protein /energy content
  property carbon content 0.53
    carbon content on a dry matter basis (reserved; not for manual entry)
  property true value 0.00419336
    allocation property applied in "true value" allocation // value calculated from revenue
  properties: wet mass 1 kg, dry mass 1 kg, water in wet mass 0 kg, water content 0, carbon content, fossil 0, carbon content, non-fossil 0.53, carbon allocation 0.53 kg

## By-products
- heat, for reuse in municipal waste incineration only: 0 MJ; CPC 17300: Steam and hot water; By-product classification allocatable product; pedigree (1,1,1,1,1)
  Net electricity generated from this waste and used in internal MSWI plant energy redistribution.
  Uncertainty: uncertainty is calculated from uncertainties in waste composition and uncertainties in energy efficiency and the uncertainty in internal energy demand
  production volume 0.00448819 MJ
  property exergy 0.1842 MJ; name E_th_prod_MSWI_exergy
    This exergy property is based on the exergy content of the product.
  property price 0.0106 EUR2005; name E_th_prod_MSWI_price_EUR2005
    Average European district heat price from Ecoheatcool and Euroheat 2005-2006, Ecoheat Work package 1: The European heat market. Final report. 10.6 EUR/GJ i s the price of district heat. http://www.solarthermalworld.org/files/Ecoheatcool%20WP1%20Web.pdf?download
  property true value relation 0.1842; name E_th_prod_MSWI_true_value_relation
    property to calculate "true value" from
  property true value 3.22588e-10
    allocation property applied in "true value" allocation // value calculated from true value relation
- electricity, for reuse in municipal waste incineration only: 0 kWh; CPC 17100: Electrical energy; By-product classification allocatable product; pedigree (1,1,1,1,1)
  (same comment as for heat, for reuse in municipal waste incineration only)
  production volume 0.000632109 kWh
  property price 0.1 EUR2005; name E_el_prod_MSWI_price_EUR2005
    Estimated to be the same price as in case of electricity, medium voltage.
  property exergy 3.6 MJ; name E_el_prod_MSWI_exergy
    This exergy property is based on the exergy content of the product.
  property true value relation 3.6; name E_el_prod_MSWI_true_value_relation
    property to calculate "true value" from
  property true value 8.87935e-10
    (same comment as for heat, for reuse in municipal waste incineration only)

## Inputs from technosphere
All rows: source Vázquez-Rowe, I. 2013
- breadcrumbs: 0.029104 kg; lognormal variance with pedigree 0.0406, pedigree (1,1,5,1,1)
  Breadcrumbs produced at a grain mill factory.
  Uncertainty: Data were reported by technical staff at the seafood processing factory.
  properties: water content 0.102536, carbon content, non-fossil 0.475, wet mass 1 kg, dry mass 0.907 kg
- tap water: 0.0198057 kg; lognormal variance with pedigree 0.0426, pedigree (3,1,5,1,1)
  Amount of tap water used in the processing. Includes water for non-additive purposes, including water for cleanng at the premises.
  Uncertainty: Data were reported by technical staff at the seafood processing factory.
  properties: water content 2962.17, wet mass 1 kg, dry mass 0.000337476 kg, carbon content, fossil 0.00178991
  note on carbon content, fossil: Bicarbonate content is 2.93 mol/m3. CO2 content is 0.1 mol/m3 (ecoinvent v2.2 report 8, Tab 93.1).
- oil mill: 1.04569e-9 unit; = sunoil/oilMillProdVol; lognormal variance with pedigree 0.3581, pedigree (4,4,5,3,3)
  Oil mill used to refine sunflower seeds for the production of sunflower oil added in the process.
  Uncertainty: Data were reported by technical staff at the seafood processing factory.
  properties: lifetime capacity [kg] 1.1e9 kg
- sodium hypochlorite, without water, in 15% solution state: 1.30595e-7 kg; lognormal variance with pedigree 0.0413, pedigree (2,2,5,1,1)
  Oceanic freight of the fish blocks from Chile to NW Spain.
  Uncertainty: Data were reported by technical staff at the seafood processing factory.
  properties: dry mass 1 kg, wet mass 1 kg
- electricity, medium voltage: 0.0829237 kWh; lognormal variance with pedigree 0.0406, pedigree (1,1,5,1,1)
  Electricity is used in the following activities at the fish stick producing plant: air conditioning, illumination, cold chambers, hydraulic consumption, unwrapping, cutting, battering, breadcrumb addition, frying, freezing, packaging and wastewater treatment.
  Uncertainty: Data were reported by technical staff at the seafood processing factory.
- fish block, hake: 0.0671631 kg; lognormal variance with pedigree 0.0406, pedigree (1,1,5,1,1)
  Amount of fish block necessary to produce 1 standard package of fish sticks (i.e, 323.47 grams of final product).
  Uncertainty: Data were reported by technical staff at the seafood processing factory.
  properties: water content 0.82, wet mass 0.3276 kg, dry mass 0.18 kg, carbon content, non-fossil 0.48
- wastewater from vegetable oil refinery: -1.17909e-6 m3; lognormal variance with pedigree 0.0427, pedigree (3,2,5,1,1)
  Wastewater from excess of batter
  Uncertainty: Data were reported by technical staff at the seafood processing factory.
  production volume 0.2892 m3
    (same comment as for frozen fish sticks, hake)
  properties: wet mass 1000 kg, water content 1146.05, dry mass 0.871801 kg, carbon content, non-fossil 0.993118
- sodium hydroxide, without water, in 50% solution state: 1.83243e-5 kg; lognormal variance with pedigree 0.048725, pedigree (1,2,5,2,3)
  Detergents for cleaning purposes.
  properties: dry mass 1 kg, wet mass 1 kg
- lubricating oil: 1.16043e-6 kg; name oil; lognormal variance with pedigree 0.0406, pedigree (1,1,5,1,1)
  Lubricating oil used in the machinery at the plant.
  Uncertainty: Data were reported by technical staff at the seafood processing factory.
  properties: dry mass 1 kg, wet mass 1 kg, carbon content, fossil 0.75
  note on carbon content, fossil: Lubricating oil is produced from diesel. C-content/dry mass of fats and oils considered 75%, from: ecoinvent v2.2 report, n 15a, pg 40
- waste mineral oil: 0 kg; pedigree (1,1,1,1,1)
  Waste oil generated due to the use of lubricating oil in plant machinery.
  Uncertainty: Data were reported by technical staff at the seafood processing factory.
  production volume 0 kg
    (same comment as for frozen fish sticks, hake)
  properties: dry mass 0.9 kg, carbon content, fossil 0.864444, wet mass 1 kg, water content 0.111111
  note on carbon content, fossil: Tab A.6, ecoinvent v2.2 report 13_I. C content has been calculated after data in the tables, and then referred to 1 kg DM
- wheat flour mix: 0.00836554 kg; lognormal variance with pedigree 0.0406, pedigree (1,1,5,1,1)
  Amount of wheat flour used.
  properties: carbon content, non-fossil 0.475, dry mass 0.87 kg, wet mass 1 kg, water content 0.149425
  note on carbon content, non-fossil: Biogenic carbon content of vegetation and vegetation processed products on a dry mass basis (47.5% DM) derived from FAOSTAT. Reference: http://www.fao.org/forestry/17111/en
- sunflower seed: 0.0104569 kg; = sunoil/sunflower; lognormal variance with pedigree 0.0592, pedigree (4,4,5,4,3)
  Amount of sunflower seeds needed for sunflower oil in the cooking of the fish sticks.
  properties: water content 0.0638298, dry mass 0.94 kg, carbon content, non-fossil 0.574, wet mass 1 kg
- waste paperboard: -0.00644393 kg; lognormal variance with pedigree 0.0407, pedigree (1,2,5,1,1)
  Includes approximately 15% content of paperboard waste from final packaging. The remaining waste arrives from the fish block packaging.
  Uncertainty: Data were reported by technical staff at the seafood processing factory.
  production volume 0.2892 kg
    (same comment as for frozen fish sticks, hake)
  properties: water content 0.243781, wet mass 1 kg, dry mass 0.804 kg, carbon content, non-fossil 0.483259
  note on carbon content, non-fossil: C content was calculated for 1 kg DM, using data in Tab A.3, ecoinvent v2.2 report 13_I.
- waste plastic, mixture: -0.00226862 kg; lognormal variance with pedigree 0.0407, pedigree (1,2,5,1,1)
  Waste from the fish block packaging.
  Uncertainty: Data were reported by technical staff at the seafood processing factory.
  production volume 0.2892 kg
    (same comment as for frozen fish sticks, hake)
  properties: dry mass 0.847 kg, water content 0.180638, wet mass 1 kg, carbon content, fossil 0.747344
- ammonia, liquid: 4.88798e-9 kg; lognormal variance with pedigree 0.0407, pedigree (1,2,5,1,1)
  Ammonium used in the processing.
  Uncertainty: Data were reported by technical staff at the seafood processing factory.
  properties: dry mass 1 kg, wet mass 1 kg
- waste mineral oil: -1.13419e-6, -2.62439e-8 kg (2 entries); lognormal variance with pedigree 0.0413, pedigree (2,2,5,1,1)
  (same comment as for waste mineral oil)
  production volume 0.2892 kg

## Sampling procedure
Data were reported by technical staff at the seafood processing industry.
