# treatment of waste polyethylene terephthalate, open burning

Dataset: EcoSpold 2, unit process
Geography: GLO
Time period: 2006-01-01 to 2019-12-31
Technology level: current
Classification: ISIC rev.4 ecoinvent: 3821:Treatment and disposal of non-hazardous waste
Synonyms: open, uncontrolled burning
Scenario: Business-as-Usual
System model: Allocation at the point of substitution
Share of production covered: 1 %
Generated by: Avraam Symeonidis
Database: ecoinvent
isCopyrightProtected: true
accessRestrictedTo: 1

## General comment
This dataset represents the activity of waste disposal of waste polyethylene terephtalate in uncontrolled, open burning. Recommended use of this dataset: For PET, which goes to disposal as part of unmanaged communal waste mixture. Larger amounts of clean, *already separated* PET could go to recycling, depending on country-specific situation.Waste composition (wet, in ppm): upper heating value 23.13 MJ/kg; lower heating value 22.95 MJ/kg; H2O 2000; O 368750; H 63380; C 553640; S 147.87; N 6456.8; P n.a.; B n.a.; Cl 788.62; Br 69.004; F 11.829; I n.a.; Ag n.a.; As 1.873; Ba 49.289; Cd 3.2531; Co 31.052; Cr 5.4218; Cu 11.829; Hg 0.08872; Mn 17.744; Mo n.a.; Ni 3.9431; Pb 5.5203; Sb 159.2; Se 2.0701; Sn 0.98577; V 1281.5; Zn 68.676; Be 0.49289; Sc n.a.; Sr 87.241; Ti 985.77; Tl 0.39431; W n.a.; Si n.a.; Fe 98.577; Ca 295.73; Al 197.15; K n.a.; Mg n.a.; Na 1444.7; . Share of carbon in waste that is biogenic 0%. // Recycling rates for metallic iron = 0% for metallic aluminium = 0% for metallic copper = 0% . A mass of 0.0165kg residues are left on ground.

## Included activities start
open burning starting from waste placement on burning site (without transports to the site)

## Included activities end
Waste-specific emissions to air and soil from open burning.

## Geography
Generic open burning without any geographical distinction.

## Technology
This is an inventory for open burning of solid waste. Informal or uncontrolled burning. No flue gas treatment. Suitable for informal recycling (e.g. burning of e-waste). Based on Municipal waste incineration without any pollution control. Residues (minus any actually recycled metals) are left on site. Assumption of share of thermal NOx to total NOx in average waste burning process is 30%. Contribution from thermal NOx is 810mg per kg waste. Recycling rates for metallic iron = 0% for metallic aluminium = 0% for metallic copper = 0% .

## Time period
generic open burning without any temporal distinction

## Reference product
- waste polyethylene terephthalate: -1 kg; By-product classification Waste; CPC 39270: Waste, parings and scrap of plastics; CAS 25038-59-9; pedigree (1,1,1,1,1)
  main reference product of this activity (supply of disposal service).
  Uncertainty: Uncertainty is not adjusted, as this is the refence product
  production volume 1 kg
    The amount of the annual production volume is a placeholder value. The contribution of this technology to the different local markets can be found in the markets themselves.
  property price 0 EUR2005
    Waste products are assigned a price of zero as they are assumed to require further treatment.
  property carbon content 0.55475
    carbon content on a dry matter basis (reserved; not for manual entry)
  properties: tin content 9.8775e-7, dry mass 0.998 kg, vanadium content 0.0012841, iron content 9.8775e-5, titanium content 0.00098775, beryllium content 4.9387e-7, water content 0.002004, selenium content 2.0743e-6, aluminium content 0.00019755, sodium content 0.0014475, calcium content 0.00029632, thallium content 3.951e-7, carbon content, fossil 0.55475, strontium content 8.7416e-5, antimony content 0.00015952, wet mass 1 kg, water in wet mass 0.002 kg, zinc content 6.8813e-5, nickel content 3.951e-6, hydrogen content 0.063507, chlorine content 0.0007902, barium content 4.9387e-5, arsenic content 1.8767e-6, fluorine content 1.1853e-5, nitrogen content 0.0064698, sulfur content 0.00014816, bromine content 6.9142e-5, cadmium content 3.2596e-6, lead content 5.5314e-6, cobalt content 3.1114e-5, mercury content 8.8897e-8, copper content 1.1853e-5, chromium content 5.4326e-6, manganese content 1.7779e-5, oxygen content 0.36949, heating value, net 22.947 MJ, heating value, gross 23.126 MJ, carbon allocation 0.55364 kg

## Inputs from nature
- Oxygen [natural resource, in air]: 1.6133 kg; lognormal variance with pedigree 0.02777, pedigree (1,1,3,1,1)
  oxygen from ambient air needed to combust and oxidise this waste. Net demand, i.e. without air O2 leaving the process uncombusted.
  Uncertainty: uncertainty is calculated from uncertainties in waste composition and transfer coefficients to flue gas and soild residues

## Emissions to nature
- Cobalt [air, urban air close to ground]: 1.2524e-6 kg; lognormal variance with pedigree 1.1458, pedigree (1,1,3,1,1)
  Emissions to air from open burning.
  Uncertainty: Uncertainty calculated depending on waste input and uncertainty of transfer coefficents in incineration model.
- Barium [soil, industrial]: 4.7257e-5 kg; lognormal variance with pedigree 1.0582, pedigree (1,1,3,1,1)
  Emissions from open burning to residues left on ground.
  Uncertainty: Uncertainty calculated depending on waste input and uncertainty of transfer coefficents in incineration model.
- Chromium [air, urban air close to ground]: 8.0848e-9 kg; lognormal variance with pedigree 1.4431, pedigree (1,1,3,1,1)
  (same comment as for Cobalt)
- Bromine [soil, industrial]: 4.6876e-5 kg; lognormal variance with pedigree 1.0139, pedigree (1,1,3,1,1)
  (same comment as for Barium)
- Cadmium [air, urban air close to ground]: 1.8405e-8 kg; lognormal variance with pedigree 1.4796, pedigree (1,1,3,1,1)
  (same comment as for Cobalt)
- Arsenic [soil, industrial]: 1.857e-6 kg; lognormal variance with pedigree 1.4899, pedigree (1,1,3,1,1)
  (same comment as for Barium)
- Barium [air, urban air close to ground]: 2.0315e-6 kg; lognormal variance with pedigree 1.084, pedigree (1,1,3,1,1)
  (same comment as for Cobalt)
- Chloride [soil, industrial]: 0.00026252 kg; lognormal variance with pedigree 0.69405, pedigree (1,1,3,1,1)
  (same comment as for Barium)
- Hydrogen fluoride [air, urban air close to ground]: 1.3275e-6 kg; lognormal variance with pedigree 1.261, pedigree (1,1,3,1,1)
  (same comment as for Cobalt)
- Fluoride [soil, industrial]: 1.0568e-5 kg; lognormal variance with pedigree 1.2477, pedigree (1,1,3,1,1)
  (same comment as for Barium)
- Bromine [air, urban air close to ground]: 2.2128e-5 kg; lognormal variance with pedigree 1.017, pedigree (1,1,3,1,1)
  (same comment as for Cobalt)
- Nitrogen [soil, industrial]: 6.4647e-5 kg; lognormal variance with pedigree 0.47272, pedigree (1,1,3,1,1)
  (same comment as for Barium)
- Arsenic [air, urban air close to ground]: 1.5963e-8 kg; lognormal variance with pedigree 1.5433, pedigree (1,1,3,1,1)
  (same comment as for Cobalt)
- Sulfur [soil, industrial]: 0.00012664 kg; lognormal variance with pedigree 0.91205, pedigree (1,1,3,1,1)
  (same comment as for Barium)
- Dinitrogen monoxide [air, urban air close to ground]: 0.00011625 kg; lognormal variance with pedigree 0.0431, pedigree (1,1,3,1,1)
  (same comment as for Cobalt)
- PAH, polycyclic aromatic hydrocarbons [air, urban air close to ground]: 0.0003443 kg; lognormal variance with pedigree 0.30374, pedigree (1,1,3,1,1)
  Process-specific (constant) emissions to air from open burning.
  Uncertainty: uncertainty generic estimate
- Nitrogen oxides [air, urban air close to ground]: 0.0086615 kg; lognormal variance with pedigree 0.36275, pedigree (1,1,3,1,1)
  (same comment as for Cobalt)
- Carbon [soil, industrial]: 0.0027765 kg; lognormal variance with pedigree 0.076828, pedigree (1,1,3,1,1)
  (same comment as for Barium)
- Hydrogen chloride [air, urban air close to ground]: 0.00054094 kg; lognormal variance with pedigree 0.69113, pedigree (1,1,3,1,1)
  (same comment as for Cobalt)
- Polychlorinated biphenyls [air, urban air close to ground]: 1.1189e-7 kg; lognormal variance with pedigree 0.0431, pedigree (1,1,3,1,1)
  (same comment as for PAH, polycyclic aromatic hydrocarbons)
- Methane, fossil [air, urban air close to ground]: 0.0059 kg; lognormal variance with pedigree 0.0431, pedigree (1,1,3,1,1)
  (same comment as for PAH, polycyclic aromatic hydrocarbons)
- Acetaldehyde [air, urban air close to ground]: 0.0004284 kg; lognormal variance with pedigree 0.0431, pedigree (1,1,3,1,1)
  (same comment as for PAH, polycyclic aromatic hydrocarbons)
- Sulfur dioxide [air, urban air close to ground]: 6.3685e-5 kg; lognormal variance with pedigree 0.92213, pedigree (1,1,3,1,1)
  (same comment as for Cobalt)
- Formaldehyde [air, urban air close to ground]: 0.00044365 kg; lognormal variance with pedigree 0.0431, pedigree (1,1,3,1,1)
  (same comment as for PAH, polycyclic aromatic hydrocarbons)
- Carbon dioxide, fossil [air, urban air close to ground]: 1.9429 kg; lognormal variance with pedigree 0.013082, pedigree (1,1,3,1,1)
  Emissions to air from open burning.
  Uncertainty: Uncertainty calculated depending on waste input, uncertainty of transfer coefficents in incineration model,and uncertainty in CO and CH4 emissions.
- Benzene, ethyl- [air, urban air close to ground]: 0.00032746 kg; lognormal variance with pedigree 0.0431, pedigree (1,1,3,1,1)
  (same comment as for PAH, polycyclic aromatic hydrocarbons)
- Carbon monoxide, fossil [air, urban air close to ground]: 0.0386 kg; lognormal variance with pedigree 0.64957, pedigree (1,1,3,1,1)
  (same comment as for PAH, polycyclic aromatic hydrocarbons)
- Styrene [air, urban air close to ground]: 0.0005275 kg; lognormal variance with pedigree 0.0431, pedigree (1,1,3,1,1)
  (same comment as for PAH, polycyclic aromatic hydrocarbons)
- Phenol [air, urban air close to ground]: 1.4799e-5 kg; lognormal variance with pedigree 0.0431, pedigree (1,1,3,1,1)
  (same comment as for PAH, polycyclic aromatic hydrocarbons)
- Toluene [air, urban air close to ground]: 0.000372 kg; lognormal variance with pedigree 0.0431, pedigree (1,1,3,1,1)
  (same comment as for PAH, polycyclic aromatic hydrocarbons)
- Dioxins, measured as 2,3,7,8-tetrachlorodibenzo-p-dioxin [air, urban air close to ground]: 9.6156e-12 kg; lognormal variance with pedigree 1.1711, pedigree (1,1,3,1,1)
  Process-specific (constant) emissions to air from open burning.
  Uncertainty: Uncertainty calculated from uncetainty in Chlorine content in waste and estimation formula
- Water [air, urban air close to ground]: 0.00050904 m3; lognormal variance with pedigree 0.16453, pedigree (1,1,3,1,1)
  water vapour from waste humidity, hydrogen oxidation.
  Uncertainty: Uncertainty calculated from uncertainty in waste composition and the uncertainty of fraction to air.
- Benzene [air, urban air close to ground]: 0.00097975 kg; lognormal variance with pedigree 0.0431, pedigree (1,1,3,1,1)
  (same comment as for PAH, polycyclic aromatic hydrocarbons)
- Sodium [soil, industrial]: 0.0014091 kg; lognormal variance with pedigree 0.6118, pedigree (1,1,3,1,1)
  (same comment as for Barium)
- Particulates, < 2.5 um [air, urban air close to ground]: 0.00054599 kg; lognormal variance with pedigree 0.44015, pedigree (1,1,3,1,1)
  (same comment as for Cobalt)
- Dioxins, measured as 2,3,7,8-tetrachlorodibenzo-p-dioxin [soil, industrial]: 2.671e-12 kg; lognormal variance with pedigree 1.6516, pedigree (1,1,3,1,1)
  (same comment as for Dioxins, measured as 2,3,7,8-tetrachlorodibenzo-p-dioxin)
- Particulates, > 2.5 um, and < 10um [air, urban air close to ground]: 0.00029399 kg; lognormal variance with pedigree 0.44015, pedigree (1,1,3,1,1)
  (same comment as for Cobalt)
- Aluminium [soil, industrial]: 0.00019699 kg; lognormal variance with pedigree 0.87374, pedigree (1,1,3,1,1)
  (same comment as for Barium)
- Sodium [air, urban air close to ground]: 3.5583e-5 kg; lognormal variance with pedigree 0.64572, pedigree (1,1,3,1,1)
  (same comment as for Cobalt)
- Thallium [soil, industrial]: 3.9352e-7 kg; lognormal variance with pedigree 1.6914, pedigree (1,1,3,1,1)
  (same comment as for Barium)
- Particulates, > 10 um [air, urban air close to ground]: 0.00020999 kg; lognormal variance with pedigree 0.44015, pedigree (1,1,3,1,1)
  (same comment as for Cobalt)
- Calcium [soil, industrial]: 0.00028875 kg; lognormal variance with pedigree 0.81995, pedigree (1,1,3,1,1)
  (same comment as for Barium)
- Calcium [air, urban air close to ground]: 6.9821e-6 kg; lognormal variance with pedigree 0.85458, pedigree (1,1,3,1,1)
  (same comment as for Cobalt)
- Iron [soil, industrial]: 9.8399e-5 kg; lognormal variance with pedigree 0.96593, pedigree (1,1,3,1,1)
  (same comment as for Barium)
- Aluminium [air, urban air close to ground]: 1.6251e-7 kg; lognormal variance with pedigree 0.9811, pedigree (1,1,3,1,1)
  (same comment as for Cobalt)
- Beryllium [soil, industrial]: 4.9196e-7 kg; lognormal variance with pedigree 1.6627, pedigree (1,1,3,1,1)
  (same comment as for Barium)
- Iron [air, urban air close to ground]: 1.7861e-7 kg; lognormal variance with pedigree 1.0537, pedigree (1,1,3,1,1)
  (same comment as for Cobalt)
- Titanium [soil, industrial]: 0.00097532 kg; lognormal variance with pedigree 0.66148, pedigree (1,1,3,1,1)
  (same comment as for Barium)
- Thallium [air, urban air close to ground]: 7.8862e-10 kg; lognormal variance with pedigree 1.7767, pedigree (1,1,3,1,1)
  (same comment as for Cobalt)
- Strontium [soil, industrial]: 8.7154e-5 kg; lognormal variance with pedigree 0.9822, pedigree (1,1,3,1,1)
  (same comment as for Barium)
- Strontium [air, urban air close to ground]: 8.7241e-8 kg; lognormal variance with pedigree 1.0846, pedigree (1,1,3,1,1)
  (same comment as for Cobalt)
- Zinc [soil, industrial]: 6.8165e-5 kg; lognormal variance with pedigree 1.0141, pedigree (1,1,3,1,1)
  (same comment as for Barium)
- Titanium [air, urban air close to ground]: 1.0452e-5 kg; lognormal variance with pedigree 0.71064, pedigree (1,1,3,1,1)
  (same comment as for Cobalt)
- Vanadium [soil, industrial]: 0.0011826 kg; lognormal variance with pedigree 0.62735, pedigree (1,1,3,1,1)
  (same comment as for Barium)
- Zinc [air, urban air close to ground]: 5.1094e-7 kg; lognormal variance with pedigree 1.0703, pedigree (1,1,3,1,1)
  (same comment as for Cobalt)
- Selenium [soil, industrial]: 1.8907e-6 kg; lognormal variance with pedigree 1.4768, pedigree (1,1,3,1,1)
  (same comment as for Barium)
- Vanadium [air, urban air close to ground]: 9.8944e-5 kg; lognormal variance with pedigree 0.64447, pedigree (1,1,3,1,1)
  (same comment as for Cobalt)
- Tin [soil, industrial]: 9.8577e-7 kg; lognormal variance with pedigree 1.5733, pedigree (1,1,3,1,1)
  (same comment as for Barium)
- Tin [air, urban air close to ground]: 1.9317e-12 kg; lognormal variance with pedigree 1.8659, pedigree (1,1,3,1,1)
  (same comment as for Cobalt)
- Antimony [soil, industrial]: 0.0001592 kg; lognormal variance with pedigree 0.90216, pedigree (1,1,3,1,1)
  (same comment as for Barium)
- Beryllium [air, urban air close to ground]: 9.3158e-10 kg; lognormal variance with pedigree 1.7494, pedigree (1,1,3,1,1)
  (same comment as for Cobalt)
- Lead [soil, industrial]: 5.4739e-6 kg; lognormal variance with pedigree 1.3483, pedigree (1,1,3,1,1)
  (same comment as for Barium)
- Antimony [air, urban air close to ground]: 3.8259e-10 kg; lognormal variance with pedigree 1.1878, pedigree (1,1,3,1,1)
  (same comment as for Cobalt)
- Manganese [soil, industrial]: 1.7593e-5 kg; lognormal variance with pedigree 1.194, pedigree (1,1,3,1,1)
  (same comment as for Barium)
- Selenium [air, urban air close to ground]: 1.7941e-7 kg; lognormal variance with pedigree 1.4925, pedigree (1,1,3,1,1)
  (same comment as for Cobalt)
- Nickel [soil, industrial]: 3.9375e-6 kg; lognormal variance with pedigree 1.3925, pedigree (1,1,3,1,1)
  (same comment as for Barium)
- Lead [air, urban air close to ground]: 4.6389e-8 kg; lognormal variance with pedigree 1.402, pedigree (1,1,3,1,1)
  (same comment as for Cobalt)
- Copper [soil, industrial]: 1.1816e-5 kg; lognormal variance with pedigree 1.2477, pedigree (1,1,3,1,1)
  (same comment as for Barium)
- Manganese [air, urban air close to ground]: 1.5104e-7 kg; lognormal variance with pedigree 1.2475, pedigree (1,1,3,1,1)
  (same comment as for Cobalt)
- Mercury [soil, industrial]: 3.495e-8 kg; lognormal variance with pedigree 1.9263, pedigree (1,1,3,1,1)
  (same comment as for Barium)
- Nickel [air, urban air close to ground]: 5.6256e-9 kg; lognormal variance with pedigree 1.486, pedigree (1,1,3,1,1)
  (same comment as for Cobalt)
- Chromium [soil, industrial]: 5.4137e-6 kg; lognormal variance with pedigree 1.3506, pedigree (1,1,3,1,1)
  (same comment as for Barium)
- Copper [air, urban air close to ground]: 1.3001e-8 kg; lognormal variance with pedigree 1.3477, pedigree (1,1,3,1,1)
  (same comment as for Cobalt)
- Cobalt [soil, industrial]: 2.9799e-5 kg; lognormal variance with pedigree 1.1197, pedigree (1,1,3,1,1)
  (same comment as for Barium)
- Mercury [air, urban air close to ground]: 5.3769e-8 kg; lognormal variance with pedigree 1.9245, pedigree (1,1,3,1,1)
  (same comment as for Cobalt)
- Cadmium [soil, industrial]: 3.2346e-6 kg; lognormal variance with pedigree 1.4177, pedigree (1,1,3,1,1)
  (same comment as for Barium)

## Extrapolations
This dataset has been extrapolated from year 2012 to the year of the calculation (2019). The uncertainty has been adjusted accordingly.
