# planting, sugarcane

Dataset: EcoSpold 2, unit process
Geography: BR
Time period: 2012-01-01 to 2019-12-31
Technology level: current
Classification: ISIC rev.4 ecoinvent: 0161:Support activities for crop production
Classification: EcoSpold01Categories: agricultural means of production/work processes
Scenario: Business-as-Usual
System model: Allocation at the point of substitution
Share of production covered: 100 %
Generated by: Mateus Chagas
Published in: Cavalett O. 2016
Database: ecoinvent
isCopyrightProtected: true
accessRestrictedTo: 1

## General comment
This dataset represents the sugarcane planting operation in one hectare (ha). The mechanized planting is performed with billet cane. Activity comprises the furrow oppening, billets and fertiliser applicatin, and furrow closing. Functional Unit (FU) is one hectare of sugarcane planting. The operation time is about 1.21 hours per ha (48.0% of this time is actually worked, discounting time for maintenance, waiting in the field and re-allocations between the plots).

## Included activities start
From agricultural field foreseen to be processed.

## Included activities end
This activity ends when furrow is closed. The dataset includes the diesel fuel consumption (19.53 L of diesel per hour of effective operation) and the amount of agricultural machinery and shed. Also taken into consideration is the amount of emissions to the air from diesel combustion and the emission to the soil from tyre abrasion during the work process.

## Geography
The dataset is modeled for sugarcane production system in Brazilian South-Cental region.

## Technology
This activity is performed with a tractor (power 180 hp; weight 7477 kg) plus a planter implement of two lines (weight 7700 kg). Life spam of this tractor is considered as 13500 operating hours and of the implement as 8000 operating hours. Machinery used, fuel consumption and operation efficiencies were based on data from sugarcane mills in Brazil, expert's informations and unpublished data.

## Time period
Most of the data used to modelling this activity were collected in the last few years (2012-2014).

## Reference product
- planting, sugarcane: 1 ha; By-product classification allocatable product; CPC 86119: Other support services to crop production
  production volume 1.47824e6 ha; = 0.707*10454280/5
    Estimated based on sugarcane production area in Brazil, year 2014, according to the IBGE data. This operation is assumed to occur once every 5 years, in mechanised planting areas (70.7% of total area).
  property price 8.65865 EUR2005
    Calculated based on inputs: The price of the product has been calculated as a sum of the values of the material and energy inputs for this product. This value is therefore a rough estimation. It may underestimate the real price since there are additional expenses when producing any product. These expences can include for example labour costs, treatment of waste materials and profit for the producer. Please consider carefully whether this level of data quality is acceptable for your application.

## Inputs from technosphere
- agricultural machinery, unspecified: 1.16042 kg; source Otávio Cavalett 2016; lognormal variance with pedigree 0.0027, pedigree (2,2,3,1,1)
  Proxy, based on data from sugarcane mills in Brazil, expert's informations and unpublished data. The main source of data for agricultural inputs and operations modelling prodedures is detailed in Cavalett et al., 2016.
- shed: 0.002 m2; lognormal variance with pedigree 0.0127, pedigree (3,3,3,3,3)
  Proxy, based on ecoinvent database.
- tractor, 4-wheel, agricultural: 0.680341 kg; source Otávio Cavalett 2016; lognormal variance with pedigree 0.0027, pedigree (2,2,3,1,1)
  (same comment as for agricultural machinery, unspecified)
- diesel: 9.62875 kg; source Otávio Cavalett 2016; lognormal variance with pedigree 0.0027, pedigree (2,2,3,1,1)
  (same comment as for agricultural machinery, unspecified)
  properties: dry mass 1 kg, carbon content, fossil 0.865, wet mass 1 kg
  note on carbon content, fossil: C-content of diesel is 86.5% (ecoinvent v2.2 report 6_IV, Tab 3.14)

## Emissions to nature
All rows: source Nemecek, T. 2007
- Zinc [soil, agricultural]: 0.00180344 kg; lognormal variance with pedigree 0.046, pedigree (3,4,3,1,1)
  Proxy, based on 'Agricultural Field Work Processes'from Nemecek and Kagi, 2007.
- Lead [soil, agricultural]: 0.000293059 kg; lognormal variance with pedigree 0.046, pedigree (3,4,3,1,1)
  Proxy, based on 'Agricultural Field Work Processes'from Nemecek and Kagi, 2007.
- PAH, polycyclic aromatic hydrocarbons [air, non-urban air or from high stacks]: 3.16786e-5 kg; lognormal variance with pedigree 0.3221, pedigree (3,2,3,1,3)
  Proxy, based on 'Agricultural Field Work Processes'from Nemecek and Kagi, 2007.
- Ammonia [air, non-urban air or from high stacks]: 0.000192575 kg; lognormal variance with pedigree 0.0621, pedigree (3,2,3,1,3)
  Proxy, based on 'Agricultural Field Work Processes'from Nemecek and Kagi, 2007.
- Benzo(a)pyrene [air, non-urban air or from high stacks]: 2.88863e-7 kg; lognormal variance with pedigree 0.6621, pedigree (3,2,3,1,3)
  Proxy, based on 'Agricultural Field Work Processes'from Nemecek and Kagi, 2007.
- Benzene [air, non-urban air or from high stacks]: 7.02899e-5 kg; lognormal variance with pedigree 0.0621, pedigree (3,2,3,1,3)
  Proxy, based on 'Agricultural Field Work Processes'from Nemecek and Kagi, 2007.
- NMVOC, non-methane volatile organic compounds, unspecified origin [air, non-urban air or from high stacks]: 0.0288863 kg; lognormal variance with pedigree 0.0621, pedigree (3,2,3,1,3)
  Proxy, based on 'Agricultural Field Work Processes'from Nemecek and Kagi, 2007. Emissions of CO, NOx and NMVOC were estimated based on avarege of the agricultural process used in sugarcane production.
- Methane, fossil [air, non-urban air or from high stacks]: 0.00124211 kg; lognormal variance with pedigree 0.0621, pedigree (3,2,3,1,3)
  Proxy, based on 'Agricultural Field Work Processes'from Nemecek and Kagi, 2007.
- Cadmium [air, non-urban air or from high stacks]: 9.62875e-8 kg; lognormal variance with pedigree 0.6621, pedigree (3,2,3,1,3)
  Proxy, based on 'Agricultural Field Work Processes'from Nemecek and Kagi, 2007.
- Carbon dioxide, fossil [air, non-urban air or from high stacks]: 30.0417 kg; lognormal variance with pedigree 0.0221, pedigree (3,2,3,1,3)
  Proxy, based on 'Agricultural Field Work Processes'from Nemecek and Kagi, 2007.
- Carbon monoxide, fossil [air, non-urban air or from high stacks]: 0.0519953 kg; lognormal variance with pedigree 0.6621, pedigree (3,2,3,1,3)
  (same comment as for NMVOC, non-methane volatile organic compounds, unspecified origin)
- Selenium [air, non-urban air or from high stacks]: 9.62875e-8 kg; lognormal variance with pedigree 0.0621, pedigree (3,2,3,1,3)
  Proxy, based on 'Agricultural Field Work Processes'from Nemecek and Kagi, 2007.
- Zinc [air, non-urban air or from high stacks]: 9.62875e-6 kg; lognormal variance with pedigree 0.6621, pedigree (3,2,3,1,3)
  Proxy, based on 'Agricultural Field Work Processes'from Nemecek and Kagi, 2007.
- Nitrogen oxides [air, non-urban air or from high stacks]: 0.409222 kg; lognormal variance with pedigree 0.0521, pedigree (3,2,3,1,3)
  (same comment as for NMVOC, non-methane volatile organic compounds, unspecified origin)
- Nickel [air, non-urban air or from high stacks]: 6.74013e-7 kg; lognormal variance with pedigree 0.6621, pedigree (3,2,3,1,3)
  Proxy, based on 'Agricultural Field Work Processes'from Nemecek and Kagi, 2007.
- Dinitrogen monoxide [air, non-urban air or from high stacks]: 0.00115545 kg; lognormal variance with pedigree 0.0621, pedigree (3,2,3,1,3)
  Proxy, based on 'Agricultural Field Work Processes'from Nemecek and Kagi, 2007.
- Chromium [air, non-urban air or from high stacks]: 4.81438e-7 kg; lognormal variance with pedigree 0.6621, pedigree (3,2,3,1,3)
  Proxy, based on 'Agricultural Field Work Processes'from Nemecek and Kagi, 2007.
- Cadmium [soil, agricultural]: 6.7629e-5 kg; lognormal variance with pedigree 0.046, pedigree (3,4,3,1,1)
  Proxy, based on 'Agricultural Field Work Processes'from Nemecek and Kagi, 2007.
- Sulfur dioxide [air, non-urban air or from high stacks]: 0.00972504 kg; lognormal variance with pedigree 0.0221, pedigree (3,2,3,1,3)
  Proxy, based on 'Agricultural Field Work Processes'from Nemecek and Kagi, 2007.
- Copper [air, non-urban air or from high stacks]: 1.63689e-5 kg; lognormal variance with pedigree 0.6621, pedigree (3,2,3,1,3)
  Proxy, based on 'Agricultural Field Work Processes'from Nemecek and Kagi, 2007.
- Particulates, < 2.5 um [air, non-urban air or from high stacks]: 0.118785 kg; lognormal variance with pedigree 0.0621, pedigree (3,2,3,1,3)
  Proxy, based on 'Agricultural Field Work Processes'from Nemecek and Kagi, 2007.

## Sampling procedure
The main source of data for agricultural inputs and operations modelling procedures is detailed in Cavalett et al., 2016. Emissions from the agricultural process are estimated according to Nemecek and Kagi, 2007.

## Extrapolations
This dataset has been extrapolated from year 2014 to the year of the calculation (2019). The uncertainty has been adjusted accordingly.

## Review by Jens Lansche 2018-02-23
All review comments considered
