# iron mine operation, crude ore, 63% Fe

Dataset: EcoSpold 2, unit process
Geography: IN
Time period: 2000-01-01 to 2019-12-31
Technology level: current
Classification: ISIC rev.4 ecoinvent: 0710:Mining of iron ores
Classification: EcoSpold01Categories: metals/extraction
Scenario: Business-as-Usual
System model: Allocation at the point of substitution
Share of production covered: 15 %
Generated by: Harshita Soni
Published in: Soni H. 2017
Database: ecoinvent
isCopyrightProtected: true
accessRestrictedTo: 1

## General comment
"Iron & steel is the driving force behind industrial
development in any country. The vitality of the
Iron & Steel Industry largely influences a country's
economic status. The mining of iron ore, an essential
raw material for Iron & Steel Industry, is arguably of
prime importance among all mining activities
undertaken by any country. With the total resources of over 31.32 billion tonnes of haematite (Fe2O3 ) and magnetite (Fe3O4), India is amongst the leading producers of iron ore in the world.
"
(Source: Indian Minerals
Yearbook 2015, Published in May 2017)
Iron & steel is the driving force behind industrial
development in any country. The vitality of the
Iron & Steel Industry largely influences a country's
economic status. The mining of iron ore, an essential
raw material for Iron & Steel Industry, is arguably of
prime importance among all mining activities
undertaken by any country. With the total resources of over 31.32 billion tonnes of haematite (Fe2O3 ) and magnetite (Fe3O4), India is amongst the leading producers of iron ore in the world.
(Source: Indian Bureau of Mines Year Book for 2015, Published in May 2017)
There were 290 reporting mines in 2014-15 as
against 322 in the previous year, The production of iron ore constituting lumps, fines and concentrates was at 128.9 million tonnes in the year 2014-15

According to National Minerial Development Corporation (NMDC), the total quantity of iron ore mined in India for the year April 2016- March 2017: 190 million tonnes. Quantity mined by NMDC for the same year is 28 million tonnes.

## Included activities start
Activity starts with iron ore mining.

## Included activities end
This activity ends at the exit of the iron ore mines.

## Geography
Data collected from Iron ore mines in India

## Technology
Haematite and magnetite are the most important iron ores in India. About 59% haematite ore deposits are found in the Eastern Sector while about 92% magnetite ore deposits occur in Southern Sector, especially in Karnataka. Of these, haematite is considered to be superior because of its higher grade.
Major resources of haematite are located in Odisha (7,183 million tonnes or 35%), Jharkhand (5,069 million tonnes or 25%), Chhattisgarh (4,031 million tonnes or 20%), Karnataka (2,269 million tonnes or 11%) and Goa (1,019 million tonnes or 5%). The balance resources of haematite are spread in Andhra Pradesh, Assam, Bihar, Madhya Pradesh, Maharashtra, Meghalaya, Rajasthan, Telangana and Uttar Pradesh
India's 98% magnetite resources are located in five States, namely, Karnataka (7,802 million tonnes or 72%) followed by Andhra Pradesh (1,392 million tonnes or 13%), Rajasthan (627 million tonnes or 6%), Tamil Nadu (507 million tonnes or 5%) and Goa (226 million tonnes or 2%). Assam, Bihar, Jharkhand, Kerala, Maharashtra, Meghalaya, Nagaland, Odisha and Telangana together account for the remaining 2% resources.

## Time period
Data collected for the period April 2016- March 2017.

## Parameters
- fraction_PW_to_air: 0.2; lognormal variance with pedigree 0.092025, pedigree (4,4,3,2,4)
  Literature value (Statistics Canada, 2007 & Shaffer, K.H., 2008, Consumptive water use in the Great Lakes Basin, USGS) (Vionnet, S., Quantis Water Database - Technical Report, 2012).

## Reference product
- iron ore, crude ore, 63% Fe: 1 kg; name RP_amount; By-product classification allocatable product; CPC 14100: Iron ores and concentrates, other than roasted iron pyrites
  production volume 1.9e11 kg; name RP_PV
    Source: Information obtained from NMDC
  property price 0.0452631 EUR2005
    Assuming that iron content (and the price of iron) in the determining factor in the price of iron ore, this value was calculated relative to the price for "iron ore, beneficiated, 65% Fe": (63/65) * 0.0467 (EUR/kg; price for iron ore, beneficiated, 65% Fe)
  property carbon content 0
    carbon content on a dry matter basis (reserved; not for manual entry)
  property true value 0.0452631; name RP_amount_true_value
    allocation property applied in "true value" allocation // value calculated from revenue
  properties: dry mass 1 kg, wet mass 1 kg, water content 0, carbon content, fossil 0, carbon content, non-fossil 0, water in wet mass 0 kg, iron content 0.63, carbon allocation 0 kg

## By-products
- heat, for reuse in municipal waste incineration only: 0 MJ; CPC 17300: Steam and hot water; By-product classification allocatable product; pedigree (1,1,1,1,1)
  Net electricity generated from this waste and used in internal MSWI plant energy redistribution.
  Uncertainty: uncertainty is calculated from uncertainties in waste composition and uncertainties in energy efficiency and the uncertainty in internal energy demand
  production volume 686284 MJ
  property exergy 0.1842 MJ; name E_th_prod_MSWI_exergy
    This exergy property is based on the exergy content of the product.
  property price 0.0106 EUR2005; name E_th_prod_MSWI_price_EUR2005
    Average European district heat price from Ecoheatcool and Euroheat 2005-2006, Ecoheat Work package 1: The European heat market. Final report. 10.6 EUR/GJ i s the price of district heat. http://www.solarthermalworld.org/files/Ecoheatcool%20WP1%20Web.pdf?download
  property true value relation 0.1842; name E_th_prod_MSWI_true_value_relation
    property to calculate "true value" from
  property true value 2.38298e-8
    allocation property applied in "true value" allocation // value calculated from true value relation
- electricity, for reuse in municipal waste incineration only: 0 kWh; CPC 17100: Electrical energy; By-product classification allocatable product; pedigree (1,1,1,1,1)
  (same comment as for heat, for reuse in municipal waste incineration only)
  production volume 94922.7 kWh
  property price 0.1 EUR2005; name E_el_prod_MSWI_price_EUR2005
    Estimated to be the same price as in case of electricity, medium voltage.
  property exergy 3.6 MJ; name E_el_prod_MSWI_exergy
    This exergy property is based on the exergy content of the product.
  property true value relation 3.6; name E_el_prod_MSWI_true_value_relation
    property to calculate "true value" from
  property true value 6.44169e-8
    (same comment as for heat, for reuse in municipal waste incineration only)

## Inputs from technosphere
- wastewater, average: -6.58959e-5 m3; name wastewater; = (water_input * (1 - fraction_PW_to_air))*-1; lognormal variance with pedigree 0.25, pedigree (5,5,5,5,5)
  Calculated based on the amount of input water. For more information, refer to the parameter's comment.
  production volume 1.25202e7 m3; = wastewater / RP_amount * RP_PV
    Calculated from production volume of reference product using the relative outputs.
  property price 0 EUR2005; name wastewater_price_EUR2005
  properties: dry mass 0.346837 kg, water content 2882.2, wet mass 1000 kg, carbon content, non-fossil 0.194039
  note on carbon content, non-fossil: 0.0673 kg TOC/m3 (Tab A.17, ecoinvent v2.2 report 13_I). TOC was considered as Total Carbon.
- blasting: 0.00023451 kg; lognormal variance with pedigree 0.0035, pedigree (3,3,2,3,2)
  Based on data received from iron ore mines in India
  EcoSpold01Location=RER
- recultivation, iron mine: 3.09999e-5 m2; lognormal variance with pedigree 0.3135, pedigree (3,3,2,3,2)
  EcoSpold01Location=GLO
  Based on data received from iron ore mines in India
- inert waste, for final disposal: -0.1495 kg; name inert_waste; lognormal variance with pedigree 0.004, pedigree (3,3,2,1,2)
  Based on data received from iron ore mines in India
  production volume 2.8405e10 kg; = inert_waste / RP_amount * RP_PV
    Calculated from production volume of reference product using the relative outputs.
  property iron content 0.4235; name inert_waste_Fe_content
  property price 0 EUR2005; name inert_waste_price_EUR2005
  properties: wet mass 1 kg, water content 0.00502513, dry mass 0.995 kg
- electricity, medium voltage: 0.00204814 kWh; lognormal variance with pedigree 0.0035, pedigree (3,3,2,3,2)
  Based on data received from iron ore mines in India
  EcoSpold01Location=UCTE
- diesel, burned in building machine: 0.01608 MJ; lognormal variance with pedigree 0.0094, pedigree (3,3,2,1,2)
  Based on data received from iron ore mines in India
- mine infrastructure, iron: 8.33328e-13 unit; lognormal variance with pedigree 0.3135, pedigree (3,3,2,3,2)
  EcoSpold01Location=GLO
  Based on ecoinvent dataset for "iron mine operation, GLO" accessed through ecoeditor on 20170815
- lubricating oil: 0 kg; pedigree (1,1,1,1,1)
  Based on data received from iron ore mines in India
  properties: wet mass 1 kg, carbon content, fossil 0.75, dry mass 1 kg
  note on carbon content, fossil: Lubricating oil is produced from diesel. C-content/dry mass of fats and oils considered 75%, from: ecoinvent v2.2 report, n 15a, pg 40

## Inputs from nature
- Occupation, mineral extraction site [natural resource, land]: 0.001189 m2*year; lognormal variance with pedigree 0.0535, pedigree (3,3,2,3,2)
  Based on data received from iron ore mines in India
- Iron, in ground [natural resource, in ground]: 0.629999 kg; lognormal variance with pedigree 0.004, pedigree (3,3,2,1,2)
  Based on data received from iron ore mines in India
- Transformation, to mineral extraction site [natural resource, land]: 3.09999e-5 m2; lognormal variance with pedigree 0.1335, pedigree (3,3,2,3,2)
  Based on data received from iron ore mines in India
- Water, unspecified natural origin [natural resource, in water]: 8.23698e-5 m3; name water_input; lognormal variance with pedigree 0.004, pedigree (3,3,2,1,2)
  Based on data received from iron ore mines in India
- Gangue, in ground [natural resource, in ground]: 0.499499 kg; lognormal variance with pedigree 0.004, pedigree (3,3,2,1,2)
  gangue amount = iron ore, cruder ore, 63% Fe + inert waste, for final disposal - Iron, in ground
  = 1+ 0.1495 - 0.65
  = 0.4995 kg
- Transformation, from forest, unspecified [natural resource, land]: 3.09999e-5 m2; lognormal variance with pedigree 0.004, pedigree (3,3,2,1,2)
  Based on data received from iron ore mines in India

## Emissions to nature
- Particulates, < 2.5 um [air, non-urban air or from high stacks]: 0.00014415 kg; lognormal variance with pedigree 0.3135, pedigree (3,3,2,3,2)
  Based on ecoinvent dataset for "iron mine operation, GLO" accessed through ecoeditor on 20170815
- Particulates, > 2.5 um, and < 10um [air, non-urban air or from high stacks]: 0.0012973 kg; lognormal variance with pedigree 0.1335, pedigree (3,3,2,3,2)
  (same comment as for Particulates, < 2.5 um)
- Water [air, unspecified]: 1.6474e-5 m3; = water_input * fraction_PW_to_air; lognormal variance with pedigree 0.25, pedigree (5,5,5,5,5)
  (same comment as for wastewater, average)
- Particulates, > 10 um [air, non-urban air or from high stacks]: 0.0014415 kg; lognormal variance with pedigree 0.0535, pedigree (3,3,2,3,2)
  (same comment as for Particulates, < 2.5 um)

## Sampling procedure
Data received from iron ore mines in India

Quantity of iron ore mined at sites from where data was received:
28,46,51,19,000 kg for the year April 2016 - March 2017.

Total quantity of iron ore mined in India for April 2106- March 2017: 190 million tonnes.

## Extrapolations
Data for emissions to air were copied from the dataset "iron mine operation, crude ore, 46%, Fe, GLO 2000".
