# treatment of used toner module, laser printer, colour, recycling

Dataset: EcoSpold 2, unit process
Geography: RoW
Time period: 2002-01-01 to 2019-12-31
Technology level: current
Classification: EcoSpold01Categories: electronics/module
Classification: ISIC rev.4 ecoinvent: 2817:Manufacture of office machinery and equipment (except computers and periphe
Synonyms: toner cartridge; CMYK; OEM cartridge
Scenario: Business-as-Usual
System model: Allocation at the point of substitution
Generated by: Tereza Levova
Published in: Hischier R. 2007
Database: ecoinvent
isCopyrightProtected: false
accessRestrictedTo: 1

## General comment
This dataset relates to the mass of coloured toner printed actually printed on paper. It assumes two use cycles, i.e. one as a OEM cartridge and a subsequent as remanufactured virgin core. It is to be used to reflect coloured toner use in colour laser printer systems for cartridges with a capacity of 5000 sheets and a weight of env. 1 kg including toner.
[This dataset is meant to replace the following datasets:
- treatment of used toner cartridge, colour, remanufacturing for laser printer, including 50% new toner modules, GLO, 2002 - 2005]

## Included activities start
From reception of the toner at the disposal

## Included activities end
Includes the initial OEM cartridge, the remanufacturing and disposal of spare parts and spare toner and the final disposal of the cartridge. No emissions due to printing contained.

## Geography
European Electricity mix and material processing data for supplier outside Europe.

## Technology
Replacement of spare parts, assembly of semifinished components. After fulfilling the first use cycle toner cartridges are returned to remanufacturing sites, where they are refilled and refurbished. Some of the empty cartridges (“empties” or “core”) are sorted out and disposed. While this can be perceived as average failure rate, the cartridge’s life cycle also can be thought of as a number of subsequent refurbishment cycles. Some of the empty cartridges (“empties” or “core”) are sorted out and disposed. While this can be perceived as average failure rate, the cartridge’s life cycle also can be thought of as a number of subsequent refurbishment cycles. Cartridges are remanufactured by specialised companies. They reuse the cores of original equip-ment manufacturers (OEMs) and refurbish it with replacement parts from different suppliers and refill it with toner.
The first step in any remanufacturing process is obtaining the empty cartridge (“core”). At least 70 percent of first remanufacturing cycle cores is abandoned. Next, the remanufacturer must disassemble the cartridge. Disassembling a HP 96A is a multistep process that requires the removal of sensitive components such as the OPC drum. After completing the desired degree of disassembly, components can be checked to determine their suitability for reuse. The com-ponent performance in a second (and additional) cycle is again impaired and the failure rate rises. Not all of the toner powder is fixed on the paper, the rest is collected returned to remanufacturing together with the cartridge where it is prepared, sieved and reused.

## Reference product
- used toner module, laser printer, colour: 0 kg; name used_toner_RP; CPC 39990: Other wastes n.e.c.; By-product classification Recyclable
  After fulfilling the first use cycle toner cartridges are returned to remanufacturing sites, where they are refilled and refurbished. Some of the empty cartridges ("empties" or "core") are sorted out and disposed. While this can be perceived as average failure rate, the cartridge’s life cycle also can be thought of as a number of subsequent refurbishment cycles
  production volume 0 kg; name used_toner_RP_PV; = 6.6236E+08*0.3
    6.6236E+08kg of used toner module is the calculated production volume during "operation, printer, laser, black/white, per kg printed paper". It is assumed that 30% of this amount goes actually for refurbishment.
  property price 0 EUR2005
    Estimated value; the price is considered to be 0, because the product is a material for treatment.
- toner module, laser printer, colour: 1 unit; By-product classification allocatable product; CPC 44922: Parts for the goods of subclasses 44914, 44917 and 45150; pedigree (1,1,1,1,1)
  Calculated value based on literature. The weight of one toner module, laser printer, black/white is assumed to be 0.88 kg (based on ecoinvent v2 report no. 18 II., pg. 200). Further it is assumed that the toner module is recycled (re-manufactured) twice.
  production volume 8.95113e7 unit

## By-products
- toner module, laser printer, colour: 0 unit; name toner_module_byP; By-product classification allocatable product; CPC 44922: Parts for the goods of subclasses 44914, 44917 and 45150; pedigree (1,1,1,1,1)
  (same comment as for toner module, laser printer, colour)
  production volume 0 unit; = ABS(Ref('c7783890-4b0b-4e16-931a-ebbf9b74e88f', 'ProductionVolume') * (Ref('6996e4a1-6166-4ea4-9fc4-09b727bbc192') / Ref('c7783890-4b0b-4e16-931a-ebbf9b74e88f')))
    Calculated from production volume of reference product using the relative outputs.
  property carbon content, fossil 0.549659
    C content was calculated as the addition of C content in the components
  property carbon content, non-fossil 0
    C content was calculated as the addition of C content in the components
  property price 121 EUR2005
    Temporary price data. Calculated as 90% of purchasers price based on: Calculated for 5000 pages printed at 0.045 USD/page (source for ink-per-page-price is a study by QualityLogic: http://www.qualitylogic.com/tuneup/uploads/docfiles/QualityLogic-Cost-of-Ink-Per-Page-Analysis-United-States-Januar-2008.pdf)
  property carbon content 0.549659
    carbon content on a dry matter basis (reserved; not for manual entry)
  properties: dry mass 1.14 kg, wet mass 1.14 kg, water content 0, water in wet mass 0 kg, carbon allocation 0.626612 kg
- electricity, for reuse in municipal waste incineration only: 0 kWh; CPC 17100: Electrical energy; By-product classification allocatable product; pedigree (1,1,1,1,1)
  Net electricity generated from this waste and used in internal MSWI plant energy redistribution.
  Uncertainty: uncertainty is calculated from uncertainties in waste composition and uncertainties in energy efficiency and the uncertainty in internal energy demand
  property exergy 3.6 MJ; name E_el_prod_MSWI_exergy
    This exergy property is based on the exergy content of the product.
  property true value relation 3.6; name E_el_prod_MSWI_true_value_relation
    property to calculate "true value" from
  property price 0.1 EUR2005; name E_el_prod_MSWI_price_EUR2005
    Estimated to be the same price as in case of electricity, medium voltage.
- heat, for reuse in municipal waste incineration only: 0 MJ; CPC 17300: Steam and hot water; By-product classification allocatable product; pedigree (1,1,1,1,1)
  (same comment as for electricity, for reuse in municipal waste incineration only)
  property exergy 0.1842 MJ; name E_th_prod_MSWI_exergy
    This exergy property is based on the exergy content of the product.
  property true value relation 0.1842; name E_th_prod_MSWI_true_value_relation
    property to calculate "true value" from
  property price 0.0106 EUR2005; name E_th_prod_MSWI_price_EUR2005
    Average European district heat price from Ecoheatcool and Euroheat 2005-2006, Ecoheat Work package 1: The European heat market. Final report. 10.6 EUR/GJ i s the price of district heat. http://www.solarthermalworld.org/files/Ecoheatcool%20WP1%20Web.pdf?download
- waste paperboard, sorted: 0 kg; CPC 39240: Waste and scrap of paper or paperboard; By-product classification Recyclable; pedigree (1,1,1,1,1)
  It is assumed that 86.3% (wet weight) of waste paperboard, unsorted is segregated to waste paperboard, sorted. Waste paper, sorted is later used in recycling industry where maximum 79% of it, is transformed into new paperboard.
  property price 0.0436 EUR2005; name ByP_waste_paperboard_sorted_price_EUR200
    Estimated value; three different sources were used to determine the price for waste paperboard, sorted. 35 AUD/tonne (http://larimer.org/solidwaste/charts/Current.htm, accessed 20130328), 70 GBP/tonne (http://www.letsrecycle.com/prices/waste%20paper, accessed 20130328) and 20 USD/tonne (http://www.oxpaperboard.com/1/post/2013/03/ox-paperboard-announces-price-adjustment-to-uncoated-recycled-paperboard.html, accessed 20130328).
  property water content 0.243781; = WWM_waste_paperboard_sorted/ DM_waste_paperboard_sorted
  property water in wet mass 0.196 kg; name WWM_waste_paperboard_sorted; = WM_waste_paperboard_sorted- DM_waste_paperboard_sorted
  property dry mass 0.804 kg; name DM_waste_paperboard_sorted
  property wet mass 1 kg; name WM_waste_paperboard_sorted
  property carbon content 0.483259
    carbon content on a dry matter basis (reserved; not for manual entry)
  properties: carbon content, non-fossil 0.483259, carbon content, fossil 0, carbon allocation 0.38854 kg
- zinc concentrate: 0 kg; CPC 14290: Other non-ferrous metal ores and concentrates (other than uranium or thorium ores and concentrates); By-product classification allocatable product
  Calculated value from the knowledge of the properties of both products.
  property price 0.38 EUR2005; name ByP_price_EUR2005
    Temporary price data. Calculated as 90% of purchasers price based on: Zinc content in concentrate 53%. Concentrate price per kg Zn 86.5% of refined Zn price (13.5% treatment charges according to CHR Metals Limited 2005: Dynamic cost curves. http://www.minecost.com/dynamic.pdf). 2004 zinc price from USGS (2007) Mineral commodity summaries 2007. <http://minerals.usgs.gov/minerals/pubs/mcs/2007/mcs2007.pdf> [Accessed 25 May 2010]
  property zinc content 0.53; name zinc_C_zinc_concentrate
    Zinc content on a dry matter basis. Value taken from teh "zinc mine operation" /GLO dataset.
  property dry mass 1 kg; name DM_zinc_concentrate
  property carbon content 0
    carbon content on a dry matter basis (reserved; not for manual entry)
  properties: wet mass 1 kg, water content 0, carbon content, non-fossil 0, carbon content, fossil 0, water in wet mass 0 kg, carbon allocation 0 kg

## Inputs from technosphere
- polypropylene, granulate: 0 kg; pedigree (1,1,1,1,1)
  EcoSpold01Location=RER
  Estimation based on literature.
  properties: carbon content, fossil 0.857143, dry mass 1 kg, wet mass 1 kg
  note on carbon content, fossil: Polypropylene is formed by the polymerisation of propylene, C3H6 (ecoinvent v2.2 report 11_II)
- steel, low-alloyed: 0 kg; pedigree (1,1,1,1,1)
  Estimation based on literature.
  EcoSpold01Location=RER
  properties: dry mass 1 kg, wet mass 1 kg, carbon content, fossil 0.005
  note on carbon content, fossil: Low alloyed steel composition given in Tab. 3.2 ecoinvent v2.2 report 10_partII. Steel assumed to have a C content of 0.5%
- section bar extrusion, aluminium: 0 kg; pedigree (1,1,1,1,1)
  EcoSpold01Location=RER
  Estimation based on own assumptions.
- polyethylene, low density, granulate: 0 kg; pedigree (1,1,1,1,1)
  Estimation based on literature.
  EcoSpold01Location=RER
  properties: wet mass 1 kg, carbon content, fossil 0.857143, dry mass 1 kg
  note on carbon content, fossil: Polyethylene is formed out of a huge amount of ethylene monomers (C2H4) (ecoinvent v2.2 report 11_II). MW=28 g/mol
- building, hall: 0 m2; pedigree (1,1,1,1,1)
  EcoSpold01Location=CH
  Estimation based on own assumptions and internet.
- sheet rolling, steel: 0 kg; pedigree (1,1,1,1,1)
  Estimation based on own assumptions.
  EcoSpold01Location=RER
- waste plastic, industrial electronics: 0 kg; name waste_plastic_byP; pedigree (1,1,1,1,1)
  EcoSpold01Location=CH
  Estimation based on own assumptions.
  production volume 0 kg; = waste_plastic_byP/ABS( used_toner_RP)* used_toner_RP_PV
    Calculated from the production volume of used toner cartridge, colour in proportion to the respective output amounts.
  property price 0 EUR2005; name waste_plastic_byP_price_EUR2005
  properties: dry mass 0.847 kg, wet mass 1 kg, carbon content, fossil 0.81386, water content 0.180638
  note on carbon content, fossil: C content in 1 kg DM was calculated using data in Tab A.2, ecoinvent v2.2 report 13_I
- toner, colour, powder: 0 kg; pedigree (1,1,1,1,1)
  EcoSpold01Location=GLO
  Estimation based on literature. LogNormal distribution [0.4, 0.5, 0.6] extends over 33%
  properties: wet mass 1 kg, dry mass 1 kg, carbon content, fossil 0.801986
  note on carbon content, fossil: The dataset represents the production of a black toner powder with the composition 5% Color, 83% Binder Resin, colour, the rest being organic and anorganic additives
- injection moulding: 0 kg; pedigree (1,1,1,1,1)
  Estimation based on own assumptions.
  EcoSpold01Location=RER
- aluminium, wrought alloy: 0 kg; pedigree (1,1,1,1,1)
  EcoSpold01Location=RER
  Estimation based on literature.
  properties: dry mass 1 kg, wet mass 1 kg
- extrusion, plastic film: 0 kg; pedigree (1,1,1,1,1)
  EcoSpold01Location=RER
  Estimation based on own assumptions.
- waste polyethylene: 0 kg; name waste_polyethylene_byP; pedigree (1,1,1,1,1)
  Estimation based on own assumptions.
  EcoSpold01Location=CH
  production volume 0 kg; = waste_polyethylene_byP/ABS( used_toner_RP)* used_toner_RP_PV
    (same comment as for waste plastic, industrial electronics)
  property price 0 EUR2005; name waste_polyethylene_byP_price_EUR2005
  properties: carbon content, fossil 0.825301, dry mass 0.996 kg, water content 0.00401606, wet mass 1 kg
  note on carbon content, fossil: C content in 1 kg DM was calculated using data in Tab A.1, ecoinvent v2.2 report 13_I
- acrylonitrile-butadiene-styrene copolymer: 0 kg; pedigree (1,1,1,1,1)
  EcoSpold01Location=RER
  Estimation based on literature.
  properties: carbon content, fossil 0.853081, dry mass 1 kg, wet mass 1 kg
  note on carbon content, fossil: ABS is the abbreviation originating from its monomers acrylonitrile, butadiene and styrene. It was assumed that every monomer was present in the same proportion, so the basic ABS monomer was considered (C8H8·C4H6·C3H3N), and the MW=104+54+53=211 g/mol
- waste paperboard, unsorted: 0 kg; name waste_paperboard_byP; pedigree (1,1,1,1,1)
  Estimation based on own assumptions.
  EcoSpold01Location=CH
  production volume 0 kg; = waste_paperboard_byP/ABS( used_toner_RP)* used_toner_RP_PV
    (same comment as for waste plastic, industrial electronics)
  property price 0.03924 EUR2005; name waste_paperboard_byP_price_EUR2005
  properties: wet mass 1 kg, carbon content, non-fossil 0.483259, water content 0.243781, dry mass 0.804 kg
  note on carbon content, non-fossil: C content was calculated for 1 kg DM, using data in Tab A.3, ecoinvent v2.2 report 13_I.
- corrugated board box: 0, 0, 0 kg (3 entries); pedigree (1,1,1,1,1)
  EcoSpold01Location=RER
  Literature Value.
  properties: water content 0.0582011, carbon content, fossil 0.000486772, dry mass 0.945 kg, carbon content, non-fossil 0.433862, wet mass 1 kg
  note on carbon content, fossil: Fossil C content was calculated after fossil C contents of chemicals used in the production of board (Tab 10-15 & 10.16 ecoinvent v2.2 report 11_III, part 10)
  note on carbon content, non-fossil: Biogenic C content was calculated after biogenic C contents of chemicals used in the production of board (Tab 10.15 & 10.16, ecoinvent v2.2 report 11_III, part 10).
- electricity, medium voltage: 0, 0, 0, 0, 0, 0, 0, 0 kWh (8 entries); pedigree (1,1,1,1,1)
  EcoSpold01Location=UCTE
  Estimation based on own assumptions.
- waste polyethylene: 0, 0, 0, 0, 0, 0, 0 kg (7 entries); pedigree (1,1,1,1,1)
  Estimation based on own assumptions.
  EcoSpold01Location=CH
- used toner module, laser printer, colour: -0.531299 kg; lognormal variance with pedigree 0.0526, pedigree (4,4,5,5,1)
  Measured value. The weight of 1 toner module is 0.88 kg.
  production volume 2.94269e6 kg
- toner module, laser printer, colour: 0.603749 unit; lognormal variance with pedigree 0.0512, pedigree (2,3,5,1,1)
  Calculated based on literature and estimates.Toner module capacity is 5000 pages, one page weight 0.005 kg, thus total weight of paper one toner module can print on is (5000*0.005=) 25 kg. In order to print on paper of total weight of 1 kg (1/25=) 0.04 units of toner module is needed.
- paper, woodcontaining, lightweight coated: 7.54687, 7.54687 kg (2 entries)
- printer, laser, colour: 0.00314453 unit; lognormal variance with pedigree 0.0546, pedigree (3,3,5,5,1)
  Calculated based on literature values and estimates. The monthly production volume of this type of printer is 20,000 pg (http://www.epson.de/de/en/viewcon/corporatesite/products/mainunits/specs/9538). The weight of one page is 0.005kg. The lifetime of a printer is estimated to be 4 years. In its lifetime the printer is able to print on (20,000*12*4=) 960,000 pages, of total weight (960,000*0.005=) 4800 kg.
  EcoSpold01Location=GLO
- electricity, low voltage: 0.943358, 0.0126513, 0.00221887, 0.0176976, 0.0364872, 0.551793, 0.0909531, 0.231558 kWh (8 entries); lognormal variance with pedigree 0.0432, pedigree (2,3,5,5,1)
  EcoSpold01Location=UCTE
- electricity, low voltage: 0.943358 kWh; lognormal variance with pedigree 0.041225, pedigree (2,3,5,2,1)
  EcoSpold01Location=CH
- electricity, low voltage: 0.943358 kWh; lognormal variance with pedigree 0.041225, pedigree (2,3,5,2,1)
  EcoSpold01Location=UCTE

## Emissions to nature
- Benzene [air, unspecified]: 2.78661e-6 kg; lognormal variance with pedigree 0.1806, pedigree (2,5,5,5,1)

## Sampling procedure
Literature

## Extrapolations
see Geography and Technology This dataset has been copied from an original dataset covering the geography RER. The uncertainty has been adjusted accordingly.
