# furnace production, wood chips, with silo, 50kW

Dataset: EcoSpold 2, unit process
Geography: RoW
Time period: 2010-01-01 to 2019-12-31
Technology level: modern
Classification: EcoSpold01Categories: oil/cogeneration
Classification: ISIC rev.4 ecoinvent: 2815:Manufacture of ovens, furnaces and furnace burners
Synonyms: wood fired boiler production; wood chips boiler production
Tags: biomass power
Scenario: Business-as-Usual
System model: Allocation at the point of substitution
Generated by: Christian Bauer
Database: ecoinvent
isCopyrightProtected: true
accessRestrictedTo: 1

## General comment
This dataset represent the production and the disposal of a wood chips burning furnace with a storage silo, typical for central heating system.

## Included activities start
From reception of furnace components at the factory gate

## Included activities end
This activity ends with the disposal of the device in the end of its lifetime. The dataset includes the most important materials used for the fabrication of the furnace, the accumulator hot water tank (1500 l), the screw conveyor system and the chimney flue pipes: steel, steel alloys, concrete, refractory fireclay bricks, insulating materials, cast iron, plastics, electronic, lubricating oil, paint. The dataset includes the basement for the furnace (around 6m2) and the wood chips storage silo in concrete (dimensions: 4x2.8x3m), which is assumed to be built in an external space out from an existing building. The dataset includes the land transformation and occupation and the energy and heat for the construction and the disposal of the device.

## Technology
Boiler of modern technology available on the European and Swiss market, with combustion chamber in refractory bricks. The model of reference is a wood chips boiler from brand ETA, mod. Hack 50 kW. It was compared with two other boilers with similar technology (KWB Multifire 50 kW, Lindner&Sommerauer SL-T 50 kW). Austrian technology, commericialized and manufactured also in Switzerland (Swiss brand Buderus).
Source of picture: http://www.eta.co.at/15.0.html

## Time period
This model of furnace is commercialized since 2010 in Europe and Switzerland and is still available on the market (end 2011)

## Reference product
- iron scrap, unsorted: 1 kg; CPC 39310: Slag, dross, scalings and other waste from the manufacture of iron or steel; By-product classification Recyclable; pedigree (1,1,1,1,1)
  disposal of cast iron
  production volume 1.29129e6 kg; = Ref('78396fb5-21f7-4b38-8b1b-71bf2909ed50', 'ProductionVolume') * (Ref('1bbf5318-7379-41c7-a290-6c791f60312b') / Ref('78396fb5-21f7-4b38-8b1b-71bf2909ed50'))
    Calculated from production volume of reference product using the relative outputs.
  property price 0.149 EUR2005
    Temporary price data. Calculated as 90% of purchasers price based on: estimated at 85% of sorted scrap
  property carbon content 0
    carbon content on a dry matter basis (reserved; not for manual entry)
  property true value 11.622
    allocation property applied in "true value" allocation // value calculated from revenue
  properties: carbon content, fossil 0, wet mass 1 kg, water in wet mass 0 kg, carbon content, non-fossil 0, water content 0, dry mass 1 kg, carbon allocation 0 kg
- furnace, wood chips, with silo, 50kW: 0 unit; CPC 43420: Industrial or laboratory furnaces and ovens, except non-electric bakery ovens; other industrial or laboratory […]; By-product classification allocatable product
  EcoSpold01Location=GLO
  production volume 16555 unit
    extrapolated with proportions (population) from the local dataset of Switzerland (from which value comes from an estimation of the auto stocker boilers around 50kW produced within the country) - high uncertainty
  property lifetime capacity [kWh] 8.76e6 kWh; name lifetime_capacity_kWh; = (lifetime*8760)*capacity_MW*1000
    calculated value
  property lifetime 20 year; name lifetime
  property capacity [MW] 0.05 MW; name capacity_MW
  property price 7937 EUR2005
    Calculated by 2.0 - Prices from UNDATA "Industrial furnace, oven, incinerator non-electric ne" (http://data.un.org/Data.aspx?q=industrial+furnace&d=ComTrade&f=_l1Code%3a84%3bcmdCode%3a841780). The prices are per kg and converted to per unit by summed weight of material concumption of the process in existing ecoinvent documentation from ecoinvent v.2.2. For weight of concrete, it is separately added for from price per m3 used of each unit and apply EU&DK input output database 2003 (0.08 Euro2003/kg DS of concrete => 176 Euro2003/m3 concrete).
  property true value 7937
    allocation property applied in "true value" allocation // value calculated from revenue

## By-products
- electricity, for reuse in municipal waste incineration only: 0 kWh; CPC 17100: Electrical energy; By-product classification allocatable product; pedigree (1,1,1,1,1)
  Net electricity generated from this waste and used in internal MSWI plant energy redistribution.
  Uncertainty: uncertainty is calculated from uncertainties in waste composition and uncertainties in energy efficiency and the uncertainty in internal energy demand
  production volume 741428 kWh
  property true value relation 3.6; name E_el_prod_MSWI_true_value_relation
    property to calculate "true value" from
  property exergy 3.6 MJ; name E_el_prod_MSWI_exergy
    This exergy property is based on the exergy content of the product.
  property price 0.1 EUR2005; name E_el_prod_MSWI_price_EUR2005
    Estimated to be the same price as in case of electricity, medium voltage.
  property true value 2.97089
    allocation property applied in "true value" allocation // value calculated from true value relation
- heat, for reuse in municipal waste incineration only: 0 MJ; CPC 17300: Steam and hot water; By-product classification allocatable product; pedigree (1,1,1,1,1)
  Net useful heat generated from this waste and used in internal MSWI plant energy redistribution.
  Uncertainty: uncertainty is calculated from uncertainties in waste composition and uncertainties in energy efficiency and the uncertainty in internal energy demand
  production volume 5.17192e6 MJ
  property true value relation 0.1842; name E_th_prod_MSWI_true_value_relation
    property to calculate "true value" from
  property exergy 0.1842 MJ; name E_th_prod_MSWI_exergy
    This exergy property is based on the exergy content of the product.
  property price 0.0106 EUR2005; name E_th_prod_MSWI_price_EUR2005
    Average European district heat price from Ecoheatcool and Euroheat 2005-2006, Ecoheat Work package 1: The European heat market. Final report. 10.6 EUR/GJ i s the price of district heat. http://www.solarthermalworld.org/files/Ecoheatcool%20WP1%20Web.pdf?download
  property true value 1.06048
    (same comment as for electricity, for reuse in municipal waste incineration only)
- zinc concentrate: 0 kg; CPC 14290: Other non-ferrous metal ores and concentrates (other than uranium or thorium ores and concentrates); By-product classification allocatable product
  Calculated value from the knowledge of the properties of both products.
  production volume 1.15601 kg
  property price 0.38 EUR2005; name ByP_price_EUR2005
    Temporary price data. Calculated as 90% of purchasers price based on: Zinc content in concentrate 53%. Concentrate price per kg Zn 86.5% of refined Zn price (13.5% treatment charges according to CHR Metals Limited 2005: Dynamic cost curves. http://www.minecost.com/dynamic.pdf). 2004 zinc price from USGS (2007) Mineral commodity summaries 2007. <http://minerals.usgs.gov/minerals/pubs/mcs/2007/mcs2007.pdf> [Accessed 25 May 2010]
  property zinc content 0.53; name zinc_C_zinc_concentrate
    Zinc content on a dry matter basis. Value taken from teh "zinc mine operation" /GLO dataset.
  property dry mass 1 kg; name DM_zinc_concentrate
  property carbon content 0
    carbon content on a dry matter basis (reserved; not for manual entry)
  property true value 2.65346e-5
    allocation property applied in "true value" allocation // value calculated from revenue
  properties: wet mass 1 kg, water content 0, carbon content, non-fossil 0, carbon content, fossil 0, water in wet mass 0 kg, carbon allocation 0 kg
- copper: 0 kg; By-product classification allocatable product; CPC 41413: Refined copper and copper alloys, unwrought; master alloys of copper
  production volume 35611.4 kg
  properties: water in wet mass 0 kg, water content 0, carbon content, non-fossil 0, dry mass 1 kg, carbon content, fossil 0, price 5.52 EUR2005, wet mass 1 kg, carbon content 0, carbon allocation 0 kg, true value 6.649
- lead: 0 kg; CPC 41441: Lead, unwrought; By-product classification allocatable product
  EcoSpold01Location=SE
  production volume 111.266 kg
  property price 0.744 EUR2005
    Temporary price data. Calculated as 90% of purchasers price based on: Source: ecoinvent v2 report 10-part IX, Tab 5.10 & 2.5
  property carbon content 0
    carbon content on a dry matter basis (reserved; not for manual entry)
  property true value 0.00500044
    allocation property applied in "true value" allocation // value calculated from revenue
  properties: wet mass 1 kg, water content 0, carbon content, non-fossil 0, carbon content, fossil 0, dry mass 1 kg, water in wet mass 0 kg, carbon allocation 0 kg
- nickel, 99.5%: 0 kg; CPC 41422: Unwrought nickel; By-product classification allocatable product
  EcoSpold01Location=SE
  production volume 232.266 kg
  property price 10.4 EUR2005
    Temporary price data. Calculated as 90% of purchasers price based on: 2004 nickel price from USGS (2007) Mineral commodity summaries 2007. <http://minerals.usgs.gov/minerals/pubs/mcs/2007/mcs2007.pdf> [Accessed 25 May 2010]
  property carbon content 0
    carbon content on a dry matter basis (reserved; not for manual entry)
  property true value 0.145911
    allocation property applied in "true value" allocation // value calculated from revenue
  properties: water in wet mass 0 kg, wet mass 1 kg, carbon content, non-fossil 0, dry mass 1 kg, water content 0, carbon content, fossil 0, carbon allocation 0 kg
- silver: 0 kg; CPC 41310: Silver (including silver plated with gold or platinum), unwrought or in semi-manufactured forms, or in powder […]; By-product classification allocatable product; CAS 7440-22-4
  EcoSpold01Location=SE
  production volume 38.3564 kg
  property price 178 EUR2005
    (same comment as for lead)
  property carbon content 0
    carbon content on a dry matter basis (reserved; not for manual entry)
  property true value 0.412409
    allocation property applied in "true value" allocation // value calculated from revenue
  properties: wet mass 1 kg, carbon content, non-fossil 0, dry mass 1 kg, water content 0, carbon content, fossil 0, water in wet mass 0 kg, carbon allocation 0 kg
- palladium: 0 kg; CPC 4160: Other non-ferrous metals and articles thereof (including waste and scrap of some metals); cermets and articles […]; By-product classification allocatable product
  EcoSpold01Location=SE
  production volume 2.12328 kg
  property price 5640 EUR2005
    Temporary price data. Calculated as 90% of purchasers price based on: 2004 price from USGS (2007) Mineral commodity summaries 2007. <http://minerals.usgs.gov/minerals/pubs/mcs/2007/mcs2007.pdf> [Accessed 25 May 2010]
  property carbon content 0
    carbon content on a dry matter basis (reserved; not for manual entry)
  property true value 0.723363
    allocation property applied in "true value" allocation // value calculated from revenue
  properties: wet mass 1 kg, carbon content, fossil 0, water in wet mass 0 kg, water content 0, carbon content, non-fossil 0, dry mass 1 kg, carbon allocation 0 kg
- gold: 0 kg; CPC 41320: Gold (including gold plated with platinum), unwrought or in semi-manufactured forms, or in powder form; By-product classification allocatable product; CAS 7440-57-5
  EcoSpold01Location=SE
  production volume 1.1644 kg
  property price 10600 EUR2005
    Temporary price data. Calculated as 90% of purchasers price based on: Source: ecoinvent v2 report 10-part IX, Tab 2.5
  property carbon content 0
    carbon content on a dry matter basis (reserved; not for manual entry)
  property true value 0.745551
    allocation property applied in "true value" allocation // value calculated from revenue
  properties: wet mass 1 kg, carbon content, fossil 0, dry mass 1 kg, carbon content, non-fossil 0, water content 0, water in wet mass 0 kg, carbon allocation 0 kg
- iron scrap, sorted, pressed: 0 kg; By-product classification Recyclable; CPC 39310: Slag, dross, scalings and other waste from the manufacture of iron or steel; pedigree (1,1,1,1,1)
  Iron scrap recovered from this waste.
  production volume 46306.3 kg
  property price 0.175 EUR2005
    Temporary price data. Calculated as 90% of purchasers price based on: 2005 import and export prices (total trades (USD) divided by total weight (kg) in biggest economies of the world: EU27, USA, Brasil, China, India, Japan and Russia) from UN Commodity Trade Statistics Database (http://data.un.org/Explorer.aspxDatabase [Accessed 2011.06.20]). Commodity: Waste or scrap, of cast iron
  property carbon content 0
    carbon content on a dry matter basis (reserved; not for manual entry)
  property true value 0.119412
    allocation property applied in "true value" allocation // value calculated from revenue
  properties: water content 0, water in wet mass 0 kg, carbon content, fossil 0, dry mass 1 kg, carbon content, non-fossil 0, wet mass 1 kg, carbon allocation 0 kg

## Inputs from technosphere
- electronics scrap from control units: -5.61455e-5 kg; lognormal variance with pedigree 0.0107, pedigree (1,2,4,5,1)
  EcoSpold01Location=RER
  disposal of electronical components
  production volume 49665 kg; = Ref('78396fb5-21f7-4b38-8b1b-71bf2909ed50', 'ProductionVolume') * (Ref('2cd7a545-e636-4772-b2d6-a78e47ecfa0d')*-1)
    Calculated from production volume of reference product using the relative outputs.
  properties: carbon content, fossil 0.337146, carbon content, non-fossil 0.00013442, wet mass 1 kg, dry mass 1 kg, lifetime 20 year
- polyethylene, high density, granulate: 6.55031e-5 kg; source ETA Heiztechnik GmbH 2011; lognormal variance with pedigree 0.0284, pedigree (2,3,4,5,1)
  estimation
  EcoSpold01Location=RER
  properties: carbon content, fossil 0.857143, wet mass 1 kg, dry mass 1 kg
  note on carbon content, fossil: Polyethylene is formed out of a huge amount of ethylene monomers (C2H4) (ecoinvent v2.2 report 11_II). MW=28 g/mol
- scrap copper: 0 kg; pedigree (1,1,1,1,1)
  disposal of copper
  production volume 0 kg
    Calculated from production volume of reference product using the relative outputs.
  properties: wet mass 1 kg, dry mass 1 kg
- polystyrene foam slab: 0.000355588 kg; source ETA Heiztechnik GmbH 2011; lognormal variance with pedigree 0.0292, pedigree (3,1,4,5,1)
  EcoSpold01Location=RER
  calculated value - insulation of the accumulator hot water tanks
  properties: dry mass 1 kg, carbon content, fossil 0.859091, wet mass 1 kg
  note on carbon content, fossil: XPS consists in 91% of polystyrene, 7% of blowing agent and the re-maining 2% are flame retardants (bromine compounds) and other additives (ecoinvent v2.2 report 7, part XIV, pg69). The chemical formula of polystyrene is (C8H8)n. Here, the blowing agent is CO2.
- waste polyethylene: 0 kg; pedigree (1,1,1,1,1)
  EcoSpold01Location=CH
  disposal of plastic materials
  production volume 0 kg
    Calculated from production volume of reference product using the relative outputs.
  properties: dry mass 0.996 kg, carbon content, fossil 0.825301, wet mass 1 kg, lifetime 20 year, water content 0.00401606
  note on carbon content, fossil: C content in 1 kg DM was calculated using data in Tab A.1, ecoinvent v2.2 report 13_I
- scrap steel: 0 kg; pedigree (1,1,1,1,1)
  EcoSpold01Location=CH
  disposal of the steel body of the furnace, screw conveyour system, accumulator tank, chimney flue pipes + chromium steel components
  production volume 0 kg
    Calculated from production volume of reference product using the relative outputs.
  properties: wet mass 1 kg, lifetime 20 year, dry mass 1 kg
- electricity, low voltage: 0 kWh; source Heiztechnik GmbH 2011; pedigree (1,1,1,1,1)
  EcoSpold01Location=CH
  Estimation - data derives from comparison between old dataset value, energy required for steel manufacturing (similar weight device) and suggestions from ETA technician
- sheet rolling, steel: 0.00174051 kg; source ETA Heiztechnik GmbH 2011; lognormal variance with pedigree 0.0292, pedigree (3,1,4,5,1)
  EcoSpold01Location=RER
  estimation
- waste mineral wool, for final disposal: 0 kg; pedigree (1,1,1,1,1)
  disposal of chimney insulation
  EcoSpold01Location=CH
  production volume 0 kg
    Calculated from production volume of reference product using the relative outputs.
  properties: wet mass 1 kg, dry mass 1 kg, lifetime 20 year
- steel, chromium steel 18/8, hot rolled: 0.000280728 kg; source ETA Heiztechnik GmbH 2011; lognormal variance with pedigree 0.0372, pedigree (4,4,4,5,1)
  estimation
  EcoSpold01Location=RER
  properties: dry mass 1 kg, carbon content, fossil 0.0008, wet mass 1 kg
  note on carbon content, fossil: Stainless steel model is the grade 304 steel (18/8 stainless, 18% chromium 8% nickel; max. 0.08% C)
- lubricating oil: 4.67879e-5 kg; source Heiztechnik GmbH 2011; lognormal variance with pedigree 0.0372, pedigree (4,4,4,5,1)
  Estimation - used for the manufacturing of the furnace and for the maintenance. It is just added to the internal part of the furnace.
  EcoSpold01Location=RER
  properties: dry mass 1 kg, wet mass 1 kg, carbon content, fossil 0.75
  note on carbon content, fossil: Lubricating oil is produced from diesel. C-content/dry mass of fats and oils considered 75%, from: ecoinvent v2.2 report, n 15a, pg 40
- concrete, normal: 0 m3; source ETA Heiztechnik GmbH 2011; pedigree (1,1,1,1,1)
  EcoSpold01Location=CH
  calculated value - basing on the silo dimensions (from furnace manual) was calculated the amount of concrete (0.31m3 + 8.32m3 = 8.63 m3)
  properties: water content 0.086758, wet mass 2380 kg, dry mass 2190 kg
- refractory, fireclay, packed: 0.00102933 kg; source Heiztechnik GmbH 2011; lognormal variance with pedigree 0.0292, pedigree (1,4,4,5,1)
  EcoSpold01Location=DE
  measured value - refractory bricks in fireclay are used in the combustion chamber inside the furnace (value measured with a ETA technician during wood boilers exposition in the modeled furnace)
  properties: dry mass 1 kg, wet mass 1 kg
- copper: 7.48607e-5 kg; source ETA Heiztechnik GmbH 2011; lognormal variance with pedigree 0.0358, pedigree (4,3,4,5,1)
  EcoSpold01Location=RER
  estimation
  properties: dry mass 1 kg, wet mass 1 kg
- waste polystyrene isolation, flame-retardant: 0 kg; pedigree (1,1,1,1,1)
  disposal of the accumulator tank insulation
  production volume 0 kg
    Calculated from production volume of reference product using the relative outputs.
  properties: water content 0.00199232, carbon content, fossil 0.918145, wet mass 1 kg, dry mass 0.998012 kg
  note on carbon content, fossil: Polystyrene isolation (EPS) is flame-retarded with hexa-bromo-cyclo-dodecan (C12H18Br6) and contains 0.67 w% bromine (ecoinvent v2.2 report 13_I, pg 39). The rest is polystyrene: (C8H8)n.
- stone wool: 0.000926401 kg; source ETA Heiztechnik GmbH 2011; lognormal variance with pedigree 0.0358, pedigree (4,3,4,5,1)
  EcoSpold01Location=CH
  calculated value - for the chimney flue pipes (22,5 kg) and the insulation of the boiler (26.7 kg)
  properties: carbon content, fossil 0.015401, wet mass 1 kg, dry mass 1 kg
  note on carbon content, fossil: The chemical composition of the glass fibres used in the rock wool production is similar to the composition of naturally cooled volcano basalt and has a composition listed in Tab. 3.1 and 3.2 in ecoinvent v2.2 report 16, part XIV. Rock wool contains: a minimum of 96% mineral fibres,between 0.5 and 3.0 weight percent of phenolic resin depending on the specific product characteristics, and about 0.2 percent mineral oil (ecoinvent v2.2 report 16, part XIV). An average composition of 1.8% phenolic resin, 0.2% mineral oil, and 98% mineral fibres has been assumed and used to calculate C content of the rock wool
- waste concrete: 0 kg; pedigree (1,1,1,1,1)
  disposal of the concrete for the furnace basement and for the woodchips silo - around 8,6 m3 of concrete * 2350 kg/m3 (concrete density) = 20288 kg
  EcoSpold01Location=CH
  production volume 0 kg
    Calculated from production volume of reference product using the relative outputs.
  properties: wet mass 1 kg, lifetime 20 year, water content 1, dry mass 0.5 kg
- cast iron: 0.00145978 kg; source Heiztechnik GmbH 2011; lognormal variance with pedigree 0.0312, pedigree (3,4,4,5,1)
  estimation
  EcoSpold01Location=RER
  properties: carbon content, fossil 0.04, dry mass 1 kg, wet mass 1 kg
  note on carbon content, fossil: Cast iron is made by remelting pig iron in small furnaces (e.g. cupola furnaces or electric arc furnaces) and poured into moulds to make castings. It usually contains 2% to 6% carbon (ecoinvent v2.2 report 10_partII). An average content of 4% was considered
- electronics, for control units: 5.61455e-5 kg; source Heiztechnik GmbH 2011; lognormal variance with pedigree 0.0292, pedigree (1,4,4,5,1)
  measured value - during wood boilers exposition, in the model of reference
  EcoSpold01Location=RER
  properties: wet mass 1 kg, carbon content, fossil 0.337146, carbon content, non-fossil 0.00013442, dry mass 1 kg
  note on carbon content, fossil: The control unit has a composition of 46% steel (housing), 32% plastics, 14% printed wiring boards and 8% cables (various types).;
- waste mineral oil: 0 kg; pedigree (1,1,1,1,1)
  disposal of lubricating oil
  production volume 0 kg
    Calculated from production volume of reference product using the relative outputs.
  properties: carbon content, fossil 0.864444, water content 0.111111, dry mass 0.9 kg, wet mass 1 kg
  note on carbon content, fossil: Tab A.6, ecoinvent v2.2 report 13_I. C content has been calculated after data in the tables, and then referred to 1 kg DM
- steel, low-alloyed, hot rolled: 0.0175174 kg; source ETA Heiztechnik GmbH 2011; lognormal variance with pedigree 0.0312, pedigree (3,4,4,5,1)
  EcoSpold01Location=RER
  Calculated value - (tot weight - summa of all other materials)
  properties: wet mass 1 kg, carbon content, fossil 0.005, dry mass 1 kg
  note on carbon content, fossil: Low alloyed steel composition given in Tab. 3.2 ecoinvent v2.2 report 10_partII. Steel assumed to have a C content of 0.5%
- inert waste, for final disposal: -0.00102933 kg; lognormal variance with pedigree 0.0107, pedigree (1,2,4,5,1)
  disposal of refractory fireclay
  EcoSpold01Location=CH
  production volume 910525 kg; = Ref('78396fb5-21f7-4b38-8b1b-71bf2909ed50', 'ProductionVolume') * (Ref('a85b309b-39e5-44dc-ac22-a4a41fe49cf0')*-1)
    Calculated from production volume of reference product using the relative outputs.
  properties: wet mass 1 kg, dry mass 0.995 kg, lifetime 20 year, water content 0.00502513
- alkyd paint, white, without solvent, in 60% solution state: 1.87152e-5 kg; source ETA Heiztechnik GmbH 2011; lognormal variance with pedigree 0.0278, pedigree (1,3,4,5,1)
  EcoSpold01Location=RER
  calculated value for the furnace cladding
  properties: dry mass 1 kg, carbon content, fossil 0.140367, carbon content, non-fossil 0.199629, wet mass 1 kg
  note on carbon content, fossil: C content was calculated as an addition of C content in the raw materials.
- heat, central or small-scale, other than natural gas: 0 MJ; source Heiztechnik GmbH 2011; pedigree (1,1,1,1,1)
  estimation - data comes from a comparison between old dataset value and communication with ETA producer (total annual heating value in factory/production)
  EcoSpold01Location=CH
- scrap copper: -2.41051e-5, -5.07556e-5 kg (2 entries); lognormal variance with pedigree 0.0107, pedigree (1,2,4,5,1)
  disposal of copper
  production volume 66220 kg
- waste polyethylene: -7.28669e-6, -4.86868e-7, -3.68211e-8, -2.01094e-7, -8.12397e-8, -1.90958e-7, -6.2086e-6, -5.10108e-5 kg (8 entries); lognormal variance with pedigree 0.0107, pedigree (1,2,4,5,1)
  EcoSpold01Location=CH
  disposal of plastic materials
  production volume 57942.5 kg
- scrap steel: -0.0043351, -0.013463 kg (2 entries); lognormal variance with pedigree 0.0107, pedigree (1,2,4,5,1)
  (same comment as for scrap steel)
  production volume 1.57438e7 kg
- electricity, low voltage: 0.000105593, 1.85197e-5, 0.000420029, 0.00150591, 0.000304539, 0.00460551, 0.000759136, 0.00216237 kWh (8 entries); source Heiztechnik GmbH 2011; lognormal variance with pedigree 0.0352, pedigree (4,1,4,5,1)
  (same comment as for electricity, low voltage)
- waste mineral wool, for final disposal: -0.000399042, -0.000527359 kg (2 entries); lognormal variance with pedigree 0.0107, pedigree (1,2,4,5,1)
  disposal of chimney insulation
  EcoSpold01Location=CH
  production volume 819472 kg
- concrete, normal: 3.70832e-6, 3.86402e-7, 3.12819e-6, 1.75961e-6, 7.45145e-6, 2.51333e-7, 0.000144827 m3 (7 entries); source ETA Heiztechnik GmbH 2011; lognormal variance with pedigree 0.0312, pedigree (3,4,4,5,1)
  (same comment as for concrete, normal)
- waste polystyrene isolation, flame-retardant: -0.000100587, -0.000255001 kg (2 entries); lognormal variance with pedigree 0.0107, pedigree (1,2,4,5,1)
  disposal of the accumulator tank insulation
  production volume 314545 kg
- waste concrete: -0.0259498, -0.353744 kg (2 entries); lognormal variance with pedigree 0.0107, pedigree (1,2,4,5,1)
  (same comment as for waste concrete)
  production volume 3.35868e8 kg
- waste mineral oil: -1.17698e-5, -3.50181e-5 kg (2 entries); lognormal variance with pedigree 0.0107, pedigree (1,2,4,5,1)
  disposal of lubricating oil
  production volume 41387.5 kg
- heat, central or small-scale, other than natural gas: 0.000421994, 0.0295223 MJ (2 entries); source Heiztechnik GmbH 2011; lognormal variance with pedigree 0.0352, pedigree (4,1,4,5,1)
  (same comment as for heat, central or small-scale, other than natural gas)

## Inputs from nature
- Occupation, industrial area [natural resource, land]: 0.00860898 m2*year; = land_use*lifetime; source ETA Heiztechnik GmbH 2011; lognormal variance with pedigree 0.0432, pedigree (4,5,4,5,1)
  calculated value
- Transformation, from unspecified [natural resource, land]: 0.000430449 m2; name land_use; source ETA Heiztechnik GmbH 2011; lognormal variance with pedigree 0.0752, pedigree (4,5,5,5,1)
  calculated value - space required for the boiler and screw conveyor system, from the furnace manual
  Uncertainty: basic uncertainty:2;
- Transformation, to industrial area [natural resource, land]: 0.000430449 m2; source ETA Heiztechnik GmbH 2011; lognormal variance with pedigree 0.0752, pedigree (4,5,5,5,1)
  (same comment as for Transformation, from unspecified)

## Sampling procedure
literature, furnace manual available for customers, personal communication from producer and technician, measured data during wood boiler exposition

## Extrapolations
extrapolated from Austrian and Swiss data

## Review by Bo Weidema 2012-02-16
As an exception, this dataset has only been reviewed by one reviewer. As an infraqstructure dataset, this exception is reasonable.
