# heat production, at coal coke industrial furnace 1-10MW

Dataset: EcoSpold 2, unit process
Geography: CA-QC
Time period: 1995-01-01 to 2019-12-31
Technology level: current
Classification: ISIC rev.4 ecoinvent: 3530:Steam and air conditioning supply
Classification: EcoSpold01Categories: hard coal/heating systems
Tags: Recontextualization
Scenario: Business-as-Usual
System model: Allocation at the point of substitution
Generated by: Pablo Tirado
Published in: Röder, A. 2004
Database: ecoinvent
isCopyrightProtected: true
accessRestrictedTo: 1

## General comment
This dataset represents the production of heat from coal coke in Quebec. This is a crude adaptation of the global heat production from hard coal dataset. As no completed emission profile has been found, it has been assumed that the emission profile for coke was similar to hard coal's. Only time period, annual production volume and the fuel heating value have been modified. Uncertainties have been adjusted accordingly

The stoker boiler is assumed to fire egg coal with quality between long-flame coal and fat coal. . The emission data are also taken from literature reporting measurements performed at the end of the 1980s in Germany. Size distribution of particles has been estimated on the basis of recent information from EPA. Emissions of trace elements were calculated using the ash content in the coal and average transfer coefficients for coal power plants with ash retention of 98 %, as first approximation. With the assumption that coal is stored in a dry storage, no leaching is considered. Possible emissions to water during operation of the boiler are not included for missing information.

## Included activities start
Activity starts with the combustion of the fuel.

## Included activities end
This activity ends with 1MJ of heat produced by the furnace.
This dataset includes:

-fuel inputs;
-emissions due to combustion of fuel;
-inputs needed for combustion (electricity);
-by-products of combustion
-infrastructures

## Geography
Quebec dataset based on Global dataset, which was itself based on german conditions. Uncertainty has been modified accordingly

## Technology
Combustion of coke coal in an industrial furnace is modeled based on an combustion of hard coal in an industrial boiler in early 1990s. It is assumed both fuels have similar emission profiles. Stoker boiler used as reference technology. Uncertainty has been modified accordingly.

## Time period
Adapted from 1990's conditions and considered valid until 2015. Uncertainty has been modified accordingly

## Parameters
- annual fuel consumption in kg: 2.05e8 kg; name annualFuelConsumptionKg; lognormal variance with pedigree 0.0012, pedigree (2,1,1,1,1)
  Data on fuel consumption of industrial sectors provided by the MDDEP (Quebec Ministry of Sustainable Development, Environment, Wildlife and Parks).
  Average of the period 2005-2009
  Uncertainty: Variance from default value table.
  DQP based on the quality of the data (primary data from Quebec gouvernment)
- fraction, process water, to air: 0.15 dimensionless; lognormal variance with pedigree 0.092025, pedigree (4,4,3,2,4)
- fraction, water, completely softened, to air: 0.15; lognormal variance with pedigree 0.092025, pedigree (4,4,3,2,4)

## Reference product
- heat, district or industrial, other than natural gas: 1 MJ; name amount_RP; CPC 17300: Steam and hot water; By-product classification allocatable product
  EcoSpold01Location=RER
  production volume 4.69068e9 MJ; name heat_apv; = annualFuelConsumptionKg* cokeIn_Net_Heat_Value/ cokeIn_fuel_use
    Literature value. Annual fuel consumption of coke combusted in Quebec in year 2009 (statistics from Quebec, see documentation for "annualFuelCombustionKg" parameter). This was converted to MJ heat supplied by industrial furnaces combusting coke by (1) multiplying the total mass combusted by the net heating value of coke [MJ/kg], and (2) dividing by the coke_In_Fuel_Use, defined as MJ in combusted fuel per MJ of useful heat delivered by furnace.
  property Corresponding fuel use 1.25 MJ
    This property represents the inverse of the efficiency of the boiler. It is calculated by dividing the lower heating value of the fuel input by the heat/electricity output.
  property price 0.0106 EUR2005
    Average European district heat price from Ecoheatcool and Euroheat 2005-2006, Ecoheat Work package 1: The European heat market. Final report. 10.6 EUR/GJ i s the price of district heat. http://www.solarthermalworld.org/files/Ecoheatcool%20WP1%20Web.pdf?download
  property true value 0.0106; name amount_RP_true_value
    allocation property applied in "true value" allocation // value calculated from revenue

## By-products
- heat, for reuse in municipal waste incineration only: 0 MJ; CPC 17300: Steam and hot water; By-product classification allocatable product; pedigree (1,1,1,1,1)
  Net electricity generated from this waste and used in internal MSWI plant energy redistribution.
  Uncertainty: uncertainty is calculated from uncertainties in waste composition and uncertainties in energy efficiency and the uncertainty in internal energy demand
  production volume 4.67805 MJ
  property exergy 0.1842 MJ; name E_th_prod_MSWI_exergy
    This exergy property is based on the exergy content of the product.
  property price 0.0106 EUR2005; name E_th_prod_MSWI_price_EUR2005
    (same comment as for heat, district or industrial, other than natural gas)
  property true value relation 0.1842; name E_th_prod_MSWI_true_value_relation
    property to calculate "true value" from
  property true value 6.56019e-12
    allocation property applied in "true value" allocation // value calculated from true value relation
- electricity, for reuse in municipal waste incineration only: 0 kWh; CPC 17100: Electrical energy; By-product classification allocatable product; pedigree (1,1,1,1,1)
  (same comment as for heat, for reuse in municipal waste incineration only)
  production volume 0.658847 kWh
  property true value relation 3.6; name E_el_prod_MSWI_true_value_relation
    property to calculate "true value" from
  property price 0.1 EUR2005; name E_el_prod_MSWI_price_EUR2005
    Estimated to be the same price as in case of electricity, medium voltage.
  property exergy 3.6 MJ; name E_el_prod_MSWI_exergy
    This exergy property is based on the exergy content of the product.
  property true value 1.80571e-11
    (same comment as for heat, for reuse in municipal waste incineration only)

## Inputs from technosphere
- hard coal: 0 kg; name hardCoalIn
  Fuel input
  EcoSpold01Location=UCTE
  property heating value, net 28.9 MJ; name hardCoalIn_Net_Heat_Value
  property kgFuel_Input 0.04325 kg; name hardCoalIn_fuel_input_in_kg
  properties: carbon content, fossil 0.845, dry mass 0.94 kg, water content 0.0638298, wet mass 1 kg
  note on carbon content, fossil: C content 75-94% (specified in Tab 1.1, report 6, part VI). A mean content of 0.845 kg C/ kg dry hard coal was considered
- water, completely softened: 0.009375 kg; source Kamberger W. 1993; lognormal variance with pedigree 0.1906, pedigree (2,5,5,5,5)
  EcoSpold01Location=RER
  Estimation. It is assumed that 2% of the feed water is additionally required as decarbonised water (6t per TJin). For wet purification 1.5t per TJin of water is needed. Due to the lack of information the water used for cleaning can not be considered.
  Uncertainty: Completeness, temporal, geographical and technological indicators adapted considering differences with original dataset.
  properties: wet mass 1 kg
- industrial furnace, coal, 1-10MW: 6.95e-10 unit; lognormal variance with pedigree 0.4806, pedigree (2,5,5,5,5)
  Infrastructure
  EcoSpold01Location=RER
  Uncertainty: Completeness, temporal, geographical and technological indicators adapted considering differences with original dataset.
- coke: 1.24992 MJ; name cokeIn; = cokeIn_fuel_use; lognormal variance with pedigree 0.002, pedigree (1,1,3,1,1)
  Calculated value based in corresponding fuel use of heat production, at hard coal industrial furnace, GLO
  Uncertainty: Calculated variable. Uncertainty will be determined from propagation of uncertainty factors of underlying variables.
  property Corresponding fuel use 1.24992 MJ; name cokeIn_fuel_use; = hardCoalIn_Net_Heat_Value* hardCoalIn_fuel_input_in_kg
  property heating value, net 28.6 MJ; name cokeIn_Net_Heat_Value
  properties: wet mass 0.034965 kg, water content 0.0638298, dry mass 0.0328671 kg, carbon content, fossil 0.869149
  note on Corresponding fuel use: Lower heating value of the fuel input related to the heat/electricity output. Calculated from heat production, at hard coal industrial furnace, based on hard coal NHV and fuel input. fuel input: 0,04325 kg/Mj of output Hard coal NHV= 28,9 MJ/kg Corresponding fuel use= 28,9* 0,04325
- electricity, medium voltage: 0.005225 kWh; lognormal variance with pedigree 0.188, pedigree (4,5,5,5,5)
  EcoSpold01Location=UCTE
  Generic electricity consumption
  Uncertainty: Completeness, temporal, geographical and technological indicators adapted considering differences with original dataset.
- hard coal ash: -0.003625 kg; name hard_coal_ash; source Röder, A. 2004; lognormal variance with pedigree 0.24, pedigree (5,5,5,5,5)
  Assumption: no reuse
  EcoSpold01Location=PL
  Uncertainty: Completeness, temporal, geographical and technological indicators adapted considering differences with original dataset.
  production volume 1.70037e7 kg; = hard_coal_ash*heat_apv/amount_RP
    Calculated from the production volume of hard coal, burned in industrial furnace 1-10MW in proportion to the respective output amounts.
  property price 0 EUR2005; name hard_coal_ash_price_EUR2005
  properties: wet mass 1 kg, dry mass 1 kg

## Emissions to nature
All rows: source Röder, A. 2004
- Barium [air, urban air close to ground]: 1.575e-7 kg; lognormal variance with pedigree 0.848, pedigree (4,5,5,5,5)
  From trace element balance; see report for details
  Uncertainty: Completeness, temporal, geographical and technological indicators adapted considering differences with original dataset.
- Phosphorus [air, urban air close to ground]: 7.9e-8 kg; lognormal variance with pedigree 0.848, pedigree (4,5,5,5,5)
  (same comment as for Barium)
- Potassium [air, urban air close to ground]: 1.575e-6 kg; lognormal variance with pedigree 0.848, pedigree (4,5,5,5,5)
  (same comment as for Barium)
- Boron [air, urban air close to ground]: 5.925e-7 kg; lognormal variance with pedigree 0.848, pedigree (4,5,5,5,5)
  (same comment as for Barium)
- Strontium [air, urban air close to ground]: 2.375e-7 kg; lognormal variance with pedigree 0.848, pedigree (4,5,5,5,5)
  (same comment as for Barium)
- Sulfur dioxide [air, urban air close to ground]: 0.000625 kg; lognormal variance with pedigree 0.198, pedigree (4,5,5,5,5)
  From S-balance
  Uncertainty: Completeness, temporal, geographical and technological indicators adapted considering differences with original dataset.
- Formaldehyde [air, urban air close to ground]: 1e-7 kg; lognormal variance with pedigree 0.2206, pedigree (2,5,5,5,5)
  Total NMVOC and profile estimate
  Uncertainty: Completeness, temporal, geographical and technological indicators adapted considering differences with original dataset.
- Ethene [air, urban air close to ground]: 3.75e-6 kg; lognormal variance with pedigree 0.2206, pedigree (2,5,5,5,5)
  (same comment as for Formaldehyde)
- Scandium [air, urban air close to ground]: 1.575e-9 kg; lognormal variance with pedigree 0.848, pedigree (4,5,5,5,5)
  (same comment as for Barium)
- Hydrogen fluoride [air, urban air close to ground]: 1.575e-6 kg; lognormal variance with pedigree 0.238, pedigree (4,5,5,5,5)
  (same comment as for Barium)
- Lead [air, urban air close to ground]: 9.475e-8 kg; lognormal variance with pedigree 0.848, pedigree (4,5,5,5,5)
  (same comment as for Barium)
- Dioxins, measured as 2,3,7,8-tetrachlorodibenzo-p-dioxin [air, urban air close to ground]: 2.5e-14 kg; lognormal variance with pedigree 0.4806, pedigree (2,5,5,5,5)
  Uncertainty: Completeness, temporal, geographical and technological indicators adapted considering differences with original dataset.
- Ethane [air, urban air close to ground]: 1.875e-6 kg; lognormal variance with pedigree 0.2206, pedigree (2,5,5,5,5)
  (same comment as for Formaldehyde)
- Mercury [air, urban air close to ground]: 3.55e-9 kg; lognormal variance with pedigree 0.848, pedigree (4,5,5,5,5)
  (same comment as for Barium)
- Iron [air, urban air close to ground]: 5.525e-6 kg; lognormal variance with pedigree 0.848, pedigree (4,5,5,5,5)
  (same comment as for Barium)
- Chromium [air, urban air close to ground]: 2.8125e-8 kg; lognormal variance with pedigree 0.848, pedigree (4,5,5,5,5)
  (same comment as for Barium)
- Lead-210 [air, urban air close to ground]: 5.8125e-5 kBq; lognormal variance with pedigree 0.848, pedigree (4,5,5,5,5)
  From radioactivity of the elements; see report for details
  Uncertainty: Completeness, temporal, geographical and technological indicators adapted considering differences with original dataset.
- Hydrocarbons, aliphatic, unsaturated [air, urban air close to ground]: 6.25e-7 kg; lognormal variance with pedigree 0.2206, pedigree (2,5,5,5,5)
  (same comment as for Formaldehyde)
- Uranium-238 [air, urban air close to ground]: 1.25e-5 kBq; lognormal variance with pedigree 0.848, pedigree (4,5,5,5,5)
  (same comment as for Lead-210)
- Uranium [air, urban air close to ground]: 3.1625e-9 kg; lognormal variance with pedigree 0.848, pedigree (4,5,5,5,5)
  (same comment as for Barium)
- Potassium-40 [air, urban air close to ground]: 1.6875e-5 kBq; lognormal variance with pedigree 0.848, pedigree (4,5,5,5,5)
  (same comment as for Lead-210)
- Cadmium [air, urban air close to ground]: 1.975e-9 kg; lognormal variance with pedigree 0.848, pedigree (4,5,5,5,5)
  (same comment as for Barium)
- Benzo(a)pyrene [air, urban air close to ground]: 1.25e-11 kg; lognormal variance with pedigree 0.2206, pedigree (2,5,5,5,5)
  (same comment as for Formaldehyde)
- Nitrogen oxides [air, urban air close to ground]: 0.00025 kg; lognormal variance with pedigree 0.2206, pedigree (2,5,5,5,5)
  Typical value
  Uncertainty: Completeness, temporal, geographical and technological indicators adapted considering differences with original dataset.
- Arsenic [air, urban air close to ground]: 3.1625e-8 kg; lognormal variance with pedigree 0.848, pedigree (4,5,5,5,5)
  From trace element balance; see report for details
  Uncertainty: from trace element balance; see report for details
- Particulates, < 2.5 um [air, urban air close to ground]: 2.5e-5 kg; lognormal variance with pedigree 0.498, pedigree (4,5,5,5,5)
  Total PM and profile estimates
  Uncertainty: Completeness, temporal, geographical and technological indicators adapted considering differences with original dataset.
- Xylene [air, urban air close to ground]: 1.25e-7 kg; lognormal variance with pedigree 0.2206, pedigree (2,5,5,5,5)
  Total NMVOC and profile estimate
  Uncertainty: total NMVOC and profile estimate
- Tin [air, urban air close to ground]: 7.9e-10 kg; lognormal variance with pedigree 0.848, pedigree (4,5,5,5,5)
  (same comment as for Barium)
- Molybdenum [air, urban air close to ground]: 5.925e-9 kg; lognormal variance with pedigree 0.848, pedigree (4,5,5,5,5)
  (same comment as for Arsenic)
- Water [water, unspecified]: 6.375e-6 m3; lognormal variance with pedigree 0.2106, pedigree (2,5,5,5,5)
  Calculated value based on literature values and expert opinion. See comments in the parametres' comment field.
  Uncertainty: Completeness, temporal, geographical and technological indicators adapted considering differences with original dataset.
  property dry mass 0 kg; name DM
  property carbon content, fossil 0; name C_content_fossil
  property wet mass 1000 kg; name WM
  property water in wet mass 1000 kg; name WWM
  property carbon content, non-fossil 0; name C_content_non_fossil
- NMVOC, non-methane volatile organic compounds, unspecified origin [air, urban air close to ground]: 2.15e-6 kg; lognormal variance with pedigree 0.2206, pedigree (2,5,5,5,5)
  Total NMVOC and profile estimate
  Uncertainty: total NMVOC and profile estimate
- Nickel [air, urban air close to ground]: 2.375e-8 kg; lognormal variance with pedigree 0.848, pedigree (4,5,5,5,5)
  (same comment as for Barium)
- Cobalt [air, urban air close to ground]: 3.95e-9 kg; lognormal variance with pedigree 0.848, pedigree (4,5,5,5,5)
  (same comment as for Barium)
- Magnesium [air, urban air close to ground]: 4.7375e-6 kg; lognormal variance with pedigree 0.848, pedigree (4,5,5,5,5)
  (same comment as for Barium)
- Ethyne [air, urban air close to ground]: 6.25e-7 kg; lognormal variance with pedigree 0.2206, pedigree (2,5,5,5,5)
  (same comment as for Formaldehyde)
- Particulates, > 2.5 um, and < 10um [air, urban air close to ground]: 2.5e-5 kg; lognormal variance with pedigree 0.318, pedigree (4,5,5,5,5)
  (same comment as for Particulates, < 2.5 um)
- Radium-226 [air, urban air close to ground]: 1.5e-5 kBq; lognormal variance with pedigree 0.848, pedigree (4,5,5,5,5)
  (same comment as for Lead-210)
- Calcium [air, urban air close to ground]: 1.575e-6 kg; lognormal variance with pedigree 0.848, pedigree (4,5,5,5,5)
  (same comment as for Barium)
- Hydrogen chloride [air, urban air close to ground]: 5.0625e-5 kg; lognormal variance with pedigree 0.238, pedigree (4,5,5,5,5)
  (same comment as for Barium)
- Toluene [air, urban air close to ground]: 1.25e-7 kg; lognormal variance with pedigree 0.2206, pedigree (2,5,5,5,5)
  (same comment as for Formaldehyde)
- Dinitrogen monoxide [air, urban air close to ground]: 1.25e-6 kg; lognormal variance with pedigree 0.2206, pedigree (2,5,5,5,5)
  (same comment as for Nitrogen oxides)
- Copper [air, urban air close to ground]: 2.075e-8 kg; lognormal variance with pedigree 0.848, pedigree (4,5,5,5,5)
  (same comment as for Barium)
- Selenium [air, urban air close to ground]: 1.185e-8 kg; lognormal variance with pedigree 0.848, pedigree (4,5,5,5,5)
  (same comment as for Barium)
- Zinc [air, urban air close to ground]: 3.95e-9 kg; lognormal variance with pedigree 0.848, pedigree (4,5,5,5,5)
  (same comment as for Barium)
- Benzene [air, urban air close to ground]: 6.25e-7 kg; lognormal variance with pedigree 0.2206, pedigree (2,5,5,5,5)
  (same comment as for Formaldehyde)
- Thorium-232 [air, urban air close to ground]: 4.375e-6 kBq; lognormal variance with pedigree 0.848, pedigree (4,5,5,5,5)
  (same comment as for Lead-210)
- Radon-220 [air, urban air close to ground]: 1.25e-6 kBq; lognormal variance with pedigree 0.848, pedigree (4,5,5,5,5)
  (same comment as for Lead-210)
- Thorium-228 [air, urban air close to ground]: 6.875e-6 kBq; lognormal variance with pedigree 0.848, pedigree (4,5,5,5,5)
  (same comment as for Lead-210)
- Bromine [air, urban air close to ground]: 1.185e-8 kg; lognormal variance with pedigree 0.848, pedigree (4,5,5,5,5)
  (same comment as for Barium)
- Hydrocarbons, aliphatic, alkanes, unspecified [air, urban air close to ground]: 6.25e-7 kg; lognormal variance with pedigree 0.2206, pedigree (2,5,5,5,5)
  (same comment as for Formaldehyde)
- Titanium [air, urban air close to ground]: 4.7375e-7 kg; lognormal variance with pedigree 0.848, pedigree (4,5,5,5,5)
  (same comment as for Barium)
- Radium-228 [air, urban air close to ground]: 8.125e-5 kBq; lognormal variance with pedigree 0.848, pedigree (4,5,5,5,5)
  (same comment as for Lead-210)
- Iodine [air, urban air close to ground]: 1.425e-8 kg; lognormal variance with pedigree 0.848, pedigree (4,5,5,5,5)
  (same comment as for Barium)
- Carbon dioxide, fossil [air, urban air close to ground]: 0.114375 kg; lognormal variance with pedigree 0.1706, pedigree (2,5,5,5,5)
  From carbon balance
  Uncertainty: Completeness, temporal, geographical and technological indicators adapted considering differences with original dataset.
- Vanadium [air, urban air close to ground]: 4.7375e-8 kg; lognormal variance with pedigree 0.848, pedigree (4,5,5,5,5)
  (same comment as for Barium)
- Water [air, unspecified]: 1.125e-6 m3; lognormal variance with pedigree 0.2106, pedigree (2,5,5,5,5)
  (same comment as for Water)
- Radon-222 [air, urban air close to ground]: 1.25e-6 kBq; lognormal variance with pedigree 0.848, pedigree (4,5,5,5,5)
  (same comment as for Lead-210)
- Silicon [air, urban air close to ground]: 1.975e-5 kg; lognormal variance with pedigree 0.848, pedigree (4,5,5,5,5)
  (same comment as for Barium)
- Sodium [air, urban air close to ground]: 7.9e-7 kg; lognormal variance with pedigree 0.848, pedigree (4,5,5,5,5)
  (same comment as for Barium)
- Methane, fossil [air, urban air close to ground]: 1.25e-5 kg; lognormal variance with pedigree 0.2206, pedigree (2,5,5,5,5)
  (same comment as for Nitrogen oxides)
- Antimony [air, urban air close to ground]: 1.975e-9 kg; lognormal variance with pedigree 0.848, pedigree (4,5,5,5,5)
  (same comment as for Barium)
- Thorium [air, urban air close to ground]: 2.375e-9 kg; lognormal variance with pedigree 0.848, pedigree (4,5,5,5,5)
  (same comment as for Barium)
- Beryllium [air, urban air close to ground]: 1.575e-9 kg; lognormal variance with pedigree 0.2206, pedigree (2,5,5,5,5)
  (same comment as for Formaldehyde)
- Propene [air, urban air close to ground]: 6.25e-7 kg; lognormal variance with pedigree 0.2206, pedigree (2,5,5,5,5)
  (same comment as for Formaldehyde)
- Carbon monoxide, fossil [air, urban air close to ground]: 0.000125 kg; lognormal variance with pedigree 0.8206, pedigree (2,5,5,5,5)
  (same comment as for Nitrogen oxides)
- Manganese [air, urban air close to ground]: 2.7625e-8 kg; lognormal variance with pedigree 0.848, pedigree (4,5,5,5,5)
  (same comment as for Barium)
- Chromium VI [air, urban air close to ground]: 3.475e-9 kg; lognormal variance with pedigree 0.65, pedigree (1,5,5,5,5)
  based on range of data
  Uncertainty: Completeness, temporal, geographical and technological indicators adapted considering differences with original dataset.
- Aluminium [air, urban air close to ground]: 1.3375e-5 kg; lognormal variance with pedigree 0.848, pedigree (4,5,5,5,5)
  (same comment as for Barium)
- Polonium-210 [air, urban air close to ground]: 0.00010625 kBq; lognormal variance with pedigree 0.848, pedigree (4,5,5,5,5)
  (same comment as for Lead-210)
- Propane [air, urban air close to ground]: 1.25e-6 kg; lognormal variance with pedigree 0.2206, pedigree (2,5,5,5,5)
  (same comment as for Formaldehyde)
- Thallium [air, urban air close to ground]: 1.975e-9 kg; lognormal variance with pedigree 0.848, pedigree (4,5,5,5,5)
  (same comment as for Barium)
- Particulates, > 10 um [air, urban air close to ground]: 1.25e-5 kg; lognormal variance with pedigree 0.238, pedigree (4,5,5,5,5)
  (same comment as for Particulates, < 2.5 um)

## Sampling procedure
literature

## Extrapolations
see Technology and geography. This dataset has been extrapolated from the global dataset heat production, at hard coal, industrial furnaceglobal dataset, which was itself extrapolated from a dataset covering the geography RER. The uncertainty has been adjusted accordingly.

## Review by Christian Bauer 2013-10-11
passed
