# chemical factory construction

Dataset: EcoSpold 2, unit process
Geography: RER
Time period: 2000-01-01 to 2019-12-31
Technology level: current
Classification: EcoSpold01Categories: construction processes/buildings
Classification: ISIC rev.4 ecoinvent: 4290:Construction of other civil engineering projects
Synonyms: chemical installation
Tags: ConvertedDataset
Scenario: Business-as-Usual
System model: Allocation at the point of substitution
Generated by: Roland Hischier
Published in: Althaus H.-J. 2007
Database: ecoinvent
isCopyrightProtected: true
accessRestrictedTo: 1

## General comment
This dataset represents the construction of a chemical factory. In this dataset the functional unit is 1 kg of chemical factory. Construction materials, energy and water consumption during its construction are taken into account. Data is taken from different sources of chemical plants and estimations.
[This dataset was already contained in the ecoinvent database version 2. It was not individually updated during the transfer to ecoinvent version 3. Life Cycle Impact Assessment results may still have changed, as they are affected by changes in the supply chain, i.e. in other datasets. This dataset was generated following the ecoinvent quality guidelines for version 2. It may have been subject to central changes described in the ecoinvent version 3 change report (http://www.ecoinvent.org/database/ecoinvent-version-3/reports-of-changes/), and the results of the central updates were reviewed extensively. The changes added e.g. consistent water flows and other information throughout the database. The documentation of this dataset can be found in the ecoinvent reports of version 2, which are still available via the ecoinvent website. The change report linked above covers all central changes that were made during the conversion process.]

## Included activities start
This activity starts with the reception of raw materials on the construction site.

## Included activities end
This dataset includes the composition of the facilities for the production of chemicals (compromising storage facilities on-site, synthesis equipement, product separation and refinement installations) with the consumption of raw materials, energy and water. This dataset does not include any emissions during the factory construction.

## Geography
Estimated composition of the facilities of a chemical plant, based on European information.

## Technology
Estimated composition of the facilities of a chemical plant, based on a destillation unit.
In Jungbluth 2007 the material amount and the construction efforts of a distillation unit is shown as base for the calculation of the infrastructure of a refinery. In fact, European Commission 2001 shows, that the distillation unit is the most frequently used unit operation within the production of a big variety of organic chemicals. Its data is therefore taken as basis for the estimation of the composition of the whole unit operation infrastructure (incl. storage facilities) in this datset.
Concerning the efforts for the manufacturing and installation of the different parts, only information about the production of the distillation unit is available from the above mentioned reference. According to the infrastructure, it is assumed again, that these data are representative for the all unit operations infrastructure. For the installation efforts of the pipes, it is assumed due to a lack of respective data half the amount from the distillation unit per kg of pipes.
Furthermore, it is assumed that the control units (electronic equipment) have about 5% of the weight of the total unit operation infrastructure. The image above summarizes the composition of the different parts of the facilities and the respective production efforts. Concerning the electronics equipment, its production and composition is described in detail in the dataset 'electronics production, for control units'.

In KAM 2001 there is an example for the weight distribution between pipes (incl. supporting structure) and unit operation infrastructure. Similar information can be calculated, based on information of BASF . The following table summarizes all this information and shows the values used in this dataset.
*) Data source: [A]: Jungbluth 2007, [B]: KAM 2001, [C]: assumptions according to text, [D]: assumption, based on in¬formation in KAM 2001
References:
Jungbluth N., Chudacoff M., Dauriat A., Dinkel F., Doka G., Faist Emmenegger M., Gnansounou E., Kljun N., Spielmann M., Stettler C. and Sutter J. (2007) Life Cycle Inventories of Bioenergy. Final report ecoinvent data v2.0 No. 17. ESU-services, Swiss Centre for Life Cycle Inventories, Dübendorf, CH, Online-Version under: www.ecoinvent.org.
Jungbluth N. and Tuchschmid M. (2007) Photovoltaics. In: Sachbilanzen von Energiesystemen: Grundlagen für den ökologischen Vergleich von Energiesystemen und den Einbezug von Energiesystemen in Ökobilanzen für die Schweiz (ed. Dones R.). pp. 180. Final report ecoinvent Data v2.0 No. 6, Paul Scherrer Institut Villigen, Swiss Centre for Life Cycle Inventories, Dübendorf, CH. Online-Version under: www.ecoinvent.org.
KAM (2001) Neubau einer Acrylsäure-Anlage für die BunaSow Leuna Olefin-verbund GmbH. Projektinformation. Kraftanlagen Anlagentechnik München (KAM), München

## Parameters
- fraction, process water, to air: 0.15 dimensionless; name fraction_PW_to_air; lognormal variance with pedigree 0.092025, pedigree (4,4,3,2,4)
  Literature value. In case when no industry/process specific data are available, default evaporation fraction value is used. This value is 15% and is based on literature (Statistics Canada, 2007 & Shaffer, K.H., 2008, Consumptive water use in the Great Lakes Basin, USGS & Shiklomanov, 2003, World Water Resources at the Beginning of the 21st Century) and has been approved by an expert.

## Reference product
- chemical factory: 1 kg; CPC 53269: Other constructions for manufacturing; By-product classification allocatable product
  The composition of the facilities of a chemical plant is varying much in function of the chemicals produced in the respective plant - therefore this facilities module here can be not more than a rough estimate. In European Commission 2001 a chemical production process is divided into five different steps (Raw material supply and preparation - synthesis - product separation and refinement - product handling and storage - emission abatement). This module here covers all these steps.The total weight is based on information about two chemical sites - the composition of material based on information about a destillation unit.
  production volume 1.32237 kg
    This is a placeholder value that does not reflect real-world production volumes. This dataset does not currently require a real-world production volume to work in the database framework, and no actual data were collected yet. This has no negative effect on the results of the ecoinvent database. The placeholder value of this activity was scaled according to the nominal GDP of 2005 (source: United Nations, http://data.un.org/Glossary.aspx?q=GDP+%28current+US%24%29, accessed 20130726) to reflect an appropriate share of the global production volume, which is also a placeholder value.
  property price 4.58455 EUR2005
    Calculated based on inputs: The price of the product has been calculated as a sum of the values of the material and energy inputs for this product. This value is therefore a rough estimation. It may underestimate the real price since there are additional expenses when producing any product. These expences can include for example labour costs, treatment of waste materials and profit for the producer. Please consider carefully whether this level of data quality is acceptable for your application.

## Inputs from technosphere
All rows: lognormal variance with pedigree 0.084, pedigree (4,5,5,1,3)
- steel, low-alloyed, hot rolled: 0.423 kg; source Jungbluth, N. 2007
  Estimation based on different sources. Additional sources:
  Jungbluth N., Chudacoff M., Dauriat A., Dinkel F., Doka G., Faist Emmenegger M., Gnansounou E., Kljun N., Spielmann M., Stettler C. and Sutter J. (2007) Life Cycle Inventories of Bioenergy. Final report ecoinvent data v2.0 No. 17. ESU-services, Swiss Centre for Life Cycle Inventories, Dübendorf, CH, Online-Version under: www.ecoinvent.org.
  Jungbluth N. and Tuchschmid M. (2007) Photovoltaics. In: Sachbilanzen von Energiesystemen: Grundlagen für den ökologischen Vergleich von Energiesystemen und den Einbezug von Energiesystemen in Ökobilanzen für die Schweiz (ed. Dones R.). pp. 180. Final report ecoinvent Data v2.0 No. 6, Paul Scherrer Institut Villigen, Swiss Centre for Life Cycle Inventories, Dübendorf, CH. Online-Version under: www.ecoinvent.org.
  KAM (2001) Neubau einer Acrylsäure-Anlage für die BunaSow Leuna Olefin-verbund GmbH. Projektinformation. Kraftanlagen Anlagentechnik München (KAM), München
  Uncertainty: E
  properties: wet mass 1 kg, carbon content, fossil 0.005, dry mass 1 kg
  note on carbon content, fossil: Low alloyed steel composition given in Tab. 3.2 ecoinvent v2.2 report 10_partII. Steel assumed to have a C content of 0.5%
- electronics, for control units: 0.043 kg
  Estimation based on different sources. It is assumed that the control units (electronic equipment) have about 5% of the weight of the total unit operation infrastructure. Additional sources:
  Jungbluth N., Chudacoff M., Dauriat A., Dinkel F., Doka G., Faist Emmenegger M., Gnansounou E., Kljun N., Spielmann M., Stettler C. and Sutter J. (2007) Life Cycle Inventories of Bioenergy. Final report ecoinvent data v2.0 No. 17. ESU-services, Swiss Centre for Life Cycle Inventories, Dübendorf, CH, Online-Version under: www.ecoinvent.org.
  Jungbluth N. and Tuchschmid M. (2007) Photovoltaics. In: Sachbilanzen von Energiesystemen: Grundlagen für den ökologischen Vergleich von Energiesystemen und den Einbezug von Energiesystemen in Ökobilanzen für die Schweiz (ed. Dones R.). pp. 180. Final report ecoinvent Data v2.0 No. 6, Paul Scherrer Institut Villigen, Swiss Centre for Life Cycle Inventories, Dübendorf, CH. Online-Version under: www.ecoinvent.org.
  Uncertainty: E
  properties: wet mass 1 kg, dry mass 1 kg, carbon content, fossil 0.337146, carbon content, non-fossil 0.00013442
  note on carbon content, fossil: The control unit has a composition of 46% steel (housing), 32% plastics, 14% printed wiring boards and 8% cables (various types).;
- heat, district or industrial, other than natural gas: 4.77 MJ; source Jungbluth, N. 2007
  Estimation based on different sources. Additional sources:
  Jungbluth N., Chudacoff M., Dauriat A., Dinkel F., Doka G., Faist Emmenegger M., Gnansounou E., Kljun N., Spielmann M., Stettler C. and Sutter J. (2007) Life Cycle Inventories of Bioenergy. Final report ecoinvent data v2.0 No. 17. ESU-services, Swiss Centre for Life Cycle Inventories, Dübendorf, CH, Online-Version under: www.ecoinvent.org.
  Jungbluth N. and Tuchschmid M. (2007) Photovoltaics. In: Sachbilanzen von Energiesystemen: Grundlagen für den ökologischen Vergleich von Energiesystemen und den Einbezug von Energiesystemen in Ökobilanzen für die Schweiz (ed. Dones R.). pp. 180. Final report ecoinvent Data v2.0 No. 6, Paul Scherrer Institut Villigen, Swiss Centre for Life Cycle Inventories, Dübendorf, CH. Online-Version under: www.ecoinvent.org.
  Uncertainty: E
- electricity, medium voltage: 5.78 kWh; source Jungbluth, N. 2007
  (same comment as for heat, district or industrial, other than natural gas)
- steel, chromium steel 18/8, hot rolled: 0.249 kg; source Jungbluth, N. 2007
  (same comment as for steel, low-alloyed, hot rolled)
  properties: wet mass 1 kg, dry mass 1 kg, carbon content, fossil 0.0008
  note on carbon content, fossil: Stainless steel model is the grade 304 steel (18/8 stainless, 18% chromium 8% nickel; max. 0.08% C)
- stone wool: 0.00823 kg; source Jungbluth, N. 2007
  (same comment as for heat, district or industrial, other than natural gas)
  properties: carbon content, fossil 0.015401, wet mass 1 kg, dry mass 1 kg
  note on carbon content, fossil: The chemical composition of the glass fibres used in the rock wool production is similar to the composition of naturally cooled volcano basalt and has a composition listed in Tab. 3.1 and 3.2 in ecoinvent v2.2 report 16, part XIV. Rock wool contains: a minimum of 96% mineral fibres,between 0.5 and 3.0 weight percent of phenolic resin depending on the specific product characteristics, and about 0.2 percent mineral oil (ecoinvent v2.2 report 16, part XIV). An average composition of 1.8% phenolic resin, 0.2% mineral oil, and 98% mineral fibres has been assumed and used to calculate C content of the rock wool
- concrete, normal: 0.000116 m3; source Jungbluth, N. 2007
  (same comment as for heat, district or industrial, other than natural gas)
  properties: wet mass 2380 kg, dry mass 2190 kg, water content 0.086758
- chemical, inorganic: 0.0574 kg; source Jungbluth, N. 2007
  (same comment as for heat, district or industrial, other than natural gas)
  properties: carbon content, fossil 0.003, wet mass 1 kg, dry mass 1 kg
  note on carbon content, fossil: This dataset is an unweighted average of 20 inorganic substances (listed in Tab 88.1, ecoinvent v2.2 report 8, part II), being part of the top100 chemicals included in this database. The C-content has also been calculated as an unweighted average of the C content of the substances composing this dataset.
- brazing solder, cadmium free: 0.0494 kg; source Jungbluth, N. 2007
  (same comment as for heat, district or industrial, other than natural gas)
  properties: dry mass 1 kg, wet mass 1 kg

## Inputs from nature
- Water, unspecified natural origin [natural resource, in water]: 0.0505 m3; name water_UNO_input; source Jungbluth, N. 2007; lognormal variance with pedigree 0.084, pedigree (4,5,5,1,3)
  Estimation based on different sources. Additional sources:
  Jungbluth N., Chudacoff M., Dauriat A., Dinkel F., Doka G., Faist Emmenegger M., Gnansounou E., Kljun N., Spielmann M., Stettler C. and Sutter J. (2007) Life Cycle Inventories of Bioenergy. Final report ecoinvent data v2.0 No. 17. ESU-services, Swiss Centre for Life Cycle Inventories, Dübendorf, CH, Online-Version under: www.ecoinvent.org.
  Jungbluth N. and Tuchschmid M. (2007) Photovoltaics. In: Sachbilanzen von Energiesystemen: Grundlagen für den ökologischen Vergleich von Energiesystemen und den Einbezug von Energiesystemen in Ökobilanzen für die Schweiz (ed. Dones R.). pp. 180. Final report ecoinvent Data v2.0 No. 6, Paul Scherrer Institut Villigen, Swiss Centre for Life Cycle Inventories, Dübendorf, CH. Online-Version under: www.ecoinvent.org.
  Estimation based on different sources. Additional sources:
  Jungbluth N., Chudacoff M., Dauriat A., Dinkel F., Doka G., Faist Emmenegger M., Gnansounou E., Kljun N., Spielmann M., Stettler C. and Sutter J. (2007) Life Cycle Inventories of Bioenergy. Final report ecoinvent data v2.0 No. 17. ESU-services, Swiss Centre for Life Cycle Inventories, Dübendorf, CH, Online-Version under: www.ecoinvent.org.
  Jungbluth N. and Tuchschmid M. (2007) Photovoltaics. In: Sachbilanzen von Energiesystemen: Grundlagen für den ökologischen Vergleich von Energiesystemen und den Einbezug von Energiesystemen in Ökobilanzen für die Schweiz (ed. Dones R.). pp. 180. Final report ecoinvent Data v2.0 No. 6, Paul Scherrer Institut Villigen, Swiss Centre for Life Cycle Inventories, Dübendorf, CH. Online-Version under: www.ecoinvent.org.
  Uncertainty: E

## Emissions to nature
- Water [water, unspecified]: 0.042925 m3; name water_to_water_unspecified; = water_UNO_input*(1-fraction_PW_to_air); lognormal variance with pedigree 0.0807, pedigree (2,2,5,1,1)
  Calculated value based on literature values and expert opinion. See comments in the parametres' comment field.
  property dry mass 0 kg; name DM
  property water in wet mass 1000 kg; name WWM
  property carbon content, non-fossil 0; name C_content_non_fossil
  property fraction, origin: fresh water 0; name fraction_origin_fresh_water_Ww
  property carbon content, fossil 0; name C_content_fossil
  property fraction, origin: unspecified 1; name fraction_origin_unspecified_Ww
  property wet mass 1000 kg; name WM
  property fraction, origin: salt water 0; name fraction_origin_salt_water_Ww
- Water [air, unspecified]: 0.007575 m3; name water_to_air_unspecified; = (water_UNO_input*fraction_PW_to_air); lognormal variance with pedigree 0.0807, pedigree (2,2,5,1,1)
  (same comment as for Water)
  property fraction, origin: salt water 0; name fraction_origin_salt_water
  property fraction, origin: unspecified 1; name fraction_origin_unspecified
  property fraction, origin: fresh water 0; name fraction_origin_fresh_water

## Extrapolations
This dataset has been extrapolated from year 2000 to the year of the calculation (2019). The uncertainty has been adjusted accordingly.

## Review by Emilia Moreno Ruiz 2012-04-13
trainee DS, ok, Alba Canovas

## Review by Heiko Kunst 2003-06-20
Passed
Passed
