# bark chips production, softwood, at sawmill

Dataset: EcoSpold 2, unit process
Geography: CH
Time period: 2011-01-01 to 2019-12-31
Technology level: current
Classification: ISIC rev.4 ecoinvent: 1610:Sawmilling and planing of wood
Scenario: Business-as-Usual
System model: Allocation at the point of substitution
Share of production covered: 100 %
Generated by: Frank Werner
Published in: BFS 2013
Database: ecoinvent
isCopyrightProtected: true
accessRestrictedTo: 1

## General comment
This dataset represents the service of the handling of bark from softwood at sawmill with an output of one kg of bark, measured in oven-dry mass of bark.
The process chain in a sawmill is a net of interlinked processes; the process structure depends on the individual design and technologies in place for each sawmill. The structuring of the sawmilling processes is based on the identification of the core processes in a sawmill that are attributable to several co-products (such as upstream processes like forestry and transport of logs to the sawmill) sorting, storing and the sawing of the (debarked) log. Other processes are attributable directly to one of the co-products such as the chipping of residual wood (either after sawing or as part of the profile chipping), the chipping of the bark (the "debarking") or the suction of saw dust as collection and internal transport.
The following figure illustrates the general structure of the sawmilling processes before eventual drying and planing:
The data was provided by and approved by the Swiss forest industry (Holzindustrie Schweiz HIS).

## Included activities start
Bark chips production starts with the bark taken off the stem as part of the over-all sawing process (see respective dataset) and includes all the handling of the bark in the sawmill.

## Included activities end
This activity ends with the bark chips stored in a silo at the saw mill. The dataset does not include dust emissions due to a high water content in the wood.

## Geography
Represents average Swiss conditions.

## Reference product
- bark: 0 kg; By-product classification allocatable product; CPC 31230: Wood in chips or particles
  the bark is produced in the over-all sawing process and treated in this DS as the handling of bark within the sawmill.
  production volume 0 kg; = p_barkchips
    see comment on the by-product
  property price 0.034 EUR2005
    Data on Import/Export (USD/kg) from UN data has been used. (http://data.un.org/Data.aspx?d=ComTrade&f=_l1Code%3a45, [accessed 10th June 2010]) Commodity: 'Sawdust, wood waste or scrap'. A density of 250 kg/m3 was used to convert from M3 to kg (data on density: http://wiki.answers.com/Q/What_is_the_density_of_sawdust, [Accessed 13 June 2010]).
  property carbon content 0.494
    carbon content on a dry matter basis (reserved; not for manual entry)
  properties: wet mass 2.4 kg, carbon content, fossil 0, carbon content, non-fossil 0.494, dry mass 1 kg, water content 1.4, water in wet mass 1.4 kg, carbon allocation 0.494 kg
- bark chips, wet, measured as dry mass: 1 kg; By-product classification allocatable product; CPC 31230: Wood in chips or particles; pedigree (1,1,1,1,1)
  bark chips stored in the silo resulting from the treatment of the reference product
  production volume 9.16376e7 kg
    Calculated from production volume of sawnwood x conversion efficiency of sawmilling process (to estimate log input under bark), extrapolated to log over bark via (1-bark ratio) and estimation of bark via bark ratio (of log over bark, multiplied with average basic bark density.

## By-products
- bark chips, wet, measured as dry mass: 0 kg; name barkchip_wet; By-product classification allocatable product; CPC 31230: Wood in chips or particles; pedigree (1,1,1,1,1)
  bark chips stored in the silo resulting from the treatment of the reference product
  production volume 0 kg; name p_barkchips; = 1078320*1.64/(1-0.12)*0.12*380
    (same comment as for bark chips, wet, measured as dry mass)
  property price 0.034 EUR2005; name barkchip_wet_price_EUR2005
    (same comment as for bark)
  property carbon content 0.494
    carbon content on a dry matter basis (reserved; not for manual entry)
  properties: carbon content, fossil 0, dry mass 1 kg, water content 1.4, water in wet mass 1.4 kg, wet mass 2.4 kg, carbon content, non-fossil 0.494, carbon allocation 0.494 kg

## Inputs from technosphere
- electricity, medium voltage: 0.00371416 kWh; name elec_midvol; lognormal variance with pedigree 0.0032, pedigree (2,1,3,1,1)
  data from industry
- sawlog and veneer log, softwood, measured as solid wood under bark: 0.000309671 m3; source BFS 2013; lognormal variance with pedigree 0.2526, pedigree (2,1,3,1,1)
  input of the log, from which 1 m3 of sawnwood is produced
- lubricating oil: 2.02041e-5 kg; source Rüter, S. 2012; lognormal variance with pedigree 0.1101, pedigree (1,5,3,3,1)
  Lubricating oil plus motor oil
- saw dust, loose, wet, measured as dry mass: -0.0143828 kg; source BFS 2013; lognormal variance with pedigree 0.2526, pedigree (2,1,3,1,1)
  calculated by the share and basic density as the moisture content is over 30%
  production volume 8.222e7 kg
    Calculated from production volume of reference product using the relative outputs.
- diesel, burned in building machine: 0.00555414 MJ; source Rüter, S. 2012; lognormal variance with pedigree 0.1027, pedigree (1,3,3,3,1)
  Diesel for internal transport
- bark: -0.0163441 kg; source BFS 2013; lognormal variance with pedigree 0.008, pedigree (1,1,3,1,1)
  calculated by the share and basic density as the moisture content is over 30%
  production volume 9.34319e7 kg
    Calculated from production volume of reference product using the relative outputs.
- waste mineral oil: -3.02118e-6 kg; source Rüter, S. 2012; lognormal variance with pedigree 0.1101, pedigree (1,5,3,3,1)
  waste motor oil; the lubricating oil is used in a dissipative way
  production volume 17270.7 kg
    Calculated from production volume of reference product using the relative outputs.
- sawmill: 4.13524e-11 unit; source BFS 2013; lognormal variance with pedigree 0.2526, pedigree (2,1,3,1,1)
  value taken from econvent 2.2

## Sampling procedure
complementary literature and sampling from sawmills
