# building operation, upmarket hotel

Dataset: EcoSpold 2, unit process
Geography: PE
Time period: 2017-01-01 to 2019-12-31
Technology level: current
Classification: ISIC rev.4 ecoinvent: 5510:Short term accommodation activities
Synonyms: 4 star hotel
Tags: single enterprise data
Scenario: Business-as-Usual
System model: Allocation at the point of substitution
Generated by: Viachaslau Filimonau
Published in: Filimonau, V. 2018
Database: ecoinvent
isCopyrightProtected: true
accessRestrictedTo: 1

## General comment
This dataset represents the operation of a tourist accommodation facility located in Cusco, Peru. The case study hotel is classed as an upmarket hotel (comfort category 4*). It was opened in 2003 as a brand new, stand-alone tourist accommodation facility. The hotel has capacity of 126 rooms (213 beds in total) and offers rooms of the following types (total number of rooms is given in brackets): single (16), double/twin (105), junior suite (5). The hotel has 7 floors (6 above the ground and 1 under the ground) which host a lobby, a restaurant, a bar, a spa and event rooms. Laundry is available on site. Parking lot is available on site. The hotel occupies a plot of 1860 m2 while the gross floor area (GFA) of the hotel is 10060 m2. The average annual occupancy of the hotel is 80% which is equal to 75000 guest nights per year (actual data from hotel records). The case study hotel's occupancy is somewhat higher than the country's average of 66%
(Source: Hotel News Now 2015. The state of Peru's tourism, hotels. Available from: http://www.hotelnewsnow.biz/Articles/27650/The-state-of-Perus-tourism-hotels Accessed 16 March 2018) which can in part be explained by the ongoing popularity of Cusco as a tourist destination.

## Included activities start
This dataset is modelled to represent the service of operating a hotel. It includes: energy and water consumption, furniture and in-room textiles (such as bed linen, bed mattrasses and curtains), electric and electronic equipment used in guest rooms and on hotel premises (including bulbs), cleaning and in-room consumables. The case study hotel has laundry on-site and this activity is included. Although the case study hotel has a restaurant on site, the inputs of food items have been excluded due to data availability. The energy and water consumption attibuted to restaurant operations have been included. Any waste generated in restaurant operations has been included. Activities include hotel operations and infrastructure based on 1 guest night stay and the lifeframe of the hotel building of 75 years.

## Included activities end
Activities end with guest departure from hotel premises. Due to data availability, the following processes have been excluded: room equipment (on-table lamp, door lock), bathroom equipment (showers, mirrors) and consumables (shower cap), kitchen equipment (mixer, deep fryer, ice-maker, heater), food inputs in restaurant operations.

## Geography
The hotel is based in Cusco, Peru.

## Technology
Technology in use is considered current.

## Parameters
- occupancy rate/year: 0.8 dimensionless; name occupancy_y
  The hotel reports a 80% occupancy rate.

## Reference product
- building operation, upmarket hotel: 1 guest night; By-product classification allocatable product; CPC 631: Accommodation services for visitors
  This reference product represents operation of a tourist accommodation facility classed as an upmarket hotel (comfort category 4*).
  production volume 5.1e6 guest night; = 75000*68
    Annual production volume is estimated based on the number of hotel guests in the case study hotel (data from hotel survey) multiplied by the number of 4* hotels in Peru. The case study hotel reported the annual production volume of 75000 guest nights (see parameters). There are 68 4* hotel properties in Peru (see building construction, upmarket hotel (PE), PE, 2017 - 2018 dataset). Assuming the annual production is fairly equal across all 4* hotel properties in Peru, the annual production volume for the whole destination can be estimated as 75000*68 = 510000.
  property price 2.72102 EUR2005
    Calculated based on inputs: The price of the product has been calculated as a sum of the values of the material and energy inputs for this product. This value is therefore a rough estimation. It may underestimate the real price since there are additional expenses when producing any product. These expences can include for example labour costs, treatment of waste materials and profit for the producer. Please consider carefully whether this level of data quality is acceptable for your application.
  property lifetime 75 year; name lifetime
  property lifetime capacity 5.83088e6 guest night; name lifetime_guests_1; = 213*365* lifetime
    This is lifetime capacity calculated as average annual occupancy (expressed in guest nights) multiplied by hotel lifetime (expressed in years).
  property true value 2.72102
    allocation property applied in "true value" allocation // value calculated from revenue

## By-products
- heat, for reuse in municipal waste incineration only: 0 MJ; CPC 17300: Steam and hot water; By-product classification allocatable product; pedigree (1,1,1,1,1)
  Net electricity generated from this waste and used in internal MSWI plant energy redistribution.
  Uncertainty: uncertainty is calculated from uncertainties in waste composition and uncertainties in energy efficiency and the uncertainty in internal energy demand
  production volume 1.75842e6 MJ
  property true value relation 0.1842; name E_th_prod_MSWI_true_value_relation
    property to calculate "true value" from
  property exergy 0.1842 MJ; name E_th_prod_MSWI_exergy
    This exergy property is based on the exergy content of the product.
  property price 0.0106 EUR2005; name E_th_prod_MSWI_price_EUR2005
    Average European district heat price from Ecoheatcool and Euroheat 2005-2006, Ecoheat Work package 1: The European heat market. Final report. 10.6 EUR/GJ i s the price of district heat. http://www.solarthermalworld.org/files/Ecoheatcool%20WP1%20Web.pdf?download
  property true value 0.00228194
    allocation property applied in "true value" allocation // value calculated from true value relation
- electricity, for reuse in municipal waste incineration only: 0 kWh; CPC 17100: Electrical energy; By-product classification allocatable product; pedigree (1,1,1,1,1)
  (same comment as for heat, for reuse in municipal waste incineration only)
  production volume 238550 kWh
  property exergy 3.6 MJ; name E_el_prod_MSWI_exergy
    This exergy property is based on the exergy content of the product.
  property true value relation 3.6; name E_el_prod_MSWI_true_value_relation
    property to calculate "true value" from
  property price 0.1 EUR2005; name E_el_prod_MSWI_price_EUR2005
    Estimated to be the same price as in case of electricity, medium voltage.
  property true value 0.00605026
    (same comment as for heat, for reuse in municipal waste incineration only)
- iron scrap, sorted, pressed: 0 kg; By-product classification Recyclable; CPC 39310: Slag, dross, scalings and other waste from the manufacture of iron or steel; pedigree (1,1,1,1,1)
  Iron scrap recovered from this waste.
  Uncertainty: uncertainty calculated from uncertainty in waste composition, uncertainty of share of recyclable metal, uncertainty of transfer coefficient to bottom ash, uncertainty of the efficiency of scrap removal in MSWI plant.
  production volume 26924.3 kg
  property price 0.175 EUR2005
    Temporary price data. Calculated as 90% of purchasers price based on: 2005 import and export prices (total trades (USD) divided by total weight (kg) in biggest economies of the world: EU27, USA, Brasil, China, India, Japan and Russia) from UN Commodity Trade Statistics Database (http://data.un.org/Explorer.aspxDatabase [Accessed 2011.06.20]). Commodity: Waste or scrap, of cast iron
  property carbon content 0
    carbon content on a dry matter basis (reserved; not for manual entry)
  property true value 0.000923873
    allocation property applied in "true value" allocation // value calculated from revenue
  properties: dry mass 1 kg, water content 0, carbon content, non-fossil 0, water in wet mass 0 kg, carbon content, fossil 0, wet mass 1 kg, carbon allocation 0 kg
- iron scrap, unsorted: 0 kg; source European Aluminium Association 2008; CPC 39310: Slag, dross, scalings and other waste from the manufacture of iron or steel; By-product classification Recyclable; pedigree (1,1,1,1,1)
  production volume 0.766025 kg
  property price 0.149 EUR2005; name ironScrapAmount_price_EUR2005
    Temporary price data. Calculated as 90% of purchasers price based on: estimated at 85% of sorted scrap
  property carbon content 0
    carbon content on a dry matter basis (reserved; not for manual entry)
  property true value 2.238e-8
    allocation property applied in "true value" allocation // value calculated from revenue
  properties: water in wet mass 0 kg, water content 0, carbon content, fossil 0, carbon content, non-fossil 0, dry mass 1 kg, wet mass 1 kg, carbon allocation 0 kg
- aluminium oxide, non-metallurgical: 0 kg; source European Aluminium Association 2008; CPC 41432: Alumina (aluminium oxide), except artificial corundum; By-product classification allocatable product; CAS 1344-28-1; pedigree (1,1,1,1,1)
  production volume 48.2031 kg
  property carbon content, non-fossil 0; name C_content_non_fossil
  property price 0.28 EUR2005; name Al2O3Amount_price_EUR2005
    From UN trade database. http://data.un.org/ Import data from the largest economies of the world are used (Brazil, India, USA, China, Japan and EU-27).
  property dry mass 1 kg; name DM
  property water content 0; name water_content
  property wet mass 1 kg; name WM
  property water in wet mass 0 kg; name WWM
  property carbon content, fossil 0; name C_content_fossil
  property carbon content 0
    carbon content on a dry matter basis (reserved; not for manual entry)
  property true value 2.64644e-6
    allocation property applied in "true value" allocation // value calculated from revenue
  properties: carbon allocation 0 kg
- aluminium, cast alloy: 0 kg; source European Aluminium Association 2008; By-product classification allocatable product; CPC 41431: Unwrought aluminium; pedigree (1,1,1,1,1)
  EcoSpold01Location=RER
  production volume 450.592 kg
  property price 1.3 EUR2005; name castAlloyAmount_price_EUR2005
    Temporary price data. Calculated as 90% of purchasers price based on: Source: London Metal Exchange, Aluminium alloy price for 2005
  property carbon content 0
    carbon content on a dry matter basis (reserved; not for manual entry)
  property true value 0.000114857
    allocation property applied in "true value" allocation // value calculated from revenue
  properties: water in wet mass 0 kg, carbon content, non-fossil 0, water content 0, dry mass 1 kg, carbon content, fossil 0, wet mass 1 kg, carbon allocation 0 kg
- aluminium, wrought alloy: 0 kg; source European Aluminium Association 2008; By-product classification allocatable product; CPC 4153: Semi-finished products of aluminium or aluminium alloys; pedigree (1,1,1,1,1)
  production volume 197.261 kg
  property price 1.44 EUR2005; name secondaryAluminiumOutput_price_EUR2005
    Estimated based on literature values and expert judgement. Aluminium ccast alloys are about 90% of the price of aluminium wrought alloys.
  property carbon content 0
    carbon content on a dry matter basis (reserved; not for manual entry)
  property true value 5.56971e-5
    allocation property applied in "true value" allocation // value calculated from revenue
  properties: wet mass 1 kg, water content 0, carbon content, fossil 0, water in wet mass 0 kg, carbon content, non-fossil 0, dry mass 1 kg, carbon allocation 0 kg
- copper: 0 kg; source Rentz O. 1999; By-product classification allocatable product; CPC 41413: Refined copper and copper alloys, unwrought; master alloys of copper
  Literature value. Copper uses: Before end-use copper is manufactured into semi fabricated products, such as shapes and ingots (known as 'semis'). These manufacturing processes are subdivided into hot working, cold working and, if necessary, process annealing. Few of the semis are ready for use as such. They more typically travel to first-stage manufacturers, who make metal rods, wire, and casting, and then to component manufacturers who produce such things as motors, valves, and insulated cables The components in turn are incorporated by final-stage manufacturers into a variety of finished products - automobiles, commercial buildings, residential housing, and so forth. These uses account for about 79% of the world-wide consumption of copper.
  production volume 857.001 kg
  property price 5.52 EUR2005
    Literature value (http://www.economist.com/news/business/21576714-mining-industry-has-enriched-chile-its-future-precarious-copper-solution). Average price between 20015 and 2013.
  property carbon content 0
    carbon content on a dry matter basis (reserved; not for manual entry)
  property true value 0.000927578
    allocation property applied in "true value" allocation // value calculated from revenue
  properties: dry mass 1 kg, water in wet mass 0 kg, wet mass 1 kg, carbon content, non-fossil 0, water content 0, carbon content, fossil 0, carbon allocation 0 kg
- zinc concentrate: 0 kg; CPC 14290: Other non-ferrous metal ores and concentrates (other than uranium or thorium ores and concentrates); By-product classification allocatable product
  Calculated value from the knowledge of the properties of both products.
  production volume 6.80225e-7 kg
  property price 0.38 EUR2005; name ByP_price_EUR2005
    Temporary price data. Calculated as 90% of purchasers price based on: Zinc content in concentrate 53%. Concentrate price per kg Zn 86.5% of refined Zn price (13.5% treatment charges according to CHR Metals Limited 2005: Dynamic cost curves. http://www.minecost.com/dynamic.pdf). 2004 zinc price from USGS (2007) Mineral commodity summaries 2007. <http://minerals.usgs.gov/minerals/pubs/mcs/2007/mcs2007.pdf> [Accessed 25 May 2010]
  property zinc content 0.53; name zinc_C_zinc_concentrate
    Zinc content on a dry matter basis. Value taken from teh "zinc mine operation" /GLO dataset.
  property dry mass 1 kg; name DM_zinc_concentrate
  property carbon content 0
    carbon content on a dry matter basis (reserved; not for manual entry)
  property true value 5.06835e-14
    allocation property applied in "true value" allocation // value calculated from revenue
  properties: wet mass 1 kg, water content 0, carbon content, non-fossil 0, carbon content, fossil 0, water in wet mass 0 kg, carbon allocation 0 kg

## Inputs from technosphere
- waste textile, soiled: -0.00266046 kg; = (cotton)*-1; lognormal variance with pedigree 0.004025, pedigree (2,4,2,2,2)
  Calculated value. The amount is set equal to the amount of input product, textile, knit cotton.
  production volume 13620 kg; = Ref('509bd92b-cbcb-41c7-b44e-6f444e758b0c', 'ProductionVolume') * ((Ref('78169220-5ce8-423b-9234-7bfbb12450e4')*-1) / Ref('509bd92b-cbcb-41c7-b44e-6f444e758b0c'))
    Calculated from production volume of reference product using the relative outputs.
  properties: dry mass 0.75 kg, carbon content, non-fossil 0.570519, water content 0.333333, wet mass 1 kg
- mattress: 0.000682334 unit; = 213*((lifetime)/5)/ (lifetime_guests*occupancy_y); lognormal variance with pedigree 0.303425, pedigree (2,4,2,2,2)
  Calculated value. The amount of exchange is calculated as: amount of input product * (lifetime of the hotel/lifetime of the product) / (lifetime capacity). Average service life of a mattress is assumed to be equal to 5 years. Source: Traveller 2017. How often do hotels change their mattresses? Available from: http://www.traveller.com.au/everyone-asks-how-often-do-hotels-change-their-mattresses-guv2kt Accessed 16 March 2018.
  properties: carbon content, fossil 6.37262, wet mass 20.882 kg, dry mass 20.8818 kg
  note on carbon content, fossil: Calculated value. The value of the mattress fossil carbon content is the sum of all fossil carbon content of input materials to the mattress manufacture extracted from Lanoe et al (2013).
- waste polyethylene: -0.00100909 kg; = (nylon)*-1; lognormal variance with pedigree 0.004025, pedigree (2,4,2,2,2)
  Calculated value. The amount is set equal to the amount of input product, nylon 6.
  production volume 5165.93 kg; = Ref('509bd92b-cbcb-41c7-b44e-6f444e758b0c', 'ProductionVolume') * ((Ref('0b812ead-6362-4ffc-adf7-2c7eb9849711')*-1) / Ref('509bd92b-cbcb-41c7-b44e-6f444e758b0c'))
    Calculated from production volume of reference product using the relative outputs.
  properties: wet mass 1 kg, carbon content, fossil 0.825301, dry mass 0.996 kg, water content 0.00401606
  note on carbon content, fossil: C content in 1 kg DM was calculated using data in Tab A.1, ecoinvent v2.2 report 13_I
- building, upmarket hotel: 2.13563e-7 unit; name upmarket_hotel_build; = 1/ (lifetime_guests* occupancy_y); lognormal variance with pedigree 0.303425, pedigree (2,4,2,2,2)
  Calculated value. The amount of infrastructure required is calculated based on the lifetime capacity (see properties).;activityLink introduced to establish a direct link to the corresponding regional supply of this product
  property lifetime 75 year; name build_lifetime
  property lifetime capacity 5.83088e6 guest night; name lifetime_guests; = 213*365* lifetime
  note on lifetime capacity: This is calculated on the basis of the average annual capacity of 75000 (data from hotel survey) multiplied by the lifetime of the hotel building.
- nylon 6: 0.00100909 kg; name nylon; = (5*126)*(lifetime/10)/ (lifetime_guests*occupancy_y); lognormal variance with pedigree 0.303425, pedigree (2,4,2,2,2)
  Calculated value. Represents here curtains made of nylon. The amount of exchange is calculated as: amount of input product * (lifetime of the hotel/lifetime of the product) / (lifetime capacity). An everage curtain is assumed to have a weight of 5 kg. Source: Furniture re-use Network, 2009. Average weights. Available from: http://democracy.york.gov.uk/documents/s2116/Annex%20C%20REcycling%20Report%20frnweights2005.pdf Accessed 13 January 2018. Average service life of a curtain is assumed to be equal to average service life of a carpet which is 10 years. Source: Greenspec 2018. Whole life costing: carpets. Available from: http://www.greenspec.co.uk/building-design/carpets/ Accessed 16 March 2018. In terms of outputs assumed to have gone to waste polyethylene.
  properties: carbon content, fossil 0.637168, dry mass 1 kg, wet mass 1 kg
  note on carbon content, fossil: It is a chain of caprolactam molecules, originating from aminocarboxylic acids - here caproic acid or caprolactam. The structure of nylon 6 is -(NH-(CH2)5-CO)n-, C6H11NO (ecoinvent v2.2 report 11_II). MW=113 g/mol
- cleaning consumables, without water, in 13.6% solution state: 0.00125473 kg; name clean; = 576*0.136* lifetime /(lifetime_guests*occupancy_y); lognormal variance with pedigree 0.303425, pedigree (2,4,2,2,2)
  Calculated value. The amount of exchange is calculated as: amount of input product * (lifetime of the hotel) / (lifetime capacity). Combined of all instances of use across the hotel operations. Represents the following cleaning luquids: glass/window cleaner, floor cleaner, bathroom cleaner, bleach, washing up liquid, carpet cleaner, odour eliminator. In terms of outputs assumed to have gone to wastewater. As the product "cleaning consumables" is expressed as 100% active substance, the amount of cleaning consumables is multiplied by the average concentration of active substance. According to Golsteijn (2015) the average water content of cleaning consumables is 86.4%, the necessary water input is accounted for with the flow "water, compeltely softened, from decarbonised water, at user". For more information on how the cleaning consumables dataset was created please refer to the relevant dataset in ecoinvent.
  2015, Laura Golsteijn, A compilation of life cycle studies for six household detergent product categories in Europe: the basis for product-specific A.I.S.E. Charter Advanced Sustainability Profiles
  property wet mass 1 kg; name clean_WM
  property carbon content, non-fossil 0; name clean_C_content_non_fossil
  property carbon content, fossil 0; name clean_C_content_fossil
- tap water: 465.333 kg; name tap_water; = 29052*1000*(lifetime)/ (lifetime_guests*occupancy_y); lognormal variance with pedigree 0.303425, pedigree (2,4,2,2,2)
  Calculated value based on consumption data from the hotel survey provided in m3. Assuming 1 m3 of water is equal to 1000 kg of water. The amount of exchange is calculated as: amount of input product * (lifetime of the hotel) / (lifetime capacity). In terms of outputs assumed to have gone to wastewater.
  properties: wet mass 1 kg, dry mass 0.000337476 kg, carbon content, fossil 0.00178991, water content 2962.17
  note on carbon content, fossil: Bicarbonate content is 2.93 mol/m3. CO2 content is 0.1 mol/m3 (ecoinvent v2.2 report 8, Tab 93.1).
- dryer: 3.84414e-6 unit; = 3*( lifetime/12.5)/ (lifetime_guests*occupancy_y); source Ardente, F. 2015; lognormal variance with pedigree 0.303425, pedigree (2,4,2,2,2)
  Calculated value. Assumed average service life of a dryer is 12.5 years. The amount of exchange is calculated as: amount of input product * (lifetime of the hotel/lifetime of the product) / (lifetime capacity). Source: Ardente F., and Talens Peiró L. 2015. Environmental Footprint and Material Efficiency Support for Product Policy - Report on Benefits and Impacts/costs of Options for Different Potential Material Efficiency Requirements for Dishwashers. JRC Science and Policy Report EUR27200EN. European Commission, March 2015. Available from: http://publications.jrc.ec.europa.eu/repository/bitstream/JRC95187/lb-na-27200-en-n.pdf Accessed 14 January 2018
  properties: dry mass 50 kg, lifetime 12.5 year, wet mass 50 kg, carbon content, fossil 5.63
- furniture, wooden: 0.0267467 kg; name furniture_w; = ((213*30)*(lifetime/15)/(lifetime_guests*occupancy_y))+((128*37)*(lifetime/15)/(lifetime_guests*occupancy_y))+((52*23)*(lifetime/15)/(lifetime_guests*occupancy_y))+((198*7)*(lifetime/15)/(lifetime_guests*occupancy_y))+((126*55)*(lifetime/15)/(lifetime_guests*occupancy_y))+ ((126*35)*(lifetime/15)/(lifetime_guests*occupancy_y)); lognormal variance with pedigree 0.303425, pedigree (2,4,2,2,2)
  Estimated value. The amount of exchange is calculated as: amount of input product * (lifetime of the hotel/lifetime of the product) / (lifetime capacity). Assumed average service life of all pieces of furniture is 15 years. This represents service life of an average piece of furniture. Source: European Commission 2013. BACKGROUND REPORT. Revision of Ecolabel and Green Public Procurement criteria for the product group Wooden Furniture. September 2013. Available from: http://susproc.jrc.ec.europa.eu/furniture/docs/Background_report_Furniture_September_2013.pdf Accessed 19 March 2018. This exchange represents the following: Bed king/queen (unit) King bed is assumed to have a weight of 30 kg, no headboard, Furniture re-use Network, 2009. Average weights. Available from: http://democracy.york.gov.uk/documents/s2116/Annex%20C%20REcycling%20Report%20frnweights2005.pdf Accessed 13 January 2018. Sofas (unit) Sofa is assumed to have a weight of 37 kg, two seater, Furniture re-use Network, 2009. Average weights. Available from: http://democracy.york.gov.uk/documents/s2116/Annex%20C%20REcycling%20Report%20frnweights2005.pdf Accessed 13 January 2018. Tables/Desks (unit) Table is assumed to have a weight of 23 kg, medium, Furniture re-use Network, 2009. Average weights. Available from: http://democracy.york.gov.uk/documents/s2116/Annex%20C%20REcycling%20Report%20frnweights2005.pdf Accessed 13 January 2018. Chairs (unit) Chair is assumed to have a weight of 7 kg, Furniture re-use Network, 2009. Average weights. Available from: http://democracy.york.gov.uk/documents/s2116/Annex%20C%20REcycling%20Report%20frnweights2005.pdf Accessed 13 January 2018. Wardrobe (unit). Wardrobe is assumed to have a weight of 55 kg (double wardrobe), Furniture re-use Network, 2009. Average weights. Available from: http://democracy.york.gov.uk/documents/s2116/Annex%20C%20REcycling%20Report%20frnweights2005.pdf Accessed 13 January 2018. Shelves (unit). Shelf is assumed to have a weight of 35 kg, Furniture re-use Network, 2009. Average weights. Available from: http://democracy.york.gov.uk/documents/s2116/Annex%20C%20REcycling%20Report%20frnweights2005.pdf Accessed 13 January 2018.
  property dry mass 0.942177 kg; name furniture_w_DM
  property carbon content, fossil 0.0328084; name furniture_w_C_content_fossil
  property carbon content, non-fossil 0.00807356; name furniture_w_C_content_non_fossil
  property wet mass 1 kg; name furniture_w_WM
  note on carbon content, fossil: Calculated value. Calculation was based on the weighted avarage of fossil carbon content of material inputs.
  note on carbon content, non-fossil: Calculated value. Calculation was based on the weighted avarage of non fossil carbon content of material inputs.
- soap: 0.0743921 kg; = (919.8+3724.7)* lifetime/ (lifetime_guests*occupancy_y); lognormal variance with pedigree 0.303425, pedigree (2,4,2,2,2)
  Calculated value. The amount of exchange is calculated as: amount of input product * (lifetime of the hotel) / (lifetime capacity). In terms of outputs assumed to have gone to wastewater. Represents here soap, shampoo, shower gel and body lotion.
  properties: carbon content, non-fossil 0.692237, wet mass 1 kg, dry mass 0.87 kg, water content 0.149425
- scrap steel: -0.000386549 kg; = (steel)*-1; lognormal variance with pedigree 0.004025, pedigree (2,4,2,2,2)
  Calculated value. The amount is set equal to the amount of input product, steel.
  production volume 1978.91 kg; = Ref('509bd92b-cbcb-41c7-b44e-6f444e758b0c', 'ProductionVolume') * ((Ref('682d0802-fd01-4b97-be13-498c366bdf3a')*-1) / Ref('509bd92b-cbcb-41c7-b44e-6f444e758b0c'))
    Calculated from production volume of reference product using the relative outputs.
  properties: dry mass 1 kg, wet mass 1 kg
- microwave oven: 4.00431e-6 unit; = 2*((lifetime)/8)/ (lifetime_guests*occupancy_y); lognormal variance with pedigree 0.303425, pedigree (2,4,2,2,2)
  Calculated value. The amount of exchange is calculated as: amount of input product * (lifetime of the hotel/lifetime of the product) / (lifetime capacity). Assumed average service life of a microwave oven is 8 years. Source: Gallego-Schmid et al. 2018. Environmental assessment of microwaves and the effect of European energy efficiency and waste management legislation. Science of the Total Environment, 618, 487-499.
  properties: lifetime 8 year
  note on lifetime: Source: Gallego-Schmid et al. 2018, 2018, Gallego-Schmid, A., Mendoza, J.M.F., Azapagic, A., Environmental assessment of microwaves and the effect of European energy efficiency and waste management legislation. , Science of the Total Environment, 618, 487-499, 1 - Article
- steel, low-alloyed, hot rolled: 0.000386549 kg; name steel; = ((26*12)*(lifetime/15)/(lifetime_guests*occupancy_y))+((2*25)*( lifetime/15)/(lifetime_guests*occupancy_y)); lognormal variance with pedigree 0.004025, pedigree (2,4,2,2,2)
  Calculated value. Represents here all chairs and tables used across the hotel that are made of steel. The amount of exchange is calculated as: amount of input product * (lifetime of the hotel/lifetime of the product) / (lifetime capacity). Steel chair (unit) is assumed to have a weight of 12 kg, Furniture re-use Network, 2009. Average weights. Available from: http://democracy.york.gov.uk/documents/s2116/Annex%20C%20REcycling%20Report%20frnweights2005.pdf Accessed 13 January 2018. Steel table (unit) is assumed to have a weight of 25 kg, Furniture re-use Network, 2009. Average weights. Available from: http://democracy.york.gov.uk/documents/s2116/Annex%20C%20REcycling%20Report%20frnweights2005.pdf Accessed 13 January 2018. Average service life of all pieces of furniture is assumed to be equal to 15 years. This represents service life of an average piece of furniture. Source: European Commission 2013. BACKGROUND REPORT. Revision of Ecolabel and Green Public Procurement criteria for the product group Wooden Furniture. September 2013. Available from: http://susproc.jrc.ec.europa.eu/furniture/docs/Background_report_Furniture_September_2013.pdf Accessed 19 March 2018. In terms of outputs assumed to have gone to scrap steel.
  properties: wet mass 1 kg, dry mass 1 kg, carbon content, fossil 0.005
  note on carbon content, fossil: Low alloyed steel composition given in Tab. 3.2 ecoinvent v2.2 report 10_partII. Steel assumed to have a C content of 0.5%
- tissue paper: 0.369778 kg; = (92345/4)* lifetime/ (lifetime_guests*occupancy_y); lognormal variance with pedigree 0.303425, pedigree (2,4,2,2,2)
  Calculated value. The amount of exchange is calculated as: amount of input product * (lifetime of the hotel) / (lifetime capacity). Conversion from from rolls to kg has been made assuming a roll weights 250 g, so 1 kg of tissue paper is equal to 4 rolls. Source: Sainsburys 2018. Andrex Toilet Paper. Available from: https://www.sainsburys.co.uk/webapp/wcs/stores/servlet/gb/groceries/andrex-toilet-tissue--classic-white-16x241-sheets?langId=44&storeId=10151&krypto=6KE3AoChB8jlwzzYGlgparsN%2BBruZBOjUaSVm%2BCnwAT0LLJPLAalDm9DhCtUDzK5uFGmUkJJ%2FMIaDVx%2BGRGKIHdBUxaNbCTzmIQiBcpr497qZYrRt4Kvvy%2BLLO40d8j3%2BY4eQ%2Fk%2BK4BXsq0FOjWLrDLelOp5CVxrDysmNwGM26k%3D&ddkey=https%3Agb%2Fgroceries%2Fandrex-toilet-tissue--classic-white-16x241-sheets Accessed 16 January 2018. In terms of outputs, assumed to have gone to wastewater.
  properties: carbon content, non-fossil 0.36169, wet mass 1 kg, carbon content, fossil 2.22e-5, dry mass 0.945 kg, water content 0.0582011
- heat, district or industrial, other than natural gas: 15.611 MJ; = 10300*3.785*25* lifetime/ (lifetime_guests*occupancy_y); lognormal variance with pedigree 0.303425, pedigree (2,4,2,2,2)
  Calculated value with conversion made from gallons of LPG. Assuming 1 gallon LPG is equal to 3.785 liters. Source: Lange Gas 2018. Conversion tables. Available from: http://www.langegas.com/alte_daten/umrele.htm Accessed 23 March 2017. Assuming 1 liter LPG is equal to 25MJ. Source: LPG Gas Blog 2018. LPG Conversions: Gas kg, Litres, MJ, kWh & m³. Available from: http://www.elgas.com.au/blog/389-lpg-conversions-kg-litres-mj-kwh-and-m3 Accessed 23 March 2018. The amount of exchange is calculated as: amount of input product * (lifetime of the hotel) / (lifetime capacity).
  properties: corresponding fuel use, propane, furnace >100kW 1.05263 MJ
  note on corresponding fuel use, propane, furnace >100kW: Lower heating value of the fuel input related to the heat/electricity output, taken directly from ecoinvent v3.0 dataset "heat production, natural gas, at industrial furnace >100kW, GLO 2000".
- vacuum cleaner: 6.00646e-6 unit; = 3*((lifetime)/8)/ (lifetime_guests*occupancy_y); lognormal variance with pedigree 0.303425, pedigree (2,4,2,2,2)
  Calculated value. The amount of exchange is calculated as: amount of input product * (lifetime of the hotel/lifetime of the product) / (lifetime capacity). Assumed average service life of a vacuum cleaner is 8 years. Source: Gallego-Schmid et al. 2016. Life cycle environmental impacts of vacuum cleaners and the effects of European regulation. Science of the Total Environment, 559, 192-203.
  properties: wet mass 4.45 kg, dry mass 4.45 kg, lifetime 8 year, carbon content, fossil 2.59
- wastewater, average: -0.465333 m3; = (tap_water/1000)*-1; lognormal variance with pedigree 0.004025, pedigree (2,4,2,2,2)
  Calculated value. The amount is set equal to the amount of input product, tap water, with conversion from kg of water to m3 of water.
  production volume 2.38223e6 m3; = Ref('509bd92b-cbcb-41c7-b44e-6f444e758b0c', 'ProductionVolume') * ((Ref('cb436c11-15d8-4403-b7be-f435de64b495')*-1) / Ref('509bd92b-cbcb-41c7-b44e-6f444e758b0c'))
    Calculated from production volume of reference product using the relative outputs.
  properties: water content 2882.2, dry mass 0.346837 kg, wet mass 1000 kg, carbon content, non-fossil 0.194039
  note on carbon content, non-fossil: 0.0673 kg TOC/m3 (Tab A.17, ecoinvent v2.2 report 13_I). TOC was considered as Total Carbon.
- cookstove: 3.20345e-6 unit; = 3*( lifetime/15)/ (lifetime_guests*occupancy_y); lognormal variance with pedigree 0.303425, pedigree (2,4,2,2,2)
  Calculated value. The amount of exchange is calculated as: amount of input product * (lifetime of the hotel/lifetime of the product) / (lifetime capacity). Assumed average service life of a cookstove is 15 years. Source: Jungbluth 1997. Life-Cycle-Assessment for Stoves and Ovens. UNS Working Paper No. 16, August 1997.
  properties: carbon content, fossil 3.22, dry mass 57.9 kg, wet mass 57.9 kg, lifetime 15 year
- municipal solid waste: -1.70851 kg; = (106667* lifetime/ (lifetime_guests*occupancy_y))*-1; lognormal variance with pedigree 0.004025, pedigree (2,4,2,2,2)
  No data on the amount of waste and its composition were provided by the case study hotel. Hence, the data from the budget hotel based in the same geography (Peru) were used as proxy with correlation applied to account for larger occupancy rates demonstrated by the case study hotel. The proxy budget hotel generates 40000 kg of solid waste per year and has average annual occupancy of 30%. The average annual occupancy of the case study hotel is 80% (see parameters). Hence, the annual amount of waste generated has been calculated for the case study hotel as 40000 kg * (80/30) = 106667 kg of waste. The amount of exchange is calculated as: amount of input product * (lifetime of the hotel) / (lifetime capacity).
  production volume 8.74657e6 kg; = Ref('509bd92b-cbcb-41c7-b44e-6f444e758b0c', 'ProductionVolume') * ((Ref('d7b3680f-5562-4a3a-a8e9-4f1270006e56')*-1) / Ref('509bd92b-cbcb-41c7-b44e-6f444e758b0c'))
    Calculated from production volume of reference product using the relative outputs.
  properties: dry mass 0.771 kg, carbon content, fossil 0.171549, wet mass 1 kg, water content 0.297017, carbon content, non-fossil 0.261655
  note on carbon content, fossil: MSW composition in tab 4.1, ecoinvent v2.2 report 13_I. C content referred to 1 kg DM
- coffee maker: 6.4069e-6 unit; = 2*( lifetime/5)/ (lifetime_guests*occupancy_y); lognormal variance with pedigree 0.303425, pedigree (2,4,2,2,2)
  Calculated value. The amount of exchange is calculated as: amount of input product * (lifetime of the hotel/lifetime of the product) / (lifetime capacity). Assumed average service life of a coffee maker is 5 years. Source: Ashby 2009. Materials and the Environment: Eco-Informed Material Choice. Elsevier, Burlington, USA
  properties: carbon content, fossil 0.857611, lifetime 5 year, wet mass 1.9 kg, dry mass 1.9 kg
- water, completely softened: 0.0079712 kg; = 576*0.864* lifetime /(lifetime_guests*occupancy_y); lognormal variance with pedigree 0.0454, pedigree (2,4,2,5,4)
  Calculated value. From the dataset for "cleaning consumables production" GLO 2011-2013, on average cleaning products contain 86% of water. Based on the literature source Golsteijn (2015) the dataset used to represent the water flow is "water, completely softened, at plant", version 2 dataset which corresponds to ecoinvent version 3 dataset "water, completely softened, from decarbonised waterm at user". The amount of water needed is therefore calculated based on the vale of 86% calculated based on Golsteijn (2015) and the amount of cleaning consumable which are expressed as 100% active substance.
  Laura Golsteijn, 2015, A compilation of life cycle studies for six household detergent product categories in Europe: the basis for product-specific A.I.S.E. Charter Advanced Sustainability Profiles
  properties: wet mass 1 kg
- television: 0.000201817 unit; = 126*((lifetime)/10)/ (lifetime_guests*occupancy_y); lognormal variance with pedigree 0.303425, pedigree (2,4,2,2,2)
  Calculated value. The amount of exchange is calculated as: amount of input product * (lifetime of the hotel/lifetime of the product) / (lifetime capacity). Average service life of a television is assumed to be equal to 10 years. Source: Feng and Ma 2009. The energy consumption and environmental impacts of a color TV set in China. Journal of Cleaner Production, 17,13-25.
  properties: lifetime 10 year
  note on lifetime: As proposed by Dodbiba et al. 2008. Source: 2008, Dodbiba, G., Takahashi, K., Sadaki, J., Fujita, T., The recycling of plastic wastes from discarded TV sets: comparing energy recovery with mechanical recycling in the context of life cycle assessment, Journal of Cleaner Production, 16, 458-470, 0 - Undefined
- electricity, low voltage: 3.03594 kWh; = 189450* lifetime/ (lifetime_guests*occupancy_y)+(2/3.6* cotton); lognormal variance with pedigree 0.303425, pedigree (2,4,2,2,2)
  Data from the hotel survey. The amount of exchange is calculated as: amount of input product * (lifetime of the hotel) / (lifetime capacity). The amount also includes electricity requirements to produce cotton textile products from raw cotton. It is estimated that 2 MJ of electricity is required to produce 1 kg of cotton textile product. This accounts for 10% fabric loss in the cotton textile manufacturing process. Source: Baydar, G., Ciliz, N., and Mammadov, A., 2015. Life cycle assessment of cotton textile products in Turkey. Journal of Cleaner Production, 104(A), 213-223.
- electric kettle: 0.000508547 unit; = 127*( lifetime/4)/ (lifetime_guests*occupancy_y); lognormal variance with pedigree 0.303425, pedigree (2,4,2,2,2)
  Calculated value. The amount of exchange is calculated as: amount of input product * (lifetime of the hotel/lifetime of the product) / (lifetime capacity). Assumed average service life of a kettle is 4 years. Source: Marcinkowski and Zych 2017. ENVIRONMENTAL PERFORMANCE OF KETTLE PRODUCTION: PRODUCT LIFE CYCLE ASSESSMENT. Management Systems in Production Engineering, 25, 4, 255-261.
  properties: dry mass 1.5 kg, wet mass 1.5 kg, lifetime 4 year, carbon content, fossil 0.69351
  note on carbon content, fossil: Calculated from the carbon content of the inputs (carbon content of television = carbon content of the inputs X the amount of the input exchange).
- washing machine: 4.80517e-6 unit; = 3*((lifetime)/10)/ (lifetime_guests*occupancy_y); lognormal variance with pedigree 0.303425, pedigree (2,4,2,2,2)
  Calculated value. The amount of exchange is calculated as: amount of input product * (lifetime of the hotel/lifetime of the product) / (lifetime capacity). Assumed average service life of a washing machine is 10 years. Source: Yuan et al. 2016. Life cycle assessment of horizontal-axis washing machines in China. Int J Life Cycle Assess, 21, 15-28.
  properties: lifetime 10 year
  note on lifetime: Based on the estimate from Yuan et al. 2016. Source: Yuan et al. 2016, 2016, Yuan, Z., Zhang, Y., and Liu, X., Life cycle assessment of horizontal-axis washing machines in China, International Journal of Life Cycle Asse, 21, 15-28, 1 - Article
- refrigerator: 0.000214631 unit; = 134*((lifetime)/10)/ (lifetime_guests*occupancy_y); lognormal variance with pedigree 0.303425, pedigree (2,4,2,2,2)
  Calculated value. The amount of exchange is calculated as: amount of input product * (lifetime of the hotel/lifetime of the product) / (lifetime capacity). Assumed average service life of a refrigerator is 10 years. Source: Xiao et al. 2015. A life-cycle assessment of household refrigerators in China. Journal of Cleaner Production, 95, 301-310
  properties: lifetime 10 year
  note on lifetime: Source: Xiao, R. et al. 2015, 2015, Xiao, R., Zhang, Y., Liu, X., and Yuan, Z., A life-cycle assessment of household refrigerators in China, Journal of Cleaner Production, 95, 301-310, 1 - Article
- non-ionic surfactant: 0.00200215 kg; name surfactant; = 125* lifetime/ (lifetime_guests*occupancy_y); lognormal variance with pedigree 0.303425, pedigree (2,4,2,2,2)
  Calculated value. Represents here laundry detergent. The amount of exchange is calculated as: amount of input product * (lifetime of the hotel) / (lifetime capacity). In terms of outputs assumed to have gone to wastewater.
- computer, laptop: 1.60172e-5 unit; = 4*( lifetime/4)/ (lifetime_guests*occupancy_y); lognormal variance with pedigree 0.303425, pedigree (2,4,2,2,2)
  Calculated value. The amount of exchange is calculated as: amount of input product * (lifetime of the hotel/lifetime of the product) / (lifetime capacity). Assumed average service life of a computer is 4 years. Source: Choi et al. 2006. Life Cycle Assessment of a Personal Computer and its Effective Recycling Rate. Int J LCA, 11 (2), 122 - 128.
  properties: wet mass 3.15 kg, dry mass 3.15 kg, carbon content, fossil 0.257799, carbon content, non-fossil 1.2662e-5
- hair dryer: 0.000672724 unit; = 126*( lifetime/3)/ (lifetime_guests*occupancy_y); lognormal variance with pedigree 0.303425, pedigree (2,4,2,2,2)
  Calculated value. The amount of exchange is calculated as: amount of input product * (lifetime of the hotel/lifetime of the product) / (lifetime capacity). Assumed average service life of a hair dryer is 3 years. Source: Ashby 2009. Materials and the Environment: Eco-Informed Material Choice. Elsevier, Burlington, USA
  properties: wet mass 0.89 kg, lifetime 3 year, carbon content, fossil 0.411805, dry mass 0.89 kg
- compact fluorescent bulb: 0.00728056 unit; = 500*( lifetime/1.1)/ (lifetime_guests*occupancy_y); lognormal variance with pedigree 0.303425, pedigree (2,4,2,2,2)
  Calculated value. The amount of exchange is calculated as: amount of input product * (lifetime of the hotel/lifetime of the product) / (lifetime capacity). Average service life of a bulb is assumed to be equal to 1.1 year. Source: Elijošiutė et al. 2012. Life Cycle Assessment of Compact Fluorescent and Incandescent Lamps: Comparative Analysis. Environmental Research, Engineering and Management, 3(61), 65-72.
  properties: wet mass 0.075 kg, dry mass 0.075 kg, carbon content, fossil 0.009542, lifetime 1 year
  note on lifetime: Calculated from Elijosiute et al. 2012 who estimate the life time of a bulb to be eqaul to 10000 hours which equates to circa 1 year.
- textile, knit cotton: 0.00266046 kg; name cotton; = (302*1.1/4)*(lifetime/0.5)/ (lifetime_guests*occupancy_y); lognormal variance with pedigree 0.303425, pedigree (2,4,2,2,2)
  Calculated value from the total number of linen units used by the hotel. The amount of exchange is calculated as: amount of input product * (lifetime of the hotel/lifetime of the product) / (lifetime capacity). It is assumed that, on average, 4 linen units make 1 kg in weight. Source: Filimonau et al. 2011. Reviewing the carbon footprint analysis of hotels: Life Cycle Energy Analysis (LCEA) as a holistic method for carbon impact appraisal of tourist accommodation. Journal of Cleaner Production, 19, 1917-1930. Assumed average service life is 0.5 years (primary data from the hotel survey). The amount accounts for 10% fabric loss in the cotton textile manufacturing process. Source: Baydar, G., Ciliz, N., and Mammadov, A., 2015. Life cycle assessment of cotton textile products in Turkey. Journal of Cleaner Production, 104(A), 213-223.
  properties: dry mass 1 kg, carbon content, non-fossil 0.46, wet mass 1 kg

## Sampling procedure
Primary data from the hotel supplemented with literature-based calculations and estimates, where appropriate.

## Extrapolations
In terms of operations, energy and water consumption are aggregate and represent the case study hotel as a whole, rather than its specific operational areas (e.g. guest rooms, restaurant and bar, kitchen, spa, laundry). The comments to respective processes explain this in detail.
