# aluminium production, primary, liquid, prebake

Dataset: EcoSpold 2, unit process
Geography: IAI Area, Russia & RER w/o EU27 & EFTA
Time period: 2015-01-01 to 2019-12-31
Technology level: current
Classification: EcoSpold01Categories: metals/extraction
Classification: ISIC rev.4 ecoinvent: 2420:Manufacture of basic precious and other non-ferrous metals
Scenario: Business-as-Usual
System model: Allocation at the point of substitution
Generated by: Linlin Wu
Published in: International Aluminium Insitute 2015
Database: ecoinvent
isCopyrightProtected: false
accessRestrictedTo: 1

## General comment
This dataset represents the production of 1kg of liquid primary aluminium. Primary aluminium is produced by the The Hall-Héroult process, developed in 1886, and the sole industrial method for the smelting of primary aluminium. It involves passing a large electric current through a molten mixture of cryolite, alumina and aluminium fluoride to obtain pure, liquid aluminium metal. Direct current (DC) is fed into a line of electrolytic cells connected in series (a “potline”). While these cells, or “pots” and potlines vary in size and configuration from one plant to another, the fundamental electrochemical process is identical. Each pot is a large carbon-lined metal container, forming the negative electrode (cathode) in the cell. The cell contains an electrolytic bath of molten cryolite (Na3AlF6), maintained at a temperature of around 960 – 980°C, in which alumina powder (Al2O3) is dissolved. Aluminium fluoride (AlF3) is added to the solution to maintain optimal chemistry and lower the electrolyte’s freezing point. Large carbon blocks are suspended in the solution and serve as the positive electrode (anode). The electrical current passes from the carbon anodes via the bath to the carbon cathode cell lining. The current then passes to the anode of the next pot in series. As the electrical current passes through the solution, the dissolved alumina is split into molten aluminium (Al) and oxygen (O2). The oxygen consumes the carbon in the anode blocks to form carbon dioxide. The electrolytic reaction can be expressed as:

2Al2O3 + 3C → 4Al + 3CO2

There are two main types of aluminium smelting technology: Søderberg and prebake. The principal difference between the two is the type of anode used.
Prebake technology uses multiple anodes in each cell, which are baked in a separate facility and attached to rods that suspend the anodes in the cell. New anodes are exchanged for spent anodes, with the remaining anode “butts” being recycled into new anodes.
[This dataset is meant to replace the following datasets:]

## Included activities start
Unit process starts with the unloading of process materials to their storage areas on site.

## Included activities end
Includes:
* Recovery, preparation and handling of process materials
* Manufacture of major process equipment and infrastructure
* Process control activities (metal, bath, heat)
* maintenance and repair of plant and equipment
* treatment of process air, liquids and solids
The output of this unit process is hot metal transported to an ingot casting facility.

## Geography
Data mostly from global surveys by IAI.

## Reference product
- aluminium, primary, liquid: 1 kg; name aluminiumPrimaryLiquidPrebakeAmount; CPC 41431: Unwrought aluminium; By-product classification allocatable product
  production volume 1.184e9 kg; name aluminiumPrimaryLiquidPrebakeProdVolume
    Value based on 2015 IAI, CRU & CNIA reported data, with a minor modelled component.
  property price 3.67 EUR2005; name aluminiumPrimaryLiquidPrebakeAmount_pric
    Calculated from EU prices by use of exchange rates.
  property carbon content 0
    carbon content on a dry matter basis (reserved; not for manual entry)
  property true value 3.67; name aluminiumPrimaryLiquidPreba_true_value_0
    allocation property applied in "true value" allocation // value calculated from revenue
  properties: water in wet mass 0 kg, water content 0, carbon content, non-fossil 0, wet mass 1 kg, dry mass 1 kg, carbon content, fossil 0, carbon allocation 0 kg

## By-products
- heat, for reuse in municipal waste incineration only: 0 MJ; CPC 17300: Steam and hot water; By-product classification allocatable product; pedigree (1,1,1,1,1)
  Net electricity generated from this waste and used in internal MSWI plant energy redistribution.
  Uncertainty: uncertainty is calculated from uncertainties in waste composition and uncertainties in energy efficiency and the uncertainty in internal energy demand
  production volume 829.761 MJ
  property exergy 0.1842 MJ; name E_th_prod_MSWI_exergy
    This exergy property is based on the exergy content of the product.
  property price 0.0106 EUR2005; name E_th_prod_MSWI_price_EUR2005
    Average European district heat price from Ecoheatcool and Euroheat 2005-2006, Ecoheat Work package 1: The European heat market. Final report. 10.6 EUR/GJ i s the price of district heat. http://www.solarthermalworld.org/files/Ecoheatcool%20WP1%20Web.pdf?download
  property true value relation 0.1842; name E_th_prod_MSWI_true_value_relation
    property to calculate "true value" from
  property true value 4.60988e-9
    allocation property applied in "true value" allocation // value calculated from true value relation
- electricity, for reuse in municipal waste incineration only: 0 kWh; CPC 17100: Electrical energy; By-product classification allocatable product; pedigree (1,1,1,1,1)
  (same comment as for heat, for reuse in municipal waste incineration only)
  production volume 116.861 kWh
  property price 0.1 EUR2005; name E_el_prod_MSWI_price_EUR2005
    Estimated to be the same price as in case of electricity, medium voltage.
  property exergy 3.6 MJ; name E_el_prod_MSWI_exergy
    This exergy property is based on the exergy content of the product.
  property true value relation 3.6; name E_el_prod_MSWI_true_value_relation
    property to calculate "true value" from
  property true value 1.26888e-8
    (same comment as for heat, for reuse in municipal waste incineration only)

## Inputs from technosphere
- waste asphalt: -0.0168 kg; name wasteCarbonAmount; source International Aluminium Insitute 2015; lognormal variance with pedigree 0.002, pedigree (1,1,3,1,1)
  Proxy for treatment of waste carbon. Reported as "SPL carbon for external recycling" and "Waste carbon or mix" in IAI report. Currently, no recycling process exists in ecoinvent for waste carbon, and hence these are modelled as sent to landfill.
  Uncertainty: Uncertainty calculated from underlying parameters.
  production volume 1.98912e7 kg; = aluminiumPrimaryLiquidPrebakeProdVolume*wasteCarbonAmount/aluminiumPrimaryLiquidPrebakeAmount
    Calculated from the production volume of primary aluminium and output of waste per reference flow.
  property recycled spent pot liner carbon 0.0108 kg; name wasteCarbonAmo_recycledSPLCarbonAmount_0
  property price 0 EUR2005; name wasteCarbonAmount_price_EUR2005
  property landfilled waste carbon 0.00462 kg; name wasteCarbo_landfilledWasteCarbonAmount_0
  properties: wet mass 1 kg, carbon content, fossil 0.0440796, dry mass 0.999 kg, water content 0.001001
  note on carbon content, fossil: The waste contains 94.7% inert material (see Tab A.5 for details) 5.3% bitumen (see Tab A.6 for details), ecoinvent v2.2 report 13_I
- inert waste, for final disposal: -0.0061 kg; name refractoryWasteAmount; source International Aluminium Insitute 2015; lognormal variance with pedigree 0.002, pedigree (1,1,3,1,1)
  Amount includes both non-SPL refractory waste sent to landfill and recycled refractory waste. Currently, no recycling process exists in ecoinvent for refractory material, and hence these are modelled as sent to landfill.
  EcoSpold01Location=CH
  Uncertainty: Uncertainty calculated from underlying parameters.
  production volume 7.2224e6 kg; = aluminiumPrimaryLiquidPrebakeProdVolume*refractoryWasteAmount
    (same comment as for waste asphalt)
  property amount of refractory material sent to recycling 0.00276 kg; name refracto_refractoryWasteToRecyclingAmo_0
  property price 0 EUR2005; name refractoryWasteAmount_price_EUR2005
  property amount of refractory material sent to landfill 0.00132 kg; name refracto_refractoryWasteToLandfillAmou_0
  properties: dry mass 0.995 kg, wet mass 1 kg, water content 0.00502513
- aluminium electrolysis facility: 1.5385e-10 unit; source Classen M. 2008; lognormal variance with pedigree 0.5, pedigree (5,5,5,5,5)
  EcoSpold01Location=RER
  Rough guess
  Uncertainty: rough guess
- refractory spent pot liner from Al electrolysis: -0.0145 kg; name SPLAmount; source International Aluminium Insitute 2015; lognormal variance with pedigree 0.0032, pedigree (1,3,3,1,1)
  Amount includes recycled SPL refractory and SPL for landfilling
  EcoSpold01Location=CH
  production volume 1.7168e7 kg; = aluminiumPrimaryLiquidPrebakeProdVolume*SPLAmount/aluminiumPrimaryLiquidPrebakeAmount
    (same comment as for waste asphalt)
  property price 0 EUR2005; name SPLAmount_price_EUR2005
  properties: dry mass 1 kg, wet mass 1 kg
- aluminium oxide, metallurgical: 1.919 kg; source International Aluminium Insitute 2015; lognormal variance with pedigree 0.0032, pedigree (1,3,3,1,1)
  properties: wet mass 1 kg, dry mass 1 kg
- cathode, for aluminium electrolysis: 0.0059 kg; source International Aluminium Insitute 2015; lognormal variance with pedigree 0.0032, pedigree (1,3,3,1,1)
  Reported as Cathode carbon in IAI survey
  properties: carbon content, fossil 0.163928, wet mass 1 kg, dry mass 1 kg
- inert waste: -0.00344 kg; name inertWasteAmount; source International Aluminium Insitute 2015; lognormal variance with pedigree 0.0032, pedigree (1,3,3,1,1)
  Used as a proxy for waste alumina
  production volume 4.07296e6 kg; = aluminiumPrimaryLiquidPrebakeProdVolume*inertWasteAmount/aluminiumPrimaryLiquidPrebakeAmount
    (same comment as for waste asphalt)
  property price 0 EUR2005; name inertWasteAmount_price_EUR2005
  properties: dry mass 1 kg, wet mass 1 kg
- electricity, medium voltage, aluminium industry: 16.384 kWh; source International Aluminium Insitute 2015; lognormal variance with pedigree 0.0026, pedigree (1,1,3,1,1)
  2015 data collected in IAI energy survey. http://www.world-aluminium.org/statistics/
  EcoSpold01Location=GLO
- scrap steel: -0.0062 kg; name wasteSteelAmount; source International Aluminium Insitute 2015; lognormal variance with pedigree 0.0032, pedigree (1,3,3,1,1)
  production volume 7.3408e6 kg; = aluminiumPrimaryLiquidPrebakeProdVolume*wasteSteelAmount/aluminiumPrimaryLiquidPrebakeAmount
    (same comment as for waste asphalt)
  property price 0 EUR2005; name wasteSteelAmount_price_EUR2005
  properties: dry mass 1 kg, wet mass 1 kg
- filter dust from Al electrolysis: -0.0029 kg; name scrubberSludgeAmount; source International Aluminium Insitute 2015; lognormal variance with pedigree 0.0032, pedigree (1,3,3,1,1)
  Used as a weak proxy for treatment of scrubber sludges
  production volume 3.4336e6 kg; = aluminiumPrimaryLiquidPrebakeProdVolume * scrubberSludgeAmount / aluminiumPrimaryLiquidPrebakeAmount
    Calculated from production volume of reference product using the relative outputs.
  property price 0 EUR2005; name scrubberSludgeAmount_price_EUR2005
  properties: wet mass 1 kg, dry mass 1 kg, carbon content, fossil 0.11586
- refractory, fireclay, packed: 0.00805 kg; source International Aluminium Insitute 2015; lognormal variance with pedigree 0.0032, pedigree (1,3,3,1,1)
  Reported as refractory material in IAI survey.
  properties: wet mass 1 kg, dry mass 1 kg
- aluminium fluoride: 0.0165 kg; source International Aluminium Insitute 2015; lognormal variance with pedigree 0.0032, pedigree (1,3,3,1,1)
  EcoSpold01Location=RER
  properties: wet mass 1 kg, dry mass 1 kg
- anode, prebake, for aluminium electrolysis: 0.487 kg; source International Aluminium Insitute 2015; lognormal variance with pedigree 0.0026, pedigree (1,1,3,1,1)
  properties: dry mass 1 kg, wet mass 1 kg, carbon content, fossil 0.875012
- coke: 0.127 MJ; source International Aluminium Institute 2007; lognormal variance with pedigree 0.0414, pedigree (2,2,5,3,1)
  Total carbon value taken from IAI (2007), but split between coke and bitumen based on older European mix in ecoinvent v2 dataset
  Uncertainty: Total carbon value quality high, but split between coke and bitumen based on older European mix in ecoinvent v2 dataset
  properties: carbon content, fossil 0.869149, wet mass 0.034965 kg, dry mass 0.0328671 kg, water content 0.0638298
  note on carbon content, fossil: 81.7% C and 6% water in wet mass (ecoinvent v2.1 report 6_VI Table 7.1)
- pitch: 0.00191 kg; source International Aluminium Institute 2007; lognormal variance with pedigree 0.0414, pedigree (2,2,5,3,1)
  (same comment as for coke)
  properties: dry mass 1 kg, wet mass 1 kg, carbon content, fossil 0.83
- blasting: 0.000402 kg; source Classen M. 2008; lognormal variance with pedigree 0.0414, pedigree (2,2,5,3,1)
  Value taken from cathode production process
- cast iron: 0.000804 kg; source Classen M. 2008; lognormal variance with pedigree 0.0414, pedigree (2,2,5,3,1)
  Value taken from cathode production process
  properties: carbon content, fossil 0.04, wet mass 1 kg, dry mass 1 kg
  note on carbon content, fossil: Cast iron is made by remelting pig iron in small furnaces (e.g. cupola furnaces or electric arc furnaces) and poured into moulds to make castings. It usually contains 2% to 6% carbon (ecoinvent v2.2 report 10_partII). An average content of 4% was considered
- cryolite: 0.0016 kg; source International Aluminium Institute 2007; lognormal variance with pedigree 0.0033, pedigree (2,2,3,1,1)
  EcoSpold01Location=RER
  properties: wet mass 1 kg, dry mass 1 kg
- reinforcing steel: 0.00543 kg; source International Aluminium Insitute 2015; lognormal variance with pedigree 0.0032, pedigree (1,3,3,1,1)
  properties: wet mass 1 kg, carbon content, fossil 0.004, dry mass 1 kg

## Inputs from nature
- Water, salt, ocean [natural resource, in water]: 0.0416 m3; source International Aluminium Insitute 2015; lognormal variance with pedigree 0.0032, pedigree (1,3,3,1,1)
- Water, unspecified natural origin [natural resource, in water]: 0.00445 m3; source International Aluminium Insitute 2015; lognormal variance with pedigree 0.0032, pedigree (1,3,3,1,1)

## Emissions to nature
- Fluoride [water, unspecified]: 7.68e-5 kg; source International Aluminium Insitute 2015; lognormal variance with pedigree 0.0426, pedigree (1,3,3,1,1)
- Ethane, hexafluoro-, HFC-116 [air, unspecified]: 6.8e-6 kg; source International Aluminium Insitute 2015; lognormal variance with pedigree 0.0421, pedigree (1,2,3,1,1)
  Data collected in IAI Anode effect survey. http://www.world-aluminium.org/statistics/ Survey response rate 43% remaining 57% is modelled based on sampled data from similar technologies.
- Suspended solids, unspecified [water, unspecified]: 0.000177 kg; source International Aluminium Insitute 2015; lognormal variance with pedigree 0.0426, pedigree (1,3,3,1,1)
- Methane, tetrafluoro-, R-14 [air, unspecified]: 0.00012 kg; source International Aluminium Insitute 2015; lognormal variance with pedigree 0.0421, pedigree (1,2,3,1,1)
  (same comment as for Ethane, hexafluoro-, HFC-116)
- Particulates, < 2.5 um [air, unspecified]: 0.000946 kg; source International Aluminium Insitute 2015; lognormal variance with pedigree 0.0038, pedigree (2,3,3,1,1)
- Hydrogen fluoride [air, unspecified]: 0.0005 kg; source International Aluminium Insitute 2015; lognormal variance with pedigree 0.0426, pedigree (1,3,3,1,1)
  Reported as F in IAI 2015 survey, converted.
- Benzo(a)pyrene [air, unspecified]: 7.56e-8 kg; name BaPAmount; source International Aluminium Insitute 2015; lognormal variance with pedigree 0.3026, pedigree (1,3,3,1,1)
- Water [air, unspecified]: 0.00086 m3; source International Aluminium Insitute 2015; lognormal variance with pedigree 0.2106, pedigree (5,5,5,5,5)
  IAI data reported as "Fresh Water Consumption"
- Carbon dioxide, fossil [air, unspecified]: 1.4965 kg; source Classen M. 2008; lognormal variance with pedigree 0.042, pedigree (1,1,5,5,1)
- Water [water, surface water]: 0.00776 m3; source International Aluminium Insitute 2015; lognormal variance with pedigree 0.0032, pedigree (1,3,3,1,1)
  property carbon content, fossil 0; name C_content_fossil
  property carbon content, non-fossil 0; name C_content_non_fossil
  property dry mass 0 kg; name DM
  property water in wet mass 1000 kg; name WWM
  property wet mass 1000 kg; name WM
- Sulfur dioxide [air, unspecified]: 0.0132 kg; source International Aluminium Insitute 2015; lognormal variance with pedigree 0.0032, pedigree (1,3,3,1,1)
- PAH, polycyclic aromatic hydrocarbons [air, unspecified]: 4.2e-6 kg; source International Aluminium Insitute 2015; lognormal variance with pedigree 0.3026, pedigree (1,3,3,1,1)
  property total PAH emission to air 8.8e-6 kg; name totalPAH
- Oils, unspecified [water, unspecified]: 2.456e-6 kg; source International Aluminium Insitute 2015; lognormal variance with pedigree 0.0426, pedigree (1,3,3,1,1)
- Particulates, > 10 um [air, unspecified]: 0.00026 kg; = PM_total_2 *PM_greater_10um; source International Aluminium Insitute 2015; lognormal variance with pedigree 0.2106, pedigree (5,5,5,5,5)
  Total amount from IAI survey, distributed among three class sizes using CEPMEIP database emission factors for Production of primary aluminium. Abatement level: medium.
  property total particulates 0.0013 kg; name PM_total_2
  property ratio pf particulates greater than 10 microns 0.2; name PM_greater_10um; = (4-3.2)/4
- PAH, polycyclic aromatic hydrocarbons [water, unspecified]: 2.43e-8 kg; source International Aluminium Insitute 2015; lognormal variance with pedigree 0.0426, pedigree (1,3,3,1,1)
  Reported as PAH (6 Borneff components)
- Water [water, ocean]: 0.04159 m3; source International Aluminium Insitute 2015; lognormal variance with pedigree 0.0032, pedigree (1,3,3,1,1)
- Nitrogen oxides [air, unspecified]: 0.000531 kg; source International Aluminium Insitute 2015; lognormal variance with pedigree 0.0326, pedigree (1,3,3,1,1)
- Carbon monoxide, fossil [air, unspecified]: 0.091708 kg; source Classen M. 2008; lognormal variance with pedigree 0.692, pedigree (1,1,5,5,1)
- Particulates, > 2.5 um, and < 10um [air, unspecified]: 0.000531 kg; source International Aluminium Insitute 2015; lognormal variance with pedigree 0.0032, pedigree (1,3,3,1,1)

## Sampling procedure
Most flows are based on IAI 2015 survey data.
A number of flows not covered by the surveys were inherited from the ecoinvent 2.2 dataset.
Total percent representativeness is based on 2015 LCI data, using 2015 production volumes. Weighted averages from global reported facilities are adopted as no LCI data was reported from this region. Energy data collected from IAI 2015 Energy Survey covers nearly 100% production in this region.

## Extrapolations
Survey global in scope.
