# methane production, 96% by volume, from synthetic gas, wood, fixed bed technology

Dataset: EcoSpold 2, unit process
Geography: RoW
Time period: 2008-01-01 to 2019-12-31
Technology level: current
Classification: EcoSpold01Categories: biomass/fuels
Classification: ISIC rev.4 ecoinvent: 3520:Manufacture of gas; distribution of gaseous fuels through mains
Scenario: Business-as-Usual
System model: Allocation at the point of substitution
Share of production covered: 0 %
Generated by: Andrea Del Duce
Published in: Andrea Del Duce 2015
Database: ecoinvent
isCopyrightProtected: true
accessRestrictedTo: 1

## General comment
This datasets describes the production of methane from wood. The feedstock is first gasified and then methanised. This dataset describes methane production through a fixed bed technology. Gas composition (% mol.) of the gas is 96% CH4 (min.). Density is 0.752 kg/Nm3. Lower heating value of the gas is 34.4 MJ/Nm3. Process heat is supplied by methane combustion. Inventory refers to the net production of 1 Nm3 syngas. Net methane yield is 0.261 Nm3/kg of wood (dry matter) with a conversion efficiency (lower heating value of the methane/lower heating value of the required wood) of around 50%.
This dataset was not available in ecoinvent v2.2. It was created by taking the information in the ecoinvent report nr. 17 and developing a virtual process based on the information given there. It does not describe an existing plant.
[This dataset is meant to replace the following datasets:]

## Included activities start
The activity begins with the transport of the wood and other required auxiliaries to the production site.

## Included activities end
This process refers to the conversion of wood chips into synthetic methane (96% vol.) through gasification and subsequent methanation. It includes drying (down to 10-15% moisture) and further comminution of wood chips (down to a size of 30x30x30 mm), fixed bed gasification of the wood chips, treatment and conditioning of the resulting syngas to remove impurities and contaminants, methanation of the the syngas to methane, and compression of methane to natural gas network pressure (30-70 bar).

## Geography
Data was taken from the ecoinvent v2.2 report nr. 17 which was mostly based on data from Paul Scherrer Institut (PSI, Switzerland) .

## Technology
Gasification technology is fixed bed gasification.

## Time period
Data mainly from 2004, adapted from a fluidised technology pilot scale plant, future technology

## Parameters
- fraction, tap water, to air: 0.15; name fraction_TW_to_air; lognormal variance with pedigree 0.092025, pedigree (4,4,3,2,4)
- fraction, process water, to air: 0.15 dimensionless; name fraction_PW_to_air; lognormal variance with pedigree 0.092025, pedigree (4,4,3,2,4)

## Reference product
- methane, 96% by volume: 1 m3; CPC 17200: Coal gas, water gas, producer gas and similar gases, other than petroleum gases and other gaseous hydrocarbons; By-product classification allocatable product
  EcoSpold01Location=CH
  production volume 353270 m3; name rp_pv
    Very rough estimation based on world production of wood gas as specified in the ecoinvent dataset "synthetic gas production, from wood, at fixed bed gasiefier", considering that approximately 4m3 of syngas are necessary to make 1m3 of maethane. Based on the comment in the dataset "synthetic gas production, from wood, at fixed bed gasiefier", the production is 2E6m3 according to data on www.woodgas.net.
  property carbon content, non-fossil 0.695496
    Carbon content calculated from composition of the gas, 96% (in vol) methane, 2% (in vol) CO2 (Tab 13.3, ecoinvent v2.2 report 17). The composition in %vol was converted in % weight using density data of the different gases from tab 19.1, ecoinvent v2.2 report 17, part 19.
  property price 0.144 EUR2005
    Temporary price data. Calculated as 90% of purchasers price based on: Same prices per energy output as natural gas, based on the proportional heating value (55.5 MJ/kg for methane; 54.8 MJ/kg for natural gas)
  property carbon content 0.695496
    carbon content on a dry matter basis (reserved; not for manual entry)
  property true value 0.144
    allocation property applied in "true value" allocation // value calculated from revenue
  properties: water in wet mass 0 kg, dry mass 0.752 kg, wet mass 0.752 kg, carbon content, fossil 0, water content 0, carbon allocation 0.523013 kg

## By-products
- heat, for reuse in municipal waste incineration only: 0 MJ; CPC 17300: Steam and hot water; By-product classification allocatable product; pedigree (1,1,1,1,1)
  Net electricity generated from this waste and used in internal MSWI plant energy redistribution.
  Uncertainty: uncertainty is calculated from uncertainties in waste composition and uncertainties in energy efficiency and the uncertainty in internal energy demand
  production volume 25.0588 MJ
  property exergy 0.1842 MJ; name E_th_prod_MSWI_exergy
    This exergy property is based on the exergy content of the product.
  property price 0.0106 EUR2005; name E_th_prod_MSWI_price_EUR2005
    Average European district heat price from Ecoheatcool and Euroheat 2005-2006, Ecoheat Work package 1: The European heat market. Final report. 10.6 EUR/GJ i s the price of district heat. http://www.solarthermalworld.org/files/Ecoheatcool%20WP1%20Web.pdf?download
  property true value relation 0.1842; name E_th_prod_MSWI_true_value_relation
    property to calculate "true value" from
  property true value 4.64566e-7
    allocation property applied in "true value" allocation // value calculated from true value relation
- electricity, for reuse in municipal waste incineration only: 0 kWh; CPC 17100: Electrical energy; By-product classification allocatable product; pedigree (1,1,1,1,1)
  (same comment as for heat, for reuse in municipal waste incineration only)
  production volume 3.48163 kWh
  property price 0.1 EUR2005; name E_el_prod_MSWI_price_EUR2005
    Estimated to be the same price as in case of electricity, medium voltage.
  property exergy 3.6 MJ; name E_el_prod_MSWI_exergy
    This exergy property is based on the exergy content of the product.
  property true value relation 3.6; name E_el_prod_MSWI_true_value_relation
    property to calculate "true value" from
  property true value 1.26137e-6
    (same comment as for heat, for reuse in municipal waste incineration only)

## Inputs from technosphere
All rows: source Jungbluth N. 2007
- wood chips, dry, measured as dry mass: 0.84119 kg; lognormal variance with pedigree 0.0782, pedigree (4,5,2,5,4)
  Yield based on PSI data (Ecogas project) plus calculations, distribution of wood qualities from IEA Task 33 CH report. The data was taken from the fluidised technology described in the ecoinvent v2.2 report nr. 17 and adapted to fixed bed technology based on the specific process steps described in the report.
  EcoSpold01Location=RER
  Uncertainty: Yield based on PSI data (Ecogas project) plus calculations, distribution of wood qualities from IEA Task 33 CH report
  properties: wet mass 1.4 kg, dry mass 1 kg, water content 0.4, carbon content, non-fossil 0.494
  note on carbon content, non-fossil: C content of dry mass is 0.494 kgC/kg dry wood (ecoinvent v2.2 report 9).
- heat, central or small-scale, other than natural gas: 0 MJ; pedigree (1,1,1,1,1)
  Based on PSI data (Ecogas project) plus calculations, the data was taken from the fluidised technology described in the ecoinvent v2.2 report nr. 17 and adapted to fixed bed technology based on the specific process steps described in the report.
- nickel, 99.5%: 4.29415e-10 kg; lognormal variance with pedigree 0.0682, pedigree (4,5,2,5,4)
  Based on PSI data (Ecogas project) plus calculations, the data was taken from the fluidised technology described in the ecoinvent v2.2 report nr. 17 and adapted to fixed bed technology based on the specific process steps described in the report.
  EcoSpold01Location=GLO
  Uncertainty: Based on PSI data (Ecogas project) plus calculations
  properties: dry mass 1 kg, wet mass 1 kg
- zinc: 0.00186938 kg; lognormal variance with pedigree 0.0682, pedigree (4,5,2,5,4)
  EcoSpold01Location=RER
  Based on PSI data (Ecogas project) plus calculations, the data was taken from the fluidised technology described in the ecoinvent v2.2 report nr. 17 and adapted to fixed bed technology based on the specific process steps described in the report.
  Uncertainty: Based on PSI data (Ecogas project) plus calculations
  properties: wet mass 1 kg, dry mass 1 kg
- waste mineral oil: 0 kg; name wasteoil_out; pedigree (1,1,1,1,1)
  Based on PSI data (Ecogas project) plus calculations, the data was taken from the fluidised technology described in the ecoinvent v2.2 report nr. 17 and adapted to fixed bed technology based on the specific process steps described in the report.
  EcoSpold01Location=CH
  Uncertainty: Based on PSI data (Ecogas project) plus calculations
  production volume 0 kg
    Based on data from ecoinvent report nr. 17 "Bioenergy".The formula multiplies the exchange output with the production volume of the reference product.
  property price 0 EUR2005; name wasteoil_out_price_EUR2005
  properties: carbon content, fossil 0.864444, dry mass 0.9 kg, wet mass 1 kg, water content 0.111111
  note on carbon content, fossil: Tab A.6, ecoinvent v2.2 report 13_I. C content has been calculated after data in the tables, and then referred to 1 kg DM
- sulfuric acid: 0.0129998 kg; lognormal variance with pedigree 0.0782, pedigree (4,5,2,5,4)
  Calculation, based on 'heat, natural gas, at boiler modulating' (according to heat supply from methane).The data was taken from the fluidised technology described in the ecoinvent v2.2 report nr. 17 and adapted to fixed bed technology based on the specific process steps described in the report.
  EcoSpold01Location=RER
  Uncertainty: Calculation from a typical quality of untreated syngas from wood
  properties: dry mass 1 kg, wet mass 1 kg
- wastewater, from residence: -0.00107689 m3; name wastewater_out; lognormal variance with pedigree 0.0682, pedigree (4,5,2,5,4)
  (same comment as for waste mineral oil)
  production volume 380.436 m3; = wastewater_out*rp_pv
    Based on data from ecoinvent report nr. 17 "Bioenergy". The formula multiplies the exchange output with the production volume of the reference product.
  property price 0 EUR2005; name wastewater_out_price_EUR2005
  properties: dry mass 0.337476 kg, water content 2962.17, wet mass 1000 kg, carbon content, non-fossil 0.199421
  note on carbon content, non-fossil: 0.0673 kg TOC/m3 (Tab A.17, ecoinvent v2.2 report 13_I). TOC was considered as Total Carbon.
- inert waste: 0 kg; name inertwaste_out; pedigree (1,1,1,1,1)
  EcoSpold01Location=CH
  Based on PSI data (Ecogas project) plus calculations, the data was taken from the fluidised technology described in the ecoinvent v2.2 report nr. 17 and adapted to fixed bed technology based on the specific process steps described in the report.
  Uncertainty: Based on PSI data (Ecogas project) plus calculations
  production volume 0 kg
    (same comment as for waste mineral oil)
  property price 0 EUR2005; name inertwaste_out_price_EUR2005
  properties: wet mass 1 kg, dry mass 1 kg
- vegetable oil methyl ester: 0.0146218 kg; lognormal variance with pedigree 0.0682, pedigree (4,5,2,5,4)
  Based on PSI data (Ecogas project) plus calculations, the data was taken from the fluidised technology described in the ecoinvent v2.2 report nr. 17 and adapted to fixed bed technology based on the specific process steps described in the report.
  Uncertainty: Based on PSI data (Ecogas project) plus calculations
  properties: wet mass 1 kg, carbon content, non-fossil 0.732, dry mass 1 kg, carbon content, fossil 0.041
- charcoal: 0.0198048 kg; lognormal variance with pedigree 0.0682, pedigree (4,5,2,5,4)
  (same comment as for nickel, 99.5%)
  properties: wet mass 1 kg, carbon content, non-fossil 0.8, dry mass 1 kg
- electricity, low voltage: 0 kWh; pedigree (1,1,1,1,1)
  EcoSpold01Location=UCTE
  Calculation, based on 'heat, natural gas, at boiler modulating' (according to heat supply from methane).The data was taken from the fluidised technology described in the ecoinvent v2.2 report nr. 17 and adapted to fixed bed technology based on the specific process steps described in the report.
  Uncertainty: Calculation, based on 'heat, natural gas, at boiler modulating' (according to heat supply from methane)
- tap water: 0 kg; name tap_water_input; pedigree (1,1,1,1,1)
  (same comment as for waste mineral oil)
  properties: wet mass 1 kg, water content 2962.17, carbon content, fossil 0.00178991, dry mass 0.000337476 kg
  note on carbon content, fossil: Bicarbonate content is 2.93 mol/m3. CO2 content is 0.1 mol/m3 (ecoinvent v2.2 report 8, Tab 93.1).
- wood chips, wet, measured as dry mass: 0 kg; pedigree (1,1,1,1,1)
  (same comment as for wood chips, dry, measured as dry mass)
  properties: dry mass 1 kg, wet mass 2.4 kg, carbon content, non-fossil 0.494, water content 1.4
- sodium hydroxide, without water, in 50% solution state: 0.00327996 kg; lognormal variance with pedigree 0.0782, pedigree (4,5,2,5,4)
  (same comment as for sulfuric acid)
  properties: wet mass 1 kg, dry mass 1 kg
- industrial furnace, natural gas: 2.14567e-8 unit; lognormal variance with pedigree 0.3782, pedigree (4,5,2,5,4)
  Calculation, based on 'heat, natural gas, at boiler modulating' (according to heat supply from methane).The data was taken from the fluidised technology described in the ecoinvent v2.2 report nr. 17 and adapted to fixed bed technology based on the specific process steps described in the report.
  EcoSpold01Location=RER
  Uncertainty: Calculation, based on 'heat, natural gas, at boiler modulating' (according to heat supply from methane)
- synthetic gas factory: 2.90217e-9 unit; lognormal variance with pedigree 0.3682, pedigree (4,5,2,5,4)
  EcoSpold01Location=CH
  Based on PSI data (Ecogas project) plus calculations
  Uncertainty: Calculation
- electricity, medium voltage: 0 kWh; pedigree (1,1,1,1,1)
  Based on PSI data (Ecogas project) plus calculations, the data was taken from the fluidised technology described in the ecoinvent v2.2 report nr. 17 and adapted to fixed bed technology based on the specific process steps described in the report. The mathematical relation descibes the sum of the electricity requirements from the various processing steps as derived from the values in the ecoinvent v2.2 report nr. 17.
  EcoSpold01Location=CH
  Uncertainty: Based on PSI data (Ecogas project) plus calculations
- aluminium oxide, non-metallurgical: 4.29415e-10 kg; lognormal variance with pedigree 0.0682, pedigree (4,5,2,5,4)
  Based on PSI data (Ecogas project) plus calculations, the data was taken from the fluidised technology described in the ecoinvent v2.2 report nr. 17 and adapted to fixed bed technology based on the specific process steps described in the report.
  EcoSpold01Location=RER
  Uncertainty: Based on PSI data (Ecogas project) plus calculations
  properties: wet mass 1 kg, dry mass 1 kg
- wood ash mixture, pure: 0 kg; name woodash_out; pedigree (1,1,1,1,1)
  (same comment as for inert waste)
  production volume 0 kg
    (same comment as for waste mineral oil)
  property price 0 EUR2005; name woodash_out_price_EUR2005
  properties: carbon content, non-fossil 0.012, dry mass 1 kg, wet mass 1 kg
- heat, central or small-scale, other than natural gas: 8.63868e-6, 0.000604354 MJ (2 entries); lognormal variance with pedigree 0.0682, pedigree (4,5,2,5,4)
  (same comment as for heat, central or small-scale, other than natural gas)
- waste mineral oil: -0.00367821, -0.0109436 kg (2 entries); lognormal variance with pedigree 0.0682, pedigree (4,5,2,5,4)
  (same comment as for waste mineral oil)
  production volume 5165.51 kg
- inert waste: -0.0196246, -0.0691743 kg (2 entries); lognormal variance with pedigree 0.0682, pedigree (4,5,2,5,4)
  (same comment as for inert waste)
  production volume 31370.4 kg
- electricity, low voltage: 9.01874e-5, 1.58177e-5, 0.000358747, 0.0012862, 0.000260107, 0.00393357, 0.000648379, 0.00184689 kWh (8 entries); lognormal variance with pedigree 0.0782, pedigree (4,5,2,5,4)
  (same comment as for electricity, low voltage)
- tap water: 0.000648993, 0.00539151, 0.00107257, 0.230629, 0.0270459, 0.000703593, 0.00200136, 0.3095 kg (8 entries); lognormal variance with pedigree 0.0682, pedigree (4,5,2,5,4)
  (same comment as for waste mineral oil)
- wood chips, wet, measured as dry mass: 0.00663157, 0.0278214, 2.95291 kg (3 entries); lognormal variance with pedigree 0.0782, pedigree (4,5,2,5,4)
  (same comment as for wood chips, dry, measured as dry mass)
- electricity, medium voltage: 0.00880952, 0.00160296, 0.037001, 0.125931, 0.0271838, 0.394137, 0.0564084, 0.184817 kWh (8 entries); lognormal variance with pedigree 0.0682, pedigree (4,5,2,5,4)
  (same comment as for electricity, medium voltage)
- wood ash mixture, pure: -0.0117337, -0.0244659 kg (2 entries); lognormal variance with pedigree 0.0682, pedigree (4,5,2,5,4)
  (same comment as for inert waste)
  production volume 12788.4 kg

## Emissions to nature
All rows: source Jungbluth N. 2007
- Carbon monoxide, non-fossil [air, urban air close to ground]: 0.00356996 kg; lognormal variance with pedigree 0.7182, pedigree (4,5,2,5,4)
  Calculation, based on 'heat, natural gas, at boiler modulating' (according to heat supply from methane).The data was taken from the fluidised technology described in the ecoinvent v2.2 report nr. 17 and adapted to fixed bed technology based on the specific process steps described in the report.
  Uncertainty: Calculation, based on 'heat, natural gas, at boiler modulating' (according to heat supply from methane), and PSI data
- Formaldehyde [air, urban air close to ground]: 7.65991e-7 kg; lognormal variance with pedigree 0.1182, pedigree (4,5,2,5,4)
  Calculation, based on 'heat, natural gas, at boiler modulating' (according to heat supply from methane).The data was taken from the fluidised technology described in the ecoinvent v2.2 report nr. 17 and adapted to fixed bed technology based on the specific process steps described in the report.
  Uncertainty: Calculation, based on 'heat, natural gas, at boiler modulating' (according to heat supply from methane)
- Dinitrogen monoxide [air, urban air close to ground]: 3.83195e-6 kg; lognormal variance with pedigree 0.1182, pedigree (4,5,2,5,4)
  (same comment as for Formaldehyde)
- Mercury [air, urban air close to ground]: 2.29897e-10 kg; lognormal variance with pedigree 0.7182, pedigree (4,5,2,5,4)
  Based on PSI data (Ecogas project) plus calculations, the data was taken from the fluidised technology described in the ecoinvent v2.2 report nr. 17 and adapted to fixed bed technology based on the specific process steps described in the report.
  Uncertainty: Calculation, based on 'heat, natural gas, at boiler modulating' (according to heat supply from methane)
- Toluene [air, urban air close to ground]: 1.53298e-6 kg; lognormal variance with pedigree 0.1182, pedigree (4,5,2,5,4)
  (same comment as for Formaldehyde)
- Methane, non-fossil [air, urban air close to ground]: 1.52998e-5 kg; lognormal variance with pedigree 0.1182, pedigree (4,5,2,5,4)
  (same comment as for Mercury)
- Propane [air, urban air close to ground]: 1.53298e-6 kg; lognormal variance with pedigree 0.1182, pedigree (4,5,2,5,4)
  (same comment as for Formaldehyde)
- Particulates, < 2.5 um [air, urban air close to ground]: 5.67993e-5 kg; lognormal variance with pedigree 0.3782, pedigree (4,5,2,5,4)
  (same comment as for Carbon monoxide, non-fossil)
- Hydrocarbons, aliphatic, unsaturated [air, urban air close to ground]: 0.000260997 kg; lognormal variance with pedigree 0.1082, pedigree (4,5,2,5,4)
  Based on PSI data (Ecogas project) plus calculations, the data was taken from the fluidised technology described in the ecoinvent v2.2 report nr. 17 and adapted to fixed bed technology based on the specific process steps described in the report.
  Uncertainty: Based on PSI data from the Ecogas project
- Hydrocarbons, aliphatic, alkanes, unspecified [air, urban air close to ground]: 7.65991e-5 kg; lognormal variance with pedigree 0.1082, pedigree (4,5,2,5,4)
  Based on PSI data from the Ecogas project
  Uncertainty: Based on PSI data from the Ecogas project
- Water [air, unspecified]: 0.00509494 m3; name water_to_air_unspecified; lognormal variance with pedigree 0.0982, pedigree (4,5,2,5,4)
  Calculation, based on 'heat, natural gas, at boiler modulating' (according to heat supply from methane).The data was taken from the fluidised technology described in the ecoinvent v2.2 report nr. 17 and adapted to fixed bed technology based on the specific process steps described in the report.The dataset is not wtaer balanced. Specific information on the water balance was not found.
  property fraction, origin: unspecified 0; name fraction_origin_unspecified
  property fraction, origin: fresh water 1; name fraction_origin_fresh_water
  property fraction, origin: salt water 0; name fraction_origin_salt_water
- Butane [air, urban air close to ground]: 5.35994e-6 kg; lognormal variance with pedigree 0.1182, pedigree (4,5,2,5,4)
  (same comment as for Formaldehyde)
- PAH, polycyclic aromatic hydrocarbons [air, urban air close to ground]: 1.00299e-6 kg; lognormal variance with pedigree 0.3782, pedigree (4,5,2,5,4)
  (same comment as for Carbon monoxide, non-fossil)
- Carbon dioxide, non-fossil [air, urban air close to ground]: 5.09194 kg; lognormal variance with pedigree 0.056825, pedigree (4,5,2,2,4)
  Calculation, based on 'heat, natural gas, at boiler modulating' (according to heat supply from methane).The data was taken from the fluidised technology described in the ecoinvent v2.2 report nr. 17 and adapted to fixed bed technology based on the specific process steps described in the report.
  Uncertainty: Calculation, to close carbon balance
- Acetaldehyde [air, urban air close to ground]: 7.65991e-9 kg; lognormal variance with pedigree 0.1182, pedigree (4,5,2,5,4)
  (same comment as for Formaldehyde)
- Propionic acid [air, urban air close to ground]: 1.53298e-7 kg; lognormal variance with pedigree 0.1182, pedigree (4,5,2,5,4)
  (same comment as for Formaldehyde)
- Dioxins, measured as 2,3,7,8-tetrachlorodibenzo-p-dioxin [air, urban air close to ground]: 0 kg; pedigree (1,1,1,1,1)
  (same comment as for Formaldehyde)
- Benzene [air, urban air close to ground]: 3.06996e-6 kg; lognormal variance with pedigree 0.1182, pedigree (4,5,2,5,4)
  (same comment as for Formaldehyde)
- NMVOC, non-methane volatile organic compounds, unspecified origin [air, urban air close to ground]: 5.13494e-5 kg; lognormal variance with pedigree 0.1082, pedigree (4,5,2,5,4)
  (same comment as for Hydrocarbons, aliphatic, unsaturated)
- Pentane [air, urban air close to ground]: 9.19589e-6 kg; lognormal variance with pedigree 0.1182, pedigree (4,5,2,5,4)
  (same comment as for Formaldehyde)
- Acetic acid [air, urban air close to ground]: 1.14999e-6 kg; lognormal variance with pedigree 0.1182, pedigree (4,5,2,5,4)
  (same comment as for Formaldehyde)
- Nitrogen oxides [air, urban air close to ground]: 0.00216997 kg; lognormal variance with pedigree 0.1182, pedigree (4,5,2,5,4)
  Based on PSI data (Ecogas project) plus calculations, the data was taken from the fluidised technology described in the ecoinvent v2.2 report nr. 17 and adapted to fixed bed technology based on the specific process steps described in the report.
  Uncertainty: Calculation, based on 'heat, natural gas, at boiler modulating' (according to heat supply from methane), and PSI data
- Benzo(a)pyrene [air, urban air close to ground]: 7.65991e-11 kg; lognormal variance with pedigree 0.3782, pedigree (4,5,2,5,4)
  (same comment as for Formaldehyde)
- Sulfur dioxide [air, urban air close to ground]: 4.21495e-6 kg; lognormal variance with pedigree 0.0782, pedigree (4,5,2,5,4)
  (same comment as for Formaldehyde)

## Sampling procedure
Literaure: data from one source, pilot-to-demonstration plant operation data. The plant was however based on fluidised technology and was adapted to a fixed bed concept.

## Extrapolations
Combustion of methane (for internal process energy use) is extrapolated from the emission profile of natural gas combustion. This dataset has been copied from an original dataset covering the geography CH. The uncertainty has been adjusted accordingly.
