# treatment of fly ash and scrubber sludge, hazardous waste incineration

Dataset: EcoSpold 2, unit process
Geography: CH
Time period: 1997-01-01 to 2019-12-31
Technology level: current
Classification: EcoSpold01Categories: waste management/hazardous waste incineration
Classification: ISIC rev.4 ecoinvent: 3822:Treatment and disposal of hazardous waste
Tags: Treatment; ConvertedDataset
Scenario: Business-as-Usual
System model: Allocation at the point of substitution
Share of production covered: 39 %
Generated by: Gabor Doka (obsolete)
Published in: Doka G. 2008
Database: ecoinvent
isCopyrightProtected: true
accessRestrictedTo: 1

## General comment
Inventoried waste contains 100% separator sludge; .
waste composition (wet, in ppm): upper heating value 0.9 MJ/kg; H2O 900000; O 197; H 2659.5; C 16745; S 98.5; N 2.7196; P 149; B 2.1; Cl 400; Br n.a.; F 0.0077703; I n.a.; Ag n.a.; As 0.5; Ba 27; Cd 0.66; Co 10.4; Cr 71.3; Cu 548.1; Hg 0.22; Mn 40.5; Mo 0.5; Ni 37.6; Pb 27.6; Sb 0.49; Se n.a.; Sn 1.7; V 0.85; Zn 270.6; Be n.a.; Sc n.a.; Sr 30; Ti n.a.; Tl n.a.; W n.a.; Si n.a.; Fe 3400; Ca 18200; Al 133.5; K 148; Mg 1670; Na 71;
Share of carbon in waste that is biogenic 0%.
Net energy produced in HWI: 17.11MJ/kg electric energy and 1.27MJ/kg thermal energy
Allocation of energy production: no substitution or expansion. 100% of burden allocated to waste disposal function of HWI.
One kg of this waste produces 0.03149 kg of residues, which are landfilled. Additional solidification with 0.01259 kg of cement.
[This dataset was already contained in the ecoinvent database version 2. It was not individually updated during the transfer to ecoinvent version 3. Life Cycle Impact Assessment results may still have changed, as they are affected by changes in the supply chain, i.e. in other datasets. This dataset was generated following the ecoinvent quality guidelines for version 2. It may have been subject to central changes described in the ecoinvent version 3 change report (http://www.ecoinvent.org/database/ecoinvent-version-3/reports-of-changes/), and the results of the central updates were reviewed extensively. The changes added e.g. consistent water flows and other information throughout the database. The documentation of this dataset can be found in the ecoinvent reports of version 2, which are still available via the ecoinvent website. The change report linked above covers all central changes that were made during the conversion process.]

## Included activities end
waste-specific air and water emissions from incineration, auxiliary material consumption for flue gas cleaning. Short-term emissions to river water and long-term emissions to ground water from residual material landfill (from solidified fly ashes and scrubber slugde). Process energy demands for HWI.

## Geography
Specific to the technology encountered in Switzerland in 2000. Well applicable to modern incineration practices in Europe or North America or Japan.

## Technology
Swiss HWI plant in 2000 with wet flue gas scrubber and low-dust SCR DeNOx facility. Gross thermal efficiency 74.4% and gross electric efficiency 10%.

## Time period
Transfer coefficients for modern Swiss MSWI. Emission speciation based on early 90ies data.

## Parameters
- fraction, process water, to air: 1 dimensionless; name fraction_PW_to_air; lognormal variance with pedigree 0.092025, pedigree (4,4,3,2,4)
  Calculated value. During incineration all water incorporated in the products entering the incinerator evaporate to air.

## Reference product
- fly ash and scrubber sludge: -1 kg; CPC 39: Wastes or scraps; By-product classification Waste
  production volume 0.0336675 kg
    This is a placeholder value that does not reflect real-world production volumes. This dataset does not currently require a real-world production volume to work in the database framework, and no actual data were collected yet. This has no negative effect on the results of the ecoinvent database. The placeholder value of this activity was scaled according to the nominal GDP of 2005 (source: United Nations, http://data.un.org/Glossary.aspx?q=GDP+%28current+US%24%29, accessed 20130726) to reflect an appropriate share of the global production volume, which is also a placeholder value.
  property carbon content, fossil 0.167
    Tab A.6, ecoinvent v2.2 report 13_I. C content has been calculated after data in the tables, and then referred to 1 kg DM
  property price 0 EUR2005
    Waste products are assigned a price of zero as they are assumed to require further treatment.
  property carbon content 0.167
    carbon content on a dry matter basis (reserved; not for manual entry)
  properties: water in wet mass 0.9 kg, dry mass 0.1 kg, water content 9, wet mass 1 kg, carbon content, non-fossil 0, carbon allocation 0.0167 kg

## Inputs from technosphere
- heat, district or industrial, natural gas: 4.84146e-5 MJ; lognormal variance with pedigree 2.06, pedigree (1,1,5,1,1)
  uncertainty calculated from uncertainty in average DeNOx input, uncertainty in the share of thermal NOx, uncertainty of nitrogen content in average municipal waste and the unertainty in nitrogen content in *this* waste.
- chemical, inorganic: 8.0963e-5 kg; lognormal variance with pedigree 0.25, pedigree (1,1,5,1,1)
  Proxy for Polyelectrolyte. uncertainty calculated from uncertainty in average auxiliary material input, and the unertainty of the waste composition of this waste
  properties: dry mass 1 kg, wet mass 1 kg, carbon content, fossil 0.003
  note on carbon content, fossil: This dataset is an unweighted average of 20 inorganic substances (listed in Tab 88.1, ecoinvent v2.2 report 8, part II), being part of the top100 chemicals included in this database. The C-content has also been calculated as an unweighted average of the C content of the substances composing this dataset.
- hydrochloric acid, without water, in 30% solution state: 4.8578e-5 kg; lognormal variance with pedigree 0.25, pedigree (1,1,5,1,1)
  uncertainty calculated from uncertainty in average auxiliary material input, and the unertainty of the waste composition of this waste
  properties: dry mass 1 kg, wet mass 1 kg
- iron (III) chloride, without water, in 40% solution state: 0.00061877 kg; lognormal variance with pedigree 0.38, pedigree (1,1,5,1,1)
  (same comment as for hydrochloric acid, without water, in 30% solution state)
  properties: dry mass 1 kg, wet mass 1 kg
- heat, central or small-scale, other than natural gas: 21.62 MJ; lognormal variance with pedigree 0.09, pedigree (1,1,5,1,1)
  Uncertainty dependent on total energy required and heating value present, using experimental GSd for substraction from uc=A*GSDa^2-B
- ammonia, liquid: 9.9182e-8 kg; lognormal variance with pedigree 1.97, pedigree (1,1,5,1,1)
  (same comment as for heat, district or industrial, natural gas)
  properties: wet mass 1 kg, dry mass 1 kg
- chemical, organic: 4.9628e-6 kg; lognormal variance with pedigree 1.46, pedigree (1,1,5,1,1)
  Proxy for TMT15. uncertainty calculated from uncertainty in average auxiliary material input, and the unertainty of the waste composition of this waste
  properties: dry mass 1 kg, wet mass 1 kg, carbon content, fossil 0.628
  note on carbon content, fossil: This dataset is an unweighted average of 20 organic substances (listed in Tab 88.1, ecoinvent v2.2 report 8, part II), being part of the top100 chemicals included in this database. The C-content has also been calculated as an unweighted average of the C content of the substances composing this dataset.
- residual material landfill: 6.5596e-11 unit; lognormal variance with pedigree 0.28, pedigree (1,1,5,1,1)
  uncertainty is calculated from uncertainties in waste composition and transfer coefficients in incinerator
- quicklime, milled, packed: 0.00010839 kg; lognormal variance with pedigree 0.47, pedigree (1,1,5,1,1)
  (same comment as for hydrochloric acid, without water, in 30% solution state)
  properties: dry mass 0.99 kg, water content 0.010101, wet mass 1 kg
- process-specific burdens, hazardous waste incineration plant: 1 kg; lognormal variance with pedigree 0.04, pedigree (1,1,5,1,1)
  demands per kilogram waste. uncertainty is heeded in the module;activityLink introduced to establish a direct link to the corresponding regional supply of this product
- hazardous waste incineration facility: 1.25e-9 unit; lognormal variance with pedigree 0.04, pedigree (1,1,5,1,1)
  demands per kilogram waste. uncertainty is heeded in the module
  This exchange has an activity link directly to the producing activity because the product is primarily consumed in the same geographical area where it is produced.
- hydrogen peroxide, without water, in 50% solution state: 4.4298e-7 kg; lognormal variance with pedigree 1, pedigree (1,1,5,1,1)
  (same comment as for hydrochloric acid, without water, in 30% solution state)
  properties: dry mass 1 kg, wet mass 1 kg
- titanium dioxide: 3.8946e-9 kg; lognormal variance with pedigree 2.34, pedigree (1,1,5,1,1)
  (same comment as for heat, district or industrial, natural gas)
  properties: dry mass 1 kg, wet mass 1 kg
- calcium chloride: 0.00051667 kg; lognormal variance with pedigree 0.98, pedigree (1,1,5,1,1)
  (same comment as for hydrochloric acid, without water, in 30% solution state)
  properties: dry mass 1 kg, wet mass 1 kg
- sodium hydroxide, without water, in 50% solution state: 0.0010336 kg; lognormal variance with pedigree 0.45, pedigree (1,1,5,1,1)
  (same comment as for hydrochloric acid, without water, in 30% solution state)
  properties: dry mass 1 kg, wet mass 1 kg
- chromium: 7.9482e-11 kg; lognormal variance with pedigree 2.34, pedigree (1,1,5,1,1)
  Proxy for vanadium pentoxide V2O5 in SCR catalyst. uncertainty calculated from uncertainty in average DeNOx input, uncertainty in the share of thermal NOx, uncertainty of nitrogen content in average municipal waste and the unertainty in nitrogen content in *this* waste.
  properties: dry mass 1 kg, wet mass 1 kg
- waste cement, hydrated: -0.031486 kg; lognormal variance with pedigree 0.28, pedigree (1,1,5,1,1)
  Hydrated cement for solidification of landfilled residual material. Uncertainty calculated from unertainty of the waste composition of this waste and transfer coefficients in the incinerator and of the solidification recipe.
  production volume 0.031486 kg
    Calculated from the production volume of fly ash and scrubber sludge, 90% water in proportion to the respective output amounts.
  properties: wet mass 1 kg, dry mass 1 kg
- cement, unspecified: 0.012595 kg; lognormal variance with pedigree 0.28, pedigree (1,1,5,1,1)
  Cement for solidification of landfilled residual material. Uncertainty calculated from unertainty of the waste composition of this waste, of transfer coefficients in the incinerator and of the solidification recipe.
  properties: wet mass 1 kg, dry mass 1 kg
- process-specific burdens, residual material landfill: 0.031486 kg; lognormal variance with pedigree 0.28, pedigree (1,1,5,1,1)
  uncertainty is calculated from uncertainties in waste composition and transfer coefficients in incinerator;activityLink introduced to establish a direct link to the corresponding regional supply of this product

## Emissions to nature
- Sulfur dioxide [air, urban air close to ground]: 1.182e-7 kg; lognormal variance with pedigree 1.03, pedigree (1,1,5,1,1)
  (same comment as for residual material landfill)
- Cadmium, ion [water, ground-, long-term]: 4.4784e-9 kg; lognormal variance with pedigree 7.89, pedigree (1,1,5,1,1)
  Long-term emissions from landfilling of incineration residues. uncertainty is calculated from uncertainties in waste composition and transfer coefficients in incinerator and landfills.
- Antimony [water, ground-, long-term]: 3.1714e-7 kg; lognormal variance with pedigree 1.71, pedigree (1,1,5,1,1)
  (same comment as for Cadmium, ion)
- Calcium, ion [water, surface water]: 2.7409e-6 kg; lognormal variance with pedigree 1.24, pedigree (1,1,5,1,1)
  uncertainty is calculated from uncertainties in waste composition and transfer coefficients in incinerator and landfills
- Cadmium [air, urban air close to ground]: 3.6345e-11 kg; lognormal variance with pedigree 1.7, pedigree (1,1,5,1,1)
  (same comment as for residual material landfill)
- Phosphorus [air, urban air close to ground]: 1.043e-7 kg; lognormal variance with pedigree 0.97, pedigree (1,1,5,1,1)
  (same comment as for residual material landfill)
- COD, Chemical Oxygen Demand [water, surface water]: 8.4139e-7 kg; lognormal variance with pedigree 0.55, pedigree (1,1,5,1,1)
  (same comment as for Calcium, ion)
- Arsenic, ion [water, ground-, long-term]: 0 kg; pedigree (1,1,1,1,1)
  (same comment as for Cadmium, ion)
- TOC, Total Organic Carbon [water, ground-, long-term]: 0.00011902 kg; lognormal variance with pedigree 0.4, pedigree (1,1,5,1,1)
  (same comment as for Cadmium, ion)
- Mercury [air, urban air close to ground]: 7.5982e-15 kg; lognormal variance with pedigree 1.91, pedigree (1,1,5,1,1)
  (same comment as for residual material landfill)
- Lead [water, surface water]: 7.5123e-10 kg; lognormal variance with pedigree 1.38, pedigree (1,1,5,1,1)
  (same comment as for Calcium, ion)
- Mercury [water, surface water]: 2.3196e-9 kg; lognormal variance with pedigree 1.79, pedigree (1,1,5,1,1)
  (same comment as for Calcium, ion)
- BOD5, Biological Oxygen Demand [water, ground-, long-term]: 0.00027206 kg; lognormal variance with pedigree 0.4, pedigree (1,1,5,1,1)
  (same comment as for Cadmium, ion)
- Barium [water, ground-, long-term]: 2.228e-7 kg; lognormal variance with pedigree 6.93, pedigree (1,1,5,1,1)
  (same comment as for Cadmium, ion)
- Tin, ion [water, surface water]: 7.6258e-11 kg; lognormal variance with pedigree 2.26, pedigree (1,1,5,1,1)
  (same comment as for Calcium, ion)
- Magnesium [water, surface water]: 3.1634e-7 kg; lognormal variance with pedigree 1.5, pedigree (1,1,5,1,1)
  (same comment as for Calcium, ion)
- Potassium, ion [water, ground-, long-term]: 0.00010596 kg; lognormal variance with pedigree 0.95, pedigree (1,1,5,1,1)
  (same comment as for Cadmium, ion)
- DOC, Dissolved Organic Carbon [water, ground-, long-term]: 0.00011902 kg; lognormal variance with pedigree 0.4, pedigree (1,1,5,1,1)
  (same comment as for Cadmium, ion)
- Phosphate [water, ground-, long-term]: 0.00010043 kg; lognormal variance with pedigree 1.51, pedigree (1,1,5,1,1)
  (same comment as for Cadmium, ion)
- Molybdenum [air, urban air close to ground]: 1e-9 kg; lognormal variance with pedigree 1.72, pedigree (1,1,5,1,1)
  (same comment as for residual material landfill)
- Dinitrogen monoxide [air, urban air close to ground]: 9.6829e-9 kg; lognormal variance with pedigree 2.1, pedigree (5,5,5,5,5)
  uncertainty calculated from uncertainty for proxy (from MSWI), uncertainty in average N-emissions, uncertainty in the share of thermal NOx, uncertainty of nitrogen content in average municipal waste and the unertainty in nitrogen content in *this* waste.
- Nickel [air, urban air close to ground]: 2.632e-8 kg; lognormal variance with pedigree 1.15, pedigree (1,1,5,1,1)
  (same comment as for residual material landfill)
- Manganese [air, urban air close to ground]: 2.2052e-13 kg; lognormal variance with pedigree 1.24, pedigree (1,1,5,1,1)
  (same comment as for residual material landfill)
- Sodium [air, urban air close to ground]: 6.6802e-7 kg; lognormal variance with pedigree 1.06, pedigree (1,1,5,1,1)
  (same comment as for residual material landfill)
- Lead [water, ground-, long-term]: 1.4316e-7 kg; lognormal variance with pedigree 8.09, pedigree (1,1,5,1,1)
  (same comment as for Cadmium, ion)
- Zinc, ion [water, surface water]: 3.6315e-6 kg; lognormal variance with pedigree 0.88, pedigree (1,1,5,1,1)
  (same comment as for Calcium, ion)
- Antimony [water, surface water]: 1.7286e-7 kg; lognormal variance with pedigree 1.73, pedigree (1,1,5,1,1)
  (same comment as for Calcium, ion)
- Cobalt [water, surface water]: 1.0393e-5 kg; lognormal variance with pedigree 1.3, pedigree (1,1,5,1,1)
  (same comment as for Calcium, ion)
- Arsenic, ion [water, surface water]: 5e-7 kg; lognormal variance with pedigree 1.7, pedigree (1,1,5,1,1)
  (same comment as for Calcium, ion)
- Strontium [water, surface water]: 1.813e-8 kg; lognormal variance with pedigree 1.88, pedigree (1,1,5,1,1)
  (same comment as for Calcium, ion)
- Nickel, ion [water, ground-, long-term]: 1.0819e-5 kg; lognormal variance with pedigree 1.39, pedigree (1,1,5,1,1)
  (same comment as for Cadmium, ion)
- Carbon dioxide, fossil [air, urban air close to ground]: 0.060691 kg; lognormal variance with pedigree 0.35, pedigree (1,1,5,1,1)
  calculated from uncertainty in carbon in waste and transfer coefficients
- Vanadium, ion [water, surface water]: 2.0943e-9 kg; lognormal variance with pedigree 2.16, pedigree (1,1,5,1,1)
  (same comment as for Calcium, ion)
- Zinc [air, urban air close to ground]: 1.8942e-7 kg; lognormal variance with pedigree 0.89, pedigree (1,1,5,1,1)
  (same comment as for residual material landfill)
- Tin, ion [water, ground-, long-term]: 3.2171e-8 kg; lognormal variance with pedigree 5.47, pedigree (1,1,5,1,1)
  (same comment as for Cadmium, ion)
- Phosphate [water, surface water]: 7.1538e-6 kg; lognormal variance with pedigree 0.92, pedigree (1,1,5,1,1)
  (same comment as for Calcium, ion)
- Hydrogen fluoride [air, urban air close to ground]: 1.9551e-12 kg; lognormal variance with pedigree 1.99, pedigree (1,1,5,1,1)
  (same comment as for residual material landfill)
- Water [air, unspecified]: 0.0009 m3; name water_to_air_unspecified; lognormal variance with pedigree 0.0807, pedigree (2,2,5,1,1)
  Calculated value based on water balance.
  property fraction, origin: salt water 0; name fraction_origin_salt_water
  property wet mass 1000 kg; name WM
  property fraction, origin: unspecified 1; name fraction_origin_unspecified
  property carbon content, fossil 0; name C_content_fossil
  property dry mass 0 kg; name DM
  property fraction, origin: fresh water 0; name fraction_origin_fresh_water
  property water in wet mass 1000 kg; name WWM
  property carbon content, non-fossil 0; name C_content_non_fossil
- Nitrate [water, ground-, long-term]: 9.7697e-8 kg; lognormal variance with pedigree 1.49, pedigree (1,1,5,1,1)
  (same comment as for Cadmium, ion)
- Sodium, ion [water, ground-, long-term]: 4.3938e-5 kg; lognormal variance with pedigree 1.05, pedigree (1,1,5,1,1)
  (same comment as for Cadmium, ion)
- Calcium [air, urban air close to ground]: 3.034e-5 kg; lognormal variance with pedigree 0.35, pedigree (1,1,5,1,1)
  (same comment as for residual material landfill)
- Strontium [air, urban air close to ground]: 3e-9 kg; lognormal variance with pedigree 1.2, pedigree (1,1,5,1,1)
  (same comment as for residual material landfill)
- Lead [air, urban air close to ground]: 1.0245e-9 kg; lognormal variance with pedigree 1.21, pedigree (1,1,5,1,1)
  (same comment as for residual material landfill)
- Copper, ion [water, ground-, long-term]: 2.0179e-5 kg; lognormal variance with pedigree 3.43, pedigree (1,1,5,1,1)
  (same comment as for Cadmium, ion)
- Nitrate [water, surface water]: 3.4787e-8 kg; lognormal variance with pedigree 1.12, pedigree (1,1,5,1,1)
  (same comment as for Calcium, ion)
- Calcium, ion [water, ground-, long-term]: 0.0016418 kg; lognormal variance with pedigree 1.78, pedigree (1,1,5,1,1)
  (same comment as for Cadmium, ion)
- Hydrogen chloride [air, urban air close to ground]: 1.2338e-7 kg; lognormal variance with pedigree 0.85, pedigree (1,1,5,1,1)
  (same comment as for residual material landfill)
- Chromium [air, urban air close to ground]: 5.272e-12 kg; lognormal variance with pedigree 1.14, pedigree (1,1,5,1,1)
  (same comment as for residual material landfill)
- Sulfate [water, surface water]: 0.00028403 kg; lognormal variance with pedigree 1, pedigree (1,1,5,1,1)
  (same comment as for Calcium, ion)
- Carbon monoxide, fossil [air, urban air close to ground]: 1.2076e-5 kg; lognormal variance with pedigree 0.71, pedigree (1,4,5,1,3)
  1 plant for waste solvent incineration in Switzerland
- Potassium, ion [water, surface water]: 4.1593e-5 kg; lognormal variance with pedigree 0.99, pedigree (1,1,5,1,1)
  (same comment as for Calcium, ion)
- Antimony [air, urban air close to ground]: 1.906e-15 kg; lognormal variance with pedigree 1.83, pedigree (1,1,5,1,1)
  (same comment as for residual material landfill)
- DOC, Dissolved Organic Carbon [water, surface water]: 3.6811e-7 kg; lognormal variance with pedigree 0.55, pedigree (1,1,5,1,1)
  (same comment as for Calcium, ion)
- Aluminium [air, urban air close to ground]: 2.0855e-7 kg; lognormal variance with pedigree 0.98, pedigree (1,1,5,1,1)
  (same comment as for residual material landfill)
- Copper, ion [water, surface water]: 2.3547e-5 kg; lognormal variance with pedigree 0.78, pedigree (1,1,5,1,1)
  (same comment as for Calcium, ion)
- TOC, Total Organic Carbon [water, surface water]: 3.6811e-7 kg; lognormal variance with pedigree 0.55, pedigree (1,1,5,1,1)
  (same comment as for Calcium, ion)
- Cyanide [air, urban air close to ground]: 2.4207e-9 kg; lognormal variance with pedigree 2.1, pedigree (5,5,5,5,5)
  (same comment as for Dinitrogen monoxide)
- Cadmium, ion [water, surface water]: 2.9823e-10 kg; lognormal variance with pedigree 1.62, pedigree (1,1,5,1,1)
  (same comment as for Calcium, ion)
- Magnesium [air, urban air close to ground]: 2.2996e-6 kg; lognormal variance with pedigree 0.65, pedigree (1,1,5,1,1)
  (same comment as for residual material landfill)
- Aluminium [water, ground-, long-term]: 3.9568e-5 kg; lognormal variance with pedigree 1.33, pedigree (1,1,5,1,1)
  (same comment as for Cadmium, ion)
- Sulfate [water, ground-, long-term]: 1.129e-5 kg; lognormal variance with pedigree 1.01, pedigree (1,1,5,1,1)
  (same comment as for Cadmium, ion)
- Boron [water, ground-, long-term]: 1.5059e-6 kg; lognormal variance with pedigree 1.51, pedigree (1,1,5,1,1)
  (same comment as for Cadmium, ion)
- Vanadium, ion [water, ground-, long-term]: 6.5325e-7 kg; lognormal variance with pedigree 1.65, pedigree (1,1,5,1,1)
  (same comment as for Cadmium, ion)
- Mercury [water, ground-, long-term]: 1.0276e-8 kg; lognormal variance with pedigree 4.13, pedigree (1,1,5,1,1)
  (same comment as for Cadmium, ion)
- Tin [air, urban air close to ground]: 2.2551e-9 kg; lognormal variance with pedigree 1.56, pedigree (1,1,5,1,1)
  (same comment as for residual material landfill)
- Nitrogen oxides [air, urban air close to ground]: 6.9932e-8 kg; lognormal variance with pedigree 2.01, pedigree (1,1,5,1,1)
  uncertainty calculated from uncertainty in average N-emissions, uncertainty in the share of thermal NOx, uncertainty of nitrogen content in average municipal waste and the unertainty in nitrogen content in *this* waste.
- Boron [air, urban air close to ground]: 2.52e-7 kg; lognormal variance with pedigree 1.52, pedigree (1,1,5,1,1)
  (same comment as for residual material landfill)
- Zinc, ion [water, ground-, long-term]: 3.2697e-6 kg; lognormal variance with pedigree 5.71, pedigree (1,1,5,1,1)
  (same comment as for Cadmium, ion)
- Iron [air, urban air close to ground]: 2.38e-6 kg; lognormal variance with pedigree 0.56, pedigree (1,1,5,1,1)
  (same comment as for residual material landfill)
- Arsenic [air, urban air close to ground]: 5.1e-15 kg; lognormal variance with pedigree 1.81, pedigree (1,1,5,1,1)
  (same comment as for residual material landfill)
- Molybdenum [water, surface water]: 4.9671e-7 kg; lognormal variance with pedigree 1.7, pedigree (1,1,5,1,1)
  (same comment as for Calcium, ion)
- Boron [water, surface water]: 3.2844e-7 kg; lognormal variance with pedigree 1.45, pedigree (1,1,5,1,1)
  (same comment as for Calcium, ion)
- Iron, ion [water, surface water]: 0.0027312 kg; lognormal variance with pedigree 0.54, pedigree (1,1,5,1,1)
  (same comment as for Calcium, ion)
- Magnesium [water, ground-, long-term]: 0.00018949 kg; lognormal variance with pedigree 1.81, pedigree (1,1,5,1,1)
  (same comment as for Cadmium, ion)
- Sodium, ion [water, surface water]: 2.6394e-5 kg; lognormal variance with pedigree 1.07, pedigree (1,1,5,1,1)
  (same comment as for Calcium, ion)
- Chromium VI [water, surface water]: 4.4996e-6 kg; lognormal variance with pedigree 1.15, pedigree (1,1,5,1,1)
  (same comment as for Calcium, ion)
- Ammonia [air, urban air close to ground]: 2.6897e-9 kg; lognormal variance with pedigree 2.01, pedigree (1,1,5,1,1)
  (same comment as for Nitrogen oxides)
- Strontium [water, ground-, long-term]: 1.086e-5 kg; lognormal variance with pedigree 1.42, pedigree (1,1,5,1,1)
  (same comment as for Cadmium, ion)
- Cobalt [air, urban air close to ground]: 7.28e-9 kg; lognormal variance with pedigree 1.32, pedigree (1,1,5,1,1)
  (same comment as for residual material landfill)
- COD, Chemical Oxygen Demand [water, ground-, long-term]: 0.00027206 kg; lognormal variance with pedigree 0.4, pedigree (1,1,5,1,1)
  (same comment as for Cadmium, ion)
- Manganese [water, ground-, long-term]: 3.3454e-7 kg; lognormal variance with pedigree 6.87, pedigree (1,1,5,1,1)
  (same comment as for Cadmium, ion)
- Nickel, ion [water, surface water]: 7.7073e-6 kg; lognormal variance with pedigree 1.13, pedigree (1,1,5,1,1)
  (same comment as for Calcium, ion)
- Potassium [air, urban air close to ground]: 4.462e-7 kg; lognormal variance with pedigree 0.96, pedigree (1,1,5,1,1)
  (same comment as for residual material landfill)
- Barium [water, surface water]: 3.7196e-10 kg; lognormal variance with pedigree 2.39, pedigree (1,1,5,1,1)
  (same comment as for Calcium, ion)
- Iron, ion [water, ground-, long-term]: 3.34e-6 kg; lognormal variance with pedigree 7.55, pedigree (1,1,5,1,1)
  (same comment as for Cadmium, ion)
- Copper [air, urban air close to ground]: 3.8367e-7 kg; lognormal variance with pedigree 0.8, pedigree (1,1,5,1,1)
  (same comment as for residual material landfill)
- Barium [air, urban air close to ground]: 2.7e-8 kg; lognormal variance with pedigree 1.2, pedigree (1,1,5,1,1)
  (same comment as for residual material landfill)
- Fluoride [water, ground-, long-term]: 1.2494e-11 kg; lognormal variance with pedigree 1.98, pedigree (1,1,5,1,1)
  (same comment as for Cadmium, ion)
- Molybdenum [water, ground-, long-term]: 2.2909e-9 kg; lognormal variance with pedigree 1.72, pedigree (1,1,5,1,1)
  (same comment as for Cadmium, ion)
- Aluminium [water, surface water]: 6.6057e-8 kg; lognormal variance with pedigree 1.71, pedigree (1,1,5,1,1)
  (same comment as for Calcium, ion)
- BOD5, Biological Oxygen Demand [water, surface water]: 8.4139e-7 kg; lognormal variance with pedigree 0.55, pedigree (1,1,5,1,1)
  (same comment as for Calcium, ion)
- Manganese [water, surface water]: 9.6349e-10 kg; lognormal variance with pedigree 1.78, pedigree (1,1,5,1,1)
  (same comment as for Calcium, ion)
- Chromium VI [water, ground-, long-term]: 1.3496e-5 kg; lognormal variance with pedigree 1.05, pedigree (1,1,5,1,1)
  (same comment as for Cadmium, ion)
- Chloride [water, surface water]: 0.00039939 kg; lognormal variance with pedigree 0.82, pedigree (1,1,5,1,1)
  (same comment as for Calcium, ion)
- Vanadium [air, urban air close to ground]: 8.5e-11 kg; lognormal variance with pedigree 1.66, pedigree (1,1,5,1,1)
  (same comment as for residual material landfill)
- Fluoride [water, surface water]: 7.756e-9 kg; lognormal variance with pedigree 1.96, pedigree (1,1,5,1,1)
  (same comment as for Calcium, ion)
- Chloride [water, ground-, long-term]: 4.8551e-7 kg; lognormal variance with pedigree 0.84, pedigree (1,1,5,1,1)
  (same comment as for Cadmium, ion)

## Sampling procedure
The 2 Swiss HWI plants, used as the inventory reference technology mix, have a total annual capacity of 53'000 tons of hazardous waste. This corresponds to 39% of the Swiss total installed capacity in 2000. Swiss average plants size is 20'000 t/a.

## Extrapolations
This dataset has been extrapolated from year 2000 to the year of the calculation (2019). The uncertainty has been adjusted accordingly.

## Review by Niels Jungbluth 2009-01-22
passed.
