# solid manure loading and spreading, by hydraulic loader and spreader

Dataset: EcoSpold 2, unit process
Geography: CA-QC
Time period: 1991-01-01 to 2019-12-31
Technology level: current
Classification: ISIC rev.4 ecoinvent: 0161:Support activities for crop production
Classification: EcoSpold01Categories: agricultural means of production/work processes
Scenario: Business-as-Usual
System model: Allocation at the point of substitution
Generated by: Dominique Maxime
Published in: Nemecek, T. 2007
Database: ecoinvent
isCopyrightProtected: true
accessRestrictedTo: 1

## General comment
This dataset represents the service of loading 1 kg of solid manure with hydraulic loader (power take-off driven) from dung slab on manure spreader and spreading the manure onto field with the manure spreader. Working load 5 t (5.8 m3, dry matter content 22%), solid manure production and any emission from manure are not included.
Child dataset exchanges scaled from GLO parent dataset based on diesel consumption in Quebec. Created to proxy farm machinery/fieldwork representative of the Quebec context. Data quality indicators adjusted accordingly. Other difference with the parent dataset is the production volume, which now represents the production volume in Quebec.
Diesel consumption is calculated from primary data and models from the American Society of Agricultural and Biological Engineers (ASABE) published in 2006 and might be representative of more recent technology than the GLO parent dataset.

## Included activities start
Solid manure loading and spreading process starting from preliminary work at farm, like attaching the adequate machinery to the tractor

## Included activities end
This activity ends with transfer back to farm and concluding work, like uncoupling the machine; The dataset includes transfer to field; solid manure loading with an hydraulic loader from manure slab into a manure spreader; field spreading of 1 kg of solid manure, including field turning, idling and overlapping. The inventory takes into account the diesel fuel consumption and the amount of agricultural machinery and of the shed, which has to be attributed to the manure loading and spreading. Also taken into consideration is the amount of emissions to the air from combustion and the emission to the soil from tyre abrasion during the work process. The amount of spread material is not taken into account, nor dust other than from combustion and noise.

## Geography
Child dataset air emissions related to diesel combustion are scaled from parent dataset (GLO) based on the ratio of diesel consumption in Quebec over diesel consumption of GLO. Created to proxy farm machinery/fieldwork representative of the Quebec context. Data quality indicators adjusted accordingly.
References
CRAAQ 2011

## Technology
Emissions consumption by the newest models of tractors set into operation during the period from 1999 to 2001.

## Time period
Measurements were made in the last few years (1999-2001).
Diesel consumption is calculated from primary data and models from the American Society of Agricultural and Biological Engineers (ASABE) published in 2006 and might be representative of more recent time period than the GLO parent dataset.

## Parameters
- farm machinery diesel consumption ratio: 2.7646 dimensionless; name machine_diesel_ratio; = qc_diesel_per_kg/ EI_diesel_per_kg
  Ratio of diesel consumption for tractor and its machinery: kg diesel per kg of the Quebec machinery/kg diesel per kg of the ecoinvent's parent machinery
- quebec diesel consumption (kg/kg): 0.001468 kg/kg; name qc_diesel_per_kg; lognormal variance with pedigree 0.000725, pedigree (1,2,1,2,1)
  Diesel consumption of tractor and machinery within the Québec context; kg diesel/kg. (CRAAQ, 2011)
- ecoinvent diesel consumption (kg/kg): 0.000531 kg/kg; name EI_diesel_per_kg; lognormal variance with pedigree 0.004, pedigree (1,4,1,5,1)
  Diesel consumption in the parent dataset (ecoinvent); kg diesel/kg

## Reference product
- solid manure loading and spreading, by hydraulic loader and spreader: 1 kg; CPC 86119: Other support services to crop production; By-product classification allocatable product
  EcoSpold01Location=CH
  production volume 1.30376e10 kg
    Solid animal manure production in Quebec is accounted for cattle (beef and dairy) and poultry (chicken and turkey) from the 2008-2012 average number of animals (Statistics Canada, 2013a, 2013b), manure excretion rates per animal category (Statistics Canada, 2006), animal confinement factors (Kellog et al., 2000), additional mass of litter (BPR, 2007; Gasser, 2012), and manure recoverability factors (Kellog et al., 2000). Swine solid manure is neglected since all swine production is considered managed as liquid slurry. Solid animal manure accounts for 96.4% (humid w/w) of organic biosolids applied on agricultural fields. Other organic biosolids applied (3.6%) are: sludges from pulp and paper industry, from municipal wastewater treatment, from food industry, commercial composts, and other minor sources (MDDEP, 2011).
    References:
    Kellogg, R.L., C.H. Lander, D.C. Moffitt, and N. Gollehon (2000). Manure nutrients relative to the capacity of cropland and pasture land to assimilate nutrients: Spatial and temporal trends for the United States. USDA-NRCS-ERS Publication No. nps00-0579. (http://www.nrcs.usda.gov/Internet/FSE_DOCUMENTS/nrcs143_012133.pdf)
    Statistics Canada (2013a). CANSIM Table 003-0032 - Number of cattle, by class and farm type. (http://www5.statcan.gc.ca/cansim/a01?lang=eng)
    Statistics Canada (2013b). CANSIM Table 004-0004 - Census of Agriculture, selected livestock and poultry data, Canada and provinces. (http://www5.statcan.gc.ca/cansim/a01?lang=eng)
    Statistics Canada (2006). A Geographical Profile of Manure Production in Canada, 2001. (http://www.statcan.gc.ca/pub/21-601-m/21-601-m2006077-eng.pdf)
    BPR Conseil (2007). Revue de littérature sur les litières en production bovine. Rapport pour Fédération des producteurs de bovins du Québec, Juillet 2007, 66 p.
    Gasser, M.O. (2012). Validation de techniques pour estimer la masse des chargements de fumiers de poulets de chair et de poules pondeuses. Rapport final pour le comité valideur de CRAAQ, EVQ, FPOCQ, MAPAQ, MDDEP, OAQ. IRDA, 34 p. (http://www.craaq.qc.ca/documents/files/Effluents_elevage/MDAGT003_Rapport_final_fumiers.pdf)
    MDDEP (2011). Bilan 2010 du recyclage des matières résiduelles fertilisantes, Québec, Ministère du Développement durable, de l’Environnement et des Parcs, Direction des matières résiduelles et des lieux contaminés, ISBN 978-2-550-63377-8, 30 pages. (http://www.mddep.gouv.qc.ca/matieres/mat_res/fertilisantes/bilan2010.pdf)
  property price 0.000933526 EUR2005
    Calculated based on inputs: The price of the product has been calculated as a sum of the values of the material and energy inputs for this product. This value is therefore a rough estimation. It may underestimate the real price since there are additional expenses when producing any product. These expences can include for example labour costs, treatment of waste materials and profit for the producer. Please consider carefully whether this level of data quality is acceptable for your application.

## Inputs from technosphere
- agricultural machinery, unspecified: 0.000189 kg; = ParentValue; lognormal variance with pedigree 0.044, pedigree (1,4,5,5,1)
  EcoSpold01Location=CH
- tractor, 4-wheel, agricultural: 5.88e-5 kg; = ParentValue; lognormal variance with pedigree 0.044, pedigree (1,4,5,5,1)
  EcoSpold01Location=CH
- shed: 4.4e-7 m2; = ParentValue; lognormal variance with pedigree 0.344, pedigree (1,4,5,5,1)
  EcoSpold01Location=CH
- diesel: 0.001468 kg; = ParentValue* machine_diesel_ratio; lognormal variance with pedigree 0.044, pedigree (1,4,5,5,1)
  Scaling to Quebec diesel consumption
  EcoSpold01Location=CH
  properties: dry mass 1 kg, wet mass 1 kg, carbon content, fossil 0.865
  note on carbon content, fossil: C-content of diesel is 86.5% (ecoinvent v2.2 report 6_IV, Tab 3.14)

## Emissions to nature
- Zinc [soil, agricultural]: 9.33e-8 kg; = ParentValue; lognormal variance with pedigree 0.084, pedigree (1,4,5,5,1)
  Emission from tyre abrasion, not related to diesel consumption
- Carbon dioxide, fossil [air, non-urban air or from high stacks]: 0.00456158 kg; = ParentValue* machine_diesel_ratio; lognormal variance with pedigree 0.0601, pedigree (1,2,5,5,3)
  Scaling to Quebec diesel consumption
- Copper [air, non-urban air or from high stacks]: 2.49643e-9 kg; = ParentValue* machine_diesel_ratio; lognormal variance with pedigree 0.7001, pedigree (1,2,5,5,3)
  Scaling to Quebec diesel consumption
- Sulfur dioxide [air, non-urban air or from high stacks]: 1.47906e-6 kg; = ParentValue* machine_diesel_ratio; lognormal variance with pedigree 0.0601, pedigree (1,2,5,5,3)
  Scaling to Quebec diesel consumption
- Ammonia [air, non-urban air or from high stacks]: 2.93047e-8 kg; = ParentValue* machine_diesel_ratio; lognormal variance with pedigree 0.1001, pedigree (1,2,5,5,3)
  Scaling to Quebec diesel consumption
- Benzo(a)pyrene [air, non-urban air or from high stacks]: 4.39571e-11 kg; = ParentValue* machine_diesel_ratio; lognormal variance with pedigree 0.7001, pedigree (1,2,5,5,3)
  Scaling to Quebec diesel consumption
- Lead [soil, agricultural]: 1.61e-10 kg; = ParentValue; lognormal variance with pedigree 0.084, pedigree (1,4,5,5,1)
  Emission from tyre abrasion, not related to diesel consumption
- Cadmium [air, non-urban air or from high stacks]: 1.468e-11 kg; = ParentValue* machine_diesel_ratio; lognormal variance with pedigree 0.7001, pedigree (1,2,5,5,3)
  Scaling to Quebec diesel consumption
- Methane, fossil [air, non-urban air or from high stacks]: 1.89375e-7 kg; = ParentValue* machine_diesel_ratio; lognormal variance with pedigree 0.1001, pedigree (1,2,5,5,3)
  Scaling to Quebec diesel consumption
- Cadmium [soil, agricultural]: 3.58e-11 kg; = ParentValue; lognormal variance with pedigree 0.084, pedigree (1,4,5,5,1)
  Emission from tyre abrasion, not related to diesel consumption
- Benzene [air, non-urban air or from high stacks]: 1.07266e-8 kg; = ParentValue* machine_diesel_ratio; lognormal variance with pedigree 0.1001, pedigree (1,2,5,5,3)
  Scaling to Quebec diesel consumption
- Zinc [air, non-urban air or from high stacks]: 1.468e-9 kg; = ParentValue* machine_diesel_ratio; lognormal variance with pedigree 0.7001, pedigree (1,2,5,5,3)
  Scaling to Quebec diesel consumption
- Nitrogen oxides [air, non-urban air or from high stacks]: 6.66267e-5 kg; = ParentValue* machine_diesel_ratio; lognormal variance with pedigree 0.084, pedigree (1,4,5,5,1)
  Scaling to Quebec diesel consumption
- PAH, polycyclic aromatic hydrocarbons [air, non-urban air or from high stacks]: 4.83804e-9 kg; = ParentValue* machine_diesel_ratio; lognormal variance with pedigree 0.3601, pedigree (1,2,5,5,3)
  Scaling to Quebec diesel consumption
- Particulates, < 2.5 um [air, non-urban air or from high stacks]: 6.22034e-6 kg; = ParentValue* machine_diesel_ratio; lognormal variance with pedigree 0.3601, pedigree (1,2,5,5,3)
  Scaling to Quebec diesel consumption
- Carbon monoxide, fossil [air, non-urban air or from high stacks]: 8.76377e-6 kg; = ParentValue* machine_diesel_ratio; lognormal variance with pedigree 0.694, pedigree (1,4,5,5,1)
  Scaling to Quebec diesel consumption
- Chromium [air, non-urban air or from high stacks]: 7.32618e-11 kg; = ParentValue* machine_diesel_ratio; lognormal variance with pedigree 0.7001, pedigree (1,2,5,5,3)
  Scaling to Quebec diesel consumption
- Nickel [air, non-urban air or from high stacks]: 1.02843e-10 kg; = ParentValue* machine_diesel_ratio; lognormal variance with pedigree 0.7001, pedigree (1,2,5,5,3)
  Scaling to Quebec diesel consumption
- Dinitrogen monoxide [air, non-urban air or from high stacks]: 1.76105e-7 kg; = ParentValue* machine_diesel_ratio; lognormal variance with pedigree 0.1001, pedigree (1,2,5,5,3)
  Scaling to Quebec diesel consumption
- NMVOC, non-methane volatile organic compounds, unspecified origin [air, non-urban air or from high stacks]: 4.39571e-6 kg; = ParentValue* machine_diesel_ratio; lognormal variance with pedigree 0.084, pedigree (1,4,5,5,1)
  Scaling to Quebec diesel consumption
- Selenium [air, non-urban air or from high stacks]: 1.468e-11 kg; = ParentValue* machine_diesel_ratio; lognormal variance with pedigree 0.1001, pedigree (1,2,5,5,3)
  Scaling to Quebec diesel consumption

## Sampling procedure
The inventoried HC, NOx, CO and fuel consumption values are measurements made following two test cycles (ISO 8178 C1 test and a specific 6-level-test created by the FAT) and on measurements made during the field work. The other emissions were calculated basing on literature data and the measured fuel consumption.

## Extrapolations
This dataset has been extrapolated from year 2002 to the year of the calculation (2019). The uncertainty has been adjusted accordingly.

## Review by Christian Bauer 2013-11-19
passed

## Review by Roland Hischier 2003-08-06
Passed.

## Review by Emilia Moreno Ruiz 2014-04-08
PV adjusted
