# treatment of spoil from hard coal mining, in surface landfill

Dataset: EcoSpold 2, unit process
Geography: GLO
Time period: 1985-01-01 to 2019-12-31
Technology level: current
Classification: EcoSpold01Categories: waste management/others
Classification: ISIC rev.4 ecoinvent: 3822:Treatment and disposal of hazardous waste
Synonyms: coal mine overburden; coal mine waste rock
Tags: Treatment; ConvertedDataset
Scenario: Business-as-Usual
System model: Allocation at the point of substitution
Share of production covered: 1 %
Generated by: Gabor Doka (obsolete)
Published in: Dones R. 2007
Database: ecoinvent
isCopyrightProtected: true
accessRestrictedTo: 1

## General comment
[This dataset was already contained in the ecoinvent database version 2. It was not individually updated during the transfer to ecoinvent version 3. Life Cycle Impact Assessment results may still have changed, as they are affected by changes in the supply chain, i.e. in other datasets. This dataset was generated following the ecoinvent quality guidelines for version 2. It may have been subject to central changes described in the ecoinvent version 3 change report (http://www.ecoinvent.org/database/ecoinvent-version-3/reports-of-changes/), and the results of the central updates were reviewed extensively. The changes added e.g. consistent water flows and other information throughout the database. The documentation of this dataset can be found in the ecoinvent reports of version 2, which are still available via the ecoinvent website. The change report linked above covers all central changes that were made during the conversion process.]

## Included activities end
Waste-specific emissions from lignite spoil leachate. Short- and long-term emissions to groundwater from rainwater infiltration leaching. Leaching by lateral groundwater flow not included.

## Geography
Data represents a worldwide average. Generic water infiltration rate according to weighted mean of major sites of coal spoil production in the world.

## Technology
Mechanically stable and revegetated coal spoil backfill or heap.

## Time period
Average coal spoil composition and leachate concentrations adopted from available lignite spoil data from literature references. Transfer coefficients from prospective model, specific to coal spoil sites.

## Reference product
- spoil from hard coal mining: -1 kg; By-product classification Waste; CPC 39: Wastes or scraps
  EcoSpold01Location=GLO
  production volume 1 kg
    Approx. 22'240 Mio t/a spoil tailings generation
    Dummy value to be replaced by value to be calculated from the demand for this treatment activity
  property price 0 EUR2005
    Waste products are assigned a price of zero as they are assumed to require further treatment.
  property carbon content, fossil 0.007879
    Composition of coal spoil is adopted by proxy from lignite spoil (pg 19, Doka G. (2009) Life Cycle Inventory of the disposal of lignite spoil, coal spoil and coal tailings. Doka Life Cycle Assessments, Zurich. Commissioned by the Swiss Centre for Life Cycle Inventories ecoinvent Centre)
  property carbon content 0.007879
    carbon content on a dry matter basis (reserved; not for manual entry)
  properties: water content 0, dry mass 1 kg, carbon content, non-fossil 0, water in wet mass 0 kg, wet mass 1 kg, carbon allocation 0.007879 kg

## Emissions to nature
- Silver, ion [water, ground-, long-term]: 3.0406e-9 kg; lognormal variance with pedigree 0.018, pedigree (1,1,4,1,1)
  Uncertainty is calculated from uncertainties in waste composition and transfer coefficients
- Copper, ion [water, ground-, long-term]: 1.7986e-6 kg; lognormal variance with pedigree 0.768, pedigree (1,1,4,1,1)
  (same comment as for Silver, ion)
- Fluoride [water, ground-]: 1.489e-7 kg; lognormal variance with pedigree 0.148, pedigree (1,1,4,1,1)
  (same comment as for Silver, ion)
- Calcium, ion [water, ground-, long-term]: 0.0031708 kg; lognormal variance with pedigree 1.838, pedigree (1,1,4,1,1)
  (same comment as for Silver, ion)
- Phosphate [water, ground-]: 7.8897e-5 kg; lognormal variance with pedigree 0.648, pedigree (1,1,4,1,1)
  (same comment as for Silver, ion)
- Chromium VI [water, ground-, long-term]: 1.3445e-6 kg; lognormal variance with pedigree 3.518, pedigree (1,1,4,1,1)
  (same comment as for Silver, ion)
- Nickel, ion [water, ground-]: 3.9664e-8 kg; lognormal variance with pedigree 0.978, pedigree (1,1,4,1,1)
  (same comment as for Silver, ion)
- Mercury [water, ground-]: 1.2e-10 kg; lognormal variance with pedigree 1.078, pedigree (1,1,4,1,1)
  (same comment as for Silver, ion)
- Scandium [water, ground-]: 5.8675e-10 kg; lognormal variance with pedigree 1.288, pedigree (1,1,4,1,1)
  (same comment as for Silver, ion)
- Tin, ion [water, ground-]: 3.4267e-11 kg; lognormal variance with pedigree 1.208, pedigree (1,1,4,1,1)
  (same comment as for Silver, ion)
- Strontium [water, ground-]: 5.9402e-7 kg; lognormal variance with pedigree 0.638, pedigree (1,1,4,1,1)
  (same comment as for Silver, ion)
- Potassium, ion [water, ground-, long-term]: 0.001197 kg; lognormal variance with pedigree 1.078, pedigree (1,1,4,1,1)
  (same comment as for Silver, ion)
- Manganese [water, ground-, long-term]: 0.00014095 kg; lognormal variance with pedigree 1.378, pedigree (1,1,4,1,1)
  (same comment as for Silver, ion)
- Molybdenum [water, ground-]: 1.5829e-9 kg; lognormal variance with pedigree 1.178, pedigree (1,1,4,1,1)
  (same comment as for Silver, ion)
- Molybdenum [water, ground-, long-term]: 8.2585e-7 kg; lognormal variance with pedigree 0.918, pedigree (1,1,4,1,1)
  (same comment as for Silver, ion)
- Aluminium [water, ground-]: 1.4204e-7 kg; lognormal variance with pedigree 1.518, pedigree (1,1,4,1,1)
  (same comment as for Silver, ion)
- Iron, ion [water, ground-]: 4.7231e-7 kg; lognormal variance with pedigree 1.668, pedigree (1,1,4,1,1)
  (same comment as for Silver, ion)
- Zinc, ion [water, ground-, long-term]: 1.8993e-5 kg; lognormal variance with pedigree 1.198, pedigree (1,1,4,1,1)
  (same comment as for Silver, ion)
- Titanium, ion [water, ground-]: 2.6536e-9 kg; lognormal variance with pedigree 1.788, pedigree (1,1,4,1,1)
  (same comment as for Silver, ion)
- Magnesium [water, ground-, long-term]: 0.001757 kg; lognormal variance with pedigree 1.118, pedigree (1,1,4,1,1)
  (same comment as for Silver, ion)
- Lead [water, ground-, long-term]: 6.2722e-8 kg; lognormal variance with pedigree 5.488, pedigree (1,1,4,1,1)
  (same comment as for Silver, ion)
- Chloride [water, ground-]: 1.4678e-5 kg; lognormal variance with pedigree 0.258, pedigree (1,1,4,1,1)
  (same comment as for Silver, ion)
- Vanadium, ion [water, ground-, long-term]: 6.9943e-7 kg; lognormal variance with pedigree 4.728, pedigree (1,1,4,1,1)
  (same comment as for Silver, ion)
- Aluminium [water, ground-, long-term]: 8.5081e-5 kg; lognormal variance with pedigree 7.948, pedigree (1,1,4,1,1)
  (same comment as for Silver, ion)
- Cobalt [water, ground-]: 7.0474e-9 kg; lognormal variance with pedigree 1.588, pedigree (1,1,4,1,1)
  (same comment as for Silver, ion)
- Vanadium, ion [water, ground-]: 1.1793e-9 kg; lognormal variance with pedigree 1.968, pedigree (1,1,4,1,1)
  (same comment as for Silver, ion)
- Thallium [water, ground-]: 2.5319e-11 kg; lognormal variance with pedigree 0.998, pedigree (1,1,4,1,1)
  (same comment as for Silver, ion)
- Silicon [water, ground-, long-term]: 0.0016942 kg; lognormal variance with pedigree 7.348, pedigree (1,1,4,1,1)
  (same comment as for Silver, ion)
- Iron, ion [water, ground-, long-term]: 0.00028291 kg; lognormal variance with pedigree 3.248, pedigree (1,1,4,1,1)
  (same comment as for Silver, ion)
- Arsenic, ion [water, ground-]: 1.0756e-9 kg; lognormal variance with pedigree 1.148, pedigree (1,1,4,1,1)
  (same comment as for Silver, ion)
- Barium [water, ground-]: 6.0368e-9 kg; lognormal variance with pedigree 1.638, pedigree (1,1,4,1,1)
  (same comment as for Silver, ion)
- Scandium [water, ground-, long-term]: 3.3791e-7 kg; lognormal variance with pedigree 2.028, pedigree (1,1,4,1,1)
  (same comment as for Silver, ion)
- Cobalt [water, ground-, long-term]: 3.4688e-6 kg; lognormal variance with pedigree 1.018, pedigree (1,1,4,1,1)
  (same comment as for Silver, ion)
- Cadmium, ion [water, ground-]: 1.7806e-10 kg; lognormal variance with pedigree 1.168, pedigree (1,1,4,1,1)
  (same comment as for Silver, ion)
- Tin, ion [water, ground-, long-term]: 2.0526e-8 kg; lognormal variance with pedigree 5.528, pedigree (1,1,4,1,1)
  (same comment as for Silver, ion)
- Manganese [water, ground-]: 1.0703e-6 kg; lognormal variance with pedigree 1.778, pedigree (1,1,4,1,1)
  (same comment as for Silver, ion)
- Silver, ion [water, ground-]: 4.9942e-10 kg; lognormal variance with pedigree 0.098, pedigree (1,1,4,1,1)
  (same comment as for Silver, ion)
- Chloride [water, ground-, long-term]: 0.00043033 kg; lognormal variance with pedigree 0.028, pedigree (1,1,4,1,1)
  (same comment as for Silver, ion)
- Sulfate [water, ground-, long-term]: 0.014203 kg; lognormal variance with pedigree 1.688, pedigree (1,1,4,1,1)
  (same comment as for Silver, ion)
- Potassium, ion [water, ground-]: 2.2302e-6 kg; lognormal variance with pedigree 1.208, pedigree (1,1,4,1,1)
  (same comment as for Silver, ion)
- Strontium [water, ground-, long-term]: 6.1327e-5 kg; lognormal variance with pedigree 0.278, pedigree (1,1,4,1,1)
  (same comment as for Silver, ion)
- Lead [water, ground-]: 1.0471e-10 kg; lognormal variance with pedigree 2.128, pedigree (1,1,4,1,1)
  (same comment as for Silver, ion)
- Magnesium [water, ground-]: 2.248e-5 kg; lognormal variance with pedigree 1.458, pedigree (1,1,4,1,1)
  (same comment as for Silver, ion)
- Selenium [water, ground-]: 1.7084e-9 kg; lognormal variance with pedigree 1.968, pedigree (1,1,4,1,1)
  (same comment as for Silver, ion)
- Silicon [water, ground-]: 2.8283e-6 kg; lognormal variance with pedigree 1.318, pedigree (1,1,4,1,1)
  (same comment as for Silver, ion)
- Antimony [water, ground-, long-term]: 6.3636e-8 kg; lognormal variance with pedigree 1.518, pedigree (1,1,4,1,1)
  (same comment as for Silver, ion)
- Tungsten [water, ground-]: 5.3464e-11 kg; lognormal variance with pedigree 0.608, pedigree (1,1,4,1,1)
  (same comment as for Silver, ion)
- Nitrate [water, ground-, long-term]: 0.00018613 kg; lognormal variance with pedigree 0.008, pedigree (1,1,4,1,1)
  (same comment as for Silver, ion)
- Zinc, ion [water, ground-]: 3.1708e-8 kg; lognormal variance with pedigree 1.798, pedigree (1,1,4,1,1)
  (same comment as for Silver, ion)
- Sodium, ion [water, ground-, long-term]: 0.0019219 kg; lognormal variance with pedigree 0.208, pedigree (1,1,4,1,1)
  (same comment as for Silver, ion)
- Thallium [water, ground-, long-term]: 1.5166e-8 kg; lognormal variance with pedigree 2.388, pedigree (1,1,4,1,1)
  (same comment as for Silver, ion)
- Beryllium [water, ground-]: 4.3784e-10 kg; lognormal variance with pedigree 0.878, pedigree (1,1,4,1,1)
  (same comment as for Silver, ion)
- Chromium VI [water, ground-]: 2.2776e-9 kg; lognormal variance with pedigree 1.418, pedigree (1,1,4,1,1)
  (same comment as for Silver, ion)
- Sulfate [water, ground-]: 0.00029217 kg; lognormal variance with pedigree 1.978, pedigree (1,1,4,1,1)
  (same comment as for Silver, ion)
- Titanium, ion [water, ground-, long-term]: 1.5895e-6 kg; lognormal variance with pedigree 13.418, pedigree (1,1,4,1,1)
  (same comment as for Silver, ion)
- Mercury [water, ground-, long-term]: 4.8479e-8 kg; lognormal variance with pedigree 0.548, pedigree (1,1,4,1,1)
  (same comment as for Silver, ion)
- Nitrate [water, ground-]: 2.7678e-6 kg; lognormal variance with pedigree 0.328, pedigree (1,1,4,1,1)
  (same comment as for Silver, ion)
- Phosphate [water, ground-, long-term]: 0.00055118 kg; lognormal variance with pedigree 0.548, pedigree (1,1,4,1,1)
  (same comment as for Silver, ion)
- Antimony [water, ground-]: 1.1262e-10 kg; lognormal variance with pedigree 1.178, pedigree (1,1,4,1,1)
  (same comment as for Silver, ion)
- Selenium [water, ground-, long-term]: 5.5607e-7 kg; lognormal variance with pedigree 1.438, pedigree (1,1,4,1,1)
  (same comment as for Silver, ion)
- Beryllium [water, ground-, long-term]: 2.6227e-7 kg; lognormal variance with pedigree 0.608, pedigree (1,1,4,1,1)
  (same comment as for Silver, ion)
- Tungsten [water, ground-, long-term]: 2.096e-8 kg; lognormal variance with pedigree 0.068, pedigree (1,1,4,1,1)
  (same comment as for Silver, ion)
- Copper, ion [water, ground-]: 3.7037e-9 kg; lognormal variance with pedigree 1.328, pedigree (1,1,4,1,1)
  (same comment as for Silver, ion)
- Fluoride [water, ground-, long-term]: 1.7111e-6 kg; lognormal variance with pedigree 0.008, pedigree (1,1,4,1,1)
  (same comment as for Silver, ion)
- Cadmium, ion [water, ground-, long-term]: 1.0666e-7 kg; lognormal variance with pedigree 0.578, pedigree (1,1,4,1,1)
  (same comment as for Silver, ion)
- Barium [water, ground-, long-term]: 3.616e-6 kg; lognormal variance with pedigree 4.708, pedigree (1,1,4,1,1)
  (same comment as for Silver, ion)
- Sodium, ion [water, ground-]: 6.3409e-6 kg; lognormal variance with pedigree 0.718, pedigree (1,1,4,1,1)
  (same comment as for Silver, ion)
- Calcium, ion [water, ground-]: 5.6378e-5 kg; lognormal variance with pedigree 2.128, pedigree (1,1,4,1,1)
  (same comment as for Silver, ion)
- Arsenic, ion [water, ground-, long-term]: 6.2402e-7 kg; lognormal variance with pedigree 2.138, pedigree (1,1,4,1,1)
  (same comment as for Silver, ion)
- Nickel, ion [water, ground-, long-term]: 1.6039e-5 kg; lognormal variance with pedigree 0.438, pedigree (1,1,4,1,1)
  (same comment as for Silver, ion)

## Sampling procedure
Disposal model based on observed leachate concentrations in literature. Extrapolated to 60'000 years heeding chemical characteristics. Initial spoil composition from various literature sources.

## Extrapolations
This dataset has been extrapolated from year 2009 to the year of the calculation (2019). The uncertainty has been adjusted accordingly.

## Review by Christian Bauer 2010-02-09
passed.
none
