# anode production, prebake, for aluminium electrolysis

Dataset: EcoSpold 2, unit process
Geography: CN
Time period: 2015-01-01 to 2019-12-31
Technology level: current
Classification: ISIC rev.4 ecoinvent: 2790:Manufacture of other electrical equipment
Classification: EcoSpold01Categories: metals/extraction
Scenario: Business-as-Usual
System model: Allocation at the point of substitution
Generated by: Linlin Wu
Published in: International Aluminium Insitute 2015
Database: ecoinvent
isCopyrightProtected: false
accessRestrictedTo: 1

## General comment
Industry average of prebake anodes for use in the Hall-Héroult process using prebake technology.
[This dataset is meant to replace the following datasets:]

## Included activities start
The unit process begins with the unloading of process materials to the storage areas on site. The operations associated with this unit process include:
* anode mix preparation, anode block forming and baking;
* rodding of baked anodes;
* maintenance and repair of plant and equipment; and
* treatment of process air, liquids and solids.
The original data also accounts for recovery of spent anode materials (anode butts). However, these are recycled in closed loop and are not explicitly accounted for in the inventory, although inputs and outputs of other flows are influenced by this recycling.
Treatment of scrubber sludges are excluded, as there is no corresponding waste treatment in the ecoinvent database.

## Included activities end
The output of this process is rodded anodes to be transported to electrolysis plants employing prebake technology.

## Geography
Data mostly from global surveys by IAI.

## Reference product
- anode, prebake, for aluminium electrolysis: 1 kg; name anodePrebakeAmount; CPC 42950: Wire, rods, tubes, plates, electrodes and similar products, of base metal or of metal carbides, coated or core[…]; By-product classification allocatable product
  production volume 1.31095e10 kg; name anodePrebakeProductionVolume
    Calculated value based on reported data, scaled up to correspond with Annual Production Volume of aluminium using Prebake technology.
  property price 0.15 EUR2005; name anodePrebakeAmount_price_EUR2005
    Literature value; U.S. Department of Energy (Inert Anode Roadmap, 1998, http://www1.eere.energy.gov/manufacturing/industries_technologies/aluminum/pdfs/inertroad.pdf).
  property carbon content 0.875012
    carbon content on a dry matter basis (reserved; not for manual entry)
  property true value 0.15; name anodePrebakeAmount_true_value
    allocation property applied in "true value" allocation // value calculated from revenue
  properties: carbon content, non-fossil 0, wet mass 1 kg, water content 0, dry mass 1 kg, carbon content, fossil 0.875012, water in wet mass 0 kg, carbon allocation 0.875012 kg

## By-products
- heat, for reuse in municipal waste incineration only: 0 MJ; CPC 17300: Steam and hot water; By-product classification allocatable product; pedigree (1,1,1,1,1)
  Net electricity generated from this waste and used in internal MSWI plant energy redistribution.
  Uncertainty: uncertainty is calculated from uncertainties in waste composition and uncertainties in energy efficiency and the uncertainty in internal energy demand
  production volume 6121.94 MJ
  property exergy 0.1842 MJ; name E_th_prod_MSWI_exergy
    This exergy property is based on the exergy content of the product.
  property price 0.0106 EUR2005; name E_th_prod_MSWI_price_EUR2005
    Average European district heat price from Ecoheatcool and Euroheat 2005-2006, Ecoheat Work package 1: The European heat market. Final report. 10.6 EUR/GJ i s the price of district heat. http://www.solarthermalworld.org/files/Ecoheatcool%20WP1%20Web.pdf?download
  property true value relation 0.1842; name E_th_prod_MSWI_true_value_relation
    property to calculate "true value" from
  property true value 3.07178e-9
    allocation property applied in "true value" allocation // value calculated from true value relation
- electricity, for reuse in municipal waste incineration only: 0 kWh; CPC 17100: Electrical energy; By-product classification allocatable product; pedigree (1,1,1,1,1)
  (same comment as for heat, for reuse in municipal waste incineration only)
  production volume 862.202 kWh
  property price 0.1 EUR2005; name E_el_prod_MSWI_price_EUR2005
    Estimated to be the same price as in case of electricity, medium voltage.
  property exergy 3.6 MJ; name E_el_prod_MSWI_exergy
    This exergy property is based on the exergy content of the product.
  property true value relation 3.6; name E_el_prod_MSWI_true_value_relation
    property to calculate "true value" from
  property true value 8.45517e-9
    (same comment as for heat, for reuse in municipal waste incineration only)

## Inputs from technosphere
- scrap steel: -0.004 kg; name wasteSteelAmount; source International Aluminium Insitute 2015; lognormal variance with pedigree 0.0032, pedigree (1,3,3,1,1)
  Reported as scrap steel.
  production volume 5.24381e7 kg; = wasteSteelAmount* anodePrebakeProductionVolume
    Calculated from the production volume of anode and output of waste per reference flow.
  property price 0 EUR2005; name wasteSteelAmount_price_EUR2005
  properties: wet mass 1 kg, dry mass 1 kg
- heat, district or industrial, other than natural gas: 0.632479 MJ; = Net_Heat_Value_HFO * kgFuel_Input_HFO /fuel_use_HFO; source International Aluminium Insitute 2015; lognormal variance with pedigree 0.002, pedigree (1,1,3,1,1)
  Heavy oil combustion.
  property heating value, net 40 MJ; name Net_Heat_Value_HFO
  property Corresponding fuel use 1.053 MJ; name fuel_use_HFO
  property fuel input in physical units, kg 0.01665 kg; name kgFuel_Input_HFO
  note on Corresponding fuel use: Lower heating value of the fuel input related to the heat/electricity output
- cast iron: 0.00582 kg; source International Aluminium Insitute 2015; lognormal variance with pedigree 0.0032, pedigree (1,3,3,1,1)
  Reported as Steel in IAI report
  EcoSpold01Location=RER
  properties: wet mass 1 kg, carbon content, fossil 0.04, dry mass 1 kg
  note on carbon content, fossil: Cast iron is made by remelting pig iron in small furnaces (e.g. cupola furnaces or electric arc furnaces) and poured into moulds to make castings. It usually contains 2% to 6% carbon (ecoinvent v2.2 report 10_partII). An average content of 4% was considered
- waste asphalt: -0.012 kg; name wasteCarbonAmount; source International Aluminium Insitute 2015; lognormal variance with pedigree 0.0032, pedigree (1,3,3,1,1)
  Proxy for treatment of waste carbon
  EcoSpold01Location=CH
  production volume 1.57314e8 kg; = wasteCarbonAmount*anodePrebakeProductionVolume
    Calculated from the production volume of anode and output of waste per reference flow.
  property price 0 EUR2005; name wasteCarbonAmount_price_EUR2005
  properties: carbon content, fossil 0.0440796, wet mass 1 kg, dry mass 0.999 kg, water content 0.001001
  note on carbon content, fossil: The waste contains 94.7% inert material (see Tab A.5 for details) 5.3% bitumen (see Tab A.6 for details), ecoinvent v2.2 report 13_I
- pitch: 0.146 kg; source International Aluminium Insitute 2015; lognormal variance with pedigree 0.0032, pedigree (1,3,3,1,1)
  Reported as Pitch in IAI report
  EcoSpold01Location=RER
  properties: dry mass 1 kg, wet mass 1 kg, carbon content, fossil 0.83
- electricity, medium voltage: 0.111 kWh; source International Aluminium Insitute 2015; lognormal variance with pedigree 0.0032, pedigree (1,3,3,1,1)
  EcoSpold01Location=UCTE
- refractory, fireclay, packed: 0.00715 kg; source International Aluminium Insitute 2015; lognormal variance with pedigree 0.0032, pedigree (1,3,3,1,1)
  Reported as "Refractory material" in IAI Survey
  properties: wet mass 1 kg, dry mass 1 kg
- inert waste, for final disposal: -0.02725 kg; name wasteInertAmount; = (wasteI_nonspecifiedWasteToLandfillAmou_0 +wasteI_refractoryWasteToRecyclingAmoun_0 +wasteI_refractoryWasteToLandfillAmount_0 +wasteI_nonspecifiedByproductsToRecycli_0 )*-1; source International Aluminium Insitute 2015; lognormal variance with pedigree 0.002, pedigree (1,1,3,1,1)
  Amount includes "Byproducts for external recycling", "Refractory material for external recycling", "Refractory (excluding SPL) sent to landfill" and "Other landfilled waste" in IAI report. If it becomes possible to specify byproducts and other landfilled waste, then these should be broken out of this total. Currently, no recycling process exists in ecoinvent for refractory material, and hence these are modelled as sent to landfill.
  EcoSpold01Location=CH
  Uncertainty: Uncertainty based entirely on uncertainty ofunderlying parameters.
  production volume 3.57235e8 kg; = wasteInertAmount* anodePrebakeProductionVolume
    Calculated from the production volume of anode and output of waste per reference flow.
  property amount of refractory material sent to landfill 0.005 kg; name wasteI_refractoryWasteToLandfillAmount_0
  property amount of non-specified waste to recycling 0.01 kg; name wasteI_nonspecifiedByproductsToRecycli_0
  property amount of refractory material sent to recycling 0.008 kg; name wasteI_refractoryWasteToRecyclingAmoun_0
  property price 0 EUR2005; name wasteInertAmount_price_EUR2005
  property amount of non-specified waste to landfill 0.00425 kg; name wasteI_nonspecifiedWasteToLandfillAmou_0
  properties: dry mass 0.995 kg, wet mass 1 kg, water content 0.00502513
- heat, district or industrial, other than natural gas: 0.0052716 MJ; = Net_Heat_Value_LFO *kgFuel_Input_LFO_diesel /fuel_use_LFO; source International Aluminium Insitute 2015; lognormal variance with pedigree 0.002, pedigree (1,1,3,1,1)
  Diesel combustion.
  Uncertainty: No uncertainty added - uncertainty should be based on propagation of the uncertainty of the underlying parameters.
  property heating value, net 42.7 MJ; name Net_Heat_Value_LFO
  property Corresponding fuel use 1.053 MJ; name fuel_use_LFO
  property fuel input in physical units, kg 0.00013 kg; name kgFuel_Input_LFO_diesel
- fly ash and scrubber sludge: -4.7e-5 kg; source International Aluminium Institute 2015; lognormal variance with pedigree 0.2106, pedigree (5,5,5,5,5)
  Used as a weak proxy for treatment of scrubber sludges
  production volume 616148 kg; = anodePrebakeProductionVolume * ((Ref('418ab7de-a8a5-4052-8773-e26b2a351338')*-1) / anodePrebakeAmount)
    Calculated from production volume of reference product using the relative outputs.
  properties: carbon content, fossil 0.167, wet mass 1 kg, water content 9, dry mass 0.1 kg
  note on carbon content, fossil: Tab A.6, ecoinvent v2.2 report 13_I. C content has been calculated after data in the tables, and then referred to 1 kg DM
- petroleum coke: 0.675 kg; source International Aluminium Insitute 2015; lognormal variance with pedigree 0.0032, pedigree (1,3,3,1,1)
  EcoSpold01Location=RER
  properties: carbon content, fossil 0.885, dry mass 1 kg, wet mass 1 kg
- heat, district or industrial, natural gas: 1.8316 MJ; = Net_Heat_Value_ng * m3fuel_use_ng/ fuel_use_ng; source International Aluminium Insitute 2015; lognormal variance with pedigree 0.002, pedigree (1,1,3,1,1)
  Natural gas combustion.
  Uncertainty: No uncertainty added - uncertainty should be based on propagation of the uncertainty of the underlying parameters.
  property heating value, net 40.4 MJ; name Net_Heat_Value_ng
  property Corresponding fuel use 1.04 MJ; name fuel_use_ng
  property fuel input in physical units, m3 0.04715 m3; name m3fuel_use_ng
  note on heating value, net: net (lower) heating (calorific) value. Based on European average as reported in Dones et al. 2007.
  note on Corresponding fuel use: Lower heating value of the fuel input related to the heat/electricity output, based on an efficiency of 96%
- anode factory: 2.5e-10 unit; source Classen M. 2008; lognormal variance with pedigree 0.5, pedigree (5,5,5,5,5)
  Rough estimate
  EcoSpold01Location=RER
  Uncertainty: rough guess

## Inputs from nature
- Water, cooling, unspecified natural origin [natural resource, in water]: 0.00195 m3; source International Aluminium Insitute 2015; lognormal variance with pedigree 0.0038, pedigree (2,3,3,1,1)
  Specified as freshwater in IAI report.
- Water, salt, ocean [natural resource, in water]: 0.00157 m3; source International Aluminium Insitute 2015; lognormal variance with pedigree 0.0038, pedigree (2,3,3,1,1)
  Specified as sea water in IAI report.

## Emissions to nature
- Hydrogen fluoride [air, unspecified]: 2.4e-5 kg; source International Aluminium Insitute 2015; lognormal variance with pedigree 0.0426, pedigree (1,3,3,1,1)
  Reported as F in IAI data,sum of particulate F and gaseous F
- PAH, polycyclic aromatic hydrocarbons [air, unspecified]: 5.3e-5 kg; source International Aluminium Insitute 2015; lognormal variance with pedigree 0.0026, pedigree (1,3,3,1,1)
  Uncertainty: Uncertainty calculated from that of underlying variables.
  property total PAH emission to air 5.1e-5 kg; name totalPAH
- Water [water, surface water]: 0.0017 m3; lognormal variance with pedigree 0.0038, pedigree (2,3,3,1,1)
  Reported as Fresh Water
- Water [water, ocean]: 0.0016 m3; source International Aluminium Insitute 2015; lognormal variance with pedigree 0.0032, pedigree (1,3,3,1,1)
- Fluoride [water, unspecified]: 9e-6 kg; source International Aluminium Insitute 2015; lognormal variance with pedigree 0.0046, pedigree (1,4,3,1,1)
- Nitrogen oxides [air, unspecified]: 0.000495 kg; source International Aluminium Insitute 2015; lognormal variance with pedigree 0.0426, pedigree (1,3,3,1,1)
- PAH, polycyclic aromatic hydrocarbons [water, unspecified]: 1e-8 kg; source International Aluminium Insitute 2015; lognormal variance with pedigree 0.0046, pedigree (1,4,3,1,1)
  Reported as PAH (6 Borneff components)
- Particulates, < 2.5 um [air, unspecified]: 8e-5 kg; source International Aluminium Insitute 2015; lognormal variance with pedigree 0.0032, pedigree (1,3,3,1,1)
  Reported IAI 2015
- Suspended solids, unspecified [water, unspecified]: 9e-5 kg; source International Aluminium Insitute 2015; lognormal variance with pedigree 0.0046, pedigree (1,4,3,1,1)
- Sulfur dioxide [air, unspecified]: 0.0043 kg; source International Aluminium Insitute 2015; lognormal variance with pedigree 0.0032, pedigree (1,3,3,1,1)
- Particulates, > 2.5 um, and < 10um [air, unspecified]: 0.00024 kg; source International Aluminium Insitute 2015; lognormal variance with pedigree 0.0046, pedigree (1,4,3,1,1)
- Benzo(a)pyrene [air, unspecified]: 5e-8 kg; name BaPAmount; source International Aluminium Insitute 2015; lognormal variance with pedigree 0.304, pedigree (1,4,3,1,1)
- Particulates, > 10 um [air, unspecified]: 0.00024 kg; source International Aluminium Insitute 2015; lognormal variance with pedigree 0.0046, pedigree (1,4,3,1,1)
- Oils, unspecified [water, unspecified]: 2e-5 kg; source International Aluminium Insitute 2015; lognormal variance with pedigree 0.0046, pedigree (1,4,3,1,1)
- Water [air, unspecified]: 0.00089 m3; source International Aluminium Insitute 2015; lognormal variance with pedigree 0.2106, pedigree (5,5,5,5,5)
  IAI data reported as "Fresh Water Consumption" plus "Sea Water consumption"

## Sampling procedure
2015 data is included where available from annual IAI surveys (electricity, fuel, petrol coke & pitch inputs). Other flows are based on a life cycle inventory survey carried out by IAI for its member and non member companies. The survey was conducted in 2016 for 2015 data. No LCI data collected from this region, hence weighted averages from global reported facilities are adopted.Energy data collected from IAI annual energy survey covers 57% of this regional production.

## Extrapolations
The infrastructure input was not covered by the IAI survey and uses the rough guess in ecoinvent 2.2.

## Review by Louis Brimacombe 2018-06-07
I advise that a comment in the general comments should bemade to explain that no CO2 emissions occur in this process because it is 'closed and non oxidising process with a carbon anode product. If this is the case.
