# treatment of used bicycle

Dataset: EcoSpold 2, unit process
Geography: RoW
Time period: 2007-01-01 to 2019-12-31
Technology level: current
Classification: ISIC rev.4 ecoinvent: 3830:Materials recovery
Classification: EcoSpold01Categories: transport systems/road
Tags: ConvertedDataset; Treatment
Scenario: Business-as-Usual
System model: Allocation at the point of substitution
Generated by: Marianne Leuenberger
Published in: Spielmann M. 2007
Database: ecoinvent
isCopyrightProtected: true
accessRestrictedTo: 1

## General comment
The data set reflects the disposal of a bike of 17kg. Aluminium and steel parts are fully recycled. Plastics are incinerated.
[This dataset was already contained in the ecoinvent database version 2. It was not individually updated during the transfer to ecoinvent version 3. Life Cycle Impact Assessment results may still have changed, as they are affected by changes in the supply chain, i.e. in other datasets. This dataset was generated following the ecoinvent quality guidelines for version 2. It may have been subject to central changes described in the ecoinvent version 3 change report (http://www.ecoinvent.org/database/ecoinvent-version-3/reports-of-changes/), and the results of the central updates were reviewed extensively. The changes added e.g. consistent water flows and other information throughout the database. The documentation of this dataset can be found in the ecoinvent reports of version 2, which are still available via the ecoinvent website. The change report linked above covers all central changes that were made during the conversion process.]

## Included activities end
This data set includes the disposal of all remaining parts, that are not recycled. All recycled parts are attributed to the reuse process (cut-off). Transport for recycled materials included.

## Geography
Data for disposal of vehicle parts in Europe.

## Reference product
- used bicycle: -1 unit; CPC 39990: Other wastes n.e.c.; By-product classification Waste
  EcoSpold01Location=CH
  production volume 3.96633 unit
    This is a placeholder value that does not reflect real-world production volumes. This dataset does not currently require a real-world production volume to work in the database framework, and no actual data were collected yet. This has no negative effect on the results of the ecoinvent database.
  property price 0 EUR2005
    Waste products are assigned a price of zero as they are assumed to require further treatment.
  property carbon content, non-fossil 0
    Calculated from C content in input materials in the infrastructure
  property carbon content, fossil 0.130184
    Calculated from C content in input materials in the infrastructure
  property carbon content 0.130184
    carbon content on a dry matter basis (reserved; not for manual entry)
  properties: water in wet mass 0 kg, water content 0, wet mass 17 kg, dry mass 17 kg, carbon allocation 2.21313 kg

## By-products
- heat, for reuse in municipal waste incineration only: 0 MJ; CPC 17300: Steam and hot water; By-product classification allocatable product; pedigree (1,1,1,1,1)
  Net electricity generated from this waste and used in internal MSWI plant energy redistribution.
  Uncertainty: uncertainty is calculated from uncertainties in waste composition and uncertainties in energy efficiency and the uncertainty in internal energy demand
  property exergy 0.1842 MJ; name E_th_prod_MSWI_exergy
    This exergy property is based on the exergy content of the product.
  property price 0.0106 EUR2005; name E_th_prod_MSWI_price_EUR2005
    Average European district heat price from Ecoheatcool and Euroheat 2005-2006, Ecoheat Work package 1: The European heat market. Final report. 10.6 EUR/GJ i s the price of district heat. http://www.solarthermalworld.org/files/Ecoheatcool%20WP1%20Web.pdf?download
  property true value relation 0.1842; name E_th_prod_MSWI_true_value_relation
    property to calculate "true value" from
- electricity, for reuse in municipal waste incineration only: 0 kWh; CPC 17100: Electrical energy; By-product classification allocatable product; pedigree (1,1,1,1,1)
  (same comment as for heat, for reuse in municipal waste incineration only)
  property price 0.1 EUR2005; name E_el_prod_MSWI_price_EUR2005
    Estimated to be the same price as in case of electricity, medium voltage.
  property exergy 3.6 MJ; name E_el_prod_MSWI_exergy
    This exergy property is based on the exergy content of the product.
  property true value relation 3.6; name E_el_prod_MSWI_true_value_relation
    property to calculate "true value" from

## Inputs from technosphere
- waste plastic, mixture: 0 kg; pedigree (1,1,1,1,1)
  Assumption for plastic recycling: all parts replaced once
  EcoSpold01Location=CH
  Uncertainty: Assumption for plastic recycling: all parts replaced once
  production volume 0 kg
    Calculated from the production volume of used bicycle in proportion to the respective output amounts.
  properties: carbon content, fossil 0.747344, water content 0.180638, dry mass 0.847 kg, wet mass 1 kg
  note on carbon content, fossil: C content in 1 kg DM was calculated using data in Tab A.2, ecoinvent v2.2 report 13_I
- zinc in car shredder residue: -0.091027 kg; lognormal variance with pedigree 0.0286, pedigree (2,1,4,5,3)
  EcoSpold01Location=CH
  Extrapolated from car disposal
  Uncertainty: Extrapolated from car disposal
  production volume 0.273081 kg
    (same comment as for waste plastic, mixture)
  properties: dry mass 1 kg, wet mass 1 kg
- waste rubber, unspecified: 0 kg; pedigree (1,1,1,1,1)
  50% of tyres to municipal incineration
  EcoSpold01Location=CH
  Uncertainty: 50% of tyres to municipal incineration
  production volume 0 kg
    (same comment as for waste plastic, mixture)
  properties: carbon content, fossil 0.853, wet mass 1 kg, dry mass 1 kg
- waste plastic, mixture: -0.221093, -0.0147726, -0.00111723, -0.00610161, -0.00246498, -0.00579405, -0.188382, -1.54777 kg (8 entries); lognormal variance with pedigree 0.036, pedigree (4,1,4,5,3)
  (same comment as for waste plastic, mixture)
  production volume 5.9625 kg
- waste rubber, unspecified: -0.140625, -0.140625 kg (2 entries); lognormal variance with pedigree 0.0286, pedigree (2,1,4,5,3)
  (same comment as for waste rubber, unspecified)
  production volume 0.84375 kg

## Sampling procedure
Literture

## Extrapolations
Some data derived from car disposal This dataset has been copied from an original dataset covering the geography CH. The uncertainty has been adjusted accordingly.

## Review by Christian Bauer 2010-02-07
26.01.2010
passed
C:\Dokumente und Einstellungen\Marianne\Eigene Dateien\Projekte\277_Mobitool\Review\[Ecospold_Disposal_ebikes-v1.1.xls]X-Process
