# uranium production, centrifuge, enriched 3.0%

Dataset: EcoSpold 2, unit process
Geography: RU
Time period: 1993-01-01 to 2019-12-31
Technology level: current
Classification: ISIC rev.4 ecoinvent: 2011:Manufacture of basic chemicals
Classification: EcoSpold01Categories: nuclear power/production
Tags: ConvertedDataset
Scenario: Business-as-Usual
System model: Allocation at the point of substitution
Generated by: Roberto Dones
Published in: Dones, R. 2007
Database: ecoinvent
isCopyrightProtected: true
accessRestrictedTo: 1

## General comment
This module uses a mix of data, some specific for the URENCO facilities taken from environmental reports, some from literature. Due to lack of information on Russian plants, all requirements and emissions are arbitrarily assumed the double of the URENCO module. Only (but still approximate) information available for TENEX facility is the electricity consumption by machines of two recent generations. A mix of generations has been assumed here, assuming conservatively a high value for auxiliary electricity (i.e., not directly used for spinning the centrifuges). The Russian electricity mix is used, which has been has been approximated using existing ecoinvent v2.0 electricity datasets for Europe. The factor for the infrastructure requirement is calculated with annual throughput of 1500 t SWU for 30 years operation (the Russian facilities are larger but this should not affect much the figures normalized by the total production).
[This dataset was already contained in the ecoinvent database version 2. It was not individually updated during the transfer to ecoinvent version 3. Life Cycle Impact Assessment results may still have changed, as they are affected by changes in the supply chain, i.e. in other datasets. This dataset was generated following the ecoinvent quality guidelines for version 2. It may have been subject to central changes described in the ecoinvent version 3 change report (http://www.ecoinvent.org/database/ecoinvent-version-3/reports-of-changes/), and the results of the central updates were reviewed extensively. The changes added e.g. consistent water flows and other information throughout the database. The documentation of this dataset can be found in the ecoinvent reports of version 2, which are still available via the ecoinvent website. The change report linked above covers all central changes that were made during the conversion process.]
[This dataset is meant to replace the following datasets:]

## Included activities end
The module is an extrapolation of the corresponding one for URENCO. The module includes: input of UF6; electricity, diesel, and natural gas used for operation; also taken into account is the material for replacement of centrifuge; water use, lubricant oil, and wastewater treatment; concrete assumed to be used for conditioning of contaminated scrap from decommissioning; transport requirements of operation materials, industrial wastes, and contaminated waste from decommissioning (25% of the reinforced concrete and the great part of metals according to the reference). Radioactive and non-radioactive emissions to air and to water from the operation are also included. The infrastructure requirements are accounted for, though construction and operation data partially refer to different plants rather than to one single unit.

## Geography
US and Western European data. Russian data for electricity uses.

## Technology
The technology used for uranium enrichment with centrifuge process in Russia is a mix of three generations of machines.

## Parameters
- fraction, cooling water, recirculating system, to air: 0.771; name fraction_CW_R_to_air; lognormal variance with pedigree 0.0413, pedigree (2,3,1,3,1)
  Calculated based on literature value (Scown, C.D., 2011, Water Footprint of U.S. Transportation Fuels and supplying information of the article) (Vionnet, S., Quantis Water Database - Technical Report, 2012).
- fraction, water, decarbonised, to air: 0.3875; name fraction_WDC_to_air; = fraction_CW_to_air; lognormal variance with pedigree 0.092025, pedigree (4,4,3,2,4)
  Calculated value. See comments in the other parametres present in this dataset. Decarbonised water is considered to be always used as cooling water, thus cooling water fractions to air are applied to all carbonised water input flows to calculate the amount of water consumed in the processes.
- fraction, cooling water, cooling pond system, to air: 0.032; name fraction_CW_CP_to_air; lognormal variance with pedigree 0.0413, pedigree (2,3,1,3,1)
  (same comment as for fraction, cooling water, recirculating system, to air)
- fraction, cooling water, to air: 0.3875; name fraction_CW_to_air; = (0.5*fraction_CW_OT_to_air)+(0.5*fraction_CW_R_to_air); lognormal variance with pedigree 0.092025, pedigree (4,4,3,2,4)
  Calculated value based on literature value (see comments of the other parametres present in this dataset) and expert opinion. In the case when no industry/literature data are available about the type of cooling or directly fraction, cooling water, to air specific for the process a default assumption is applied. It is assumed that the once-through cooling system is used in 50% of all cases and recirculating system is used in another 50% of all cases.
- fraction, cooling water, once-through system, to air: 0.004; name fraction_CW_OT_to_air; lognormal variance with pedigree 0.0413, pedigree (2,3,1,3,1)
  (same comment as for fraction, cooling water, recirculating system, to air)

## Reference product
- uranium, enriched 3.0%, per separative work unit: 1 unit; By-product classification allocatable product; CPC 33620: Uranium enriched in U235 and its compounds; plutonium and its compounds; alloys, dispersions, ceramic products[…]
  EcoSpold01Location=RU
  production volume 3.32e6 unit
    Total capacity: 16.6 million SWU (http://www.wise-uranium.org/efac.html#ENR). The distribution between enrichment grades is assumed to be the same for all facilities. The total production is here assumed to be split evenly over the 5 grades 3.0%, 3.8%, 3.9%, 4.2% and 4.0%
  property price 163.155 EUR2005
    Calculated based on inputs: The price of the product has been calculated as a sum of the values of the material and energy inputs for this product. This value is therefore a rough estimation. It may underestimate the real price since there are additional expenses when producing any product. These expences can include for example labour costs, treatment of waste materials and profit for the producer. Please consider carefully whether this level of data quality is acceptable for your application.
  property carbon content 0
    carbon content on a dry matter basis (reserved; not for manual entry)
  property true value 163.155
    allocation property applied in "true value" allocation // value calculated from revenue
  properties: dry mass 1 kg, carbon content, non-fossil 0, water content 0, wet mass 1 kg, water in wet mass 0 kg, carbon content, fossil 0, carbon allocation 0 kg

## By-products
- heat, for reuse in municipal waste incineration only: 0 MJ; CPC 17300: Steam and hot water; By-product classification allocatable product; pedigree (1,1,1,1,1)
  Net electricity generated from this waste and used in internal MSWI plant energy redistribution.
  Uncertainty: uncertainty is calculated from uncertainties in waste composition and uncertainties in energy efficiency and the uncertainty in internal energy demand
  production volume 455060 MJ
  property true value relation 0.1842; name E_th_prod_MSWI_true_value_relation
    property to calculate "true value" from
  property price 0.0106 EUR2005; name E_th_prod_MSWI_price_EUR2005
    Average European district heat price from Ecoheatcool and Euroheat 2005-2006, Ecoheat Work package 1: The European heat market. Final report. 10.6 EUR/GJ i s the price of district heat. http://www.solarthermalworld.org/files/Ecoheatcool%20WP1%20Web.pdf?download
  property exergy 0.1842 MJ; name E_th_prod_MSWI_exergy
    This exergy property is based on the exergy content of the product.
  property true value 0.000929559
    allocation property applied in "true value" allocation // value calculated from true value relation
- electricity, for reuse in municipal waste incineration only: 0 kWh; CPC 17100: Electrical energy; By-product classification allocatable product; pedigree (1,1,1,1,1)
  (same comment as for heat, for reuse in municipal waste incineration only)
  production volume 53389.5 kWh
  property price 0.1 EUR2005; name E_el_prod_MSWI_price_EUR2005
    Estimated to be the same price as in case of electricity, medium voltage.
  property true value relation 3.6; name E_el_prod_MSWI_true_value_relation
    property to calculate "true value" from
  property exergy 3.6 MJ; name E_el_prod_MSWI_exergy
    This exergy property is based on the exergy content of the product.
  property true value 0.00213146
    (same comment as for heat, for reuse in municipal waste incineration only)
- zinc concentrate: 0 kg; CPC 14290: Other non-ferrous metal ores and concentrates (other than uranium or thorium ores and concentrates); By-product classification allocatable product
  Calculated value from the knowledge of the properties of both products.
  production volume 1.72292e-7 kg
  property price 0.38 EUR2005; name ByP_price_EUR2005
    Temporary price data. Calculated as 90% of purchasers price based on: Zinc content in concentrate 53%. Concentrate price per kg Zn 86.5% of refined Zn price (13.5% treatment charges according to CHR Metals Limited 2005: Dynamic cost curves. http://www.minecost.com/dynamic.pdf). 2004 zinc price from USGS (2007) Mineral commodity summaries 2007. <http://minerals.usgs.gov/minerals/pubs/mcs/2007/mcs2007.pdf> [Accessed 25 May 2010]
  property zinc content 0.53; name zinc_C_zinc_concentrate
    Zinc content on a dry matter basis. Value taken from teh "zinc mine operation" /GLO dataset.
  property dry mass 1 kg; name DM_zinc_concentrate
  property carbon content 0
    carbon content on a dry matter basis (reserved; not for manual entry)
  property true value 1.97202e-14
    allocation property applied in "true value" allocation // value calculated from revenue
  properties: wet mass 1 kg, water content 0, carbon content, non-fossil 0, carbon content, fossil 0, water in wet mass 0 kg, carbon allocation 0 kg

## Inputs from technosphere
- spent anion exchange resin from potable water production: -0.115998 kg; lognormal variance with pedigree 0.16, pedigree (1,1,5,1,1)
  environmental report
  EcoSpold01Location=CH
  production volume 385120 kg
    Calculated from the production volume of uranium, enriched 3.0%, per separative work unit in proportion to the respective output amounts.
  properties: dry mass 0.5 kg, water content 1, wet mass 1 kg, carbon content, fossil 0.654
  note on carbon content, fossil: Tab A.12, ecoinvent v2.2 report 13_I, c content is referred to 1 kg DM
- hydrogen, liquid: 2.19996e-5 kg; lognormal variance with pedigree 0.16, pedigree (1,1,5,1,1)
  EcoSpold01Location=RER
  own estimation, lack of data
  properties: wet mass 1 kg, dry mass 1 kg
- water, decarbonised: 7.99985 kg; name water_decarbonised_input; lognormal variance with pedigree 0.16, pedigree (1,1,5,1,1)
  EcoSpold01Location=RER
  own estimation, lack of data
  properties: wet mass 1 kg
- electricity, high voltage: 73.5516 kWh; lognormal variance with pedigree 0.16, pedigree (1,1,5,1,1)
  own estimation after one source. Electricity taken from the local electricity market.
  EcoSpold01Location=PL
- electricity, high voltage: 21.4996 kWh; lognormal variance with pedigree 0.16, pedigree (1,1,5,1,1)
  own estimation after one source. Electricity produced in non-alpine reservoir hydropower plants.
- steel, low-alloyed, hot rolled: 0.299994 kg; lognormal variance with pedigree 0.16, pedigree (1,1,5,1,1)
  EcoSpold01Location=RER
  own estimation, lack of data
  properties: dry mass 1 kg, wet mass 1 kg, carbon content, fossil 0.005
  note on carbon content, fossil: Low alloyed steel composition given in Tab. 3.2 ecoinvent v2.2 report 10_partII. Steel assumed to have a C content of 0.5%
- concrete, normal: 0.000579989 m3; lognormal variance with pedigree 0.16, pedigree (1,1,5,1,1)
  EcoSpold01Location=CH
  own estimation, lack of data
  properties: wet mass 2380 kg, water content 0.086758, dry mass 2190 kg
- lubricating oil: 0.0183997 kg; lognormal variance with pedigree 0.16, pedigree (1,1,5,1,1)
  EcoSpold01Location=RER
  own estimation, lack of data
  properties: carbon content, fossil 0.75, dry mass 1 kg, wet mass 1 kg
  note on carbon content, fossil: Lubricating oil is produced from diesel. C-content/dry mass of fats and oils considered 75%, from: ecoinvent v2.2 report, n 15a, pg 40
- municipal solid waste: -0.469991 kg; lognormal variance with pedigree 0.16, pedigree (1,1,5,1,1)
  EcoSpold01Location=CH
  own estimation, lack of data
  production volume 1.5604e6 kg
    (same comment as for spent anion exchange resin from potable water production)
  properties: wet mass 1 kg, carbon content, fossil 0.171549, dry mass 0.771 kg, carbon content, non-fossil 0.261655, water content 0.297017
  note on carbon content, fossil: MSW composition in tab 4.1, ecoinvent v2.2 report 13_I. C content referred to 1 kg DM
- low level radioactive waste: -0.000629988 m3; lognormal variance with pedigree 0.16, pedigree (1,1,5,1,1)
  own estimation, lack of data
  EcoSpold01Location=CH
  production volume 2091.6 m3
    (same comment as for spent anion exchange resin from potable water production)
  properties: dry mass 2500 kg, wet mass 2500 kg
- uranium hexafluoride: 1.62997 kg; lognormal variance with pedigree 0.04, pedigree (1,1,5,1,1)
  EcoSpold01Location=US
  calculated
  properties: wet mass 1 kg, dry mass 1 kg
- aluminium, wrought alloy: 0.0999981 kg; lognormal variance with pedigree 0.16, pedigree (1,1,5,1,1)
  own estimation, lack of data
  EcoSpold01Location=RER
  properties: wet mass 1 kg, dry mass 1 kg
- oxygen, liquid: 7.19986e-5 kg; lognormal variance with pedigree 0.16, pedigree (1,1,5,1,1)
  EcoSpold01Location=RER
  own estimation, lack of data
  properties: dry mass 1 kg, wet mass 1 kg
- methanol: 0.000639988 kg; lognormal variance with pedigree 0.16, pedigree (1,1,5,1,1)
  own estimation, lack of data
  EcoSpold01Location=CH
  properties: wet mass 1 kg, dry mass 1 kg, carbon content, fossil 0.375
- electricity, high voltage: 7.87485 kWh; = 0.45*17.5; source Itten R. 2012; lognormal variance with pedigree 0.16, pedigree (1,1,5,1,1)
  own estimation after one source, which gives 17.5 kWh from nuclear sources. The split between boiling water reactors and pressure water reactores is based on data from Itten et al. 2012, who state 45% for BWR and 55% for PWR.
- hydrochloric acid, without water, in 30% solution state: 0.000399992 kg; lognormal variance with pedigree 0.16, pedigree (1,1,5,1,1)
  own estimation, lack of data
  EcoSpold01Location=RER
  properties: wet mass 1 kg, dry mass 1 kg
- argon, liquid: 0.00359993 kg; lognormal variance with pedigree 0.16, pedigree (1,1,5,1,1)
  own estimation, lack of data
  EcoSpold01Location=RER
  properties: wet mass 1 kg, dry mass 1 kg
- nitrogen, liquid: 0.000779985 kg; lognormal variance with pedigree 0.16, pedigree (1,1,5,1,1)
  EcoSpold01Location=RER
  own estimation, lack of data
  properties: wet mass 1 kg, dry mass 1 kg
- heat, district or industrial, natural gas: 27.3595 MJ; lognormal variance with pedigree 0.16, pedigree (1,1,5,1,1)
  EcoSpold01Location=RER
  own estimation, lack of data
- brass: 0.00359993 kg; lognormal variance with pedigree 0.16, pedigree (1,1,5,1,1)
  own estimation, lack of data
  EcoSpold01Location=CH
  properties: dry mass 1 kg, wet mass 1 kg
- chemical, organic: 0.00163997 kg; lognormal variance with pedigree 0.16, pedigree (1,1,5,1,1)
  EcoSpold01Location=GLO
  own estimation, lack of data
  properties: dry mass 1 kg, wet mass 1 kg, carbon content, fossil 0.628
  note on carbon content, fossil: This dataset is an unweighted average of 20 organic substances (listed in Tab 88.1, ecoinvent v2.2 report 8, part II), being part of the top100 chemicals included in this database. The C-content has also been calculated as an unweighted average of the C content of the substances composing this dataset.
- acetylene: 4.99991e-5 kg; lognormal variance with pedigree 0.16, pedigree (1,1,5,1,1)
  EcoSpold01Location=CH
  own estimation, lack of data
  properties: carbon content, fossil 0.923077, wet mass 1 kg, dry mass 1 kg
  note on carbon content, fossil: C2H2. ecoinvent v2.2 report n 8. Produced from partial oxidation of natural gas
- nitric acid, without water, in 50% solution state: 0.00299994 kg; lognormal variance with pedigree 0.16, pedigree (1,1,5,1,1)
  EcoSpold01Location=RER
  own estimation, lack of data
  properties: dry mass 1 kg, wet mass 1 kg
- chemical, inorganic: 0.0621988 kg; lognormal variance with pedigree 0.16, pedigree (1,1,5,1,1)
  own estimation, lack of data
  EcoSpold01Location=GLO
  properties: wet mass 1 kg, dry mass 1 kg, carbon content, fossil 0.003
  note on carbon content, fossil: This dataset is an unweighted average of 20 inorganic substances (listed in Tab 88.1, ecoinvent v2.2 report 8, part II), being part of the top100 chemicals included in this database. The C-content has also been calculated as an unweighted average of the C content of the substances composing this dataset.
- hydrogen peroxide, without water, in 50% solution state: 0.00139997 kg; lognormal variance with pedigree 0.16, pedigree (1,1,5,1,1)
  EcoSpold01Location=RER
  own estimation, lack of data
  properties: dry mass 1 kg, wet mass 1 kg
- soap: 0.00179997 kg; lognormal variance with pedigree 0.16, pedigree (1,1,5,1,1)
  EcoSpold01Location=RER
  own estimation, lack of data
  properties: wet mass 1 kg, water content 0.149425, dry mass 0.87 kg, carbon content, non-fossil 0.692237
  note on carbon content, non-fossil: Soap (CnH2n+1 COO Na) is produced by a combined saponification and neutralisation process performed on a blend of oleochemical feedstocks comprised of short chain (C12-14, derived from coconut or palm kernel oil) and long chain (C16-18, from tallow or palm oil) esters.The ratio of short to long fatty acid chains is 20:80 (ecoinvent v2.2 report 12). Short fatty acid has been estimated as C12.5H(2*12.5+1); MW R=176 g/mol. Long fatty acid has been estimated as C16H(2*16+1); MW R=225 g/mol. MW of COONa=67 g/mol
- uranium enrichment centrifuge facility: 2.21996e-8 unit; lognormal variance with pedigree 0.16, pedigree (1,1,5,1,1)
  own estimation, lack of data;activityLink introduced to establish a direct link to the corresponding regional supply of this product
  EcoSpold01Location=RU
- waste mineral oil: -0.00479991 kg; lognormal variance with pedigree 0.16, pedigree (1,1,5,1,1)
  own estimation, lack of data
  EcoSpold01Location=CH
  production volume 15936 kg
    (same comment as for spent anion exchange resin from potable water production)
  properties: carbon content, fossil 0.864444, dry mass 0.9 kg, water content 0.111111, wet mass 1 kg
  note on carbon content, fossil: Tab A.6, ecoinvent v2.2 report 13_I. C content has been calculated after data in the tables, and then referred to 1 kg DM
- polyvinylchloride, bulk polymerised: 0.00169997 kg; lognormal variance with pedigree 0.16, pedigree (1,1,5,1,1)
  own estimation, lack of data
  EcoSpold01Location=RER
  properties: dry mass 1 kg, wet mass 1 kg, carbon content, fossil 0.387097
  note on carbon content, fossil: Monomer is vynyl chloride, C2H3Cl (ecoinvent v2.2 report 11_II). MW=62 g/mol
- electricity, high voltage: 9.62482 kWh; = 0.55*17.5; source Itten R. 2012; lognormal variance with pedigree 0.16, pedigree (1,1,5,1,1)
  (same comment as for electricity, high voltage)
- sodium hydroxide, without water, in 50% solution state: 0.00559989 kg; lognormal variance with pedigree 0.16, pedigree (1,1,5,1,1)
  own estimation, lack of data
  EcoSpold01Location=RER
  properties: dry mass 1 kg, wet mass 1 kg
- phosphoric acid, fertiliser grade, without water, in 70% solution state: 0.000239995 kg; lognormal variance with pedigree 0.16, pedigree (1,1,5,1,1)
  own estimation, lack of data
  EcoSpold01Location=GLO
  properties: dry mass 1 kg, wet mass 1 kg

## Emissions to nature
- Nitrate [water, surface water]: 0.00499991 kg; lognormal variance with pedigree 0.16, pedigree (1,1,5,1,1)
  own estimation, lack of data
- Ethane, 1,1,1,2-tetrafluoro-, HFC-134a [air, non-urban air or from high stacks]: 0.00051999 kg; lognormal variance with pedigree 0.16, pedigree (1,1,5,1,1)
  own estimation, lack of data
- Water [water, unspecified]: 0.00489991 m3; name water_to_water_unspecified; = (water_decarbonised_input/1000)*(1-fraction_WDC_to_air); lognormal variance with pedigree 0.0807, pedigree (2,2,5,1,1)
  Calculated value based on literature values and expert opinion. See comments in the parametres' comment field.
  property fraction, origin: salt water 0; name fraction_origin_salt_water_Ww
  property fraction, origin: unspecified 0; name fraction_origin_unspecified_Ww
  property fraction, origin: fresh water 1; name fraction_origin_fresh_water_Ww
  property carbon content, fossil 0; name C_content_fossil
  property dry mass 0 kg; name DM
  property wet mass 1000 kg; name WM
  property water in wet mass 1000 kg; name WWM
  property carbon content, non-fossil 0; name C_content_non_fossil
- Uranium alpha [air, non-urban air or from high stacks]: 0.000115998 kBq; lognormal variance with pedigree 0.16, pedigree (1,1,5,1,1)
  own estimation, lack of data
- Thorium-234 [air, non-urban air or from high stacks]: 0.000579989 kBq; lognormal variance with pedigree 0.16, pedigree (1,1,5,1,1)
  own estimation, lack of data
- Water [air, unspecified]: 0.00309994 m3; name water_to_air_unspecified; = (water_decarbonised_input/1000*fraction_WDC_to_air); lognormal variance with pedigree 0.0807, pedigree (2,2,5,1,1)
  (same comment as for Water)
  property fraction, origin: unspecified 0; name fraction_origin_unspecified
  property fraction, origin: fresh water 1; name fraction_origin_fresh_water
  property fraction, origin: salt water 0; name fraction_origin_salt_water
- Aluminium [water, surface water]: 0.00219996 kg; lognormal variance with pedigree 0.16, pedigree (1,1,5,1,1)
  own estimation, lack of data
- Hydrogen fluoride [air, non-urban air or from high stacks]: 7.39986e-8 kg; lognormal variance with pedigree 0.16, pedigree (1,1,5,1,1)
  own estimation, lack of data
- Hydrocarbons, unspecified [water, surface water]: 0.000121998 kg; lognormal variance with pedigree 0.16, pedigree (1,1,5,1,1)
  own estimation, lack of data
- Chromium, ion [water, surface water]: 7.59986e-6 kg; lognormal variance with pedigree 0.16, pedigree (1,1,5,1,1)
  own estimation, lack of data
- Thorium-234 [water, surface water]: 0.00619988 kBq; lognormal variance with pedigree 0.16, pedigree (1,1,5,1,1)
  own estimation, lack of data
- Fluoride [water, surface water]: 0.000219996 kg; lognormal variance with pedigree 0.16, pedigree (1,1,5,1,1)
  own estimation, lack of data
- Phosphate [water, surface water]: 0.000679987 kg; lognormal variance with pedigree 0.16, pedigree (1,1,5,1,1)
  own estimation, lack of data
- Ethanol [air, non-urban air or from high stacks]: 0.00259995 kg; lognormal variance with pedigree 0.16, pedigree (1,1,5,1,1)
  own estimation, lack of data
- Uranium alpha [water, surface water]: 1.63997e-5 kBq; lognormal variance with pedigree 0.16, pedigree (1,1,5,1,1)
  own estimation, lack of data
- Copper, ion [water, surface water]: 2.59995e-6 kg; lognormal variance with pedigree 0.16, pedigree (1,1,5,1,1)
  own estimation, lack of data
- Zinc, ion [water, surface water]: 7.59986e-5 kg; lognormal variance with pedigree 0.16, pedigree (1,1,5,1,1)
  own estimation, lack of data

## Sampling procedure
Literature

## Review by Thomas Nemecek 2007-08-24
Passed.
