# mandarin production, sorted and graded

Dataset: EcoSpold 2, unit process
Geography: RoW
Time period: 2015-01-01 to 2019-12-31
Technology level: current
Classification: ISIC rev.4 ecoinvent: 0123:Growing of citrus fruits
Synonyms: Soft Citrus; Tangerine; Satsumas; Clementine
Tags: combined production
Scenario: Business-as-Usual
System model: Allocation at the point of substitution
Generated by: [System]
Published in: Russo, V. 2017
Database: ecoinvent
isCopyrightProtected: true
accessRestrictedTo: 1

## General comment
This dataset is a copy of the South African dataset which model the packhouse facilities of the soft citrus value chain.
The dataset describes the packhouse stage of the mandarin value chain. The reference flow is 1kg of fresh grade mandarin to be sent to the market and processing grade mandarin that is sent to the food industry (juices, canned fruit...). After being harvested, mandarins are sent to packhouses for sorting/grading and packing. The mandarins are jumble packed meaning that they aren't packed in a specific pattern, but boxes are filled to a specific weight (15 kg). Details on the packaging material required are given below.
POLYPROPYLENE, GRANULATE AND THE EXTRUSION OF POLYPROPYLENE: are used to model plastic bins which are made of polypropylene and have a lifespan of 30 years (Jumbo Bin in the fruit growing industry; Mpac Plastic Continers). A 0.00026 kg of polypropylene is used per 1kg of sorted and graded mandarin.
PACKAGING FILM, LOW DENSITY POLYETHYLENE: 0.000153 kg of packaging film are used per 1 kg fo sorted and graded mandarin. Packaing films are used to pack the boxes when they are placed onto pallets.
KRAFT PAPER, BLEACHED: 0.000245 kg of kraft paper are use per k1 of sorted and graded mandarin. Soft citrus fruit for local and export market is either packed loosely in cardboard boxes with inner packaging consisting of pulp (kraft paper).
CORRUGATED CARDBARD: 0.07647 kg of corrugated cardbard for 1 kg of sorted and graded mandarin. The amount of corrugated board used was calculated to 57.2 kg corrugated board / ton of soft citrus marketed and then scaled to the reference flow of 1 kg. Data came from different packhouse from different subregions in WC province.

## Included activities start
The activity starts with the mandarin transported from the orchard to the packhouse facilities.

## Included activities end
The activity ends with the mandarins sorted by grade and ready for the market. Packaging is excluded. From the farm the fruit is transported in crates (plastic or wooden) in small trucks or trailers pulled by tractors for shroter distances or large vehicles for longer distances to the centralised packhouses which are generally off-site (Ortmann, 2005). From here the fruit is taken to the packaging lines where it is graded and sorted and thereafter packed into corrugated cardboard boxes, which are then packed onto pallets with dimension 1x1.2 m. The activity includes the facility and the machineries (building hall and conveyor belts).

## Geography
This dataset is a copy of the South African dataset which model the packhouse facilities of the soft citrus value chain. Uncertainty has been modified accordingly.

## Reference product
- mandarin, fresh grade: 0 kg; name RP; By-product classification allocatable product; CPC 01324: Tangerines, mandarins, clementines; pedigree (1,1,1,1,1)
  The reference flow is 1kg of fresh grade mandarin to be sent to the market and processing grade mandarin to be sent to the food industry to be further processed.The fresh grade mandarin represent the 86.59% of the mandarin that comes from the farm stage.
  production volume 0 kg; name APV_glo
    Tot Production volume as per FAO 2014 Mandarin production = 30418767000 kg; Mandarin consumer grade are 86,59% of the tot PV
  property amount in mass units 0.881057; name RP_amount_kg; = 1/(1+0.135)
    Combined mass of mandarin, fresh grade and mandarin, processing grade.
  property price 0.71 EUR2005
    Literature. CGA. (2016). Key Industry Statistics for Citrus Growers 2016. Durban, South Africa: Citrus Growers’ Association of South Africa.
  property carbon content 0.38412
    carbon content on a dry matter basis (reserved; not for manual entry)
  properties: wet mass 1 kg, water in wet mass 0.47026 kg, carbon content, non-fossil 0.38412, dry mass 0.52974 kg, carbon content, fossil 0, water content 0.887719, carbon allocation 0.203484 kg
- mandarin, processing grade: 1 kg; name RP1; By-product classification allocatable product; CPC 01324: Tangerines, mandarins, clementines; pedigree (1,1,1,1,1)
  The reference flow is 1kg of fresh grade mandarin to be sent to the market and processing grade mandarin to be sent to the food industry to be further processed (juicing or canning). This represents the 11,69% of the mandarin that comes from the farm stage.
  production volume 3.55571e11 kg
    Tot Production volume as per FAO 2014 Mandarin production = 30418767000 kg; Mandarin processing grade are 11,69% of the tot PV
  property amount in mass units 0.118943; name RP1_1_amount_kg; = 0.135/(1+0.135)
    Combined mass of mandarin, fresh grade and mandarin, processing grade.
  property price 0.03 EUR2005
    (same comment as for mandarin, fresh grade)
  property carbon content 0.38412
    carbon content on a dry matter basis (reserved; not for manual entry)
  property true value 0.00405; name RP1_true_value
    allocation property applied in "true value" allocation // value calculated from revenue
  properties: carbon content, fossil 0, dry mass 0.52974 kg, water in wet mass 0.47026 kg, carbon content, non-fossil 0.38412, wet mass 1 kg, water content 0.887719, carbon allocation 0.203484 kg

## By-products
- heat, for reuse in municipal waste incineration only: 0 MJ; CPC 17300: Steam and hot water; By-product classification allocatable product; pedigree (1,1,1,1,1)
  Net useful heat generated from this waste and used in internal MSWI plant energy redistribution.
  Uncertainty: uncertainty is calculated from uncertainties in waste composition and uncertainties in energy efficiency and the uncertainty in internal energy demand
  production volume 2.68e10 MJ
  property exergy 0.1842 MJ; name E_th_prod_MSWI_exergy
    This exergy property is based on the exergy content of the product.
  property true value relation 0.1842; name E_th_prod_MSWI_true_value_relation
    property to calculate "true value" from
  property price 0.0106 EUR2005; name E_th_prod_MSWI_price_EUR2005
    Average European district heat price from Ecoheatcool and Euroheat 2005-2006, Ecoheat Work package 1: The European heat market. Final report. 10.6 EUR/GJ i s the price of district heat. http://www.solarthermalworld.org/files/Ecoheatcool%20WP1%20Web.pdf?download
  property true value 8.28504e-6
    allocation property applied in "true value" allocation // value calculated from true value relation
- electricity, for reuse in municipal waste incineration only: 0 kWh; CPC 17100: Electrical energy; By-product classification allocatable product; pedigree (1,1,1,1,1)
  Net electricity generated from this waste and used in internal MSWI plant energy redistribution.
  Uncertainty: uncertainty is calculated from uncertainties in waste composition and uncertainties in energy efficiency and the uncertainty in internal energy demand
  production volume 2.97744e9 kWh
  property true value relation 3.6; name E_el_prod_MSWI_true_value_relation
    property to calculate "true value" from
  property exergy 3.6 MJ; name E_el_prod_MSWI_exergy
    This exergy property is based on the exergy content of the product.
  property price 0.1 EUR2005; name E_el_prod_MSWI_price_EUR2005
    Estimated to be the same price as in case of electricity, medium voltage.
  property true value 1.79894e-5
    (same comment as for heat, for reuse in municipal waste incineration only)
- zinc concentrate: 0 kg; CPC 14290: Other non-ferrous metal ores and concentrates (other than uranium or thorium ores and concentrates); By-product classification allocatable product
  Calculated value from the knowledge of the properties of both products.
  production volume 4.2572e6 kg
  property price 0.38 EUR2005; name ByP_price_EUR2005
    Temporary price data. Calculated as 90% of purchasers price based on: Zinc content in concentrate 53%. Concentrate price per kg Zn 86.5% of refined Zn price (13.5% treatment charges according to CHR Metals Limited 2005: Dynamic cost curves. http://www.minecost.com/dynamic.pdf). 2004 zinc price from USGS (2007) Mineral commodity summaries 2007. <http://minerals.usgs.gov/minerals/pubs/mcs/2007/mcs2007.pdf> [Accessed 25 May 2010]
  property zinc content 0.53; name zinc_C_zinc_concentrate
    Zinc content on a dry matter basis. Value taken from teh "zinc mine operation" /GLO dataset.
  property dry mass 1 kg; name DM_zinc_concentrate
  property carbon content 0
    carbon content on a dry matter basis (reserved; not for manual entry)
  property true value 7.3055e-8
    allocation property applied in "true value" allocation // value calculated from revenue
  properties: wet mass 1 kg, water content 0, carbon content, non-fossil 0, carbon content, fossil 0, water in wet mass 0 kg, carbon allocation 0 kg
- biogas: 0 m3; source Raboni, Massimo 2014; By-product classification allocatable product; CPC 17200: Coal gas, water gas, producer gas and similar gases, other than petroleum gases and other gaseous hydrocarbons; pedigree (1,1,1,1,1)
  An average yield of 100 litres of biogas per kg biowaste is assumed
  production volume 1.01537e9 m3
  property carbon content, non-fossil 0.449939
    Total C content in kg/Nm3 (Tab 12.8, ecoinvent v2.2 report n17), referred to 1kg DM
  property price 0.109 EUR2005; name biogas_yield_price_EUR2005
    Temporary price data. Calculated as 90% of purchasers price based on: Same prices per energy output as natural gas, based on the proportional lower heating value (2/3 that of natural gas)
  property carbon content 0.449939
    carbon content on a dry matter basis (reserved; not for manual entry)
  property true value 4.99795e-6
    allocation property applied in "true value" allocation // value calculated from revenue
  properties: dry mass 1.15 kg, wet mass 1.15 kg, carbon content, fossil 0, water content 0, lower heating value 0 MJ/Nm3, water in wet mass 0 kg, carbon allocation 0.51743 kg
- compost: 0 kg; CPC 391: Wastes from food and tobacco industry; By-product classification allocatable product; pedigree (1,1,1,1,1)
  EcoSpold01Location=CH
  Biowaste is reduced in mass by a factor of 2 during composting
  production volume 9.39586e9 kg
  property nitrogen content 0.0136364; name Mass_compost_N_content; = Mass_biowaste_N_content/0.5*( DM_biowaste / DM_compost)
    nitrogen content on a dry matter basis
  property water in wet mass 0.472 kg; name Water_in_wet_mass_compost; = 1- DM_compost
  property price 0.03 EUR2005
    Temporary price data. Calculated as 90% of purchasers price based on: Estimation done using the following sources: <http://www.wmaa.asn.au/uploads/documents/MarkWinser_1May2007.pdf>; <http://www.swlf.ait.ac.th/UpdData/International/Composting%20and%20anaerobic%20digestion_%20comparions%20for%20Europe%20and%20Asia.pdf>; <http://www.epa.gov/osw/conserve/rrr/composting/basic.htm>, accessed 2011.06.16
  property carbon content, non-fossil 0.1165
    calculation: dry matter 50%, organic matter 40% of dry matter, C content calculated from organic matter divided by 1.72. Relative to dry matter; relative to fresh matter: divided by 2 => 0.1156
  property dry mass 0.528 kg; name DM_compost
  property water content 0.893939; name Water_content_compost; = Water_in_wet_mass_compost/DM_compost
  property concentration, cadmium 0 kg/kg; name Mass_compost_concentration_Cd; = Mass_biowaste_concentration_Cd*2
    Biowaste mass is reduced by a factor of two during composting, therefore concentration is doubled
  property humus equivalent 0.061 kg
    Humus building fraction expressed in kg per kg product on a FM basis. Humus denotes the converted, primary biomass from plants or animals in the ground. More information can be found in the documentation of the composting itself: "treatment of biowaste, industrial composting".
  property concentration, copper 0 kg/kg; name Mass_compost_concentration_Cu; = Mass_biowaste_concentration_Cu*2
    (same comment as for compost)
  property concentration, calcium 0 kg/kg; name Mass_compost_Ca_concentration; = Mass_biowaste_concentration_Ca*2
    (same comment as for compost)
  property concentration, magnesium 0 kg/kg; name Mass_compost_Mg_concentration; = Mass_biowaste_concentration_Mg*2
    (same comment as for compost)
  property concentration, mercury 0 kg/kg; name Mass_compost_Hg_concentration; = Mass_biowaste_concentration_Hg*2
    (same comment as for compost)
  property concentration, lead 0 kg/kg; name Mass_compost_concentration_Pb; = Mass_biowaste_concentration_Pb*2
    (same comment as for compost)
  property concentration, nickel 0 kg/kg; name Mass_compost_Ni_concentration; = Mass_biowaste_concentration_Ni*2
    (same comment as for compost)
  property concentration, phosphorus 0 kg/kg; name Mass_compost_P_concentration; = Mass_biowaste_concentration_P*2
    (same comment as for compost)
  property concentration, sulfur 0 kg/kg; name Mass_compost_concentration_S; = Mass_biowaste_concentration_S*2
    (same comment as for compost)
  property concentration, potassium 0 kg/kg; name Mass_compost_K_concentration; = Mass_biowaste_concentration_K*2
    (same comment as for compost)
  property nickel content 1.60606e-5; name Mass_compost_Ni_content; = Mass_biowaste_Ni_content/0.5*( DM_biowaste / DM_compost)
    nickel content on a dry matter basis
  property concentration, nitrogen 0 kg/kg; = Mass_biowaste_concentration_N*2
    (same comment as for compost)
  property concentration, zinc 0 kg/kg; name Mass_compost_concentration_Zn; = Mass_biowaste_concentration_Zn*2
    (same comment as for compost)
  property lead content 2.66667e-5; name Mass_compost_Pb_content; = Mass_biowaste_Pb_content/0.5*( DM_biowaste / DM_compost)
    lead content on a dry matter basis
  property copper content 3.81818e-5; name Mass_compost_Cu_content; = Mass_biowaste_Cu_content/0.5*( DM_biowaste / DM_compost)
    copper content on a dry matter basis
  property cadmium content 2.89394e-7; name Mass_compost_Cd_content; = Mass_biowaste_Cd_content/0.5*( DM_biowaste / DM_compost)
    cadmium content on a dry matter basis
  property magnesium content 0.00525758; name Mass_compost_Mg_content; = Mass_biowaste_Mg_content/0.5*( DM_biowaste / DM_compost)
    magnesium content on a dry matter basis
  property zinc content 0.000120303; name Mass_compost_Zn_content; = Mass_biowaste_Zn_content/0.5*( DM_biowaste / DM_compost)
    zinc content on a dry matter basis
  property potassium content 0.0099697; name Mass_compost_K_content; = Mass_biowaste_K_content/0.5*( DM_biowaste / DM_compost)
    potassium content on a dry matter basis
  property sulfur content 0.00190909; name Mass_compost_S_content; = Mass_biowaste_S_content/0.5*( DM_biowaste / DM_compost)
    sulfur content on a dry matter basis
  property calcium content 0.0504545; name Mass_compost_Ca_content; = Mass_biowaste_Ca_content/0.5*( DM_biowaste / DM_compost)
    calcium content on a dry matter basis
  property mercury content 1e-7; name Mass_compost_Hg_content; = Mass_biowaste_Hg_content/0.5*( DM_biowaste / DM_compost)
    mercury content on a dry matter basis
  property phosphorus content 0.00275758; name Mass_compost_P_content; = Mass_biowaste_P_content/0.5*( DM_biowaste / DM_compost)
    phosphorus content on a dry matter basis
  property carbon content 0.1165
    carbon content on a dry matter basis (reserved; not for manual entry)
  property true value 1.27292e-5
    allocation property applied in "true value" allocation // value calculated from revenue
  properties: carbon content, fossil 0, wet mass 1 kg, carbon allocation 0.061512 kg
- iron scrap, sorted, pressed: 0 kg; By-product classification Recyclable; CPC 39310: Slag, dross, scalings and other waste from the manufacture of iron or steel; pedigree (1,1,1,1,1)
  Iron scrap recovered from this waste.
  Uncertainty: uncertainty calculated from uncertainty in waste composition, uncertainty of share of recyclable metal, uncertainty of transfer coefficient to bottom ash, uncertainty of the efficiency of scrap removal in MSWI plant.
  production volume 3372.87 kg
  property price 0.175 EUR2005
    Temporary price data. Calculated as 90% of purchasers price based on: 2005 import and export prices (total trades (USD) divided by total weight (kg) in biggest economies of the world: EU27, USA, Brasil, China, India, Japan and Russia) from UN Commodity Trade Statistics Database (http://data.un.org/Explorer.aspxDatabase [Accessed 2011.06.20]). Commodity: Waste or scrap, of cast iron
  property carbon content 0
    carbon content on a dry matter basis (reserved; not for manual entry)
  property true value 2.6655e-11
    allocation property applied in "true value" allocation // value calculated from revenue
  properties: carbon content, fossil 0, dry mass 1 kg, carbon content, non-fossil 0, water in wet mass 0 kg, wet mass 1 kg, water content 0, carbon allocation 0 kg
- iron scrap, unsorted: 0 kg; source European Aluminium Association 2008; CPC 39310: Slag, dross, scalings and other waste from the manufacture of iron or steel; By-product classification Recyclable; pedigree (1,1,1,1,1)
  production volume 0.475774 kg
  property price 0.149 EUR2005; name ironScrapAmount_price_EUR2005
    Temporary price data. Calculated as 90% of purchasers price based on: estimated at 85% of sorted scrap
  property carbon content 0
    carbon content on a dry matter basis (reserved; not for manual entry)
  property true value 3.20132e-15
    allocation property applied in "true value" allocation // value calculated from revenue
  properties: water in wet mass 0 kg, water content 0, carbon content, fossil 0, carbon content, non-fossil 0, dry mass 1 kg, wet mass 1 kg, carbon allocation 0 kg
- aluminium oxide, non-metallurgical: 0 kg; source European Aluminium Association 2008; CPC 41432: Alumina (aluminium oxide), except artificial corundum; By-product classification allocatable product; CAS 1344-28-1; pedigree (1,1,1,1,1)
  production volume 29.9386 kg
  property carbon content, non-fossil 0; name C_content_non_fossil
  property price 0.28 EUR2005; name Al2O3Amount_price_EUR2005
    From UN trade database. http://data.un.org/ Import data from the largest economies of the world are used (Brazil, India, USA, China, Japan and EU-27).
  property dry mass 1 kg; name DM
  property water content 0; name water_content
  property wet mass 1 kg; name WM
  property water in wet mass 0 kg; name WWM
  property carbon content, fossil 0; name C_content_fossil
  property carbon content 0
    carbon content on a dry matter basis (reserved; not for manual entry)
  property true value 3.78558e-13
    allocation property applied in "true value" allocation // value calculated from revenue
  properties: carbon allocation 0 kg
- aluminium, cast alloy: 0 kg; source European Aluminium Association 2008; By-product classification allocatable product; CPC 41431: Unwrought aluminium; pedigree (1,1,1,1,1)
  EcoSpold01Location=RER
  production volume 279.86 kg
  property price 1.3 EUR2005; name castAlloyAmount_price_EUR2005
    Temporary price data. Calculated as 90% of purchasers price based on: Source: London Metal Exchange, Aluminium alloy price for 2005
  property carbon content 0
    carbon content on a dry matter basis (reserved; not for manual entry)
  property true value 1.64296e-11
    allocation property applied in "true value" allocation // value calculated from revenue
  properties: water in wet mass 0 kg, carbon content, non-fossil 0, water content 0, dry mass 1 kg, carbon content, fossil 0, wet mass 1 kg, carbon allocation 0 kg
- aluminium, wrought alloy: 0 kg; source European Aluminium Association 2008; By-product classification allocatable product; CPC 4153: Semi-finished products of aluminium or aluminium alloys; pedigree (1,1,1,1,1)
  production volume 122.517 kg
  property price 1.44 EUR2005; name secondaryAluminiumOutput_price_EUR2005
    Estimated based on literature values and expert judgement. Aluminium ccast alloys are about 90% of the price of aluminium wrought alloys.
  property carbon content 0
    carbon content on a dry matter basis (reserved; not for manual entry)
  property true value 7.96713e-12
    allocation property applied in "true value" allocation // value calculated from revenue
  properties: wet mass 1 kg, water content 0, carbon content, fossil 0, water in wet mass 0 kg, carbon content, non-fossil 0, dry mass 1 kg, carbon allocation 0 kg
- copper: 0 kg; source Rentz O. 1999; By-product classification allocatable product; CPC 41413: Refined copper and copper alloys, unwrought; master alloys of copper
  Literature value. Copper uses: Before end-use copper is manufactured into semi fabricated products, such as shapes and ingots (known as 'semis'). These manufacturing processes are subdivided into hot working, cold working and, if necessary, process annealing. Few of the semis are ready for use as such. They more typically travel to first-stage manufacturers, who make metal rods, wire, and casting, and then to component manufacturers who produce such things as motors, valves, and insulated cables The components in turn are incorporated by final-stage manufacturers into a variety of finished products - automobiles, commercial buildings, residential housing, and so forth. These uses account for about 79% of the world-wide consumption of copper.
  production volume 32.4824 kg
  property price 5.52 EUR2005
    Literature value (http://www.economist.com/news/business/21576714-mining-industry-has-enriched-chile-its-future-precarious-copper-solution). Average price between 20015 and 2013.
  property carbon content 0
    carbon content on a dry matter basis (reserved; not for manual entry)
  property true value 8.09708e-12
    allocation property applied in "true value" allocation // value calculated from revenue
  properties: dry mass 1 kg, water in wet mass 0 kg, wet mass 1 kg, carbon content, non-fossil 0, water content 0, carbon content, fossil 0, carbon allocation 0 kg

## Inputs from technosphere
- mandarin: 1.00655 kg; = 1.154863*(RP/1.135)+1.154863*(RP1/1.135); lognormal variance with pedigree 0.0029, pedigree (2,2,2,5,1)
  Mandaring from the farm
  properties: wet mass 1 kg, carbon content, non-fossil 0.384123, water content 0.842, dry mass 0.542888 kg
- biowaste: -0.017312 kg; name RP2; = (0.019863*(RP/1.135)+0.019863*(RP1/1.135))*-1; lognormal variance with pedigree 0.0029, pedigree (2,2,2,5,1)
  This accounts for the wastes that may occur during the grading and sorting of the mandaring at packhouses: this represents the 1,72% of the mandarin that comes from the farm stage. The fruit making up the waste component is a combinaiton of incoming fruit not conforming to certain criteria fro packing due to size or damage during transit or packing.
  production volume 5.23167e10 kg; = 30418767000*1.72
    Tot Production volume as per FAO 2014 Mandarin production = 30418767000 kg; Biowaste are 1,72% of the tot PV
  property price 0 EUR2005; name RP2_price_EUR2005
  properties: water content 1.5, carbon content, non-fossil 0.1624, dry mass 0.4 kg, wet mass 1 kg
- building, hall: 2.45783e-6 m2; = 2.82E-06*(RP/1.135)+2.82E-06*(RP1/1.135); lognormal variance with pedigree 0.0029, pedigree (2,2,2,5,1)
  The area of the packhouse was assumed to be 2.82*e-10 m2/yr/kg of marketed soft citrus. Data came from two citrus packhouses: African Packers and Ponders End Traders Packhouse (Afrifresh.co.za, 2015). Lifetime expectancy was assumed to 50 years (Kellenberger at al., 2007)
- electricity, low voltage: 0 kWh; pedigree (1,1,1,1,1)
  Electricity at the packhouse stage is used for the operation of conveyor belts, lighting and other machinery. The amount of electricity used was calculated to 55.5 kWh grid electricity/ ton of soft citrus marketed and then scaled to the reference flow of 1 kg. Data came from different packhouse from different subregions in WC province.
- EUR-flat pallet: 0.000515099 unit; = 0.000591*(RP/1.135)+0.000591*(RP1/1.135); lognormal variance with pedigree 0.0029, pedigree (2,2,2,5,1)
  Disposable and reusable wooden pallets have a lifespan of 10 years (Jumbo Bin in the fruit growing industry; Mpac Plastic Continers).
  properties: water content 0.2, dry mass 18.3333 kg, carbon content, fossil 0.0311351, carbon content, non-fossil 0.58833, wet mass 22 kg
- conveyor belt: 1.22892e-7 m; = 1.41E-07*(RP/1.135)+1.41E-07*(RP1/1.135); lognormal variance with pedigree 0.0029, pedigree (2,2,2,5,1)
  The ration of conveyor belt length to packhouse area was assumed to be 0.25m/m2. Data came from Rekopane farm in Nothern Cape. Lifetime expectancy was assumed to 25 years (Kellenberger at al., 2007)
- electricity, low voltage: 2.72844e-5, 0.000696139, 3.70121e-6, 1.18955e-5, 2.41884e-5, 1.70514e-6, 1.99086e-5, 1.26974e-5, 0.00016985, 0.000519823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 kWh (36 entries); lognormal variance with pedigree 0.0029, pedigree (2,2,2,5,1)
  (same comment as for electricity, low voltage)

## Sampling procedure
This dataset is a copy of the South African dataset which model the packhouse facilities of the soft citrus value chain. Data for packhouses in ZA were taken from Data from Company Budget Report (Combuds) and previuos study done on the Mandarin sector in South Africa (Konig, 2015). Data from APV at global level were taken from FAOSTAT 2014.

## Extrapolations
This dataset is a copy of the South African dataset which model the packhouse facilities of the soft citrus value chain. Data for packhouses in ZA were taken from Data from Company Budget Report (Combuds) and previuos study done on the Mandarin sector in South Africa (Konig, 2015). Data from APV at global level were taken from FAOSTAT 2014. Uncertainty has been adjusted accordingly.
