# dimethyl carbonate production

Dataset: EcoSpold 2, unit process
Geography: RER
Time period: 2015-01-01 to 2020-12-31
Technology level: current
Classification: ISIC rev.4 ecoinvent: 2011:Manufacture of basic chemicals
Synonyms: Carbonic Acid Dimethyl Ester; Carbonic acid; Methyl carbonate; dimethyl ester
Scenario: Business-as-Usual
System model: Allocation at the point of substitution
Generated by: Lucia Valsasina
Database: ecoinvent
isCopyrightProtected: true
accessRestrictedTo: 1

## General comment
Dimethyl carbonate is the result of the reaction of phosgene and methanol. This product is defined by Tundo and Selva (2002) as a “green agent” given its non-toxicity and biodegradability. According to Tundo and Selva (2002) this product can be used as a substitute of methyl alides/sulfate and phosgene used in methylation and carbonylation.
Reference(s):
Gendorf (2016) Umwelterklärung 2015, Werk Gendorf Industriepark, www.gendorf.de
Tundo, P. and Selva, M. 2002. The Chemistry of Dimethyl Carbonate. Acc. Chem. Res. Vol.9, 35, pp. 706–716
For more information on the model please refer to the dedicate ecoinvent report, access it in the Report section of ecoQuery (http://www.ecoinvent.org/login-databases.html)

## Included activities start
The activity starts when the raw materials enter the process.

## Included activities end
Materials entering the process are included as well as energy uses, infrastructure and emissions.

## Geography
The inputs to the process are calculated based on stoichiometry and literature data, they are therefore considered to be valid for the chosen geography. The inputs of heat, electricity, water, factory and nitrogen are mostly taken as average of industry data. Industry data values are a 5-year average of data (2011 - 2015) published by the Gendorf factory (Gendorf, 2016, Umwelterklärung, www.gendorf.de), (Gendorf, 2015, Umwelterklärung, www.gendorf.de), (Gendorf, 2014, Umwelterklärung, www.gendorf.de). The Gendorf factory is based in Germany, it produces a wide range of chemical substances. The factory produced 1657400 tonnes of chemical substances in the year 2015 (Gendorf, 2016, Umwelterklärung, www.gendorf.de) and 740000 tonnes of intermediate products. As, according to Cefic Report of the chemical industry (Cefic 2016. Facts and figures 2016 of the European chemical industry. Accessible at: http://www.cefic.org/Facts-and-Figures/Chemicals-Industry-Profile/, accessed 30/06/2017), Germany covers 28.5% of EU chemical generated sales in 2015, we assumed these values to be representative of the RER geography.

## Technology
Dimethyl carbonate has been historically produced through the reaction of phosgene and methanol. Because of the toxicity of phosgene, a greener route of production has been developed (Tundo and Selva 2002). Today it is mostly produced through the reaction of ethylene or propylene carbonate with methanol. This activity models the production of dimethyl carbonate as the result of the reaction of ethylene carbonate and methanol.
Chemical reaction:
C3H4O3 + CH3OH -> C3H6O3 + CH2O
This inventory representing production of a particular chemical compound is at least partially based on a generic model on the production of chemicals. The data generated by this model have been improved by compound-specific data when available.
The model on production of chemicals is using specific industry or literature data wherever possible and more generic data on chemical production processes to fill compound-specific data gaps when necessary. The basic principles of the model have been published in literature (Hischier 2005, Establishing Life Cycle Inventories of Chemicals Based on Differing Data Availability). The model has been updated and extended with newly available data from the chemical industry.
In the model, unreacted fractions are treated in a waste treatment process, and emissions reported are after a waste treatment process that is included in the scope of this dataset. For volatile reactants, a small level of evaporation is assumed. Solvents and catalysts are mostly recycled in closed-loop systems within the scope of the dataset and reported flows are for losses from this system.
The main source of information for the values for heat, electricity, water (process and cooling), nitrogen, chemical factory is industry data from Gendorf. The values are a 5-year average of data (2011 - 2015) published by the Gendorf factory (Gendorf, 2016, Umwelterklärung, www.gendorf.de), (Gendorf, 2015, Umwelterklärung, www.gendorf.de), (Gendorf, 2014, Umwelterklärung, www.gendorf.de). The Gendorf factory is based in Germany, it produces a wide range of chemical substances. The factory produced 1657400 tonnes of chemical substances in the year 2015 (Gendorf, 2016, Umwelterklärung, www.gendorf.de) and 740000 tonnes of intermediate products.
Reference(s):
Hischier, R. (2005) Establishing Life Cycle Inventories of Chemicals Based on Differing Data Availability (9 pp). The International Journal of Life Cycle Assessment, Volume 10, Issue 1, pp 59–67. 10.1065/lca2004.10.181.7
Gendorf (2016) Umwelterklärung 2015, Werk Gendorf Industriepark, www.gendorf.de
Tundo, P. and Selva, M. 2002. The Chemistry of Dimethyl Carbonate. Acc. Chem. Res. Vol.9, 35, pp. 706–716
For more information on the model please refer to the dedicate ecoinvent report, access it in the Report section of ecoQuery (http://www.ecoinvent.org/login-databases.html)

## Time period
The activity is based on stoichiometry and literature data, it is therefore considered not to change significantly over time in terms of inputs. The inputs of heat, electricity, water, factory and nitrogen are mostly taken as average of industry data. Industry data values are a 5-year average of data (2011 - 2015) published by the Gendorf factory (Gendorf, 2016, Umwelterklärung, www.gendorf.de), (Gendorf, 2015, Umwelterklärung, www.gendorf.de), (Gendorf, 2014, Umwelterklärung, www.gendorf.de). The Gendorf factory is based in Germany, it produces a wide range of chemical substances. The factory produced 1657400 tonnes of chemical substances in the year 2015 (Gendorf, 2016, Umwelterklärung, www.gendorf.de) and 740000 tonnes of intermediate products. The time period is therefore set based on the years from Gendorf reference.

## Reference product
- dimethyl carbonate: 0 kg; name RP; By-product classification allocatable product; CPC 34180: Phosphoric esters and their salts or esters of other inorganic acids (excluding esters of hydrogen halides) an[…]
  Dimethyl carbonate is the result of the reaction of phosgene and methanol. This product is defined by Tundo and Selva (2002) as a “green agent” given its non-toxicity and biodegradability. According to Tundo and Selva (2002) this product can be used as a substitute of methyl alides/sulfate and phosgene used in methylation and carbonylation.
  Reference(s):
  Gendorf (2016) Umwelterklärung 2015, Werk Gendorf Industriepark, www.gendorf.de
  Tundo, P. and Selva, M. 2002. The Chemistry of Dimethyl Carbonate. Acc. Chem. Res. Vol.9, 35, pp. 706–716
  production volume 1.04226e8 kg; name RP_PV
    Estimated value. The Global production volume is estimated based on information from Cefic (European Chemical Industry Council) and the American Chemistry Council.
    According to Cefic (2016) the Global sales of chemicals in the year 2015 was 3 534 billion euros. The reported share of sales per regions are: EU28 14.7%; Other Europe (Switzerland, Norway, Turkey, Russia and Ukraine) 2.7%; NAFTA (US, Canada and Mexico) 16.5%; Latin America 3.8%; China 39.9%; Japan 3.9%; Republic of Korea 3.2%; India 2.2%; Rest of Asia 11.9%; Rest of the World 1.3%. Cefic also reports the US total sales, 518.7 billion euros of the global 3 534 billion euros (14.7%). The same share is reported from the American Chemistry Council (2016), according to this source the USA sales account for 15% of global sales for the year 2016.
    For 2016, In terms of volume, dimethyl carbonate global production is expected to weigh in at 599 thausand tons.
    As no information was found for the European production volume, this values is calculated as the average of the values mentioned above in relation to the sales share from the respective regions; RER, which is here defined as EU28 plus Other Europe adn assumed to equal Western Europe, share of sales (14.7% + 2.7% = 17.4%).
    Reference(s):
    Cefic 2016. Facts and figures 2016 of the European chemical industry. Accessible at: http://www.cefic.org/Facts-and-Figures/Chemicals-Industry-Profile/, accessed 1 June 2017
    American Chemistry Council 2016. Outlook: U.S. Chemical Industry Continues to Outpace Industrial Output; Accounts for More Than One-Half of Construction Spending by Manufacturing Sector. Accessible at: https://www.americanchemistry.com/Media/PressReleasesTranscripts/ACC-news-releases/US-Chemical-Industry-Continues-to-Outpace-Industrial-Output.html, accessed 1 June 2017
    Transparency Market Research (2015), Dimethyl Carbonate Market - Global Industry Analysis, Size, Share, Growth, Trends and Forecast 2015 - 2023, Retrieved June 15, 2017, from: http://www.transparencymarketresearch.com/dimethyl-carbonate-market.html
  property price 0.74 EUR2005; name RP_price_EUR2005
    Estimate value. From prices reported in alibaba https://www.alibaba.com/trade/search?fsb=y&IndexArea=product_en&CatId=&SearchText=dimethyl+carbonate&isGalleryList=G, accessed August 2017
  property carbon content 0.400016
    carbon content on a dry matter basis (reserved; not for manual entry)
  property true value 0.74; name RP_true_value
    allocation property applied in "true value" allocation // value calculated from revenue
  properties: water content 0, carbon content, non-fossil 0, wet mass 1 kg, dry mass 1 kg, water in wet mass 0 kg, carbon content, fossil 0.400016, carbon allocation 0.400016 kg
- formaldehyde: 1 kg; name BP_formaldehyde; CPC 34170: Ethers, alcohol peroxides, ether peroxides, epoxides, acetals and hemiacetals, and their halogenated, sulphona[…]; By-product classification allocatable product; CAS 50-00-0; pedigree (1,1,1,1,1)
  Calculated value based on stoichiometric calculations and literature data.
  30.02628g/mol is the molar mass of formaldehyde (CH2O).
  90.07884g/mol is the molar mass of dimethyl carbonate (C3H6O3).
  Dimethyl carbonate has been historically produced through the reaction of phosgene and methanol. Because of the toxicity of phosgene, a greener route of production has been developed (Tundo and Selva 2002). Today it is mostly produced through the reaction of ethylene or propylene carbonate with methanol. This activity models the production of dimethyl carbonate as the result of the reaction of ethylene carbonate and methanol.
  Chemical reaction:
  C3H4O3 + CH3OH -> C3H6O3 + CH2O
  production volume 3.4742e7 kg; = BP_formaldehyde*RP_PV/ABS(RP)
    Calculated from the production volume of the reference product in proportion to the respective output amounts.
  property price 0.239 EUR2005; name BP_formaldehyde_price_EUR2005
    Temporary price data. Calculated as 90% of purchasers price based on: 2004 import/export prices (total trades (USD) divided by total weight (kg) in EU27, USA, China, Japan and India) from UN data - Methanal (formaldehyde) (http://data.un.org/Data.aspx?q=Formaldehyde&d=ComTrade&f=_l1Code%3a30%3bcmdCode%3a291211; accessed 1 June 10).
  property carbon content 0.4
    carbon content on a dry matter basis (reserved; not for manual entry)
  property true value 0.0796667; name BP_formaldehyde_true_value
    allocation property applied in "true value" allocation // value calculated from revenue
  properties: water content 0, carbon content, non-fossil 0, water in wet mass 0 kg, carbon content, fossil 0.4, wet mass 1 kg, dry mass 1 kg, carbon allocation 0.4 kg

## By-products
- heat, for reuse in municipal waste incineration only: 0 MJ; CPC 17300: Steam and hot water; By-product classification allocatable product; pedigree (1,1,1,1,1)
  Net electricity generated from this waste and used in internal MSWI plant energy redistribution.
  Uncertainty: uncertainty is calculated from uncertainties in waste composition and uncertainties in energy efficiency and the uncertainty in internal energy demand
  production volume 63.5836 MJ
  property exergy 0.1842 MJ; name E_th_prod_MSWI_exergy
    This exergy property is based on the exergy content of the product.
  property price 0.0106 EUR2005; name E_th_prod_MSWI_price_EUR2005
    Average European district heat price from Ecoheatcool and Euroheat 2005-2006, Ecoheat Work package 1: The European heat market. Final report. 10.6 EUR/GJ i s the price of district heat. http://www.solarthermalworld.org/files/Ecoheatcool%20WP1%20Web.pdf?download
  property true value relation 0.1842; name E_th_prod_MSWI_true_value_relation
    property to calculate "true value" from
  property true value 1.16811e-9
    allocation property applied in "true value" allocation // value calculated from true value relation
- electricity, for reuse in municipal waste incineration only: 0 kWh; CPC 17100: Electrical energy; By-product classification allocatable product; pedigree (1,1,1,1,1)
  (same comment as for heat, for reuse in municipal waste incineration only)
  production volume 8.94033 kWh
  property true value relation 3.6; name E_el_prod_MSWI_true_value_relation
    property to calculate "true value" from
  property price 0.1 EUR2005; name E_el_prod_MSWI_price_EUR2005
    Estimated to be the same price as in case of electricity, medium voltage.
  property exergy 3.6 MJ; name E_el_prod_MSWI_exergy
    This exergy property is based on the exergy content of the product.
  property true value 3.17451e-9
    (same comment as for heat, for reuse in municipal waste incineration only)
- zinc concentrate: 0 kg; CPC 14290: Other non-ferrous metal ores and concentrates (other than uranium or thorium ores and concentrates); By-product classification allocatable product
  Calculated value from the knowledge of the properties of both products.
  production volume 0.00120952 kg
  property price 0.38 EUR2005; name ByP_price_EUR2005
    Temporary price data. Calculated as 90% of purchasers price based on: Zinc content in concentrate 53%. Concentrate price per kg Zn 86.5% of refined Zn price (13.5% treatment charges according to CHR Metals Limited 2005: Dynamic cost curves. http://www.minecost.com/dynamic.pdf). 2004 zinc price from USGS (2007) Mineral commodity summaries 2007. <http://minerals.usgs.gov/minerals/pubs/mcs/2007/mcs2007.pdf> [Accessed 25 May 2010]
  property zinc content 0.53; name zinc_C_zinc_concentrate
    Zinc content on a dry matter basis. Value taken from teh "zinc mine operation" /GLO dataset.
  property dry mass 1 kg; name DM_zinc_concentrate
  property carbon content 0
    carbon content on a dry matter basis (reserved; not for manual entry)
  property true value 4.30488e-13
    allocation property applied in "true value" allocation // value calculated from revenue
  properties: wet mass 1 kg, water content 0, carbon content, non-fossil 0, carbon content, fossil 0, water in wet mass 0 kg, carbon allocation 0 kg

## Inputs from technosphere
- chemical factory, organics: 1.16633e-10 unit; lognormal variance with pedigree 0.309225, pedigree (2,3,1,2,3)
  Calculated based on literature data published by the industry. For this activity, no information was readily available concerning infrastructure and land-use. Therefore, the infrastructure is estimated based on data from two chemical factories, the BASF site of Ludwigshafen and the chemical factory in Gendorf (which are both located in Germany), which produce a wide range of chemical substances. Based on this data, the following assumptions are made: the built area amounts to about 4.2 ha, the plant has an average output of 50'000 t/a and a lifespan of fifty years. The estimated infrastructure amount is therefore 4.00 E-10 units per kg of produced chemical.
  References:
  Althaus H.-J., Chudacoff M., Hischier R., Jungbluth N., Osses M. and Primas A. (2007) Life Cycle Inventories of Chemicals. ecoinvent report No. 8, v2.0. EMPA Dübendorf, Swiss Centre for Life Cycle Inventories, Dübendorf, CH.
  Gendorf (2000) Umwelterklärung 2000, Werk Gendorf. Werk Gendorf, Burgkirchen.
- methanol: 0.109652 kg; lognormal variance with pedigree 0.009825, pedigree (2,3,1,2,3)
  Calculated value based on stoichiometric calculations and literature data.
  32.04216g/mol is the molar mass of methanol (CH4O).
  90.07884g/mol is the molar mass of dimethyl carbonate (C3H6O3).
  Dimethyl carbonate has been historically produced through the reaction of phosgene and methanol. Because of the toxicity of phosgene, a greener route of production has been developed (Tundo and Selva 2002). Today it is mostly produced through the reaction of ethylene or propylene carbonate with methanol. This activity models the production of dimethyl carbonate as the result of the reaction of ethylene carbonate and methanol.
  Chemical reaction:
  C3H4O3 + CH3OH -> C3H6O3 + CH2O
  properties: dry mass 1 kg, wet mass 1 kg, carbon content, fossil 0.375
- tap water: 0.00758113 kg; lognormal variance with pedigree 0.009825, pedigree (2,3,1,2,3)
  Calculated based on literature data published by the industry. This value is a 5-year average of data (2011 - 2015) published by the Gendorf factory (Gendorf, 2016, Umwelterklärung, www.gendorf.de), (Gendorf, 2015, Umwelterklärung, www.gendorf.de), (Gendorf, 2014, Umwelterklärung, www.gendorf.de). The amount of tap water per kg of chemical substance produced is calculated using literature data published by the Gendorf factory based in Germany, which produces a wide range of chemical substances. The factory produced 1657400 tonnes of chemical substances in the year 2015 (Gendorf, 2016, Umwelterklärung, www.gendorf.de) and 740000 tonnes of intermediate products. The amount of tap water consumed in the year 2015 was 55100 tonnes (Gendorf, 2016, Umwelterklärung, www.gendorf.de). The resulting amount of tap water is 0.023 kg/kg of chemical product produced. The 5-year average (2011 - 2015, weighted by production volume) is 0.026 kg/kg.
  properties: water content 2962.17, carbon content, fossil 0.00178991, wet mass 1 kg, dry mass 0.000337476 kg
  note on carbon content, fossil: Bicarbonate content is 2.93 mol/m3. CO2 content is 0.1 mol/m3 (ecoinvent v2.2 report 8, Tab 93.1).
- electricity, medium voltage: 0.121298 kWh; lognormal variance with pedigree 0.009825, pedigree (2,3,1,2,3)
  Calculated based on literature data published by the industry. This value is a 5-year average of data (2011 - 2015) published by the Gendorf factory (Gendorf, 2016, Umwelterklärung, www.gendorf.de), (Gendorf, 2015, Umwelterklärung, www.gendorf.de), (Gendorf, 2014, Umwelterklärung, www.gendorf.de). The amount of electricity per kg of chemical substance produced is calculated using literature data published by the Gendorf factory based in Germany, which produces a wide range of chemical substances. The factory produced 1657400 tonnes of chemical substances in the year 2015 (Gendorf, 2016, Umwelterklärung, www.gendorf.de) and 740000 tonnes of intermediate products. The amount of electricity consumed in the year 2015 was 3498800 GJ (Gendorf, 2016, Umwelterklärung, www.gendorf.de). The resulting amount of electricity is 0.406 kWh/kg (year 2015) of chemical substance produced. The 5-year average (2011 - 2015, weighted by production volume) is 0.416 kWh/kg (1.5 MJ/kg). Cross-reference: the amount of chemicals produced (excluding intermediate products) in the EU-28 in the year 2011 was 327 million tonnes (Eurostat, http://ec.europa.eu/eurostat/statistics-explained/index.php/Chemicals_production_statistics, accessed 20170126). The chemical and petrochemical industry sector consumed 2.33 EJ of energy in 2011 (European Commission - Joint Research Centre, 2014, BAT on Common Waste water and Waste Gas Treatment/Management Systems in the Chemical Sector). The resulting energy (both heat and electricity) consumed per kg of chemicals produced in 2011 is thus 7.13 MJ/kg. This is higher than the value calculated using data published by Gendorf – 3.85 MJ/kg, but that is to be expected as the intermediate products are not accounted for.
- heat, from steam, in chemical industry: 0.0583164 MJ; lognormal variance with pedigree 0.009825, pedigree (2,3,1,2,3)
  Calculated based on literature data published by the industry. This value is a 5-year average of data (2011 - 2015) published by the Gendorf factory (Gendorf, 2016, Umwelterklärung, www.gendorf.de), (Gendorf, 2015, Umwelterklärung, www.gendorf.de), (Gendorf, 2014, Umwelterklärung, www.gendorf.de). The amount of heat used per kg of chemical substance produced is calculated using literature data published by the Gendorf factory based in Germany, which produces a wide range of chemical substances. The factory produced 1657400 tonnes of chemical substances in the year 2015 (Gendorf, 2016, Umwelterklärung, www.gendorf.de) and 740000 tonnes of intermediate products. The amount of heat in the year 2015 was 523500 GJ (Gendorf, 2016, Umwelterklärung, www.gendorf.de) of which 90% was obtained from natural gas and 10% from steam. The resulting amount of heat from steam is 0.22 MJ/kg of chemical product produced. The 5-year average (2011 - 2015, weighted by production volume) is 0.20 MJ/kg. Cross-reference: the amount of chemicals produced (excluding intermediate products) in the EU-28 in the year 2011 was 327 million tonnes (Eurostat, http://ec.europa.eu/eurostat/statistics-explained/index.php/Chemicals_production_statistics, accessed 20170126). The chemical and petrochemical industry sector consumed 2.33 EJ of energy in 2011 (European Commission - Joint Research Centre, 2014, BAT on Common Waste water and Waste Gas Treatment/Management Systems in the Chemical Sector). The resulting energy (both heat and electricity) consumed per kg of chemicals produced in 2011 is thus 7.13 MJ/kg. This is higher than the value calculated using data published by Gendorf – 3.85 MJ/kg, but that is to be expected as the intermediate products are not accounted for.
- nitrogen, liquid: 0.00554006 kg; lognormal variance with pedigree 0.009825, pedigree (2,3,1,2,3)
  Calculated based on literature data published by the industry. This value is a 5-year average of data (2011 - 2015) published by the Gendorf factory (Gendorf, 2016, Umwelterklärung, www.gendorf.de), (Gendorf, 2015, Umwelterklärung, www.gendorf.de), (Gendorf, 2014, Umwelterklärung, www.gendorf.de). The amount of nitrogen used per kg of chemical substance produced is calculated using literature data published by the Gendorf factory based in Germany, which produces a wide range of chemical substances. The factory produced 1657400 tonnes of chemical substances in the year 2015 (Gendorf, 2016, Umwelterklärung, www.gendorf.de) and 740000 tonnes of intermediate products. The reported amount of nitrogen used in 2015 was 33512400 Nm3 (Gendorf, 2016, Umwelterklärung, www.gendorf.de). One Nm3 of nitrogen is equal to 1.2506 kg. The resulting amount of nitrogen - the 5-year average (2011 - 2015, weighted by production volume) is 0.019 kg/kg. Nitrogen is mainly used during the production of chemicals for 'blanketing', which is the process of applying gas to the vapour space of a container or vessel in order to control its composition.
  properties: dry mass 1 kg, wet mass 1 kg
- wastewater, average: 0 m3; name BP_wastewater_average; pedigree (1,1,1,1,1)
  Calculated based on literature data published by the industry. This value is a 5-year average of data (2011 - 2015) published by the Gendorf factory (Gendorf, 2016, Umwelterklärung, www.gendorf.de), (Gendorf, 2015, Umwelterklärung, www.gendorf.de), (Gendorf, 2014, Umwelterklärung, www.gendorf.de). The amount of wastewater (which is later on treated in the municipal WWTP) per kg of chemical substance produced is calculated using literature data published by the Gendorf factory based in Germany, which produces a wide range of chemical substances. The factory produced 1657400 tonnes of chemical substances in the year 2015 (Gendorf, 2016, Umwelterklärung, www.gendorf.de) and 740000 tonnes of intermediate products. The amount of wastewater which is later on treated in the municipal WWTP in the year 2015 was 1200 tonnes (Gendorf, 2016, Umwelterklärung, www.gendorf.de). The resulting amount of wastewater is 2.7E-06 m3/kg of chemical product produced.
  production volume 0 m3
    (same comment as for formaldehyde)
  property price 0 EUR2005; name BP_wastewater_average_price_EUR2005
  properties: carbon content, non-fossil 0.194039, wet mass 1000 kg, dry mass 0.346837 kg, water content 2882.2
  note on carbon content, non-fossil: 0.0673 kg TOC/m3 (Tab A.17, ecoinvent v2.2 report 13_I). TOC was considered as Total Carbon.
- ethylene carbonate: 0.301362 kg; lognormal variance with pedigree 0.009825, pedigree (2,3,1,2,3)
  Calculated value based on stoichiometric calculations and literature data.
  88.06296g/mol is the molar mass of ethylene carbonate (C3H4O3).
  90.07884g/mol is the molar mass of dimethyl carbonate (C3H6O3).
  Dimethyl carbonate has been historically produced through the reaction of phosgene and methanol. Because of the toxicity of phosgene, a greener route of production has been developed (Tundo and Selva 2002). Today it is mostly produced through the reaction of ethylene or propylene carbonate with methanol. This activity models the production of dimethyl carbonate as the result of the reaction of ethylene carbonate and methanol.
  Chemical reaction:
  C3H4O3 + CH3OH -> C3H6O3 + CH2O
  properties: carbon content, fossil 0.409173, dry mass 1 kg, wet mass 1 kg
- heat, district or industrial, natural gas: 0.626901 MJ; lognormal variance with pedigree 0.0104, pedigree (2,3,1,4,3)
  Calculated based on literature data published by the industry. This value is a 5-year average of data (2011 - 2015) published by the Gendorf factory (Gendorf, 2016, Umwelterklärung, www.gendorf.de), (Gendorf, 2015, Umwelterklärung, www.gendorf.de), (Gendorf, 2014, Umwelterklärung, www.gendorf.de). The amount of heat used per kg of chemical substance produced is calculated using literature data published by the Gendorf factory based in Germany, which produces a wide range of chemical substances. The factory produced 1657400 tonnes of chemical substances in the year 2015 (Gendorf, 2016, Umwelterklärung, www.gendorf.de) and 740000 tonnes of intermediate products. The amount of heat in the year 2015 was 523500 GJ (Gendorf, 2016, Umwelterklärung, www.gendorf.de) of which 90% was obtained from natural gas and 10% from steam. The resulting amount of heat from natural gas is 2.02 MJ/kg of chemical product produced. The 5-year average (2011 - 2015, weighted by production volume) is 2.15 MJ/kg. Cross-reference: the amount of chemicals produced (excluding intermediate products) in the EU-28 in the year 2011 was 327 million tonnes (Eurostat, http://ec.europa.eu/eurostat/statistics-explained/index.php/Chemicals_production_statistics, accessed 20170126). The chemical and petrochemical industry sector consumed 2.33 EJ of energy in 2011 (European Commission - Joint Research Centre, 2014, BAT on Common Waste water and Waste Gas Treatment/Management Systems in the Chemical Sector). The resulting energy (both heat and electricity) consumed per kg of chemicals produced in 2011 is thus 7.13 MJ/kg. This is higher than the value calculated using data published by Gendorf – 3.85 MJ/kg, but that is to be expected as the intermediate products are not accounted for.
- wastewater, average: -7.10417e-7, -7.68538e-8 m3 (2 entries); lognormal variance with pedigree 0.009825, pedigree (2,3,1,2,3)
  (same comment as for wastewater, average)
  production volume 281.41 m3

## Inputs from nature
- Water, cooling, unspecified natural origin [natural resource, in water]: 0.00478194 m3; lognormal variance with pedigree 0.009825, pedigree (2,3,1,2,3)
  Calculated based on literature data published by the industry. This value is a 5-year average of data (2011 - 2015) published by the Gendorf factory (Gendorf, 2016, Umwelterklärung, www.gendorf.de), (Gendorf, 2015, Umwelterklärung, www.gendorf.de), (Gendorf, 2014, Umwelterklärung, www.gendorf.de). The amount of water for cooling extracted per kg of chemical substance produced is calculated using literature data published by the Gendorf factory based in Germany, which produces a wide range of chemical substances. The factory produced 1657400 tonnes of chemical substances in the year 2015 (Gendorf, 2016, Umwelterklärung, www.gendorf.de) and 740000 tonnes of intermediate products. The reported amounts of water extracted as groundwater and surface water (river) are assumed to be used entirely for cooling purposes.
- Water, well, in ground [natural resource, in water]: 0.000242013 m3; lognormal variance with pedigree 0.009825, pedigree (2,3,1,2,3)
  Calculated based on literature data published by the industry. This value is a 5-year average of data (2011 - 2015) published by the Gendorf factory (Gendorf, 2016, Umwelterklärung, www.gendorf.de), (Gendorf, 2015, Umwelterklärung, www.gendorf.de), (Gendorf, 2014, Umwelterklärung, www.gendorf.de). The amount of groundwater and surface water (river) extracted per kg of chemical substance produced is calculated using literature data published by the Gendorf factory based in Germany, which produces a wide range of chemical substances. The factory produced 1657400 tonnes of chemical substances in the year 2015 (Gendorf, 2016, Umwelterklärung, www.gendorf.de) and 740000 tonnes of intermediate products. The amount of groundwater and surface water (river) extracted in the year 2015 was 19950000 tonnes and 21488100 tonnes respectively (Gendorf, 2016, Umwelterklärung, www.gendorf.de).
- Water, river [natural resource, in water]: 0.00025076 m3; lognormal variance with pedigree 0.009825, pedigree (2,3,1,2,3)
  (same comment as for Water, well, in ground)

## Emissions to nature
- Nitrogen [air, unspecified]: 0.00554006 kg; lognormal variance with pedigree 0.009825, pedigree (2,3,1,2,3)
  Calculated value. The amount of nitrogen released to air is equal to the amount of nitrogen entering the activity.
- Methanol [water, unspecified]: 0.00013824 kg; lognormal variance with pedigree 0.0104, pedigree (2,3,1,4,3)
  Calculated value. The values is based on a generic model. The basic principles of the model have been published in literature (Hischier 2005, Establishing Life Cycle Inventories of Chemicals Based on Differing Data Availability). The model has been updated and extended with newly available data from the chemical industry. Find more information in the dedicated report on the ecoinvent website.
  Reference(s):
  Hischier, R. (2005) Establishing Life Cycle Inventories of Chemicals Based on Differing Data Availability (9 pp). The International Journal of Life Cycle Assessment, Volume 10, Issue 1, pp 59–67. 10.1065/lca2004.10.181.7
- BOD5, Biological Oxygen Demand [water, unspecified]: 0.000198804 kg; lognormal variance with pedigree 0.218, pedigree (4,5,5,5,5)
  Calculated value. The BOD, COD, TOC and BOD5 are calculated based on the amount and type of emissions released to water in the same activity.
- Methanol [air, unspecified]: 0.00271781 kg; lognormal variance with pedigree 0.0104, pedigree (2,3,1,4,3)
  (same comment as for Methanol)
- TOC, Total Organic Carbon [water, unspecified]: 5.17718e-5 kg; lognormal variance with pedigree 0.218, pedigree (4,5,5,5,5)
  (same comment as for BOD5, Biological Oxygen Demand)
- Dimethyl carbonate [air, unspecified]: 0.00126552 kg; lognormal variance with pedigree 0.0104, pedigree (2,3,1,4,3)
  (same comment as for Methanol)
- COD, Chemical Oxygen Demand [water, unspecified]: 0.000198804 kg; lognormal variance with pedigree 0.218, pedigree (4,5,5,5,5)
  (same comment as for BOD5, Biological Oxygen Demand)
- Carbon dioxide, fossil [air, unspecified]: 0.00667349 kg; lognormal variance with pedigree 0.0104, pedigree (2,3,1,4,3)
  (same comment as for Methanol)
- DOC, Dissolved Organic Carbon [water, unspecified]: 5.17718e-5 kg; lognormal variance with pedigree 0.218, pedigree (4,5,5,5,5)
  (same comment as for BOD5, Biological Oxygen Demand)
- 1,3-Dioxolan-2-one [water, unspecified]: 0.0130231 kg; lognormal variance with pedigree 0.009825, pedigree (2,3,1,2,3)
  Calculated based on literature data published by the industry (Gendorf, 2016, Umwelterklärung, www.gendorf.de). The amount of water released back to the environment consists of the amount of process water treated in the internal WWTP and then released back to the environment and the amount of cooling water released back to the environment.
- Water [water, unspecified]: 0.00486942 m3; lognormal variance with pedigree 0.009825, pedigree (2,3,1,2,3)
  (same comment as for 1,3-Dioxolan-2-one)
- Water [air, unspecified]: 0.000408215 m3; lognormal variance with pedigree 0.009825, pedigree (2,3,1,2,3)
  Calculated to ensure the water balance. In general, in the case of recirculating cooling systems, 77% of the water input evaporates to air. In case of once-through cooling systems, 4% of the water input evaporates to air. The process water has in the chemical industry an average evaporation rate of 20.5%. In the specific case of the Gendorf factory, the calculated evaporation rate based on the data published is 6.3%. This matches the qualitative information, that the majority of the cooling systems in Gendorf are once-through and that the amount of cooling water used is significantly higher than the amount of process water used (Gendorf, 2016, Umwelterklärung, www.gendorf.de).

## Sampling procedure
Literature data and stochiometric calculation.

## Review by Emilia Moreno Ruiz 2017-08-10
This dataset was additionally reviewed in a separate review process by Eric Johnson of Atlantic Consulting as well as Emilia Moreno Ruiz and Gregor Wernet of ecoinvent.
