# lithium manganese oxide production

Dataset: EcoSpold 2, unit process
Geography: GLO
Time period: 2009-01-01 to 2019-12-31
Technology level: current
Classification: ISIC rev.4 ecoinvent: 2011:Manufacture of basic chemicals
Classification: EcoSpold01Categories: chemicals/inorganics
Synonyms: Lithium manganese(III,IV) oxide; Lithium manganese oxide, spinel type
Tags: ConvertedDataset
Scenario: Business-as-Usual
System model: Allocation at the point of substitution
Generated by: Dominic Notter
Published in: Notter, D. A. 2010
Database: ecoinvent
isCopyrightProtected: true
accessRestrictedTo: 1

## General comment
This dataset represents the production of 1 kg lithium manganese oxide, at plant, global. For this dataset the production of lithium manganese oxide by sintering manganese oxide is considered. The functional unit for this dataset is 1 kg of pure lithium manganese oxide. The system includes the process with consumption of raw materials, energy, infrastructure, and land use, as well as the generation of emissions to air and water. It also includes transportation of the raw materials. Transient or unstable operations like starting-up or shutting-down, are not included, but the production during stable operation conditions. Storage and transportation of the final product are also not included. It is assumed that the manufacturing plants are located in an urban/industrial area and consequently the emissions are categorised as emanating in a high population density area. The emissions into water are assumed to be emitted into rivers.
[This dataset was already contained in the ecoinvent database version 2. It was not individually updated during the transfer to ecoinvent version 3. Life Cycle Impact Assessment results may still have changed, as they are affected by changes in the supply chain, i.e. in other datasets. This dataset was generated following the ecoinvent quality guidelines for version 2. It may have been subject to central changes described in the ecoinvent version 3 change report (http://www.ecoinvent.org/database/ecoinvent-version-3/reports-of-changes/), and the results of the central updates were reviewed extensively. The changes added e.g. consistent water flows and other information throughout the database. The documentation of this dataset can be found in the ecoinvent reports of version 2, which are still available via the ecoinvent website. The change report linked above covers all central changes that were made during the conversion process.]

## Included activities start
From the reception of manganese oxide and lithium carbonate at the factory gate.

## Included activities end
This activity ends with the rosting of manganese oxide and lithium carbonate in a inert atmosphere in a rotary kiln, followed by spray drying and roasting again in a oxidising atmosphere in a rotary kiln. Energy consumption and CO2 emissions to air are calculated.

## Geography
Some Swiss or European datasets are used for global processes.

## Technology
This dataset includes a method of producing lithium manganese oxide out of manganese oxide and lithium carbonate in several roasting stages in a rotary kiln. During the different stages, the atmosphere in the rotary kiln changes from inert (addition of N2) to oxidizing (addition of O2) condition. The powder is then suspended with water followed by spray drying (evaporation of the water).
Lithium manganese oxide is commonly prepared by sintering manganese oxide (MnO2 or Mn2O3) with Li2CO3 at high temperatures. The produced carbon monoxide is oxidated to carbon diuoxide.
2 Mn2O3 + Li2CO3 → 2 LiMn2O4 + CO
4 CO+ O2 → 2 CO2
Iwata, E., Maeda, K., Suzuki, N., Ohsaki, Y. Kwaguchi, T., Mori, T.: Lithium manganese oxide, and process for its production and secondary cell employing it. United States Patent 6475672. Published 2002-11-05. Online under: http://www.freepatentsonline.com/6475672.html
Heil, G.; Kormann, C.; Adel, J. Lithium oxide containing lithium intercalation compounds.
2003.

## Parameters
- fraction, water, deionised, to air: 0.205; name fraction_WDI_to_air; = fraction_PW_to_air; lognormal variance with pedigree 0.092025, pedigree (4,4,3,2,4)
  Calculated value. See comment in the other parametres present in this dataset. Deionised water is considered to be always used as process water, thus process water fractions to air are applied to all deionised water input flows to calculate the amount of water consumed in the processes.
- fraction, process water, to air: 0.205 dimensionless; name fraction_PW_to_air; lognormal variance with pedigree 0.092025, pedigree (4,4,3,2,4)
  Literature value (Statistics Canada, 2007 & Shaffer, K.H., 2008, Consumptive water use in the Great Lakes Basin, USGS) (Vionnet, S., Quantis Water Database - Technical Report, 2012).

## Reference product
- lithium manganese oxide: 1 kg; CPC 34: Basic chemicals; By-product classification allocatable product; CAS 39457-42-6
  Lithium manganese oxide (LiMn2O4; CAS 39457-42-6) is a ternary spinel-type double oxide. It is a cheap candidate for cathodes in high-power secondary lithium ion batteries. Practical specific capacities are in the range 90 - 120 mA h/g.
  Manganese oxide is a material which has been used from long ago as a cell active material, and a lithium manganese composite oxide which is a composite material of manganese and lithium, is a material which has attracted an attention in recent years as a positive electrode active material for a lithium secondary cell.
  EcoSpold01Location=GLO
  production volume 1 kg
    Unknown
    Dummy value to be replaced by measured, estimated or calculated value
  property price 2.36024 EUR2005
    Calculated based on inputs: The price of the product has been calculated as a sum of the values of the material and energy inputs for this product. This value is therefore a rough estimation. It may underestimate the real price since there are additional expenses when producing any product. These expences can include for example labour costs, treatment of waste materials and profit for the producer. Please consider carefully whether this level of data quality is acceptable for your application. Cross-reference: The consumer price for lithium manganese oxide is 52.9 EURO for 0.025kg. (http://www.sigmaaldrich.com/catalog/product/aldrich/482277?lang=de&region=DE&cm_sp=Insite-_-prodRecCold_xorders-_-prodRecCold2-2 , accessed 20160421)
  property carbon content 0
    carbon content on a dry matter basis (reserved; not for manual entry)
  properties: water content 0, carbon content, non-fossil 0, carbon content, fossil 0, wet mass 1 kg, dry mass 1 kg, water in wet mass 0 kg, carbon allocation 0 kg

## Inputs from technosphere
- chemical factory, organics: 4e-10 unit; lognormal variance with pedigree 0.4461, pedigree (5,5,5,3,3)
  EcoSpold01Location=RER
  Estimation. The infrastructure is estimated based on the module "chemical plant, organics". This module assumes a built area of about 4.2 ha, an average output of 50'000 t/a, and plant life of fifty years.
- water, deionised: 0 kg; name water_deionised_input; source Heil, G. 2003; pedigree (1,1,1,1,1)
  Literature value. This water is used for suspension: 3 parts water, 1 part Mn2O3 and Li2CO3.
  EcoSpold01Location=CH
  properties: wet mass 1 kg
- nitrogen, liquid: 0 kg; source Heil, G. 2003; pedigree (1,1,1,1,1)
  Literature value. Needed for inert atmosphere.
  EcoSpold01Location=RER
  properties: wet mass 1 kg, dry mass 1 kg
- heat, district or industrial, natural gas: 15.288 MJ; lognormal variance with pedigree 0.0701, pedigree (4,4,5,3,1)
  EcoSpold01Location=RER
  Calculated value according to stoichiometry and enthalpy of reaction, necessary for the furnace of the rotary kiln.
- oxygen, liquid: 0 kg; source Heil, G. 2003; pedigree (1,1,1,1,1)
  Literature value. Needed for the oxidising atmosphere.
  EcoSpold01Location=RER
  properties: dry mass 1 kg, wet mass 1 kg
- inert waste, for final disposal: 0 kg; pedigree (1,1,1,1,1)
  Estimation. The remaining manganese concentrate and lithium carbonate (5 % of the input) are assumed to be disposed as inert waste.
  EcoSpold01Location=CH
  production volume 0 kg
    Calculated from the production volume of lithium manganese oxide in proportion to the respective output amounts.
  properties: water content 0.00502513, wet mass 1 kg, dry mass 0.995 kg
- electricity, medium voltage: 0.005 kWh; lognormal variance with pedigree 0.096, pedigree (4,5,5,5,3)
  EcoSpold01Location=CN
  Estimation. Consumption of the mechanical drive of the rotary kiln.
- manganese(III) oxide: 0.91817 kg; source Heil, G. 2003; lognormal variance with pedigree 0.0527, pedigree (2,4,5,3,1)
  Stoichiometric calculation.
  EcoSpold01Location=CN
  properties: dry mass 1 kg, wet mass 1 kg
- lithium carbonate: 0.21486 kg; source Heil, G. 2003; lognormal variance with pedigree 0.0527, pedigree (2,4,5,3,1)
  EcoSpold01Location=GLO
  Stoichiometric calculation.
  properties: wet mass 1 kg, carbon content, fossil 0.16255, dry mass 1 kg
- water, deionised: 0.799804, 0.0028791, 2.59642 kg (3 entries); source Heil, G. 2003; lognormal variance with pedigree 0.0527, pedigree (2,4,5,3,1)
  (same comment as for water, deionised)
- nitrogen, liquid: 0.169284, 0.616716 kg (2 entries); source Heil, G. 2003; lognormal variance with pedigree 0.0521, pedigree (1,4,5,3,1)
  Literature value. Needed for inert atmosphere.
  EcoSpold01Location=RER
- oxygen, liquid: 0.153839, 0.560661 kg (2 entries); source Heil, G. 2003; lognormal variance with pedigree 0.0521, pedigree (1,4,5,3,1)
  Literature value. Needed for the oxidising atmosphere.
  EcoSpold01Location=RER
- inert waste, for final disposal: -0.000366434, -0.0562856 kg (2 entries); lognormal variance with pedigree 0.018, pedigree (1,1,4,1,1)
  (same comment as for inert waste, for final disposal)
  production volume 0.056652 kg

## Emissions to nature
- Water [air, urban air close to ground]: 0.0033991 m3; source Heil, G. 2003; lognormal variance with pedigree 0.0701, pedigree (4,4,5,3,1)
  Literature value. Evaporated water from the process.
- Carbon dioxide, fossil [air, unspecified]: 0.12794 kg; source Heil, G. 2003; lognormal variance with pedigree 0.0701, pedigree (4,4,5,3,1)
  Stoichiometric calculation.

## Sampling procedure
patent, website, ecoinvent

## Extrapolations
This dataset has been extrapolated from year 2010 to the year of the calculation (2019). The uncertainty has been adjusted accordingly.

## Review by Roland Hischier 2011-09-23
Transfer of documentation done.

## Review by Christian Bauer 2010-02-08
passed
