# hard coal coke factory construction

Dataset: EcoSpold 2, unit process
Geography: RER
Time period: 1990-01-01 to 2019-12-31
Technology level: current
Classification: EcoSpold01Categories: hard coal/production
Classification: ISIC rev.4 ecoinvent: 4290:Construction of other civil engineering projects
Tags: ConvertedDataset
Scenario: Business-as-Usual
System model: Allocation at the point of substitution
Generated by: Christian Bauer
Published in: Röder, A. 2007
Database: ecoinvent
isCopyrightProtected: true
accessRestrictedTo: 1

## General comment
The material input has been roughly estimated on the basis of the total cost of a modern German coke plant using the energy intensity of the construction sector. Due to total lack of information on the energy use for construction, 50 percent of the grey energy of input materials is used as first guess. The lifetime is assumed to be 30 years.
[This dataset was already contained in the ecoinvent database version 2. It was not individually updated during the transfer to ecoinvent version 3. Life Cycle Impact Assessment results may still have changed, as they are affected by changes in the supply chain, i.e. in other datasets. This dataset was generated following the ecoinvent quality guidelines for version 2. It may have been subject to central changes described in the ecoinvent version 3 change report (http://www.ecoinvent.org/database/ecoinvent-version-3/reports-of-changes/), and the results of the central updates were reviewed extensively. The changes added e.g. consistent water flows and other information throughout the database. The documentation of this dataset can be found in the ecoinvent reports of version 2, which are still available via the ecoinvent website. The change report linked above covers all central changes that were made during the conversion process.]

## Included activities end
Includes the most important construction materials for the plant and their disposal. Also included is the landuse of the plant and the energy needed for the construction.

## Geography
German condition, but with very poor base data.

## Technology
No specific information available.

## Reference product
- hard coal coke factory: 1 unit; CPC 53269: Other constructions for manufacturing; By-product classification allocatable product
  EcoSpold01Location=RER
  production volume 1.32237 unit
    This is a placeholder value that does not reflect real-world production volumes. This dataset does not currently require a real-world production volume to work in the database framework, and no actual data were collected yet. This has no negative effect on the results of the ecoinvent database. The placeholder value of this activity was scaled according to the nominal GDP of 2005 (source: United Nations, http://data.un.org/Glossary.aspx?q=GDP+%28current+US%24%29, accessed 20130726) to reflect an appropriate share of the global production volume, which is also a placeholder value.
  property price 1.43924e8 EUR2005
    Calculated based on inputs: The price of the product has been calculated as a sum of the values of the material and energy inputs for this product. This value is therefore a rough estimation. It may underestimate the real price since there are additional expenses when producing any product. These expences can include for example labour costs, treatment of waste materials and profit for the producer. Please consider carefully whether this level of data quality is acceptable for your application.
  property true value 1.43924e8
    allocation property applied in "true value" allocation // value calculated from revenue

## By-products
- iron scrap, sorted, pressed: 0 kg; By-product classification Recyclable; CPC 39310: Slag, dross, scalings and other waste from the manufacture of iron or steel; pedigree (1,1,1,1,1)
  Iron scrap recovered from this waste.
  production volume 139974 kg
  property price 0.175 EUR2005
    Temporary price data. Calculated as 90% of purchasers price based on: 2005 import and export prices (total trades (USD) divided by total weight (kg) in biggest economies of the world: EU27, USA, Brasil, China, India, Japan and Russia) from UN Commodity Trade Statistics Database (http://data.un.org/Explorer.aspxDatabase [Accessed 2011.06.20]). Commodity: Waste or scrap, of cast iron
  property carbon content 0
    carbon content on a dry matter basis (reserved; not for manual entry)
  property true value 2017.35
    allocation property applied in "true value" allocation // value calculated from revenue
  properties: water content 0, water in wet mass 0 kg, carbon content, fossil 0, dry mass 1 kg, carbon content, non-fossil 0, wet mass 1 kg, carbon allocation 0 kg
- electricity, for reuse in municipal waste incineration only: 0 kWh; CPC 17100: Electrical energy; By-product classification allocatable product; pedigree (1,1,1,1,1)
  Net electricity generated from this waste and used in internal MSWI plant energy redistribution.
  Uncertainty: uncertainty is calculated from uncertainties in waste composition and uncertainties in energy efficiency and the uncertainty in internal energy demand
  production volume 2.29106e6 kWh
  property exergy 3.6 MJ; name E_el_prod_MSWI_exergy
    This exergy property is based on the exergy content of the product.
  property true value relation 3.6; name E_el_prod_MSWI_true_value_relation
    property to calculate "true value" from
  property price 0.1 EUR2005; name E_el_prod_MSWI_price_EUR2005
    Estimated to be the same price as in case of electricity, medium voltage.
  property true value 8547.28
    allocation property applied in "true value" allocation // value calculated from true value relation
- heat, for reuse in municipal waste incineration only: 0 MJ; CPC 17300: Steam and hot water; By-product classification allocatable product; pedigree (1,1,1,1,1)
  Net useful heat generated from this waste and used in internal MSWI plant energy redistribution.
  Uncertainty: uncertainty is calculated from uncertainties in waste composition and uncertainties in energy efficiency and the uncertainty in internal energy demand
  production volume 1.58806e7 MJ
  property true value relation 0.1842; name E_th_prod_MSWI_true_value_relation
    property to calculate "true value" from
  property exergy 0.1842 MJ; name E_th_prod_MSWI_exergy
    This exergy property is based on the exergy content of the product.
  property price 0.0106 EUR2005; name E_th_prod_MSWI_price_EUR2005
    Average European district heat price from Ecoheatcool and Euroheat 2005-2006, Ecoheat Work package 1: The European heat market. Final report. 10.6 EUR/GJ i s the price of district heat. http://www.solarthermalworld.org/files/Ecoheatcool%20WP1%20Web.pdf?download
  property true value 3031.42
    (same comment as for electricity, for reuse in municipal waste incineration only)
- zinc concentrate: 0 kg; CPC 14290: Other non-ferrous metal ores and concentrates (other than uranium or thorium ores and concentrates); By-product classification allocatable product
  Calculated value from the knowledge of the properties of both products.
  production volume 151.656 kg
  property price 0.38 EUR2005; name ByP_price_EUR2005
    Temporary price data. Calculated as 90% of purchasers price based on: Zinc content in concentrate 53%. Concentrate price per kg Zn 86.5% of refined Zn price (13.5% treatment charges according to CHR Metals Limited 2005: Dynamic cost curves. http://www.minecost.com/dynamic.pdf). 2004 zinc price from USGS (2007) Mineral commodity summaries 2007. <http://minerals.usgs.gov/minerals/pubs/mcs/2007/mcs2007.pdf> [Accessed 25 May 2010]
  property zinc content 0.53; name zinc_C_zinc_concentrate
    Zinc content on a dry matter basis. Value taken from teh "zinc mine operation" /GLO dataset.
  property dry mass 1 kg; name DM_zinc_concentrate
  property carbon content 0
    carbon content on a dry matter basis (reserved; not for manual entry)
  property true value 1.67893
    allocation property applied in "true value" allocation // value calculated from revenue
  properties: wet mass 1 kg, water content 0, carbon content, non-fossil 0, carbon content, fossil 0, water in wet mass 0 kg, carbon allocation 0 kg

## Inputs from technosphere
- electricity, medium voltage: 5.20951e7 kWh; lognormal variance with pedigree 0.34, pedigree (1,1,5,1,1)
  EcoSpold01Location=UCTE
  own assumption
- diesel, burned in building machine: 7.49929e8 MJ; lognormal variance with pedigree 0.34, pedigree (1,1,5,1,1)
  own assumption
  EcoSpold01Location=GLO
- waste mineral wool: 0 kg; pedigree (1,1,1,1,1)
  own assumption
  EcoSpold01Location=CH
  production volume 0 kg
    Calculated from the production volume of hard coal coke factory in proportion to the respective output amounts.
  properties: wet mass 1 kg, dry mass 1 kg
- reinforcing steel: 1.34987e8 kg; lognormal variance with pedigree 0.34, pedigree (1,1,5,1,1)
  EcoSpold01Location=RER
  own assumption
  properties: carbon content, fossil 0.004, wet mass 1 kg, dry mass 1 kg
- waste reinforced concrete: 0 kg; pedigree (1,1,1,1,1)
  own assumption
  EcoSpold01Location=CH
  production volume 0 kg
    (same comment as for waste mineral wool)
  properties: wet mass 1 kg, dry mass 0.99418 kg, water content 0.00585407
- polyethylene, high density, granulate: 1.49986e6 kg; lognormal variance with pedigree 0.34, pedigree (1,1,5,1,1)
  own assumption
  EcoSpold01Location=RER
  properties: wet mass 1 kg, dry mass 1 kg, carbon content, fossil 0.857143
  note on carbon content, fossil: Polyethylene is formed out of a huge amount of ethylene monomers (C2H4) (ecoinvent v2.2 report 11_II). MW=28 g/mol
- stone wool: 7.49929e6 kg; lognormal variance with pedigree 0.34, pedigree (1,1,5,1,1)
  EcoSpold01Location=CH
  own assumption
  properties: wet mass 1 kg, dry mass 1 kg, carbon content, fossil 0.015401
  note on carbon content, fossil: The chemical composition of the glass fibres used in the rock wool production is similar to the composition of naturally cooled volcano basalt and has a composition listed in Tab. 3.1 and 3.2 in ecoinvent v2.2 report 16, part XIV. Rock wool contains: a minimum of 96% mineral fibres,between 0.5 and 3.0 weight percent of phenolic resin depending on the specific product characteristics, and about 0.2 percent mineral oil (ecoinvent v2.2 report 16, part XIV). An average composition of 1.8% phenolic resin, 0.2% mineral oil, and 98% mineral fibres has been assumed and used to calculate C content of the rock wool
- heat, district or industrial, other than natural gas: 7.49929e8 MJ; lognormal variance with pedigree 0.34, pedigree (1,1,5,1,1)
  own assumption
  EcoSpold01Location=RER
- waste polyethylene/polypropylene product: 0 kg; pedigree (1,1,1,1,1)
  EcoSpold01Location=CH
  own assumption
  production volume 0 kg
    (same comment as for waste mineral wool)
  properties: wet mass 1 kg, dry mass 0.847 kg, carbon content, fossil 0.748045, water content 0.180638
  note on carbon content, fossil: Mixed various plastics was used to estimate the C content of this waste (Tab A.2, ecoinvent v2.2 report 13_I)
- steel, low-alloyed, hot rolled: 1.34987e7 kg; lognormal variance with pedigree 0.34, pedigree (1,1,5,1,1)
  EcoSpold01Location=RER
  own assumption
  properties: carbon content, fossil 0.005, dry mass 1 kg, wet mass 1 kg
  note on carbon content, fossil: Low alloyed steel composition given in Tab. 3.2 ecoinvent v2.2 report 10_partII. Steel assumed to have a C content of 0.5%
- concrete, normal: 172984 m3; lognormal variance with pedigree 0.34, pedigree (1,1,5,1,1)
  own assumption
  EcoSpold01Location=CH
  properties: water content 0.086758, wet mass 2380 kg, dry mass 2190 kg
- steel, chromium steel 18/8, hot rolled: 1.34987e6 kg; lognormal variance with pedigree 0.34, pedigree (1,1,5,1,1)
  own assumption
  EcoSpold01Location=RER
  properties: dry mass 1 kg, carbon content, fossil 0.0008, wet mass 1 kg
  note on carbon content, fossil: Stainless steel model is the grade 304 steel (18/8 stainless, 18% chromium 8% nickel; max. 0.08% C)
- waste mineral wool: -7.41468e6, -84607.1 kg (2 entries); lognormal variance with pedigree 0.34, pedigree (1,1,5,1,1)
  own assumption
  EcoSpold01Location=CH
  production volume 7.5e6 kg
- waste reinforced concrete: -3.95769e8, -4.19347e6 kg (2 entries); lognormal variance with pedigree 0.34, pedigree (1,1,5,1,1)
  own assumption
  EcoSpold01Location=CH
  production volume 4e8 kg
- waste polyethylene/polypropylene product: -1.45616e6, -43695.7 kg (2 entries); lognormal variance with pedigree 0.34, pedigree (1,1,5,1,1)
  EcoSpold01Location=CH
  own assumption
  production volume 1.5e6 kg

## Inputs from nature
- Transformation, to industrial area [natural resource, land]: 199981 m2; lognormal variance with pedigree 0.34, pedigree (1,1,5,1,1)
  own assumption
- Occupation, industrial area [natural resource, land]: 5.99943e6 m2*year; lognormal variance with pedigree 0.34, pedigree (1,1,5,1,1)
  own assumption
- Transformation, from unspecified [natural resource, land]: 199981 m2; lognormal variance with pedigree 0.34, pedigree (1,1,5,1,1)
  own assumption

## Sampling procedure
literature

## Extrapolations
see Geography/Text

## Review by Hans-Jörg Althaus 2003-07-04
passed
