# treatment of hard coal ash, municipal incineration with fly ash extraction

Dataset: EcoSpold 2, unit process
Geography: CH
Time period: 2006-01-01 to 2019-12-31
Technology level: current
Classification: ISIC rev.4 ecoinvent: 3821:Treatment and disposal of non-hazardous waste
Synonyms: municipal waste incineration
Scenario: Business-as-Usual
System model: Allocation at the point of substitution
Share of production covered: 1.8 %
Generated by: Gabor Doka
Published in: Doka G. 2015
Database: ecoinvent
isCopyrightProtected: true
accessRestrictedTo: 1

## General comment
This dataset represents the activity of waste disposal of hard coal ash in a municipal solid waste incinerator (MSWI) // Recommended use of this dataset: For small amounts of hard coal ash from small scale furnaces, which go to disposal as part of communal waste mixture. Larger amounts will be landfilled or could be used in building material production. // // Waste composition (wet, in ppm): upper heating value 0.4712 MJ/kg; H2O n.a.; O 298030; H n.a.; C 100000; S n.a.; N n.a.; P 980; B 350; Cl n.a.; Br 97; F n.a.; I 16.4; Ag n.a.; As 92; Ba 1960; Cd 4.5; Co 49; Cr 192; Cu 146.25; Hg 0.1; Mn 693; Mo 28.5; Ni 194; Pb 376; Sb 9.5; Se 7; Sn 19.8; V 388; Zn 475; Be 19.6; Sc 39.6; Sr 1940; Ti 5880; Tl 9.5; W n.a.; Si 245000; Fe 68600; Ca 19600; Al 166600; K 19600; Mg 58800; Na 9800; // Share of carbon in waste that is biogenic 0%. // Share of metals in waste not oxidised and bulk-recyclable (exclude very small or thin parts) Iron: 0%; Alu: 0%; Copper: 0%. // Recovery of metal scrap from bottom ash to recycling: 0g iron scrap, 0g aluminium scrap, 0g copper scrap.Ultimately one kg of this waste produces 1.623 kg of bottom ash (can include some washed ash) and 0 kg of residues, which are landfilled (technology mix). Net energy production: 0MJ/kg electric energy and 0MJ/kg thermal energy. //

## Included activities start
waste incineration from waste reception gate and delivery into waste bunker at incinerator plant site (without transports to the incinerator)

## Included activities end
Waste-specific short-term emissions to water from leachate. Long-term emissions from landfill to ground water.

## Geography
Specific to the technology mix encountered in Switzerland in 2012.

## Technology
average Swiss MSWI plants in 2010 (grate incinerators) with electrostatic precipitator for fly ash (ESP), wet flue gas scrubber and 25% SNCR , 42.77% SCR-high dust , 32.68% SCR-low dust -DeNOx facilities and 0% without Denox (weighted according to mass of burnt waste, representing Swiss average). Efficiency of iron scrap separation from slag : 58%. Efficiency of non-ferrous scrap separation from slag : 31%. The technology mix for this dataset includes a filter ash treatment (FLUWA) of a share of 46.22%. Gross electric efficiency technology mix 15.84% and Gross thermal efficiency technology mix 28.51%

## Time period
Waste composition as given in literature reference, theoretical data or other source. Transfer coefficients for modern MSWI.

## Reference product
- hard coal ash: -1 kg; CPC 39: Wastes or scraps; By-product classification Waste
  Main reference product of this activity (supply of disposal service).
  production volume 4.026e7 kg
    based on corresponding global production volume of MSW fraction in conventional MSWI (wo fly ash extraction) and scaled down to annual Swiss incinerated MSW mass of 3.02 mio. tonnes.
  property price 0 EUR2005
    Waste products are assigned a price of zero as they are assumed to require further treatment.
  property carbon content 0.1
    carbon content on a dry matter basis (reserved; not for manual entry)
  properties: dry mass 1 kg, sodium content 0.0098, carbon content, fossil 0.1, wet mass 1 kg, potassium content 0.0196, iron content 0.0686, zinc content 0.000475, magnesium content 0.0588, thallium content 9.5e-6, aluminium content 0.1666, calcium content 0.0196, strontium content 0.00194, titanium content 0.00588, silicon content 0.245, beryllium content 1.96e-5, scandium content 3.96e-5, selenium content 7e-6, molybdenum content 2.85e-5, lead content 0.000376, tin content 1.98e-5, vanadium content 0.000388, antimony content 9.5e-6, manganese content 0.000693, nickel content 0.000194, mercury content 1e-7, cobalt content 4.9e-5, barium content 0.00196, copper content 0.00014625, chromium content 0.000192, iodine content 1.64e-5, cadmium content 4.5e-6, arsenic content 9.2e-5, oxygen content 0.29803, phosphorus content 0.00098, boron content 0.00035, bromine content 9.7e-5, carbon allocation 0.1 kg

## Inputs from technosphere
- transport, freight, lorry, unspecified: 0.064912 metric ton*km; lognormal variance with pedigree 0.015055, pedigree (1,1,3,1,1)
  Transport services to transport incineration residues to landfills and filter ash to external treatments (FLUWA).
  Uncertainty: uncertainty calculated from uncertainty of the waste composition of this waste, uncertainty of transfer coefficients and the uncertainty in generic transportation distances
- titanium dioxide: 2.4882e-6 kg; lognormal variance with pedigree 0.44942, pedigree (1,1,3,1,1)
  Input to DeNOx stage (TiO2 catalyst carrier)
  Uncertainty: uncertainty calculated from uncertainty in average DeNOx input, uncertainty in the share of thermal NOx, uncertainty of nitrogen content in average municipal waste and the uncertainty in nitrogen content in *this* waste.
  properties: wet mass 1 kg, dry mass 1 kg
- slag landfill: 2.885e-9 unit; lognormal variance with pedigree 0.015055, pedigree (1,1,3,1,1)
  Landfill infrastructure required for landfilling of bottom ash.
  Uncertainty: uncertainty is calculated from uncertainties in waste composition and transfer coefficients in incinerator
- heat, district or industrial, natural gas: 0.0074265 MJ; lognormal variance with pedigree 0.12326, pedigree (1,1,3,1,1)
  Input to DeNOx stage, to heat up flue gas in low-dust SCR.
  Uncertainty: uncertainty calculated from uncertainty in average DeNOx input, uncertainty in the share of thermal NOx, uncertainty of nitrogen content in average municipal waste and the uncertainty in nitrogen content in *this* waste.
- electricity, for reuse in municipal waste incineration only: 0.032088 kWh; name E_el_prod_MSWI; lognormal variance with pedigree 0.00259512, pedigree (1,1,3,1,1)
  Net electricity required to incinerate this waste (subsidiesed from high-calorific waste fractions).
  Uncertainty: uncertainty is calculated from uncertainties in waste composition and uncertainties in energy efficiency and the uncertainty in internal energy demand
- municipal waste incineration facility: 2.5e-10 unit
  Demands per kilogram waste.
- ammonia, liquid: 3.9714e-5 kg; lognormal variance with pedigree 0.12326, pedigree (1,1,3,1,1)
  Input to DeNOx stage (100% NH3).
  Uncertainty: uncertainty calculated from uncertainty in average DeNOx input, uncertainty in the share of thermal NOx, uncertainty of nitrogen content in average municipal waste and the uncertainty in nitrogen content in *this* waste.
  properties: wet mass 1 kg, dry mass 1 kg
- process-specific burdens, slag landfill: 1.6228 kg; lognormal variance with pedigree 0.015055, pedigree (1,1,3,1,1)
  Mass-specific expenditures required for landfilling of bottom ash.;activityLink introduced to establish a direct link to the corresponding regional supply of this product
  Uncertainty: uncertainty is calculated from uncertainties in waste composition and transfer coefficients in incinerator
- chromium oxide, flakes: 5.0779e-8 kg; lognormal variance with pedigree 0.44942, pedigree (1,1,3,1,1)
  Input to DeNOx stage. Active component in SCR catalyst (vanadium pentoxide, V2O5), here approximated with the available chromium trioxide.
  Uncertainty: uncertainty calculated from uncertainty in average DeNOx input, uncertainty in the share of thermal NOx, uncertainty of nitrogen content in average municipal waste and the uncertainty in nitrogen content in *this* waste.
  properties: dry mass 1 kg, wet mass 1 kg
- heat, for reuse in municipal waste incineration only: 0.05514 MJ; name E_th_prod_MSWI; lognormal variance with pedigree 0.00259512, pedigree (1,1,3,1,1)
  Net heat required to incinerate this waste (subsidiesed from high-calorific waste fractions).
  Uncertainty: uncertainty is calculated from uncertainties in waste composition and uncertainties in energy efficiency and the uncertainty in internal energy demand

## Inputs from nature
- Oxygen [natural resource, in air]: 0.12222 kg; lognormal variance with pedigree 0.041235, pedigree (1,1,3,1,1)
  Oxygen from ambient air needed to combust and oxidise this waste. Net demand, i.e. without O2 leaving the plant in flue gas uncombusted.
  Uncertainty: uncertainty is calculated from uncertainties in waste composition and transfer coefficients to flue gas and soild residues in incinerator

## Emissions to nature
- Potassium, ion [water, surface water]: 0.0023687 kg; lognormal variance with pedigree 0.39472, pedigree (1,1,3,1,1)
  Emissions to water from waste composition and transfer coefficients in incinerator and landfills.
  Uncertainty: uncertainty is calculated from uncertainties in waste composition and transfer coefficients in incinerator and landfills
- NMVOC, non-methane volatile organic compounds, unspecified origin [air, urban air close to ground]: 2.2079e-6 kg; lognormal variance with pedigree 0.0431, pedigree (1,1,3,1,1)
  Incomplete combustion product emitted to air.
  Uncertainty: uncertainty calculated from uncertainty in average operation emissions, and the uncertainty of the flue gas volume from this waste.
- Aluminium [water, surface water]: 2.189e-6 kg; lognormal variance with pedigree 1.3048, pedigree (1,1,3,1,1)
  (same comment as for Potassium, ion)
- Sodium, ion [water, ground-, long-term]: 0.0086041 kg; lognormal variance with pedigree 0.37284, pedigree (1,1,3,1,1)
  Long-term emissions from landfilling of incineration residues.
  Uncertainty: uncertainty is calculated from uncertainties in waste composition and transfer coefficients in incinerator and landfills.
- Calcium, ion [water, surface water]: 8.5522e-5 kg; lognormal variance with pedigree 0.75619, pedigree (1,1,3,1,1)
  (same comment as for Potassium, ion)
- Magnesium [water, ground-, long-term]: 0.058577 kg; lognormal variance with pedigree 0.17334, pedigree (1,1,3,1,1)
  (same comment as for Sodium, ion)
- Iron, ion [water, surface water]: 5.7399e-7 kg; lognormal variance with pedigree 1.4416, pedigree (1,1,3,1,1)
  (same comment as for Potassium, ion)
- Water [air, urban air close to ground]: 0 m3
  Water vapour from waste humidity, hydrogen oxidation and part of the process water.
- Potassium, ion [water, ground-, long-term]: 0.017231 kg; lognormal variance with pedigree 0.29181, pedigree (1,1,3,1,1)
  (same comment as for Sodium, ion)
- Silicon [water, surface water]: 9.0399e-6 kg; lognormal variance with pedigree 1.141, pedigree (1,1,3,1,1)
  (same comment as for Potassium, ion)
- Aluminium [water, ground-, long-term]: 0.13609 kg; lognormal variance with pedigree 0.091126, pedigree (1,1,3,1,1)
  (same comment as for Sodium, ion)
- Thallium [water, surface water]: 5.9823e-9 kg; lognormal variance with pedigree 1.9897, pedigree (1,1,3,1,1)
  (same comment as for Potassium, ion)
- Calcium, ion [water, ground-, long-term]: 0.019514 kg; lognormal variance with pedigree 0.29081, pedigree (1,1,3,1,1)
  (same comment as for Sodium, ion)
- Titanium, ion [water, surface water]: 2.8367e-8 kg; lognormal variance with pedigree 1.7894, pedigree (1,1,3,1,1)
  (same comment as for Potassium, ion)
- Iron, ion [water, ground-, long-term]: 0.035685 kg; lognormal variance with pedigree 0.26506, pedigree (1,1,3,1,1)
  (same comment as for Sodium, ion)
- Strontium [water, surface water]: 1.2217e-6 kg; lognormal variance with pedigree 1.2868, pedigree (1,1,3,1,1)
  (same comment as for Potassium, ion)
- Silicon [water, ground-, long-term]: 0.0020963 kg; lognormal variance with pedigree 5.7204, pedigree (1,1,3,1,1)
  (same comment as for Sodium, ion)
- Scandium [water, surface water]: 2.3933e-6 kg; lognormal variance with pedigree 1.2545, pedigree (1,1,3,1,1)
  (same comment as for Potassium, ion)
- Thallium [water, ground-, long-term]: 9.494e-6 kg; lognormal variance with pedigree 1.2767, pedigree (1,1,3,1,1)
  (same comment as for Sodium, ion)
- Beryllium [water, surface water]: 1.2342e-8 kg; lognormal variance with pedigree 1.8938, pedigree (1,1,3,1,1)
  (same comment as for Potassium, ion)
- Titanium, ion [water, ground-, long-term]: 0.0017636 kg; lognormal variance with pedigree 0.79646, pedigree (1,1,3,1,1)
  (same comment as for Sodium, ion)
- Zinc, ion [water, surface water]: 1.414e-8 kg; lognormal variance with pedigree 1.8733, pedigree (1,1,3,1,1)
  (same comment as for Potassium, ion)
- Strontium [water, ground-, long-term]: 0.0019388 kg; lognormal variance with pedigree 0.57378, pedigree (1,1,3,1,1)
  (same comment as for Sodium, ion)
- Vanadium, ion [water, surface water]: 1.7213e-7 kg; lognormal variance with pedigree 1.5429, pedigree (1,1,3,1,1)
  (same comment as for Potassium, ion)
- Scandium [water, ground-, long-term]: 3.7207e-5 kg; lognormal variance with pedigree 1.0876, pedigree (1,1,3,1,1)
  (same comment as for Sodium, ion)
- Tin, ion [water, surface water]: 3.167e-10 kg; lognormal variance with pedigree 2.3774, pedigree (1,1,3,1,1)
  (same comment as for Potassium, ion)
- Beryllium [water, ground-, long-term]: 1.9588e-5 kg; lognormal variance with pedigree 1.1808, pedigree (1,1,3,1,1)
  (same comment as for Sodium, ion)
- Selenium [water, surface water]: 1.1132e-7 kg; lognormal variance with pedigree 1.6272, pedigree (1,1,3,1,1)
  (same comment as for Potassium, ion)
- Zinc, ion [water, ground-, long-term]: 0.00047499 kg; lognormal variance with pedigree 0.7573, pedigree (1,1,3,1,1)
  (same comment as for Sodium, ion)
- Antimony [water, surface water]: 6.4062e-9 kg; lognormal variance with pedigree 1.9808, pedigree (1,1,3,1,1)
  (same comment as for Potassium, ion)
- Vanadium, ion [water, ground-, long-term]: 3.7922e-5 kg; lognormal variance with pedigree 2.1359, pedigree (1,1,3,1,1)
  (same comment as for Sodium, ion)
- Lead [water, surface water]: 6.8634e-9 kg; lognormal variance with pedigree 1.9687, pedigree (1,1,3,1,1)
  (same comment as for Potassium, ion)
- Tin, ion [water, ground-, long-term]: 1.969e-5 kg; lognormal variance with pedigree 1.1794, pedigree (1,1,3,1,1)
  (same comment as for Sodium, ion)
- Nickel, ion [water, surface water]: 1.2217e-7 kg; lognormal variance with pedigree 1.5889, pedigree (1,1,3,1,1)
  (same comment as for Potassium, ion)
- Selenium [water, ground-, long-term]: 6.7213e-6 kg; lognormal variance with pedigree 1.3173, pedigree (1,1,3,1,1)
  (same comment as for Sodium, ion)
- Molybdenum [water, surface water]: 1.3279e-6 kg; lognormal variance with pedigree 1.3242, pedigree (1,1,3,1,1)
  (same comment as for Potassium, ion)
- Water [water, surface water]: 0 m3
  Process water released to surface water.
- Antimony [water, ground-, long-term]: 1.3747e-6 kg; lognormal variance with pedigree 2.2107, pedigree (1,1,3,1,1)
  (same comment as for Sodium, ion)
- Manganese [water, surface water]: 3.5469e-8 kg; lognormal variance with pedigree 1.7518, pedigree (1,1,3,1,1)
  (same comment as for Potassium, ion)
- Lead [water, ground-, long-term]: 0.00037599 kg; lognormal variance with pedigree 0.78816, pedigree (1,1,3,1,1)
  (same comment as for Sodium, ion)
- Mercury [water, surface water]: 2.6198e-9 kg; lognormal variance with pedigree 2.12, pedigree (1,1,3,1,1)
  (same comment as for Potassium, ion)
- Nickel, ion [water, ground-, long-term]: 0.00019388 kg; lognormal variance with pedigree 0.87588, pedigree (1,1,3,1,1)
  (same comment as for Sodium, ion)
- Copper, ion [water, surface water]: 5.0776e-9 kg; lognormal variance with pedigree 2.0091, pedigree (1,1,3,1,1)
  (same comment as for Potassium, ion)
- Molybdenum [water, ground-, long-term]: 2.7172e-5 kg; lognormal variance with pedigree 1.1313, pedigree (1,1,3,1,1)
  (same comment as for Sodium, ion)
- Chromium VI [water, surface water]: 5.4904e-9 kg; lognormal variance with pedigree 1.9985, pedigree (1,1,3,1,1)
  (same comment as for Potassium, ion)
- Manganese [water, ground-, long-term]: 0.00069296 kg; lognormal variance with pedigree 0.7076, pedigree (1,1,3,1,1)
  (same comment as for Sodium, ion)
- Cobalt [water, surface water]: 6.8171e-9 kg; lognormal variance with pedigree 1.9708, pedigree (1,1,3,1,1)
  (same comment as for Potassium, ion)
- Mercury [water, ground-, long-term]: 9.738e-8 kg; lognormal variance with pedigree 1.866, pedigree (1,1,3,1,1)
  (same comment as for Sodium, ion)
- Cadmium, ion [water, surface water]: 2.3152e-9 kg; lognormal variance with pedigree 2.1146, pedigree (1,1,3,1,1)
  (same comment as for Potassium, ion)
- Copper, ion [water, ground-, long-term]: 0.00014624 kg; lognormal variance with pedigree 0.91344, pedigree (1,1,3,1,1)
  (same comment as for Sodium, ion)
- Barium [water, surface water]: 3.0043e-7 kg; lognormal variance with pedigree 1.4715, pedigree (1,1,3,1,1)
  (same comment as for Potassium, ion)
- Chromium VI [water, ground-, long-term]: 1.2564e-6 kg; lognormal variance with pedigree 4.1951, pedigree (1,1,3,1,1)
  (same comment as for Sodium, ion)
- Arsenic, ion [water, surface water]: 1.3839e-7 kg; lognormal variance with pedigree 1.5753, pedigree (1,1,3,1,1)
  (same comment as for Potassium, ion)
- Cobalt [water, ground-, long-term]: 4.8993e-5 kg; lognormal variance with pedigree 1.059, pedigree (1,1,3,1,1)
  (same comment as for Sodium, ion)
- Iodide [water, surface water]: 1.64e-5 kg; lognormal variance with pedigree 1.2044, pedigree (1,1,3,1,1)
  (same comment as for Potassium, ion)
- Cadmium, ion [water, ground-, long-term]: 4.4977e-6 kg; lognormal variance with pedigree 1.3751, pedigree (1,1,3,1,1)
  (same comment as for Sodium, ion)
- Bromine [water, surface water]: 9.7e-5 kg; lognormal variance with pedigree 0.96808, pedigree (1,1,3,1,1)
  (same comment as for Potassium, ion)
- Barium [water, ground-, long-term]: 0.0019597 kg; lognormal variance with pedigree 0.57246, pedigree (1,1,3,1,1)
  (same comment as for Sodium, ion)
- Boron [water, surface water]: 2.7423e-6 kg; lognormal variance with pedigree 1.1913, pedigree (1,1,3,1,1)
  (same comment as for Potassium, ion)
- Arsenic, ion [water, ground-, long-term]: 9.1862e-5 kg; lognormal variance with pedigree 0.97513, pedigree (1,1,3,1,1)
  (same comment as for Sodium, ion)
- Heat, waste [water, surface water]: 0.10919 MJ; lognormal variance with pedigree 0.94925, pedigree (1,1,3,1,1)
  Waste heat generated from heating value of this waste plus any electricity required to process it.
  Uncertainty: uncertainty is calculated from uncertainties in waste composition and uncertainties in energy efficiency and the uncertainty in internal energy demand
- Phosphate [water, surface water]: 6.6184e-8 kg; lognormal variance with pedigree 1.8179, pedigree (1,1,3,1,1)
  (same comment as for Potassium, ion)
- Iodide [water, ground-, long-term]: 1.476e-12 kg; lognormal variance with pedigree 1.2327, pedigree (1,1,3,1,1)
  (same comment as for Sodium, ion)
- Heat, waste [air, urban air close to ground]: 0.47755 MJ; lognormal variance with pedigree 0.94925, pedigree (1,1,3,1,1)
  (same comment as for Heat, waste)
- DOC, Dissolved Organic Carbon [water, surface water]: 0.00017983 kg; lognormal variance with pedigree 0.61279, pedigree (1,1,3,1,1)
  (same comment as for Potassium, ion)
- Boron [water, ground-, long-term]: 0.00029122 kg; lognormal variance with pedigree 0.80589, pedigree (1,1,3,1,1)
  (same comment as for Sodium, ion)
- Benzo(a)pyrene [air, urban air close to ground]: 1.0796e-12 kg; lognormal variance with pedigree 0.30374, pedigree (1,1,3,1,1)
  (same comment as for NMVOC, non-methane volatile organic compounds, unspecified origin)
- TOC, Total Organic Carbon [water, surface water]: 0.00017983 kg; lognormal variance with pedigree 0.61279, pedigree (1,1,3,1,1)
  (same comment as for Potassium, ion)
- Bromine [water, ground-, long-term]: 8.73e-12 kg; lognormal variance with pedigree 0.99638, pedigree (1,1,3,1,1)
  (same comment as for Sodium, ion)
- Phenol, pentachloro- [air, urban air close to ground]: 2.1128e-11 kg; lognormal variance with pedigree 0.0431, pedigree (1,1,3,1,1)
  (same comment as for NMVOC, non-methane volatile organic compounds, unspecified origin)
- COD, Chemical Oxygen Demand [water, surface water]: 0.00045445 kg; lognormal variance with pedigree 0.61279, pedigree (1,1,3,1,1)
  (same comment as for Potassium, ion)
- TOC, Total Organic Carbon [water, ground-, long-term]: 0.04982 kg; lognormal variance with pedigree 0.12332, pedigree (1,1,3,1,1)
  (same comment as for Sodium, ion)
- Benzene, hexachloro- [air, urban air close to ground]: 1.0144e-10 kg; lognormal variance with pedigree 0.0431, pedigree (1,1,3,1,1)
  (same comment as for NMVOC, non-methane volatile organic compounds, unspecified origin)
- BOD5, Biological Oxygen Demand [water, surface water]: 0.00014865 kg; lognormal variance with pedigree 0.61279, pedigree (1,1,3,1,1)
  (same comment as for Potassium, ion)
- Phosphate [water, ground-, long-term]: 3.9644e-5 kg; lognormal variance with pedigree 5.3441, pedigree (1,1,3,1,1)
  (same comment as for Sodium, ion)
- Benzene, pentachloro- [air, urban air close to ground]: 2.5632e-10 kg; lognormal variance with pedigree 0.0431, pedigree (1,1,3,1,1)
  (same comment as for NMVOC, non-methane volatile organic compounds, unspecified origin)
- Ammonia [air, urban air close to ground]: 4.6693e-8 kg; lognormal variance with pedigree 0.16559, pedigree (1,1,3,1,1)
  Nitrogen species emitted to air after DeNOx stage.
  Uncertainty: uncertainty calculated from uncertainty in average N-emissions and uncertainty in the share of thermal NOx and the uncertainty in nitrogen content in *this* waste.
- DOC, Dissolved Organic Carbon [water, ground-, long-term]: 0.04982 kg; lognormal variance with pedigree 0.12332, pedigree (1,1,3,1,1)
  (same comment as for Sodium, ion)
- Toluene [air, urban air close to ground]: 9.7031e-8 kg; lognormal variance with pedigree 0.0431, pedigree (1,1,3,1,1)
  (same comment as for NMVOC, non-methane volatile organic compounds, unspecified origin)
- Nitrogen oxides [air, urban air close to ground]: 1.4786e-5 kg; lognormal variance with pedigree 0.16559, pedigree (1,1,3,1,1)
  Sum of fuel-Nox and thermal-NOx emitted to air after DeNOx stage.
  Uncertainty: uncertainty calculated from uncertainty in average N-emissions and uncertainty in the share of thermal NOx and the uncertainty in nitrogen content in *this* waste.
- COD, Chemical Oxygen Demand [water, ground-, long-term]: 0.1259 kg; lognormal variance with pedigree 0.12332, pedigree (1,1,3,1,1)
  (same comment as for Sodium, ion)
- Benzene [air, urban air close to ground]: 4.8516e-8 kg; lognormal variance with pedigree 0.0431, pedigree (1,1,3,1,1)
  (same comment as for NMVOC, non-methane volatile organic compounds, unspecified origin)
- Methane, fossil [air, urban air close to ground]: 7.2773e-7 kg; lognormal variance with pedigree 0.0431, pedigree (1,1,3,1,1)
  (same comment as for NMVOC, non-methane volatile organic compounds, unspecified origin)
- BOD5, Biological Oxygen Demand [water, ground-, long-term]: 0.041183 kg; lognormal variance with pedigree 0.12332, pedigree (1,1,3,1,1)
  (same comment as for Sodium, ion)
- Dioxins, measured as 2,3,7,8-tetrachlorodibenzo-p-dioxin [air, urban air close to ground]: 9.7025e-14 kg; lognormal variance with pedigree 0.30374, pedigree (1,1,3,1,1)
  (same comment as for NMVOC, non-methane volatile organic compounds, unspecified origin)
- Carbon monoxide, fossil [air, urban air close to ground]: 8.2471e-5 kg; lognormal variance with pedigree 0.64957, pedigree (1,1,3,1,1)
  (same comment as for NMVOC, non-methane volatile organic compounds, unspecified origin)
- Sodium, ion [water, surface water]: 0.0011959 kg; lognormal variance with pedigree 0.47491, pedigree (1,1,3,1,1)
  (same comment as for Potassium, ion)
- Particulates, > 2.5 um, and < 10um [air, urban air close to ground]: 2.9107e-8 kg; lognormal variance with pedigree 0.12211, pedigree (1,1,3,1,1)
  (same comment as for NMVOC, non-methane volatile organic compounds, unspecified origin)
- Magnesium [water, surface water]: 0.00022339 kg; lognormal variance with pedigree 0.65597, pedigree (1,1,3,1,1)
  (same comment as for Potassium, ion)
- Particulates, < 2.5 um [air, urban air close to ground]: 5.7924e-6 kg; lognormal variance with pedigree 0.30374, pedigree (1,1,3,1,1)
  (same comment as for NMVOC, non-methane volatile organic compounds, unspecified origin)

## Extrapolations
This dataset has been extrapolated from year 2012 to the year of the calculation (2019). The uncertainty has been adjusted accordingly.
