# treatment of used exhaust air roof hood, steel, DN 400

Dataset: EcoSpold 2, unit process
Geography: CH
Time period: 2000-01-01 to 2019-12-31
Technology level: current
Classification: EcoSpold01Categories: waste management/building demolition
Classification: ISIC rev.4 ecoinvent: 3830:Materials recovery
Tags: ConvertedDataset; Treatment
Scenario: Business-as-Usual
System model: Allocation at the point of substitution
Generated by: Alex Primas
Published in: Hässig, W. 2007
Database: ecoinvent
isCopyrightProtected: true
accessRestrictedTo: 1

## General comment
Disposal of a roof mounted exhaust air hood made of zinc coated steel. Compatible with spiral seam duct of 400 mm diameter. Weight per element 17 kg
[This dataset was already contained in the ecoinvent database version 2. It was not individually updated during the transfer to ecoinvent version 3. Life Cycle Impact Assessment results may still have changed, as they are affected by changes in the supply chain, i.e. in other datasets. This dataset was generated following the ecoinvent quality guidelines for version 2. It may have been subject to central changes described in the ecoinvent version 3 change report (http://www.ecoinvent.org/database/ecoinvent-version-3/reports-of-changes/), and the results of the central updates were reviewed extensively. The changes added e.g. consistent water flows and other information throughout the database. The documentation of this dataset can be found in the ecoinvent reports of version 2, which are still available via the ecoinvent website. The change report linked above covers all central changes that were made during the conversion process.]

## Included activities end
Transport to dismantling facilities, machines for handling in sorting plant, electricity demand for sorting plant, final disposal of waste material. Cut-off to recycling for metals.

## Geography
Specific to the technology mix encountered in sorting plants in Switzerland

## Technology
Disposal to a sorting plant assumed. Metal pieces and copper in cables and electronic devices are recycled, plastic parts are incinerated, inert wastes (e.g. rock wool) are landfilled.

## Time period
Amount of material investigated in 2003. Disposal technology mix as used in late 1990ies

## Reference product
- used exhaust air roof hood steel, DN 400: -1 unit; CPC 39310: Slag, dross, scalings and other waste from the manufacture of iron or steel; By-product classification Waste
  EcoSpold01Location=CH
  production volume 0.0336675 unit
    This is a placeholder value that does not reflect real-world production volumes. This dataset does not currently require a real-world production volume to work in the database framework, and no actual data were collected yet. This has no negative effect on the results of the ecoinvent database. The placeholder value of this activity was scaled according to the nominal GDP of 2005 (source: United Nations, http://data.un.org/Glossary.aspx?q=GDP+%28current+US%24%29, accessed 20130726) to reflect an appropriate share of the global production volume, which is also a placeholder value.
  property price 0 EUR2005
    Waste products are assigned a price of zero as they are assumed to require further treatment.
  property carbon content 0.00377059
    carbon content on a dry matter basis (reserved; not for manual entry)
  properties: water in wet mass 0 kg, carbon content, non-fossil 0, water content 0, carbon content, fossil 0.00377059, wet mass 17 kg, dry mass 17 kg, carbon allocation 0.0641 kg

## Inputs from technosphere
- waste bulk iron, excluding reinforcement: -17 kg; lognormal variance with pedigree 0.072, pedigree (3,4,5,1,3)
  EcoSpold01Location=CH
  Estimation based on data of Questionnaire
  Uncertainty: Estimation based on data of Questionnaire
  production volume 17 kg
    Calculated from the production volume of used exhaust air roof hood steel, DN 400 in proportion to the respective output amounts.
  properties: dry mass 1 kg, wet mass 1 kg
- waste paint on metal: -0.137 kg; lognormal variance with pedigree 0.072, pedigree (3,4,5,1,3)
  (same comment as for waste bulk iron, excluding reinforcement)
  production volume 0.137 kg
    (same comment as for waste bulk iron, excluding reinforcement)
  properties: carbon content, fossil 0.65, dry mass 1 kg, wet mass 1 kg

## Sampling procedure
Questionnaire and assumptions.

## Extrapolations
This dataset has been extrapolated from year 2000 to the year of the calculation (2019). The uncertainty has been adjusted accordingly.

## Review by Rolf Frischknecht 2007-08-16
passed
none
