# collector field area construction, solar thermal parabolic trough, 50 MW

Dataset: EcoSpold 2, unit process
Geography: ZA
Time period: 2010-01-01 to 2020-01-01
Technology level: current
Classification: ISIC rev.4 ecoinvent: 4220a: Construction of utility projects for electricity production, except for liquid fuels
Synonyms: solar-field aperture area
Tags: CSP; Concentrated Solar Power
Scenario: Business-as-Usual
System model: Allocation at the point of substitution
Generated by: Karin Treyer
Published in: Telsnig, Thomas 2015
Database: ecoinvent
isCopyrightProtected: true
accessRestrictedTo: 1

## General comment
This activity represents the construction of the collector field area for a 50 MW solar thermal parabolic trough power plant in Upington, South Africa. The total solar aperture area amounts to 600'000m2. The parabolic trough consists of the foundation of the individual collector elements, the steel construction, the collector mirrors, the receiver pipes and the drives of the collectors.
Total land use for the concentrated solar power plant is accounted for in the dataset "concentrated solar power plant construction, solar thermal parabolic trough, 50 MW".
This dataset is entirely based on the detailed life cycle inventory as presented in the dissertation report by
Telsnig, Thomas. 2015. Standortabhängige Analyse und Bewertung solarthermischer Kraftwerke am Beispiel Südafrikas. Forschungsbericht. Band 123. ISSN 0938-1228. Institut für Energiewirtschaft und Rationelle Energieanwendung, Universität Stuttgart, Germany.

## Included activities start
This activity starts with the construction of a precise square area for placement, operationalization and maintenance for the solar power plant.

## Included activities end
This activity concludes with the construction of the parabolic troughs and painting the steel rods that are used to for staging and rotating the troughs.

## Geography
The CSP plant represented in this dataset has been modelled specifically for South African conditions (see Telsnig 2015).

## Reference product
- collector field area, solar thermal parabolic trough, 50 MW: 1 unit; By-product classification allocatable product; CPC 54262: General construction services of power plants; pedigree (1,1,1,1,1)
  Reference product unit for construction of collector field area for a 50MW solar thermal parabolic trough,
  production volume 1 unit
    Assumption
  property lifetime 30 year
    The economic lifetime of the plant is assumed to be 30 years.
  property Surface 600000 m2
    Calculated collector field area (mirror area) for the considered plant design. This does not represent the land area covered.
  property price 1.71e8 EUR2005
    Telsnig 2015: Investment cost for the collector field area of a 50MW CSP solar thermal parabolic trough plant in South Africa (EUR2010) with limited storage capacity (see Table 4-4 in Telsnig, 2015).
    Reference(s): Telsnig, Thomas. 2015. Standortabhängige Analyse und Bewertung solarthermischer Kraftwerke am Beispiel Südafrikas. Forschungsbericht. Band 123. ISSN 0938-1228. Institut für Energiewirtschaft und Rationelle Energieanwendung, Universität Stuttgart, Germany.
  property true value 1.71e8
    allocation property applied in "true value" allocation // value calculated from revenue

## By-products
- electricity, for reuse in municipal waste incineration only: 0 kWh; CPC 17100: Electrical energy; By-product classification allocatable product; pedigree (1,1,1,1,1)
  Net electricity generated from this waste and used in internal MSWI plant energy redistribution.
  Uncertainty: uncertainty is calculated from uncertainties in waste composition and uncertainties in energy efficiency and the uncertainty in internal energy demand
  production volume 3557.77 kWh
  property true value relation 3.6; name E_el_prod_MSWI_true_value_relation
    property to calculate "true value" from
  property exergy 3.6 MJ; name E_el_prod_MSWI_exergy
    This exergy property is based on the exergy content of the product.
  property price 0.1 EUR2005; name E_el_prod_MSWI_price_EUR2005
    Estimated to be the same price as in case of electricity, medium voltage.
  property true value 460.897
    allocation property applied in "true value" allocation // value calculated from true value relation
- heat, for reuse in municipal waste incineration only: 0 MJ; CPC 17300: Steam and hot water; By-product classification allocatable product; pedigree (1,1,1,1,1)
  (same comment as for electricity, for reuse in municipal waste incineration only)
  production volume 26468.2 MJ
  property price 0.0106 EUR2005; name E_th_prod_MSWI_price_EUR2005
    Average European district heat price from Ecoheatcool and Euroheat 2005-2006, Ecoheat Work package 1: The European heat market. Final report. 10.6 EUR/GJ i s the price of district heat. http://www.solarthermalworld.org/files/Ecoheatcool%20WP1%20Web.pdf?download
  property exergy 0.1842 MJ; name E_th_prod_MSWI_exergy
    This exergy property is based on the exergy content of the product.
  property true value relation 0.1842; name E_th_prod_MSWI_true_value_relation
    property to calculate "true value" from
  property true value 175.444
    (same comment as for electricity, for reuse in municipal waste incineration only)
- copper: 0 kg; source Rentz O. 1999; By-product classification allocatable product; CPC 41413: Refined copper and copper alloys, unwrought; master alloys of copper
  Literature value. Copper uses: Before end-use copper is manufactured into semi fabricated products, such as shapes and ingots (known as 'semis'). These manufacturing processes are subdivided into hot working, cold working and, if necessary, process annealing. Few of the semis are ready for use as such. They more typically travel to first-stage manufacturers, who make metal rods, wire, and casting, and then to component manufacturers who produce such things as motors, valves, and insulated cables The components in turn are incorporated by final-stage manufacturers into a variety of finished products - automobiles, commercial buildings, residential housing, and so forth. These uses account for about 79% of the world-wide consumption of copper.
  production volume 4521.03 kg
  properties: dry mass 1 kg, water in wet mass 0 kg, wet mass 1 kg, carbon content, non-fossil 0, water content 0, price 5.52 EUR2005, carbon content, fossil 0, carbon content 0, carbon allocation 0 kg, true value 24956.1
- zinc concentrate: 0 kg; CPC 14290: Other non-ferrous metal ores and concentrates (other than uranium or thorium ores and concentrates); By-product classification allocatable product
  Calculated value from the knowledge of the properties of both products.
  production volume 3.58847e-6 kg
  property price 0.38 EUR2005; name ByP_price_EUR2005
    Temporary price data. Calculated as 90% of purchasers price based on: Zinc content in concentrate 53%. Concentrate price per kg Zn 86.5% of refined Zn price (13.5% treatment charges according to CHR Metals Limited 2005: Dynamic cost curves. http://www.minecost.com/dynamic.pdf). 2004 zinc price from USGS (2007) Mineral commodity summaries 2007. <http://minerals.usgs.gov/minerals/pubs/mcs/2007/mcs2007.pdf> [Accessed 25 May 2010]
  property zinc content 0.53; name zinc_C_zinc_concentrate
    Zinc content on a dry matter basis. Value taken from teh "zinc mine operation" /GLO dataset.
  property dry mass 1 kg; name DM_zinc_concentrate
  property carbon content 0
    carbon content on a dry matter basis (reserved; not for manual entry)
  property true value 1.36362e-6
    allocation property applied in "true value" allocation // value calculated from revenue
  properties: wet mass 1 kg, water content 0, carbon content, non-fossil 0, carbon content, fossil 0, water in wet mass 0 kg, carbon allocation 0 kg
- iron scrap, sorted, pressed: 0 kg; By-product classification Recyclable; CPC 39310: Slag, dross, scalings and other waste from the manufacture of iron or steel; pedigree (1,1,1,1,1)
  Iron scrap recovered from this waste.
  production volume 8500.92 kg
  property price 0.175 EUR2005
    Temporary price data. Calculated as 90% of purchasers price based on: 2005 import and export prices (total trades (USD) divided by total weight (kg) in biggest economies of the world: EU27, USA, Brasil, China, India, Japan and Russia) from UN Commodity Trade Statistics Database (http://data.un.org/Explorer.aspxDatabase [Accessed 2011.06.20]). Commodity: Waste or scrap, of cast iron
  property carbon content 0
    carbon content on a dry matter basis (reserved; not for manual entry)
  property true value 1487.66
    allocation property applied in "true value" allocation // value calculated from revenue
  properties: water content 0, water in wet mass 0 kg, carbon content, fossil 0, dry mass 1 kg, carbon content, non-fossil 0, wet mass 1 kg, carbon allocation 0 kg

## Inputs from technosphere
- flat glass, coated: 7.22981e6 kg; name glass; lognormal variance with pedigree 0.0137, pedigree (4,4,3,3,2)
  Flat glass for construction of mirrors
  properties: wet mass 1 kg, dry mass 1 kg
- nickel, 99.5%: 53.9914 kg; name nickel; lognormal variance with pedigree 0.0137, pedigree (4,4,3,3,2)
  Coating of tubes to enhance resistance towards abrasion
  properties: dry mass 1 kg, wet mass 1 kg
- waste reinforcement steel: -6.39168e6 kg; = ((steel+chromesteel+graphite+castiron+manganese+nickel+chromium)*0.35)*-1
  All steel types are assumed to be treated as reinforcing steel due to lack of other appropriate datasets in ecoinvent.
  For the time period 2003-2012, average steel recycling rate in South Africa amounted to 35% fo the total steel mass according to Telsnig 2015. The remaining steel is assumed to be sent to final disposal.
  production volume 6.3927e6 kg; = Ref('264ae350-5fee-47f9-ac53-795c1f2bbc10', 'ProductionVolume') * ((Ref('f130332b-6c0b-46ae-80ec-571034bafccd')*-1) / Ref('264ae350-5fee-47f9-ac53-795c1f2bbc10'))
    Calculated from production volume of reference product using the relative outputs.
  properties: wet mass 1 kg, dry mass 1 kg
- alkyd paint, white, without solvent, in 60% solution state: 63556.9 kg; name paint; lognormal variance with pedigree 0.0137, pedigree (4,4,3,3,2)
  Painting the steel and iron rods to prevent rust
  properties: wet mass 1 kg, dry mass 1 kg, carbon content, non-fossil 0.199629, carbon content, fossil 0.140367
  note on carbon content, non-fossil: C content was calculated as an addition of C content in the raw materials.
- waste glass: -7.25399e6 kg; = (glass+glasstube)*-1; lognormal variance with pedigree 0.0137, pedigree (4,4,3,3,2)
  Inert material cullet sometimes reused in the production of glass but nonusable inert cullet sent to landfill
  production volume 7.25514e6 kg; = Ref('264ae350-5fee-47f9-ac53-795c1f2bbc10', 'ProductionVolume') * ((Ref('01cd08ba-5d0e-4ec6-9a0c-a1cb57349e31')*-1) / Ref('264ae350-5fee-47f9-ac53-795c1f2bbc10'))
    Calculated from production volume of reference product using the relative outputs.
  properties: dry mass 1 kg, wet mass 1 kg
- manganese: 675.893 kg; lognormal variance with pedigree 0.0137, pedigree (4,4,3,3,2)
  Material composition of adsorber tubes
  properties: dry mass 1 kg, wet mass 1 kg
- steel, chromium steel 18/8, hot rolled: 425509 kg; name chromesteel; lognormal variance with pedigree 0.0137, pedigree (4,4,3,3,2)
  Used in combination with tubes that transfer high temperature fluids
  properties: dry mass 1 kg, wet mass 1 kg, carbon content, fossil 0.0008
  note on carbon content, fossil: Stainless steel model is the grade 304 steel (18/8 stainless, 18% chromium 8% nickel; max. 0.08% C)
- chromium: 53.9914 kg; lognormal variance with pedigree 0.0137, pedigree (4,4,3,3,2)
  Coating of tubes to enhance resistance towards abrasion
  properties: dry mass 1 kg, wet mass 1 kg
- cast iron: 675.893 kg; name castiron; lognormal variance with pedigree 0.0137, pedigree (4,4,3,3,2)
  Used in setting up of the parabolic troughs to stage the mirrors
  properties: dry mass 1 kg, carbon content, fossil 0.04, wet mass 1 kg
  note on carbon content, fossil: Cast iron is made by remelting pig iron in small furnaces (e.g. cupola furnaces or electric arc furnaces) and poured into moulds to make castings. It usually contains 2% to 6% carbon (ecoinvent v2.2 report 10_partII). An average content of 4% was considered
- waste paint: -63556.9 kg; = (Paint)*-1; lognormal variance with pedigree 0.0137, pedigree (4,4,3,3,2)
  Inert materials in alkyd solvent 60% are disposed in landfill
  production volume 63567 kg; = Ref('264ae350-5fee-47f9-ac53-795c1f2bbc10', 'ProductionVolume') * ((Ref('5a69678d-c4f5-4779-b772-2a3d697f3ff2')*-1) / Ref('264ae350-5fee-47f9-ac53-795c1f2bbc10'))
    Calculated from production volume of reference product using the relative outputs.
  properties: carbon content, fossil 0.65, dry mass 1 kg, wet mass 1 kg
- waste concrete, not reinforced: -5.04424e7 kg; = (concrete*2200)*-1; lognormal variance with pedigree 0.0137, pedigree (4,4,3,3,2)
  Calcium carbonate and gypsum are sent to landfill or incineration. The 2200 kg/m3 represents the density of the cement. This is done in order to convert the unit from m3 (vol) to kg (mass)
  production volume 5.04504e7 kg; = Ref('264ae350-5fee-47f9-ac53-795c1f2bbc10', 'ProductionVolume') * ((Ref('e17a7b79-b823-4b15-add9-5e9415d8ee85')*-1) / Ref('264ae350-5fee-47f9-ac53-795c1f2bbc10'))
    Calculated from production volume of reference product using the relative outputs.
  properties: wet mass 1 kg, dry mass 1 kg
- reinforcing steel: 1.78348e7 kg; name steel; lognormal variance with pedigree 0.0137, pedigree (4,4,3,3,2)
  Used in setting up of the parabolic troughs to stage the mirrors
  properties: dry mass 1 kg, carbon content, fossil 0.004, wet mass 1 kg
- lubricating oil: 9783.45 kg; lognormal variance with pedigree 0.0137, pedigree (4,4,3,3,2)
  Oil used to lubricate the hinges of the troughs to ensure ease of rotation
  properties: wet mass 1 kg, carbon content, fossil 0.75, dry mass 1 kg
  note on carbon content, fossil: Lubricating oil is produced from diesel. C-content/dry mass of fats and oils considered 75%, from: ecoinvent v2.2 report, n 15a, pg 40
- graphite: 219.965 kg; lognormal variance with pedigree 0.0137, pedigree (4,4,3,3,2)
  Used in field wiring
  properties: dry mass 1 kg, carbon content, fossil 1, wet mass 1 kg
- waste polyethylene: -5892.07 kg; = (polyethylene)*-1; lognormal variance with pedigree 0.0137, pedigree (4,4,3,3,2)
  Polymer products collected for disposal
  production volume 5893 kg; = Ref('264ae350-5fee-47f9-ac53-795c1f2bbc10', 'ProductionVolume') * ((Ref('6ce81417-92f5-47a2-933c-25f12766523e')*-1) / Ref('264ae350-5fee-47f9-ac53-795c1f2bbc10'))
    Calculated from production volume of reference product using the relative outputs.
  properties: wet mass 1 kg, water content 0.00401606, dry mass 0.996 kg, carbon content, fossil 0.825301
  note on carbon content, fossil: C content in 1 kg DM was calculated using data in Tab A.1, ecoinvent v2.2 report 13_I
- polyethylene, high density, granulate: 5892.07 kg; name polyethylene; lognormal variance with pedigree 0.0137, pedigree (4,4,3,3,2)
  Mirror plates consist of a thin line of absorber which uses polyethylene granules to resist anti freeze conditions in winter.
  properties: wet mass 1 kg, dry mass 1 kg, carbon content, fossil 0.857143
  note on carbon content, fossil: Polyethylene is formed out of a huge amount of ethylene monomers (C2H4) (ecoinvent v2.2 report 11_II). MW=28 g/mol
- scrap copper: -19102 kg; = (copper)*-1; lognormal variance with pedigree 0.0137, pedigree (4,4,3,3,2)
  Scrap copper at end of life not usable in reproduction of copper sent to municipal incineration
  production volume 19105 kg; = Ref('264ae350-5fee-47f9-ac53-795c1f2bbc10', 'ProductionVolume') * ((Ref('b6911ac7-5d21-4a3d-9f1f-764a4e2651be')*-1) / Ref('264ae350-5fee-47f9-ac53-795c1f2bbc10'))
    Calculated from production volume of reference product using the relative outputs.
  properties: wet mass 1 kg, dry mass 1 kg
- glass tube, borosilicate: 24180.2 kg; name glasstube; lognormal variance with pedigree 0.0137, pedigree (4,4,3,3,2)
  Aid to construct mirrors, tubes etc
  properties: wet mass 1 kg, dry mass 1 kg
- concrete, normal: 22928.4 m3; name concrete; lognormal variance with pedigree 0.0137, pedigree (4,4,3,3,2)
  Used in setting up the rigid frame to hold the mirrors.
  properties: dry mass 2190 kg, wet mass 2380 kg, water content 0.086758
- waste reinforcement steel: -1.18703e7 kg; = ((steel+chromesteel+graphite+castiron+manganese+nickel+chromium)*0.65)*-1
  (same comment as for waste reinforcement steel)
  production volume 1.18721e7 kg; = Ref('264ae350-5fee-47f9-ac53-795c1f2bbc10', 'ProductionVolume') * ((Ref('c952e699-44bc-474e-bcf6-4b49c8845f0b')*-1) / Ref('264ae350-5fee-47f9-ac53-795c1f2bbc10'))
    Calculated from production volume of reference product using the relative outputs.
- aluminium oxide, non-metallurgical: 3.99937 kg; lognormal variance with pedigree 0.0137, pedigree (4,4,3,3,2)
  Coating of tubes to enhance resistance towards abrasion
  properties: dry mass 1 kg, wet mass 1 kg
- copper: 19102 kg; lognormal variance with pedigree 0.0137, pedigree (4,4,3,3,2)
  Copper used for power cables, earthing and ground networks
  properties: wet mass 1 kg, dry mass 1 kg

## Sampling procedure
This dataset is entirely based on the detailed life cycle inventory as presented in the dissertation report by
Telsnig, Thomas. 2015. Standortabhängige Analyse und Bewertung solarthermischer Kraftwerke am Beispiel Südafrikas. Forschungsbericht. Band 123. ISSN 0938-1228. Institut für Energiewirtschaft und Rationelle Energieanwendung, Universität Stuttgart, Germany.

Further, data in Telsnig 2015 are not shown explicitely for the downscaled 50 MW parabolic trough power plant. This gap is filled in the ecoinvent report.

## Extrapolations
The original data modelling a 250 MW power plant have been scaled down with parameter specific linear and non-linear equations to represent a 50 MW plant design.

## Review by Christopher Oberschelp 2017-03-06
Very detailed and well-structured dataset with in-depth documentation. Key exchanges have been found reasonable. Comparison of impacts with other technologies might now help to spot any unusual or unexpected exchanges.
