# powder coating, steel

Dataset: EcoSpold 2, unit process
Geography: RoW
Time period: 1996-01-01 to 2019-12-31
Technology level: current
Classification: ISIC rev.4 ecoinvent: 2592:Treatment and coating of metals; machining
Classification: EcoSpold01Categories: metals/processing
Tags: ConvertedDataset
Scenario: Business-as-Usual
System model: Allocation at the point of substitution
Generated by: Hans-Jörg Althaus
Published in: Althaus H.-J. 2004
Database: ecoinvent
isCopyrightProtected: true
accessRestrictedTo: 1

## General comment
The powder inventoried is mainly used in exterior architectural applications. The coating thickness is 80 um. The heat consumption is calculated for a sheet of 2 mm thickness.
[This dataset was already contained in the ecoinvent database version 2. It was not individually updated during the transfer to ecoinvent version 3. Life Cycle Impact Assessment results may still have changed, as they are affected by changes in the supply chain, i.e. in other datasets. This dataset was generated following the ecoinvent quality guidelines for version 2. It may have been subject to central changes described in the ecoinvent version 3 change report (http://www.ecoinvent.org/database/ecoinvent-version-3/reports-of-changes/), and the results of the central updates were reviewed extensively. The changes added e.g. consistent water flows and other information throughout the database. The documentation of this dataset can be found in the ecoinvent reports of version 2, which are still available via the ecoinvent website. The change report linked above covers all central changes that were made during the conversion process.]

## Included activities end
Phosphating of the steel sheet, powder coating and heat curing. No transports of the steel sheet to the coating plant or back are inventoried.

## Geography
Swiss waste treatment assumed

## Technology
Phosphating, coating and heat curing. Treatment of the waste water is assumed.

## Parameters
- fraction, cooling water, recirculating system, to air: 0.771; name fraction_CW_R_to_air; lognormal variance with pedigree 0.0413, pedigree (2,3,1,3,1)
  Calculated based on literature value (Scown, C.D., 2011, Water Footprint of U.S. Transportation Fuels and supplying information of the article) (Vionnet, S., Quantis Water Database - Technical Report, 2012).
- fraction, cooling water, once-through system, to air: 0.004; name fraction_CW_OT_to_air; lognormal variance with pedigree 0.0413, pedigree (2,3,1,3,1)
  (same comment as for fraction, cooling water, recirculating system, to air)
- fraction, cooling water, cooling pond system, to air: 0.032; name fraction_CW_CP_to_air; lognormal variance with pedigree 0.0413, pedigree (2,3,1,3,1)
  (same comment as for fraction, cooling water, recirculating system, to air)
- fraction, process water, to air: 0.15 dimensionless; name fraction_PW_to_air; lognormal variance with pedigree 0.092025, pedigree (4,4,3,2,4)
- fraction, water, decarbonised, to air: 0.3875; name fraction_WDC_to_air; lognormal variance with pedigree 0.092025, pedigree (4,4,3,2,4)
- fraction, cooling water, to air: 0.3875; name fraction_CW_to_air; = (0.5*fraction_CW_OT_to_air)+(0.5*fraction_CW_R_to_air); lognormal variance with pedigree 0.092025, pedigree (4,4,3,2,4)
  Calculated value based on literature value (see comments of the other parametres present in this dataset) and expert opinion. In the case when no industry/literature data are available about the type of cooling or directly fraction, cooling water, to air specific for the process a default assumption is applied. It is assumed that the once-through cooling system is used in 50% of all cases and recirculating system is used in another 50% of all cases.

## Reference product
- powder coat, steel: 1 m2; CPC 41117: Granules and powders, of pig iron and spiegeleisen, or steel; By-product classification allocatable product
  EcoSpold01Location=RER
  production volume 2.67763 m2
    This is a placeholder value that does not reflect real-world production volumes. This dataset does not currently require a real-world production volume to work in the database framework, and no actual data were collected yet. This has no negative effect on the results of the ecoinvent database.
  property price 4.61571 EUR2005
    Calculated based on inputs: The price of the product has been calculated as a sum of the values of the material and energy inputs for this product. This value is therefore a rough estimation. It may underestimate the real price since there are additional expenses when producing any product. These expences can include for example labour costs, treatment of waste materials and profit for the producer. Please consider carefully whether this level of data quality is acceptable for your application.
  property true value 4.61571
    allocation property applied in "true value" allocation // value calculated from revenue

## By-products
- heat, for reuse in municipal waste incineration only: 0 MJ; CPC 17300: Steam and hot water; By-product classification allocatable product; pedigree (1,1,1,1,1)
  Net electricity generated from this waste and used in internal MSWI plant energy redistribution.
  Uncertainty: uncertainty is calculated from uncertainties in waste composition and uncertainties in energy efficiency and the uncertainty in internal energy demand
  production volume 0.00948268 MJ
  property exergy 0.1842 MJ; name E_th_prod_MSWI_exergy
    This exergy property is based on the exergy content of the product.
  property true value relation 0.1842; name E_th_prod_MSWI_true_value_relation
    property to calculate "true value" from
  property price 0.0106 EUR2005; name E_th_prod_MSWI_price_EUR2005
    Average European district heat price from Ecoheatcool and Euroheat 2005-2006, Ecoheat Work package 1: The European heat market. Final report. 10.6 EUR/GJ i s the price of district heat. http://www.solarthermalworld.org/files/Ecoheatcool%20WP1%20Web.pdf?download
  property true value 1.70642e-5
    allocation property applied in "true value" allocation // value calculated from true value relation
- electricity, for reuse in municipal waste incineration only: 0 kWh; CPC 17100: Electrical energy; By-product classification allocatable product; pedigree (1,1,1,1,1)
  (same comment as for heat, for reuse in municipal waste incineration only)
  production volume 0.00136689 kWh
  property exergy 3.6 MJ; name E_el_prod_MSWI_exergy
    This exergy property is based on the exergy content of the product.
  property true value relation 3.6; name E_el_prod_MSWI_true_value_relation
    property to calculate "true value" from
  property price 0.1 EUR2005; name E_el_prod_MSWI_price_EUR2005
    Estimated to be the same price as in case of electricity, medium voltage.
  property true value 4.8073e-5
    (same comment as for heat, for reuse in municipal waste incineration only)

## Inputs from technosphere
- waste polyethylene: 0 kg; pedigree (1,1,1,1,1)
  EcoSpold01Location=CH
  production volume 0 kg
    Calculated from the production volume of powder coat, steel in proportion to the respective output amounts.
  properties: water content 0.00401606, carbon content, fossil 0.825301, wet mass 1 kg, dry mass 0.996 kg
  note on carbon content, fossil: C content in 1 kg DM was calculated using data in Tab A.1, ecoinvent v2.2 report 13_I
- chemical factory, organics: 3.99994e-10 unit; lognormal variance with pedigree 0.68, pedigree (5,5,5,5,5)
  EcoSpold01Location=RER
- hydrochloric acid, without water, in 30% solution state: 0.339995 kg; lognormal variance with pedigree 0.0546, pedigree (3,3,5,5,1)
  EcoSpold01Location=RER
  properties: wet mass 1 kg, dry mass 1 kg
- electricity, medium voltage: 0 kWh; pedigree (1,1,1,1,1)
  EcoSpold01Location=UCTE
- coating powder: 0.0964986 kg; lognormal variance with pedigree 0.318, pedigree (4,5,5,5,5)
  EcoSpold01Location=RER
  properties: carbon content, fossil 0.339435, dry mass 1 kg, wet mass 1 kg
  note on carbon content, fossil: The dataset assumes a 1:1 mixture of epoxy (C7H15ClO4) and polyester resin (C8H6O2, C8H16O4, C5H12O2,C4H2O3)n (29.3% w/w each). The pigment inventoried (35.4% w/w) is TiO2 (ecoinvent v2.2 report 10-part 10). The C content has been calculated as the addition of C content in each ingredient (including chemicals, organic)
- heat, district or industrial, natural gas: 0 MJ; pedigree (1,1,1,1,1)
  EcoSpold01Location=RER
- sodium hydroxide, without water, in 50% solution state: 0.00341995 kg; lognormal variance with pedigree 0.0546, pedigree (3,3,5,5,1)
  EcoSpold01Location=RER
  properties: dry mass 1 kg, wet mass 1 kg
- lubricating oil: 0.0171998 kg; lognormal variance with pedigree 0.0546, pedigree (3,3,5,5,1)
  EcoSpold01Location=RER
  properties: carbon content, fossil 0.75, wet mass 1 kg, dry mass 1 kg
  note on carbon content, fossil: Lubricating oil is produced from diesel. C-content/dry mass of fats and oils considered 75%, from: ecoinvent v2.2 report, n 15a, pg 40
- aluminium sulfate, powder: 5.89992e-5 kg; lognormal variance with pedigree 0.0546, pedigree (3,3,5,5,1)
  EcoSpold01Location=RER
  properties: dry mass 1 kg, wet mass 1 kg
- sludge from steel rolling: -0.00924987 kg; lognormal variance with pedigree 0.502, pedigree (1,1,5,5,1)
  calculated from max value assuming lognormal distribution
  EcoSpold01Location=CH
  production volume 0.02775 kg
    (same comment as for waste polyethylene)
  properties: carbon content, fossil 0.0123943, water content 0.25, wet mass 1 kg, dry mass 0.8 kg
- hazardous waste, for incineration: -0.0309996 kg; lognormal variance with pedigree 0.0546, pedigree (3,3,5,5,1)
  EcoSpold01Location=CH
  production volume 0.093 kg
    (same comment as for waste polyethylene)
  properties: dry mass 0.75 kg, wet mass 1 kg, water content 0.333333, carbon content, fossil 0.554667
  note on carbon content, fossil: Tab A.6, ecoinvent v2.2 report 13_I. C content has been calculated after data in the tables, and then referred to 1 kg DM
- water, decarbonised: 0 kg; name water_decarbonised_input; pedigree (1,1,1,1,1)
  EcoSpold01Location=RER
  properties: wet mass 1 kg
- waste polyethylene: -0.000320738, -2.14305e-5, -1.62075e-6, -8.85155e-6, -3.57592e-6, -8.40537e-6, -0.00224534 kg (7 entries); lognormal variance with pedigree 0.38, pedigree (5,5,5,5,5)
  EcoSpold01Location=CH
  production volume 0.00783 kg
- electricity, medium voltage: 0.0170177, 0.00309651, 0.0525121, 0.76137, 0.108967, 0.357019 kWh (6 entries); lognormal variance with pedigree 0.38, pedigree (5,5,5,5,5)
  EcoSpold01Location=UCTE
- heat, district or industrial, natural gas: 0.597888, 33.8016 MJ (2 entries); lognormal variance with pedigree 0.178, pedigree (4,5,5,5,4)
  EcoSpold01Location=RER
- water, decarbonised: 1.26588e-7, 3.29381e-7, 1.32847e-6, 1.69169e-7, 2.47185e-6, 1.61705e-8, 2.09827e-6 kg (7 entries); lognormal variance with pedigree 0.0546, pedigree (3,3,5,5,1)
  EcoSpold01Location=RER

## Inputs from nature
- Water, unspecified natural origin [natural resource, in water]: 0.0164835 m3; name water_UNO_input; source Byers, W. 2003; lognormal variance with pedigree 0.0546, pedigree (3,3,5,5,1)
  Calculated based on literature, (Vionnet, S., Quantis Water Database - Technical Report, 2012). Recalculated from the source file; thickness of the steel sheet of 0.002m and steel density of 7900 kg/m3. The process starts when untreated surface (steel sheet) enters the coating plant. It includes the processes: pre-treatment (cleaning) and coating itself.
  property wet mass 1000 kg; name WM
  property dry mass 0.1101 kg; name DM
  property carbon content, fossil 0.0104329; name C_content_fossil
  property carbon content, non-fossil 0; name C_content_non_fossil
  property water in wet mass 999.89 kg; name WWM
  property water content 9081.65; name water_content

## Emissions to nature
- NMVOC, non-methane volatile organic compounds, unspecified origin [air, unspecified]: 0.000481993 kg; lognormal variance with pedigree 0.5, pedigree (5,5,5,5,5)
- Nickel, ion [water, unspecified]: 1.91997e-7 kg; lognormal variance with pedigree 0.372, pedigree (1,1,5,5,1)
  calculated from max value assuming lognormal distribution
- COD, Chemical Oxygen Demand [water, unspecified]: 0.000415994 kg; lognormal variance with pedigree 0.762, pedigree (1,1,5,5,1)
  calculated from max value assuming lognormal distribution
- Oils, unspecified [water, unspecified]: 6.7499e-6 kg; lognormal variance with pedigree 0.852, pedigree (1,1,5,5,1)
  calculated from max value assuming lognormal distribution
- BOD5, Biological Oxygen Demand [water, unspecified]: 0.000415994 kg; lognormal variance with pedigree 1.482, pedigree (1,1,5,5,1)
  Twice the uncertainty of COD
- Chromium, ion [water, unspecified]: 1.40998e-6 kg; lognormal variance with pedigree 0.162, pedigree (1,1,5,5,1)
  calculated from max value assuming lognormal distribution
- Iron, ion [water, unspecified]: 1.11998e-5 kg; lognormal variance with pedigree 1.142, pedigree (1,1,5,5,1)
  calculated from max value assuming lognormal distribution
- DOC, Dissolved Organic Carbon [water, unspecified]: 1.92997e-5 kg; lognormal variance with pedigree 1.722, pedigree (1,1,5,5,1)
  Twice the uncertainty of TOC
- Phosphorus [water, unspecified]: 1.13998e-7 kg; lognormal variance with pedigree 1.292, pedigree (1,1,5,5,1)
  calculated from max value assuming lognormal distribution
- Sodium [air, unspecified]: 4.36994e-7 kg; lognormal variance with pedigree 0.18, pedigree (1,5,5,5,1)
- TOC, Total Organic Carbon [water, unspecified]: 1.92997e-5 kg; lognormal variance with pedigree 0.942, pedigree (1,1,5,5,1)
  calculated from max value assuming lognormal distribution
- Water [air, unspecified]: 0.00247253 m3; name water_to_air_unspecified; lognormal variance with pedigree 0.0827, pedigree (2,2,5,5,1)
  Calculated value based on literature values and expert opinion. See comments in the parametres' comment field.
  property fraction, origin: fresh water 1.02495e-6; name fraction_origin_fresh_water
  property fraction, origin: salt water 0; name fraction_origin_salt_water
  property fraction, origin: unspecified 0.999999; name fraction_origin_unspecified
- Zinc, ion [water, unspecified]: 1.51998e-6 kg; lognormal variance with pedigree 2.282, pedigree (1,1,5,5,1)
  calculated from max value assuming lognormal distribution
- Lead [water, unspecified]: 1.27998e-7 kg; lognormal variance with pedigree 0.0546, pedigree (3,3,5,5,1)
- Water [water, unspecified]: 0.014011 m3; name water_to_water_unspecified; lognormal variance with pedigree 0.0827, pedigree (2,2,5,5,1)
  (same comment as for Water)
  property fraction, origin: unspecified 1; name fraction_origin_unspecified_Ww
  property fraction, origin: fresh water 2.85897e-7; name fraction_origin_fresh_water_Ww
  property fraction, origin: salt water 0; name fraction_origin_salt_water_Ww
- Chloride [water, unspecified]: 3.12996e-5 kg; lognormal variance with pedigree 0.0546, pedigree (3,3,5,5,1)
- Chromium VI [water, unspecified]: 6.53991e-8 kg; lognormal variance with pedigree 0.162, pedigree (1,1,5,5,1)
  calculated from max value assuming lognormal distribution
- Sodium, ion [water, unspecified]: 0.00392994 kg; lognormal variance with pedigree 0.1, pedigree (1,5,5,5,1)
- Hydrocarbons, unspecified [water, unspecified]: 1.11998e-6 kg; lognormal variance with pedigree 0.0546, pedigree (3,3,5,5,1)
- Suspended solids, unspecified [water, unspecified]: 5.18993e-6 kg; lognormal variance with pedigree 1.192, pedigree (1,1,5,5,1)
  calculated from max value assuming lognormal distribution
- Hydrogen chloride [air, unspecified]: 0.0504993 kg; lognormal variance with pedigree 0.1706, pedigree (2,5,5,5,1)

## Sampling procedure
Literature

## Extrapolations
None This dataset has been copied from an original dataset covering the geography RER. The uncertainty has been adjusted accordingly.

## Review by Roland Hischier 2004-04-13
passed
