# electricity production, hydro, reservoir, non-alpine region

Dataset: EcoSpold 2, unit process
Geography: CA-QC
Time period: 1945-01-01 to 2019-12-31
Technology level: current
Classification: ISIC rev.4 ecoinvent: 3510:Electric power generation, transmission and distribution
Tags: Canada; hydro power
Scenario: Business-as-Usual
System model: Allocation at the point of substitution
Generated by: Karin Treyer
Published in: Bolliger, R. 2007
Database: ecoinvent
isCopyrightProtected: true
accessRestrictedTo: 1

## General comment
A modifier This dataset represents the production of 1kWh of electricity in a hydropower power plant with reservoir in Quebec in 2014 period. This dataset is based on study on the production, transmission and distribution of electricity in Quebec in the 2008-2013 period. It represents an average of all the reservoir power plants that belong to Hydro-Quebec, which is the main electricity provider in the region (about 95% of the total electricity produced). The inventory is based on a sample of 20 reservoir power plants that combine for 21900 MW, with different capacity (from 5600 MW to 51MW) and all the dams and derivations that were built to ensure the operation of the plants. Lifetime is assumed to be 100 years for the plant. Only main consumed products, wastes and emissions are included. CO2 emissions from the reservoir are included and calculated using measured data from the company. As no information was available only raw emissions were calculated for the 10 first years of occupation of the reservoir (assuming that after that period the balance with previous ecosystem emissions is null). Operation data were collected for the 2008-2013 period.
[This dataset is meant to replace the following datasets:]

## Included activities start
This dataset starts from the power plant ready to produce electricity, i.e. the reservoir filled with water.
From (potential) energy in water, entering the power plant.

## Included activities end
This activity ends with 1kWh of high voltage electricity produced at the power plant and arrived at the busbar.

This dataset includes
- the area/volume occupied for the barrage, power station, and the lake
- a preliminary estimation of emissions of methane and carbon dioxide
- main operation and maintenance activities and materials of the power plants, such as lubricating oil or mass of water passing through the turbines.

This dataset doesn't include
- land use for access roads to the reservoir
- emissions of dinitrogen oxide
- raw materials extraction, decommissioning and waste treatment as these activities are already included in the infrastructure datasets
- transformation of the electricity produced.
- minor activities, materials and wastes.

## Geography
Data collected for Quebec

## Technology
'All the technologies (type of dam, type of turbine, etc.) and capacities present in the region are included in the dataset.
Capacities range from 5600MW to 51MW.
Several type of dam and infrastructures are include but the operation was assumed to be equivalent for all of them and only related to the installed power.'
References:
Bischof, R. (1992) Modernisierungspotential bei bestehenden Wasserkraftwerken. Vortrag beim Schweizerischen Technischen Verband, Sektion Graubünden, 21. Oktober 1992. Churwalden, Schweiz [unpublished].
König F., von (1985) Bau von Wasserkraftanlagen. C.F. Müller, Karlsruhe.
Generator 0.96 0.98
Transformer 0.98 0.99
Reservoir power plant total
without works water channel 0.82 0.88
with works water channel 0.78 0.84
Pumped storage power plant 0.70 0.74
The losses along the works water channel are primarily caused by friction and are calculated from the difference between gross and net head. Based on this calculation the efficiency of the works water channel amounts to 95%. The losses depend on the flow rate and have its maximum at full load. The smaller the cross section of adits and pressure pipelines, the higher the flow velocity and thus the friction losses. In older plants according to Bischof (1992) the efficiency of works water channels could be increased generally more than by replacing turbines and generators.
The efficiency losses in turbines depend on the turbine type (Kaplan, Francis, Pelton, etc.), the turbine output and on the ratio between turbined water amount and the rated water amount. In König (1997) examples for curve progressions of the relationship between these variables are shown. For current power plants an efficiency of 87% is assumed, more modern turbines show an efficiency of about 91%.
The efficiency of generators depends on the output, the rotation speed of the generator and the cooling system. Some relevant data can be found in König (1997). For today’s power plants an efficiency of approximately 96% is assumed, modern generators show an efficiency of about 98%. The efficiency of transformers amounts to 98%, respectively 99%.
References:
Bischof, R. (1992) Modernisierungspotential bei bestehenden Wasserkraftwerken. Vortrag beim Schweizerischen Technischen Verband, Sektion Graubünden, 21. Oktober 1992. Churwalden, Schweiz [unpublished].
König F., von (1985) Bau von Wasserkraftanlagen. C.F. Müller, Karlsruhe.

## Time period
Operation data were collected for the 2008-2013 period, but it is assumed valid for all the operation lifetime.
Production volume valid for 2014

## Parameters
- gross electricity production: 1.1118e11 kWh; name gross_electricity; = 1.09e11+40%* 5.45e9; lognormal variance with pedigree 0.0013, pedigree (2,2,1,1,1)
  Measured value from Hydro-Quebec. It includes both the self produced and the electricity purchased from private productors (40% of hydropower purchased comes from reservoir plants and 60% from run-of-river).
  Data for 2014:
  Self produced 1.09e11kWh
  purchased:40%* 5.45e9kWh
- losses from gross electricity production: 0.01 dimensionless; name losses_gross_net; lognormal variance with pedigree 0.003225, pedigree (3,3,1,2,1)
  Literature value. Generic value taken from the IEA Electricity information 2014, part I, p. I.7: 'The difference between gross and net electricity production is generally observed to be about 7% for conventional thermal stations, 1% for hydro stations and 6% for nuclear.'
  IEA/OECD. 2014. Electricity Information 2014. International Energy Agency (IEA), Paris Cedex (FR).
  nan
  Uncertainty: Generic assumption
- lifetime: 100 year; lognormal variance with pedigree 0.0014, pedigree (2,2,1,3,1)
  Estimation based on experiences.
  nan
- total net electricity: 1.73e11 kWh; name totalElectricity; lognormal variance with pedigree 0.001325, pedigree (2,2,1,2,1)
  Total electricity produced by Hydro-Quebec
  in 2014

## Reference product
- electricity, high voltage: 1 kWh; CPC 17100: Electrical energy; By-product classification allocatable product
  production volume 1.10068e11 kWh; name apv_electricity; = gross_electricity*(1-losses_gross_net)
    Calculated value
  property price 0.0977 EUR2005
    Temporary price data. Calculated as 90% of purchasers price based on: 94% of the average price (to account for a 6% loss in transformation and transmission) for electricity for industrial consumersin 2005 (excluded taxes). From IEA.

## Inputs from technosphere
- transport, helicopter: 1.48362e-7 hour; = 9.24e7*(apv_electricity/ totalElectricity)/(apv_electricity*3600); lognormal variance with pedigree 0.0032, pedigree (2,1,3,1,1)
  Measured value. Vehicles used for maintenance during operation, multiplied with a factor of the production volume of non-alpine reservoir plants to total hydropower electricity produced in Québec in 2008.
- hydropower plant, reservoir: 9.08528e-14 unit; = 1/(lifetime*apv_electricity); lognormal variance with pedigree 0.044, pedigree (1,1,3,5,1)
  Calculated value. Based on lifetime capacity
  properties: lifetime 100 year
- transport, freight, light commercial vehicle: 5.63584e-5 metric ton*km; = 9.75e6*(apv_electricity/ totalElectricity)/apv_electricity; lognormal variance with pedigree 0.0032, pedigree (2,1,3,1,1)
  (same comment as for transport, helicopter)
- lubricating oil: 4.56893e-7 kg; name lubricating_oil; = 79042.5* (apv_electricity/ totalElectricity)/apv_electricity; source Vögtlin H. J. 2002, p. p.36 in Bolliger et al.; lognormal variance with pedigree 0.1001, pedigree (4,2,3,5,3)
  Estimated value. From Hydro-Québec. It is assumed that the same quantity managed at the end of life is used
  properties: dry mass 1 kg, carbon content, fossil 0.75, wet mass 1 kg
  note on carbon content, fossil: Lubricating oil is produced from diesel. C-content/dry mass of fats and oils considered 75%, from: ecoinvent v2.2 report, n 15a, pg 40
- waste mineral oil: -4.56893e-7 kg; name waste_oil; = (lubricating_oil)*-1; lognormal variance with pedigree 0.004, pedigree (1,1,3,5,1)
  Measured value. From Hydro-Québec. It is assumed that the same quantity managed at the end of life is used
  production volume 50289.4 kg; = apv_electricity* waste_oil
    Calculated from the production volume of electricity, high voltage, hydro, reservoir, non-alpine region in proportion to the respective output amounts.
  property price 0 EUR2005; name waste_oil_price_EUR2005
  properties: dry mass 0.9 kg, wet mass 1 kg, water content 0.111111, carbon content, fossil 0.864444
  note on carbon content, fossil: Tab A.6, ecoinvent v2.2 report 13_I. C content has been calculated after data in the tables, and then referred to 1 kg DM
- hydropower plant, reservoir, non-alpine regions: 0 unit; source Bolliger, R. 2007, p. p.40f, Tab. 1.1 p.3; pedigree (1,1,3,5,1)
- transport, passenger car: 2.52023e-5 km; = 4.36e6*(apv_electricity/ totalElectricity)/apv_electricity; lognormal variance with pedigree 0.0032, pedigree (2,1,3,1,1)
  (same comment as for transport, helicopter)
- transport, freight, lorry, unspecified: 2.98844e-5 metric ton*km; = 5.17e6* (apv_electricity/ totalElectricity)/apv_electricity; lognormal variance with pedigree 0.0032, pedigree (2,1,3,1,1)
  (same comment as for transport, helicopter)

## Inputs from nature
- Volume occupied, reservoir [natural resource, in water]: 0.043791 m3*year; = 4.82e11/(apv_electricity*lifetime); source BWW 1991, p. p.35 in Bolliger et al.; lognormal variance with pedigree 0.342, pedigree (1,1,5,5,1)
  Measured value. Total reservoir volume divided by total lifetime production
- Transformation, to lake, artificial [natural resource, land]: 0.00212268 m2; = transformation_from-transformation_to_industrial; source Bolliger, R. 2007, p. p.35; lognormal variance with pedigree 0.304, pedigree (1,1,3,5,1)
  Calculated value
- Transformation, from unspecified [natural resource, land]: 0.00214413 m2; name transformation_from; = 2.36E+10/(apv_electricity*lifetime); source Bolliger, R. 2007, p. p.35; lognormal variance with pedigree 0.304, pedigree (1,1,3,5,1)
  Measured value. Total reservoir surface divided by total lifetime production
  Regarding reservoir power stations, land (i.e. meadows, moorlands, gravel areas etc.) is mainly occupied by reservoirs. Averaged over the investigated sample and distributed over life time the specific land use amounts to 0.0035 m2a/kWh; the transformation of land amounts to 0.000023 m2/kWh.
  The origin of state after setting up the reservoir has to be classified as module 'transformation to lake, artificial'; the area occupied by the dam and the power station has to be classified as 'transformation to industrial area' with an assumed, simplified rate of 1% of the total area. The area affected by power stations plays a subordinate role due to the fact that power stations often were built in caverns. Land occupied by newly built access roads is neglected.
  Standard values for landuse are assumed.
- Water, turbine use, unspecified natural origin [natural resource, in water]: 4 m3; name water_turbine_use_UNO_input; source Bolliger, R. 2007, p. p.36; lognormal variance with pedigree 0.0032, pedigree (2,1,3,1,1)
  Calculated value based on Hydro Quebec total turbined water and total hydropower production
  For reservoirs in non-alpine regions, it is assumed that they are not as deep as reservoirs in alpine regions and have a bigger surface. As for the land use, also for the water use a factor 10 in comparison to alpine reservoirs is assumed.
- Occupation, lake, artificial [natural resource, land]: 0.214413 m2*year; = transformation_from*lifetime; source Bolliger, R. 2007, p. p.35; lognormal variance with pedigree 0.074, pedigree (1,1,3,5,1)
  Standard values for landuse are assumed.
  The original state before setting up the reservoir has to be classified as module 'transformation, from unspecified' due to the fact that various types of flooded ground can be distinguished. The flooded area partly consisted of alpine meadows and grazing land, rarely also villages had to be resettled; often impassable, rocky alpine valleys and gorges were filled with water, where only marginal vegetation and no agricultural use was possible. The definition of the character and the environmental value (e.g. forest, areas with rare mushrooms, moorlands, etc.) of the affected areas were not possible, due to the lack of information.
  Regarding reservoir power stations, land (i.e. meadows, moorlands, gravel areas etc.) is mainly occupied by reservoirs. Averaged over the investigated sample and distributed over life time the specific land use amounts to 0.0035 m2a/kWh; the transformation of land amounts to 0.00023 m2/kWh.
  Standard values for landuse are assumed.
  Estimation. Data are adopted from the Swiss power plant sample as it stands, therefore uncertainty is increased.
  The original state before setting up the reservoir has to be classified as module 'transformation, from unspecified' due to the fact that various types of flooded ground can be distinguished. The flooded area partly consisted of alpine meadows and grazing land, rarely also villages had to be resettled; often impassable, rocky alpine valleys and gorges were filled with water, where only marginal vegetation and no agricultural use was possible. The definition of the character and the environmental value (e.g. forest, areas with rare mushrooms, moorlands, etc.) of the affected areas were not possible, due to the lack of information.
  Regarding reservoir power stations, land (i.e. meadows, moorlands, gravel areas etc.) is mainly occupied by reservoirs. Averaged over the investigated sample and distributed over life time the specific land use amounts to 0.0035 m2a/kWh; the transformation of land amounts to 0.00023 m2/kWh.
- Energy, potential (in hydropower reservoir), converted [natural resource, in water]: 3.79 MJ
  Reflects range average to best performance.
- Transformation, to industrial area [natural resource, land]: 2.14413e-5 m2; name transformation_to_industrial; = transformation_from*0.01; source Bolliger, R. 2007, p. p.35; lognormal variance with pedigree 0.16, pedigree (4,1,3,5,3)
  Estimated value. It is assumed that 1% is occupied by the dams and infrastructures

## Emissions to nature
- Carbon dioxide, from soil or biomass stock [air, non-urban air or from high stacks]: 0.0122651 kg; = 1.35E+09/apv_electricity; lognormal variance with pedigree 0.0032, pedigree (2,1,3,1,1)
  Literature value/calculated value. Hertwich 2013 provides an analysis of greenhouse gas emissions from hydropower plants. 89 data points are available for temperate non-alpine plants, from which the average CO2 and CH4 emissions are calculated.
  Hertwich, E.G. 2013. Addressing Biogenic Greenhouse Gas Emissions from Hydropower in LCA. Environmental Sciency&Technology, 47, 9604-9611
- Water [water, unspecified]: 3.97078 m3; name water_to_water_unspecified; = water_turbine_use_UNO_input-water_to_air_unspecified; lognormal variance with pedigree 0.098025, pedigree (4,4,4,2,4)
  Calculated value based on literature values and expert opinion. See comments in the parametres' comment field.
  property fraction, origin: unspecified 0; name fraction_origin_unspecified
  property fraction, origin: salt water 0; name fraction_origin_salt_water
  property fraction, origin: fresh water 1; name fraction_origin_fresh_water
- Water [air, unspecified]: 0.0292217 m3; name water_to_air_unspecified; lognormal variance with pedigree 0.0427, pedigree (2,2,3,1,1)
  (same comment as for Water)
  property fraction, origin: salt water 0; name fraction_origin_salt_water_Ww
  property fraction, origin: unspecified 0; name fraction_origin_unspecified_Ww
  property fraction, origin: fresh water 1; name fraction_origin_fresh_water_Ww
- Methane, non-fossil [air, non-urban air or from high stacks]: 2.12595e-5 kg; = 2.34E+06/apv_electricity; lognormal variance with pedigree 0.304, pedigree (1,1,3,5,1)
  Hertwich, E.G. 2013. Addressing Biogenic Greenhouse Gas Emissions from Hydropower in LCA. Environmental Sciency&Technology, 47, 9604-9611
  Literature value/calculated value. Hertwich 2013 provides an analysis of greenhouse gas emissions from hydropower plants. 89 data points are available for temperate non-alpine plants, from which the average CO2 and CH4 emissions are calculated.
  Hertwich, E.G. 2013. Addressing Biogenic Greenhouse Gas Emissions from Hydropower in LCA. Environmental Sciency&Technology, 47, 9604-9611

## Sampling procedure
Data collection from the company including all its activities

## Extrapolations
This dataset has been extrapolated from year 2015 to the year of the calculation (2019). The uncertainty has been adjusted accordingly.

## Review by Carl Vadenbo 2015-05-28
The update of the whole electricity sector for the ecoinvent v3.2 database consist of hundreds of datasets. All these datasets have passed through a streamlined review processes where the underlying modelling of production volumes, technology shares and efficiencies was reviewed in detail prior to the datasets being submitted to the database.
