# treatment of wastewater from liquid crystal production, capacity 1.1E10l/year

Dataset: EcoSpold 2, unit process
Geography: RoW
Time period: 1994-01-01 to 2019-12-31
Technology level: current
Classification: EcoSpold01Categories: waste management/wastewater treatment
Classification: ISIC rev.4 ecoinvent: 3700:Sewerage
Tags: ConvertedDataset; Treatment
Scenario: Business-as-Usual
System model: Allocation at the point of substitution
Generated by: Roland Hischier
Published in: Hischier R. 2007
Database: ecoinvent
isCopyrightProtected: true
accessRestrictedTo: 1

## General comment
Wastewater purified in a moderatly large municipal wastewater treatment plant (capacity class 2), with an average capacity size of 71100 per-captia-equivalents PCE.
Wastewater contains (in kg/m3): BOD: 92.6 (GSD=122.5%); B: 0.0624 (GSD=224%); Cl: 0.0783 (GSD=224.1%);
[This dataset was already contained in the ecoinvent database version 2. It was not individually updated during the transfer to ecoinvent version 3. Life Cycle Impact Assessment results may still have changed, as they are affected by changes in the supply chain, i.e. in other datasets. This dataset was generated following the ecoinvent quality guidelines for version 2. It may have been subject to central changes described in the ecoinvent version 3 change report (http://www.ecoinvent.org/database/ecoinvent-version-3/reports-of-changes/), and the results of the central updates were reviewed extensively. The changes added e.g. consistent water flows and other information throughout the database. The documentation of this dataset can be found in the ecoinvent reports of version 2, which are still available via the ecoinvent website. The change report linked above covers all central changes that were made during the conversion process.]

## Included activities end
Infrastructure materials for municipal wastewater treatment plant, transports, dismantling. Land use burdens.

## Geography
Specific to the technology mix encountered in Switzerland in 2000. Well applicable to modern treatment practices in Europe, North America or Japan.

## Technology
Three stage wastewater treatment (mechanical, biological, chemical) including sludge digestion (fermentation) according to the average technology in Switzerland

## Parameters
- fraction, process water, to air: 0.1 dimensionless; name fraction_PW_to_air; lognormal variance with pedigree 0.092025, pedigree (4,4,3,2,4)

## Reference product
- wastewater from liquid crystal production: -1 m3; CPC 39920: Sewage sludge; By-product classification Waste
  EcoSpold01Location=CH
  production volume 3.96633 m3
    This is a placeholder value that does not reflect real-world production volumes. This dataset does not currently require a real-world production volume to work in the database framework, and no actual data were collected yet. This has no negative effect on the results of the ecoinvent database.
  property price 0 EUR2005
    Waste products are assigned a price of zero as they are assumed to require further treatment.
  property carbon content, fossil 0.997666
    BOD is 9.26e-2 kg/kg (Tab 12.13, ecoinvent v2.2 report 18_III). BOD was converted to TOC, using conversion factors in Tab 4.10 (ecoinvent v2.2 report 13_IV). TOC was considered as Total Carbon.
  property carbon content 0.997666
    carbon content on a dry matter basis (reserved; not for manual entry)
  properties: water in wet mass 939.729 kg, water content 15.5918, carbon content, non-fossil 0, dry mass 60.2706 kg, wet mass 1000 kg, carbon allocation 60.1299 kg

## By-products
- heat, for reuse in municipal waste incineration only: 0 MJ; CPC 17300: Steam and hot water; By-product classification allocatable product; pedigree (1,1,1,1,1)
  Net electricity generated from this waste and used in internal MSWI plant energy redistribution.
  Uncertainty: uncertainty is calculated from uncertainties in waste composition and uncertainties in energy efficiency and the uncertainty in internal energy demand
  property exergy 0.1842 MJ; name E_th_prod_MSWI_exergy
    This exergy property is based on the exergy content of the product.
  property price 0.0106 EUR2005; name E_th_prod_MSWI_price_EUR2005
    Average European district heat price from Ecoheatcool and Euroheat 2005-2006, Ecoheat Work package 1: The European heat market. Final report. 10.6 EUR/GJ i s the price of district heat. http://www.solarthermalworld.org/files/Ecoheatcool%20WP1%20Web.pdf?download
  property true value relation 0.1842; name E_th_prod_MSWI_true_value_relation
    property to calculate "true value" from
- electricity, for reuse in municipal waste incineration only: 0 kWh; CPC 17100: Electrical energy; By-product classification allocatable product; pedigree (1,1,1,1,1)
  (same comment as for heat, for reuse in municipal waste incineration only)
  property price 0.1 EUR2005; name E_el_prod_MSWI_price_EUR2005
    Estimated to be the same price as in case of electricity, medium voltage.
  property exergy 3.6 MJ; name E_el_prod_MSWI_exergy
    This exergy property is based on the exergy content of the product.
  property true value relation 3.6; name E_el_prod_MSWI_true_value_relation
    property to calculate "true value" from

## Inputs from technosphere
- heat, district or industrial, other than natural gas: 0 MJ; pedigree (1,1,1,1,1)
  burden from sludge incineration. Uncertainty calculated from wastewater composition and treatment model
  EcoSpold01Location=CH
- chemical, inorganic: 2.0429e-5 kg; lognormal variance with pedigree 0.432, pedigree (1,1,5,5,1)
  EcoSpold01Location=GLO
  burden from sludge incineration. Uncertainty calculated from wastewater composition and treatment model
  properties: carbon content, fossil 0.003, dry mass 1 kg, wet mass 1 kg
  note on carbon content, fossil: This dataset is an unweighted average of 20 inorganic substances (listed in Tab 88.1, ecoinvent v2.2 report 8, part II), being part of the top100 chemicals included in this database. The C-content has also been calculated as an unweighted average of the C content of the substances composing this dataset.
- slag landfill: 1.7208e-10 unit; lognormal variance with pedigree 0.072, pedigree (1,1,5,5,1)
  (same comment as for heat, district or industrial, other than natural gas)
- hydrochloric acid, without water, in 30% solution state: 1.2257e-5 kg; lognormal variance with pedigree 0.432, pedigree (1,1,5,5,1)
  EcoSpold01Location=RER
  burden from sludge incineration. Uncertainty calculated from wastewater composition and treatment model
  properties: wet mass 1 kg, dry mass 1 kg
- waste cement, hydrated: 0 kg; pedigree (1,1,1,1,1)
  (same comment as for heat, district or industrial, other than natural gas)
  production volume 0 kg
    Calculated from the production volume of wastewater from liquid crystal production in proportion to the respective output amounts.
  properties: dry mass 1 kg, wet mass 1 kg
- process-specific burdens, residual material landfill: 0 kg; pedigree (1,1,1,1,1)
  (same comment as for heat, district or industrial, other than natural gas)
- waste graphical paper: -0.0155 kg; lognormal variance with pedigree 0.042, pedigree (1,1,5,5,1)
  direct wastewater treatment plant burden. Uncertainty calculated from wastewater composition and treatment model
  EcoSpold01Location=CH
  production volume 0.062 kg
    (same comment as for waste cement, hydrated)
  properties: water content 0.126126, dry mass 0.888 kg, wet mass 1 kg, carbon content, non-fossil 0.454955
- municipal waste incineration facility: 1.1184e-8 unit; lognormal variance with pedigree 0.042, pedigree (1,1,5,5,1)
  EcoSpold01Location=CH
  burden from sludge incineration. Uncertainty calculated from wastewater composition and treatment model
- electricity, low voltage: 0 kWh; pedigree (1,1,1,1,1)
  (same comment as for waste graphical paper)
- residual material landfill: 1.1464e-10 unit; lognormal variance with pedigree 0.072, pedigree (1,1,5,5,1)
  (same comment as for heat, district or industrial, other than natural gas)
- sewer grid, 1.1E10l/year, 242 km: 1.6832e-7 km; lognormal variance with pedigree 0.042, pedigree (1,1,5,5,1)
  EcoSpold01Location=CH
  uncertainty heeded in exchanges of the module
- cement, unspecified: 0 kg; pedigree (1,1,1,1,1)
  (same comment as for municipal waste incineration facility)
  properties: wet mass 1 kg, dry mass 1 kg
- process-specific burdens, municipal waste incineration: 0 kg; pedigree (1,1,1,1,1)
  (same comment as for municipal waste incineration facility)
- waste plastic, mixture: 0 kg; pedigree (1,1,1,1,1)
  EcoSpold01Location=CH
  direct wastewater treatment plant burden. Uncertainty calculated from wastewater composition and treatment model
  production volume 0 kg
    (same comment as for waste cement, hydrated)
  properties: water content 0.180638, carbon content, fossil 0.747344, wet mass 1 kg, dry mass 0.847 kg
  note on carbon content, fossil: C content in 1 kg DM was calculated using data in Tab A.2, ecoinvent v2.2 report 13_I
- liquid manure spreading, by vacuum tanker: 0.15115 m3; lognormal variance with pedigree 0.042, pedigree (1,1,5,5,1)
  burden from sludge spreading. Uncertainty calculated from wastewater composition and treatment model
  EcoSpold01Location=CH
- electricity, high voltage: 0 kWh; pedigree (1,1,1,1,1)
  (same comment as for heat, district or industrial, other than natural gas)
- process-specific burdens, slag landfill: 0 kg; pedigree (1,1,1,1,1)
  (same comment as for municipal waste incineration facility)
- wastewater treatment facility, capacity 1.1E10l/year: 1.9883e-9 unit; lognormal variance with pedigree 0.042, pedigree (1,1,5,5,1)
  EcoSpold01Location=CH
  uncertainty heeded in exchanges of the module
- heat, district or industrial, other than natural gas: 0.0163753, 0.977319, 36.5273 MJ (3 entries); lognormal variance with pedigree 0.052, pedigree (1,1,5,5,1)
  (same comment as for heat, district or industrial, other than natural gas)
- waste cement, hydrated: -0.0155652, -0.0394598 kg (2 entries); lognormal variance with pedigree 0.082, pedigree (1,1,5,5,1)
  (same comment as for heat, district or industrial, other than natural gas)
  production volume 0.218247 kg
- process-specific burdens, residual material landfill: 0.0155652, 0.0394598 kg (2 entries); lognormal variance with pedigree 0.072, pedigree (1,1,5,5,1)
  (same comment as for heat, district or industrial, other than natural gas)
- electricity, low voltage: 0.382062, 0.0670088, 1.51976, 5.44873, 1.10189, 16.6638, 2.74673, 7.82398 kWh (8 entries); lognormal variance with pedigree 0.182, pedigree (1,1,5,5,1)
  (same comment as for waste graphical paper)
- cement, unspecified: 0.000661279, 4.84341e-5, 0.000138053, 0.00317815, 0.00312212, 9.1893e-5, 0.00100926, 0.000122109, 0.0136387 kg (9 entries); lognormal variance with pedigree 0.082, pedigree (1,1,5,5,1)
  (same comment as for municipal waste incineration facility)
- process-specific burdens, municipal waste incineration: 12.6552, 32.0828 kg (2 entries); lognormal variance with pedigree 0.042, pedigree (1,1,5,5,1)
  (same comment as for municipal waste incineration facility)
- waste plastic, mixture: -0.00172425, -0.000115208, -8.71297e-6, -4.75849e-5, -1.92238e-5, -4.51863e-5, -0.00146914, -0.0120707 kg (8 entries); lognormal variance with pedigree 0.042, pedigree (1,1,5,5,1)
  (same comment as for waste plastic, mixture)
  production volume 0.0614782 kg
- electricity, high voltage: 0.0672724, 0.0122506, 0.283759, 0.955189, 0.209252, 3.01251, 0.485197, 1.40647 kWh (8 entries); lognormal variance with pedigree 0.492, pedigree (1,1,5,5,1)
  (same comment as for heat, district or industrial, other than natural gas)
- process-specific burdens, slag landfill: 0.0273811, 0.0694149 kg (2 entries); lognormal variance with pedigree 0.072, pedigree (1,1,5,5,1)
  (same comment as for municipal waste incineration facility)

## Emissions to nature
- Carbon monoxide, fossil [air, urban air close to ground]: 0.14842 kg; lognormal variance with pedigree 0.162, pedigree (1,1,5,5,1)
  emission from sludge incineration. Uncertainty calculated from wastewater composition and treatment model
- TOC, Total Organic Carbon [water, surface water]: 7.1538 kg; lognormal variance with pedigree 0.072, pedigree (1,1,5,5,1)
  sewer overload discharge plus direct wastewater treatment plant emission plus emission from sludge incineration. Uncertainty calculated from wastewater composition and treatment model
- Carbon [soil, agricultural]: 6.2203 kg; lognormal variance with pedigree 0.112, pedigree (1,1,5,5,1)
  emission from sludge spreading. Uncertainty calculated from wastewater composition and treatment model
- NMVOC, non-methane volatile organic compounds, unspecified origin [air, urban air close to ground]: 0.002122 kg; lognormal variance with pedigree 0.262, pedigree (1,1,5,5,1)
  direct digester gas emission. Uncertainty calculated from wastewater composition and treatment model
- TOC, Total Organic Carbon [water, ground-, long-term]: 0.096316 kg; lognormal variance with pedigree 0.112, pedigree (1,1,5,5,1)
  (same comment as for Carbon monoxide, fossil)
- Boron [soil, agricultural]: 0.011885 kg; lognormal variance with pedigree 0.712, pedigree (1,1,5,5,1)
  (same comment as for Carbon)
- Water [air, unspecified]: 0.1 m3; name water_to_air_unspecified; lognormal variance with pedigree 0.0827, pedigree (2,2,5,5,1)
  Calculated value based on water balance.
  property fraction, origin: unspecified 1; name fraction_origin_unspecified
  property fraction, origin: fresh water 0; name fraction_origin_fresh_water
  property fraction, origin: salt water 0; name fraction_origin_salt_water
- Carbon dioxide, fossil [air, urban air close to ground]: 171.22 kg; lognormal variance with pedigree 0.062, pedigree (1,1,5,5,1)
  (same comment as for Carbon monoxide, fossil)
- Boron [water, ground-, long-term]: 0.012422 kg; lognormal variance with pedigree 0.712, pedigree (1,1,5,5,1)
  (same comment as for Carbon monoxide, fossil)
- Water [water, unspecified]: 0.9 m3; name water_to_water_unspecified; lognormal variance with pedigree 0.0827, pedigree (2,2,5,5,1)
  Calculated value based on water balance.
  property fraction, origin: fresh water 1; name fraction_origin_fresh_water_Ww
  property fraction, origin: unspecified 0; name fraction_origin_unspecified_Ww
  property carbon content, non-fossil 0; name C_content_non_fossil
  property carbon content, fossil 0; name C_content_fossil
  property dry mass 0 kg; name DM
  property water in wet mass 1000 kg; name WWM
  property wet mass 1000 kg; name WM
  property fraction, origin: salt water 0; name fraction_origin_salt_water_Ww
- DOC, Dissolved Organic Carbon [water, surface water]: 6.6981 kg; lognormal variance with pedigree 0.042, pedigree (1,1,5,5,1)
  (same comment as for TOC, Total Organic Carbon)
- Boron [water, surface water]: 0.034616 kg; lognormal variance with pedigree 0.592, pedigree (1,1,5,5,1)
  (same comment as for TOC, Total Organic Carbon)
- Chloride [water, surface water]: 0.0783 kg; lognormal variance with pedigree 0.672, pedigree (1,1,5,5,1)
  (same comment as for TOC, Total Organic Carbon)
- BOD5, Biological Oxygen Demand [water, ground-, long-term]: 0.079617 kg; lognormal variance with pedigree 0.112, pedigree (1,1,5,5,1)
  (same comment as for Carbon monoxide, fossil)
- COD, Chemical Oxygen Demand [water, ground-, long-term]: 0.24341 kg; lognormal variance with pedigree 0.112, pedigree (1,1,5,5,1)
  (same comment as for Carbon monoxide, fossil)
- Methane, fossil [air, urban air close to ground]: 0.46701 kg; lognormal variance with pedigree 0.142, pedigree (1,1,5,5,1)
  (same comment as for Carbon monoxide, fossil)
- BOD5, Biological Oxygen Demand [water, surface water]: 8.78 kg; lognormal variance with pedigree 0.072, pedigree (1,1,5,5,1)
  (same comment as for TOC, Total Organic Carbon)
- COD, Chemical Oxygen Demand [water, surface water]: 26.836 kg; lognormal variance with pedigree 0.042, pedigree (1,1,5,5,1)
  (same comment as for TOC, Total Organic Carbon)
- DOC, Dissolved Organic Carbon [water, ground-, long-term]: 0.096316 kg; lognormal variance with pedigree 0.112, pedigree (1,1,5,5,1)
  (same comment as for Carbon monoxide, fossil)
- Boron [air, urban air close to ground]: 0.0022616 kg; lognormal variance with pedigree 0.712, pedigree (1,1,5,5,1)
  direct digester gas emission plus emission from sludge incineration. Uncertainty calculated from wastewater composition and treatment model

## Extrapolations
wastewater compositions from literature and/or estimates This dataset has been copied from an original dataset covering the geography CH. The uncertainty has been adjusted accordingly.

## Review by Jürgen Sutter 2009-02-07
passed.
