# orange production, processing grade

Dataset: EcoSpold 2, unit process
Geography: US
Time period: 2010-01-01 to 2019-12-31
Technology level: current
Classification: ISIC rev.4 ecoinvent: 0123:Growing of citrus fruits
Tags: WFLDB
Scenario: Business-as-Usual
System model: Allocation at the point of substitution
Generated by: Xavier Bengoa
Published in: Nemecek T. 2015
Database: ecoinvent
isCopyrightProtected: true
accessRestrictedTo: 1

## General comment
This dataset represents the production of 1 kg of orange, processing grade (Valencia). Processing grade oranges are used for orange juice concentrate production. The reference flow is the average yield per ha and year, from 2010 - 2014: yield (27.2 t/ha) obtained under irrigated conditions (total amount of water 4561 m3/ha). The data are representative for orange production, processing grade (Valencia), in the United States (Florida) used for the export market. Mineral NPK fertiliser input is 224-40-240 kg/ha. No organic fertilisers are applied. Total active ingredients (a.i.) applied as pesticides amount to 14.5 kg a.i./ha and 43.1 kg/ha of horticultural oil.
The dataset was modelled within the project 'World Food LCA database (WFLDB)'. The aim of this project was to provide inventories of a broad variety of agricultural products and processes and to cover for each product at least 50% of the global export market. The export share of processing grade oranges produced in the United States amounts to 12 % of the global export (tonnage exported in 2010). The production system regarded in this dataset aimed at representing processing grade oranges produced in the United States or the export market.
PEF-Quality: data quality rating (DQR) = 1.2 (i.e. excellent quality). This dataset refers to an average situation; for specific situations exchanges might differ substantially due to site specific parameters

## Included activities start
This activity starts with the nursery producing fruit tree seedlings, i.e.grafted young trees to be planted.

## Included activities end
This activity ends with the waste treatment after the clearing of the orchard (rooting up the trees). The dataset includes all activities during a year in the productive phase of the orchard including the establishment phase per year of lifetime (20 years), the clearing of the orchard including waste treatment.
The establishment phase of the orchard includes tree nursery, soil cultivation, planting trees, sowing grass, installation of trellis system (posts and wires) and irrigation. Fertiliser and pesticide use in a year of the establishment phase is assumed to be half of the amount of a year in the productive phase.
The productive phase of the orchard includes machine operations, corresponding infrastructure, fuel use and sheds. Machine operations in the productive phase are: soil cultivation (mulching, mowing), fertiliser and pesticide application, harvesting and irrigation. Further, direct field emissions and land use change are included. At the end of the productive phase the orchard is cleared by rooting up the trees.
The inputs of seedlings, fertilisers and pesticides as well as packaging of fertilisers and pesticides are considered. The dataset doesn't include emissions from manure storage because these are within the system boundary of animal production. Heavy metal uptake by the crop is considered.

## Technology
Conventional production

## Parameters
- LUC_crop_specific: 1
  This parameter allows to switch between a 'crop specific' and a 'country specific' approach when calculating the LUC of a crop. By default, the chosen approach is 'crop specific', so the value of the parameter is 1. If you want to apply a 'country specific' approach, turn the parameter to 0.
- heavyMetalUptakeSwitch: 1

## Reference product
- orange, processing grade: 1 kg; CPC 01323: Oranges; By-product classification allocatable product
  Orange, precessing grade, US production
  Yield = 27196.0 kg/haOutput of orange, processing grade, used for orange juice concentrate production
  production volume 6.67975e9 kg
    Source: FAOSTAT. Average, 2009-2012. USDA NASS
  property price 0.16 EUR2005
    Personal communication with the Technical Head of Citrus at Core Fruit, South Africa on 26.04.2018
  property carbon content, non-fossil 0.350629
    calculation: C-content of components according to ecoinvent report No. 15a. Source of composition: Souci, S.W., Fachmann, W., Kraut, H. (Hg.: Bundesminsiterium fur Ernahrung, Landwirtschaft und Forsten, Bonn) 'Die Zusammensetzung der Lebensmittel - Nahrwerttabellen', medpharm Scientific Publishers Stuttgart, CRC Press; 2000.
  property carbon content 0.350629
    carbon content on a dry matter basis (reserved; not for manual entry)
  property true value 0.16
    allocation property applied in "true value" allocation // value calculated from revenue
  properties: water content 0.842, dry mass 0.542888 kg, water in wet mass 0.457112 kg, carbon content, fossil 0, wet mass 1 kg, carbon allocation 0.190353 kg

## By-products
- electricity, for reuse in municipal waste incineration only: 0 kWh; CPC 17100: Electrical energy; By-product classification allocatable product; pedigree (1,1,1,1,1)
  Net electricity generated from this waste and used in internal MSWI plant energy redistribution.
  Uncertainty: uncertainty is calculated from uncertainties in waste composition and uncertainties in energy efficiency and the uncertainty in internal energy demand
  production volume 1.59066e7 kWh
  property true value relation 3.6; name E_el_prod_MSWI_true_value_relation
    property to calculate "true value" from
  property price 0.1 EUR2005; name E_el_prod_MSWI_price_EUR2005
    Estimated to be the same price as in case of electricity, medium voltage.
  property exergy 3.6 MJ; name E_el_prod_MSWI_exergy
    This exergy property is based on the exergy content of the product.
  property true value 0.00030708
    allocation property applied in "true value" allocation // value calculated from true value relation
- heat, for reuse in municipal waste incineration only: 0 MJ; CPC 17300: Steam and hot water; By-product classification allocatable product; pedigree (1,1,1,1,1)
  (same comment as for electricity, for reuse in municipal waste incineration only)
  production volume 1.15086e8 MJ
  property exergy 0.1842 MJ; name E_th_prod_MSWI_exergy
    This exergy property is based on the exergy content of the product.
  property price 0.0106 EUR2005; name E_th_prod_MSWI_price_EUR2005
    Average European district heat price from Ecoheatcool and Euroheat 2005-2006, Ecoheat Work package 1: The European heat market. Final report. 10.6 EUR/GJ i s the price of district heat. http://www.solarthermalworld.org/files/Ecoheatcool%20WP1%20Web.pdf?download
  property true value relation 0.1842; name E_th_prod_MSWI_true_value_relation
    property to calculate "true value" from
  property true value 0.00011368
    (same comment as for electricity, for reuse in municipal waste incineration only)

## Inputs from technosphere
- acetamide-anillide-compound, unspecified: 1.68557e-6 kg; source USDA 2015; lognormal variance with pedigree 0.00784984, pedigree (2,2,3,1,1)
  Literature value or expert estimation (USDA 2015).
  properties: dry mass 1 kg, wet mass 1 kg, carbon content, fossil 0.659175
- packaging, for fertilisers: 0.038975 kg; lognormal variance with pedigree 0.0532, pedigree (4,3,3,5,4)
  Total amount of active substance/s of fertilisers needed for the production of 'orange, processing grade' is calculated to be circa 1.95E-02 kg. Fertiliser/s used in this dataset is/are: 'ammonia, liquid', 'ammonium nitrate, as N', 'ammonium sulfate, as N', 'nitrogen fertiliser, as N', 'phosphate fertiliser, as P2O5', 'phosphate rock, as P2O5, beneficiated, dry', 'potassium chloride, as K2O', 'potassium fertiliser, as K2O', 'potassium sulfate, as K2O', 'urea, as N'. The total amount of active substance/s is doubled in order to account for the packaging of the dilluted product of fertiliser/s that is/are applied. Therefore, 3.91E-02 kg of packaging for fertilisers is justified with this exchange.
  properties: price 0.0642 EUR2005, carbon content, fossil 0.825301, wet mass 1 kg, dry mass 1 kg
  note on carbon content, fossil: Considering a chemical formula (C2H4)n for polyethylene, carbon content-fossil is calculated to be 0.856286 kg of Carbon per kg of dry mass.
- copper oxide: 0.000131654 kg; source USDA 2015; lognormal variance with pedigree 0.00784984, pedigree (2,2,3,1,1)
  Literature value or expert estimation (USDA 2015).
  properties: dry mass 1 kg, wet mass 1 kg
- packaging, for pesticides: 0.00104956 kg; lognormal variance with pedigree 0.0532, pedigree (4,3,3,5,4)
  Total amount of active substance/s of pesticides needed for the production of orange, processing grade is calculated to be circa 5.26E-04 kg. Pesticide/s used in this dataset is/are: '[sulfonyl]urea-compound', '[thio]carbamate-compound', 'acetamide-anillide-compound, unspecified', 'copper oxide', 'cyclic N-compound', 'dinitroaniline-compound', 'diphenylether-compound', 'glyphosate', 'organophosphorus-compound, unspecified', 'phenoxy-compound', 'triazine-compound, unspecified'. The total amount of active substance/s is doubled in order to account for the packaging of the dilluted product of pesticide/s that is/are applied. Therefore, 1.05E-03 kg of packaging for pesticides is justified with this exchange.
  properties: price 0.0642 EUR2005, wet mass 1 kg, dry mass 1 kg, carbon content, fossil 0.85714
- dinitroaniline-compound: 2.25407e-5 kg; source USDA 2015; lognormal variance with pedigree 0.00784984, pedigree (2,2,3,1,1)
  Literature value or expert estimation (USDA 2015).
  properties: dry mass 1 kg, carbon content, fossil 0.55516, wet mass 1 kg
- land use change, perennial crop: 1.47428e-6 ha; = 1.47815855273e-06*LUC_crop_specific+0.0*(1-LUC_crop_specific)
  Calculated value. Land use change (LUC) combines land transformation areas calculated with the adapted 'Direct Land Use Change Assessment Tool' version 2014 developed by Blonk Consultants and the carbon losses from soil organic carbon (SOC) and vegetation (VEG) as calculated in ecoinvent v3. See 'WFLDB-Guidelines.pdf', available at https://ecoquery.ecoinvent.org/File/Reports.
- ammonia, liquid: 0.0056096 kg; source USDA 2015; lognormal variance with pedigree 0.118177, pedigree (2,1,3,1,1)
  Calculated based on literature values or expert estimation: The total amount of nutrient (USDA 2015) multiplied by the country-share of fertiliser type (IFA 2014). See supporting documentation 'WFLDB-Documentation.pdf' chapter 'Fertiliser application' for L3 and L4 data (https://ecoquery.ecoinvent.org/File/Reports).
  properties: wet mass 1 kg, dry mass 1 kg
- organophosphorus-compound, unspecified: 6.21366e-5 kg; source USDA 2015; lognormal variance with pedigree 0.00784984, pedigree (2,2,3,1,1)
  Literature value or expert estimation (USDA 2015).
  properties: dry mass 1 kg, wet mass 1 kg, carbon content, fossil 0.260898
- ammonium nitrate, as N: 0.000243587 kg; source USDA 2015; lognormal variance with pedigree 0.118177, pedigree (2,1,3,1,1)
  Calculated based on literature values or expert estimation: The total amount of nutrient (USDA 2015) multiplied by the country-share of fertiliser type (IFA 2014). See supporting documentation 'WFLDB-Documentation.pdf' chapter 'Fertiliser application' for L3 and L4 data (https://ecoquery.ecoinvent.org/File/Reports).
  Corresponds to 6.64 kg/ha
  properties: wet mass 1 kg, dry mass 1 kg
- triazine-compound, unspecified: 3.73019e-5 kg; source USDA 2015; lognormal variance with pedigree 0.00784984, pedigree (2,2,3,1,1)
  Literature value or expert estimation (USDA 2015).
  properties: carbon content, fossil 0.475616, wet mass 1 kg, dry mass 1 kg
- ammonium sulfate, as N: 0.00018822 kg; source USDA 2015; lognormal variance with pedigree 0.118177, pedigree (2,1,3,1,1)
  Calculated based on literature values or expert estimation: The total amount of nutrient (USDA 2015) multiplied by the country-share of fertiliser type (IFA 2014). See supporting documentation 'WFLDB-Documentation.pdf' chapter 'Fertiliser application' for L3 and L4 data (https://ecoquery.ecoinvent.org/File/Reports).
  Corresponds to 5.13 kg/ha
  properties: wet mass 1 kg, dry mass 1 kg
- naphtha: 0.00158084 kg; source USDA 2015; lognormal variance with pedigree 0.00784984, pedigree (2,2,3,1,1)
  Literature value or expert estimation (USDA 2015).
  properties: dry mass 1 kg, carbon content, fossil 0.919743, wet mass 1 kg
- urea, as N: 0.000949078 kg; source USDA 2015; lognormal variance with pedigree 0.118177, pedigree (2,1,3,1,1)
  Calculated based on literature values or expert estimation: The total amount of nutrient (USDA 2015) multiplied by the country-share of fertiliser type (IFA 2014). See supporting documentation 'WFLDB-Documentation.pdf' chapter 'Fertiliser application' for L3 and L4 data (https://ecoquery.ecoinvent.org/File/Reports).
  Corresponds to 25.9 kg/ha
  properties: wet mass 1 kg, dry mass 1 kg, carbon content, fossil 0.2
- phenoxy-compound: 5.42573e-6 kg; source USDA 2015; lognormal variance with pedigree 0.00784984, pedigree (2,2,3,1,1)
  Literature value or expert estimation (USDA 2015).
  properties: carbon content, fossil 0.532559, dry mass 1 kg, wet mass 1 kg
- phosphate rock, as P2O5, beneficiated, dry: 6.57412e-6 kg; source USDA 2015; lognormal variance with pedigree 0.118177, pedigree (2,1,3,1,1)
  Calculated based on literature values or expert estimation: The total amount of nutrient (USDA 2015) multiplied by the country-share of fertiliser type (IFA 2014). See supporting documentation 'WFLDB-Documentation.pdf' chapter 'Fertiliser application' for L3 and L4 data (https://ecoquery.ecoinvent.org/File/Reports).
  Corresponds to 0.179 kg/ha
  properties: dry mass 1 kg, wet mass 1 kg
- diphenylether-compound: 2.42363e-6 kg; source USDA 2015; lognormal variance with pedigree 0.00784984, pedigree (2,2,3,1,1)
  Literature value or expert estimation (USDA 2015).
  properties: dry mass 1 kg, wet mass 1 kg, carbon content, fossil 0.560061
- potassium chloride, as K2O: 0.00642449 kg; source USDA 2015; lognormal variance with pedigree 0.118177, pedigree (2,1,3,1,1)
  Calculated based on literature values or expert estimation: The total amount of nutrient (USDA 2015) multiplied by the country-share of fertiliser type (IFA 2014). See supporting documentation 'WFLDB-Documentation.pdf' chapter 'Fertiliser application' for L3 and L4 data (https://ecoquery.ecoinvent.org/File/Reports).
  Corresponds to 175.0 kg/ha
  properties: dry mass 1 kg, wet mass 1 kg
- glyphosate: 0.00012567 kg; source USDA 2015; lognormal variance with pedigree 0.00784984, pedigree (2,2,3,1,1)
  Literature value or expert estimation (USDA 2015).
  properties: wet mass 1 kg, dry mass 1 kg, carbon content, fossil 0.214286
- potassium fertiliser, as K2O: 0.0020761 kg; source USDA 2015; lognormal variance with pedigree 0.118177, pedigree (2,1,3,1,1)
  Calculated based on literature values or expert estimation: The total amount of nutrient (USDA 2015) multiplied by the country-share of fertiliser type (IFA 2014). See supporting documentation 'WFLDB-Documentation.pdf' chapter 'Fertiliser application' for L3 and L4 data (https://ecoquery.ecoinvent.org/File/Reports).
  Corresponds to 56.6 kg/ha
  properties: wet mass 1 kg, dry mass 1 kg
- planting tree: 0.000586009 unit; source Mossler M. 2014; lognormal variance with pedigree 0.118177, pedigree (2,1,3,1,1)
  Literature value or expert estimation (Mossler 2014). This is the number of trees per ha divided by the lifetime years of the orchard.
- potassium sulfate, as K2O: 0.000296103 kg; source USDA 2015; lognormal variance with pedigree 0.118177, pedigree (2,1,3,1,1)
  Calculated based on literature values or expert estimation: The total amount of nutrient (USDA 2015) multiplied by the country-share of fertiliser type (IFA 2014). See supporting documentation 'WFLDB-Documentation.pdf' chapter 'Fertiliser application' for L3 and L4 data (https://ecoquery.ecoinvent.org/File/Reports).
  Corresponds to 8.07 kg/ha
  properties: dry mass 1 kg, wet mass 1 kg
- fruit tree seedling, for planting: 0.000586009 unit; source Mossler M. 2014; lognormal variance with pedigree 0.118177, pedigree (2,1,3,1,1)
  (same comment as for planting tree)
  properties: water content 0.73, carbon content, non-fossil 0.439481, wet mass 1 kg, dry mass 0.578035 kg
  note on carbon content, non-fossil: calculation: C-content of components according to ecoinvent report No. 15a. Source of composition: https://ndb.nal.usda.gov/ndb/search/. Unspecific seedling used as proxy.
- fertilising, by broadcaster: 0.000146695 ha; lognormal variance with pedigree 0.118177, pedigree (2,1,3,1,1)
  Proxy: Extrapolated using a modified MEXALCA-approach (Roches et al. 2010; Nemecek et al. 2012). See supporting documentation 'WFLDB-Documentation.pdf' chapter 'Machinery processes' for L1 data (https://ecoquery.ecoinvent.org/File/Reports).
- cyclic N-compound: 5.36589e-5 kg; source USDA 2015; lognormal variance with pedigree 0.00784984, pedigree (2,2,3,1,1)
  Literature value or expert estimation (USDA 2015).
  properties: wet mass 1 kg, carbon content, fossil 0.641962, dry mass 1 kg
- mowing, by motor mower: 0.000122244 ha; lognormal variance with pedigree 0.118177, pedigree (2,1,3,1,1)
  (same comment as for fertilising, by broadcaster)
- establishing orchard: 0.000586009 unit; source Mossler M. 2014; lognormal variance with pedigree 0.118177, pedigree (2,1,3,1,1)
  (same comment as for planting tree)
- application of plant protection product, by field sprayer: 0.000220042 ha; lognormal variance with pedigree 0.118664, pedigree (2,2,3,1,1)
  Proxy: Extrapolated using a modified MEXALCA-approach (Roches et al. 2010; Nemecek et al. 2012). See supporting documentation 'WFLDB-Documentation.pdf' chapter 'Machinery processes' for L1 data (https://ecoquery.ecoinvent.org/File/Reports). Field sprayer used as a proxy for pesticide application in orchards.
- irrigation: 0.146435 m3; source Nennich, T. D. 2005; lognormal variance with pedigree 0.118177, pedigree (2,1,3,1,1)
  Calculated value: The total amount of water used for irrigation (calculated from evapotranspiration, Pfister et al. 2011) multiplied by the country-share of irrigation technique (Nennich et al. 2005). See supporting documentation 'WFLDB-Documentation.pdf' chapter 'Water use for irrigation' for L1 data (https://ecoquery.ecoinvent.org/File/Reports).
  properties: dry mass 0.11 kg, wet mass 1000 kg, water content 9089.91
- mulching: 3.76492e-5 ha; lognormal variance with pedigree 0.118177, pedigree (2,1,3,1,1)
  (same comment as for fertilising, by broadcaster)
- nitrogen fertiliser, as N: 0.00222052 kg; source USDA 2015; lognormal variance with pedigree 0.118177, pedigree (2,1,3,1,1)
  Calculated based on literature values or expert estimation: The total amount of nutrient (USDA 2015) multiplied by the country-share of fertiliser type (IFA 2014). See supporting documentation 'WFLDB-Documentation.pdf' chapter 'Fertiliser application' for L3 and L4 data (https://ecoquery.ecoinvent.org/File/Reports).
  Corresponds to 7.2 kg/ha
  properties: wet mass 1 kg, dry mass 1 kg
- transport, tractor and trailer, agricultural: 0.000444375 metric ton*km; lognormal variance with pedigree 0.156439, pedigree (4,1,3,1,1)
  On-farm transport: Yield (in tonnes) multiplied by the average distance from field to farm. The distance was obtained by extrapolation (modified MEXALCA approach). See supporting documentation 'WFLDB-Documentation.pdf' chapter 'Machinery processes' (https://ecoquery.ecoinvent.org/File/Reports).
- phosphate fertiliser, as P2O5: 0.00147322 kg; source USDA 2015; lognormal variance with pedigree 0.118177, pedigree (2,1,3,1,1)
  Calculated based on literature values or expert estimation: The total amount of nutrient (USDA 2015) multiplied by the country-share of fertiliser type (IFA 2014). See supporting documentation 'WFLDB-Documentation.pdf' chapter 'Fertiliser application' for L3 and L4 data (https://ecoquery.ecoinvent.org/File/Reports).
  Corresponds to 10.0 kg/ha
  properties: wet mass 1 kg, dry mass 1 kg
- [sulfonyl]urea-compound: 7.10133e-5 kg; source USDA 2015; lognormal variance with pedigree 0.00784984, pedigree (2,2,3,1,1)
  Literature value or expert estimation (USDA 2015).
  properties: dry mass 1 kg, carbon content, fossil 0.540853, wet mass 1 kg
- waste wood, untreated: -0.048886 kg; lognormal variance with pedigree 0.118177, pedigree (2,1,3,1,1)
  Wood from trees after 1-2 years of sorrage at the field (20% water) per lifetime year (20 years) of the orchard
  production volume 3.27405e8 kg
    Calculated from the reference product amount and production volume
  properties: water content 0.25, dry mass 0.8 kg, carbon content, non-fossil 0.48632, wet mass 1 kg
- [thio]carbamate-compound: 1.12704e-5 kg; source USDA 2015; lognormal variance with pedigree 0.00784984, pedigree (2,2,3,1,1)
  Literature value or expert estimation (USDA 2015).
  properties: dry mass 1 kg, wet mass 1 kg, carbon content, fossil 0.626349

## Inputs from nature
- Transformation, from permanent crop, irrigated [natural resource, land]: 0.0183368 m2; lognormal variance with pedigree 0.0382144, pedigree (2,1,3,1,1)
  10000 m2 divided by the life time of the perennial crop (20 years).
- Occupation, permanent crop, irrigated [natural resource, land]: 0.367727 m2*year; lognormal variance with pedigree 0.0140616, pedigree (2,1,3,1,1)
  Related to the duration from harvest date of previous crop to harvest date of main crop.
- Transformation, to permanent crop, irrigated [natural resource, land]: 0.0183368 m2; lognormal variance with pedigree 0.0382144, pedigree (2,1,3,1,1)
  10000 m2 divided by the life time of the perennial crop (20 years).
- Carbon dioxide, in air [natural resource, in air]: 0.221887 kg; lognormal variance with pedigree 0.00784984, pedigree (2,2,3,1,1)
  Calculated value: CO2 uptake by biomass. Dry matter content = 16%
- Energy, gross calorific value, in biomass [natural resource, biotic]: 2.54358 MJ; lognormal variance with pedigree 0.00784984, pedigree (2,2,3,1,1)
  Calculated value: dry matter content = 16%

## Emissions to nature
- Mercury [water, ground-]: 5.24947e-11 kg; source Freiermuth R.  2006; lognormal variance with pedigree 0.350938, pedigree (2,2,3,1,1)
  Calculated value - Freiermuth (2006). See 'WFLDB-Guidelines.pdf', available at https://ecoquery.ecoinvent.org/File/Reports.
- Zinc, ion [water, ground-]: 6.0959e-7 kg; source Freiermuth R.  2006; lognormal variance with pedigree 0.350938, pedigree (2,2,3,1,1)
  (same comment as for Mercury)
- Dimethoate [soil, agricultural]: 9.57482e-6 kg; lognormal variance with pedigree 0.0387216, pedigree (2,2,3,1,1)
  Calculated value - 100% emission in soil. See 'WFLDB-Guidelines.pdf', available at https://ecoquery.ecoinvent.org/File/Reports.
- Chromium, ion [water, surface water]: 7.75611e-8 kg; source Freiermuth R.  2006; lognormal variance with pedigree 0.350938, pedigree (2,2,3,1,1)
  (same comment as for Mercury)
- Chromium [soil, agricultural]: 7.24603e-7 kg; = 8.12619502868e-07 + ( - 8.61106412708e-08)*heavyMetalUptakeSwitch; source Freiermuth R.  2006
  Comment on mathematicalRelation:
  8.12619502868e-07 from Calculated value - Freiermuth (2006). See 'WFLDB-Guidelines.pdf', available at https://ecoquery.ecoinvent.org/File/Reports.
  -8.61106412708e-08 from Crop, default, heavy metals uptake model
  Heavy metal uptake can be excluded by setting the parameter heavyMetalUptakeSwitch to zero.
- Copper [soil, agricultural]: 2.40155e-5 kg; = 2.51257537873e-05 + ( - 1.0470579975e-06)*heavyMetalUptakeSwitch; source Freiermuth R.  2006
  Comment on mathematicalRelation:
  2.51257537873e-05 from Calculated value - Freiermuth (2006). See 'WFLDB-Guidelines.pdf', available at https://ecoquery.ecoinvent.org/File/Reports.
  -1.0470579975e-06 from Crop, default, heavy metals uptake model
  Heavy metal uptake can be excluded by setting the parameter heavyMetalUptakeSwitch to zero.
- Imidacloprid [soil, agricultural]: 7.77954e-6 kg; lognormal variance with pedigree 0.0387216, pedigree (2,2,3,1,1)
  (same comment as for Dimethoate)
- Lead [soil, agricultural]: 1.2538e-7 kg; = 2.11152375349e-07 + ( - 8.54422962936e-08)*heavyMetalUptakeSwitch; source Freiermuth R.  2006
  Comment on mathematicalRelation:
  2.11152375349e-07 from Calculated value - Freiermuth (2006). See 'WFLDB-Guidelines.pdf', available at https://ecoquery.ecoinvent.org/File/Reports.
  -8.54422962936e-08 from Crop, default, heavy metals uptake model
  Heavy metal uptake can be excluded by setting the parameter heavyMetalUptakeSwitch to zero.
- Mercury [soil, agricultural]: -1.76507e-9 kg; = 4.6381820856e-09 + ( - 6.40789571996e-09)*heavyMetalUptakeSwitch; source Freiermuth R.  2006
  Comment on mathematicalRelation:
  4.6381820856e-09 from Calculated value - Freiermuth (2006). See 'WFLDB-Guidelines.pdf', available at https://ecoquery.ecoinvent.org/File/Reports.
  -6.40789571996e-09 from Crop, default, heavy metals uptake model
  Heavy metal uptake can be excluded by setting the parameter heavyMetalUptakeSwitch to zero.
- Cadmium, ion [water, surface water]: 7.94535e-10 kg; source Freiermuth R.  2006; lognormal variance with pedigree 0.350938, pedigree (2,2,3,1,1)
  (same comment as for Mercury)
- Oxamyl [soil, agricultural]: 7.33072e-7 kg; lognormal variance with pedigree 0.0387216, pedigree (2,2,3,1,1)
  (same comment as for Dimethoate)
- Zinc [soil, agricultural]: -2.41327e-6 kg; = 2.64005736138e-06 + ( - 5.05967167966e-06)*heavyMetalUptakeSwitch; source Freiermuth R.  2006
  Comment on mathematicalRelation:
  2.64005736138e-06 from Calculated value - Freiermuth (2006). See 'WFLDB-Guidelines.pdf', available at https://ecoquery.ecoinvent.org/File/Reports.
  -5.05967167966e-06 from Crop, default, heavy metals uptake model
  Heavy metal uptake can be excluded by setting the parameter heavyMetalUptakeSwitch to zero.
- Water [water, ground-]: 0.00679453 m3; lognormal variance with pedigree 0.118177, pedigree (2,1,3,1,1)
  Calculated value - Emission calculated from water balance. See 'WFLDB-Guidelines.pdf', available at https://ecoquery.ecoinvent.org/File/Reports.
- Fenbuconazole [soil, agricultural]: 5.86458e-7 kg; lognormal variance with pedigree 0.0387216, pedigree (2,2,3,1,1)
  (same comment as for Dimethoate)
- Phosmet [soil, agricultural]: 1.01732e-5 kg; lognormal variance with pedigree 0.0387216, pedigree (2,2,3,1,1)
  (same comment as for Dimethoate)
- Nickel, ion [water, surface water]: 5.0485e-8 kg; source Freiermuth R.  2006; lognormal variance with pedigree 0.350938, pedigree (2,2,3,1,1)
  (same comment as for Mercury)
- Fosetyl [soil, agricultural]: 4.17901e-6 kg; lognormal variance with pedigree 0.0387216, pedigree (2,2,3,1,1)
  (same comment as for Dimethoate)
- Paraquat [soil, agricultural]: 4.54804e-6 kg; lognormal variance with pedigree 0.0387216, pedigree (2,2,3,1,1)
  (same comment as for Dimethoate)
- Metalaxyl-M [soil, agricultural]: 1.68557e-6 kg; lognormal variance with pedigree 0.0387216, pedigree (2,2,3,1,1)
  (same comment as for Dimethoate)
- Malathion [soil, agricultural]: 1.84515e-5 kg
  (same comment as for Dimethoate)
- Norflurazon [soil, agricultural]: 4.52809e-5 kg
  (same comment as for Dimethoate)
- Pyraclostrobin (prop) [soil, agricultural]: 1.0273e-6 kg; lognormal variance with pedigree 0.0387216, pedigree (2,2,3,1,1)
  (same comment as for Dimethoate)
- Water [water, surface water]: 0.0271785 m3; lognormal variance with pedigree 0.118177, pedigree (2,1,3,1,1)
  (same comment as for Water)
- Nickel [soil, agricultural]: 1.65448e-7 kg; = 3.30931019268e-07 + ( - 1.65048029122e-07)*heavyMetalUptakeSwitch; source Freiermuth R.  2006
  Comment on mathematicalRelation:
  -1.65048029122e-07 from Crop, default, heavy metals uptake model
  Heavy metal uptake can be excluded by setting the parameter heavyMetalUptakeSwitch to zero.
- Copper, ion [water, ground-]: 1.31904e-7 kg; source Freiermuth R.  2006; lognormal variance with pedigree 0.350938, pedigree (2,2,3,1,1)
  (same comment as for Mercury)
- Mineral oil [soil, agricultural]: 0.00158583 kg; lognormal variance with pedigree 0.0387216, pedigree (2,2,3,1,1)
  (same comment as for Dimethoate)
- Mercury [water, surface water]: 1.73463e-10 kg; source Freiermuth R.  2006; lognormal variance with pedigree 0.350938, pedigree (2,2,3,1,1)
  (same comment as for Mercury)
- Phosphate [water, ground-]: 6.76152e-6 kg; source Prasuhn V.  2006; lognormal variance with pedigree 0.169866, pedigree (2,2,3,1,1)
  Calculated value - Prasuhn (2006). See 'WFLDB-Guidelines.pdf', available at https://ecoquery.ecoinvent.org/File/Reports.
- Nitrogen oxides [air, non-urban air or from high stacks]: 0.000324148 kg; source EEA 2013; lognormal variance with pedigree 0.118664, pedigree (2,2,3,1,1)
  Calculated value - EEA/EMEP (2013). See 'WFLDB-Guidelines.pdf', available at https://ecoquery.ecoinvent.org/File/Reports.
- Ammonia [air, non-urban air or from high stacks]: 0.000594077 kg; source EEA 2013; lognormal variance with pedigree 0.0387216, pedigree (2,2,3,1,1)
  Calculated value - EMEP/EEA (2013). See 'WFLDB-Guidelines.pdf', available at https://ecoquery.ecoinvent.org/File/Reports.
- 2,4-D [soil, agricultural]: 5.42573e-6 kg; lognormal variance with pedigree 0.0387216, pedigree (2,2,3,1,1)
  (same comment as for Dimethoate)
- Zinc, ion [water, surface water]: 1.10259e-7 kg; source Freiermuth R.  2006; lognormal variance with pedigree 0.350938, pedigree (2,2,3,1,1)
  (same comment as for Mercury)
- Glyphosate [soil, agricultural]: 0.00012567 kg; lognormal variance with pedigree 0.0387216, pedigree (2,2,3,1,1)
  (same comment as for Dimethoate)
- Chromium, ion [water, ground-]: 7.19647e-7 kg; source Freiermuth R.  2006; lognormal variance with pedigree 0.350938, pedigree (2,2,3,1,1)
  (same comment as for Mercury)
- Pendimethalin [soil, agricultural]: 2.25407e-5 kg; lognormal variance with pedigree 0.0387216, pedigree (2,2,3,1,1)
  (same comment as for Dimethoate)
- Lead [water, surface water]: 1.98298e-8 kg; source Freiermuth R.  2006; lognormal variance with pedigree 0.350938, pedigree (2,2,3,1,1)
  (same comment as for Mercury)
- Nitrate [water, ground-]: 0.00558339 kg; source Faist Emmenegger M. 2009; lognormal variance with pedigree 0.169866, pedigree (2,2,3,1,1)
- Simazine [soil, agricultural]: 3.73019e-5 kg; lognormal variance with pedigree 0.0387216, pedigree (2,2,3,1,1)
  (same comment as for Dimethoate)
- Lead [water, ground-]: 5.64885e-9 kg; source Freiermuth R.  2006; lognormal variance with pedigree 0.350938, pedigree (2,2,3,1,1)
  (same comment as for Mercury)
- Carbon dioxide, fossil [air, non-urban air or from high stacks]: 0.00223511 kg; lognormal variance with pedigree 0.00784984, pedigree (2,2,3,1,1)
  Calculated value - CO2 emissions from urea and lime. See 'WFLDB-Guidelines.pdf', available at https://ecoquery.ecoinvent.org/File/Reports.
- Abamectin [soil, agricultural]: 6.41314e-7 kg; lognormal variance with pedigree 0.0387216, pedigree (2,2,3,1,1)
  (same comment as for Dimethoate)
- Phosphorus [water, surface water]: 2.07738e-6 kg; source Prasuhn V.  2006; lognormal variance with pedigree 0.169866, pedigree (2,2,3,1,1)
  Calculated value - Prasuhn (2006) and SQCB-Erosion. See 'WFLDB-Guidelines.pdf', available at https://ecoquery.ecoinvent.org/File/Reports.
- Nickel, ion [water, ground-]: 5.85789e-12 kg; source Freiermuth R.  2006; lognormal variance with pedigree 0.350938, pedigree (2,2,3,1,1)
  (same comment as for Mercury)
- Dinitrogen monoxide [air, non-urban air or from high stacks]: 0.000164006 kg; source IPCC 2006; lognormal variance with pedigree 0.118664, pedigree (2,2,3,1,1)
  Calculated value - IPCC (2006). See 'WFLDB-Guidelines.pdf', available at https://ecoquery.ecoinvent.org/File/Reports.
- Aldicarb [soil, agricultural]: 9.46511e-6 kg; lognormal variance with pedigree 0.0387216, pedigree (2,2,3,1,1)
  (same comment as for Dimethoate)
- Cadmium, ion [water, ground-]: 1.52959e-9 kg; source Freiermuth R.  2006; lognormal variance with pedigree 0.350938, pedigree (2,2,3,1,1)
  (same comment as for Mercury)
- Copper, ion [water, surface water]: 1.21493e-7 kg; source Freiermuth R.  2006; lognormal variance with pedigree 0.350938, pedigree (2,2,3,1,1)
  (same comment as for Mercury)
- Water [air, non-urban air or from high stacks]: 0.112463 m3; lognormal variance with pedigree 0.118177, pedigree (2,1,3,1,1)
  (same comment as for Water)
- Chlorpyrifos [soil, agricultural]: 1.97481e-5 kg; lognormal variance with pedigree 0.0387216, pedigree (2,2,3,1,1)
  (same comment as for Dimethoate)
- Cadmium [soil, agricultural]: 1.08748e-7 kg; = 1.25077217238e-07 + ( - 1.60434394764e-08)*heavyMetalUptakeSwitch; source Freiermuth R.  2006
  Comment on mathematicalRelation:
  1.25077217238e-07 from Calculated value - Freiermuth (2006). See 'WFLDB-Guidelines.pdf', available at https://ecoquery.ecoinvent.org/File/Reports.
  -1.60434394764e-08 from Crop, default, heavy metals uptake model
  Heavy metal uptake can be excluded by setting the parameter heavyMetalUptakeSwitch to zero.
- Phosphate [water, surface water]: 3.10157e-5 kg; source Prasuhn V.  2006; lognormal variance with pedigree 0.169866, pedigree (2,2,3,1,1)
  (same comment as for Phosphate)
- Cypermethrin [soil, agricultural]: 2.42363e-6 kg; lognormal variance with pedigree 0.0387216, pedigree (2,2,3,1,1)
  (same comment as for Dimethoate)
- Diuron [soil, agricultural]: 5.5155e-5 kg; lognormal variance with pedigree 0.0387216, pedigree (2,2,3,1,1)
  (same comment as for Dimethoate)
- Diflubenzuron [soil, agricultural]: 1.58583e-5 kg; lognormal variance with pedigree 0.0387216, pedigree (2,2,3,1,1)
  (same comment as for Dimethoate)

## Sampling procedure
WFLDB Methodological Guidelines for the Life Cycle Inventory of Agricultural Products in the latest version, available at: https://ecoquery.ecoinvent.org/File/Reports. Data sources: Data were categorised from level 0 (L0) to level (L4) as follows: L0 = estimate, proxy; L1 = statistical data (e.g. FAOSTAT); L2 = L1 adapted to crop and country; L3 = literature data or L1 resp. L2 data approved by experts; medium detailing (i.e. kg of total N-fertiliser); L4 = L3 data of high detailing (i.e. portion N-fertiliser types).In this dataset data were obtained for yield: L3; Fertilisers: L4; Pesticides: L1; Machinery: L0; Irrigation: L2. For information regarding the calculation of individual exchanges see supporting documentation WFLDB-Documentation.pdf

## Review by Assumpció ANTON 2016-05-30
Be aware that the use of statistics in input calculations could provide some specific inputs not common for specific crops, this should be corrected if better information is available and better reflexed in DQR . Currently, I would dissent for some of good marks provided, being a revision of criteria applied advisable.

Pesticides will need to be amended periodically checking for update of pesticides' ban.
