# treatment of waste polyethylene, for recycling, unsorted, sorting

Dataset: EcoSpold 2, unit process
Geography: US
Time period: 2010-01-01 to 2019-12-31
Technology level: current
Classification: ISIC rev.4 ecoinvent: 3811:Collection of non-hazardous waste
Scenario: Business-as-Usual
System model: Allocation at the point of substitution
Generated by: Thomas Kägi
Published in: Franklin Associates 2011
Database: ecoinvent
isCopyrightProtected: true
accessRestrictedTo: 1

## General comment
The functional unit represents the treatment of unsorted waste polyethylene, for recycling, yielding 1 kg of sorted waste polyethylene, for recycling.
Once the postconsumer PET has been collected, they must be separated from other co-collected materials and plastics. Although some recovered plastic is separated by curbside sorting and the use of separate bins at drop-off recycling centers, sorting and separation of plastics most commonly takes place at material recovery facilities (MRFs). Sorting operations at MRFs range from manual sorting of items on a conveyor to highly automated systems using magnets, air classifiers, optical sorters, and other technologies to sort and separate mixed incoming materials. Postconsumer plastics may be separated and baled as mixed plastics, or the facility may have the capability to further sort down to individual resin bales.

## Included activities start
Service is starting with the receipt of unsorted waste PE

## Included activities end
This module includes all processes of the sorting of waste PE up to the factory gate. Machinery infrastructure is excluded

## Allocation
no allocation involved

## Reference product
- waste polyethylene, for recycling, unsorted: 0 kg; name RP_amount; CPC 39270: Waste, parings and scrap of plastics; By-product classification Recyclable
  production volume 0 kg; name RP_PV
    Assumption according to Association of Plastic Recyclers (APR; www.plasticsrecycling.org): 1.5 Mio t of plastic recycling, half of it PET; ; waste input material (for treatment) and by-product/waste generated scaled accordingly
  property price 0.0315 EUR2005
    Convert from EU 27 price to the world by currency exchange rate.
  property carbon content 0.81
    carbon content on a dry matter basis (reserved; not for manual entry)
  properties: carbon content, non-fossil 0, water in wet mass 0.026 kg, wet mass 1 kg, water content 0.026694, dry mass 0.974 kg, carbon content, fossil 0.81, carbon allocation 0.78894 kg
- waste polyethylene, for recycling, sorted: 1 kg; CPC 39270: Waste, parings and scrap of plastics; By-product classification Recyclable; pedigree (1,1,1,1,1)
  production volume 8.0925e8 kg

## By-products
- waste polyethylene, for recycling, sorted: 0 kg; name BP_waste_PE_sorted; CPC 39270: Waste, parings and scrap of plastics; By-product classification Recyclable; pedigree (1,1,1,1,1)
  production volume 0 kg; = ABS(BP_waste_PE_sorted/RP_amount*RP_PV)
    Assumption according to Association of Plastic Recyclers (APR; www.plasticsrecycling.org): 1.5 Mio t of plastic recycling, half of it PET; waste input material (for treatment) and by-product/waste generated scaled accordingly
  property price 0.035 EUR2005
    Convert from EU 27 price to the world by currency exchange rate.
  property carbon content 0.829
    carbon content on a dry matter basis (reserved; not for manual entry)
  properties: water content 0.00603622, water in wet mass 0.006 kg, carbon content, fossil 0.829, carbon content, non-fossil 0, dry mass 0.994 kg, wet mass 1 kg, carbon allocation 0.824026 kg
- iron scrap, unsorted: 0 kg; name BP_scrap_steel; CPC 39310: Slag, dross, scalings and other waste from the manufacture of iron or steel; By-product classification Recyclable; pedigree (1,1,1,1,1)
  Not included in the original report. Added based on the CH inventory in order to have better consistency.;
  The amount and annual production volume for the recyclable by-product output 'iron scrap, sorted' was set to 0 during the review of the database for the release of v3.4. This is a temporary solution to ensure the appropriate point of cut-off for this product within the database. Original amount: 0.00619 kg/reference flow
  production volume 0 kg; = ABS(BP_scrap_steel/RP_amount*RP_PV)
    (same comment as for waste polyethylene, for recycling, sorted)
  property price 0.149 EUR2005
    Temporary price data. Calculated as 90% of purchasers price based on: estimated at 85% of sorted scrap
  property carbon content 0
    carbon content on a dry matter basis (reserved; not for manual entry)
  properties: carbon content, non-fossil 0, wet mass 1 kg, water content 0, carbon content, fossil 0, dry mass 1 kg, water in wet mass 0 kg, carbon allocation 0 kg
- electricity, for reuse in municipal waste incineration only: 0 kWh; CPC 17100: Electrical energy; By-product classification allocatable product; pedigree (1,1,1,1,1)
  Net electricity generated from this waste and used in internal MSWI plant energy redistribution.
  Uncertainty: uncertainty is calculated from uncertainties in waste composition and uncertainties in energy efficiency and the uncertainty in internal energy demand
  property exergy 3.6 MJ; name E_el_prod_MSWI_exergy
    This exergy property is based on the exergy content of the product.
  property true value relation 3.6; name E_el_prod_MSWI_true_value_relation
    property to calculate "true value" from
  property price 0.1 EUR2005; name E_el_prod_MSWI_price_EUR2005
    Estimated to be the same price as in case of electricity, medium voltage.
- iron scrap, sorted, pressed: 0 kg; By-product classification Recyclable; CPC 39310: Slag, dross, scalings and other waste from the manufacture of iron or steel; pedigree (1,1,1,1,1)
  Iron scrap recovered from this waste.
  Uncertainty: uncertainty calculated from uncertainty in waste composition, uncertainty of share of recyclable metal, uncertainty of transfer coefficient to bottom ash, uncertainty of the efficiency of scrap removal in MSWI plant.
  property price 0.175 EUR2005
    Temporary price data. Calculated as 90% of purchasers price based on: 2005 import and export prices (total trades (USD) divided by total weight (kg) in biggest economies of the world: EU27, USA, Brasil, China, India, Japan and Russia) from UN Commodity Trade Statistics Database (http://data.un.org/Explorer.aspxDatabase [Accessed 2011.06.20]). Commodity: Waste or scrap, of cast iron
  property carbon content 0
    carbon content on a dry matter basis (reserved; not for manual entry)
  properties: dry mass 1 kg, water content 0, carbon content, non-fossil 0, water in wet mass 0 kg, carbon content, fossil 0, wet mass 1 kg, carbon allocation 0 kg
- heat, for reuse in municipal waste incineration only: 0 MJ; CPC 17300: Steam and hot water; By-product classification allocatable product; pedigree (1,1,1,1,1)
  (same comment as for electricity, for reuse in municipal waste incineration only)
  property exergy 0.1842 MJ; name E_th_prod_MSWI_exergy
    This exergy property is based on the exergy content of the product.
  property true value relation 0.1842; name E_th_prod_MSWI_true_value_relation
    property to calculate "true value" from
  property price 0.0106 EUR2005; name E_th_prod_MSWI_price_EUR2005
    Average European district heat price from Ecoheatcool and Euroheat 2005-2006, Ecoheat Work package 1: The European heat market. Final report. 10.6 EUR/GJ i s the price of district heat. http://www.solarthermalworld.org/files/Ecoheatcool%20WP1%20Web.pdf?download
- aluminium oxide, non-metallurgical: 0 kg; source European Aluminium Association 2008; CPC 41432: Alumina (aluminium oxide), except artificial corundum; By-product classification allocatable product; CAS 1344-28-1; pedigree (1,1,1,1,1)
  property carbon content, non-fossil 0; name C_content_non_fossil
  property price 0.28 EUR2005; name Al2O3Amount_price_EUR2005
    From UN trade database. http://data.un.org/ Import data from the largest economies of the world are used (Brazil, India, USA, China, Japan and EU-27).
  property dry mass 1 kg; name DM
  property water content 0; name water_content
  property wet mass 1 kg; name WM
  property water in wet mass 0 kg; name WWM
  property carbon content, fossil 0; name C_content_fossil
  property carbon content 0
    carbon content on a dry matter basis (reserved; not for manual entry)
  properties: carbon allocation 0 kg
- aluminium, cast alloy: 0 kg; source European Aluminium Association 2008; By-product classification allocatable product; CPC 41431: Unwrought aluminium; pedigree (1,1,1,1,1)
  EcoSpold01Location=RER
  property price 1.3 EUR2005; name castAlloyAmount_price_EUR2005
    Temporary price data. Calculated as 90% of purchasers price based on: Source: London Metal Exchange, Aluminium alloy price for 2005
  property carbon content 0
    carbon content on a dry matter basis (reserved; not for manual entry)
  properties: water in wet mass 0 kg, carbon content, non-fossil 0, water content 0, dry mass 1 kg, carbon content, fossil 0, wet mass 1 kg, carbon allocation 0 kg
- aluminium, wrought alloy: 0 kg; source European Aluminium Association 2008; By-product classification allocatable product; CPC 4153: Semi-finished products of aluminium or aluminium alloys; pedigree (1,1,1,1,1)
  property price 1.44 EUR2005; name secondaryAluminiumOutput_price_EUR2005
    Estimated based on literature values and expert judgement. Aluminium ccast alloys are about 90% of the price of aluminium wrought alloys.
  property carbon content 0
    carbon content on a dry matter basis (reserved; not for manual entry)
  properties: wet mass 1 kg, water content 0, carbon content, fossil 0, water in wet mass 0 kg, carbon content, non-fossil 0, dry mass 1 kg, carbon allocation 0 kg
- copper: 0 kg; source Rentz O. 1999; By-product classification allocatable product; CPC 41413: Refined copper and copper alloys, unwrought; master alloys of copper
  Literature value. Copper uses: Before end-use copper is manufactured into semi fabricated products, such as shapes and ingots (known as 'semis'). These manufacturing processes are subdivided into hot working, cold working and, if necessary, process annealing. Few of the semis are ready for use as such. They more typically travel to first-stage manufacturers, who make metal rods, wire, and casting, and then to component manufacturers who produce such things as motors, valves, and insulated cables The components in turn are incorporated by final-stage manufacturers into a variety of finished products - automobiles, commercial buildings, residential housing, and so forth. These uses account for about 79% of the world-wide consumption of copper.
  property price 5.52 EUR2005
    Literature value (http://www.economist.com/news/business/21576714-mining-industry-has-enriched-chile-its-future-precarious-copper-solution). Average price between 20015 and 2013.
  property carbon content 0
    carbon content on a dry matter basis (reserved; not for manual entry)
  properties: dry mass 1 kg, water in wet mass 0 kg, wet mass 1 kg, carbon content, non-fossil 0, water content 0, carbon content, fossil 0, carbon allocation 0 kg
- zinc concentrate: 0 kg; CPC 14290: Other non-ferrous metal ores and concentrates (other than uranium or thorium ores and concentrates); By-product classification allocatable product
  Calculated value from the knowledge of the properties of both products.
  property price 0.38 EUR2005; name ByP_price_EUR2005
    Temporary price data. Calculated as 90% of purchasers price based on: Zinc content in concentrate 53%. Concentrate price per kg Zn 86.5% of refined Zn price (13.5% treatment charges according to CHR Metals Limited 2005: Dynamic cost curves. http://www.minecost.com/dynamic.pdf). 2004 zinc price from USGS (2007) Mineral commodity summaries 2007. <http://minerals.usgs.gov/minerals/pubs/mcs/2007/mcs2007.pdf> [Accessed 25 May 2010]
  property zinc content 0.53; name zinc_C_zinc_concentrate
    Zinc content on a dry matter basis. Value taken from teh "zinc mine operation" /GLO dataset.
  property dry mass 1 kg; name DM_zinc_concentrate
  property carbon content 0
    carbon content on a dry matter basis (reserved; not for manual entry)
  properties: wet mass 1 kg, water content 0, carbon content, non-fossil 0, carbon content, fossil 0, water in wet mass 0 kg, carbon allocation 0 kg

## Inputs from technosphere
- municipal solid waste: 0 kg; name BP_MSW; pedigree (1,1,1,1,1)
  production volume 0 kg; = ABS(BP_MSW/RP_amount*RP_PV)
    (same comment as for waste polyethylene, for recycling, sorted)
  property price 0 EUR2005; name BP_MSW_price_EUR2005
  properties: wet mass 1 kg, water content 0.297017, dry mass 0.771 kg, carbon content, non-fossil 0.261655, carbon content, fossil 0.171549
  note on carbon content, non-fossil: MSW composition in tab 4.1, ecoinvent v2.2 report 13_I. C content referred to 1 kg DM
- steel, low-alloyed: 0 kg; pedigree (1,1,1,1,1)
  Not included in the original report. Added based on the CH inventory in order to have better consistency.
  properties: wet mass 1 kg, carbon content, fossil 0.005, dry mass 1 kg
- electricity, low voltage: 0 kWh; pedigree (1,1,1,1,1)
- wire drawing, steel: 0 kg; pedigree (1,1,1,1,1)
  (same comment as for steel, low-alloyed)
- propane, burned in building machine: 0 MJ; pedigree (1,1,1,1,1)
- heat, district or industrial, natural gas: 0 MJ; pedigree (1,1,1,1,1)
- waste preparation facility: 0 unit; pedigree (1,1,1,1,1)
  properties: lifetime 50 year, lifetime capacity [kg] 5e8 kg
- diesel, burned in building machine: 0 MJ; pedigree (1,1,1,1,1)
- polyethylene, low density, granulate: 0.00474179 kg; source Angel Avadí 2015; triangular min 0.00474179, mostLikely 0.00474179, max 0.00474179, pedigree (2,3,3,5,1)
  Plastic film
  Uncertainty: Data from 1 plant, assumptions for larger plants
- metal working, average for chromium steel product manufacturing: 0.000662591 kg; source Angel Avadí 2015
  Tinplate can
- fish canning plant: 1.06522e-11 unit; source Angel Avadí 2015
  One unit of plant represents the installed capacity required to process 1 t of raw material
- vegetable oil, refined: 0.00929094 kg; source Angel Avadí 2015; triangular min 0.00929094, mostLikely 0.00929094, max 0.00929094, pedigree (2,3,3,5,1)
  Oil for canned fish
  Uncertainty: Data from 1 plant, assumptions for larger plants
- carton board box production, with offset printing: 0.00106993 kg; source Angel Avadí 2015; triangular min 0.00106993, mostLikely 0.00106993, max 0.00106993, pedigree (2,3,3,5,1)
  Cardboard boxes
  Uncertainty: Data from 1 plant, assumptions for larger plants
- tin plated chromium steel sheet, 2 mm: 0.000662591 m2; source Angel Avadí 2015; triangular min 0.000662591, mostLikely 0.000662591, max 0.000662591, pedigree (2,3,3,5,1)
  Tinplate can
  Uncertainty: Data from 1 plant, assumptions for larger plants
- extrusion of plastic sheets and thermoforming, inline: 4.75454e-6 kg; source Angel Avadí 2015
  Plastic boxes
- extrusion, plastic film: 0.00474842 kg; source Angel Avadí 2015
  Plastic film
- scrap tin sheet: -0.0103364 kg; source Avadí, A. 2018
  Waste tinplate cans (sheet use times weight of each sheet)
  production volume 1.30713e9 kg
- polyethylene, high density, granulate: 1.13872e-5 kg; source Angel Avadí 2015; triangular min 1.13872e-5, mostLikely 1.13872e-5, max 1.13872e-5, pedigree (2,3,3,5,1)
  Plastic boxes
  Uncertainty: Data from 1 plant, assumptions for larger plants
- wastewater from vegetable oil refinery: -0.00195764 m3; source Avadí, A. 2018
  Proxy for wastewater from fish processing plant. Asumed 40% of the water is either incorporated into the product or lost
  production volume 3.32551e8 m3
- sodium chloride, powder: 0.0247132 kg; source Angel Avadí 2015; triangular min 0.0247132, mostLikely 0.0247132, max 0.0247132, pedigree (2,3,3,5,1)
  Salt for brine
  Uncertainty: Data from 1 plant, assumptions for larger plants
- electricity, medium voltage: 0.000120483 kWh; source Angel Avadí 2015; triangular min 0.000120483, mostLikely 0.000120483, max 0.000120483, pedigree (2,3,3,5,1)
  Electricity use for all production phases from reception/cold storage to final product
  Uncertainty: Data from 1 plant, assumptions for larger plants
- electricity, medium voltage: 5.97129e-5 kWh; source Angel Avadí 2015; triangular min 5.97129e-5, mostLikely 5.97129e-5, max 5.97129e-5, pedigree (2,3,3,5,1)
  (same comment as for electricity, medium voltage)
- electricity, medium voltage: 9.60795e-6 kWh; source Angel Avadí 2015; triangular min 9.60795e-6, mostLikely 9.60795e-6, max 9.60795e-6, pedigree (2,3,3,5,1)
  (same comment as for electricity, medium voltage)
- electricity, medium voltage: 0.000565344 kWh; source Angel Avadí 2015; triangular min 0.000565344, mostLikely 0.000565344, max 0.000565344, pedigree (2,3,3,5,1)
  (same comment as for electricity, medium voltage)
- electricity, medium voltage: 0.00020199 kWh; source Angel Avadí 2015; triangular min 0.00020199, mostLikely 0.00020199, max 0.00020199, pedigree (2,3,3,5,1)
  (same comment as for electricity, medium voltage)
- electricity, medium voltage: 7.61738e-6 kWh; source Angel Avadí 2015; triangular min 7.61738e-6, mostLikely 7.61738e-6, max 7.61738e-6, pedigree (2,3,3,5,1)
  (same comment as for electricity, medium voltage)
- electricity, medium voltage: 6.25304e-5 kWh; source Angel Avadí 2015; triangular min 6.25304e-5, mostLikely 6.25304e-5, max 6.25304e-5, pedigree (2,3,3,5,1)
  (same comment as for electricity, medium voltage)
- electricity, medium voltage: 9.54958e-6 kWh; source Angel Avadí 2015; triangular min 9.54958e-6, mostLikely 9.54958e-6, max 9.54958e-6, pedigree (2,3,3,5,1)
  (same comment as for electricity, medium voltage)
- electricity, medium voltage: 1.58369e-5 kWh; source Angel Avadí 2015; triangular min 1.58369e-5, mostLikely 1.58369e-5, max 1.58369e-5, pedigree (2,3,3,5,1)
  (same comment as for electricity, medium voltage)
- electricity, medium voltage: 3.1813e-7 kWh; source Angel Avadí 2015; triangular min 3.1813e-7, mostLikely 3.1813e-7, max 3.1813e-7, pedigree (2,3,3,5,1)
  (same comment as for electricity, medium voltage)
- electricity, medium voltage: 1.29131e-5 kWh; source Angel Avadí 2015; triangular min 1.29131e-5, mostLikely 1.29131e-5, max 1.29131e-5, pedigree (2,3,3,5,1)
  (same comment as for electricity, medium voltage)
- electricity, medium voltage: 9.0622e-6 kWh; source Angel Avadí 2015; triangular min 9.0622e-6, mostLikely 9.0622e-6, max 9.0622e-6, pedigree (2,3,3,5,1)
  (same comment as for electricity, medium voltage)
- electricity, medium voltage: 6.14776e-6 kWh; source Angel Avadí 2015; triangular min 6.14776e-6, mostLikely 6.14776e-6, max 6.14776e-6, pedigree (2,3,3,5,1)
  (same comment as for electricity, medium voltage)
- electricity, medium voltage: 5.53473e-7 kWh; source Angel Avadí 2015; triangular min 5.53473e-7, mostLikely 5.53473e-7, max 5.53473e-7, pedigree (2,3,3,5,1)
  (same comment as for electricity, medium voltage)
- electricity, medium voltage: 1.86627e-6 kWh; source Angel Avadí 2015; triangular min 1.86627e-6, mostLikely 1.86627e-6, max 1.86627e-6, pedigree (2,3,3,5,1)
  (same comment as for electricity, medium voltage)
- electricity, medium voltage: 0.000227777 kWh; source Angel Avadí 2015; triangular min 0.000227777, mostLikely 0.000227777, max 0.000227777, pedigree (2,3,3,5,1)
  (same comment as for electricity, medium voltage)
- electricity, medium voltage: 3.34227e-6 kWh; source Angel Avadí 2015; triangular min 3.34227e-6, mostLikely 3.34227e-6, max 3.34227e-6, pedigree (2,3,3,5,1)
  (same comment as for electricity, medium voltage)
- electricity, medium voltage: 3.67537e-5 kWh; source Angel Avadí 2015; triangular min 3.67537e-5, mostLikely 3.67537e-5, max 3.67537e-5, pedigree (2,3,3,5,1)
  (same comment as for electricity, medium voltage)
- electricity, medium voltage: 8.85038e-6 kWh; source Angel Avadí 2015; triangular min 8.85038e-6, mostLikely 8.85038e-6, max 8.85038e-6, pedigree (2,3,3,5,1)
  (same comment as for electricity, medium voltage)
- electricity, medium voltage: 1.21441e-5 kWh; source Angel Avadí 2015; triangular min 1.21441e-5, mostLikely 1.21441e-5, max 1.21441e-5, pedigree (2,3,3,5,1)
  (same comment as for electricity, medium voltage)
- electricity, medium voltage: 0.000848382 kWh; source Angel Avadí 2015; triangular min 0.000848382, mostLikely 0.000848382, max 0.000848382, pedigree (2,3,3,5,1)
  (same comment as for electricity, medium voltage)
- electricity, medium voltage: 5.24764e-6 kWh; source Angel Avadí 2015; triangular min 5.24764e-6, mostLikely 5.24764e-6, max 5.24764e-6, pedigree (2,3,3,5,1)
  (same comment as for electricity, medium voltage)
- electricity, medium voltage: 9.26516e-6 kWh; source Angel Avadí 2015; triangular min 9.26516e-6, mostLikely 9.26516e-6, max 9.26516e-6, pedigree (2,3,3,5,1)
  (same comment as for electricity, medium voltage)
- electricity, medium voltage: 9.33931e-6 kWh; source Angel Avadí 2015; triangular min 9.33931e-6, mostLikely 9.33931e-6, max 9.33931e-6, pedigree (2,3,3,5,1)
  (same comment as for electricity, medium voltage)
- electricity, medium voltage: 8.44485e-5 kWh; source Angel Avadí 2015; triangular min 8.44485e-5, mostLikely 8.44485e-5, max 8.44485e-5, pedigree (2,3,3,5,1)
  (same comment as for electricity, medium voltage)
- electricity, medium voltage: 0.000623287 kWh; source Angel Avadí 2015; triangular min 0.000623287, mostLikely 0.000623287, max 0.000623287, pedigree (2,3,3,5,1)
  (same comment as for electricity, medium voltage)
- electricity, medium voltage: 0.00903701 kWh; source Angel Avadí 2015; triangular min 0.00903701, mostLikely 0.00903701, max 0.00903701, pedigree (2,3,3,5,1)
  (same comment as for electricity, medium voltage)
- electricity, medium voltage: 0.00293435 kWh; source Angel Avadí 2015; triangular min 0.00293435, mostLikely 0.00293435, max 0.00293435, pedigree (2,3,3,5,1)
  (same comment as for electricity, medium voltage)
- electricity, medium voltage: 0.0042376 kWh; source Angel Avadí 2015; triangular min 0.0042376, mostLikely 0.0042376, max 0.0042376, pedigree (2,3,3,5,1)
  (same comment as for electricity, medium voltage)
- water, completely softened: 1.35482 kg; source Angel Avadí 2015; triangular min 1.35482, mostLikely 1.35482, max 1.35482, pedigree (2,3,3,5,1)
  Soft water for process
  Uncertainty: Data from 1 plant, assumptions for larger plants
- water, completely softened: 1.88496 kg; source Angel Avadí 2015; triangular min 1.88496, mostLikely 1.88496, max 1.88496, pedigree (2,3,3,5,1)
  Soft water for process
  Uncertainty: Data from 1 plant, assumptions for larger plants
- waste polyethylene, for recycling, unsorted: -1.1404e-5, -0.00378928, -0.00114865 kg (3 suppliers, which the file names only by identifier); sum of these -0.00494933 kg; source Avadí, A. 2018
  Waste PET from crates and packaging
  production volume 3.629e7 kg
- heat, district or industrial, other than natural gas: 0.000748236 MJ; source Angel Avadí 2015; triangular min 0.000748236, mostLikely 0.000748236, max 0.000748236, pedigree (2,3,3,5,1)
  Industrial heat for cooking/sterilisation
  Uncertainty: Data from 1 plant, assumptions for larger plants
- heat, district or industrial, other than natural gas: 0.0448478 MJ; source Angel Avadí 2015; triangular min 0.0448478, mostLikely 0.0448478, max 0.0448478, pedigree (2,3,3,5,1)
  (same comment as for heat, district or industrial, other than natural gas)
- polyethylene terephthalate, granulate, amorphous: 0.000196146 kg; source Angel Avadí 2014; triangular min 0.000196146, mostLikely 0.000196146, max 0.000196146, pedigree (2,3,3,5,1)
  Plastic barrels
  Uncertainty: Data from 1 plant, assumptions for larger plants
- sheet rolling, aluminium: 0.000551337 kg; source Angel Avadí 2014
  Aluminium cans
- aluminium, cast alloy: 0.000551337 kg; source Angel Avadí 2014; triangular min 0.000551337, mostLikely 0.000551337, max 0.000551337, pedigree (2,3,3,5,1)
  Aluminium cans
  Uncertainty: Data from 1 plant, assumptions for larger plants
- thermoforming of plastic sheets: 0.000196146 kg; source Angel Avadí 2014
  Plastic barrels
- packaging film, low density polyethylene: 2.99159e-5 kg; source Angel Avadí 2014; triangular min 2.99159e-5, mostLikely 2.99159e-5, max 2.99159e-5, pedigree (2,3,3,5,1)
  Plastic bags
  Uncertainty: Data from 1 plant, assumptions for larger plants
- nitrogen, liquid: 1.93452e-6 kg; source Angel Avadí 2014; triangular min 1.93452e-6, mostLikely 1.93452e-6, max 1.93452e-6, pedigree (2,3,3,5,1)
  Nitrogen for process
  Uncertainty: Data from 1 plant, assumptions for larger plants
- waste packaging glass, unsorted: -0.00145089 kg; source Avadí, A. 2018
  Waste packaging glass
  production volume 4.48743e7 kg
- packaging glass, white: 0.00145089 kg; source Angel Avadí 2014; triangular min 0.00145089, mostLikely 0.00145089, max 0.00145089, pedigree (2,3,3,5,1)
  Glass containers
  Uncertainty: Data from 1 plant, assumptions for larger plants
- fish curing plant: 3.76996e-10 unit; source Angel Avadí 2014
  (same comment as for fish canning plant)
- scrap aluminium: -2.47082e-5, -0.000526629 kg (2 suppliers, which the file names only by identifier); sum of these -0.000551337 kg; source Avadí, A. 2018
  Waste aluminium cans
  production volume 1.70522e7 kg
- electricity, medium voltage: 1.42473e-5 kWh; source Angel Avadí 2014; triangular min 1.42473e-5, mostLikely 1.42473e-5, max 1.42473e-5, pedigree (2,3,3,5,1)
  Electricity use along the whole process, including processing, maturing and cold storage
  Uncertainty: Data from 1 plant, assumptions for larger plants
- heat, district or industrial, natural gas: 0.000312301 MJ; source Angel Avadí 2014; triangular min 0.000312301, mostLikely 0.000312301, max 0.000312301, pedigree (2,3,3,5,1)
  Industrial heat, for sterilisation
  Uncertainty: Data from 1 plant, assumptions for larger plants
- heat, district or industrial, natural gas: 0.00712176 MJ; source Angel Avadí 2014; triangular min 0.00712176, mostLikely 0.00712176, max 0.00712176, pedigree (2,3,3,5,1)
  (same comment as for heat, district or industrial, natural gas)
- fish freezing plant: 9.7399e-11 unit; source Angel Avadí 2014
  (same comment as for fish canning plant)

## Emissions to nature
- BOD5, Biological Oxygen Demand [water, unspecified]: 1.23618e-6 kg; source Angel Avadí 2015; triangular min 1.23618e-6, mostLikely 1.23618e-6, max 1.23618e-6, pedigree (2,3,3,5,1)
  Emissions to water from process waters
  Uncertainty: Data from 1 plant, assumptions for larger plants
- TOC, Total Organic Carbon [water, unspecified]: 1.96521e-6 kg; source Angel Avadí 2015; triangular min 1.96521e-6, mostLikely 1.96521e-6, max 1.96521e-6, pedigree (2,3,3,5,1)
  (same comment as for BOD5, Biological Oxygen Demand)
- COD, Chemical Oxygen Demand [water, unspecified]: 7.70235e-6 kg; source Angel Avadí 2015; triangular min 7.70235e-6, mostLikely 7.70235e-6, max 7.70235e-6, pedigree (2,3,3,5,1)
  (same comment as for BOD5, Biological Oxygen Demand)
- DOC, Dissolved Organic Carbon [water, unspecified]: 1.96521e-6 kg; source Angel Avadí 2015
  Emissions to water from process waters
- Nitrogen [water, unspecified]: 0.000112122 kg; source Angel Avadí 2014; triangular min 0.000112122, mostLikely 0.000112122, max 0.000112122, pedigree (2,3,3,5,1)
  (same comment as for BOD5, Biological Oxygen Demand)
- Phosphorus [water, unspecified]: 2.4038e-5 kg; source Angel Avadí 2014; triangular min 2.4038e-5, mostLikely 2.4038e-5, max 2.4038e-5, pedigree (2,3,3,5,1)
  (same comment as for BOD5, Biological Oxygen Demand)
- Oils, non-fossil [water, ocean]: 2.61481e-5 kg; source Angel Avadí 2014; triangular min 2.61481e-5, mostLikely 2.61481e-5, max 2.61481e-5, pedigree (2,3,3,5,1)
  (same comment as for BOD5, Biological Oxygen Demand)

## Sampling procedure
Uncertainty estimation according to the pedigree matrix

## Review by Ivan Muñoz Ortiz 2017-08-10
An offline review in excel has been carried out for all the PE recycling activities, checking mass balances, data sources, etc. Several comments were made to the data provider and improvements have been made to the datasets.
