# blower and heat exchange unit production, Storkair G 90

Dataset: EcoSpold 2, unit process
Geography: RoW
Time period: 2003-01-01 to 2019-12-31
Technology level: current
Classification: ISIC rev.4 ecoinvent: 2819:Manufacture of other general-purpose machinery
Classification: EcoSpold01Categories: ventilation/production of components
Tags: ConvertedDataset
Scenario: Business-as-Usual
System model: Allocation at the point of substitution
Generated by: Alex Primas
Published in: Hässig, W. 2007
Database: ecoinvent
isCopyrightProtected: true
accessRestrictedTo: 1

## General comment
Production of a typical component used for a decentral ventilation system in a multi family house. The house considered in the investigation includes 6 flats with 130 m2 floor area each and a ventilation rate of 120 m3/h.
[This dataset was already contained in the ecoinvent database version 2. It was not individually updated during the transfer to ecoinvent version 3. Life Cycle Impact Assessment results may still have changed, as they are affected by changes in the supply chain, i.e. in other datasets. This dataset was generated following the ecoinvent quality guidelines for version 2. It may have been subject to central changes described in the ecoinvent version 3 change report (http://www.ecoinvent.org/database/ecoinvent-version-3/reports-of-changes/), and the results of the central updates were reviewed extensively. The changes added e.g. consistent water flows and other information throughout the database. The documentation of this dataset can be found in the ecoinvent reports of version 2, which are still available via the ecoinvent website. The change report linked above covers all central changes that were made during the conversion process.]

## Included activities end
Materials used for the production. Estimation of electricity use for the different production steps. Energy use for heating of the production building. Transport of raw materials to the plant. Estimation for the Infrastructure of the Production site included.

## Geography
Data for production in the Netherlands used.

## Technology
Ventilation unit for decentral ventilation systems with 120 m3/h average air flow. Housing made of galvanised steel insulated with expanded polystyrene. Heat recovery element made of polystyrene. Total weight of component 32.7 kg

## Time period
Materials investigated in 2003

## Reference product
- blower and heat exchange unit, Storkair G 90: 1 unit; CPC 43911: Producer gas or water gas generators; acetylene gas generators and similar water process gas generators; disti[…]; By-product classification allocatable product
  EcoSpold01Location=RER
  production volume 2.67763 unit
    This is a placeholder value that does not reflect real-world production volumes. This dataset does not currently require a real-world production volume to work in the database framework, and no actual data were collected yet. This has no negative effect on the results of the ecoinvent database.
  property price 64.3028 EUR2005
    Calculated based on inputs: The price of the product has been calculated as a sum of the values of the material and energy inputs for this product. This value is therefore a rough estimation. It may underestimate the real price since there are additional expenses when producing any product. These expences can include for example labour costs, treatment of waste materials and profit for the producer. Please consider carefully whether this level of data quality is acceptable for your application.
  property carbon content, fossil 0.265805
    C content was calculated as an addition of C content in the product components
  property carbon content, non-fossil 1.31112e-6
    C content was calculated as an addition of C content in the product components
  property carbon content 0.265806
    carbon content on a dry matter basis (reserved; not for manual entry)
  property true value 64.3028
    allocation property applied in "true value" allocation // value calculated from revenue
  properties: water content 0, water in wet mass 0 kg, wet mass 32.7 kg, dry mass 32.7 kg, carbon allocation 8.69186 kg

## By-products
- electricity, for reuse in municipal waste incineration only: 0 kWh; CPC 17100: Electrical energy; By-product classification allocatable product; pedigree (1,1,1,1,1)
  Net electricity generated from this waste and used in internal MSWI plant energy redistribution.
  Uncertainty: uncertainty is calculated from uncertainties in waste composition and uncertainties in energy efficiency and the uncertainty in internal energy demand
  production volume 1.19454 kWh
  property exergy 3.6 MJ; name E_el_prod_MSWI_exergy
    This exergy property is based on the exergy content of the product.
  property true value relation 3.6; name E_el_prod_MSWI_true_value_relation
    property to calculate "true value" from
  property price 0.1 EUR2005; name E_el_prod_MSWI_price_EUR2005
    Estimated to be the same price as in case of electricity, medium voltage.
  property true value 0.048671
    allocation property applied in "true value" allocation // value calculated from true value relation
- heat, for reuse in municipal waste incineration only: 0 MJ; CPC 17300: Steam and hot water; By-product classification allocatable product; pedigree (1,1,1,1,1)
  (same comment as for electricity, for reuse in municipal waste incineration only)
  production volume 8.32178 MJ
  property exergy 0.1842 MJ; name E_th_prod_MSWI_exergy
    This exergy property is based on the exergy content of the product.
  property true value relation 0.1842; name E_th_prod_MSWI_true_value_relation
    property to calculate "true value" from
  property price 0.0106 EUR2005; name E_th_prod_MSWI_price_EUR2005
    Average European district heat price from Ecoheatcool and Euroheat 2005-2006, Ecoheat Work package 1: The European heat market. Final report. 10.6 EUR/GJ i s the price of district heat. http://www.solarthermalworld.org/files/Ecoheatcool%20WP1%20Web.pdf?download
  property true value 0.0173518
    (same comment as for electricity, for reuse in municipal waste incineration only)

## Inputs from technosphere
- heat, district or industrial, other than natural gas: 0 MJ; pedigree (1,1,1,1,1)
  EcoSpold01Location=RER
  Data estimated from related companies
  Uncertainty: Data estimated from related companies
- aluminium, wrought alloy: 0.879097 kg; lognormal variance with pedigree 0.0546, pedigree (2,4,5,5,1)
  EcoSpold01Location=RER
  Questionnaire
  Uncertainty: Questionnaire
  properties: dry mass 1 kg, wet mass 1 kg
- waste expanded polystyrene: -0.259733 kg; lognormal variance with pedigree 0.072, pedigree (4,4,5,5,1)
  Estimations on precentage material disposed
  EcoSpold01Location=CH
  Uncertainty: Estimations on precentage material disposed
  production volume 0.78 kg
    Calculated from the production volume of blower and heat exchange unit, Storkair G 90 in proportion to the respective output amounts.
  properties: dry mass 0.95 kg, water content 0.0526316, carbon content, fossil 0.864875, wet mass 1 kg
  note on carbon content, fossil: Average of different polystyrene extruded. Shares are 50% (w/w) extruded using CO2/acetone as blowing agent, 25% (w/w) using HFC-134a as a blowing agent and 25% (w/w) using HFC-152a as a blowing agent (ecoinvent v2.2 report 16, part XIV, Tab 4.21). Similar result is reported in Tab A.5, ecoinvent report 13_I.
- copper: 0.714267 kg; lognormal variance with pedigree 0.056, pedigree (3,4,5,5,1)
  EcoSpold01Location=RER
  Questionnaire, estimations
  Uncertainty: Questionnaire, estimations
  properties: dry mass 1 kg, wet mass 1 kg
- steel, chromium steel 18/8, hot rolled: 0.197797 kg; lognormal variance with pedigree 0.0546, pedigree (2,4,5,5,1)
  Questionnaire
  EcoSpold01Location=RER
  Uncertainty: Questionnaire
  properties: carbon content, fossil 0.0008, wet mass 1 kg, dry mass 1 kg
  note on carbon content, fossil: Stainless steel model is the grade 304 steel (18/8 stainless, 18% chromium 8% nickel; max. 0.08% C)
- polystyrene foam slab: 2.85707 kg; lognormal variance with pedigree 0.0546, pedigree (2,4,5,5,1)
  Questionnaire
  EcoSpold01Location=RER
  Uncertainty: Questionnaire
  properties: carbon content, fossil 0.859091, wet mass 1 kg, dry mass 1 kg
  note on carbon content, fossil: XPS consists in 91% of polystyrene, 7% of blowing agent and the re-maining 2% are flame retardants (bromine compounds) and other additives (ecoinvent v2.2 report 7, part XIV, pg69). The chemical formula of polystyrene is (C8H8)n. Here, the blowing agent is CO2.
- electricity, medium voltage: 0 kWh; pedigree (1,1,1,1,1)
  Data estimated from related processes
  EcoSpold01Location=UCTE
  Uncertainty: Data estimated from related processes
- wire drawing, copper: 0.714267 kg; lognormal variance with pedigree 0.056, pedigree (3,4,5,5,1)
  Questionnaire, estimations
  EcoSpold01Location=RER
  Uncertainty: Questionnaire, estimations
- sheet rolling, chromium steel: 0.197797 kg; lognormal variance with pedigree 0.056, pedigree (3,4,5,5,1)
  EcoSpold01Location=RER
  Questionnaire, estimations
  Uncertainty: Questionnaire, estimations
- heat, district or industrial, natural gas: 0 MJ; pedigree (1,1,1,1,1)
  (same comment as for heat, district or industrial, other than natural gas)
- polystyrene, high impact: 7.25255 kg; lognormal variance with pedigree 0.0546, pedigree (2,4,5,5,1)
  Questionnaire
  EcoSpold01Location=RER
  Uncertainty: Questionnaire
  properties: carbon content, fossil 0.923077, dry mass 1 kg, wet mass 1 kg
  note on carbon content, fossil: Chemical formula of polystyrene is (C8H8)n (ecoinvent v2.2 report 11_II)
- electronics, for control units: 0.349641 kg; lognormal variance with pedigree 0.074, pedigree (3,4,5,5,3)
  Questionnaire, approximation for technology
  EcoSpold01Location=RER
  Uncertainty: Questionnaire, approximation for technology
  properties: carbon content, non-fossil 0.00013442, wet mass 1 kg, carbon content, fossil 0.337146, dry mass 1 kg
  note on carbon content, non-fossil: The control unit has a composition of 46% steel (housing), 32% plastics, 14% printed wiring boards and 8% cables (various types).;
- ventilation components factory: 1.30866e-7 unit; lognormal variance with pedigree 0.396, pedigree (4,5,5,5,3)
  EcoSpold01Location=RER
  Calculated with data of a similar company
  Uncertainty: Calculated with data of a similar company
- injection moulding: 7.25255 kg; lognormal variance with pedigree 0.0546, pedigree (2,4,5,5,1)
  EcoSpold01Location=RER
  Questionnaire
  Uncertainty: Questionnaire
- zinc coat, coils: 1.69826 m2; lognormal variance with pedigree 0.056, pedigree (3,4,5,5,1)
  Questionnaire, estimations
  EcoSpold01Location=RER
  Uncertainty: Questionnaire, estimations
- waste polystyrene: 0 kg; pedigree (1,1,1,1,1)
  (same comment as for waste expanded polystyrene)
  production volume 0 kg
    (same comment as for waste expanded polystyrene)
  properties: dry mass 0.998 kg, water content 0.00200401, carbon content, fossil 0.922579, wet mass 1 kg
- sheet rolling, aluminium: 0.879097 kg; lognormal variance with pedigree 0.056, pedigree (3,4,5,5,1)
  EcoSpold01Location=RER
  Questionnaire, estimations
  Uncertainty: Questionnaire, estimations
- steel, low-alloyed: 8.21157 kg; lognormal variance with pedigree 0.0546, pedigree (2,4,5,5,1)
  EcoSpold01Location=RER
  Questionnaire
  Uncertainty: Questionnaire
  properties: dry mass 1 kg, carbon content, fossil 0.005, wet mass 1 kg
  note on carbon content, fossil: Low alloyed steel composition given in Tab. 3.2 ecoinvent v2.2 report 10_partII. Steel assumed to have a C content of 0.5%
- sheet rolling, steel: 23.5758 kg; lognormal variance with pedigree 0.056, pedigree (3,4,5,5,1)
  Questionnaire, estimations
  EcoSpold01Location=RER
  Uncertainty: Questionnaire, estimations
- steel, unalloyed: 15.3842 kg; lognormal variance with pedigree 0.0546, pedigree (2,4,5,5,1)
  EcoSpold01Location=RER
  Questionnaire
  Uncertainty: Questionnaire
  properties: carbon content, fossil 0.0025, wet mass 1 kg, dry mass 1 kg
  note on carbon content, fossil: Unalloyed steels or carbon steels are those in which the level of an individual element in no case reaches or exceeds the limiting concentration given in Tab. 3.1 ecoinvent v2.2 report 10_partII. Assumed to have a C content of 0.25%
- powder coat, steel: 1.49846 m2; lognormal variance with pedigree 0.056, pedigree (3,4,5,5,1)
  Questionnaire, estimations
  EcoSpold01Location=RER
  Uncertainty: Questionnaire, estimations
- heat, district or industrial, other than natural gas: 0.0291729, 65.074 MJ (2 entries); lognormal variance with pedigree 0.078, pedigree (4,5,5,5,1)
  (same comment as for heat, district or industrial, other than natural gas)
- electricity, medium voltage: 0.156928, 0.0285542, 0.484237, 7.02092, 1.00483, 3.29222 kWh (6 entries); lognormal variance with pedigree 0.11, pedigree (3,5,5,5,3)
  (same comment as for electricity, medium voltage)
- heat, district or industrial, natural gas: 1.13154, 63.9716 MJ (2 entries); lognormal variance with pedigree 0.078, pedigree (4,5,5,5,1)
  (same comment as for heat, district or industrial, other than natural gas)
- waste polystyrene: -0.081024, -0.00541371, -0.00040943, -0.00223606, -0.000903342, -0.00212335, -0.567213 kg (7 entries); lognormal variance with pedigree 0.072, pedigree (4,4,5,5,1)
  (same comment as for waste expanded polystyrene)
  production volume 1.98 kg

## Sampling procedure
Questionnaire and technical information of producer. Data of one common product used.

## Extrapolations
none This dataset has been copied from an original dataset covering the geography RER. The uncertainty has been adjusted accordingly.

## Review by Rolf Frischknecht 2007-08-16
passed
none
