# treatment of sludge, pig iron production, residual material landfill

Dataset: EcoSpold 2, unit process
Geography: RoW
Time period: 1994-01-01 to 2019-12-31
Technology level: current
Classification: ISIC rev.4 ecoinvent: 3822:Treatment and disposal of hazardous waste
Classification: EcoSpold01Categories: waste management/residual material landfill
Synonyms: flue gas treatment scrubber sludge from pig iron production
Tags: Treatment; ConvertedDataset
Scenario: Business-as-Usual
System model: Allocation at the point of substitution
Generated by: Gabor Doka
Published in: Doka G. 2009
Database: ecoinvent
isCopyrightProtected: true
accessRestrictedTo: 1

## General comment
Inventoried waste contains 100% sludge from pig iron production to landfill; .
waste composition (wet, in ppm): H2O 85850; O 118420; H n.a.; C 310000; S 24500; N n.a.; P 1178.4; B n.a.; Cl n.a.; Br n.a.; F n.a.; I n.a.; Ag n.a.; As n.a.; Ba n.a.; Cd n.a.; Co n.a.; Cr n.a.; Cu n.a.; Hg n.a.; Mn 1300; Mo n.a.; Ni n.a.; Pb 14000; Sb n.a.; Se n.a.; Sn n.a.; V n.a.; Zn 50500; Be n.a.; Sc n.a.; Sr n.a.; Ti n.a.; Tl n.a.; W n.a.; Si 28047; Fe 210000; Ca 76830; Al 14290; K 1826.3; Mg 61812; Na 1446.6;
Share of carbon in waste that is biogenic 0%.
Additional solidification with 0.4 kg of cement.
[This dataset was already contained in the ecoinvent database version 2. It was not individually updated during the transfer to ecoinvent version 3. Life Cycle Impact Assessment results may still have changed, as they are affected by changes in the supply chain, i.e. in other datasets. This dataset was generated following the ecoinvent quality guidelines for version 2. It may have been subject to central changes described in the ecoinvent version 3 change report (http://www.ecoinvent.org/database/ecoinvent-version-3/reports-of-changes/), and the results of the central updates were reviewed extensively. The changes added e.g. consistent water flows and other information throughout the database. The documentation of this dataset can be found in the ecoinvent reports of version 2, which are still available via the ecoinvent website. The change report linked above covers all central changes that were made during the conversion process.]

## Included activities end
Waste-specific short-term emissions to water from leachate. Long-term emissions from landfill to ground water. Expenditures for solidificalion with cement (user-specified option)

## Geography
Technology encountered in Switzerland in 2000. Landfill includes base seal and leachate collection system.

## Technology
Swiss residual material landfill for polluted, inorganic waste. With base seal and leachate collection system. Recultivation after closure.

## Time period
Waste composition as given in literature reference, theoretical data or other source. Transfer coefficients from prospective model.

## Reference product
- sludge, pig iron production: -1 kg; name SLU; CPC 39310: Slag, dross, scalings and other waste from the manufacture of iron or steel; By-product classification Waste
  EcoSpold01Location=CH
  production volume 2.81619e9 kg; name SLU_PV
    It was assumed that the amount of sludge that needs to be treated is equal to the amount of produced sludge due to pig iron production.
  property price 0 EUR2005; name SLU_price_EUR2005
    Waste products are assigned a price of zero as they are assumed to require further treatment.
  property carbon content 0.339168
    carbon content on a dry matter basis (reserved; not for manual entry)
  properties: wet mass 1 kg, carbon content, fossil 0.339168, water in wet mass 0.086 kg, carbon content, non-fossil 0, dry mass 0.914 kg, water content 0.0940919, carbon allocation 0.31 kg

## Inputs from technosphere
- cement, unspecified: 0 kg; pedigree (1,1,1,1,1)
  Cement for solidification of residual material waste. Uncertainty in mass from solidification recipe.
  EcoSpold01Location=CH
  properties: dry mass 1 kg, wet mass 1 kg
- waste cement, hydrated: -1 kg; name WS_BP; lognormal variance with pedigree 0.052, pedigree (1,1,5,5,1)
  EcoSpold01Location=CH
  Hydrated cement for solidification of residual material waste. Uncertainty in mass from solidification recipe.
  production volume 2.81619e9 kg; name WS_BP_PV; = (WS_BP * SLU_PV)/ABS(SLU)
    Calculated from the production volume of sludge, pig iron production, 8.6% water in proportion to the respective output amounts.
  property price 0 EUR2005; name WS_BP_price_EUR2005
  properties: wet mass 1 kg, dry mass 1 kg
- process-specific burdens, residual material landfill: 1 kg; lognormal variance with pedigree 0.042, pedigree (1,1,5,5,1)
  demands per kilogram waste. uncertainty is heeded in the module
  EcoSpold01Location=CH
- residual material landfill: 2.0833e-9 unit; lognormal variance with pedigree 0.042, pedigree (1,1,5,5,1)
  EcoSpold01Location=CH
  demands per kilogram waste. uncertainty is heeded in the module
- cement, unspecified: 0.014046, 0.00102877, 0.00293233, 0.0663157, 0.00195186, 0.0214372, 0.00259367, 0.289695 kg (8 entries); lognormal variance with pedigree 0.052, pedigree (1,1,5,5,1)
  (same comment as for cement, unspecified)

## Emissions to nature
- Iron, ion [water, surface water]: 1.7571e-6 kg; lognormal variance with pedigree 1.382, pedigree (1,1,5,5,1)
  uncertainty is calculated from uncertainties in waste composition and transfer coefficients in residual landfill
- BOD5, Biological Oxygen Demand [water, ground-, long-term]: 0.1656 kg; lognormal variance with pedigree 0.122, pedigree (1,1,5,5,1)
  uncertainty is calculated from uncertainties in waste composition and transfer coefficients in incinerator and landfills.
- DOC, Dissolved Organic Carbon [water, ground-, long-term]: 0.20034 kg; lognormal variance with pedigree 0.122, pedigree (1,1,5,5,1)
  (same comment as for BOD5, Biological Oxygen Demand)
- Potassium, ion [water, ground-, long-term]: 0.0013115 kg; lognormal variance with pedigree 0.622, pedigree (1,1,5,5,1)
  (same comment as for BOD5, Biological Oxygen Demand)
- Zinc, ion [water, surface water]: 1.0333e-6 kg; lognormal variance with pedigree 1.392, pedigree (1,1,5,5,1)
  (same comment as for Iron, ion)
- Phosphate [water, ground-, long-term]: 0.00080719 kg; lognormal variance with pedigree 1.242, pedigree (1,1,5,5,1)
  (same comment as for BOD5, Biological Oxygen Demand)
- COD, Chemical Oxygen Demand [water, surface water]: 0.00084522 kg; lognormal variance with pedigree 0.722, pedigree (1,1,5,5,1)
  (same comment as for Iron, ion)
- Phosphate [water, surface water]: 1.3476e-6 kg; lognormal variance with pedigree 1.462, pedigree (1,1,5,5,1)
  (same comment as for Iron, ion)
- Lead [water, ground-, long-term]: 7.262e-5 kg; lognormal variance with pedigree 7.292, pedigree (1,1,5,5,1)
  (same comment as for BOD5, Biological Oxygen Demand)
- Manganese [water, surface water]: 1.7927e-8 kg; lognormal variance with pedigree 1.882, pedigree (1,1,5,5,1)
  (same comment as for Iron, ion)
- Manganese [water, ground-, long-term]: 1.0738e-5 kg; lognormal variance with pedigree 6.412, pedigree (1,1,5,5,1)
  (same comment as for BOD5, Biological Oxygen Demand)
- Silicon [water, surface water]: 6.3076e-5 kg; lognormal variance with pedigree 0.842, pedigree (1,1,5,5,1)
  (same comment as for Iron, ion)
- Magnesium [water, ground-, long-term]: 0.0070232 kg; lognormal variance with pedigree 1.392, pedigree (1,1,5,5,1)
  (same comment as for BOD5, Biological Oxygen Demand)
- Calcium, ion [water, ground-, long-term]: 0.0069422 kg; lognormal variance with pedigree 1.632, pedigree (1,1,5,5,1)
  (same comment as for BOD5, Biological Oxygen Demand)
- Sodium, ion [water, surface water]: 0.00054289 kg; lognormal variance with pedigree 0.682, pedigree (1,1,5,5,1)
  (same comment as for Iron, ion)
- Calcium, ion [water, surface water]: 1.159e-5 kg; lognormal variance with pedigree 1.092, pedigree (1,1,5,5,1)
  (same comment as for Iron, ion)
- Aluminium [water, ground-, long-term]: 0.004242 kg; lognormal variance with pedigree 0.732, pedigree (1,1,5,5,1)
  (same comment as for BOD5, Biological Oxygen Demand)
- TOC, Total Organic Carbon [water, ground-, long-term]: 0.20034 kg; lognormal variance with pedigree 0.122, pedigree (1,1,5,5,1)
  (same comment as for BOD5, Biological Oxygen Demand)
- Magnesium [water, surface water]: 1.1725e-5 kg; lognormal variance with pedigree 1.082, pedigree (1,1,5,5,1)
  (same comment as for Iron, ion)
- TOC, Total Organic Carbon [water, surface water]: 0.00033445 kg; lognormal variance with pedigree 0.722, pedigree (1,1,5,5,1)
  (same comment as for Iron, ion)
- DOC, Dissolved Organic Carbon [water, surface water]: 0.00033445 kg; lognormal variance with pedigree 0.722, pedigree (1,1,5,5,1)
  (same comment as for Iron, ion)
- Sulfate [water, ground-, long-term]: 0.065614 kg; lognormal variance with pedigree 0.312, pedigree (1,1,5,5,1)
  (same comment as for BOD5, Biological Oxygen Demand)
- Zinc, ion [water, ground-, long-term]: 0.00061893 kg; lognormal variance with pedigree 5.072, pedigree (1,1,5,5,1)
  (same comment as for BOD5, Biological Oxygen Demand)
- Lead [water, surface water]: 1.2123e-7 kg; lognormal variance with pedigree 1.652, pedigree (1,1,5,5,1)
  (same comment as for Iron, ion)
- Aluminium [water, surface water]: 7.0819e-6 kg; lognormal variance with pedigree 1.112, pedigree (1,1,5,5,1)
  (same comment as for Iron, ion)
- Iron, ion [water, ground-, long-term]: 0.0010525 kg; lognormal variance with pedigree 7.112, pedigree (1,1,5,5,1)
  (same comment as for BOD5, Biological Oxygen Demand)
- Potassium, ion [water, surface water]: 0.00051481 kg; lognormal variance with pedigree 0.662, pedigree (1,1,5,5,1)
  (same comment as for Iron, ion)
- BOD5, Biological Oxygen Demand [water, surface water]: 0.00027647 kg; lognormal variance with pedigree 0.722, pedigree (1,1,5,5,1)
  (same comment as for Iron, ion)
- COD, Chemical Oxygen Demand [water, ground-, long-term]: 0.50629 kg; lognormal variance with pedigree 0.122, pedigree (1,1,5,5,1)
  (same comment as for BOD5, Biological Oxygen Demand)
- Sodium, ion [water, ground-, long-term]: 0.00090374 kg; lognormal variance with pedigree 0.662, pedigree (1,1,5,5,1)
  (same comment as for BOD5, Biological Oxygen Demand)
- Silicon [water, ground-, long-term]: 0.027984 kg; lognormal variance with pedigree 0.292, pedigree (1,1,5,5,1)
  (same comment as for BOD5, Biological Oxygen Demand)
- Sulfate [water, surface water]: 0.0078857 kg; lognormal variance with pedigree 0.422, pedigree (1,1,5,5,1)
  (same comment as for Iron, ion)

## Sampling procedure
Landfill model based on observed leachate concentrations in literature. Extrapolated to 60'000 years heeding chemical characteristics. Initial waste composition from various literature sources.

## Extrapolations
This dataset has been copied from an original dataset covering the geography CH. The uncertainty has been adjusted accordingly.

## Review by Tereza Levova 2015-03-27
Real production volume added for the ecoinvent v3.2. release.

## Review by Niels Jungbluth 2009-02-15
passed.
