# tap water production, underground water without treatment

Dataset: EcoSpold 2, unit process
Geography: CH
Time period: 2012-01-01 to 2019-12-31
Technology level: current
Classification: EcoSpold01Categories: water supply/production
Classification: ISIC rev.4 ecoinvent: 3600:Water collection, treatment and supply
Synonyms: potable water
Tags: single enterprise data
Scenario: Business-as-Usual
System model: Allocation at the point of substitution
Generated by: Tereza Levova
Database: ecoinvent
isCopyrightProtected: true
accessRestrictedTo: 1

## General comment
This dataset is created as a child of global dataset with edited production volume for this geography.

This dataset represents production of 1 kg of tap water under pressure at facility gate, ready for distribution in network. It represents average operation of tap water from underground water without further treatments. Water is pumped from aquifer and pressurized for distribution. Inventory was constructed from reported energy inputs and wastes from a single plant located in Québec assumed to represent 53% of total production of tap water from this technology.
[This dataset is meant to replace the following datasets:
- tap water production and supply, CH, 2000 - 2000]

## Included activities start
From the intake pumping of raw surface water into the water treatment plant.

## Included activities end
This dataset ends with the production of tap water, at facility gate, under pressure. It includes energy for intake pumping, lighting and heating of the building as well as the energy of the pump pressurizing water to the beginning of the network. Infrastructure for the facility is estimated. It excludes energy for pumping stations and water losses within the network which is included in the tap water market. Emissions to the environment occurring during the treatment and during the distribution were not considered as they are assumed negligible. Main substance in water that would be released in the environment are assumed to be considered in wastewater processes.

## Geography
Extrapolated from data from a single plant in Quebec (Canada).The uncertainty was adjusted accordingly.

## Time period
Time of publication.

## Reference product
- tap water: 1 kg; name tapwater; CPC 18000: Natural water; By-product classification allocatable product; CAS 7732-18-5
  production volume 3.8e11 kg; name PV_tapwater; = 1E12*0.4*0.95
    Calculated based on estimates and literature values.
    1E9 m3/year is the amount of tap water produced in Switzerland yearly (http://www.svgw.ch/fileadmin/resources/svgw/web/Shop-Boutique/download/09_W-Informationsmaterial/SVGW_Shop_TWI-12_d.pdf , accessed 20140527).
    40% is the share of tap water produced without any treatment
    28% is the share of tap water produced with multi-stage (conventional) treatment
    32% is the share of tap water produced with single-stage (direct filtration) treatment
  property price 0.000397 EUR2005
    Converted from EU price by using Purchasing Power Parities (0.8458 in 2003 and 0.8426 in 2004)
  property carbon content 0.0017899
    carbon content on a dry matter basis (reserved; not for manual entry)
  properties: dry mass 0.00034 kg, wet mass 1 kg, carbon content, fossil 0.0017899, carbon content, non-fossil 0, water in wet mass 0.99966 kg, water content 2940.18, carbon allocation 6.08566e-7 kg

## Inputs from technosphere
- pump station: 2.0568e-11 unit; lognormal variance with pedigree 0.0466, pedigree (5,4,3,5,1)
  Approximated process. Used to represent facility pumping both intake and at facility gate. Value taken directly from ecoinvent V2.2 tap water, at user module.
- diesel, burned in building machine: 1.49144e-5 MJ; = diesel_use*density_diesel*NHV; lognormal variance with pedigree 0.002, pedigree (1,1,3,1,1)
  Calculated value.
  Uncertainty: Calculated variable. Uncertainty will be determined from propagation of uncertainty factors of underlying variables.
  property fuel input in physical units, L 4.11e-7 l; name diesel_use
  property density 0.84 kg/l; name density_diesel
  property heating value, net 43.2 MJ; name NHV
  note on fuel input in physical units, L: Measured value. Average of diesel volume consumed in a year for emergency generators (both for emergency and routine maintenance runs).
  note on heating value, net: Literature. net (lower) heating (calorific) value for diesel in MJ/kg
- electricity, medium voltage: 0.000399 kWh; lognormal variance with pedigree 0.0052, pedigree (2,4,3,1,1)
  Measured value. Represents electricity consumption for the entire treatment process including pumping for water intake and pumping for distribution at the plant gate.
  EcoSpold01Location=UCTE

## Inputs from nature
- Water, well, in ground [natural resource, in water]: 0.001 m3; name waterIn_1
  Measured value. Data provider reported that no loss occurs thoughout water treatment.

## Sampling procedure
Based on data collected from a single pumping for distribution of underground water production facility in Quebec (Canada). See corresponding Quebec dataset for more information. Note that percent representativeness is not supplied because technology-specific global production volumes is too uncertain. Should this information become available, the representativeness can be calculated by dividing the sum of the water treated by the Quebec plants that served as a basis for the Global dataset by the technology-specific global production volume. (4.35E9 kg/a)

## Extrapolations
This dataset has been extrapolated from year 2012 to the year of the calculation (2019). The uncertainty has been adjusted accordingly.
