# sodium silicate production, hydrothermal liquor, product in 48% solution state

Dataset: EcoSpold 2, unit process
Geography: RER
Time period: 1995-01-01 to 2019-12-31
Technology level: current
Classification: EcoSpold01Categories: chemicals/inorganics
Classification: ISIC rev.4 ecoinvent: 2011:Manufacture of basic chemicals
Tags: ConvertedDataset
Scenario: Business-as-Usual
System model: Allocation at the point of substitution
Generated by: Roland Hischier
Published in: Zah R. 2007
Database: ecoinvent
isCopyrightProtected: true
accessRestrictedTo: 1

## General comment
This dataset represents the production of 1 kg of sodium silicate solution (48%) from hydrothermal process.
Material and energy inputs as well as waste production and emission to air and water are based on literature sources. Transport and infrastructure are estimation based on a large chemical plant.
[This dataset was already contained in the ecoinvent database version 2. It was not individually updated during the transfer to ecoinvent version 3. Life Cycle Impact Assessment results may still have changed, as they are affected by changes in the supply chain, i.e. in other datasets. This dataset was generated following the ecoinvent quality guidelines for version 2. It may have been subject to central changes described in the ecoinvent version 3 change report (http://www.ecoinvent.org/database/ecoinvent-version-3/reports-of-changes/), and the results of the central updates were reviewed extensively. The changes added e.g. consistent water flows and other information throughout the database. The documentation of this dataset can be found in the ecoinvent reports of version 2, which are still available via the ecoinvent website. The change report linked above covers all central changes that were made during the conversion process.]

## Included activities start
From reception of sodium hydroxide, silica sand, and general chemicals at the factory gate

## Included activities end
This activity ends with the production of 1 kg of sodium silicate solution (48%). The dataset includes material and energy input, production of waste and emissions for the production of sodium phosphate out of phosphoric acid, transport, infrastructure.

## Geography
average data from 6 Euroopean producers

## Technology
The hydrothermal process is one of the two main processes used to produce sodium silicate. The other one is the furnace process.
In the hydrothermal process, sand is dissolved in sodium hydroxide. This process is carried out under high temperature and pressure in an autoclave. After filtration sodium silicate is obtained in a 48% solution.
This represents an average technology in Europe.

## Time period
date of published literature

## Parameters
- fraction, process water, to air: 0.876556 dimensionless; name fraction_PW_to_air; lognormal variance with pedigree 0.092025, pedigree (4,4,3,2,4)
  Literature value (IPPC, 2007) (Vionnet, S., Quantis Water Database - Technical Report, 2012).
- fraction, cooling water, cooling pond system, to air: 0.032; name fraction_CW_CP_to_air; lognormal variance with pedigree 0.0413, pedigree (2,3,1,3,1)
  Calculated based on literature value (Scown, C.D., 2011, Water Footprint of U.S. Transportation Fuels and supplying information of the article) (Vionnet, S., Quantis Water Database - Technical Report, 2012).
- fraction, cooling water, once-through system, to air: 0.004; name fraction_CW_OT_to_air; lognormal variance with pedigree 0.0413, pedigree (2,3,1,3,1)
  (same comment as for fraction, cooling water, cooling pond system, to air)
- fraction, cooling water, recirculating system, to air: 0.771; name fraction_CW_R_to_air; lognormal variance with pedigree 0.0413, pedigree (2,3,1,3,1)
  (same comment as for fraction, cooling water, cooling pond system, to air)
- fraction, cooling water, to air: 0.3875; name fraction_CW_to_air; = (0.5*fraction_CW_OT_to_air)+(0.5*fraction_CW_R_to_air); lognormal variance with pedigree 0.092025, pedigree (4,4,3,2,4)
  Calculated value based on literature value (see comments of the other parametres present in this dataset) and expert opinion. In the case when no industry/literature data are available about the type of cooling or directly fraction, cooling water, to air specific for the process a default assumption is applied. It is assumed that the once-through cooling system is used in 50% of all cases and recirculating system is used in another 50% of all cases.

## Reference product
- sodium silicate, without water, in 48% solution state: 1 kg; source Fawer M. 1997; By-product classification allocatable product; CPC 34270: Cyanides, cyanide oxides and complex cyanides; fulminates, cyanates and thiocyanates; silicates; borates; perb[…]; CAS 1344-09-8
  EcoSpold01Location=RER
  The solid portions of the surface of the Earth consist predominantly of silicon and oxygen atoms in the form of silica and silicates. The use of Earth’s silica and silicate resources is thus the oldest technology on the planet. Nowadays, the range of application of silica and silicates is mainly in the following three fields: detergents, chemicals, adhesives. As a detergent ingredient or wash alkali, sodium silicates raise the pH value and dirt and textile fibres become more strongly negatively charged increasing their mutual electrostatic repulsion. Apart from this, the hardness components of the water are eliminated by complex formation.
  production volume 1.32237 kg
    This is a placeholder value that does not reflect real-world production volumes. This dataset does not currently require a real-world production volume to work in the database framework, and no actual data were collected yet. This has no negative effect on the results of the ecoinvent database. The placeholder value of this activity was scaled according to the nominal GDP of 2005 (source: United Nations, http://data.un.org/Glossary.aspx?q=GDP+%28current+US%24%29, accessed 20130726) to reflect an appropriate share of the global production volume, which is also a placeholder value.
  property price 0.471 EUR2005
    From UN trade database. http://data.un.org/ Calculated as average price for all chemicals in the category 'Trade of goods , US$, HS 1992, 28 Inorganic chemicals, precious metal compound, isotope'. Import data from the largest economies of the world are used (Brazil, India, USA, China, Japan and EU-27).
  property carbon content 0
    carbon content on a dry matter basis (reserved; not for manual entry)
  property true value 0.471
    allocation property applied in "true value" allocation // value calculated from revenue
  properties: carbon content, non-fossil 0, water content 0, carbon content, fossil 0, water in wet mass 0 kg, dry mass 1 kg, wet mass 1 kg, carbon allocation 0 kg

## By-products
- electricity, for reuse in municipal waste incineration only: 0 kWh; CPC 17100: Electrical energy; By-product classification allocatable product; pedigree (1,1,1,1,1)
  Net electricity generated from this waste and used in internal MSWI plant energy redistribution.
  Uncertainty: uncertainty is calculated from uncertainties in waste composition and uncertainties in energy efficiency and the uncertainty in internal energy demand
  production volume 1.51493e-7 kWh
  property exergy 3.6 MJ; name E_el_prod_MSWI_exergy
    This exergy property is based on the exergy content of the product.
  property true value relation 3.6; name E_el_prod_MSWI_true_value_relation
    property to calculate "true value" from
  property price 0.1 EUR2005; name E_el_prod_MSWI_price_EUR2005
    Estimated to be the same price as in case of electricity, medium voltage.
  property true value 1.94641e-8
    allocation property applied in "true value" allocation // value calculated from true value relation
- heat, for reuse in municipal waste incineration only: 0 MJ; CPC 17300: Steam and hot water; By-product classification allocatable product; pedigree (1,1,1,1,1)
  Net useful heat generated from this waste and used in internal MSWI plant energy redistribution.
  Uncertainty: uncertainty is calculated from uncertainties in waste composition and uncertainties in energy efficiency and the uncertainty in internal energy demand
  production volume 1.07172e-6 MJ
  property true value relation 0.1842; name E_th_prod_MSWI_true_value_relation
    property to calculate "true value" from
  property exergy 0.1842 MJ; name E_th_prod_MSWI_exergy
    This exergy property is based on the exergy content of the product.
  property price 0.0106 EUR2005; name E_th_prod_MSWI_price_EUR2005
    Average European district heat price from Ecoheatcool and Euroheat 2005-2006, Ecoheat Work package 1: The European heat market. Final report. 10.6 EUR/GJ i s the price of district heat. http://www.solarthermalworld.org/files/Ecoheatcool%20WP1%20Web.pdf?download
  property true value 7.04548e-9
    (same comment as for electricity, for reuse in municipal waste incineration only)
- zinc concentrate: 0 kg; CPC 14290: Other non-ferrous metal ores and concentrates (other than uranium or thorium ores and concentrates); By-product classification allocatable product
  Calculated value from the knowledge of the properties of both products.
  production volume 3.80141e-11 kg
  property price 0.38 EUR2005; name ByP_price_EUR2005
    Temporary price data. Calculated as 90% of purchasers price based on: Zinc content in concentrate 53%. Concentrate price per kg Zn 86.5% of refined Zn price (13.5% treatment charges according to CHR Metals Limited 2005: Dynamic cost curves. http://www.minecost.com/dynamic.pdf). 2004 zinc price from USGS (2007) Mineral commodity summaries 2007. <http://minerals.usgs.gov/minerals/pubs/mcs/2007/mcs2007.pdf> [Accessed 25 May 2010]
  property zinc content 0.53; name zinc_C_zinc_concentrate
    Zinc content on a dry matter basis. Value taken from teh "zinc mine operation" /GLO dataset.
  property dry mass 1 kg; name DM_zinc_concentrate
  property carbon content 0
    carbon content on a dry matter basis (reserved; not for manual entry)
  property true value 1.44454e-11
    allocation property applied in "true value" allocation // value calculated from revenue
  properties: wet mass 1 kg, water content 0, carbon content, non-fossil 0, carbon content, fossil 0, water in wet mass 0 kg, carbon allocation 0 kg

## Inputs from technosphere
- chemical, organic: 0.00146 kg; source Fawer M. 1997; lognormal variance with pedigree 0.0407, pedigree (2,2,5,1,1)
  EcoSpold01Location=GLO
  Calculated value: calculation based on literature value. The data reported in the literature refer to a 48% solution of sodium silicate. All chemicals in the dataset use a functional unit referring to 100% of sodium silicate, thus the literature values has been multiplied with a factor of 2.08.
  Uncertainty: Average data from 6 European producers
  properties: carbon content, fossil 0.628, dry mass 1 kg, wet mass 1 kg
  note on carbon content, fossil: This dataset is an unweighted average of 20 organic substances (listed in Tab 88.1, ecoinvent v2.2 report 8, part II), being part of the top100 chemicals included in this database. The C-content has also been calculated as an unweighted average of the C content of the substances composing this dataset.
- residue from cooling tower: -0.0025 kg; source Fawer M. 1997; lognormal variance with pedigree 0.0407, pedigree (2,2,5,1,1)
  EcoSpold01Location=CH
  Calculated value: calculation based on literature value. The data reported in the literature refer to a 48% solution of sodium silicate. All chemicals in the dataset use a functional unit referring to 100% of sodium silicate, thus the literature values has been multiplied with a factor of 2.08.
  Uncertainty: Average data from 6 European producers
  production volume 0.0025 kg
    Calculated from the production volume of sodium silicate, without water, in 48% solution state in proportion to the respective output amounts.
  properties: water content 0.428571, carbon content, fossil 0.0544233, dry mass 0.7 kg, wet mass 1 kg
- steam, in chemical industry: 0.297 kg; source Fawer M. 1997; lognormal variance with pedigree 0.0407, pedigree (2,2,5,1,1)
  EcoSpold01Location=RER
  Calculated value: calculation based on literature value. The data reported in the literature refer to a 48% solution of sodium silicate. All chemicals in the dataset use a functional unit referring to 100% of sodium silicate, thus the literature values has been multiplied with a factor of 2.08.
  Uncertainty: Average data from 6 European producers
  properties: wet mass 1 kg
- sodium hydroxide, without water, in 50% solution state: 0.435 kg; source Fawer M. 1997; lognormal variance with pedigree 0.0407, pedigree (2,2,5,1,1)
  Calculated value: calculation based on literature value. The data reported in the literature refer to a 48% solution of sodium silicate. All chemicals in the dataset use a functional unit referring to 100% of sodium silicate, thus the literature values has been multiplied with a factor of 2.08.
  EcoSpold01Location=RER
  Uncertainty: Average data from 6 European producers
  properties: dry mass 1 kg, wet mass 1 kg
- silica sand: 0.676 kg; source Fawer M. 1997; lognormal variance with pedigree 0.0407, pedigree (2,2,5,1,1)
  EcoSpold01Location=DE
  Calculated value: calculation based on literature value. The data reported in the literature refer to a 48% solution of sodium silicate. All chemicals in the dataset use a functional unit referring to 100% of sodium silicate, thus the literature values has been multiplied with a factor of 2.08.
  Uncertainty: Average data from 6 European producers
  properties: water content 0.010101, dry mass 0.99 kg, wet mass 1 kg
- average incineration residue: -4.16e-5 kg; source Fawer M. 1997; lognormal variance with pedigree 0.0407, pedigree (2,2,5,1,1)
  Calculated value: calculation based on literature value. The data reported in the literature refer to a 48% solution of sodium silicate. All chemicals in the dataset use a functional unit referring to 100% of sodium silicate, thus the literature values has been multiplied with a factor of 2.08.
  EcoSpold01Location=CH
  Uncertainty: Average data from 6 European producers
  production volume 4.16e-5 kg
    (same comment as for residue from cooling tower)
  properties: wet mass 1 kg, carbon content, fossil 0.0325466, dry mass 1 kg, carbon content, non-fossil 0.0511208
  note on carbon content, fossil: Tab A.1, ecoinvent v2.2 report 13_I. It is considered that 61.1% of the C has a biogenic origin
- electricity, medium voltage: 0.0308 kWh; source Fawer M. 1997; lognormal variance with pedigree 0.0407, pedigree (2,2,5,1,1)
  EcoSpold01Location=UCTE
  Calculated value: calculation based on literature value. The data reported in the literature refer to a 48% solution of sodium silicate. All chemicals in the dataset use a functional unit referring to 100% of sodium silicate, thus the literature values has been multiplied with a factor of 2.08.
  Uncertainty: Average data from 6 European producers
- chemical factory, organics: 4e-10 unit; lognormal variance with pedigree 0.5861, pedigree (4,5,5,3,5)
  EcoSpold01Location=RER
  Estimation: estimation based on a large chemical plant.
  Uncertainty: estimation
- heat, district or industrial, natural gas: 0.732 MJ; source Fawer M. 1997; lognormal variance with pedigree 0.0407, pedigree (2,2,5,1,1)
  (same comment as for steam, in chemical industry)
- heat, district or industrial, other than natural gas: 0.06267 MJ; source Fawer M. 1997; lognormal variance with pedigree 0.0407, pedigree (2,2,5,1,1)
  (same comment as for steam, in chemical industry)
- inert waste, for final disposal: -0.0181 kg; source Fawer M. 1997; lognormal variance with pedigree 0.0407, pedigree (2,2,5,1,1)
  (same comment as for residue from cooling tower)
  production volume 0.0181 kg
    (same comment as for residue from cooling tower)
  properties: water content 0.00502513, wet mass 1 kg, dry mass 0.995 kg

## Inputs from nature
- Water, cooling, unspecified natural origin [natural resource, in water]: 1.29702e-5 m3; name water_cooling_UNO_input; source IPPC - Integrated Pollution Prevention a 2007; lognormal variance with pedigree 0.0507, pedigree (2,2,5,1,1)
  Calculated value: calculation based on literature value. The data reported in the literature refer to a 48% solution of sodium silicate. All chemicals in the dataset use a functional unit referring to 100% of sodium silicate, thus the literature values has been multiplied with a factor of 2.08.
  Calculated based on literature, (Vionnet, S., Quantis Water Database - Technical Report, 2012). The process boundaries are given by the boundaries of the plant. It includes the process of hydrothermal process (mixing and filtering).
  Uncertainty: Average data from 6 European producers
- Water, unspecified natural origin [natural resource, in water]: 0.00086703 m3; name water_UNO_input; source IPPC - Integrated Pollution Prevention a 2007; lognormal variance with pedigree 0.052625, pedigree (3,3,5,2,1)
  Calculated value: calculation based on literature value. The data reported in the literature refer to a 48% solution of sodium silicate. All chemicals in the dataset use a functional unit referring to 100% of sodium silicate, thus the literature values has been multiplied with a factor of 2.08.
  Calculated based on literature, (Vionnet, S., Quantis Water Database - Technical Report, 2012). It includes the process of hydrothermal process (mixing and filtering).
  Uncertainty: Average data from 6 European producers

## Emissions to nature
- TOC, Total Organic Carbon [water, surface water]: 4.85185e-6 kg; lognormal variance with pedigree 0.0807, pedigree (2,2,5,1,1)
  Calculated value: calculated by default as TOC (gC) = COD/2.7 (COD measured in g O2).
  Uncertainty: Average data from 6 European producers
- Phosphate [water, surface water]: 2.08e-8 kg; source Fawer M. 1997; lognormal variance with pedigree 0.0807, pedigree (2,2,5,1,1)
  Calculated value: calculation based on literature value. The data reported in the literature refer to a 48% solution of sodium silicate. All chemicals in the dataset use a functional unit referring to 100% of sodium silicate, thus the literature values has been multiplied with a factor of 2.08.
  Uncertainty: Average data from 6 European producers
- Water [air, unspecified]: 0.000765026 m3; name water_to_air_unspecified; = (water_cooling_UNO_input*fraction_CW_to_air)+(water_UNO_input*fraction_PW_to_air); lognormal variance with pedigree 0.0807, pedigree (2,2,5,1,1)
  Calculated value based on literature values and expert opinion. See comments in the parametres' comment field.
  property fraction, origin: salt water 0; name fraction_origin_salt_water
  property fraction, origin: unspecified 1; name fraction_origin_unspecified
  property fraction, origin: fresh water 0; name fraction_origin_fresh_water
- Water [water, unspecified]: 0.000114974 m3; name water_to_water_unspecified; = water_cooling_UNO_input*(1-fraction_CW_to_air)+water_UNO_input*(1-fraction_PW_to_air); lognormal variance with pedigree 0.0807, pedigree (2,2,5,1,1)
  (same comment as for Water)
  property fraction, origin: fresh water 0; name fraction_origin_fresh_water_Ww
  property fraction, origin: salt water 0; name fraction_origin_salt_water_Ww
  property fraction, origin: unspecified 1; name fraction_origin_unspecified_Ww
  property carbon content, non-fossil 0; name C_content_non_fossil
  property water in wet mass 1000 kg; name WWM
  property dry mass 0 kg; name DM
  property wet mass 1000 kg; name WM
  property carbon content, fossil 0; name C_content_fossil
- Chloride [water, surface water]: 9.78e-5 kg; source Fawer M. 1997; lognormal variance with pedigree 0.0807, pedigree (2,2,5,1,1)
  (same comment as for Phosphate)
- COD, Chemical Oxygen Demand [water, surface water]: 1.31e-5 kg; source Fawer M. 1997; lognormal variance with pedigree 0.0807, pedigree (2,2,5,1,1)
  (same comment as for Phosphate)
- Suspended solids, unspecified [water, surface water]: 0.00127 kg; source Fawer M. 1997; lognormal variance with pedigree 0.0807, pedigree (2,2,5,1,1)
  (same comment as for Phosphate)
- Nitrate [water, surface water]: 2.91e-7 kg; source Fawer M. 1997; lognormal variance with pedigree 0.0807, pedigree (2,2,5,1,1)
  (same comment as for Phosphate)
- Silicon [water, surface water]: 0.00341 kg; source Fawer M. 1997; lognormal variance with pedigree 0.0807, pedigree (2,2,5,1,1)
  (same comment as for Phosphate)
- BOD5, Biological Oxygen Demand [water, surface water]: 2.62e-5 kg; lognormal variance with pedigree 0.0807, pedigree (2,2,5,1,1)
  (same comment as for Phosphate)
- DOC, Dissolved Organic Carbon [water, surface water]: 4.85185e-6 kg; lognormal variance with pedigree 0.0807, pedigree (2,2,5,1,1)
  Calculated value: calculated by default as DOC (gC) = COD/2.7 (COD measured in g O2).
  Uncertainty: Average data from 6 European producers
- Iron, ion [water, surface water]: 8.32e-8 kg; source Fawer M. 1997; lognormal variance with pedigree 0.6907, pedigree (2,2,5,1,1)
  (same comment as for Phosphate)

## Review by Heiko Kunst 2003-06-20
Passed
Passed

## Review by Roland Hischier 2011-11-15
Transfer of documentation done.
