# transmission network construction, electricity, high voltage

Dataset: EcoSpold 2, unit process
Geography: CA-QC
Time period: 1983-01-01 to 2019-12-31
Technology level: current
Classification: EcoSpold01Categories: electricity/distribution
Classification: ISIC rev.4 ecoinvent: 4220a: Construction of utility projects for electricity production, except for liquid fuels
Scenario: Business-as-Usual
System model: Allocation at the point of substitution
Share of production covered: 100 %
Generated by: Pablo Tirado
Database: ecoinvent
isCopyrightProtected: true
accessRestrictedTo: 1

## General comment
This dataset represents the construction of the infrastructure (poles, cables, transforming substations etc.) of the electricity high voltage transmission network in Quebec. This dataset is based on study on the production, transport and distribution of electricity in Quebec in the 2008-2013 period but has been updated in 2015 with new data. It represents the total of all the infrastrucutres that belong to Hydro-Quebec, which is the only transporter and distributor of electricity in the region. The inventory is based on all the transport lines and substations of the company. In 2014, the network, that includes the high voltage, counts 34187km of lines and 530 transforming substations divided in four classes: two transforming from very high voltage (735 kV-315kV) and two transforming to medium voltage (315 kV- 25kV). Lifetime is assumed to be between 75 and 50 years depending on the infrastructure and the material (50 years for transforming substations and 75 yearsfor poles).
[This dataset was already contained in the ecoinvent database version 2. It was not individually updated during the transfer to ecoinvent version 3. Life Cycle Impact Assessment results may still have changed, as they are affected by changes in the supply chain, i.e. in other datasets. This dataset was generated following the ecoinvent quality guidelines for version 2. It may have been subject to central changes described in the ecoinvent version 3 change report (http://www.ecoinvent.org/database/ecoinvent-version-3/reports-of-changes/), and the results of the central updates were reviewed extensively. The changes added e.g. consistent water flows and other information throughout the database. The documentation of this dataset can be found in the ecoinvent reports of version 2, which are still available via the ecoinvent website. The change report linked above covers all central changes that were made during the conversion process.]

## Included activities start
From reception of materials and construction operations.

## Included activities end
The activity ends with the operation of the transmission network.
It includes:
-Land use associated to lines and substations ;
- main materials used for substation (building, transformers, breakers, etc.), poles and cable construction;
direct emissions to air (SF6) and to soil (leakage of treating substances from poles, pesticides used for vegetation control)
- waste treatment of materials
It doesn't include:
- minor activities, materials and wastes.
This dataset doesn't include
- electricity losses during transformation from high to medium voltage or medium to low, as these are included in the dataset for transformation
- SF6 emissions during production and deconstruction of the switchgear, as these are accounted for in the transmission network dataset.

## Geography
Data collected for Quebec

## Technology
The transmission network includes four types of substation depending on their transformation capacity and their technology level (current, modern).
Definition of the voltage levels (according to Hydro-Quebec):
- High voltage level above 35 kV (large scale industry)
- Medium voltage level nominal voltage between phases is 750 V- 34.5 kV (medium to small scale industry, service sector
- Low voltage level below 750 V (Households)

## Time period
Operation data were collected for the 2008-2013 period. New data on total length and number of transofrming substations have been collected in 2015

## Reference product
- transmission network, electricity, high voltage: 1 km; name amount_RP; CPC 53252: Local cables and related works; By-product classification allocatable product
  EcoSpold01Location=CH
  production volume 455.827 km; name apv_RP; = total_length_network/lifetime
    Calculated value. Total amount of kilometres divided by lifetime
  property lifetime 75 year; name lifetime
    LIterature value. Based on expert estimations from Hydro-Quebec
  property price 4.7697e6 EUR2005
    The production volume of this product is small compared to other products supplied by the activities within the same ISIC 3 category. Calculated from Aluminium consumption. According to activity '_80 Infrastructure, excluding buildings, EU27' in the EU & DK IO database (Simapro, (0.0000404 (Al, after first processing) + 0.000615 (Al basic, virgin)) kg Al per EURO.. Ecoinvent: 3150 kg Al per km (dataset 'transmission network construction, electricity, high voltage').
  property total length of network 34187 km; name total_length_network
    Collected value from Hydro-Québec, 2015
  property true value 4.7697e6; name amount_RP_true_value
    allocation property applied in "true value" allocation // value calculated from revenue

## By-products
- electricity, for reuse in municipal waste incineration only: 0 kWh; CPC 17100: Electrical energy; By-product classification allocatable product; pedigree (1,1,1,1,1)
  Net electricity generated from this waste and used in internal MSWI plant energy redistribution.
  Uncertainty: uncertainty is calculated from uncertainties in waste composition and uncertainties in energy efficiency and the uncertainty in internal energy demand
  production volume 36764.7 kWh
  property true value relation 3.6; name E_el_prod_MSWI_true_value_relation
    property to calculate "true value" from
  property exergy 3.6 MJ; name E_el_prod_MSWI_exergy
    This exergy property is based on the exergy content of the product.
  property price 0.1 EUR2005; name E_el_prod_MSWI_price_EUR2005
    Estimated to be the same price as in case of electricity, medium voltage.
  property true value 10.3434
    allocation property applied in "true value" allocation // value calculated from true value relation
- heat, for reuse in municipal waste incineration only: 0 MJ; CPC 17300: Steam and hot water; By-product classification allocatable product; pedigree (1,1,1,1,1)
  (same comment as for electricity, for reuse in municipal waste incineration only)
  production volume 257119 MJ
  property exergy 0.1842 MJ; name E_th_prod_MSWI_exergy
    This exergy property is based on the exergy content of the product.
  property true value relation 0.1842; name E_th_prod_MSWI_true_value_relation
    property to calculate "true value" from
  property price 0.0106 EUR2005; name E_th_prod_MSWI_price_EUR2005
    Average European district heat price from Ecoheatcool and Euroheat 2005-2006, Ecoheat Work package 1: The European heat market. Final report. 10.6 EUR/GJ i s the price of district heat. http://www.solarthermalworld.org/files/Ecoheatcool%20WP1%20Web.pdf?download
  property true value 3.70129
    (same comment as for electricity, for reuse in municipal waste incineration only)
- copper: 0 kg; source Rentz O. 1999; By-product classification allocatable product; CPC 41413: Refined copper and copper alloys, unwrought; master alloys of copper
  Literature value. Copper uses: Before end-use copper is manufactured into semi fabricated products, such as shapes and ingots (known as 'semis'). These manufacturing processes are subdivided into hot working, cold working and, if necessary, process annealing. Few of the semis are ready for use as such. They more typically travel to first-stage manufacturers, who make metal rods, wire, and casting, and then to component manufacturers who produce such things as motors, valves, and insulated cables The components in turn are incorporated by final-stage manufacturers into a variety of finished products - automobiles, commercial buildings, residential housing, and so forth. These uses account for about 79% of the world-wide consumption of copper.
  production volume 328142 kg
  properties: dry mass 1 kg, water in wet mass 0 kg, wet mass 1 kg, carbon content, non-fossil 0, water content 0, price 5.52 EUR2005, carbon content, fossil 0, carbon content 0, carbon allocation 0 kg, true value 3973.76
- zinc concentrate: 0 kg; CPC 14290: Other non-ferrous metal ores and concentrates (other than uranium or thorium ores and concentrates); By-product classification allocatable product
  Calculated value from the knowledge of the properties of both products.
  production volume 0.000260456 kg
  property price 0.38 EUR2005; name ByP_price_EUR2005
    Temporary price data. Calculated as 90% of purchasers price based on: Zinc content in concentrate 53%. Concentrate price per kg Zn 86.5% of refined Zn price (13.5% treatment charges according to CHR Metals Limited 2005: Dynamic cost curves. http://www.minecost.com/dynamic.pdf). 2004 zinc price from USGS (2007) Mineral commodity summaries 2007. <http://minerals.usgs.gov/minerals/pubs/mcs/2007/mcs2007.pdf> [Accessed 25 May 2010]
  property zinc content 0.53; name zinc_C_zinc_concentrate
    Zinc content on a dry matter basis. Value taken from teh "zinc mine operation" /GLO dataset.
  property dry mass 1 kg; name DM_zinc_concentrate
  property carbon content 0
    carbon content on a dry matter basis (reserved; not for manual entry)
  property true value 2.17129e-7
    allocation property applied in "true value" allocation // value calculated from revenue
  properties: wet mass 1 kg, water content 0, carbon content, non-fossil 0, carbon content, fossil 0, water in wet mass 0 kg, carbon allocation 0 kg
- iron scrap, unsorted: 0 kg; source European Aluminium Association 2008; CPC 39310: Slag, dross, scalings and other waste from the manufacture of iron or steel; By-product classification Recyclable; pedigree (1,1,1,1,1)
  production volume 1393.17 kg
  property price 0.149 EUR2005; name ironScrapAmount_price_EUR2005
    Temporary price data. Calculated as 90% of purchasers price based on: estimated at 85% of sorted scrap
  property carbon content 0
    carbon content on a dry matter basis (reserved; not for manual entry)
  property true value 0.455398
    allocation property applied in "true value" allocation // value calculated from revenue
  properties: water in wet mass 0 kg, water content 0, carbon content, fossil 0, carbon content, non-fossil 0, dry mass 1 kg, wet mass 1 kg, carbon allocation 0 kg
- aluminium oxide, non-metallurgical: 0 kg; source European Aluminium Association 2008; CPC 41432: Alumina (aluminium oxide), except artificial corundum; By-product classification allocatable product; CAS 1344-28-1; pedigree (1,1,1,1,1)
  production volume 87667 kg
  property carbon content, non-fossil 0; name C_content_non_fossil
  property price 0.28 EUR2005; name Al2O3Amount_price_EUR2005
    From UN trade database. http://data.un.org/ Import data from the largest economies of the world are used (Brazil, India, USA, China, Japan and EU-27).
  property dry mass 1 kg; name DM
  property water content 0; name water_content
  property wet mass 1 kg; name WM
  property water in wet mass 0 kg; name WWM
  property carbon content, fossil 0; name C_content_fossil
  property carbon content 0
    carbon content on a dry matter basis (reserved; not for manual entry)
  property true value 53.8511
    allocation property applied in "true value" allocation // value calculated from revenue
  properties: carbon allocation 0 kg
- aluminium, cast alloy: 0 kg; source European Aluminium Association 2008; By-product classification allocatable product; CPC 41431: Unwrought aluminium; pedigree (1,1,1,1,1)
  EcoSpold01Location=RER
  production volume 819492 kg
  property price 1.3 EUR2005; name castAlloyAmount_price_EUR2005
    Temporary price data. Calculated as 90% of purchasers price based on: Source: London Metal Exchange, Aluminium alloy price for 2005
  property carbon content 0
    carbon content on a dry matter basis (reserved; not for manual entry)
  property true value 2337.16
    allocation property applied in "true value" allocation // value calculated from revenue
  properties: water in wet mass 0 kg, carbon content, non-fossil 0, water content 0, dry mass 1 kg, carbon content, fossil 0, wet mass 1 kg, carbon allocation 0 kg
- aluminium, wrought alloy: 0 kg; source European Aluminium Association 2008; By-product classification allocatable product; CPC 4153: Semi-finished products of aluminium or aluminium alloys; pedigree (1,1,1,1,1)
  production volume 358758 kg
  property price 1.44 EUR2005; name secondaryAluminiumOutput_price_EUR2005
  properties: wet mass 1 kg, water content 0, carbon content, fossil 0, water in wet mass 0 kg, carbon content, non-fossil 0, dry mass 1 kg, carbon content 0, carbon allocation 0 kg, true value 1133.35

## Inputs from technosphere
All rows: lognormal variance with pedigree 0.002, pedigree (1,1,3,1,1)
- sulfur hexafluoride, liquid: 0.153326 kg; = sf6/(total_length_network)
  Calculated value. Total amount divided by the total number of kilometres in the network.
  Uncertainty: Calculated variable. Uncertainty will be determined from propagation of uncertainty factors of underlying variables. Uncertainty of actual relation between variables not accounted at this time, although this could be included in a future update.
  property amount 1 of flow in kg 5250 kg; name SF6
  properties: wet mass 1 kg, dry mass 1 kg
  note on amount 1 of flow in kg: Measured value. Total amount of SF6 in the network in transformers
- waste polyvinylchloride: -11.1563 kg; name waste_PVC; = (PVC)*-1
  Estimated value. It is assumed that the same quantity that enter is produced as a waste
  EcoSpold01Location=CH
  Uncertainty: Calculated variable. Uncertainty will be determined from propagation of uncertainty factors of underlying variables. Uncertainty of actual relation between variables not accounted at this time, although this could be included in a future update.
  production volume 5093.33 kg; = waste_PVC* apv_RP/ amount_RP
    Calculated from the production volume of transmission network, electricity, high voltage in proportion to the respective output amounts.
  property price 0 EUR2005; name waste_PVC_price_EUR2005
  properties: dry mass 0.998 kg, water content 0.00200401, wet mass 1 kg, carbon content, fossil 0.440882
  note on carbon content, fossil: C content in 1 kg DM was calculated using data in Tab A.1, ecoinvent v2.2 report 13_I
- waste mineral oil: -3563 kg; name waste_oil; = (oil)*-1
  Estimated value. It is assumed that the same quantity that enter is produced as a waste
  Uncertainty: Calculated variable. Uncertainty will be determined from propagation of uncertainty factors of underlying variables. Uncertainty of actual relation between variables not accounted at this time, although this could be included in a future update.
  production volume 1.62667e6 kg; = (apv_RP * waste_oil / amount_RP)
    Calculated from production volume of reference product using the relative outputs.
  property price 0 EUR2005; name waste_oil_price_EUR2005
  properties: dry mass 0.9 kg, wet mass 1 kg, water content 0.111111, carbon content, fossil 0.864444
  note on carbon content, fossil: Tab A.6, ecoinvent v2.2 report 13_I. C content has been calculated after data in the tables, and then referred to 1 kg DM
- waste wood pole, chrome preserved: -22.0984 kg; name waste_wood; = (+wood*wood_WM)*-1
  (same comment as for waste mineral oil)
  production volume 10088.9 kg; = waste_wood* apv_RP/ amount_RP
    Calculated from production volume of reference product using the relative outputs.
  property price 0 EUR2005; name waste_wood_price_EUR2005
  properties: wet mass 1 kg, dry mass 0.8 kg, carbon content, non-fossil 0.483676, water content 0.25
- polyvinylchloride, suspension polymerised: 11.1563 kg; name PVC; = PVC_amount1/(total_length_network)
  EcoSpold01Location=RER
  Calculated value. Total amount divided by the total number of kilometres in the network
  Uncertainty: Calculated variable. Uncertainty will be determined from propagation of uncertainty factors of underlying variables. Uncertainty of actual relation between variables not accounted at this time, although this could be included in a future update.
  property amount 1 of flow in kg 382000 kg; name PVC_amount1
  properties: carbon content, fossil 0.387097, wet mass 1 kg, dry mass 1 kg
  note on carbon content, fossil: Monomer is vynyl chloride, C2H3Cl (ecoinvent v2.2 report 11_II). MW=62 g/mol
  note on amount 1 of flow in kg: Measured value. Total amount of PVC in the network used in transformers construction
- scrap copper: -3037.31 kg; name scrap_copper; = (copper)*-1
  (same comment as for waste mineral oil)
  production volume 1.38667e6 kg; = scrap_copper* apv_RP/ amount_RP
    Calculated from production volume of reference product using the relative outputs.
  property price 0 EUR2005; name scrap_copper_price_EUR2005
  properties: wet mass 1 kg, dry mass 1 kg
- sawlog and veneer log, softwood, debarked, measured as solid wood: 0.0288867 m3; name wood; = lifetime/wood_lifetime* wood_amount1/(total_length_network*wood_WM)
  Calculated value. Total amount divided by the total number of kilometres in the network. Lifetime of wood has been taken into account in the calculation
  Uncertainty: Calculated variable. Uncertainty will be determined from propagation of uncertainty factors of underlying variables. Uncertainty of actual relation between variables not accounted at this time, although this could be included in a future update.
  property amount 1 of flow in kg 454000 kg; name wood_amount1
  property lifetime 45 year; name wood_lifetime
  property wet mass 765 kg; name wood_WM
  properties: carbon content, non-fossil 0.494, dry mass 450 kg, water content 0.7
  note on amount 1 of flow in kg: Measured value. Total amount of wood in the network. Pylons and constrcution of substations.
  note on lifetime: Estimated value. Wood poles lifetime is estimated at 40 years
- steel, unalloyed: 5344.49 kg; name steel; = steel_amount1/(total_length_network)
  Calculated value. Total amount divided by the total number of kilometres in the network
  EcoSpold01Location=RER
  Uncertainty: Calculated variable. Uncertainty will be determined from propagation of uncertainty factors of underlying variables. Uncertainty of actual relation between variables not accounted at this time, although this could be included in a future update.
  property amount 1 of flow in kg 1.83e8 kg; name steel_amount1
  properties: carbon content, fossil 0.0025, dry mass 1 kg, wet mass 1 kg
  note on amount 1 of flow in kg: Measured value. Total amount of steel in the network used in pylons and construction of transformers
  note on carbon content, fossil: Unalloyed steels or carbon steels are those in which the level of an individual element in no case reaches or exceeds the limiting concentration given in Tab. 3.1 ecoinvent v2.2 report 10_partII. Assumed to have a C content of 0.25%
- gravel, crushed: 1.94505e6 kg; name gravel; = gravel_amount1/(total_length_network)
  Calculated value. Total amount divided by the total number of kilometres in the network
  Uncertainty: Calculated variable. Uncertainty will be determined from propagation of uncertainty factors of underlying variables. Uncertainty of actual relation between variables not accounted at this time, although this could be included in a future update.
  property amount 1 of flow in kg 6.66e10 kg; name gravel_amount1
  properties: dry mass 1 kg, wet mass 1 kg
  note on amount 1 of flow in kg: Measured value. Total amount of gravel in the network used in construction of substations.
- concrete, normal: 39.1345 m3; name concrete; = concrete_amount1/(total_length_network)
  (same comment as for gravel, crushed)
  property amount 1 of flow in kg 1.34e6 kg; name concrete_amount1
  properties: dry mass 2190 kg, wet mass 2380 kg, water content 0.086758
  note on amount 1 of flow in kg: Measured value. Total amount of concrete in the network. Pylons and substations
- aluminium, wrought alloy: 8703.06 kg; name aluminium; = aluminium_amount1/(total_length_network)
  (same comment as for steel, unalloyed)
  property amount 1 of flow in kg 2.98e8 kg; name aluminium_amount1
  properties: dry mass 1 kg, wet mass 1 kg
  note on amount 1 of flow in kg: Measured value. Total amount of aluminium in the network. Used in transforming substations (transformers and cables)
- scrap steel: -40098.3 kg; name scrap_steel; = (steel+steel_low)*-1
  (same comment as for waste mineral oil)
  production volume 1.83067e7 kg; = scrap_steel* apv_RP/ amount_RP
    Calculated from production volume of reference product using the relative outputs.
  property price 0 EUR2005; name scrap_steel_price_EUR2005
  properties: dry mass 1 kg, wet mass 1 kg
- wood preservation, vacuum pressure method, organic salts, Cr-free, outdoor use, ground contact: 0.133601 kg; = wood_preservPCP_amount1* lifetime/wood_lifetime* wood_amount1/(total_length_network*wood_WM)
  (same comment as for sawlog and veneer log, softwood, debarked, measured as solid wood)
  property amount 1 of flow in kg 4.625 kg; name wood_preservPCP_amount1
  note on amount 1 of flow in kg: Literature value. Quantity per m3 of wood. Source: C.A. Bolin, S.T. Smith / Renewable and Sustainable Energy Reviews 15 (2011) 2475-2486
- mastic asphalt: 876.147 kg; name asphalt; = asphalt_amount1/(total_length_network)
  (same comment as for gravel, crushed)
  property amount 1 of flow in kg 3e7 kg; name asphalt_amount1
  properties: dry mass 1 kg, wet mass 1 kg, carbon content, fossil 0.0968869
  note on amount 1 of flow in kg: Measured value. Total amount of asphalt in the network used in construction of substations
- copper: 3037.31 kg; = copper_amount1/(total_length_network)
  (same comment as for steel, unalloyed)
  property amount 1 of flow in kg 1.04e8 kg; name copper_amount1
  properties: wet mass 1 kg, dry mass 1 kg
  note on amount 1 of flow in kg: Measured value. Total amount of copper in the network. Used in cables and substations (transformers and cables)
- inert waste, for final disposal: -2.04016e6 kg; name inert_waste; = (asphalt+concrete*2400+gravel+ceramics)*-1
  (same comment as for waste mineral oil)
  production volume 9.31423e8 kg; = inert_waste* apv_RP/ amount_RP
    Calculated from production volume of reference product using the relative outputs.
  property price 0 EUR2005; name inert_waste_price_EUR2005
  properties: dry mass 0.995 kg, wet mass 1 kg, water content 0.00502513
- building, hall, steel construction: 0.119522 m2; = building/(total_length_network)
  EcoSpold01Location=CH
  Calculated value. Total amount divided by the total number of kilometres in the network
  Uncertainty: Calculated variable. Uncertainty will be determined from propagation of uncertainty factors of underlying variables. Uncertainty of actual relation between variables not accounted at this time, although this could be included in a future update.
  property amount 1 of flow in kg 4092.52 kg; name building
- scrap aluminium: -8703.06 kg; name scrap_alu; = (aluminium)*-1
  (same comment as for waste mineral oil)
  production volume 3.97333e6 kg; = scrap_alu* apv_RP/ amount_RP
    Calculated from production volume of reference product using the relative outputs.
  property price 0 EUR2005; name scrap_alu_price_EUR2005
  properties: dry mass 1 kg, wet mass 1 kg
- sanitary ceramics: 312.492 kg; name ceramics; = ceramic_amount/(total_length_network)
  (same comment as for sulfur hexafluoride, liquid)
  property amount 1 of flow in kg 1.07e7 kg; name ceramic_amount
  properties: dry mass 1 kg, wet mass 1 kg
  note on amount 1 of flow in kg: Measured value. Total amount of ceramics in the network. Used in transformers
- excavation, hydraulic digger: 177420 m3; = ( excavation*mult_factor/(total_length_network))
  (same comment as for polyvinylchloride, suspension polymerised)
  property multiplicative factor 1.5; name mult_factor
  property amount 1 of flow in kg 4.05e9 kg; name excavation
  note on multiplicative factor: Estimated value. Factor used to extrapolate operations of dismantling. It is assumed that half of the total volume needed for the construction is needed in the dismantling.
  note on amount 1 of flow in kg: Measured/Estimated value. Excavation is used to represent construction and dismantling operations for both the transforming substations and the lines. It is assumed that half of the total volume needed for the construction is needed in the dismantling.
- steel, low-alloyed, hot rolled: 34753.8 kg; name steel_low; = steel_low_amount1/(total_length_network)
  (same comment as for steel, unalloyed)
  property amount 1 of flow in kg 1.19e9 kg; name steel_low_amount1
  properties: wet mass 1 kg, carbon content, fossil 0.005, dry mass 1 kg
  note on amount 1 of flow in kg: Measured value. Total amount of reinforcing steel in the network used in construction of substations
  note on carbon content, fossil: Low alloyed steel composition given in Tab. 3.2 ecoinvent v2.2 report 10_partII. Steel assumed to have a C content of 0.5%
- lubricating oil: 3563 kg; name oil; = oil_amount/(total_length_network)
  (same comment as for sulfur hexafluoride, liquid)
  property amount 1 of flow in kg 1.22e8 kg; name oil_amount
  properties: carbon content, fossil 0.75, dry mass 1 kg, wet mass 1 kg
  note on amount 1 of flow in kg: Measured value. Total amount of oil in the network. Used in transformers, circuit breakers and regulators. It is also included here the amount of oil used to treat the PCP poles (30 kg/pole)
  note on carbon content, fossil: Lubricating oil is produced from diesel. C-content/dry mass of fats and oils considered 75%, from: ecoinvent v2.2 report, n 15a, pg 40

## Inputs from nature
All rows: lognormal variance with pedigree 0.002, pedigree (1,1,3,1,1)
- Transformation, to industrial area [natural resource, land]: 297.89 m2; = transf_industrial/(total_length_network)
  Calculated value. Total transformation for transforming substations divided by the total number of kilometres in the network
  Uncertainty: Calculated variable. Uncertainty will be determined from propagation of uncertainty factors of underlying variables. Uncertainty of actual relation between variables not accounted at this time, although this could be included in a future update.
  property amount 1 of flow in kg 1.02e7 kg; name transf_industrial
- Occupation, grassland, natural (non-use) [natural resource, land]: 5.61615e6 m2*year; = transf_grassland*lifetime/(total_length_network)
  Calculated value. Total occupation for high voltage lines divided by the total number of kilometres in the network
  Uncertainty: Calculated variable. Uncertainty will be determined from propagation of uncertainty factors of underlying variables. Uncertainty of actual relation between variables not accounted at this time, although this could be included in a future update.
- Transformation, from forest, primary (non-use) [natural resource, land]: 75179.9 m2; = ( transf_industrial+ transf_grassland)/(total_length_network)
  Calculated value. Total transformation for transforming substations and high voltage lines divided by the total number of kilometres in the network. It is assumed a width of 75m for high voltage lines.
  Uncertainty: Calculated variable. Uncertainty will be determined from propagation of uncertainty factors of underlying variables. Uncertainty of actual relation between variables not accounted at this time, although this could be included in a future update.
  property amount 1 of flow in kg 2.57422e9 kg; name transf_forest; = transf_industrial+ transf_grassland
- Transformation, to grassland, natural (non-use) [natural resource, land]: 74882.1 m2; = transf_grassland/(total_length_network)
  Calculated value. Total transformation for high voltage lines divided by the total number of kilometres in the network
  Uncertainty: Calculated variable. Uncertainty will be determined from propagation of uncertainty factors of underlying variables. Uncertainty of actual relation between variables not accounted at this time, although this could be included in a future update.
  property amount 1 of flow in kg 2.56402e9 kg; name transf_grassland; = total_length_network*1000*75
- Occupation, industrial area [natural resource, land]: 22341.7 m2*year; = transf_industrial*lifetime/(total_length_network)
  Calculated value. Total occupation for transforming substations divided by the total number of kilometres in the network
  Uncertainty: Calculated variable. Uncertainty will be determined from propagation of uncertainty factors of underlying variables. Uncertainty of actual relation between variables not accounted at this time, although this could be included in a future update.

## Sampling procedure
Data collection from the company including all its activities

## Extrapolations
Some data are extrapolated from GLO dataset. Uncertainty has been adjusted accordingly
