# bark chips production, softwood, at sawmill

Dataset: EcoSpold 2, unit process
Geography: CA-QC
Time period: 2011-01-01 to 2019-12-31
Technology level: current
Classification: ISIC rev.4 ecoinvent: 1610:Sawmilling and planing of wood
Tags: recontextualization
Scenario: Business-as-Usual
System model: Allocation at the point of substitution
Generated by: Hugues Imbeault-Tétreault
Database: ecoinvent
isCopyrightProtected: true
accessRestrictedTo: 1

## General comment
This dataset represents the service of the handling of bark from softwood at sawmill with an output of one kg of bark, measured in oven-dry mass of bark. The exchanges of this child dataset are identical to the GLO dataset. This dataset was created to enable linking to regional markets (e.g. for electricity). Data quality indicators were adjusted accordingly.
The process chain in a sawmill is a net of interlinked processes; the process structure depends on the individual design and technologies in place for each sawmill. The structuring of the sawmilling processes is based on the identification of the core processes in a sawmill that are attributable to several co-products (such as upstream processes like forestry and transport of logs to the sawmill) sorting, storing and the sawing of the (debarked) log. Other processes are attributable directly to one of the co-products such as the chipping of residual wood (either after sawing or as part of the profile chipping), the chipping of the bark (the "debarking") or the suction of saw dust as collection and internal transport.
The following figure illustrates the general structure of the sawmilling processes before eventual drying and planing:
The data was provided by and approved by the Swiss forest industry (Holzindustrie Schweiz HIS).

## Included activities start
Bark chips production starts with the bark taken off the stem as part of the over-all sawing process (see respective dataset) and includes all the handling of the bark in the sawmill.

## Included activities end
This activity ends with the bark chips stored in a silo at the saw mill. The dataset does not include dust emissions due to a high water content in the wood.

## Geography
Extrapolated from average Swiss conditions. Child dataset exchanges identical to GLO dataset. Dataset created to enable linking to regional markets (e.g. for electricity). Data quality indicators adjusted accordingly.

## Reference product
- bark: 0 kg; By-product classification allocatable product; CPC 31230: Wood in chips or particles
  the bark is produced in the over-all sawing process and treated in this DS as the handling of bark within the sawmill.
  production volume 0 kg; = p_barkchips
    see comment on the by-product
  property price 0.034 EUR2005
    Data on Import/Export (USD/kg) from UN data has been used. (http://data.un.org/Data.aspx?d=ComTrade&f=_l1Code%3a45, [accessed 10th June 2010]) Commodity: 'Sawdust, wood waste or scrap'. A density of 250 kg/m3 was used to convert from M3 to kg (data on density: http://wiki.answers.com/Q/What_is_the_density_of_sawdust, [Accessed 13 June 2010]).
  property carbon content 0.494
    carbon content on a dry matter basis (reserved; not for manual entry)
  properties: carbon content, fossil 0, carbon content, non-fossil 0.494, dry mass 1 kg, wet mass 2.4 kg, water in wet mass 1.4 kg, water content 1.4, carbon allocation 0.494 kg
- bark chips, wet, measured as dry mass: 1 kg; By-product classification allocatable product; CPC 31230: Wood in chips or particles; pedigree (1,1,1,1,1)
  bark chips stored in the silo resulting from the treatment of the reference product
  production volume 9.45223e8 kg

## By-products
- bark chips, wet, measured as dry mass: 0 kg; name barkchip_wet; By-product classification allocatable product; CPC 31230: Wood in chips or particles; pedigree (1,1,1,1,1)
  bark chips stored in the silo resulting from the treatment of the reference product
  production volume 0 kg; name p_barkchips; = 1078320*1.64/(1-0.12)*0.12*380/1079420*1.1134E+07
    Calculated from production volume of sawnwood x conversion efficiency of sawmilling process (to estimate log input under bark), extrapolated to log over bark via (1-bark ratio) and estimation of bark via bark ratio (of log over bark, multiplied with average basic bark density for Swiss conditions); extrapolated to CA-QC values via the ratio of sawnwood (C) production according to FAOStat and Statistics Canada.
  property price 0.034 EUR2005; name barkchip_wet_price_EUR2005
    Expert judgement (Urs Luginbühl, Swiss Sawmilling industry, personal communication in June 2014). Cross-reference; FAOSTAT database; http://faostat.fao.org/site/626/DesktopDefault.aspx?PageID=626#ancor; Average import/export prices of EU for 'chips and particles'. Price: 48.76 Euro/m3. The density of the wood chips is 650 kg/m3. The price is calculated to be 0.075 EUR/kg.
  property carbon content 0.494
    carbon content on a dry matter basis (reserved; not for manual entry)
  properties: dry mass 1 kg, water content 1.4, carbon content, fossil 0, wet mass 2.4 kg, water in wet mass 1.4 kg, carbon content, non-fossil 0.494, carbon allocation 0.494 kg

## Inputs from technosphere
- electricity, medium voltage: 0.00474012 kWh; name elec_midvol; lognormal variance with pedigree 0.0052, pedigree (2,1,3,5,1)
  data from Swiss industry
- heat, district or industrial, other than natural gas: 7.46853e-5 MJ; lognormal variance with pedigree 0.0032, pedigree (1,3,3,1,1)
  Light fuel oil burned for heating. Calculated based on reported fuel input volume, fuel density, net heating value per kg and efficiency.
- waste mineral oil: -2.54633e-5 kg; lognormal variance with pedigree 0.1026, pedigree (1,3,3,1,1)
  waste motor oil and hydraulic fluids; greases are used in a dissipative way
  production volume 1.91286e6 kg
- lubricating oil: 1.96532e-5 kg; lognormal variance with pedigree 0.1026, pedigree (1,3,3,1,1)
  Hydraulic fluids, motor oils and greases.
- saw dust, loose, wet, measured as dry mass: -0.00826539 kg; lognormal variance with pedigree 0.2526, pedigree (1,3,3,1,1)
  calculated by the share and basic density as the moisture content is over 30%
  production volume 6.20913e8 kg
- propane, burned in building machine: 0.000274888 MJ; lognormal variance with pedigree 0.0032, pedigree (1,3,3,1,1)
  Propane for internal transport. Calculated based on reported fuel input volume, fuel density, net heating value per kg and efficiency.
- sawlog and veneer log, softwood, measured as solid wood under bark: 0.000351002 m3; lognormal variance with pedigree 0.2526, pedigree (1,3,3,1,1)
  input of the log, from which 1 m3 of sawnwood is produced
- sawmill: 4.02247e-11 unit; lognormal variance with pedigree 0.2532, pedigree (2,1,3,4,1)
  value taken from econvent 2.2
- bark: -0.0163504 kg; lognormal variance with pedigree 0.0086, pedigree (1,3,3,1,1)
  calculated by the share and basic density as the moisture content is over 30%
  production volume 1.22827e9 kg
- heat, district or industrial, natural gas: 0.000317695 MJ; lognormal variance with pedigree 0.0032, pedigree (1,3,3,1,1)
  Calculated based on reported natural gas input, the net heating value per m³ of natural gas and efficiency.
- diesel, burned in building machine: 0.0332114 MJ; lognormal variance with pedigree 0.1027, pedigree (1,3,3,3,1)
  Diesel for internal transport. Calculated based on reported fuel input volume, fuel density and net heating value per kg.
- heat, district or industrial, other than natural gas: 0.000811368 MJ; lognormal variance with pedigree 0.0032, pedigree (1,3,3,1,1)
  Heavy fuel oil burned for heating. Calculated based on reported fuel input volume, net heating value per liter and efficiency.

## Inputs from nature
- Water, river [natural resource, in water]: 2.10473e-5 m3; lognormal variance with pedigree 0.0032, pedigree (1,3,3,1,1)
  data from industry

## Emissions to nature
- Particulates, < 2.5 um [air, non-urban air or from high stacks]: 3.87553e-6 kg; lognormal variance with pedigree 0.3032, pedigree (2,3,3,1,1)
  data from industry; process emissions
- Particulates, > 10 um [air, non-urban air or from high stacks]: 7.16331e-6 kg; lognormal variance with pedigree 0.0432, pedigree (2,3,3,1,1)
  data from industry; process emissions
- Water [air, unspecified]: 6.9456e-6 m3; lognormal variance with pedigree 0.0038, pedigree (2,3,3,1,1)
  33% of water intake is assumed dissipated.
- Particulates, > 2.5 um, and < 10um [air, non-urban air or from high stacks]: 1.43266e-6 kg; lognormal variance with pedigree 0.1232, pedigree (2,3,3,1,1)
  data from industry; process emissions
- Water [water, surface water]: 1.41017e-5 m3; lognormal variance with pedigree 0.0038, pedigree (2,3,3,1,1)
  67% of water intake is assumed discharged.
- Suspended solids, unspecified [water, surface water]: 1.65307e-7 kg; lognormal variance with pedigree 0.0426, pedigree (1,3,3,1,1)
  data from industry

## Sampling procedure
complementary literature and sampling from sawmills
