# photovoltaic mounting system production, for facade installation

Dataset: EcoSpold 2, unit process
Geography: RER
Time period: 1992-01-01 to 2019-12-31
Technology level: current
Classification: ISIC rev.4 ecoinvent: 4390:Other specialized construction activities
Classification: EcoSpold01Categories: photovoltaic/production of components
Tags: ConvertedDataset
Scenario: Business-as-Usual
System model: Allocation at the point of substitution
Share of production covered: 10 %
Generated by: Niels Jungbluth
Published in: Jungbluth, N. 2008
Database: ecoinvent
isCopyrightProtected: true
accessRestrictedTo: 1

## General comment
Production of the additional components necessary for the mounting of 1 m2 PV panel or laminate.
[This dataset was already contained in the ecoinvent database version 2. It was not individually updated during the transfer to ecoinvent version 3. Life Cycle Impact Assessment results may still have changed, as they are affected by changes in the supply chain, i.e. in other datasets. This dataset was generated following the ecoinvent quality guidelines for version 2. It may have been subject to central changes described in the ecoinvent version 3 change report (http://www.ecoinvent.org/database/ecoinvent-version-3/reports-of-changes/), and the results of the central updates were reviewed extensively. The changes added e.g. consistent water flows and other information throughout the database. The documentation of this dataset can be found in the ecoinvent reports of version 2, which are still available via the ecoinvent website. The change report linked above covers all central changes that were made during the conversion process.]

## Included activities end
Materials and packaging for the production and estimation for metal processing. Disposal of the product after use. Energy use for the construction process must be included in data for the PV-plant.

## Geography
Production in CH.

## Technology
Construction parts for a photovoltaic system.

## Time period
Date of data investigation. Actual weight of materials updated in 2008.

## Reference product
- photovoltaic mounting system, for facade installation: 1 m2; By-product classification allocatable product; CPC 87360: Installation services of electrical machinery and apparatus n.e.c.
  EcoSpold01Location=RER
  production volume 2431.62 m2
    Not known.
    Estimated from total installed capacity of 3kWp PV plant in 2000: GLO installed PV-power 711MWp (Tab 11.3, ecoinvent v2 report 6_XII). It was assumed that Europe produces 36% of PV capacities (info obtained from Fig 8.1, ecoinvent v2 report 6_XII). An average surface of 28.5 m2 was estimated using information in Tab 11.2 from the same report. And the share between the different types of installation was obtained from Tab 12.7 of the same report. RER shares were used for GLO.
  property price 4.91702 EUR2005
    Calculated based on inputs: The price of the product has been calculated as a sum of the values of the material and energy inputs for this product. This value is therefore a rough estimation. It may underestimate the real price since there are additional expenses when producing any product. These expences can include for example labour costs, treatment of waste materials and profit for the producer. Please consider carefully whether this level of data quality is acceptable for your application.
  property true value 4.91702
    allocation property applied in "true value" allocation // value calculated from revenue

## By-products
- waste paperboard, sorted: 0 kg; CPC 39240: Waste and scrap of paper or paperboard; By-product classification Recyclable; pedigree (1,1,1,1,1)
  It is assumed that 86.3% (wet weight) of waste paperboard, unsorted is segregated to waste paperboard, sorted. Waste paper, sorted is later used in recycling industry where maximum 79% of it, is transformed into new paperboard.
  production volume 84.4893 kg
  property price 0.0436 EUR2005; name ByP_waste_paperboard_sorted_price_EUR200
    Estimated value; three different sources were used to determine the price for waste paperboard, sorted. 35 AUD/tonne (http://larimer.org/solidwaste/charts/Current.htm, accessed 20130328), 70 GBP/tonne (http://www.letsrecycle.com/prices/waste%20paper, accessed 20130328) and 20 USD/tonne (http://www.oxpaperboard.com/1/post/2013/03/ox-paperboard-announces-price-adjustment-to-uncoated-recycled-paperboard.html, accessed 20130328).
  property water content 0.243781; = WWM_waste_paperboard_sorted/ DM_waste_paperboard_sorted
  property water in wet mass 0.196 kg; name WWM_waste_paperboard_sorted; = WM_waste_paperboard_sorted- DM_waste_paperboard_sorted
  property dry mass 0.804 kg; name DM_waste_paperboard_sorted
  property wet mass 1 kg; name WM_waste_paperboard_sorted
  property carbon content 0.483259
    carbon content on a dry matter basis (reserved; not for manual entry)
  property true value 0.00151493
    allocation property applied in "true value" allocation // value calculated from revenue
  properties: carbon content, non-fossil 0.483259, carbon content, fossil 0, carbon allocation 0.38854 kg
- electricity, for reuse in municipal waste incineration only: 0 kWh; CPC 17100: Electrical energy; By-product classification allocatable product; pedigree (1,1,1,1,1)
  Net electricity generated from this waste and used in internal MSWI plant energy redistribution.
  Uncertainty: uncertainty is calculated from uncertainties in waste composition and uncertainties in energy efficiency and the uncertainty in internal energy demand
  production volume 23.6332 kWh
  property true value relation 3.6; name E_el_prod_MSWI_true_value_relation
    property to calculate "true value" from
  property exergy 3.6 MJ; name E_el_prod_MSWI_exergy
    This exergy property is based on the exergy content of the product.
  property price 0.1 EUR2005; name E_el_prod_MSWI_price_EUR2005
    Estimated to be the same price as in case of electricity, medium voltage.
  property true value 0.00057632
    allocation property applied in "true value" allocation // value calculated from true value relation
- heat, for reuse in municipal waste incineration only: 0 MJ; CPC 17300: Steam and hot water; By-product classification allocatable product; pedigree (1,1,1,1,1)
  Net useful heat generated from this waste and used in internal MSWI plant energy redistribution.
  Uncertainty: uncertainty is calculated from uncertainties in waste composition and uncertainties in energy efficiency and the uncertainty in internal energy demand
  production volume 164.804 MJ
  property true value relation 0.1842; name E_th_prod_MSWI_true_value_relation
    property to calculate "true value" from
  property exergy 0.1842 MJ; name E_th_prod_MSWI_exergy
    This exergy property is based on the exergy content of the product.
  property price 0.0106 EUR2005; name E_th_prod_MSWI_price_EUR2005
    Average European district heat price from Ecoheatcool and Euroheat 2005-2006, Ecoheat Work package 1: The European heat market. Final report. 10.6 EUR/GJ i s the price of district heat. http://www.solarthermalworld.org/files/Ecoheatcool%20WP1%20Web.pdf?download
  property true value 0.000206163
    (same comment as for electricity, for reuse in municipal waste incineration only)
- zinc concentrate: 0 kg; CPC 14290: Other non-ferrous metal ores and concentrates (other than uranium or thorium ores and concentrates); By-product classification allocatable product
  Calculated value from the knowledge of the properties of both products.
  production volume 0.0016334 kg
  property price 0.38 EUR2005; name ByP_price_EUR2005
    Temporary price data. Calculated as 90% of purchasers price based on: Zinc content in concentrate 53%. Concentrate price per kg Zn 86.5% of refined Zn price (13.5% treatment charges according to CHR Metals Limited 2005: Dynamic cost curves. http://www.minecost.com/dynamic.pdf). 2004 zinc price from USGS (2007) Mineral commodity summaries 2007. <http://minerals.usgs.gov/minerals/pubs/mcs/2007/mcs2007.pdf> [Accessed 25 May 2010]
  property zinc content 0.53; name zinc_C_zinc_concentrate
    Zinc content on a dry matter basis. Value taken from teh "zinc mine operation" /GLO dataset.
  property dry mass 1 kg; name DM_zinc_concentrate
  property carbon content 0
    carbon content on a dry matter basis (reserved; not for manual entry)
  property true value 9.42267e-9
    allocation property applied in "true value" allocation // value calculated from revenue
  properties: wet mass 1 kg, water content 0, carbon content, non-fossil 0, carbon content, fossil 0, water in wet mass 0 kg, carbon allocation 0 kg

## Inputs from technosphere
- steel, low-alloyed, hot rolled: 1.79626 kg; lognormal variance with pedigree 0.1381, pedigree (1,2,4,1,1)
  Literature and own estimations
  EcoSpold01Location=RER
  Uncertainty: Literature and own estimations
  properties: carbon content, fossil 0.005, dry mass 1 kg, wet mass 1 kg
  note on carbon content, fossil: Low alloyed steel composition given in Tab. 3.2 ecoinvent v2.2 report 10_partII. Steel assumed to have a C content of 0.5%
- aluminium, wrought alloy: 2.63407 kg; lognormal variance with pedigree 0.1381, pedigree (1,2,4,1,1)
  EcoSpold01Location=RER
  Literature and own estimations
  Uncertainty: Literature and own estimations
  properties: dry mass 1 kg, wet mass 1 kg
- sheet rolling, steel: 0.109749 kg; lognormal variance with pedigree 0.202, pedigree (3,4,5,1,3)
  EcoSpold01Location=RER
  Estimation
  Uncertainty: Estimation
- section bar extrusion, aluminium: 2.63407 kg; lognormal variance with pedigree 0.202, pedigree (3,4,5,1,3)
  Estimation
  EcoSpold01Location=RER
  Uncertainty: Estimation
- waste polyethylene/polypropylene product: 0 kg; pedigree (1,1,1,1,1)
  EcoSpold01Location=CH
  Disposal of plastics parts at end of life
  Uncertainty: Disposal of plastics parts at end of life
  production volume 0 kg
    Calculated from the production volume of photovoltaic facade construction, mounted, at building in proportion to the respective output amounts.
  properties: dry mass 0.847 kg, wet mass 1 kg, water content 0.180638, carbon content, fossil 0.748045
  note on carbon content, fossil: Mixed various plastics was used to estimate the C content of this waste (Tab A.2, ecoinvent v2.2 report 13_I)
- waste paperboard, unsorted: -0.0402432 kg; lognormal variance with pedigree 0.202, pedigree (3,4,5,1,3)
  Calculated with use
  EcoSpold01Location=CH
  Uncertainty: Calculated with use
  production volume 97.9019 kg
    (same comment as for waste polyethylene/polypropylene product)
  properties: price 0.03924 EUR2005, water content 0.243781, wet mass 1 kg, carbon content, non-fossil 0.483259, dry mass 0.804 kg
  note on carbon content, non-fossil: C content was calculated for 1 kg DM, using data in Tab A.3, ecoinvent v2.2 report 13_I.
- polystyrene, high impact: 0.00365839 kg; lognormal variance with pedigree 0.202, pedigree (3,4,5,1,3)
  Schwarz et al. 1992
  EcoSpold01Location=RER
  Uncertainty: Schwarz et al. 1992
  properties: carbon content, fossil 0.923077, wet mass 1 kg, dry mass 1 kg
  note on carbon content, fossil: Chemical formula of polystyrene is (C8H8)n (ecoinvent v2.2 report 11_II)
- polyethylene, high density, granulate: 0.000731688 kg; lognormal variance with pedigree 0.1381, pedigree (1,2,4,1,1)
  EcoSpold01Location=RER
  Literature and own estimations, recycled PE
  Uncertainty: Literature and own estimations, recycled PE
  properties: carbon content, fossil 0.857143, dry mass 1 kg, wet mass 1 kg
  note on carbon content, fossil: Polyethylene is formed out of a huge amount of ethylene monomers (C2H4) (ecoinvent v2.2 report 11_II). MW=28 g/mol
- waste polystyrene isolation, flame-retardant: 0 kg; pedigree (1,1,1,1,1)
  (same comment as for waste polyethylene/polypropylene product)
  production volume 0 kg
    (same comment as for waste polyethylene/polypropylene product)
  properties: water content 0.00199232, carbon content, fossil 0.918145, dry mass 0.998012 kg, wet mass 1 kg
  note on carbon content, fossil: Polystyrene isolation (EPS) is flame-retarded with hexa-bromo-cyclo-dodecan (C12H18Br6) and contains 0.67 w% bromine (ecoinvent v2.2 report 13_I, pg 39). The rest is polystyrene: (C8H8)n.
- corrugated board box: 0.0402432 kg; lognormal variance with pedigree 0.202, pedigree (3,4,5,1,3)
  Schwarz et al. 1992
  EcoSpold01Location=RER
  Uncertainty: Schwarz et al. 1992
  properties: carbon content, fossil 0.000656085, dry mass 0.945 kg, water content 0.0582011, carbon content, non-fossil 0.432275, wet mass 1 kg
  note on carbon content, fossil: Fossil C content was calculated after fossil C contents of chemicals used in the production of board (Tab 10-15 & 10.16 ecoinvent v2.2 report 11_III, part 10)
  note on carbon content, non-fossil: Biogenic C content was calculated after biogenic C contents of chemicals used in the production of board (Tab 10.15 & 10.16, ecoinvent v2.2 report 11_III, part 10).
- section bar rolling, steel: 1.68651 kg; lognormal variance with pedigree 0.202, pedigree (3,4,5,1,3)
  Brunschweiler 1993
  EcoSpold01Location=RER
  Uncertainty: Brunschweiler 1993
- waste polyethylene/polypropylene product: -0.000710372, -2.13164e-5 kg (2 entries); lognormal variance with pedigree 0.202, pedigree (3,4,5,1,3)
  (same comment as for waste polyethylene/polypropylene product)
  production volume 1.78002 kg
- waste polystyrene isolation, flame-retardant: -0.00355181, -0.000106581 kg (2 entries); lognormal variance with pedigree 0.202, pedigree (3,4,5,1,3)
  (same comment as for waste polyethylene/polypropylene product)
  production volume 8.89997 kg

## Sampling procedure
Detailed analysis of materials for one product in a diploma thesis.

## Extrapolations
From one product to the whole market. Correction factor applied to correct for today average weight per m2.

## Review by Christian Bauer 2009-02-15
Passed.
none
