# heat and power co-generation, hard coal

Dataset: EcoSpold 2, unit process
Geography: PL
Time period: 1980-01-01 to 2019-12-31
Technology level: modern
Classification: ISIC rev.4 ecoinvent: 3510:Electric power generation, transmission and distribution
Classification: EcoSpold01Categories: hard coal/power plants
Synonyms: other bituminous coal; anthracite; coking coal
Tags: hard coal power; fossil fuels; coal power
Scenario: Business-as-Usual
System model: Allocation at the point of substitution
Generated by: Karin Treyer
Published in: Röder, A. 2007
Database: ecoinvent
isCopyrightProtected: true
accessRestrictedTo: 1

## General comment
This dataset represents the production of high voltage electricity and district heat in an average combined heat and power hard coal power plant in Poland in 2012. The exchanges are valid for 1MJ of hard coal burned. 'Hard coal' includes anthracite, coking coal and other bituminous coal according to the definition of the IEA electricity information 2014.
All exchanges in this dataset except for emissions of SO2, NOx and particles are production-weighted averages of the figures in the datasets in ecoinvent version two, which are valid for the following 14 countries: AT, BE, ES, FR, IT, NL, PT, DE, CZ, HR, PL, SK, CN, US. The exception values are production-weighted averages of version 2 countries and the new countries in version 3 (AU, CA, CL, ID, IN, KR, MX, MY, PE, RU, TH, TR, TW, TZ, UA, ZA){{children_only}}
Comments on the inventory data of emissions:
- For the assessment of main characteristics (sulphur and ash content of coal, efficiency of the plant) and CO2 a bottom-up approach has been used. It consists in the collection of information about single plants.
- The size distribution of particle emissions has been derived from German data.
- Halogene emissions have been estimated on the basis of the content of the species in the country-specific coal input mix, assuming average retention rates.
- For CO and particle emissions average values for the former UCTE are included (Union for the Coordination of the Transmission of Electricity, since 2009 replaced by ENTSO-E European Network of Transmission System Operators for Electricity).
- The country specific emission depend on the share of DeNOx.
- Emissions of trace elements were calculated by means of a formula (CORINAIR) using the ash content in the country-specific coal input mix and average transfer coefficients for coal power plants, taking into account the share of DeSOx installed.
- Emission of uranium and thorium radioactive isotopes were assumed proportional to the corresponding element emitted with particles; the other non-gaseous radioactive isotopes of the uranium and thorium decay chain were assumed proportional to the emitted U-238 or Th-232.
- The emission of gaseous radon and K-40 are taken from the literature.
IEA. 2014. Electricity Information 2014. ISBN 978-92-64-21692-1. International Energy Agency (IEA), Paris Cedex (FR)
European Environment Agency (1991) CORINAIR Inventory; VOC's Default Emission Factors
[This dataset is meant to replace the following datasets:
- electricity production, hard coal, PL, 1993 - 2005]

## Included activities start
From the constructed hard coal power plant ready to produce electricity.
From reception of hard coal and operating materials at power plant gate. Functional unit is the combustion of 1MJ of hard coal.

## Included activities end
This activity ends with heat and electricity generated in a CHP power plant.
This dataset includes:
- all operation and maintenance activities and materials of the power plants.
- Use of fuel oil for startup
- Particle removal (dedusting of the flue gas)

- Desulfurisation and denitrification. These processes are described in separate modules; it can be decided by changing the values of NOx and SOx retained whether and how much DeNOx and DeSOx are installed.
- Cooling: It is assumed that all plants use wet cooling with a cooling tower. No cooling tower is included in this dataset (will be implemented in future versions)
- Loss of feed water

This dataset doesn't include
- raw materials extraction, decommissioning and waste treatment as these activities are already included in the infrastructure datasets
- transformation of the electricity produced
- The disposal of non-recycled ashes is modelled separately.

## Technology
POWER PLANT:
Hard coal power plant input is a market mix of 100MWe power plants (representing all power plants with a capacity <250MWe and 7% of the installed capacity) and 500MWe power plants (representing all power plants with a capacity >250MWe and 93% of the installed capacity). The plants are used for middle load with 4000 hours of operation at full capacity per year. The plants are assumed to operate 150000 hours during its lifetime.
Coal power plants are installed with an electrical filter and a flue gas desulfurization (DeSOx). To a large extent a selective catalytic reduction (SCR) takes place and a DeNOx plant is installed additionally. The electrical filter is the most widely used technology in UCTE countries. The system is highly efficient with filtration efficiency up to 99.9%. The electrical filter increases the energy consumption. The downstream flue gas desulfurization (DeSOx) reduces the particles further by 80% to 95%.
- Dones, R., Bauer, C., Röder, A. (2007) Kohle. In: Dones, R. (Ed.) et al., Sachbilanzen von Energiesystemen: Grundlagen für den ökologischen Vergleich von Energiesystemen und den Einbezug von Energiesystemen in Ökobilanzen für die Schweiz. Final report ecoinvent No.

## Time period
The Annual Production Volume is valid for the year 2012.

## Parameters
- efficiency: 0.305 dimensionless; lognormal variance with pedigree 0.003325, pedigree (3,2,1,2,2)
  Literature value/calculated value. Net electrical efficiency based on the lower heating value (LHV).
  For all OECD countries, the IEA Electricity information 2014 provides data for the year 2012 on fuel input (TJ, Net calorific value NCV) and gross electricity production (GWh) as well as heat production (TJ) in tables 8 and 9 for each country for electricity only and Combined Heat and Power (CHP) plants each. Together with the information on own use (see parameter 'losses'), the net electrical efficiency based on the NCV is calculated.
  For all non-OECD countries, data from the IEA Energy balances of non-OECD countries 2014 have been used. These tables do not always provide information on how much of the electricity has been produced in electricity only and in CHP plants, but often give the total value only.
  IEA. 2014. Electricity Information 2014. ISBN 978-92-64-21692-1. International Energy Agency (IEA), Paris Cedex (FR).
  IEA/OECD. 2014. Energy balances of non-OECD countries 2014. International Energy Agency (IEA), Paris Cedex (FR).
- fraction, cooling water, to air: 0.0251074; name fraction_CW_to_air; = (WConsumption_EP_HC_recirculatingCS*recirculating_CS_fraction_from_allCS+WConsumption_EP_HC_once_through_andCP_CS*once_through_andCP_CS_fractio_from_allCS)/(WWithdrawal_EP_HC_recirculating_CS*recirculating_CS_fraction_from_allCS+WWithdrawal_EP_HC_once_through_andCP_CS*once_through_andCP_CS_fractio_from_allCS); lognormal variance with pedigree 0.041425, pedigree (2,3,2,2,1)
  Calculated value
- losses from gross electricity production: 0.09 dimensionless; name gross_net_electricity; lognormal variance with pedigree 0.003525, pedigree (3,2,2,2,2)
  Calculated value. Own use of electricity plants in this country in 2012. For the OECD countries, the OECD iLibrary provides gross and net electricity values for the specific sector 'Total Fuel Combustion', from which the loss value is being calculated. This value is then applied to all fossil fuel datasets, as no data on a more detailed level were available.
  OECD. 2014. IEA Electricity Information Statistics: OECD - Electricity and heat generation. OECD iLibrary. Online database. DOI : 10.1787/elect-data-en
- fraction, water, decarbonised, to air: 0.0251074; name fraction_WDC_to_air; = fraction_CW_to_air; lognormal variance with pedigree 0.041425, pedigree (2,3,2,2,1)
  Calculated value. See comments in the other parametres present in this dataset. Decarbonised water is considered to be always used as cooling water, thus cooling water fractions to air are applied to all carbonised water input flows to calculate the amount of water consumed in the processes.
- once-through and cooling pond cooling systems as a fraction of all cooling syste: 0.73 dimensionless; name once_through_andCP_CS_fractio_from_allCS; lognormal variance with pedigree 0.092025, pedigree (4,4,3,2,4)
  Calculated as an average of data available for Europe (Floerke, 2008, Future changes of freshwater needs in the electricity production sector) and USA (NERL, 2011, Estimating freshwater needs to meet future thermoelectric generation requirements).
- recirculating cooling system as a fraction of all cooling systems: 0.27 dimensionless; name recirculating_CS_fraction_from_allCS; lognormal variance with pedigree 0.092025, pedigree (4,4,3,2,4)
  (same comment as for once-through and cooling pond cooling systems as a fraction of all coo)
- gross electricity production: 8.0596e10 kWh; name gross_electricity; lognormal variance with pedigree 0.0012, pedigree (2,1,1,1,1)
  Literature value/statistics. Taken from the IEA electricity information 2014, table 1.3.
  IEA. 2014. Electricity Information 2014. ISBN 978-92-64-21692-1. International Energy Agency (IEA), Paris Cedex (FR).
- factor: input of MJ for the production of 1 kWh: 11.8033 MJ/kWh; name factor_MJ_kWh; = 1*3.6/efficiency; lognormal variance with pedigree 0.0532, pedigree (4,4,3,4,4)
  Calculated value. 3.6 MJ = 1kWh.
- water withdrawal, electricity production from hard coal, once-through and coolin: 0.0815 m3/kWh; name WWithdrawal_EP_HC_once_through_andCP_CS; lognormal variance with pedigree 0.092025, pedigree (4,4,3,2,4)
  Estimated based on literature (Scown, 2011, Water Footprint of U.S. Transportation Fuels, SI). The amount of water withdrawn while burning lignite and peat is assumed to be the same as in case of coal.
- fraction, water, completely softened, to air: 0.15; name fraction_WCS_to_air; = fraction_PW_to_air; lognormal variance with pedigree 0.092025, pedigree (4,4,3,2,4)
  Calculated value. See comment in the other parametres present in this dataset. Water, completely softened is considered to be always used as process water, thus process water fractions to air are applied to all water, completely softened input flows to calculate the amount of water consumed in the processes.
- water withdrawal, electricity production from hard coal, recirculating CS: 0.0021 m3/kWh; name WWithdrawal_EP_HC_recirculating_CS; lognormal variance with pedigree 0.092025, pedigree (4,4,3,2,4)
  (same comment as for water withdrawal, electricity production from hard coal, once-through )
- fraction, process water, to air: 0.15 dimensionless; name fraction_PW_to_air; lognormal variance with pedigree 0.092025, pedigree (4,4,3,2,4)
  Literature value. In case when no industry/process specific data are available, default evaporation fraction value is used. This value is 15% and is based on literature (Statistics Canada, 2007 & Shaffer, K.H., 2008, Consumptive water use in the Great Lakes Basin, USGS & Shiklomanov, 2003, World Water Resources at the Beginning of the 21st Century) and has been approved by an expert.
- water consumption, electricity production from hard coal, once-through and cooli: 0.0014 m3/kWh; name WConsumption_EP_HC_once_through_andCP_CS; lognormal variance with pedigree 0.092025, pedigree (4,4,3,2,4)
  Estimated based on literature (Scown, 2011, Water Footprint of U.S. Transportation Fuels, SI). The amount of water consumed while burning lignite and peat is assumed to be the same as in case of coal.
- water consumption, electricity production from hard coal, recirculating CS: 0.0018 m3/kWh; name WConsumption_EP_HC_recirculatingCS; lognormal variance with pedigree 0.092025, pedigree (4,4,3,2,4)
  (same comment as for water consumption, electricity production from hard coal, once-through)

## Reference product
- heat, district or industrial, other than natural gas: 1 MJ; name heat; CPC 17300: Steam and hot water; By-product classification allocatable product
  Literature value/calculated value. Net thermal efficiency based on the lower heating value (LHV).
  For all OECD countries, the IEA Electricity information 2014 provides data for the year 2012 on fuel input (TJ, Net calorific value NCV) and gross electricity production (GWh) as well as heat production (TJ) in tables 8 and 9 for each country for electricity only and Combined Heat and Power (CHP) plants each. Together with the information on own use (see parameter 'losses'), the net electrical efficiency based on the NCV is calculated.
  For all non-OECD countries, data from the IEA Energy balances of non-OECD countries 2014 have been used. These tables do not always provide information on how much of the electricity has been produced in electricity only and in CHP plants, but often give the total value only.
  IEA. 2014. Electricity Information 2014. ISBN 978-92-64-21692-1. International Energy Agency (IEA), Paris Cedex (FR).
  IEA/OECD. 2014. Energy balances of non-OECD countries 2014. International Energy Agency (IEA), Paris Cedex (FR).
  production volume 1.49515e11 MJ
    Literature value/statistics. Taken from the IEA electricity information 2014. The global value is the sum of all hard coal CHP datasets in ecoinvent.
    IEA. 2014. Electricity Information 2014. ISBN 978-92-64-21692-1. International Energy Agency (IEA), Paris Cedex (FR).
  property true value relation 0.1842; name heat_true_value_relation
    property to calculate "true value" from
  property exergy 0.1842 MJ; name heat_exergy
    This exergy property is based on the exergy content of the product.
  property price 0.0106 EUR2005; name heat_price_EUR2005
    Average European district heat price from Ecoheatcool and Euroheat 2005-2006, Ecoheat Work package 1: The European heat market. Final report. 10.6 EUR/GJ i s the price of district heat. http://www.solarthermalworld.org/files/Ecoheatcool%20WP1%20Web.pdf?download
  property true value 0.000938483; name heat_true_value
    allocation property applied in "true value" allocation // value calculated from true value relation
  properties: corresponding fuel use, propane, furnace >100kW 0 MJ

## By-products
- electricity, high voltage: 0 kWh; name electricity; = efficiency/3.6; CPC 17100: Electrical energy; By-product classification allocatable product; undefined min 1, max 1, standardDeviation95 0, pedigree (1,1,3,1,1)
  Electricity output per MJ of hard coal burned.
  production volume 7.33424e10 kWh; name electricity_apv; = gross_electricity*(1-gross_net_electricity)
    Calculated value
  property price 0.0977 EUR2005; name electricity_price_EUR2005
    Temporary price data. Calculated as 90% of purchasers price based on: 94% of the average price (to account for a 6% loss in transformation and transmission) for electricity for industrial consumersin 2005 (excluded taxes). From IEA.
  property true value relation 3.6; name electricity_true_value_relation
    property to calculate "true value" from
  property exergy 3.6 MJ; name electricity_exergy
    This exergy property is based on the exergy content of the product.
  property true value 0.00914088; name electricity_true_value
    (same comment as for heat, district or industrial, other than natural gas)
- heat, for reuse in municipal waste incineration only: 0 MJ; CPC 17300: Steam and hot water; By-product classification allocatable product; pedigree (1,1,1,1,1)
  Net electricity generated from this waste and used in internal MSWI plant energy redistribution.
  Uncertainty: uncertainty is calculated from uncertainties in waste composition and uncertainties in energy efficiency and the uncertainty in internal energy demand
  production volume 1871.32 MJ
  property exergy 0.1842 MJ; name E_th_prod_MSWI_exergy
    This exergy property is based on the exergy content of the product.
  property price 0.0106 EUR2005; name E_th_prod_MSWI_price_EUR2005
    (same comment as for heat, district or industrial, other than natural gas)
  property true value relation 0.1842; name E_th_prod_MSWI_true_value_relation
    property to calculate "true value" from
  property true value 1.19335e-11
    (same comment as for heat, district or industrial, other than natural gas)
- electricity, for reuse in municipal waste incineration only: 0 kWh; CPC 17100: Electrical energy; By-product classification allocatable product; pedigree (1,1,1,1,1)
  (same comment as for heat, for reuse in municipal waste incineration only)
  production volume 263.553 kWh
  property true value relation 3.6; name E_el_prod_MSWI_true_value_relation
    property to calculate "true value" from
  property price 0.1 EUR2005; name E_el_prod_MSWI_price_EUR2005
    Estimated to be the same price as in case of electricity, medium voltage.
  property exergy 3.6 MJ; name E_el_prod_MSWI_exergy
    This exergy property is based on the exergy content of the product.
  property true value 3.28474e-11
    (same comment as for heat, district or industrial, other than natural gas)

## Inputs from technosphere
- SOx retained, in hard coal flue gas desulfurisation: 0.000257968 kg; name sox_retained; source Itten R. 2012; lognormal variance with pedigree 0.004, pedigree (3,1,3,1,1)
  See power plant data base for details
  Amount was scaled to the amount of reference product.
  properties: wet mass 1 kg, dry mass 1 kg
- residue from cooling tower: -2.73851e-6 kg; name amount_residue; lognormal variance with pedigree 0.072, pedigree (5,1,3,1,1)
  Calculated from mass balance
  Amount was scaled to the amount of reference product.
  production volume 4.3284e6 kg; = amount_residue/electricity*electricity_apv
    Calculated from the production volume of electricity produced in proportion to the respective output amounts. An extra amount has been added to the global dataset due to parent child relationship.
  property price 0 EUR2005; name amount_residue_price_EUR2005
  properties: dry mass 0.7 kg, carbon content, fossil 0.0544233, water content 0.428571, wet mass 1 kg
- chlorine, liquid: 5.47702e-6 kg; lognormal variance with pedigree 0.108025, pedigree (5,4,4,2,3)
  Rough guess
  Amount was scaled to the amount of reference product.
  properties: dry mass 1 kg, wet mass 1 kg
- hard coal power plant: 6.18701e-13 unit; name hard_coal_power_plant; = 1/ (150000*500*1000)*(efficiency/3.6); source Röder, A. 2007; lognormal variance with pedigree 0.3147, pedigree (3,3,3,3,1)
  Calculated value. At the moment, the hard coal power plant input consists of a market mix of a 100MWe power plant and a 500MWe power plant
  .
  For this calculation, 4000 load hours per year are assumed. It is assumed that a total of 150'000h is reached during the lifetime. A capacity of 500MW is taken for the calculation.
- light fuel oil: 9.31094e-6 kg; name light_fuel_oil; lognormal variance with pedigree 0.0221, pedigree (3,4,4,3,1)
  Typical value for hard coal plant in DE
  Amount was scaled to the amount of reference product.
  properties: wet mass 1 kg, dry mass 1 kg, carbon content, fossil 0.862
- water, decarbonised: 0.0821554 kg; name water_decarbonised_input; lognormal variance with pedigree 0.052025, pedigree (4,5,4,2,3)
  Estimate based on literature
  Amount was scaled to the amount of reference product.
  estimate based on literature
  Amount was scaled to the amount of reference product.
  properties: wet mass 1 kg
- water, completely softened: 0.00328621 kg; name water_softened_input; lognormal variance with pedigree 0.052025, pedigree (4,5,4,2,3)
  Estimate based on literature
  Amount was scaled to the amount of reference product.
  properties: wet mass 1 kg
- NOx retained, by selective catalytic reduction: 0 kg; name nox_retained; source Itten R. 2012; pedigree (1,1,3,1,1)
  Exchange present due to parent child relationship
  properties: wet mass 1 kg, dry mass 1 kg
- hard coal: 0 kg; pedigree (1,1,3,1,1)
  activityLink to RNA
- hard coal: 0 kg; pedigree (1,1,3,1,1)
  activityLink to AU
- hard coal: 0.0248109 kg; name hard_coal; lognormal variance with pedigree 0.21, pedigree (5,5,5,5,5)
  own assumption, based on uncertainty on power plant data base and coal quality (mismatch between regional supply mix and input coal)
  Amount was scaled to the amount of reference product.
  properties: dry mass 0.94 kg, carbon content, fossil 0.845, water content 0.0638298, wet mass 1 kg
  note on carbon content, fossil: C content 75-94% (specified in Tab 1.1, report 6, part VI). A mean content of 0.845 kg C/ kg dry hard coal was considered
- hard coal ash: -0.00391607 kg; name amount_ash; lognormal variance with pedigree 0.092, pedigree (5,1,3,5,3)
  Calculated from mass balance
  Amount was scaled to the amount of reference product.
  production volume 6.18961e9 kg; = amount_ash/electricity*electricity_apv
    (same comment as for residue from cooling tower)
  property price 0 EUR2005; name amount_ash_price_EUR2005
  properties: wet mass 1 kg, dry mass 1 kg
- hard coal: 0 kg; pedigree (1,1,3,1,1)
  activityLink to ID

## Inputs from nature
- Water, cooling, unspecified natural origin [natural resource, in water]: 0.00290859 m3; name water_cooling_UNO_input; = ((recirculating_CS_fraction_from_allCS*WWithdrawal_EP_HC_recirculating_CS)+(once_through_andCP_CS_fractio_from_allCS*WWithdrawal_EP_HC_once_through_andCP_CS))/11.31*factor_MJ_kWh*(efficiency/3.6); lognormal variance with pedigree 0.098025, pedigree (4,4,4,2,4)
  Estimate based on literature
  Amount was scaled to the amount of reference product.
  Calculated based on literature (Scown, C.D., et al., 2011, Water Footprint of U.S. Trasportation Fuels;Scown, C.D., et al., 2011, Water Footprint of U.S. Trasportation Fuels (SI); Stiegel, 2008, Estimating Freshwater Needs to Meet Future Thermoelectric Generation Requirements; Floerke, M., 2009, Future changes of freshwater needs in the electricity production sector), (Vionnet, S., Quantis Water Database - Technical Report, 2012). Water use in this process is modelled based on literature (see references). The process boundaries are given by the boundaries of the power plant. The process ends when the energy (MJ) is produced and ready to be used for electricity production (kWh).
  Calculated based on literature data.

## Emissions to nature
- Uranium-238 [air, non-urban air or from high stacks]: 1.93339e-6 kBq; name uranium_238; lognormal variance with pedigree 0.382, pedigree (5,1,3,1,1)
  Calculated from trace element balance, input uncertain
  Amount was scaled to the amount of reference product.
- Lead-210 [air, non-urban air or from high stacks]: 8.98232e-6 kBq; name lead_210; lognormal variance with pedigree 0.382, pedigree (5,1,3,1,1)
  (same comment as for Uranium-238)
- Toluene [air, non-urban air or from high stacks]: 5.96996e-8 kg; name toluene; lognormal variance with pedigree 0.078025, pedigree (3,5,4,2,1)
  Based on available literature
  Amount was scaled to the amount of reference product.
- Polonium-210 [air, non-urban air or from high stacks]: 1.64311e-5 kBq; name polonium_210; lognormal variance with pedigree 0.382, pedigree (5,1,3,1,1)
  (same comment as for Uranium-238)
- Propene [air, non-urban air or from high stacks]: 8.76324e-9 kg; name propene; lognormal variance with pedigree 0.078025, pedigree (3,5,4,2,1)
  Based on available literature
  Amount was scaled to the amount of reference product.
- Vanadium [air, non-urban air or from high stacks]: 3.40671e-9 kg; name vanadium; lognormal variance with pedigree 0.732, pedigree (5,1,3,1,1)
  (same comment as for Uranium-238)
- Molybdenum [air, non-urban air or from high stacks]: 3.8613e-10 kg; name molybdenum; lognormal variance with pedigree 0.732, pedigree (5,1,3,1,1)
  (same comment as for Uranium-238)
- Mercury [air, non-urban air or from high stacks]: 2.13056e-9 kg; name mercury; lognormal variance with pedigree 0.732, pedigree (5,1,3,1,1)
  (same comment as for Uranium-238)
- Thorium-232 [air, non-urban air or from high stacks]: 7.28444e-7 kBq; name thorium_232; lognormal variance with pedigree 0.382, pedigree (5,1,3,1,1)
  (same comment as for Uranium-238)
- PAH, polycyclic aromatic hydrocarbons [air, non-urban air or from high stacks]: 5.47702e-10 kg; name pah; lognormal variance with pedigree 0.338025, pedigree (3,5,4,2,1)
  Based on available literature
  Amount was scaled to the amount of reference product.
- Butane [air, non-urban air or from high stacks]: 1.04063e-8 kg; name butane; lognormal variance with pedigree 0.078025, pedigree (3,5,4,2,1)
  Based on available literature
  Amount was scaled to the amount of reference product.
- Hydrogen chloride [air, non-urban air or from high stacks]: 1.67049e-5 kg; name hydrogen_chloride; lognormal variance with pedigree 0.202, pedigree (5,1,3,1,1)
  (same comment as for Uranium-238)
- Sulfur dioxide [air, non-urban air or from high stacks]: 0.000239346 kg; name sulfur_dioxide; source Itten R. 2012; lognormal variance with pedigree 0.004, pedigree (3,1,3,1,1)
  (same comment as for SOx retained, in hard coal flue gas desulfurisation)
- Antimony [air, non-urban air or from high stacks]: 3.12738e-10 kg; name antimony; lognormal variance with pedigree 0.732, pedigree (5,1,3,1,1)
  (same comment as for Uranium-238)
- Manganese [air, non-urban air or from high stacks]: 6.79151e-9 kg; name manganese; lognormal variance with pedigree 0.732, pedigree (5,1,3,1,1)
  (same comment as for Uranium-238)
- Radium-228 [air, non-urban air or from high stacks]: 8.6537e-7 kBq; name radium_228; lognormal variance with pedigree 0.382, pedigree (5,1,3,1,1)
  (same comment as for Uranium-238)
- Radium-226 [air, non-urban air or from high stacks]: 2.31678e-6 kBq; name radium_226; lognormal variance with pedigree 0.382, pedigree (5,1,3,1,1)
  (same comment as for Uranium-238)
- Lead [air, non-urban air or from high stacks]: 7.01059e-9 kg; name lead; lognormal variance with pedigree 0.732, pedigree (5,1,3,1,1)
  (same comment as for Uranium-238)
- Xylene [air, non-urban air or from high stacks]: 5.04982e-7 kg; name xylene; lognormal variance with pedigree 0.078025, pedigree (3,5,4,2,1)
  Based on available literature
  Amount was scaled to the amount of reference product.
- Selenium [air, non-urban air or from high stacks]: 7.39398e-9 kg; name selenium; lognormal variance with pedigree 0.732, pedigree (5,1,3,1,1)
  (same comment as for Uranium-238)
- Ethane [air, non-urban air or from high stacks]: 2.24558e-8 kg; name ethane; lognormal variance with pedigree 0.078025, pedigree (3,5,4,2,1)
  Based on available literature
  Amount was scaled to the amount of reference product.
- Nickel [air, non-urban air or from high stacks]: 4.25017e-9 kg; name nickel; lognormal variance with pedigree 0.732, pedigree (5,1,3,1,1)
  (same comment as for Uranium-238)
- Water [water, unspecified]: 0.000323121 m3; name water_to_water_unspecified; = (water_softened_input/1000)*(1-fraction_WCS_to_air)+(water_decarbonised_input/1000)*(1-fraction_WDC_to_air)+water_cooling_UNO_input*(1-fraction_CW_to_air)*(efficiency/3.6); lognormal variance with pedigree 0.0427, pedigree (2,2,3,1,1)
  Calculated value based on literature values and expert opinion. See comments in the parametres' comment field.
  property carbon content, non-fossil 0; name C_content_non_fossil
  property water in wet mass 1000 kg; name WWM
  property carbon content, fossil 0; name C_content_fossil
  property dry mass 0 kg; name DM
  property fraction, origin: unspecified 0.971604; name fraction_origin_unspecified_Ww
  property wet mass 1000 kg; name WM
  property fraction, origin: fresh water 0.0283958; name fraction_origin_fresh_water_Ww
  property fraction, origin: salt water 0; name fraction_origin_salt_water_Ww
- Benzo(a)pyrene [air, non-urban air or from high stacks]: 1.0954e-13 kg; name benzo_a_pyrene; lognormal variance with pedigree 0.078025, pedigree (3,5,4,2,1)
  Based on available literature
  Amount was scaled to the amount of reference product.
- Cumene [air, non-urban air or from high stacks]: 0 kg; name cumene; pedigree (1,1,3,1,1)
  Literature value/calculated value. Emissions when producing 1kWh of electricity from hard coal, based on the value for burning 1MJ of hard coal. Weighted average with electricity production data (Itten&Frischknecht 2012) and emission values of 14 countries
  (AT, BE, ES, FR, IT, NL, PT, DE, CZ, HR, PL, SK, CN, US) (Röder et al. 2007)
  Source:
  Itten R. and Frischknecht R. (2012) Life Cycle Inventories of Electricity Mixes and Grid. ESU-services Ltd., Uster, Switzerland.
- Particulates, > 2.5 um, and < 10um [air, non-urban air or from high stacks]: 1.33092e-6 kg; name particulates_2_5_to_10; source Itten R. 2012; lognormal variance with pedigree 0.202, pedigree (5,1,3,1,1)
  (same comment as for SOx retained, in hard coal flue gas desulfurisation)
- Furan [air, non-urban air or from high stacks]: 0 kg; name furan; pedigree (1,1,3,1,1)
  Literature value/calculated value. Emissions when producing 1kWh of electricity from hard coal, based on the value for burning 1MJ of hard coal. Weighted average with electricity production data (Itten&Frischknecht 2012) and emission values of 14 countries
  (AT, BE, ES, FR, IT, NL, PT, DE, CZ, HR, PL, SK, CN, US) (Röder et al. 2007)
  Country emissions values based on literature.
  Source:
  Itten R. and Frischknecht R. (2012) Life Cycle Inventories of Electricity Mixes and Grid. ESU-services Ltd., Uster, Switzerland.
- Water [air, unspecified]: 8.74265e-6 m3; name water_to_air_unspecified; = (water_softened_input/1000)*fraction_WCS_to_air+(water_decarbonised_input/1000)*fraction_WDC_to_air+water_cooling_UNO_input*fraction_CW_to_air*(efficiency/3.6); lognormal variance with pedigree 0.0427, pedigree (2,2,3,1,1)
  (same comment as for Water)
  property fraction, origin: unspecified 0.966193; name fraction_origin_unspecified
  property fraction, origin: fresh water 0.0338067; name fraction_origin_fresh_water
  property fraction, origin: salt water 0; name fraction_origin_salt_water
- Carbon dioxide, fossil [air, non-urban air or from high stacks]: 0.0509363 kg; name carbon_dioxide_fossil; lognormal variance with pedigree 0.004, pedigree (3,1,3,1,1)
  Based on available literature
  Amount was scaled to the amount of reference product.
- Cyanide [air, non-urban air or from high stacks]: 0 kg; name cyanide; pedigree (1,1,3,1,1)
  (same comment as for Cumene)
- Potassium-40 [air, non-urban air or from high stacks]: 2.20724e-6 kBq; name potassium_40; lognormal variance with pedigree 0.382, pedigree (5,1,3,1,1)
  (same comment as for Uranium-238)
- Dinitrogen monoxide [air, non-urban air or from high stacks]: 2.73851e-7 kg; name dinitrogen_monoxide; lognormal variance with pedigree 0.072025, pedigree (3,4,4,2,1)
  Based on available literature
  Amount was scaled to the amount of reference product.
- Iodine [air, non-urban air or from high stacks]: 1.59929e-7 kg; name iodine; lognormal variance with pedigree 0.202, pedigree (5,1,3,1,1)
  (same comment as for Uranium-238)
- Beryllium [air, non-urban air or from high stacks]: 0 kg; name beryllium; pedigree (1,1,3,1,1)
  (same comment as for Cumene)
- Actinides, radioactive, unspecified [air, non-urban air or from high stacks]: 0 kBq; name actinides_radioactive_unspecified; pedigree (1,1,3,1,1)
  (same comment as for Furan)
- Benzene, ethyl- [air, non-urban air or from high stacks]: 0 kg; name benzene_ethyl; pedigree (1,1,3,1,1)
  (same comment as for Cumene)
- Copper [air, non-urban air or from high stacks]: 3.69151e-9 kg; name copper; lognormal variance with pedigree 0.732, pedigree (5,1,3,1,1)
  (same comment as for Uranium-238)
- Ethane, 1,2-dichloro- [air, non-urban air or from high stacks]: 0 kg; name ethane_dichloro; pedigree (1,1,3,1,1)
  (same comment as for Furan)
- Benzene [air, non-urban air or from high stacks]: 1.18851e-7 kg; name benzene; lognormal variance with pedigree 0.078025, pedigree (3,5,4,2,1)
  Based on available literature
  Amount was scaled to the amount of reference product.
- Radon-222 [air, non-urban air or from high stacks]: 0.000356007 kBq; name radon_222; lognormal variance with pedigree 0.382, pedigree (5,1,3,1,1)
  (same comment as for Uranium-238)
- Ethane, 1,1,1-trichloro-, HCFC-140 [air, non-urban air or from high stacks]: 0 kg; name ethane_trichloro; pedigree (1,1,3,1,1)
  (same comment as for Furan)
- Aldehydes, unspecified [air, non-urban air or from high stacks]: 0 kg; name aldehydes_unspecified; pedigree (1,1,3,1,1)
  (same comment as for Furan)
- Chromium VI [air, non-urban air or from high stacks]: 1.41855e-10 kg; name chromium_vi; lognormal variance with pedigree 0.482, pedigree (1,1,3,1,1)
  based on range of data
  Amount was scaled to the amount of reference product.
- Methane, fossil [air, non-urban air or from high stacks]: 5.47702e-7 kg; name methane_fossil; lognormal variance with pedigree 0.072025, pedigree (3,4,4,2,1)
  Based on available literature
  Amount was scaled to the amount of reference product.
- Radon-220 [air, non-urban air or from high stacks]: 0.000200459 kBq; name radon_220; lognormal variance with pedigree 0.382, pedigree (5,1,3,1,1)
  (same comment as for Uranium-238)
- Ethene, tetrachloro- [air, non-urban air or from high stacks]: 0 kg; name ethene_tetrachloro; pedigree (1,1,3,1,1)
  (same comment as for Furan)
- Hydrogen fluoride [air, non-urban air or from high stacks]: 1.49523e-6 kg; name hydrogen_fluoride; lognormal variance with pedigree 0.202, pedigree (5,1,3,1,1)
  (same comment as for Uranium-238)
- Cobalt [air, non-urban air or from high stacks]: 6.79151e-10 kg; name cobalt; lognormal variance with pedigree 0.732, pedigree (5,1,3,1,1)
  (same comment as for Uranium-238)
- Carbon monoxide, fossil [air, non-urban air or from high stacks]: 4.38162e-6 kg; name carbon_monoxide_fossil; lognormal variance with pedigree 0.672025, pedigree (3,4,4,2,1)
  Based on available literature
  Amount was scaled to the amount of reference product.
- Barium [air, non-urban air or from high stacks]: 1.2871e-8 kg; name barium; lognormal variance with pedigree 0.732, pedigree (5,1,3,1,1)
  (same comment as for Uranium-238)
- Hydrocarbons, aliphatic, alkanes, unspecified [air, non-urban air or from high stacks]: 1.19947e-7 kg; name hydrocarbons_al_al_unspec; lognormal variance with pedigree 0.078025, pedigree (3,5,4,2,1)
  Based on available literature
  Amount was scaled to the amount of reference product.
- Chloroform [air, non-urban air or from high stacks]: 0 kg; name chloroform; pedigree (1,1,3,1,1)
  (same comment as for Cumene)
- Propane [air, non-urban air or from high stacks]: 1.91696e-8 kg; name propane; lognormal variance with pedigree 0.078025, pedigree (3,5,4,2,1)
  Based on available literature
  Amount was scaled to the amount of reference product.
- Acrolein [air, non-urban air or from high stacks]: 0 kg; name acrolein; pedigree (1,1,3,1,1)
  (same comment as for Furan)
- Particulates, > 10 um [air, non-urban air or from high stacks]: 3.40671e-6 kg; name particulates_gt10; source Itten R. 2012; lognormal variance with pedigree 0.122, pedigree (5,1,3,1,1)
  (same comment as for SOx retained, in hard coal flue gas desulfurisation)
- Particulates, < 2.5 um [air, non-urban air or from high stacks]: 1.13374e-5 kg; name particulates_lt2_5; source Itten R. 2012; lognormal variance with pedigree 0.382, pedigree (5,1,3,1,1)
  (same comment as for SOx retained, in hard coal flue gas desulfurisation)
- Strontium [air, non-urban air or from high stacks]: 1.27067e-8 kg; name strontium; lognormal variance with pedigree 0.732, pedigree (5,1,3,1,1)
  (same comment as for Uranium-238)
- Dioxins, measured as 2,3,7,8-tetrachlorodibenzo-p-dioxin [air, non-urban air or from high stacks]: 3.83392e-15 kg; name dioxins; lognormal variance with pedigree 0.338025, pedigree (3,5,4,2,1)
  Based on available literature
  Amount was scaled to the amount of reference product.
- Carbon disulfide [air, non-urban air or from high stacks]: 0 kg; name carbon_disulfide; pedigree (1,1,3,1,1)
  (same comment as for Cumene)
- Arsenic [air, non-urban air or from high stacks]: 4.85264e-9 kg; name arsenic; lognormal variance with pedigree 0.732, pedigree (5,1,3,1,1)
  (same comment as for Uranium-238)
- Bromine [air, non-urban air or from high stacks]: 3.12738e-7 kg; name bromine; lognormal variance with pedigree 0.202, pedigree (5,1,3,1,1)
  (same comment as for Uranium-238)
- Zinc [air, non-urban air or from high stacks]: 1.82385e-8 kg; name zinc; lognormal variance with pedigree 0.732, pedigree (5,1,3,1,1)
  (same comment as for Uranium-238)
- Cadmium [air, non-urban air or from high stacks]: 1.80194e-10 kg; name cadmium; lognormal variance with pedigree 0.732, pedigree (5,1,3,1,1)
  (same comment as for Uranium-238)
- Chromium [air, non-urban air or from high stacks]: 1.1447e-9 kg; name chromium; lognormal variance with pedigree 0.732, pedigree (5,1,3,1,1)
  (same comment as for Uranium-238)
- Formaldehyde [air, non-urban air or from high stacks]: 3.17667e-8 kg; name formaldehyde; lognormal variance with pedigree 0.078025, pedigree (3,5,4,2,1)
  Based on available literature
  Amount was scaled to the amount of reference product.
- Thorium-228 [air, non-urban air or from high stacks]: 4.64999e-7 kBq; name throium_228; lognormal variance with pedigree 0.382, pedigree (5,1,3,1,1)
  (same comment as for Uranium-238)
- Nitrogen oxides [air, non-urban air or from high stacks]: 9.47525e-5 kg; name nitrogen_oxides; source Itten R. 2012; lognormal variance with pedigree 0.044, pedigree (3,1,3,1,1)
  (same comment as for SOx retained, in hard coal flue gas desulfurisation)
- Pentane [air, non-urban air or from high stacks]: 8.05123e-8 kg; name pentane; lognormal variance with pedigree 0.078025, pedigree (3,5,4,2,1)
  Based on available literature
  Amount was scaled to the amount of reference product.
- Boron [air, non-urban air or from high stacks]: 1.16661e-7 kg; name boron; lognormal variance with pedigree 0.732, pedigree (5,1,3,1,1)
  (same comment as for Uranium-238)
- Hydrocarbons, aliphatic, unsaturated [air, non-urban air or from high stacks]: 1.18304e-7 kg; name hydrocarbons_aliphatic_unsaturated; lognormal variance with pedigree 0.078025, pedigree (3,5,4,2,1)
  Based on available literature
  Amount was scaled to the amount of reference product.
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
## Sampling procedure
literature and statistics

## Extrapolations
Original emission data from 1993 have been updated for the years 2000 (v1.0), and 2004-2005 (v2.0). Uncertainty was adjusted accordingly.

Most of the exchanges were extrapolated through production-weighted averages of the datasets of the following 14 countries: AT, BE, ES, FR, IT, NL, PT, DE, CZ, HR, PL, SK, CN, US.

## Review by Carl Vadenbo 2015-07-02
The update of the whole electricity sector for the ecoinvent v3.2 database consist of hundreds of datasets. All these datasets have passed through a streamlined review processes where the underlying modelling of production volumes, technology shares and efficiencies was reviewed in detail prior to the datasets being submitted to the database.
