# isophthalic acid based unsaturated polyester resin production

Dataset: EcoSpold 2, unit process
Geography: RoW
Time period: 2013-01-01 to 2019-12-31
Technology level: current
Classification: ISIC rev.4 ecoinvent: 2013:Manufacture of plastics and synthetic rubber in primary forms
Synonyms: UP resin
Scenario: Business-as-Usual
System model: Allocation at the point of substitution
Generated by: Etienne LEES-PERASSO
Published in: Eelco Rietveld 2014
Database: ecoinvent
isCopyrightProtected: true
accessRestrictedTo: 1

## General comment
This dataset represents the production of unsaturated polyester resins (UPR).
This resin belongs to the unsaturated polyester composite resin category. They are often used as matrix for composite materials, when applied on glass fibre or natural fibres (ex: flax).
The perimeter of this data includes the manufacturing of the resin from raw materials.

Resin type is Isophthalic acid (ISO) based unsaturated polyester resin (UPR).
Typical characteristics:
Appearance: Homogeneous liquid resin.
Main applications: Marine.
Other possible applications: Swimming pool.
Specific weight at 20 °C: 1,10g/cm3
Viscosity (mPa.s): V25 - Brookfield at 23 oC, Spindle Speed 50rpm: 550-650.
Solid content (%) PC53: 50-54.
They are among the most used thermoset resins. They have uses in many applications. The Isophthtalic resins have better mecanical and chemical properties than orthophthalic acid based resin, and are used for more specific purposes.
The use of one resin over another depends on the user required physical caracteristics.
Data for the life cycle inventory for this resin were primarly taken from the Ernst & Young Report: "Life cycle assessment of four generic unsaturated polyester (UP) resins and one vinyl ester (VE) resins", Revised version, September 2014. The following companies participated in the study: Reichhold, Polynt Composites, Ashland Performance Materials.

## Included activities start
Cradle to gate. This activity starts with the raw materials delivery at the manufacturing plant gate.

## Included activities end
Cradle to gate. This activity ends with the isophthalic acid based unsaturated polyester resin at the manufacturing plant gate. Packaging is not included.

## Geography
Based on the average production of three European producers: Polynt Composites, Reichhold and Ashland, representing a significant part of the European production. Extrapolated to a global production, based on similar manufacturing technology.

## Technology
This resin is manufactured from styrene, maleic anhydrid, isophtalic acid, propylene glycol and di ethylene glycol.
Resin manufacturing process. Source : "Life cycle assessment of four generic unsaturated polyester (UP) resins and one vinyl ester (VE) resins", Revised version, September 2014, Ernst & Young Accountants
Not included in this dataset, there are different shaping solutions for this resin in order to obtain a usable, finished or semi-finished product. The most common are sheet molding compound (SMC) and bulk moulding compound (BMC). It can be reinforced with fibres, such as glass fibre, in order to modify its mecanical properties and allow new uses.

## Reference product
- isophthalic acid based unsaturated polyester resin: 1 kg; By-product classification allocatable product; CPC 34740: Polyacetals, other polyethers and epoxide resins, in primary forms; polycarbonates, alkyd resins, polyallyl es[…]
  This resin belongs to the unsaturated polyester composite resin category. They are often used as matrix for composite materials, when applied on glass fibre or natural fibres (ex: flax). Typical characteristics: Appearance: Homogeneous liquid resin. Main applications: Marine. Other possible applications: Swimming pool. Specific weight at 20 °C: 1,10g/cm3 Viscosity (mPa.s): V25 - Brookfield at 23 oC, Spindle Speed 50rpm: 550-650. Solid content (%) PC53: 50-54. They are among the most used thermoset resins. They have uses in many applications. The Isophthtalic resins have better mecanical and chemical properties than orthophthalic acid based resin, and are used for more specific purposes. The use of one resin over another depends on the user required physical caracteristics.
  production volume 9.75e8 kg; = 4500000000/4
    Global production of UPR resins in 2013. No distinction could be made between the different UPR resin as no more specific data was available. 1/4 of the total production volume has been allocated to each resin.
  property price 1.31524 EUR2005
    Calculated based on inputs: The price of the product has been calculated as a sum of the values of the material and energy inputs for this product. This value is therefore a rough estimation. It may underestimate the real price since there are additional expenses when producing any product. These expences can include for example labour costs, treatment of waste materials and profit for the producer. Please consider carefully whether this level of data quality is acceptable for your application.
  property carbon content 0.712854
    carbon content on a dry matter basis (reserved; not for manual entry)
  property true value 1.31524
    allocation property applied in "true value" allocation // value calculated from revenue
  properties: dry mass 1 kg, wet mass 1 kg, water in wet mass 0 kg, carbon content, non-fossil 0, water content 0, carbon content, fossil 0.712854, carbon allocation 0.712854 kg

## By-products
- heat, for reuse in municipal waste incineration only: 0 MJ; CPC 17300: Steam and hot water; By-product classification allocatable product; pedigree (1,1,1,1,1)
  Net electricity generated from this waste and used in internal MSWI plant energy redistribution.
  Uncertainty: uncertainty is calculated from uncertainties in waste composition and uncertainties in energy efficiency and the uncertainty in internal energy demand
  production volume 60244.5 MJ
  property exergy 0.1842 MJ; name E_th_prod_MSWI_exergy
    This exergy property is based on the exergy content of the product.
  property price 0.0106 EUR2005; name E_th_prod_MSWI_price_EUR2005
    Average European district heat price from Ecoheatcool and Euroheat 2005-2006, Ecoheat Work package 1: The European heat market. Final report. 10.6 EUR/GJ i s the price of district heat. http://www.solarthermalworld.org/files/Ecoheatcool%20WP1%20Web.pdf?download
  property true value relation 0.1842; name E_th_prod_MSWI_true_value_relation
    property to calculate "true value" from
  property true value 4.0804e-7
    allocation property applied in "true value" allocation // value calculated from true value relation
- electricity, for reuse in municipal waste incineration only: 0 kWh; CPC 17100: Electrical energy; By-product classification allocatable product; pedigree (1,1,1,1,1)
  (same comment as for heat, for reuse in municipal waste incineration only)
  production volume 8158.8 kWh
  property price 0.1 EUR2005; name E_el_prod_MSWI_price_EUR2005
    Estimated to be the same price as in case of electricity, medium voltage.
  property exergy 3.6 MJ; name E_el_prod_MSWI_exergy
    This exergy property is based on the exergy content of the product.
  property true value relation 3.6; name E_el_prod_MSWI_true_value_relation
    property to calculate "true value" from
  property true value 1.07999e-6
    (same comment as for heat, for reuse in municipal waste incineration only)
- iron scrap, sorted, pressed: 0 kg; By-product classification Recyclable; CPC 39310: Slag, dross, scalings and other waste from the manufacture of iron or steel; pedigree (1,1,1,1,1)
  metallic iron scrap removed from ash reamains and recycled.
  Uncertainty: uncertainty is calculated from uncertainties in waste composition and transfer coefficients to soild residues
  production volume 1084.49 kg
  property price 0.175 EUR2005
    Temporary price data. Calculated as 90% of purchasers price based on: 2005 import and export prices (total trades (USD) divided by total weight (kg) in biggest economies of the world: EU27, USA, Brasil, China, India, Japan and Russia) from UN Commodity Trade Statistics Database (http://data.un.org/Explorer.aspxDatabase [Accessed 2011.06.20]). Commodity: Waste or scrap, of cast iron
  property carbon content 0
    carbon content on a dry matter basis (reserved; not for manual entry)
  property true value 1.80595e-7
    allocation property applied in "true value" allocation // value calculated from revenue
  properties: carbon content, non-fossil 0, wet mass 1 kg, dry mass 1 kg, water content 0, carbon content, fossil 0, water in wet mass 0 kg, carbon allocation 0 kg
- copper: 0 kg; source Rentz O. 1999; By-product classification allocatable product; CPC 41413: Refined copper and copper alloys, unwrought; master alloys of copper
  Literature value. Copper uses: Before end-use copper is manufactured into semi fabricated products, such as shapes and ingots (known as 'semis'). These manufacturing processes are subdivided into hot working, cold working and, if necessary, process annealing. Few of the semis are ready for use as such. They more typically travel to first-stage manufacturers, who make metal rods, wire, and casting, and then to component manufacturers who produce such things as motors, valves, and insulated cables The components in turn are incorporated by final-stage manufacturers into a variety of finished products - automobiles, commercial buildings, residential housing, and so forth. These uses account for about 79% of the world-wide consumption of copper.
  production volume 34.9459 kg
  property price 5.52 EUR2005
    Literature value (http://www.economist.com/news/business/21576714-mining-industry-has-enriched-chile-its-future-precarious-copper-solution). Average price between 20015 and 2013.
  property carbon content 0
    carbon content on a dry matter basis (reserved; not for manual entry)
  property true value 1.81321e-7
    allocation property applied in "true value" allocation // value calculated from revenue
  properties: dry mass 1 kg, water in wet mass 0 kg, wet mass 1 kg, carbon content, non-fossil 0, water content 0, carbon content, fossil 0, carbon allocation 0 kg
- zinc concentrate: 0 kg; CPC 14290: Other non-ferrous metal ores and concentrates (other than uranium or thorium ores and concentrates); By-product classification allocatable product
  Calculated value from the knowledge of the properties of both products.
  production volume 2.77375e-8 kg
  property price 0.38 EUR2005; name ByP_price_EUR2005
    Temporary price data. Calculated as 90% of purchasers price based on: Zinc content in concentrate 53%. Concentrate price per kg Zn 86.5% of refined Zn price (13.5% treatment charges according to CHR Metals Limited 2005: Dynamic cost curves. http://www.minecost.com/dynamic.pdf). 2004 zinc price from USGS (2007) Mineral commodity summaries 2007. <http://minerals.usgs.gov/minerals/pubs/mcs/2007/mcs2007.pdf> [Accessed 25 May 2010]
  property zinc content 0.53; name zinc_C_zinc_concentrate
    Zinc content on a dry matter basis. Value taken from teh "zinc mine operation" /GLO dataset.
  property dry mass 1 kg; name DM_zinc_concentrate
  property carbon content 0
    carbon content on a dry matter basis (reserved; not for manual entry)
  property true value 9.90747e-18
    allocation property applied in "true value" allocation // value calculated from revenue
  properties: wet mass 1 kg, water content 0, carbon content, non-fossil 0, carbon content, fossil 0, water in wet mass 0 kg, carbon allocation 0 kg
- iron scrap, unsorted: 0 kg; source European Aluminium Association 2008; CPC 39310: Slag, dross, scalings and other waste from the manufacture of iron or steel; By-product classification Recyclable; pedigree (1,1,1,1,1)
  production volume 0.0286912 kg
  property price 0.149 EUR2005; name ironScrapAmount_price_EUR2005
    Temporary price data. Calculated as 90% of purchasers price based on: estimated at 85% of sorted scrap
  property carbon content 0
    carbon content on a dry matter basis (reserved; not for manual entry)
  property true value 4.37464e-12
    allocation property applied in "true value" allocation // value calculated from revenue
  properties: water in wet mass 0 kg, water content 0, carbon content, fossil 0, carbon content, non-fossil 0, dry mass 1 kg, wet mass 1 kg, carbon allocation 0 kg
- aluminium oxide, non-metallurgical: 0 kg; source European Aluminium Association 2008; CPC 41432: Alumina (aluminium oxide), except artificial corundum; By-product classification allocatable product; CAS 1344-28-1; pedigree (1,1,1,1,1)
  production volume 1.80543 kg
  property carbon content, non-fossil 0; name C_content_non_fossil
  property price 0.28 EUR2005; name Al2O3Amount_price_EUR2005
    From UN trade database. http://data.un.org/ Import data from the largest economies of the world are used (Brazil, India, USA, China, Japan and EU-27).
  property dry mass 1 kg; name DM
  property water content 0; name water_content
  property wet mass 1 kg; name WM
  property water in wet mass 0 kg; name WWM
  property carbon content, fossil 0; name C_content_fossil
  property carbon content 0
    carbon content on a dry matter basis (reserved; not for manual entry)
  property true value 5.17304e-10
    allocation property applied in "true value" allocation // value calculated from revenue
  properties: carbon allocation 0 kg
- aluminium, cast alloy: 0 kg; source European Aluminium Association 2008; By-product classification allocatable product; CPC 41431: Unwrought aluminium; pedigree (1,1,1,1,1)
  EcoSpold01Location=RER
  production volume 16.8768 kg
  property price 1.3 EUR2005; name castAlloyAmount_price_EUR2005
    Temporary price data. Calculated as 90% of purchasers price based on: Source: London Metal Exchange, Aluminium alloy price for 2005
  property carbon content 0
    carbon content on a dry matter basis (reserved; not for manual entry)
  property true value 2.24512e-8
    allocation property applied in "true value" allocation // value calculated from revenue
  properties: water in wet mass 0 kg, carbon content, non-fossil 0, water content 0, dry mass 1 kg, carbon content, fossil 0, wet mass 1 kg, carbon allocation 0 kg
- aluminium, wrought alloy: 0 kg; source European Aluminium Association 2008; By-product classification allocatable product; CPC 4153: Semi-finished products of aluminium or aluminium alloys; pedigree (1,1,1,1,1)
  production volume 7.38833 kg
  property price 1.44 EUR2005; name secondaryAluminiumOutput_price_EUR2005
    Estimated based on literature values and expert judgement. Aluminium ccast alloys are about 90% of the price of aluminium wrought alloys.
  property carbon content 0
    carbon content on a dry matter basis (reserved; not for manual entry)
  property true value 1.08872e-8
    allocation property applied in "true value" allocation // value calculated from revenue
  properties: wet mass 1 kg, water content 0, carbon content, fossil 0, water in wet mass 0 kg, carbon content, non-fossil 0, dry mass 1 kg, carbon allocation 0 kg

## Inputs from technosphere
- hazardous waste, for incineration: -1.4e-6 kg; lognormal variance with pedigree 0.0038, pedigree (2,3,1,5,1)
  production volume 1365 kg; = Ref('7cb122d5-df62-45a0-8cdb-80c912c8908f', 'ProductionVolume') * ((Ref('a8aee19e-4504-438b-92b1-8b46687c4750')*-1) / Ref('7cb122d5-df62-45a0-8cdb-80c912c8908f'))
    Calculated from production volume of reference product using the relative outputs.
  properties: water content 0.333333, carbon content, fossil 0.554667, dry mass 0.75 kg, wet mass 1 kg
  note on carbon content, fossil: Tab A.6, ecoinvent v2.2 report 13_I. C content has been calculated after data in the tables, and then referred to 1 kg DM
- electricity, low voltage: 0 kWh; pedigree (1,1,1,1,1)
  Value based on data from three producers.
- diethylene glycol: 0.0699999 kg; name DIETHYL; lognormal variance with pedigree 0.0346, pedigree (1,3,1,5,1)
  Value based on data from three producers.
  properties: dry mass 1 kg, wet mass 1 kg, carbon content, fossil 0.45283
- propylene glycol, liquid: 0.2 kg; name PROPYL; lognormal variance with pedigree 0.0032, pedigree (1,3,1,5,1)
  Value based on data from three producers.
  properties: carbon content, fossil 0.473684, dry mass 1 kg, wet mass 1 kg
- steam, in chemical industry: 0.639999 kg; lognormal variance with pedigree 0.0032, pedigree (1,3,1,5,1)
  Value based on data from three producers.
- maleic anhydride: 0.16 kg; lognormal variance with pedigree 0.0032, pedigree (1,3,1,5,1)
  properties: carbon content, fossil 0.489955, wet mass 1 kg, dry mass 1 kg
- heat, district or industrial, other than natural gas: 0.25891 MJ; lognormal variance with pedigree 0.0032, pedigree (1,3,1,5,1)
  Based on a calorific value of 12.4 kWh/kg. Activity link has been defined as the ratio between heat from natural gas and heavy fuel oil iw known.
  properties: corresponding fuel use, propane, furnace >100kW 1.05263 MJ
  note on corresponding fuel use, propane, furnace >100kW: Lower heating value of the fuel input related to the heat/electricity output, taken directly from ecoinvent v3.0 dataset "heat production, natural gas, at industrial furnace >100kW, GLO 2000".
- styrene: 0.399999 kg; name STYR; lognormal variance with pedigree 0.0032, pedigree (1,3,1,5,1)
  Value based on data from three producers.
  properties: wet mass 1 kg, dry mass 1 kg, carbon content, fossil 0.923077
- purified terephthalic acid: 0.24 kg; name ISO; lognormal variance with pedigree 0.0346, pedigree (1,3,1,5,1)
  Value based on data from three producers.
  properties: carbon content, fossil 0.578313, dry mass 1 kg, wet mass 1 kg
- municipal solid waste: 0 kg; pedigree (1,1,1,1,1)
  production volume 0 kg
    Calculated from production volume of reference product using the relative outputs.
  properties: dry mass 0.771 kg, wet mass 1 kg, carbon content, fossil 0.171549, carbon content, non-fossil 0.261655, water content 0.297017
  note on carbon content, fossil: MSW composition in tab 4.1, ecoinvent v2.2 report 13_I. C content referred to 1 kg DM
- heat, district or industrial, natural gas: 0.850499 MJ; lognormal variance with pedigree 0.0032, pedigree (1,3,1,5,1)
  Based on a calorific value of 10.5 kWh/m3. Activity link has been defined as the ratio between heat from natural gas and heavy fuel oil iw known.
- chemical factory, organics: 3.99999e-10 unit; lognormal variance with pedigree 0.478, pedigree (4,5,5,5,5)
  Estimation. Data was estimated based on the dataset "chemical plant, organics". This module assumes a built area of about 4.2 ha, an average output of 50'000 t/a, and plant life of fifty years.
- wastewater, average: -1.991e-5 m3; lognormal variance with pedigree 0.0038, pedigree (2,3,1,5,1)
  production volume 19412.2 m3; = Ref('7cb122d5-df62-45a0-8cdb-80c912c8908f', 'ProductionVolume') * ((Ref('4eb65cac-aa5f-4db1-81b0-88e81f9458c3')*-1) / Ref('7cb122d5-df62-45a0-8cdb-80c912c8908f'))
    Calculated from production volume of reference product using the relative outputs.
  properties: water content 2882.2, dry mass 0.346837 kg, wet mass 1000 kg, carbon content, non-fossil 0.194039
  note on carbon content, non-fossil: 0.0673 kg TOC/m3 (Tab A.17, ecoinvent v2.2 report 13_I). TOC was considered as Total Carbon.
- nitrogen, liquid: 0.0362699 kg; lognormal variance with pedigree 0.0032, pedigree (1,3,1,5,1)
  Value based on data from three producers.
  properties: wet mass 1 kg, dry mass 1 kg
- electricity, low voltage: 0.00126489, 0.000221845, 0.00364803, 0.0551688, 0.00909358, 0.0259028 kWh (6 entries); lognormal variance with pedigree 0.0032, pedigree (1,3,1,5,1)
  Value based on data from three producers.
- municipal solid waste: -4.74005e-7, -1.19437e-7, -1.70683e-7, -0.000335235 kg (4 entries); lognormal variance with pedigree 0.0038, pedigree (2,3,1,5,1)
  production volume 327600 kg

## Emissions to nature
- Water [air, unspecified]: 6.99999e-5 m3; lognormal variance with pedigree 0.0506, pedigree (4,3,1,5,1)
  Estimation based on the hypothesis that all condensating water is evaporating.
- Nitrogen [air, unspecified]: 0.0362699 kg; lognormal variance with pedigree 0.0506, pedigree (4,3,1,5,1)
  Estimation based on the hypothesis that all used nitrogen is emitted to air.

## Sampling procedure
The data come from three different European producers. The average values have been used.

## Extrapolations
The infrastructure impacts have been assessed based on chemical industry average infrastructure, as no specific data was available.
