# heavy fuel oil, burned in refinery furnace

Dataset: EcoSpold 2, unit process
Geography: RoW
Time period: 1980-01-01 to 2019-12-31
Technology level: current
Classification: ISIC rev.4 ecoinvent: 3530a: Steam and air conditioning supply based on liquid fuels
Classification: EcoSpold01Categories: oil/heating systems
Synonyms: HFO
Scenario: Business-as-Usual
System model: Allocation at the point of substitution
Share of production covered: 100 %
Generated by: Tereza Levova
Published in: Jungbluth, N. 2007
Database: ecoinvent
isCopyrightProtected: true
accessRestrictedTo: 1

## General comment
Description of the direct emissions due to the combustion of heavy fuel oil in refinery furnaces and generators not including the infrastructure of the furnace.

## Included activities end
Consumption of heavy fuel oil and combustion emissions.

## Geography
Data are weighted average of Swiss and European datasets.

## Technology
Average technology in use.

## Time period
New Swiss data for regulated emissions CO2, NOx, SOx, Ni and V have been provided by the refineries. They have been compared and discussed with older literature data. European data have been used for other emissions.

## Parameters
- production volume country 01: 3.37596e8; name PV_01_CH; lognormal variance with pedigree 0.0095, pedigree (4,3,2,3,1)
  Calculated value based on another ecoinvent dataset; "heavy fuel oil, burned in refinery furnace, CH".
- production volume country 02: 2.1017e10; name PV_02_RER; lognormal variance with pedigree 0.0095, pedigree (4,3,2,3,1)
  Calculated value based on another ecoinvent dataset; "heavy fuel oil, burned in refinery furnace, RER".

## Reference product
- heavy fuel oil, burned in refinery furnace: 1 MJ; CPC 17300: Steam and hot water; By-product classification allocatable product
  EcoSpold01Location=CH
  production volume 1.03005e11 MJ; = 21016720350*(1/0.169)
    47 thousand tonnes of heavy fuel oil were burned in 2000.
    Calculated from an input of 4.6E+9 kg crude petroleum and the corresponding output relations of the dataset.
    Extrapolated from the RER production data. IEA statistics from 2009 show that RER production constitutes 16.9% of global production.
  property price 0.0033534 EUR2005
    Calculated based on inputs: The price of the product has been calculated as a sum of the values of the material and energy inputs for this product. This value is therefore a rough estimation. It may underestimate the real price since there are additional expenses when producing any product. These expences can include for example labour costs, treatment of waste materials and profit for the producer. Please consider carefully whether this level of data quality is acceptable for your application.
  property carbon content 0.849
    carbon content on a dry matter basis (reserved; not for manual entry)
  properties: carbon content, fossil 0.849, carbon content, non-fossil 0, water content 0, water in wet mass 0 kg, dry mass 0.0242718 kg, wet mass 0.0242718 kg, carbon allocation 0.0206068 kg

## Inputs from technosphere
- heavy fuel oil: 0.0243 kg; = ((0.0243*PV_01_CH)+(0.0243*PV_02_RER))/(PV_01_CH+PV_02_RER); lognormal variance with pedigree 0.042, pedigree (1,1,5,5,1)
  This product is consumed where it is produced,which is why a direct activity link is created.
  EcoSpold01Location=CH
  Uncertainty: Input
  properties: wet mass 1 kg, carbon content, fossil 0.849, dry mass 1 kg

## Emissions to nature
- Nickel [air, urban air close to ground]: 4.53126e-7 kg; = ((4.61E-07*PV_01_CH)+(4.53E-07*PV_02_RER))/(PV_01_CH+PV_02_RER); lognormal variance with pedigree 0.162, pedigree (1,1,5,5,1)
  Literature data
- Cobalt [air, urban air close to ground]: 4.804e-8 kg; = ((1.94E-08*PV_01_CH)+(4.85E-08*PV_02_RER))/(PV_01_CH+PV_02_RER); lognormal variance with pedigree 0.706, pedigree (3,4,5,5,1)
  Literature data
  Uncertainty: Literature data
- Chromium [air, urban air close to ground]: 2.37346e-8 kg; = ((7.21E-09*PV_01_CH)+(2.4E-08*PV_02_RER))/(PV_01_CH+PV_02_RER); lognormal variance with pedigree 0.706, pedigree (3,4,5,5,1)
  Literature data
  Uncertainty: Literature data
- Iron [air, urban air close to ground]: 2.43e-7 kg; = ((2.43E-07*PV_01_CH)+(2.43E-07*PV_02_RER))/(PV_01_CH+PV_02_RER); lognormal variance with pedigree 0.096, pedigree (3,4,5,5,1)
  Literature data
  Uncertainty: Literature data
- Nitrogen oxides [air, urban air close to ground]: 0.000132344 kg; = ((0.000216*PV_01_CH)+(0.000131*PV_02_RER))/(PV_01_CH+PV_02_RER); lognormal variance with pedigree 0.322, pedigree (1,1,5,5,1)
  Literature data
- Molybdenum [air, urban air close to ground]: 2.41071e-8 kg; = ((1.21E-08*PV_01_CH)+(2.43E-08*PV_02_RER))/(PV_01_CH+PV_02_RER); lognormal variance with pedigree 0.706, pedigree (3,4,5,5,1)
  Literature data
  Uncertainty: Literature data
- Methane, fossil [air, urban air close to ground]: 4.85e-6 kg; = ((4.85E-06*PV_01_CH)+(4.85E-06*PV_02_RER))/(PV_01_CH+PV_02_RER); lognormal variance with pedigree 0.096, pedigree (3,4,5,5,1)
  Literature data
  Uncertainty: Literature data
- Cadmium [air, urban air close to ground]: 4.82328e-8 kg; = ((3.16E-08*PV_01_CH)+(4.85E-08*PV_02_RER))/(PV_01_CH+PV_02_RER); lognormal variance with pedigree 0.706, pedigree (3,4,5,5,1)
  Literature data
  Uncertainty: Literature data
- Mercury [air, urban air close to ground]: 1.46e-10 kg; = ((1.46E-10*PV_01_CH)+(1.46E-10*PV_02_RER))/( PV_01_CH+PV_02_RER); lognormal variance with pedigree 0.706, pedigree (3,4,5,5,1)
  Literature data
  Uncertainty: Literature data
- Calcium [air, urban air close to ground]: 1.7e-7 kg; = ((1.7E-07*PV_01_CH)+(1.7E-07*PV_02_RER))/( PV_01_CH+PV_02_RER); lognormal variance with pedigree 0.096, pedigree (3,4,5,5,1)
  Literature data
  Uncertainty: Literature data
- Hydrogen fluoride [air, urban air close to ground]: 2.18e-7 kg; = ((2.18E-07*PV_01_CH)+(2.18E-07*PV_02_RER))/(PV_01_CH+PV_02_RER); lognormal variance with pedigree 0.096, pedigree (3,4,5,5,1)
  Literature data
  Uncertainty: Literature data
- Sodium [air, urban air close to ground]: 1.12e-6 kg; = ((1.12E-06*PV_01_CH)+(1.12E-06*PV_02_RER))/(PV_01_CH+PV_02_RER); lognormal variance with pedigree 0.096, pedigree (3,4,5,5,1)
  Literature data
  Uncertainty: Literature data
- Arsenic [air, urban air close to ground]: 1.94e-8 kg; = ((1.94E-08*PV_01_CH)+(1.94E-08*PV_02_RER))/(PV_01_CH+PV_02_RER); lognormal variance with pedigree 0.706, pedigree (3,4,5,5,1)
  Literature data
  Uncertainty: Literature data
- Sulfur dioxide [air, urban air close to ground]: 0.000813293 kg; = ((0.000209*PV_01_CH)+(0.000823*PV_02_RER))/(PV_01_CH+PV_02_RER); lognormal variance with pedigree 1.792, pedigree (1,1,5,5,1)
  Literature data
- Lead [air, urban air close to ground]: 8.71026e-8 kg; = ((2.18E-07*PV_01_CH)+(8.5E-08*PV_02_RER))/(PV_01_CH+PV_02_RER); lognormal variance with pedigree 0.706, pedigree (3,4,5,5,1)
  Literature data
  Uncertainty: Literature data
- Vanadium [air, urban air close to ground]: 8.53483e-7 kg; = ((5.1E-07*PV_01_CH)+(8.59E-07*PV_02_RER))/(PV_01_CH+PV_02_RER); lognormal variance with pedigree 0.202, pedigree (1,1,5,5,1)
  Literature data
- Particulates, > 10 um [air, urban air close to ground]: 1e-5 kg; = ((1E-05*PV_01_CH)+(1E-05*PV_02_RER))/(PV_01_CH+PV_02_RER); lognormal variance with pedigree 0.3546, pedigree (2,4,5,5,1)
  Literature data
  Uncertainty: Literature data
- Hydrogen chloride [air, urban air close to ground]: 2.18e-6 kg; = ((2.18E-06*PV_01_CH)+(2.18E-06*PV_02_RER))/(PV_01_CH+PV_02_RER); lognormal variance with pedigree 0.096, pedigree (3,4,5,5,1)
  Literature data
  Uncertainty: Literature data
- NMVOC, non-methane volatile organic compounds, unspecified origin [air, urban air close to ground]: 4.85e-6 kg; = ((4.85E-06*PV_01_CH)+(4.85E-06*PV_02_RER))/(PV_01_CH+PV_02_RER); lognormal variance with pedigree 0.096, pedigree (3,4,5,5,1)
  Literature data
  Uncertainty: Literature data
- Zinc [air, urban air close to ground]: 6.10842e-8 kg; = ((8.5E-08*PV_01_CH)+(6.07E-08*PV_02_RER))/(PV_01_CH+PV_02_RER); lognormal variance with pedigree 0.706, pedigree (3,4,5,5,1)
  Literature data
  Uncertainty: Literature data
- Carbon dioxide, fossil [air, urban air close to ground]: 0.0756427 kg; = ((0.0783*PV_01_CH)+(0.0756*PV_02_RER))/(PV_01_CH+PV_02_RER); lognormal variance with pedigree 0.0526, pedigree (3,5,5,5,1)
  Literature data
  Uncertainty: Literature data
- Carbon monoxide, fossil [air, urban air close to ground]: 1.5e-5 kg; = ((1.5E-05*PV_01_CH)+(1.5E-05*PV_02_RER))/(PV_01_CH+PV_02_RER); lognormal variance with pedigree 0.682, pedigree (3,5,5,5,1)
  Literature data
  Uncertainty: Literature data
- Selenium [air, urban air close to ground]: 1.94e-8 kg; = ((1.94E-08*PV_01_CH)+(1.94E-08*PV_02_RER))/(PV_01_CH+PV_02_RER); lognormal variance with pedigree 0.706, pedigree (3,4,5,5,1)
  Literature data
  Uncertainty: Literature data
- Particulates, < 2.5 um [air, urban air close to ground]: 3.5e-5 kg; = ((3.5E-05*PV_01_CH)+(3.5E-05*PV_02_RER))/(PV_01_CH+PV_02_RER); lognormal variance with pedigree 0.3546, pedigree (2,4,5,5,1)
  Literature data
  Uncertainty: Literature data
- Chromium VI [air, urban air close to ground]: 2.40309e-10 kg; = ((7.28E-11*PV_01_CH)+(2.43E-10*PV_02_RER))/(PV_01_CH+PV_02_RER); lognormal variance with pedigree 0.706, pedigree (3,4,5,5,1)
  Literature data
  Uncertainty: Literature data
- Particulates, > 2.5 um, and < 10um [air, urban air close to ground]: 5e-6 kg; = ((5E-06*PV_01_CH)+(5E-06*PV_02_RER))/(PV_01_CH+PV_02_RER); lognormal variance with pedigree 0.3546, pedigree (2,4,5,5,1)
  Literature data
  Uncertainty: Literature data
- Copper [air, urban air close to ground]: 7.20333e-8 kg; = ((2.43E-08*PV_01_CH)+(7.28E-08*PV_02_RER))/(PV_01_CH+PV_02_RER); lognormal variance with pedigree 0.706, pedigree (3,4,5,5,1)
  Literature data
  Uncertainty: Literature data

## Sampling procedure
Literature survey and plant data.

## Extrapolations
This dataset is a weighted (based on production volumes) average of swiss and european dataset. The uncertainty is adjusted accordingly.
