# electricity production, photovoltaic, 3kWp slanted-roof installation, single-Si, panel, mounted

Dataset: EcoSpold 2, unit process
Geography: CH
Time period: 2005-01-01 to 2019-12-31
Technology level: current
Classification: EcoSpold01Categories: photovoltaic/power plants
Classification: ISIC rev.4 ecoinvent: 3510b: Electric power generation, photovoltaic
Synonyms: single crystalline; Solar module; silicon; monocrystalline; PV-module
Tags: photovoltaic power
Scenario: Business-as-Usual
System model: Allocation at the point of substitution
Generated by: Karin Treyer
Published in: Jungbluth, N. 2007
Database: ecoinvent
isCopyrightProtected: true
accessRestrictedTo: 1

## General comment
This dataset represents the production of grid-connected low voltage electricity with a 3 kWp building integrated photovoltaic (PV) module in Switzerland in 2011. The 3 kWp module has been chosen as basic module for building integrated PV electricity production. Larger modules can easily be built with these 3 kWp modules without producing a significant error in environmental impact calculations. The module is a single-Si panel installed on a slanted roof.
An inverter is used to convert the low voltage DC power into AC power.
[This dataset was already contained in the ecoinvent database version 2. It was not individually updated during the transfer to ecoinvent version 3. Life Cycle Impact Assessment results may still have changed, as they are affected by changes in the supply chain, i.e. in other datasets. This dataset was generated following the ecoinvent quality guidelines for version 2. It may have been subject to central changes described in the ecoinvent version 3 change report (http://www.ecoinvent.org/database/ecoinvent-version-3/reports-of-changes/), and the results of the central updates were reviewed extensively. The changes added e.g. consistent water flows and other information throughout the database. The documentation of this dataset can be found in the ecoinvent reports of version 2, which are still available via the ecoinvent website. The change report linked above covers all central changes that were made during the conversion process.]

## Included activities start
From the PV module installed and ready to be used.

## Included activities end
Infrastructure for 3kWp PV-plant. Water use for cleaning. Amount of solar energy transformed to electricity. Waste heat emission due to losses of electricity in the system.

## Geography
Use in CH.

## Technology
Electricity production with grid-connected photovoltaic power plants mounted on buildings slanted roof.

## Time period
The annual production volume valid for 2011

## Parameters
- fraction, tap water, to air: 0.15; name fraction_TW_to_air; = fraction_PW_to_air; lognormal variance with pedigree 0.092025, pedigree (4,4,3,2,4)
  Calculated value. See comment in the other parametres present in this dataset. Tap water is considered to be always used as process water, thus process water fractions to air are applied to all tap water input flows to calculate the amount of water consumed in the processes.
  nan
- lifetime: 30 year; lognormal variance with pedigree 0.026625, pedigree (4,3,3,2,3)
  Oral communication. Gnos, S. 2002. Personal Communication, 10.2002. NET AG, Switzerland
  nan
- gross electricity production: 2.90766e7 kWh; name gross_electricity; lognormal variance with pedigree 0.0018, pedigree (2,1,1,1,2)
  Literature value/statistics. Total gross grid-connected photovoltaic electricity production in 2012 in this geography.
  Based on Stolz&Frischknecht 2015 with data valid for the year 2011.
  Stolz, P., Frischnkecht, R. 2015. Umweltbilanz Strommix Schweiz 2011. Issued by treeze Ltd. for the Federal Office for the Environment, Switzerland, Table 3.7
- Yield (Output), photovoltaics, corrected: 820.64 kWh/kWp; name yield_corr; = yield*corr; lognormal variance with pedigree 0, pedigree (1,1,1,1,1)
  Estimated value. The annual yield is corrected with a correction factor of 0.92 according to Jungbluth et al. 2012.
  Annual output (yield), roof-top [kWh* kWp-1*y-1]
  The annual yield is corrected with a correction factor of 0.92 according to [ Jungbluth N., Stucki M., and Frischknecht R. (2009) Photovoltaics. In Dones, R. (Ed.) et al., Sachbilanzen von Energiesystemen: Grundlagen für den ökologischen Vergleich von Energiesystemen und den Einbezug von Energiesystemen in Oekobilanzen für die Schweiz. ecoinvent report No. 6-XII, Swiss Centre for Life Cycle Inventories, Dübendorf, CH, 2009.]
- losses from gross electricity production: 0.05 dimensionless; name losses_gross_net; lognormal variance with pedigree 0.0167, pedigree (3,3,1,3,3)
  Estimation. The factor for the loss of electricity from gross to net electricity production is an assumption based on experiences and expertise (5% losses for photovoltaics).
  nan
- correction factor: 0.92; name corr; lognormal variance with pedigree 0.0175, pedigree (4,3,2,3,3)
  Estimation. Literature data on the yield for optimum installation and not real performance in the country have been corrected with a factor of 92% according to experiences in Switzerland for average production. This is based on the ratio of actual yield and published IEA data (820/892 = 0.92 - see Jungbluth et al. 2012 for detailed discussion)
  for use when something has to be corrected with an overall factor
- Panel area for one 3 kWp unit, sc-Si: 21.4 m2/unit; name panel_area_scSi; lognormal variance with pedigree 0.0199, pedigree (4,3,2,3,3)
  Literature value. Jungbluth N., Stucki M., Flury K., Frischknecht R. and Buesser S. (2012) Life Cycle Inventories of Photovoltaic Power Production. ESU-services Ltd., Uster, CH, retrieved from: www.esu-services.ch/data/public-lci-reports/
  Tab. 12.3, p.127
  nan
- fraction, process water, to air: 0.15 dimensionless; name fraction_PW_to_air; lognormal variance with pedigree 0.092025, pedigree (4,4,3,2,4)
  Literature value. In case when no industry/process specific data are available, default evaporation fraction value is used. This value is 15% and is based on literature (Statistics Canada, 2007 & Shaffer, K.H., 2008, Consumptive water use in the Great Lakes Basin, USGS & Shiklomanov, 2003, World Water Resources at the Beginning of the 21st Century) and has been approved by an expert.
  nan
- water use for cleaning photovoltaic panels: 20 l/m2; name water_pv_panels_cleaning; lognormal variance with pedigree 0.1227, pedigree (5,4,5,3,4)
  Estimation
  nan
- Share 3kWp slanted-roof installation, single-Si, panel, mounted, on roof: 0.45; name pv_3sri_sSi_pmr; lognormal variance with pedigree 0.214, pedigree (5,5,5,5,5)
  Literature values, calculated value.
  Calculated from the shares of different types of cells in 2008 (European Photovoltaic Technology Platform 2012) and the shares of different types of mounting systems (Jungbluth et al. 2012). The latter shares are valid for Europe (RER) and do not take into account open ground PV plants. Due to lack of data for other regions or even countries on the world, the shares have been taken as calculation basis for all PV datasets.Further, the electricity markets in ecoinvent v3.2 are modelled with only three types of PV panels: multi-Si and single-Si panels installed at slanted roofs and open ground installations. The shares of the two slanted-roof installations are calculated based on the two sources mentioned before and amount to 44.5% (single-Si) and 55.5% (multi-Si), respectively (if no open ground present). Further, data from the IEA-PVPS 2013 were used to find out if there are any open ground installations present in a country. In some cases no or only aggregated information were given in the 2013 report, so that the report from 2014 was used in these cases with data for the year 2013. Where no information were given at all, no open ground installations are considered due to lack of data.
  Sources:
  - European Photovoltaic Technology Platform. 2012. Photovoltaic Fact Sheets. The status of the PV industry (2008). LB-32-10-251-EN-D. retrieved from <http://www.eupvplatform.org/publications/misperceptions-fact-sheets.html#c2242> (accessed 31.01.2012)
  - Jungbluth N., Stucki M., Flury K., Frischknecht R. and Buesser S. (2012) Life Cycle Inventories of Photovoltaic Power Production. ESU-services Ltd., Uster, CH, retrieved from: www.esu-services.ch/data/public-lci-reports
  - IEA-PVPS. 2013. Trends 2013 in photovoltaic applications. Survey report of selected IEA countries between 1992 and 2012. International Energy Agency, Photovoltaic Power Systems Programme. Report IEA-PVPS T1-23:2013
  - IEA-PVPS. 2014. Trends 2014 in photovoltaic applications. Survey report of selected IEA countries between 1992 and 2014. International Energy Agency, Photovoltaic Power Systems Programme. Report IEA-PVPS T1-23:2013
  - annual production volumes in ecoinvent v3.2, photovoltaic datasets for electricity production.
- capacity: 0.003 MW; lognormal variance with pedigree 0.001925, pedigree (2,2,1,2,2)
  Capacity of the photovoltaic cell in MWp per installation unit [MWp/unit]
  nan
- Yield (Output), photovoltaics: 892 kWh/kWp; name yield; lognormal variance with pedigree 0.0193, pedigree (4,4,2,3,3)
  Literature value.
  Jungbluth N., Stucki M., Flury K., Frischknecht R., Busser S. 2012. Life Cycle Inventories of Photovoltaics. Report prepared for the Swiss Federal Office of Energy. ESU-services Ltd., Uster, Switzerland. Tab. 12.3
  nan

## Reference product
- electricity, low voltage: 1 kWh; CPC 17100: Electrical energy; By-product classification allocatable product
  production volume 1.24303e7 kWh; name apv; = gross_electricity* (1-losses_gross_net)* pv_3sri_sSi_pmr
    Calculated value
  property price 0.107 EUR2005
    Temporary price data. Calculated as 90% of purchasers price based on: IEA Key world energy statistics 2004 (www.iea.org/textbase/nppdf/free/2004/keyworld2004.pdf)
  property true value 0.107
    allocation property applied in "true value" allocation // value calculated from revenue

## By-products
- electricity, for reuse in municipal waste incineration only: 0 kWh; CPC 17100: Electrical energy; By-product classification allocatable product; pedigree (1,1,1,1,1)
  Net electricity generated from this waste and used in internal MSWI plant energy redistribution.
  Uncertainty: uncertainty is calculated from uncertainties in waste composition and uncertainties in energy efficiency and the uncertainty in internal energy demand
  production volume 1.74915 kWh
  property exergy 3.6 MJ; name E_el_prod_MSWI_exergy
    This exergy property is based on the exergy content of the product.
  property true value relation 3.6; name E_el_prod_MSWI_true_value_relation
    property to calculate "true value" from
  property price 0.1 EUR2005; name E_el_prod_MSWI_price_EUR2005
    Estimated to be the same price as in case of electricity, medium voltage.
  property true value 1.80798e-8
    allocation property applied in "true value" allocation // value calculated from true value relation
- heat, for reuse in municipal waste incineration only: 0 MJ; CPC 17300: Steam and hot water; By-product classification allocatable product; pedigree (1,1,1,1,1)
  Net useful heat generated from this waste and used in internal MSWI plant energy redistribution.
  Uncertainty: uncertainty is calculated from uncertainties in waste composition and uncertainties in energy efficiency and the uncertainty in internal energy demand
  production volume 12.375 MJ
  property true value relation 0.1842; name E_th_prod_MSWI_true_value_relation
    property to calculate "true value" from
  property exergy 0.1842 MJ; name E_th_prod_MSWI_exergy
    This exergy property is based on the exergy content of the product.
  property price 0.0106 EUR2005; name E_th_prod_MSWI_price_EUR2005
    Average European district heat price from Ecoheatcool and Euroheat 2005-2006, Ecoheat Work package 1: The European heat market. Final report. 10.6 EUR/GJ i s the price of district heat. http://www.solarthermalworld.org/files/Ecoheatcool%20WP1%20Web.pdf?download
  property true value 6.54482e-9
    (same comment as for electricity, for reuse in municipal waste incineration only)
- zinc concentrate: 0 kg; CPC 14290: Other non-ferrous metal ores and concentrates (other than uranium or thorium ores and concentrates); By-product classification allocatable product
  Calculated value from the knowledge of the properties of both products.
  production volume 0.0003096 kg
  property price 0.38 EUR2005; name ByP_price_EUR2005
    Temporary price data. Calculated as 90% of purchasers price based on: Zinc content in concentrate 53%. Concentrate price per kg Zn 86.5% of refined Zn price (13.5% treatment charges according to CHR Metals Limited 2005: Dynamic cost curves. http://www.minecost.com/dynamic.pdf). 2004 zinc price from USGS (2007) Mineral commodity summaries 2007. <http://minerals.usgs.gov/minerals/pubs/mcs/2007/mcs2007.pdf> [Accessed 25 May 2010]
  property zinc content 0.53; name zinc_C_zinc_concentrate
    Zinc content on a dry matter basis. Value taken from teh "zinc mine operation" /GLO dataset.
  property dry mass 1 kg; name DM_zinc_concentrate
  property carbon content 0
    carbon content on a dry matter basis (reserved; not for manual entry)
  property true value 9.46465e-12
    allocation property applied in "true value" allocation // value calculated from revenue
  properties: wet mass 1 kg, water content 0, carbon content, non-fossil 0, carbon content, fossil 0, water in wet mass 0 kg, carbon allocation 0 kg

## Inputs from technosphere
- wastewater, from residence: -5.79493e-6 m3; name sewage; = (tapwater/1000)*-1; lognormal variance with pedigree 0.0027, pedigree (2,2,3,1,1)
  Estimation 20l/m2 panel
  production volume 72.0326 m3; = apv*sewage
    Calculated value
  property price 0 EUR2005; name sewage_price_EUR2005
  properties: carbon content, non-fossil 0.199421, wet mass 1000 kg, dry mass 0.337476 kg, water content 2962.17
  note on carbon content, non-fossil: 0.0673 kg TOC/m3 (Tab A.17, ecoinvent v2.2 report 13_I). TOC was considered as Total Carbon.
- tap water: 0.00579493 kg; name tapwater; = installation*panel_area_scSi*water_pv_panels_cleaning; lognormal variance with pedigree 0.0027, pedigree (2,2,3,1,1)
  Estimation 20l/m2 panel
  properties: water content 2962.17, dry mass 0.000337476 kg, wet mass 1 kg, carbon content, fossil 0.00178991
  note on carbon content, fossil: Bicarbonate content is 2.93 mol/m3. CO2 content is 0.1 mol/m3 (ecoinvent v2.2 report 8, Tab 93.1).
- photovoltaic slanted-roof installation, 3kWp, single-Si, panel, mounted, on roof: 1.35396e-5 unit; name installation; = 1/(lifetime*(capacity*1000)*yield_corr); lognormal variance with pedigree 0.0161, pedigree (3,2,3,5,1)
  Calculated value. Lifetime*capacity*annual yield = y * kWp/unit * kWh/(kWp*y) = kWh/unit and then the reciproke.
- photovoltaic slanted-roof installation, 3kWp, single-Si, panel, mounted, on roof: 0 unit; name dummy123; uniform min 0, max 0, pedigree (1,1,3,1,1)
  (same comment as for photovoltaic slanted-roof installation, 3kWp, single-Si, panel, mounte)

## Inputs from nature
- Energy, solar, converted [natural resource, in air]: 3.8503 MJ; lognormal variance with pedigree 0.00388441, pedigree (2,2,3,1,1)
  Energy loss in the system is included.

## Emissions to nature
- Water [air, unspecified]: 8.6924e-7 m3; name water_to_air_unspecified; = (tapwater/1000*fraction_TW_to_air); lognormal variance with pedigree 0.0427, pedigree (2,2,3,1,1)
  Calculated value based on literature values and expert opinion. See comments in the parametres' comment field.
  property fraction, origin: unspecified 0; name fraction_origin_unspecified
  property fraction, origin: fresh water 1; name fraction_origin_fresh_water
  property fraction, origin: salt water 0; name fraction_origin_salt_water

## Sampling procedure
Statistical data for CH.

## Extrapolations
The simplifying assumption was made that all electricity is directly provided as low voltage electricity, so that no transformation has to take place. Even in countries with high shares of open ground installations (where medium or high voltage electricity might arrive at the busbar), the error introduced due to this assumption is not significant, as transformation processes do only have a low influence on environmental impacts.

## Review by Carl Vadenbo 2015-05-22
The update of the whole electricity sector for the ecoinvent v3.2 database consist of hundreds of datasets. All these datasets have passed through a streamlined review processes where the underlying modelling of production volumes, technology shares and efficiencies was reviewed in detail prior to the datasets being submitted to the database.
