# process-specific burdens, import of copper to Switzerland

Dataset: EcoSpold 2, unit process
Geography: DE
Time period: 1994-01-01 to 2019-12-31
Technology level: current
Classification: EcoSpold01Categories: metals/extraction
Classification: ISIC rev.4 ecoinvent: 2420:Manufacture of basic precious and other non-ferrous metals
Scenario: Business-as-Usual
System model: Allocation at the point of substitution
Share of production covered: 100 %
Generated by: Tereza Levova
Published in: Althaus H.-J. 2000
Database: ecoinvent
isCopyrightProtected: true
accessRestrictedTo: 1

## General comment
The product "copper, from imported concentrates, at refinery" is a auxiliary module used uniquely in the consumption mix in order to separate concentrate production and their transportation from different countries and the pyrolytical winning in RER. It does not contain any copper bearing inputs.
The dataset "copper, from imported concentrates, at refinery" is a auxiliary dataset used uniquely in the consumption mix in order to separate concentrate production and their transportation from different countries and the pyrolytical winning in RER. It does not contain any copper bearing inputs.
[This dataset is meant to replace the following datasets:
- copper production, from imported concentrates, DE, 1994 - 2003]

## Included activities start
From the reception of copper concentrate at the factory gate.

## Included activities end
This dataset ends with the remelting of copper cathodes and casting of shapes, at the factory.

The dataset includes the drying and roasting of copper concentrates, the smelting of the roaster product, the converting of the sulphide melt, the fire refining of copper from the converter, the electrolytic refining of copper, and the disposal of dross and slag in a landfill.

## Geography
This module is valid for the whole corresponding region. Some agents used like lime or sodium cyanide originate from data sets valid for Switzerland or Europe.

## Technology
The ore is pre-treated, reduced and refined according to the country specific mix of process alternatives: reverberatory furnace 6.2%; flash smelting furnaces 76.0%; other 17.8%.; SX-EW 0.0%. An overall abatement for sulphur dioxide of 95.0% was estimated.
Pyrometallurgy:
The pyrometallurgical treatment of copper concentrates includes three types of unit operation: drying & roasting (pre-treatment), smelting & converting (reduction), and finally refining. In the roasting step sulphur is driven off as sulphur dioxide and part of the iron is oxidised. Drying is done by gas. In smelt-ing, the roaster product is melted with a siliceous flux which combines with the oxidised iron to produce two immiscible phases, a liquid silicate slag which can be discarded, and a solution of molten sulphides which contains the metal values. In the converting operation on the sulphide melt, more sulphur is driven off as sulphur dioxide, and the remaining iron is oxidised and fluxed for removal as silicate slag, leaving a high-grade copper sulphide matte. In several modern operations the roasting step has been eliminated, and the copper sulphide concentrate is treated directly in the smelter. The converted copper is referred to as blister copper with a purity of 98%
Emissions: In every process steps sulphur dioxide is emitted to air. Recovery of sulphur dioxide is only economic for high concentrated off-gas. SO2 emissions are by far the most important in the metallurgy. In the beneficiation step, considerable amounts of lime is added to the ore for pH-stabilisation. Lime forms later flux in the metallurgical step. Lime decomposes into CO2 to form calcite. Dust carries over from the roasting, smelting and converting processes. Particulate emissions to air consist of metals and thus are often returned to the leaching process after treatment. Metals and their compounds and substances in suspension are the main pollutants emitted to water. The metals concerned are Cu, Ni, Co, As, and Cr. Other significant substances are chlorides and sulphates. Wastewater from wet gas cleaning (if used) of the different metallurgical stages is the most important source. The leaching stages are usually operated on a closed circuit and drainage systems, and are therefore regarded as minor sources.
Waste: The production of metals is related to the generation of several co-products, residues and wastes, which are listed in the European Waste Catalogue. Some of the process specific residues can be reused or recovered in preliminary process steps (e. g. dross, filter dust) or construction (e. g. cleaned slag). Residues also arise from the treatment of liquid effluents, the main residue being gypsum waste and metal hydroxides from the wastewater neutralisation plant. These residuals have to be disposed, usually in lined ponds.
Refining:
Conventional refining comprises three stages: (1) pyrometallurgical or fire refining, (2) electrolytic refining, and (3) remelting of cathodes and casting of shapes. Fire refining is applied to crude copper from converters and furnaces, cement copper from hydrometallurgy, anode scrap from electrolytic refining, and high-grade copper scrap, chiefly unalloyed wire scrap. About 80 % of the world copper production is refined by electrolysis. This treatment yields copper with high electrical conductivity and provides for separation of valuable impurities, especially precious metals. Copper cathodes must be remelted and cast to shapes because the structure of copper formed by electro-crystallization is not suitable for working to semi finished products. Cathodes are remelted in several types of special furnaces that perform the tasks of melting, post refining (if necessary), holding, and casting.
Emissions: The combustion of sulphur leads to emissions of SO2. Nitrogen oxides are produced in significant amounts during acid digestion using nitric acid. Chlorine and HCl can be formed during a number of digestion, electrolytic, and purification processes. Dust and metals are generally emitted from incinerators and furnaces. Organic compounds, namely dioxins, can be emitted from smelting stages resulting from the poor combustion of oil and plastic in the feed material. All these emissions are subject to abatement technologies and controlling. Large quantities of effluents contain substantial amounts of metals and organic substances.
Waste: Like in the pyrometallurgical step, considerable quantities of solid residuals are generated, which are mostly recycled within the process or sent to other specialists to recover any precious metals. Final residues generally comprise hydroxide filter cakes (iron hydroxide, 60% water, cat I industrial waste).

## Parameters
- fraction, process water, to air: 0.15 dimensionless; name fraction_PW_to_air; lognormal variance with pedigree 0.092025, pedigree (4,4,3,2,4)
  Literature value. In case when no industry/process specific data are available, default evaporation fraction value is used. This value is 15% and is based on literature (Statistics Canada, 2007 & Shaffer, K.H., 2008, Consumptive water use in the Great Lakes Basin, USGS & Shiklomanov, 2003, World Water Resources at the Beginning of the 21st Century) and has been approved by an expert.

## Reference product
- process-specific burdens, import of copper to Switzerland: 1 kg; name RP; CPC 41413: Refined copper and copper alloys, unwrought; master alloys of copper; By-product classification allocatable product
  production volume 2.938e8 kg; name RP_PV
    193000 tonnes in 1994 from this source
    Source: http://minerals.usgs.gov/minerals/pubs/commodity/copper/myb1-2006-coppe.xls (downloaded 10 February 2010), table 20
  property price 0.277934 EUR2005; name RP_price_EUR2005
    Calculated based on inputs: The price of the product has been calculated as a sum of the values of the material and energy inputs for this product. This value is therefore a rough estimation. It may underestimate the real price since there are additional expenses when producing any product. These expences can include for example labour costs, treatment of waste materials and profit for the producer. Please consider carefully whether this level of data quality is acceptable for your application.
  property true value 0.277934; name RP_true_value
    allocation property applied in "true value" allocation // value calculated from revenue

## By-products
- heat, for reuse in municipal waste incineration only: 0 MJ; CPC 17300: Steam and hot water; By-product classification allocatable product; pedigree (1,1,1,1,1)
  Net electricity generated from this waste and used in internal MSWI plant energy redistribution.
  Uncertainty: uncertainty is calculated from uncertainties in waste composition and uncertainties in energy efficiency and the uncertainty in internal energy demand
  production volume 109356 MJ
  property exergy 0.1842 MJ; name E_th_prod_MSWI_exergy
    This exergy property is based on the exergy content of the product.
  property price 0.0106 EUR2005; name E_th_prod_MSWI_price_EUR2005
    Average European district heat price from Ecoheatcool and Euroheat 2005-2006, Ecoheat Work package 1: The European heat market. Final report. 10.6 EUR/GJ i s the price of district heat. http://www.solarthermalworld.org/files/Ecoheatcool%20WP1%20Web.pdf?download
  property true value relation 0.1842; name E_th_prod_MSWI_true_value_relation
    property to calculate "true value" from
  property true value 2.45396e-6
    allocation property applied in "true value" allocation // value calculated from true value relation
- electricity, for reuse in municipal waste incineration only: 0 kWh; CPC 17100: Electrical energy; By-product classification allocatable product; pedigree (1,1,1,1,1)
  (same comment as for heat, for reuse in municipal waste incineration only)
  production volume 15188.3 kWh
  property price 0.1 EUR2005; name E_el_prod_MSWI_price_EUR2005
    Estimated to be the same price as in case of electricity, medium voltage.
  property exergy 3.6 MJ; name E_el_prod_MSWI_exergy
    This exergy property is based on the exergy content of the product.
  property true value relation 3.6; name E_el_prod_MSWI_true_value_relation
    property to calculate "true value" from
  property true value 6.6611e-6
    (same comment as for heat, for reuse in municipal waste incineration only)

## Inputs from technosphere
- electricity, high voltage: 0.218993 kWh; source Krauss U. 1999; lognormal variance with pedigree 0.0408, pedigree (2,2,5,3,1)
  Modelled, based on ISIC 2420 - pdf, on the dedicated talk page of ecoinvent (www.ecoinvent.org/documentation).
  See part "Regarding pyro-metallurgical copper production".
  EcoSpold01Location=UCTE
- oxygen, liquid: 0.29999 kg; source Krauss U. 1999; lognormal variance with pedigree 0.0408, pedigree (2,2,5,3,1)
  EcoSpold01Location=RER
  Modelled, based on ISIC 2420 - pdf, on the dedicated talk page of ecoinvent (www.ecoinvent.org/documentation).
  See part "Regarding pyro-metallurgical copper production".
  properties: wet mass 1 kg, dry mass 1 kg
- heat, district or industrial, natural gas: 3.55288 MJ; source Krauss U. 1999; lognormal variance with pedigree 0.0408, pedigree (2,2,5,3,1)
  Modelled, based on ISIC 2420 - pdf, on the dedicated talk page of ecoinvent (www.ecoinvent.org/documentation).
  See part "Regarding pyro-metallurgical copper production".
  EcoSpold01Location=RER
- heat, district or industrial, other than natural gas: 4.30336 MJ; source Krauss U. 1999; lognormal variance with pedigree 0.0408, pedigree (2,2,5,3,1)
  EcoSpold01Location=RER
  Proxy: "heat, district or industrial, other than natural gas" is used as a proxy for fossile energy from heavy fuel oil & coke.
- anode, for metal electrolysis: 0.000999967 kg; source Krauss U. 1999; lognormal variance with pedigree 0.23, pedigree (5,5,5,5,4)
  (same comment as for oxygen, liquid)
  properties: carbon content, fossil 0.865971, dry mass 1 kg, wet mass 1 kg
  note on carbon content, fossil: The main component of the anode is carbon, coming from bitumen and petroleum coke (ecoinvent v2.2 report 10). The C content in those components of the anode has been taken into account to calculate the anode final C content.
- electricity, high voltage: 0.327989 kWh; source Krauss U. 1999; lognormal variance with pedigree 0.0408, pedigree (2,2,5,3,1)
  Modelled, based on ISIC 2420 - pdf, on the dedicated talk page of ecoinvent (www.ecoinvent.org/documentation).
  See part "Regarding pyro-metallurgical copper production".
- non-ferrous metal smelter: 1.13996e-11 unit; lognormal variance with pedigree 0.3601, pedigree (3,2,5,1,3)
  EcoSpold01Location=GLO
  Estimation from dataset author.
- silica sand: 0.749975 kg; source Krauss U. 1999; lognormal variance with pedigree 0.1102, pedigree (5,2,5,3,1)
  Modelled, based on ISIC 2420 - pdf, on the dedicated talk page of ecoinvent (www.ecoinvent.org/documentation).
  See part "Regarding pyro-metallurgical copper production".
  EcoSpold01Location=DE
  properties: water content 0.010101, dry mass 0.99 kg, wet mass 1 kg
- wastewater, unpolluted: -0.00579981 m3; name ByP_02; source Hochfeld C. 1997; lognormal variance with pedigree 0.0407, pedigree (2,2,5,1,1)
  EcoSpold01Location=CH
  Modelled, based on ISIC 2420 - pdf, on the dedicated talk page of ecoinvent (www.ecoinvent.org/documentation).
  See part "Regarding pyro-metallurgical copper production".
  production volume 1.70404e6 m3; = ByP_02/ RP* RP_PV
    Calculated from the production volume of copper in proportion to the respective output amounts.
  property price 0 EUR2005; name ByP_02_price_EUR2005
  properties: water content 2962.17, dry mass 0.337476 kg, carbon content, fossil 0.00178991, wet mass 1000 kg, carbon content, non-fossil 0.00178991
  note on carbon content, fossil: Assumed to be like in tap water. Bicarbonate content is 2.93 mol/m3. CO2 content is 0.1 mol/m3 (ecoinvent v2.2 report 8, Tab 93.1).
- copper slag: -0.92497 kg; name ByP_01; source Krauss U. 1999; lognormal variance with pedigree 0.0408, pedigree (2,2,5,3,1)
  Estimation: 50% of the slag is recycled, and 50% is disposed in a landfill.
  production volume 2.71765e8 kg; = ByP_01/ RP* RP_PV
    (same comment as for wastewater, unpolluted)
  property price 0 EUR2005; name ByP_01_price_EUR2005
  properties: dry mass 1 kg, tungsten content 0.23999, sodium content 0.008, magnesium content 0.00485, silicon content 0.155, wet mass 1 kg, potassium content 0.0317, iron content 0.379, aluminium content 0.0267, zinc content 0.00606, calcium content 0.00713, copper content 0.00807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
- lime, packed: 0.249992 kg; lognormal variance with pedigree 0.1102, pedigree (5,2,5,3,1)
  EcoSpold01Location=CH
  Estimation from dataset author: Additional 250 kg of limestone per tonne of copper has been assumed in this study according to Ayres et al. (2002).
  Further references: Ayres R. U., Ayres L. W. and Råde I. (2002) The Life Cycle of Copper, its Co-Products and Byproducts. MMSD - Mining, Minerals and Sustainable Development, Online-Version under:
  <http://www.iied.org/mmsd/mmsd_pdfs/ayres_lca_main.pdf>.
  properties: dry mass 0.998 kg, wet mass 1 kg, water content 0.00200401, carbon content, fossil 0.117492
  note on carbon content, fossil: Table 3.1, ecoinvent v2.2 report 7, part VII, pg 3. MW CaCO3=100, MW MgCO3=84

## Inputs from nature
- Water, river [natural resource, in water]: 0.00579981 m3; name water_river_input; source Krauss U. 1999; lognormal variance with pedigree 0.0407, pedigree (2,2,5,1,1)
  Modelled, based on ISIC 2420 - pdf, on the dedicated talk page of ecoinvent (www.ecoinvent.org/documentation).
  See part "Regarding pyro-metallurgical copper production".
  Modelled, based on ISIC 2420 - pdf, on the dedicated talk page of ecoinvent (www.ecoinvent.org/documentation).
  See part "Regarding pyro-metallurgical copper production".

## Emissions to nature
- Water [air, unspecified]: 0.000869971 m3; name water_to_air_unspecified; = (water_river_input*fraction_PW_to_air); lognormal variance with pedigree 0.0807, pedigree (2,2,5,1,1)
  Calculated value based on literature values and expert opinion. See comments in the parametres' comment field.
  property fraction, origin: unspecified 0; name fraction_origin_unspecified
  property fraction, origin: fresh water 1; name fraction_origin_fresh_water
  property fraction, origin: salt water 0; name fraction_origin_salt_water
- Chromium [air, non-urban air or from high stacks]: 4.99984e-8 kg; source EEA 1999; lognormal variance with pedigree 0.7101, pedigree (3,2,5,1,3)
  (same comment as for electricity, high voltage)
- Vanadium [air, non-urban air or from high stacks]: 3.74988e-7 kg; source EEA 1999; lognormal variance with pedigree 0.7101, pedigree (3,2,5,1,3)
  (same comment as for electricity, high voltage)
- NMVOC, non-methane volatile organic compounds, unspecified origin [air, non-urban air or from high stacks]: 1.49995e-8 kg; source EEA 1999; lognormal variance with pedigree 0.1001, pedigree (3,2,5,1,3)
  (same comment as for electricity, high voltage)
- Tin, ion [water, surface water]: 1.65995e-7 kg; source IPPC 2001; lognormal variance with pedigree 1.37, pedigree (1,1,5,1,1)
  (same comment as for electricity, high voltage)
- Cadmium [air, non-urban air or from high stacks]: 6.49979e-6 kg; source EEA 1999; lognormal variance with pedigree 0.7101, pedigree (3,2,5,1,3)
  (same comment as for electricity, high voltage)
- Sulfur dioxide [air, non-urban air or from high stacks]: 0.0356988 kg; source Krauss U. 1999; lognormal variance with pedigree 0.1401, pedigree (5,4,5,3,3)
  (same comment as for electricity, high voltage)
- Copper [air, non-urban air or from high stacks]: 0.000249992 kg; source EEA 1999; lognormal variance with pedigree 0.7101, pedigree (3,2,5,1,3)
  (same comment as for electricity, high voltage)
- Particulates, < 2.5 um [air, non-urban air or from high stacks]: 5.07983e-10 kg; source IPPC 2001; lognormal variance with pedigree 0.3601, pedigree (3,2,5,1,3)
  (same comment as for electricity, high voltage)
- Antimony [air, non-urban air or from high stacks]: 5.49982e-6 kg; source EEA 1999; lognormal variance with pedigree 0.7101, pedigree (3,2,5,1,3)
  (same comment as for electricity, high voltage)
- Zinc, ion [water, surface water]: 4.90984e-7 kg; source IPPC 2001; lognormal variance with pedigree 1.37, pedigree (1,1,5,1,1)
  (same comment as for electricity, high voltage)
- Mercury [water, surface water]: 1.65995e-9 kg; source IPPC 2001; lognormal variance with pedigree 1.37, pedigree (1,1,5,1,1)
  (same comment as for electricity, high voltage)
- Mercury [air, non-urban air or from high stacks]: 9.99967e-8 kg; source EEA 1999; lognormal variance with pedigree 0.7101, pedigree (3,2,5,1,3)
  Modelled, based on Life cycle inventory of metals.pdf document, Part III: Copper, on the dedicated talk page of ecoinvent (www.ecoinvent.org/documentatModelled, based on ISIC 2420 - pdf, on the dedicated talk page of ecoinvent (www.ecoinvent.org/documentation).
  See part "Regarding pyro-metallurgical copper production".ion)
- Selenium [air, non-urban air or from high stacks]: 5.49982e-6 kg; source EEA 1999; lognormal variance with pedigree 0.7101, pedigree (3,2,5,1,3)
  (same comment as for electricity, high voltage)
- Zinc [air, non-urban air or from high stacks]: 0.000149995 kg; source EEA 1999; lognormal variance with pedigree 0.7101, pedigree (3,2,5,1,3)
  (same comment as for electricity, high voltage)
- Chromium, ion [water, surface water]: 1.65995e-7 kg; source IPPC 2001; lognormal variance with pedigree 1.37, pedigree (1,1,5,1,1)
  (same comment as for electricity, high voltage)
- Arsenic [air, non-urban air or from high stacks]: 3.24989e-5 kg; source EEA 1999; lognormal variance with pedigree 0.7101, pedigree (3,2,5,1,3)
  (same comment as for electricity, high voltage)
- Carbon dioxide, fossil [air, non-urban air or from high stacks]: 0.109996 kg; source Krauss U. 1999; lognormal variance with pedigree 0.1801, pedigree (5,4,5,3,3)
  Calculated value: The calcination of previously added lime (in the copper mining process) releases 0.44 kg CO2 per tonne lime.
- Manganese [air, non-urban air or from high stacks]: 1.49995e-5 kg; source EEA 1999; lognormal variance with pedigree 0.7101, pedigree (3,2,5,1,3)
  (same comment as for electricity, high voltage)
- Nickel [air, non-urban air or from high stacks]: 5.49982e-5 kg; source EEA 1999; lognormal variance with pedigree 0.7101, pedigree (3,2,5,1,3)
  (same comment as for electricity, high voltage)
- Carbon monoxide, fossil [air, non-urban air or from high stacks]: 2.9999e-8 kg; source IPPC 2001; lognormal variance with pedigree 0.7101, pedigree (3,2,5,1,3)
  Literature value
- Particulates, > 10 um [air, non-urban air or from high stacks]: 1.01997e-7 kg; source IPPC 2001; lognormal variance with pedigree 0.0901, pedigree (3,2,5,1,3)
  (same comment as for electricity, high voltage)
- Nickel, ion [water, surface water]: 1.22996e-7 kg; source IPPC 2001; lognormal variance with pedigree 1.37, pedigree (1,1,5,1,1)
  (same comment as for electricity, high voltage)
- Copper, ion [water, surface water]: 3.0499e-7 kg; source IPPC 2001; lognormal variance with pedigree 1.37, pedigree (1,1,5,1,1)
  (same comment as for electricity, high voltage)
- Particulates, > 2.5 um, and < 10um [air, non-urban air or from high stacks]: 3.0399e-7 kg; source IPPC 2001; lognormal variance with pedigree 0.0701, pedigree (3,2,5,1,3)
  (same comment as for electricity, high voltage)
- Lead [air, non-urban air or from high stacks]: 0.000149995 kg; source EEA 1999; lognormal variance with pedigree 0.7101, pedigree (3,2,5,1,3)
  (same comment as for electricity, high voltage)
- Arsenic, ion [water, surface water]: 1.07996e-7 kg; source IPPC 2001; lognormal variance with pedigree 1.37, pedigree (1,1,5,1,1)
  (same comment as for electricity, high voltage)
- Lead [water, surface water]: 9.2597e-8 kg; source IPPC 2001; lognormal variance with pedigree 1.37, pedigree (1,1,5,1,1)
  (same comment as for electricity, high voltage)
- Tin [air, non-urban air or from high stacks]: 6.2498e-6 kg; source EEA 1999; lognormal variance with pedigree 0.7101, pedigree (3,2,5,1,3)
  (same comment as for electricity, high voltage)
- Cadmium, ion [water, surface water]: 1.57995e-8 kg; source IPPC 2001; lognormal variance with pedigree 1.37, pedigree (1,1,5,1,1)
  (same comment as for electricity, high voltage)
- Dioxins, measured as 2,3,7,8-tetrachlorodibenzo-p-dioxin [air, non-urban air or from high stacks]: 9.99967e-15 kg; source IPPC 2001; lognormal variance with pedigree 0.3601, pedigree (3,2,5,1,3)
  Literature value

## Sampling procedure
literature

## Extrapolations
see Geography and Technology
