# treatment of used triple glazing, U<0.5W/m2K, collection for final disposal

Dataset: EcoSpold 2, unit process
Geography: RoW
Time period: 1996-01-01 to 2019-12-31
Technology level: current
Classification: EcoSpold01Categories: waste management/building demolition
Classification: ISIC rev.4 ecoinvent: 3821:Treatment and disposal of non-hazardous waste
Tags: Treatment; ConvertedDataset
Scenario: Business-as-Usual
System model: Allocation at the point of substitution
Generated by: Martin Lehmann
Published in: Kellenberger D. 2007
Database: ecoinvent
isCopyrightProtected: true
accessRestrictedTo: 1

## General comment
This dataset is applied for the disposal of 3-IV glazing of windows.
[This dataset was already contained in the ecoinvent database version 2. It was not individually updated during the transfer to ecoinvent version 3. Life Cycle Impact Assessment results may still have changed, as they are affected by changes in the supply chain, i.e. in other datasets. This dataset was generated following the ecoinvent quality guidelines for version 2. It may have been subject to central changes described in the ecoinvent version 3 change report (http://www.ecoinvent.org/database/ecoinvent-version-3/reports-of-changes/), and the results of the central updates were reviewed extensively. The changes added e.g. consistent water flows and other information throughout the database. The documentation of this dataset can be found in the ecoinvent reports of version 2, which are still available via the ecoinvent website. The change report linked above covers all central changes that were made during the conversion process.]

## Included activities end
The dataset describes the disposal of 1.06m2 triple glazing (3-IV) (not laminated safety glass) in a municipal incineration. 80% of the glass goes for landfill, 20% to MSWI. 1.06m2 corresponds to 1m2 visible glass.

## Geography
Data estimated according to Swiss practice.

## Technology
The technology described involves the disposal of aluminium, rubber and glass of a 3-IV glazing in a municipal incineration plant (glass is partly landfilled).

## Reference product
- used triple glazing, U<0.5W/m2K: -1 m2; By-product classification Waste; CPC 39990: Other wastes n.e.c.
  EcoSpold01Location=CH
  production volume 3.96633 m2
    This is a placeholder value that does not reflect real-world production volumes. This dataset does not currently require a real-world production volume to work in the database framework, and no actual data were collected yet. This has no negative effect on the results of the ecoinvent database.
  property price 0 EUR2005
    Waste products are assigned a price of zero as they are assumed to require further treatment.
  property carbon content 0.00372354
    carbon content on a dry matter basis (reserved; not for manual entry)
  properties: carbon content, fossil 0.00372354, water content 0, carbon content, non-fossil 0, water in wet mass 0 kg, dry mass 31.9272 kg, wet mass 31.9272 kg, carbon allocation 0.118882 kg

## By-products
All rows: pedigree (1,1,1,1,1)
- iron scrap, unsorted: 0 kg; source European Aluminium Association 2008; CPC 39310: Slag, dross, scalings and other waste from the manufacture of iron or steel; By-product classification Recyclable
  property price 0.149 EUR2005; name ironScrapAmount_price_EUR2005
    Temporary price data. Calculated as 90% of purchasers price based on: estimated at 85% of sorted scrap
  property carbon content 0
    carbon content on a dry matter basis (reserved; not for manual entry)
  properties: water in wet mass 0 kg, water content 0, carbon content, fossil 0, carbon content, non-fossil 0, dry mass 1 kg, wet mass 1 kg, carbon allocation 0 kg
- aluminium oxide, non-metallurgical: 0 kg; source European Aluminium Association 2008; CPC 41432: Alumina (aluminium oxide), except artificial corundum; By-product classification allocatable product; CAS 1344-28-1
  property carbon content, non-fossil 0; name C_content_non_fossil
  property price 0.28 EUR2005; name Al2O3Amount_price_EUR2005
    From UN trade database. http://data.un.org/ Import data from the largest economies of the world are used (Brazil, India, USA, China, Japan and EU-27).
  property dry mass 1 kg; name DM
  property water content 0; name water_content
  property wet mass 1 kg; name WM
  property water in wet mass 0 kg; name WWM
  property carbon content, fossil 0; name C_content_fossil
  property carbon content 0
    carbon content on a dry matter basis (reserved; not for manual entry)
  properties: carbon allocation 0 kg
- aluminium, cast alloy: 0 kg; source European Aluminium Association 2008; By-product classification allocatable product; CPC 41431: Unwrought aluminium
  EcoSpold01Location=RER
  property price 1.3 EUR2005; name castAlloyAmount_price_EUR2005
    Temporary price data. Calculated as 90% of purchasers price based on: Source: London Metal Exchange, Aluminium alloy price for 2005
  property carbon content 0
    carbon content on a dry matter basis (reserved; not for manual entry)
  properties: water in wet mass 0 kg, carbon content, non-fossil 0, water content 0, dry mass 1 kg, carbon content, fossil 0, wet mass 1 kg, carbon allocation 0 kg
- heat, for reuse in municipal waste incineration only: 0 MJ; CPC 17300: Steam and hot water; By-product classification allocatable product
  Net electricity generated from this waste and used in internal MSWI plant energy redistribution.
  Uncertainty: uncertainty is calculated from uncertainties in waste composition and uncertainties in energy efficiency and the uncertainty in internal energy demand
  property exergy 0.1842 MJ; name E_th_prod_MSWI_exergy
    This exergy property is based on the exergy content of the product.
  property true value relation 0.1842; name E_th_prod_MSWI_true_value_relation
    property to calculate "true value" from
  property price 0.0106 EUR2005; name E_th_prod_MSWI_price_EUR2005
    Average European district heat price from Ecoheatcool and Euroheat 2005-2006, Ecoheat Work package 1: The European heat market. Final report. 10.6 EUR/GJ i s the price of district heat. http://www.solarthermalworld.org/files/Ecoheatcool%20WP1%20Web.pdf?download
- electricity, for reuse in municipal waste incineration only: 0 kWh; CPC 17100: Electrical energy; By-product classification allocatable product
  (same comment as for heat, for reuse in municipal waste incineration only)
  property exergy 3.6 MJ; name E_el_prod_MSWI_exergy
    This exergy property is based on the exergy content of the product.
  property true value relation 3.6; name E_el_prod_MSWI_true_value_relation
    property to calculate "true value" from
  property price 0.1 EUR2005; name E_el_prod_MSWI_price_EUR2005
    Estimated to be the same price as in case of electricity, medium voltage.
- aluminium, wrought alloy: 0 kg; source European Aluminium Association 2008; By-product classification allocatable product; CPC 4153: Semi-finished products of aluminium or aluminium alloys
  property price 1.44 EUR2005; name secondaryAluminiumOutput_price_EUR2005
    Estimated based on literature values and expert judgement. Aluminium ccast alloys are about 90% of the price of aluminium wrought alloys.
  property carbon content 0
    carbon content on a dry matter basis (reserved; not for manual entry)
  properties: wet mass 1 kg, water content 0, carbon content, fossil 0, water in wet mass 0 kg, carbon content, non-fossil 0, dry mass 1 kg, carbon allocation 0 kg

## Inputs from technosphere
- scrap aluminium: 0 kg; pedigree (1,1,1,1,1)
  EcoSpold01Location=CH
  production volume 0 kg
    Calculated from the production volume of used triple glazing, U<0.5W/m2K in proportion to the respective output amounts.
  properties: wet mass 1 kg, dry mass 1 kg
- waste rubber, unspecified: 0 kg; pedigree (1,1,1,1,1)
  EcoSpold01Location=CH
  production volume 0 kg
    (same comment as for scrap aluminium)
  properties: carbon content, fossil 0.853, wet mass 1 kg, dry mass 1 kg
- waste glass: 0 kg; pedigree (1,1,1,1,1)
  EcoSpold01Location=CH
  production volume 0 kg
    (same comment as for scrap aluminium)
  properties: wet mass 1 kg, dry mass 1 kg
- scrap aluminium: -0.788546, -1.66035 kg (2 entries); lognormal variance with pedigree 0.0526, pedigree (1,3,5,5,1)
  EcoSpold01Location=CH
  production volume 7.3467 kg
- waste rubber, unspecified: -0.33806, -0.33806 kg (2 entries); lognormal variance with pedigree 0.0526, pedigree (1,3,5,5,1)
  EcoSpold01Location=CH
  production volume 2.02836 kg
- waste glass: -2.16848, -0.199864, -0.00453425, -0.0186471, -0.0283166, -0.0834387, -4.07812, -20.4361 kg (8 entries); lognormal variance with pedigree 0.0526, pedigree (1,3,5,5,1)
  EcoSpold01Location=CH
  production volume 81.0525 kg

## Sampling procedure
Calculation from waste composition

## Extrapolations
see Geography This dataset has been copied from an original dataset covering the geography CH. The uncertainty has been adjusted accordingly.

## Review by Rolf Frischknecht 2009-01-22
passed
