# glass fibre production

Dataset: EcoSpold 2, unit process
Geography: RoW
Time period: 2000-01-01 to 2019-12-31
Technology level: current
Classification: EcoSpold01Categories: glass/construction
Classification: ISIC rev.4 ecoinvent: 2310:Manufacture of glass and glass products
Synonyms: fiberglass; fibreglass; fibrous glass filter media
Tags: ConvertedDataset
Scenario: Business-as-Usual
System model: Allocation at the point of substitution
Share of production covered: 100 %
Generated by: Niels Jungbluth
Published in: Kellenberger D. 2007
Database: ecoinvent
isCopyrightProtected: true
accessRestrictedTo: 1

## General comment
Inventory based on a state of the art report for the European glass manufacturing industry. Data had to be estimated from ranges given for different parameters.
[This dataset was already contained in the ecoinvent database version 2. It was not individually updated during the transfer to ecoinvent version 3. Life Cycle Impact Assessment results may still have changed, as they are affected by changes in the supply chain, i.e. in other datasets. This dataset was generated following the ecoinvent quality guidelines for version 2. It may have been subject to central changes described in the ecoinvent version 3 change report (http://www.ecoinvent.org/database/ecoinvent-version-3/reports-of-changes/), and the results of the central updates were reviewed extensively. The changes added e.g. consistent water flows and other information throughout the database. The documentation of this dataset can be found in the ecoinvent reports of version 2, which are still available via the ecoinvent website. The change report linked above covers all central changes that were made during the conversion process.]

## Included activities end
Gate to gate inventory for the production of glass fibre.

## Geography
26 furnaces operating at 12 sites in Europe

## Technology
Recuperative or oxy-fuel fired furnaces.

## Time period
Time of publication

## Parameters
- fraction, process water, to air: 0.15 dimensionless; name fraction_PW_to_air; lognormal variance with pedigree 0.092025, pedigree (4,4,3,2,4)
- fraction, tap water, to air: 0.15; name fraction_TW_to_air; lognormal variance with pedigree 0.092025, pedigree (4,4,3,2,4)

## Reference product
- glass fibre: 1 kg; By-product classification allocatable product; CPC 3712: Glass fibres and articles thereof, except woven fabrics; CAS 65997-17-3
  EcoSpold01Location=RER
  production volume 2.67763 kg
    This is a placeholder value that does not reflect real-world production volumes. This dataset does not currently require a real-world production volume to work in the database framework, and no actual data were collected yet. This has no negative effect on the results of the ecoinvent database.
  property carbon content, fossil 0
    Tab 5.1, ecoinvent v2.2 report 7, part XIII, for Glass fibre composition.
  property carbon content, non-fossil 0
    Tab 5.1, ecoinvent v2.2 report 7, part XIII, for Glass fibre composition.
  property carbon content 0
    carbon content on a dry matter basis (reserved; not for manual entry)
  property true value 0.802
    allocation property applied in "true value" allocation // value calculated from revenue
  properties: water in wet mass 0 kg, price 0.802 EUR2005, water content 0, dry mass 1 kg, wet mass 1 kg, carbon allocation 0 kg

## By-products
- electricity, for reuse in municipal waste incineration only: 0 kWh; CPC 17100: Electrical energy; By-product classification allocatable product; pedigree (1,1,1,1,1)
  Net electricity generated from this waste and used in internal MSWI plant energy redistribution.
  Uncertainty: uncertainty is calculated from uncertainties in waste composition and uncertainties in energy efficiency and the uncertainty in internal energy demand
  production volume 0.000686477 kWh
  property exergy 3.6 MJ; name E_el_prod_MSWI_exergy
    This exergy property is based on the exergy content of the product.
  property true value relation 3.6; name E_el_prod_MSWI_true_value_relation
    property to calculate "true value" from
  property price 0.1 EUR2005; name E_el_prod_MSWI_price_EUR2005
    Estimated to be the same price as in case of electricity, medium voltage.
  property true value 2.96249e-5
    allocation property applied in "true value" allocation // value calculated from true value relation
- heat, for reuse in municipal waste incineration only: 0 MJ; CPC 17300: Steam and hot water; By-product classification allocatable product; pedigree (1,1,1,1,1)
  Net useful heat generated from this waste and used in internal MSWI plant energy redistribution.
  Uncertainty: uncertainty is calculated from uncertainties in waste composition and uncertainties in energy efficiency and the uncertainty in internal energy demand
  production volume 0.0050877 MJ
  property true value relation 0.1842; name E_th_prod_MSWI_true_value_relation
    property to calculate "true value" from
  property exergy 0.1842 MJ; name E_th_prod_MSWI_exergy
    This exergy property is based on the exergy content of the product.
  property price 0.0106 EUR2005; name E_th_prod_MSWI_price_EUR2005
    Average European district heat price from Ecoheatcool and Euroheat 2005-2006, Ecoheat Work package 1: The European heat market. Final report. 10.6 EUR/GJ i s the price of district heat. http://www.solarthermalworld.org/files/Ecoheatcool%20WP1%20Web.pdf?download
  property true value 1.12342e-5
    (same comment as for electricity, for reuse in municipal waste incineration only)
- zinc concentrate: 0 kg; CPC 14290: Other non-ferrous metal ores and concentrates (other than uranium or thorium ores and concentrates); By-product classification allocatable product
  Calculated value from the knowledge of the properties of both products.
  production volume 4.61508e-10 kg
  property price 0.38 EUR2005; name ByP_price_EUR2005
    Temporary price data. Calculated as 90% of purchasers price based on: Zinc content in concentrate 53%. Concentrate price per kg Zn 86.5% of refined Zn price (13.5% treatment charges according to CHR Metals Limited 2005: Dynamic cost curves. http://www.minecost.com/dynamic.pdf). 2004 zinc price from USGS (2007) Mineral commodity summaries 2007. <http://minerals.usgs.gov/minerals/pubs/mcs/2007/mcs2007.pdf> [Accessed 25 May 2010]
  property zinc content 0.53; name zinc_C_zinc_concentrate
    Zinc content on a dry matter basis. Value taken from teh "zinc mine operation" /GLO dataset.
  property dry mass 1 kg; name DM_zinc_concentrate
  property carbon content 0
    carbon content on a dry matter basis (reserved; not for manual entry)
  property true value 5.84577e-11
    allocation property applied in "true value" allocation // value calculated from revenue
  properties: wet mass 1 kg, water content 0, carbon content, non-fossil 0, carbon content, fossil 0, water in wet mass 0 kg, carbon allocation 0 kg

## Inputs from technosphere
- chemical, organic: 0.00315984 kg; lognormal variance with pedigree 0.372, pedigree (1,1,5,5,1)
  Other binders
  EcoSpold01Location=GLO
  properties: dry mass 1 kg, carbon content, fossil 0.628, wet mass 1 kg
  note on carbon content, fossil: This dataset is an unweighted average of 20 organic substances (listed in Tab 88.1, ecoinvent v2.2 report 8, part II), being part of the top100 chemicals included in this database. The C-content has also been calculated as an unweighted average of the C content of the substances composing this dataset.
- silicone product: 0.00140993 kg; lognormal variance with pedigree 0.072, pedigree (1,1,5,5,1)
  EcoSpold01Location=RER
  Silane
  properties: wet mass 1 kg, carbon content, fossil 0.324324, dry mass 1 kg
  note on carbon content, fossil: The term silicones is used for compounds in which silicon atoms are linked via oxygen atoms, each silicon atom bearing one or several organic groups. In industrially important silicones, these groups are usually methyl or phenyl (ecoinvent v2.2 report 8_part71 & Ullmann). The chemical formula was considered to be [Si(CH3)2O]n (Ullmann).
- tap water: 0 kg; name tap_water_input; pedigree (1,1,1,1,1)
  IPPC 2000
  EcoSpold01Location=RER
  properties: water content 2962.17, carbon content, fossil 0.00178991, dry mass 0.000337476 kg, wet mass 1 kg
  note on carbon content, fossil: Bicarbonate content is 2.93 mol/m3. CO2 content is 0.1 mol/m3 (ecoinvent v2.2 report 8, Tab 93.1).
- clay: 0.463976 kg; lognormal variance with pedigree 0.052, pedigree (1,1,5,5,1)
  IPPC 2000
  EcoSpold01Location=CH
  properties: dry mass 0.965 kg, water content 0.0362694, wet mass 1 kg
- wastewater from glass production: -0.00299985 m3; lognormal variance with pedigree 0.162, pedigree (1,1,5,5,1)
  Sewage
  EcoSpold01Location=CH
  production volume 0.009 m3
    Calculated from the production volume of glass fibre in proportion to the respective output amounts.
  properties: water content 913.443, carbon content, fossil 0.0455242, dry mass 1.09356 kg, wet mass 1000 kg
  note on carbon content, fossil: COD= 0.115 kg/m3 (Tab A.18, ecoinvent v2.2 report 13_I). COD was converted to TOC, using conversion factors in Tab 4.10 (ecoinvent v2.2 report 13_IV). TOC was considered as Total Carbon.
- boric acid, anhydrous, powder: 0.18799 kg; lognormal variance with pedigree 0.2106, pedigree (5,5,5,5,5)
  Estimation for colemanite CaB3O4(OH)3-H2O, Hydrated Calcium Borate Hydroxide
  EcoSpold01Location=RER
  Uncertainty: 3-H2O, Hydrated Calcium Borate Hydroxide
  properties: dry mass 1 kg, wet mass 1 kg
- waste mineral wool, for final disposal: -0.121994 kg; lognormal variance with pedigree 0.172, pedigree (1,1,5,5,1)
  Fibre glas production waste
  EcoSpold01Location=CH
  production volume 0.366 kg
    (same comment as for wastewater from glass production)
  properties: wet mass 1 kg, dry mass 1 kg
- lime: 0.350982 kg; lognormal variance with pedigree 0.052, pedigree (1,1,5,5,1)
  Calcium carbonate
  EcoSpold01Location=CH
  properties: carbon content, fossil 0.120005, dry mass 1 kg, wet mass 1 kg
- flat glass factory: 3.9998e-10 unit; lognormal variance with pedigree 0.3527, pedigree (2,2,5,5,1)
  EcoSpold01Location=RER
  Estimation
  Uncertainty: Estimation
- electricity, medium voltage: 0 kWh; pedigree (1,1,1,1,1)
  EcoSpold01Location=UCTE
  Forming, utilities and processes
  Uncertainty: Forming, utilities and processes
- waste paint: -0.00360982 kg; lognormal variance with pedigree 0.452, pedigree (1,1,5,5,1)
  Binder wastes
  EcoSpold01Location=CH
  production volume 0.01083 kg
    (same comment as for wastewater from glass production)
  properties: wet mass 1 kg, carbon content, fossil 0.65, dry mass 1 kg
  note on carbon content, fossil: Tab A.5, ecoinvent v2.2 report 13_I. C content has been calculated after data in the tables, and then referred to 1 kg DM
- lubricating oil: 0.00223989 kg; lognormal variance with pedigree 0.202, pedigree (1,1,5,5,1)
  EcoSpold01Location=RER
  Binder
  properties: dry mass 1 kg, carbon content, fossil 0.75, wet mass 1 kg
  note on carbon content, fossil: Lubricating oil is produced from diesel. C-content/dry mass of fats and oils considered 75%, from: ecoinvent v2.2 report, n 15a, pg 40
- fluorspar, 97% purity: 0.00446977 kg; lognormal variance with pedigree 0.602, pedigree (1,1,5,5,1)
  IPPC 2000
  EcoSpold01Location=GLO
  properties: dry mass 1 kg, wet mass 1 kg
- waste mineral oil: -0.00223989 kg; lognormal variance with pedigree 1.012, pedigree (1,1,5,5,1)
  EcoSpold01Location=CH
  For other raw materials
  production volume 0.00672 kg
    (same comment as for wastewater from glass production)
  properties: water content 0.111111, carbon content, fossil 0.864444, dry mass 0.9 kg, wet mass 1 kg
  note on carbon content, fossil: Tab A.6, ecoinvent v2.2 report 13_I. C content has been calculated after data in the tables, and then referred to 1 kg DM
- nylon 6: 0.0282986 kg; lognormal variance with pedigree 0.072, pedigree (1,1,5,5,1)
  For polymers
  EcoSpold01Location=RER
  properties: wet mass 1 kg, dry mass 1 kg, carbon content, fossil 0.637168
  note on carbon content, fossil: It is a chain of caprolactam molecules, originating from aminocarboxylic acids - here caproic acid or caprolactam. The structure of nylon 6 is -(NH-(CH2)5-CO)n-, C6H11NO (ecoinvent v2.2 report 11_II). MW=113 g/mol
- silica sand: 0.369981 kg; lognormal variance with pedigree 0.052, pedigree (1,1,5,5,1)
  IPPC 2000
  EcoSpold01Location=DE
  properties: water content 0.010101, wet mass 1 kg, dry mass 0.99 kg
- aluminium oxide, non-metallurgical: 0.0213989 kg; lognormal variance with pedigree 1.012, pedigree (1,1,5,5,1)
  For other raw materials
  EcoSpold01Location=RER
  properties: wet mass 1 kg, dry mass 1 kg
- heat, district or industrial, natural gas: 0 MJ; pedigree (1,1,1,1,1)
  Melting
  EcoSpold01Location=RER
- tap water: 0.0167503, 0.139153, 0.0276826, 0.698046, 0.0181595, 0.0516544, 7.9881 kg (7 entries); lognormal variance with pedigree 0.202, pedigree (1,1,5,5,1)
  IPPC 2000
  EcoSpold01Location=RER
- electricity, medium voltage: 0.021075, 0.00383477, 0.0650318, 0.942893, 0.134946, 0.442137 kWh (6 entries); lognormal variance with pedigree 0.044, pedigree (1,4,5,5,1)
  (same comment as for electricity, medium voltage)
- heat, district or industrial, natural gas: 0.250269, 14.149 MJ (2 entries); lognormal variance with pedigree 0.072, pedigree (1,1,5,5,1)
  Melting
  EcoSpold01Location=RER

## Emissions to nature
- Water [air, unspecified]: 0.00134093 m3; name water_to_air_unspecified; lognormal variance with pedigree 0.0827, pedigree (2,2,5,5,1)
  Calculated value based on literature values and expert opinion. See comments in the parametres' comment field.
  property fraction, origin: unspecified 0; name fraction_origin_unspecified
  property fraction, origin: fresh water 1; name fraction_origin_fresh_water
  property fraction, origin: salt water 0; name fraction_origin_salt_water
- Arsenic [air, urban air close to ground]: 2.09989e-5 kg; lognormal variance with pedigree 0.074, pedigree (1,4,5,5,1)
  Emission limit in Belgium
  Uncertainty: Emission limit in Belgium
- Carbon dioxide, fossil [air, urban air close to ground]: 0.154992 kg; lognormal variance with pedigree 0.062, pedigree (1,1,5,5,1)
  From raw material decomposition
- Hydrogen fluoride [air, urban air close to ground]: 3.45982e-5 kg; lognormal variance with pedigree 0.162, pedigree (1,1,5,5,1)
  IPPC 2000
- Nitrogen oxides [air, urban air close to ground]: 0.00416979 kg; lognormal variance with pedigree 0.102, pedigree (1,1,5,5,1)
  IPPC 2000
- Sulfur dioxide [air, urban air close to ground]: 0.00282986 kg; lognormal variance with pedigree 0.312, pedigree (1,1,5,5,1)
  IPPC 2000
- Particulates, < 2.5 um [air, urban air close to ground]: 4.84975e-5 kg; lognormal variance with pedigree 0.432, pedigree (1,1,5,5,1)
  Berdowski 2002, waste gas purification
- Particulates, > 2.5 um, and < 10um [air, urban air close to ground]: 1.38993e-5 kg; lognormal variance with pedigree 0.432, pedigree (1,1,5,5,1)
  Berdowski 2002, waste gas purification
- Cadmium [air, urban air close to ground]: 6.99964e-6 kg; lognormal variance with pedigree 0.074, pedigree (1,4,5,5,1)
  Emission limit in Belgium
  Uncertainty: Emission limit in Belgium
- Particulates, > 10 um [air, urban air close to ground]: 6.92965e-6 kg; lognormal variance with pedigree 0.432, pedigree (1,1,5,5,1)
  Berdowski 2002, waste gas purification
- Hydrogen chloride [air, urban air close to ground]: 5.99969e-5 kg; lognormal variance with pedigree 0.162, pedigree (1,1,5,5,1)
  IPPC 2000
- NMVOC, non-methane volatile organic compounds, unspecified origin [air, urban air close to ground]: 0.000223989 kg; lognormal variance with pedigree 0.202, pedigree (1,1,5,5,1)
  IPPC 2000
- Water [water, unspecified]: 0.00459877 m3; name water_to_water_unspecified; lognormal variance with pedigree 0.0827, pedigree (2,2,5,5,1)
  (same comment as for Water)
  property fraction, origin: salt water 0; name fraction_origin_salt_water_Ww
  property fraction, origin: fresh water 1; name fraction_origin_fresh_water_Ww
  property carbon content, non-fossil 0; name C_content_non_fossil
  property carbon content, fossil 0; name C_content_fossil
  property wet mass 1000 kg; name WM
  property dry mass 0 kg; name DM
  property water in wet mass 1000 kg; name WWM
  property fraction, origin: unspecified 0; name fraction_origin_unspecified_Ww
- Antimony [air, urban air close to ground]: 3.49982e-5 kg; lognormal variance with pedigree 0.074, pedigree (1,4,5,5,1)
  Emission limit in Belgium
  Uncertainty: Emission limit in Belgium

## Sampling procedure
Literature

## Extrapolations
From ranges to mean values. This dataset has been copied from an original dataset covering the geography RER. The uncertainty has been adjusted accordingly.

## Review by Daniel Kellenberger (obsolete) 2003-07-23
Passed.
