# treatment of slag, unalloyed electric arc furnace steel, residual material landfill

Dataset: EcoSpold 2, unit process
Geography: CH
Time period: 1994-01-01 to 2019-12-31
Technology level: current
Classification: EcoSpold01Categories: waste management/residual material landfill
Classification: ISIC rev.4 ecoinvent: 3822:Treatment and disposal of hazardous waste
Synonyms: slag from un-alloyed EAF steel production; slag from un-alloyed electric arc furnace steel production
Tags: ConvertedDataset; Treatment
Scenario: Business-as-Usual
System model: Allocation at the point of substitution
Generated by: Gabor Doka (obsolete)
Published in: Doka G. 2009
Database: ecoinvent
isCopyrightProtected: true
accessRestrictedTo: 1

## General comment
Inventoried waste contains 100% slag from electric steel production to landfill; .
waste composition (wet, in ppm): H2O n.a.; O 273900; H n.a.; C 3386.4; S 205.23; N n.a.; P 1343.5; B n.a.; Cl n.a.; Br n.a.; F n.a.; I n.a.; Ag n.a.; As n.a.; Ba n.a.; Cd n.a.; Co n.a.; Cr 10532; Cu 245.93; Hg n.a.; Mn 63578; Mo n.a.; Ni 1612.8; Pb n.a.; Sb n.a.; Se n.a.; Sn n.a.; V 1034.7; Zn 164.88; Be n.a.; Sc n.a.; Sr n.a.; Ti 3078.5; Tl n.a.; W n.a.; Si 67155; Fe 215500; Ca 271360; Al 29871; K 937.06; Mg 52600; Na 3501.9;
Share of carbon in waste that is biogenic 0%.
[This dataset was already contained in the ecoinvent database version 2. It was not individually updated during the transfer to ecoinvent version 3. Life Cycle Impact Assessment results may still have changed, as they are affected by changes in the supply chain, i.e. in other datasets. This dataset was generated following the ecoinvent quality guidelines for version 2. It may have been subject to central changes described in the ecoinvent version 3 change report (http://www.ecoinvent.org/database/ecoinvent-version-3/reports-of-changes/), and the results of the central updates were reviewed extensively. The changes added e.g. consistent water flows and other information throughout the database. The documentation of this dataset can be found in the ecoinvent reports of version 2, which are still available via the ecoinvent website. The change report linked above covers all central changes that were made during the conversion process.]

## Included activities end
Waste-specific short-term emissions to water from leachate. Long-term emissions from landfill to ground water.

## Geography
Technology encountered in Switzerland in 2000. Landfill includes base seal and leachate collection system.

## Technology
Swiss residual material landfill for polluted, inorganic waste. With base seal and leachate collection system. Recultivation after closure.

## Time period
Waste composition as given in literature reference, theoretical data or other source. Transfer coefficients from prospective model.

## Reference product
- slag, unalloyed electric arc furnace steel: -1 kg; CPC 39310: Slag, dross, scalings and other waste from the manufacture of iron or steel; By-product classification Waste
  EcoSpold01Location=CH
  production volume 0.0336675 kg
    This is a placeholder value that does not reflect real-world production volumes. This dataset does not currently require a real-world production volume to work in the database framework, and no actual data were collected yet. This has no negative effect on the results of the ecoinvent database. The placeholder value of this activity was scaled according to the nominal GDP of 2005 (source: United Nations, http://data.un.org/Glossary.aspx?q=GDP+%28current+US%24%29, accessed 20130726) to reflect an appropriate share of the global production volume, which is also a placeholder value.
  property price 0 EUR2005
    Waste products are assigned a price of zero as they are assumed to require further treatment.
  property carbon content 0.00338635
    carbon content on a dry matter basis (reserved; not for manual entry)
  properties: water in wet mass 0 kg, water content 0, carbon content, fossil 0.00338635, dry mass 1 kg, carbon content, non-fossil 0, wet mass 1 kg, carbon allocation 0.00338635 kg

## Inputs from technosphere
- process-specific burdens, residual material landfill: 1 kg; lognormal variance with pedigree 0.04, pedigree (1,1,5,1,1)
  demands per kilogram waste. uncertainty is heeded in the module;activityLink introduced to establish a direct link to the corresponding regional supply of this product
  EcoSpold01Location=CH
- residual material landfill: 2.0833e-9 unit; lognormal variance with pedigree 0.04, pedigree (1,1,5,1,1)
  EcoSpold01Location=CH
  demands per kilogram waste. uncertainty is heeded in the module

## Emissions to nature
- Copper, ion [water, surface water]: 1.5805e-8 kg; lognormal variance with pedigree 1.9, pedigree (1,1,5,1,1)
  uncertainty is calculated from uncertainties in waste composition and transfer coefficients in residual landfill
- Vanadium, ion [water, surface water]: 2.5393e-6 kg; lognormal variance with pedigree 1.23, pedigree (1,1,5,1,1)
  (same comment as for Copper, ion)
- Phosphate [water, ground-, long-term]: 0.00092035 kg; lognormal variance with pedigree 1.22, pedigree (1,1,5,1,1)
  uncertainty is calculated from uncertainties in waste composition and transfer coefficients in incinerator and landfills.
- Chromium VI [water, surface water]: 0.00063309 kg; lognormal variance with pedigree 0.57, pedigree (1,1,5,1,1)
  (same comment as for Copper, ion)
- Nickel, ion [water, surface water]: 9.748e-7 kg; lognormal variance with pedigree 1.35, pedigree (1,1,5,1,1)
  (same comment as for Copper, ion)
- Aluminium [water, ground-, long-term]: 0.0088673 kg; lognormal variance with pedigree 0.65, pedigree (1,1,5,1,1)
  (same comment as for Phosphate)
- Sodium, ion [water, surface water]: 0.0013142 kg; lognormal variance with pedigree 0.56, pedigree (1,1,5,1,1)
  (same comment as for Copper, ion)
- Silicon [water, ground-, long-term]: 0.067004 kg; lognormal variance with pedigree 0.2, pedigree (1,1,5,1,1)
  (same comment as for Phosphate)
- Zinc, ion [water, ground-, long-term]: 2.0208e-6 kg; lognormal variance with pedigree 5.78, pedigree (1,1,5,1,1)
  (same comment as for Phosphate)
- Titanium, ion [water, surface water]: 1.5256e-6 kg; lognormal variance with pedigree 1.3, pedigree (1,1,5,1,1)
  (same comment as for Copper, ion)
- Potassium, ion [water, surface water]: 0.00026414 kg; lognormal variance with pedigree 0.75, pedigree (1,1,5,1,1)
  (same comment as for Copper, ion)
- Manganese [water, ground-, long-term]: 0.00052517 kg; lognormal variance with pedigree 5.95, pedigree (1,1,5,1,1)
  (same comment as for Phosphate)
- Iron, ion [water, surface water]: 1.8031e-6 kg; lognormal variance with pedigree 1.38, pedigree (1,1,5,1,1)
  (same comment as for Copper, ion)
- BOD5, Biological Oxygen Demand [water, ground-, long-term]: 0.001809 kg; lognormal variance with pedigree 0.59, pedigree (1,1,5,1,1)
  (same comment as for Phosphate)
- TOC, Total Organic Carbon [water, ground-, long-term]: 0.0021884 kg; lognormal variance with pedigree 0.59, pedigree (1,1,5,1,1)
  (same comment as for Phosphate)
- Sulfate [water, ground-, long-term]: 0.00054964 kg; lognormal variance with pedigree 0.91, pedigree (1,1,5,1,1)
  (same comment as for Phosphate)
- Sulfate [water, surface water]: 6.6058e-5 kg; lognormal variance with pedigree 1.02, pedigree (1,1,5,1,1)
  (same comment as for Copper, ion)
- Magnesium [water, ground-, long-term]: 0.0059765 kg; lognormal variance with pedigree 1.41, pedigree (1,1,5,1,1)
  (same comment as for Phosphate)
- Manganese [water, surface water]: 8.7675e-7 kg; lognormal variance with pedigree 1.42, pedigree (1,1,5,1,1)
  (same comment as for Copper, ion)
- TOC, Total Organic Carbon [water, surface water]: 3.6535e-6 kg; lognormal variance with pedigree 1.18, pedigree (1,1,5,1,1)
  (same comment as for Copper, ion)
- Zinc, ion [water, surface water]: 3.3737e-9 kg; lognormal variance with pedigree 2.1, pedigree (1,1,5,1,1)
  (same comment as for Copper, ion)
- Aluminium [water, surface water]: 1.4804e-5 kg; lognormal variance with pedigree 1.03, pedigree (1,1,5,1,1)
  (same comment as for Copper, ion)
- Calcium, ion [water, surface water]: 4.0934e-5 kg; lognormal variance with pedigree 0.99, pedigree (1,1,5,1,1)
  (same comment as for Copper, ion)
- Sodium, ion [water, ground-, long-term]: 0.0021877 kg; lognormal variance with pedigree 0.54, pedigree (1,1,5,1,1)
  (same comment as for Phosphate)
- Phosphate [water, surface water]: 1.5365e-6 kg; lognormal variance with pedigree 1.44, pedigree (1,1,5,1,1)
  (same comment as for Copper, ion)
- Iron, ion [water, ground-, long-term]: 0.0010801 kg; lognormal variance with pedigree 7.11, pedigree (1,1,5,1,1)
  (same comment as for Phosphate)
- Potassium, ion [water, ground-, long-term]: 0.00067292 kg; lognormal variance with pedigree 0.71, pedigree (1,1,5,1,1)
  (same comment as for Phosphate)
- DOC, Dissolved Organic Carbon [water, ground-, long-term]: 0.0021884 kg; lognormal variance with pedigree 0.59, pedigree (1,1,5,1,1)
  (same comment as for Phosphate)
- COD, Chemical Oxygen Demand [water, surface water]: 9.2329e-6 kg; lognormal variance with pedigree 1.18, pedigree (1,1,5,1,1)
  (same comment as for Copper, ion)
- COD, Chemical Oxygen Demand [water, ground-, long-term]: 0.0055305 kg; lognormal variance with pedigree 0.59, pedigree (1,1,5,1,1)
  (same comment as for Phosphate)
- Calcium, ion [water, ground-, long-term]: 0.024519 kg; lognormal variance with pedigree 1.53, pedigree (1,1,5,1,1)
  (same comment as for Phosphate)
- Magnesium [water, surface water]: 9.9775e-6 kg; lognormal variance with pedigree 1.09, pedigree (1,1,5,1,1)
  (same comment as for Copper, ion)
- Chromium VI [water, ground-, long-term]: 0.0019998 kg; lognormal variance with pedigree 0.41, pedigree (1,1,5,1,1)
  (same comment as for Phosphate)
- BOD5, Biological Oxygen Demand [water, surface water]: 3.0201e-6 kg; lognormal variance with pedigree 1.18, pedigree (1,1,5,1,1)
  (same comment as for Copper, ion)
- Copper, ion [water, ground-, long-term]: 9.467e-6 kg; lognormal variance with pedigree 3.53, pedigree (1,1,5,1,1)
  (same comment as for Phosphate)
- Vanadium, ion [water, ground-, long-term]: 0.00079528 kg; lognormal variance with pedigree 0.71, pedigree (1,1,5,1,1)
  (same comment as for Phosphate)
- Nickel, ion [water, ground-, long-term]: 0.0005839 kg; lognormal variance with pedigree 0.89, pedigree (1,1,5,1,1)
  (same comment as for Phosphate)
- Silicon [water, surface water]: 0.00015103 kg; lognormal variance with pedigree 0.75, pedigree (1,1,5,1,1)
  (same comment as for Copper, ion)
- DOC, Dissolved Organic Carbon [water, surface water]: 3.6535e-6 kg; lognormal variance with pedigree 1.18, pedigree (1,1,5,1,1)
  (same comment as for Copper, ion)
- Titanium, ion [water, ground-, long-term]: 0.00091386 kg; lognormal variance with pedigree 0.92, pedigree (1,1,5,1,1)
  (same comment as for Phosphate)

## Sampling procedure
Landfill model based on observed leachate concentrations in literature. Extrapolated to 60'000 years heeding chemical characteristics. Initial waste composition from various literature sources.

## Extrapolations
This dataset has been extrapolated from year 2000 to the year of the calculation (2019). The uncertainty has been adjusted accordingly.

## Review by Niels Jungbluth 2009-02-15
passed.
