# yarn production, silk, short fibre

Dataset: EcoSpold 2, unit process
Geography: IN
Time period: 2015-04-01 to 2019-03-31
Technology level: current
Classification: ISIC rev.4 ecoinvent: 1312:Weaving of textiles
Classification: EcoSpold01Categories: textiles/processing
Scenario: Business-as-Usual
System model: Allocation at the point of substitution
Generated by: Avraam Symeonidis
Published in: Faist Emmenegger, M. 2018
Database: ecoinvent
isCopyrightProtected: true
accessRestrictedTo: 1

## General comment
This dataset is constructed using "yarn production, cotton, open end spinning" as an approximation. Short fibres of silk is a by-product of silk reeling and it cannot be directly twisted like other short length fibres. Regarding quality, yarn, silk, has lower sheen and lustre and therefore is used for products other than textiles (where highest quality is preferred) like carpets etc.

## Included activities start
Activity starts with short fibres.

## Included activities end
This activity ends with produced 1 kg yarn.

## Technology
since this dataset reflects a handloom process, there are no machinery modelled

## Reference product
- yarn, silk: 1 kg; CPC 26110: Raw silk (not thrown); By-product classification allocatable product; pedigree (1,1,1,1,1)
  There is no coproduct or waste being generated here. Since, reeled silk is simply doubled up and rereeled in this process. No recircularisation either.
  production volume 6.1434e7 kg; name rppv
    Data for year 2015 Source: http://inserco.org/en/statistics
  property price 31.0125 EUR2005
    Estimated value. This price is averaged from 3 different suppliers available in the commercial webstore of alibaba. The price refers to both bulk and commercial quantity purchase. All websites were retrieved on the 1st of July 2019. THe exchange rate used is from 2010 when 1 USD - 0.827 EUR.
    Sources:
    https://www.alibaba.com/product-detail/100-Raw-Silk-Yarn-20-22D_60581755281.html?spm=a2700.7724838.2017115.245.739d3ce0qElQov
    https://www.alibaba.com/product-detail/100-mulberry-silk-roving-raw-silk_60745859786.html?spm=a2700.7724838.2017115.48.739d3ce0qElQov
  property carbon content, non-fossil 0.465
    "Carbon content on a dry mass basis. All carbon is assumed to be biogenic due to the nature of the product. Carbon content of cotton is 0.44 kg of non-fossil carbon per kg of dry mass of cotton. Value is calculated based on the the composition of silk which is 64% cellulose. The data uses composition of silk fibers accessed on 10/11/2017 on: http://textilefashionstudy.com/chemical-composition-of-silk-fiber-silk-natural-fiber/
  property carbon content 0.465
    carbon content on a dry matter basis (reserved; not for manual entry)
  property true value 31.0125
    allocation property applied in "true value" allocation // value calculated from revenue
  properties: dry mass 0.97 kg, wet mass 1 kg, water content 0.0309278, carbon content, fossil 0, water in wet mass 0.03 kg, carbon allocation 0.45105 kg

## By-products
- heat, for reuse in municipal waste incineration only: 0 MJ; CPC 17300: Steam and hot water; By-product classification allocatable product; pedigree (1,1,1,1,1)
  Net electricity generated from this waste and used in internal MSWI plant energy redistribution.
  Uncertainty: uncertainty is calculated from uncertainties in waste composition and uncertainties in energy efficiency and the uncertainty in internal energy demand
  production volume 45581.7 MJ
  property exergy 0.1842 MJ; name E_th_prod_MSWI_exergy
    This exergy property is based on the exergy content of the product.
  property price 0.0106 EUR2005; name E_th_prod_MSWI_price_EUR2005
    Average European district heat price from Ecoheatcool and Euroheat 2005-2006, Ecoheat Work package 1: The European heat market. Final report. 10.6 EUR/GJ i s the price of district heat. http://www.solarthermalworld.org/files/Ecoheatcool%20WP1%20Web.pdf?download
  property true value relation 0.1842; name E_th_prod_MSWI_true_value_relation
    property to calculate "true value" from
  property true value 4.895e-6
    allocation property applied in "true value" allocation // value calculated from true value relation
- electricity, for reuse in municipal waste incineration only: 0 kWh; CPC 17100: Electrical energy; By-product classification allocatable product; pedigree (1,1,1,1,1)
  (same comment as for heat, for reuse in municipal waste incineration only)
  production volume 6304.58 kWh
  property price 0.1 EUR2005; name E_el_prod_MSWI_price_EUR2005
    Estimated to be the same price as in case of electricity, medium voltage.
  property exergy 3.6 MJ; name E_el_prod_MSWI_exergy
    This exergy property is based on the exergy content of the product.
  property true value relation 3.6; name E_el_prod_MSWI_true_value_relation
    property to calculate "true value" from
  property true value 1.32322e-5
    (same comment as for heat, for reuse in municipal waste incineration only)

## Inputs from technosphere
- wastewater, average: -0.013536 m3; name bp2; = (Water*.8)*-1; lognormal variance with pedigree 0.0108, pedigree (4,4,2,1,1)
  considering 80% default wastewater generation
  production volume 831571 m3; = rppv *bp2
    Calculated from production volume of reference product using the relative outputs.
  property price 0 EUR2005; name bp2_price_EUR2005
  properties: wet mass 1000 kg, water content 2882.2, dry mass 0.346837 kg, carbon content, non-fossil 0.194039
  note on carbon content, non-fossil: 0.0673 kg TOC/m3 (Tab A.17, ecoinvent v2.2 report 13_I). TOC was considered as Total Carbon.
- fibre, silk, short: 0.999999 kg; lognormal variance with pedigree 0.0034, pedigree (2,4,2,1,1)
  properties: dry mass 0.97 kg, wet mass 1 kg, carbon content, non-fossil 0.3769, water content 0.0309278
  note on carbon content, non-fossil: "Carbon content on a dry mass basis. All carbon is assumed to be biogenic due to the nature of the product. Carbon content of cotton is 0.44 kg of non-fossil carbon per kg of dry mass of cotton. Value is calculated based on the the composition of silk which is 64% cellulose. The data uses composition of silk fibers accessed on 10/11/2017 on: http://textilefashionstudy.com/chemical-composition-of-silk-fiber-silk-natural-fiber/ "
- waste mineral oil: -9.99999e-5 kg; name bp1; lognormal variance with pedigree 0.0048, pedigree (1,4,2,5,1)
  This is produced dues to the use of lubricating oil necessary for the operation of machinery.
  production volume 6143.4 kg; = rppv*bp1
    Calculated from production volume of reference product using the relative outputs.
  property price 0 EUR2005; name bp1_price_EUR2005
  properties: carbon content, fossil 0.864444, water content 0.111111, wet mass 1 kg, dry mass 0.9 kg
  note on carbon content, fossil: Tab A.6, ecoinvent v2.2 report 13_I. C content has been calculated after data in the tables, and then referred to 1 kg DM
- building, hall: 1.55665e-5 m2; = 8000/(10278500*50); lognormal variance with pedigree 0.3008, pedigree (2,1,2,1,1)
  total building area (square meters) divided by production per year and life time of the plant
- electricity, low voltage: 0.72 kWh; lognormal variance with pedigree 0.0028, pedigree (1,4,2,1,1)
  This is sum of grease and mobil oil used for lubircating machines
- lubricating oil: 9.99999e-5 kg; lognormal variance with pedigree 0.0028, pedigree (1,4,2,1,1)
  This is sum of grease and mobil oil used for lubircating machines
  properties: dry mass 1 kg, carbon content, fossil 0.75, wet mass 1 kg
  note on carbon content, fossil: Lubricating oil is produced from diesel. C-content/dry mass of fats and oils considered 75%, from: ecoinvent v2.2 report, n 15a, pg 40
- diesel, burned in diesel-electric generating set, 10MW: 0.22295 MJ; = 0.0049*45.5; lognormal variance with pedigree 0.0108, pedigree (4,4,2,1,1)
  Diesel used for power backup. Forumula includes diesel consumption in kg multiplied with calorific value

## Inputs from nature
- Water, well, in ground [natural resource, in water]: 0.01692 m3; name water; lognormal variance with pedigree 0.0108, pedigree (4,4,2,1,1)
  water is used for humidification

## Emissions to nature
- Water [air, urban air close to ground]: 0.003384 m3; = Water*.20; lognormal variance with pedigree 0.0108, pedigree (4,4,2,1,1)
  Considering default value of 20% evaporation rate

## Sampling procedure
Data has been obtained from a Silk reeling and spinning plant located in Hoshangabad in the state of Madhya Pradesh (Central India) based on the representativeness of currently used technology,
