# iron(III) sulfate production, without water, in 12.5% iron solution state

Dataset: EcoSpold 2, unit process
Geography: CA-QC
Time period: 2013-01-01 to 2019-12-31
Technology level: current
Classification: ISIC rev.4 ecoinvent: 2011:Manufacture of basic chemicals
Classification: EcoSpold01Categories: chemicals/inorganics
Synonyms: Ferric sulfate
Scenario: Business-as-Usual
System model: Allocation at the point of substitution
Generated by: Jean-Francois Menard
Database: ecoinvent
isCopyrightProtected: true
accessRestrictedTo: 1

## General comment
This dataset represents the production of iron(III) sulfate in the region of Québec. The functional unit represent 1 kg of iron(III) sulfate (Fe2(SO4)3). The final product is however sold in a 12.5% iron solution state, which corresponds to 44.75% Fe2(SO4)3 or 62.88% hydrated iron(III) sulfate (if the hydrated iron(III) sulfate form is assumed to be Fe2(SO4)3.9H2O).
The data providing manufacturing company makes two grades of product solution, 12.5% iron and 13.3% iron, the first grade represented 90% of the production for the dataset reference year and has been chosen as the reference grade for the dataset, however the collected data represent the annual average per kg of product solution, regardless of the grade.

## Included activities start
This activity starts with the raw material delivery at the manufacturing plant gate.

## Included activities end
This activity ends with the iron(III) sulfate solution at the manufacturing plant gate.
The dataset includes the raw materials and energy consumption for production, waste generation, estimation of the infrastructure (approximation), and sulfuric acid emissions.
The process starts with the mixing of iron ore (magnetite, 67% Fe) and water to make a slurry (67% solids), which is pumped in an agitated digester to react with sulfuric acid (93% solution) for 3 hours. The slurry is then transfered to another reactor to react with pure oxygen to convert the remaining Fe2+ into Fe3+. The slurry in then transfered to a cooling tank, perlite is added and the slurry is passed through a filter press. The iron(III) sulfate solution (two grades are produced, 12.5% and 13.3% Fe, which will be selected by users depending on the transport distance and location and climate of the use site, cf. cold weather will change the viscocity of the solution and make the more concentrated grade less practical) is finally sent to storage tanks and the sludge from the filter press (70% solids, essentially a mix of silica and non-digested ore plus some calcium sulfate and iron(III) sulfate), whose acidic and oxidative characteristics make it a hazardous waste, is sent to a treatment facilty to be neutralized/stabilized using cement.

## Geography
Data from a single manufacturing company in the region of Québec. They are used as average for the region of Québec.

## Reference product
- iron(III) sulfate, without water, in 12.5% iron solution state: 1 kg; name RefProd; By-product classification allocatable product; CPC 34240: Phosphates of triammonium; salts and peroxysalts of inorganic acids and metals n.e.c.; CAS 10028-22-5
  production volume 1.231e7 kg; name ProdVol
    Calculated value. Based on the data providing manufacturing company's production volume and its estimate of its market share for the region of Québec.
  property price 0.37 EUR2005; name RefProd_price_EUR2005
    Calculated value based on data from United Nations Commodity Trade Statistics Database (comtrade.un.org). UN comtrade category: 283329 Sulphates of metals nes. Year 2005. Using exchange rate of 1EURO = 1.209 USD. Average of price of import into 5 main markets (EU, US, JP, IN and CN).
  property wet mass 1 kg; name RefProd_WM
  property water in wet mass 0 kg; name RefProd_WWM
  property water content 0; name RefProd_water_content
  property carbon content, non-fossil 0; name RefProd_C_content_non_fossil
    biogene carbon content on a dry matter basis
  property carbon content, fossil 0; name RefProd_C_content_fossil
    fossil carbon content on a dry matter basis
  property dry mass 1 kg; name RefProd_DM
  property carbon content 0
    carbon content on a dry matter basis (reserved; not for manual entry)
  properties: carbon allocation 0 kg

## Inputs from technosphere
- oxygen, liquid: 0.0580968 kg; lognormal variance with pedigree 0.0046, pedigree (1,4,3,1,1)
  Measured value.
  properties: dry mass 1 kg, wet mass 1 kg
- heat, district or industrial, natural gas: 0.0264742 MJ; = NaturalGas*NaturalGasNetHeatingValue/NaturalGasFuelUse; lognormal variance with pedigree 0.002, pedigree (1,1,3,1,1)
  Reported as for building heating only. Calculated value (see Exchange Properties).
  Uncertainty: Calculated variable. Uncertainty will be determined from propagation of uncertainty factors of underlying variables. Uncertainty of actual relation between variables not accounted at this time, although this could be included in a future update.
  property fuel input in physical units, m3 0.000759728 m3; name NaturalGas
  property heating value, net 36.3 MJ; name NaturalGasNetHeatingValue
  property Corresponding fuel use 1.0417 MJ; name NaturalGasFuelUse
  note on fuel input in physical units, m3: Estimated value. Represents the natural gas used for the building heating.
  note on heating value, net: net (lower) heating (calorific) value. Value taken from Table 5.1 of report "Overview and methodology, Data quality guidelines for the ecoinvent database version 3" (ecoinvent report No. 1 (v3), 2011).
  note on Corresponding fuel use: Lower heating value of the fuel input related to the heat/electricity output. Assume a 96% energy efficiency based on Section 5.3.6 of report "Life cycle Inventories of Energy Systems, Results for Current Systems in Switzerland and other UCTE Countries" (ecoinvent report No. 5, 2007)
- water, deionised: 0.0862738 kg; lognormal variance with pedigree 0.0052, pedigree (2,4,3,1,1)
  Calculated value. Calculated from the amount of sulfuric acid and the concentration of the acid solutions given by the data providing manufacturing company.
  properties: wet mass 1 kg
- iron ore, beneficiated, 65% Fe: 0.426788 kg; lognormal variance with pedigree 0.0046, pedigree (1,4,3,1,1)
  Measure value. Reported as magnetite ore with a 67% iron content (or 92.59% Fe3O4 content).
  properties: wet mass 1 kg, dry mass 1 kg
- sulfuric acid: 0.724847 kg; lognormal variance with pedigree 0.0046, pedigree (1,4,3,1,1)
  EcoSpold01Location=RER
  Measured value. Reported amounts adjusted for the concentration of the acid solutions used (93% and 73% (used acid from the chlor-alkali industry used to dry the chlorine product)) given by the data providing manufacturing company.
  properties: wet mass 1 kg, dry mass 1 kg
- sludge, pig iron production: -0.0111725 kg; name Sludge
  Proxy, measured value. Reported as sludge from the filter press (70% solids, essentially a mix of silica and non-digested ore plus some calcium sulfate and iron(III) sulfate), whose acidic and oxidative characteristics make it a hazardous waste, is sent to a treatment facilty to be neutralized/stabilized using cement.
  production volume 137533 kg; = ProdVol*Sludge/RefProd
    Calculated from production volume of reference product using the relative outputs.
  property price 0 EUR2005; name Sludge_price_EUR2005
  properties: dry mass 0.914 kg, wet mass 1 kg, carbon content, fossil 0.339168, water content 0.0940919
- tap water: 0.134204 kg; name TapWater; lognormal variance with pedigree 0.0046, pedigree (1,4,3,1,1)
  Measured value. Represents the extra amount of water (0.000134913 kg) added to the reaction tank to compensate for the evaporation losses during the mixing and reaction, and the make-up water (0.134069562 kg) for the cooling system (exothermic reaction).
  properties: wet mass 1 kg, water content 2962.17, carbon content, fossil 0.00178991, dry mass 0.000337476 kg
  note on carbon content, fossil: Bicarbonate content is 2.93 mol/m3. CO2 content is 0.1 mol/m3 (ecoinvent v2.2 report 8, Tab 93.1).
- perlite: 0.000580968 kg; lognormal variance with pedigree 0.0046, pedigree (1,4,3,1,1)
  Measured value. Reported as used as filtering aid for the filter press.
  properties: wet mass 1 kg, dry mass 1 kg
- electricity, medium voltage: 0.0307449 kWh; lognormal variance with pedigree 0.0052, pedigree (2,4,3,1,1)
  EcoSpold01Location=UCTE
  Measured and calculated value. Represents the electricity used for the production process itself (agitator and pumps) and the electricity used for the heating of the exterior piping system during winter, building air conditioning during summer (exothermic reaction) and lighting.
- chemical factory, organics: 4e-10 unit; lognormal variance with pedigree 0.48, pedigree (5,5,5,5,5)
  Default value using the generic chemical factory dataset created within the ecoinvent project, based on a 50'000 t annual production and a 50 year lifetime.
  Uncertainty: The uncertainty could not be determined, it has then been maximized.

## Emissions to nature
- Sulfuric acid [air, non-urban air or from high stacks]: 5.58623e-7 kg; lognormal variance with pedigree 0.0046, pedigree (1,4,3,1,1)
  Measured value.
- Water [air, non-urban air or from high stacks]: 0.000134204 m3; = TapWater/1000; lognormal variance with pedigree 0.002, pedigree (1,1,3,1,1)
  Calculated value. Based on amount of tap water input, all water is assumed to be evaporated. The water included in the sulfuric acid input is part of the final product solution so not included in the emission flow.
  Uncertainty: Calculated variable. Uncertainty will be determined from propagation of uncertainty factors of underlying variables. Uncertainty of actual relation between variables not accounted at this time, although this could be included in a future update.
- Sulfur dioxide [air, non-urban air or from high stacks]: 2.01104e-6 kg; lognormal variance with pedigree 0.0046, pedigree (1,4,3,1,1)
  Measured value.

## Sampling procedure
Data based on questionnaire from one manufacturing company, except for the infrastructure which is based on standard assumptions on plant lifetime and annual production volume.

## Extrapolations
This dataset has been extrapolated from year 2013 to the year of the calculation (2019). The uncertainty has been adjusted accordingly.

## Review by Christian Bauer 2013-12-18
passed
