# sulfite pulp production, bleached

Dataset: EcoSpold 2, unit process
Geography: RoW
Time period: 1997-01-01 to 2019-12-31
Technology level: current
Classification: ISIC rev.4 ecoinvent: 1701:Manufacture of pulp, paper and paperboard
Classification: EcoSpold01Categories: paper & cardboard/pulps
Synonyms: chemical pulp; sulphite pulp
Tags: ConvertedDataset
Scenario: Business-as-Usual
System model: Allocation at the point of substitution
Generated by: Roland Hischier
Published in: Hischier R. 2007
Database: ecoinvent
isCopyrightProtected: true
accessRestrictedTo: 1

## General comment
This dataset is a copy of the European dataset (sulfite pulp production, bleached, RER, 2020). It characterises the average production of bleached chemical pulp following the acidic sulfite process in Europe. The dataset aggregates the most common bleaching technologies: Total Chlorine Free (TCF) and Elemental Chlorine Free (ECF). Chemical pulp is produced by chemical pulping of biomass raw materials, most commonly hardwood and softwood,or alsostraw from many cereals, bagasse, reed, or esparto grass, and from other annual non-wood plants.
The sulfite process is based on calcium, magnesium, and sodium or ammonium bisulfide and produces pulp which is virtually pure cellulose. As the process occurs in acidic conditions one of its drawbacks is that some of the cellulose is hydrolysed, making the sulfite pulp fibres not as strong as other pulps, for example, those obtained with the sulphate process (i.e. kraft pulp). Nonetheless, and although globally the sulfate process is used in up to 90% of chemical pulping processes, sulfite pulps are important for specialty papers (e.g. tissue, glassine) and as a sources of cellulose for various applications within or out of the paper industry.
This dataset represents the production of sulfite market pulp, i.e. sulfite pulp sold on the market as opposed to integrated sulfite pulp which is produced at paper mills with integrated pulping facilities. In Europe, 68% of sulfite pulp were produced at integrated mills, 32% were sold on the market. This break down was not available on a global level, therefore it was assumed the European shares apply globally.
The main sources of information for this dataset are a questionnaire completed by a European sulfite pulp producer using a Ca-bisulfite bleaching process and the Finnish EcoData database of KCL following a Mg-sulfite bleaching process (KCL, 2002). Further data sources include a report of the Swedish EPA about the Swedish pulp and paper industry (Naturvardsverket, 2001), a German inventory on graphical paper commissioned by the UBA (Tiedemann et al., 2000) and the European IPPC documentation for the paper and pulp industry, which also contains information on Best Available Techniques (BAT) and the description and quantification of the present situation of the pulp and paper industry (European Commission, 2000).

The European Commission (2000) states that TCF is the primary bleaching process in Europe. For this and copyright reasons of the KCL data, a distribution of 25% ECF and 75% TCF is assumed for the calculation of the average KCL dataset .
The main sources of information for this dataset are a questionnaire completed by a European sulfite pulp producer using a Ca-bisulfite bleaching process and the Finnish EcoData database of KCL following a Mg-sulfite bleaching process (KCL, 2002). Further data sources include a report of the Swedish EPA about the Swedish pulp and paper industry (Naturvardsverket, 2001), a German inventory on graphical paper commissioned by the UBA (Tiedemann et al., 2000) and the European IPPC documentation for the paper and pulp industry, which also contains information on Best Available Techniques (BAT) and the description and quantification of the present situation of the pulp and paper industry (European Commission, 2000).

The European Commission (2000) states that TCF is the primary bleaching process in Europe. For this and copyright reasons of the KCL data, a distribution of 25% ECF and 75% TCF is assumed for the calculation of the average KCL dataset .
Reference(s):
KCL, 2002. KCL (2002) KCL EcoData - life cycle inventory database. The Finnish Pulp and Paper Research Institute (KCL), Espoo (Finnland).
Naturvardsverket, 2001. Naturvardsverket (2001) Skogsindustrins utsläpp - avfallsmängder och energiförbrukning 2000. Report 5154. Naturvardsverket (Swedish EPA), Stockholm.
Tiedemann et al., 2000. Tiedemann A., Böttcher Tiedemann C., Buschardt A., Georgi B., Giersberg G., Goosmann G., Gregor H.-D., Mehlhorn B., Modi A., Neitzel H., Oels H.-J., Schmitz S. and Suhr M. (2000) Ökobilanzen für graphische Papiere. Texte 22/00. Umweltbundesamt, Berlin.
European Commission, 2000. European Commission (2000) Integrated Pollution Prevention and Control (IPPC) - Reference Document on Best Available Techniques in the Pulp and Pa-per Industry. Institute for Prospective Technological Studies, Sevilla.

Activity Start:
This activity starts with the transport of the raw material (e.g. wood) to the pulp factory.

## Included activities end
The process includes transports to the pulp mill, raw material handling, pulping and bleaching, drying process, on-site energy production from internal fuels, recovery cycles of chemicals and internal waste water treatment. The activity ends when the sulfite pulp is ready to be sold.

## Geography
The dataset represents a European average for sulfite pulp production. Data are sourced from various European producers, such as, in Sweden, Finland and Germany.

## Technology
Mix of modern Ca-bisulphite and Mg-sulphite bleaching technology.

## Time period
Data gathered between 2000-2002. The production volume is valid for the year 2016.

## Parameters
- fraction, cooling water, once-through system, to air: 0.004; name fraction_CW_OT_to_air; lognormal variance with pedigree 0.0413, pedigree (2,3,1,3,1)
  Calculated based on literature value (Scown, C.D., 2011, Water Footprint of U.S. Transportation Fuels and supplying information of the article) (Vionnet, S., Quantis Water Database - Technical Report, 2012).
- fraction, cooling water, to air: 0.3875; name fraction_CW_to_air; = (0.5*fraction_CW_OT_to_air)+(0.5*fraction_CW_R_to_air); lognormal variance with pedigree 0.092025, pedigree (4,4,3,2,4)
  Calculated value based on literature value (see comments of the other parametres present in this dataset) and expert opinion. In the case when no industry/literature data are available about the type of cooling or directly fraction, cooling water, to air specific for the process a default assumption is applied. It is assumed that the once-through cooling system is used in 50% of all cases and recirculating system is used in another 50% of all cases.
- fraction, cooling water, recirculating system, to air: 0.771; name fraction_CW_R_to_air; lognormal variance with pedigree 0.0413, pedigree (2,3,1,3,1)
  (same comment as for fraction, cooling water, once-through system, to air)
- fraction, cooling water, cooling pond system, to air: 0.032; name fraction_CW_CP_to_air; lognormal variance with pedigree 0.0413, pedigree (2,3,1,3,1)
  (same comment as for fraction, cooling water, once-through system, to air)
- fraction, process water, to air: 0.231923 dimensionless; name fraction_PW_to_air; lognormal variance with pedigree 0.092025, pedigree (4,4,3,2,4)

## Reference product
- sulfite pulp, bleached: 1 kg; CPC 32112: Chemical wood pulp, other than dissolving grades; By-product classification allocatable product
  EcoSpold01Location=RER
  production volume 1.49173e8 kg; name apv
    Caluclated value. The total amount of global bleached sulfite pulp production in 2016, according to FAOSTAT, was 1450000 tonnes. No data was available on how much of the total global production is produced at integrated paper mills versus how much is traded on the market (market sulfate pulp). This dataset represents bleached marekt sulfite pulp only. Therefore, it was assumed that the share of market sulfite pulp in total sulfite pulp production (bleached and unbleached) in Europe, 32% (CEPI, 2018), applies globally. 32% of 1450000 tonnes results in an annual production volume for sulfite market pulp of 462000 tonnes.
    Reference(s):
    Confederation of European Paper Industries (CEPI), 2018, personal correspondence 4.7.2018
    FAO, 2018, FAOSTAT, Forestry Production and Trade, data retrieved from http://www.fao.org/faostat/en/#data/FO, 4.7.2018
  property price 0.45 EUR2005
    Export value is found at FAOSTAT/Forestry/foresSTAT/world+ / 'Bleached Sulphite Pulp' / export value / year at: http://faostat.fao.org/site/626/DesktopDefault.aspx?PageID=626#ancor. Export quantity is found at FAOSTAT/Forestry/foresSTAT/European Union+ / 'Bleached Sulphite Pulp' / export quantity / year at: http://faostat.fao.org/site/626/DesktopDefault.aspx?PageID=626#ancor. Production value is estimated to equal export value divided by export quantity.
  property carbon content, non-fossil 0.494
    C content of dry mass is 0.494 kgC/kg dry wood (ecoinvent v2.2 report 6_IX & ecoinvent v2.2 report 9).
  property carbon content 0.494
    carbon content on a dry matter basis (reserved; not for manual entry)
  property true value 0.45
    allocation property applied in "true value" allocation // value calculated from revenue
  properties: dry mass 0.9 kg, carbon content, fossil 0, water in wet mass 0.1 kg, water content 0.111111, wet mass 1 kg, carbon allocation 0.4446 kg

## By-products
- heat, for reuse in municipal waste incineration only: 0 MJ; CPC 17300: Steam and hot water; By-product classification allocatable product; pedigree (1,1,1,1,1)
  Net electricity generated from this waste and used in internal MSWI plant energy redistribution.
  Uncertainty: uncertainty is calculated from uncertainties in waste composition and uncertainties in energy efficiency and the uncertainty in internal energy demand
  production volume 1.6793e6 MJ
  property true value relation 0.1842; name E_th_prod_MSWI_true_value_relation
    property to calculate "true value" from
  property exergy 0.1842 MJ; name E_th_prod_MSWI_exergy
    This exergy property is based on the exergy content of the product.
  property price 0.0106 EUR2005; name E_th_prod_MSWI_price_EUR2005
    Average European district heat price from Ecoheatcool and Euroheat 2005-2006, Ecoheat Work package 1: The European heat market. Final report. 10.6 EUR/GJ i s the price of district heat. http://www.solarthermalworld.org/files/Ecoheatcool%20WP1%20Web.pdf?download
  property true value 6.54114e-5
    allocation property applied in "true value" allocation // value calculated from true value relation
- electricity, for reuse in municipal waste incineration only: 0 kWh; CPC 17100: Electrical energy; By-product classification allocatable product; pedigree (1,1,1,1,1)
  (same comment as for heat, for reuse in municipal waste incineration only)
  production volume 235639 kWh
  property exergy 3.6 MJ; name E_el_prod_MSWI_exergy
    This exergy property is based on the exergy content of the product.
  property true value relation 3.6; name E_el_prod_MSWI_true_value_relation
    property to calculate "true value" from
  property price 0.1 EUR2005; name E_el_prod_MSWI_price_EUR2005
    Estimated to be the same price as in case of electricity, medium voltage.
  property true value 0.000179141
    (same comment as for heat, for reuse in municipal waste incineration only)
- potassium fertiliser, as K2O: 0 kg; source CRAAQ 2010; CPC 3463: Mineral or chemical fertilizers, potassic; By-product classification allocatable product; pedigree (1,1,1,1,1)
  This is the potassium (as K2O) output (organic and mineral forms of potassium contained) from organic origin. In practice, only a part of this total amount is available to the plants and the available amount has to be calculated considering efficiency of organic potassium (to replace mineral potassium ), which also depends on many factors, such as climate, soil, crop, timing and technique of application, etc. Since this dataset includes field emissions from the application of sludge, potassium availability has been accounted for in the calculation of direct field emissions.
  Uncertainty: The uncertainty of calculated values is determined from propagation of uncertainty factors of underlying variables.
  production volume 1436.61 kg
  property price 0.188 EUR2005; name K2O_fertiliser_price_EUR2005
    Temporary price data. Calculated as 90% of purchasers price based on: 2004 import price calulated from FAOSTAT (http://faostat.fao.org/site/575/DesktopDefault.aspx?PageID=575#ancor [accessed 2011.01.27] Potash Fertilizers (K20 total nutrients) in kUSD/Mg
  property carbon content 0
    carbon content on a dry matter basis (reserved; not for manual entry)
  property true value 1.81054e-6
    allocation property applied in "true value" allocation // value calculated from revenue
  properties: carbon content, fossil 0, dry mass 1 kg, water in wet mass 0 kg, water content 0, wet mass 1 kg, carbon content, non-fossil 0, carbon allocation 0 kg
- nitrogen fertiliser, as N: 0 kg; source CRAAQ 2010; CPC 3461: Mineral or chemical fertilizers, nitrogenous; By-product classification allocatable product; pedigree (1,1,1,1,1)
  This is the total nitrogen (as N) output (organic and mineral forms of nitrogen contained) from organic origin. In practice, only a part of this total amount is available to the plants and the available amount has to be calculated considering nitrogen efficiency (to replace mineral nitrogen), which also depends on many factors, such as climate, soil, crop, timing and technique of application, etc. Since this dataset includes field emissions from the application of sludge, nitrogen availability has been accounted for in the calculation of direct field emissions.
  Uncertainty: The uncertainty of calculated values is determined from propagation of uncertainty factors of underlying variables.
  production volume 8884.74 kg
  property price 0.473 EUR2005; name N_fertiliser_price_EUR2005
    Temporary price data. Calculated as 90% of purchasers price based on: 2004 prices are calculated on basis of Import/Export data (tonnes and US$) from UN Trade Statistics Database (http://data.un.org/Browse.aspx?d=ComTrade, accessed 7/7-2010). N, P2O5, or K2O content (http://www.fertilizer.org/ifa/Home-Page/STATISTICS/Conversions-factors)
  property carbon content 0
    carbon content on a dry matter basis (reserved; not for manual entry)
  property true value 2.81719e-5
    allocation property applied in "true value" allocation // value calculated from revenue
  properties: water content 0, wet mass 1 kg, dry mass 1 kg, carbon content, non-fossil 0, water in wet mass 0 kg, carbon content, fossil 0, carbon allocation 0 kg
- phosphate fertiliser, as P2O5: 0 kg; source CRAAQ 2010; CPC 3462: Mineral or chemical fertilizers, phosphatic; By-product classification allocatable product; pedigree (1,1,1,1,1)
  This is the total phosphate (as P2O5) output (organic and mineral forms of phosphate contained) from organic origin. In practice, only a part of this total amount is available to the plants and the available amount has to be calculated considering efficiency of organic phosphate (to replace mineral phosphate), which also depends on many factors, such as climate, soil, crop, timing and technique of application, etc. Since this dataset includes field emissions from the application of sludge, phosphate availability has been accounted for in the calculation of direct field emissions.
  Uncertainty: The uncertainty of calculated values is determined from propagation of uncertainty factors of underlying variables.
  production volume 5946.84 kg
  property price 0.241 EUR2005; name P2O5_fertiliser_price_EUR2005
    (same comment as for nitrogen fertiliser, as N)
  property carbon content 0
    carbon content on a dry matter basis (reserved; not for manual entry)
  property true value 9.60757e-6
    allocation property applied in "true value" allocation // value calculated from revenue
  properties: dry mass 1 kg, water content 0, carbon content, fossil 0, wet mass 1 kg, carbon content, non-fossil 0, water in wet mass 0 kg, carbon allocation 0 kg
- soil pH raising agent, as CaCO3: 0 kg; source Marianne Lemieux 2013; CPC 34659: Fertilizers n.e.c.; By-product classification allocatable product; pedigree (1,1,1,1,1)
  Calculated value of the amount of CaCO3 that can be substituted considered the liming efficiency of the sludge.
  Uncertainty: The uncertainty of calculated values is determined from propagation of uncertainty factors of underlying variables.
  production volume 165631 kg
  property carbon content, fossil 0.12; name soil_pH_raising_agent_C_content_fossil_0; = 12/(40+12+3*16)
    Stoichiometric calculation. Fossil carbon content on a dry matter basis.
  property carbon content, non-fossil 0; name soil_pH_raising_a_C_content_non_fossil_0
    biogene carbon content on a dry matter basis
  property price 0.117 EUR2005; name soil_pH_raising_agent_as_CaCO3_price_EUR
    The price is estimated to be the same as for lime.
  property carbon content 0.12
    carbon content on a dry matter basis (reserved; not for manual entry)
  property true value 0.000129908
    allocation property applied in "true value" allocation // value calculated from revenue
  properties: wet mass 1 kg, water in wet mass 0 kg, water content 0, dry mass 1 kg, carbon allocation 0.12 kg
- iron scrap, sorted, pressed: 0 kg; By-product classification Recyclable; CPC 39310: Slag, dross, scalings and other waste from the manufacture of iron or steel; pedigree (1,1,1,1,1)
  metallic iron scrap removed from ash reamains and recycled.
  Uncertainty: uncertainty is calculated from uncertainties in waste composition and transfer coefficients to soild residues
  production volume 1876.53 kg
  property price 0.175 EUR2005
    Temporary price data. Calculated as 90% of purchasers price based on: 2005 import and export prices (total trades (USD) divided by total weight (kg) in biggest economies of the world: EU27, USA, Brasil, China, India, Japan and Russia) from UN Commodity Trade Statistics Database (http://data.un.org/Explorer.aspxDatabase [Accessed 2011.06.20]). Commodity: Waste or scrap, of cast iron
  property carbon content 0
    carbon content on a dry matter basis (reserved; not for manual entry)
  property true value 2.04245e-6
    allocation property applied in "true value" allocation // value calculated from revenue
  properties: carbon content, non-fossil 0, wet mass 1 kg, dry mass 1 kg, water content 0, carbon content, fossil 0, water in wet mass 0 kg, carbon allocation 0 kg
- copper: 0 kg; source Rentz O. 1999; By-product classification allocatable product; CPC 41413: Refined copper and copper alloys, unwrought; master alloys of copper
  Literature value. Copper uses: Before end-use copper is manufactured into semi fabricated products, such as shapes and ingots (known as 'semis'). These manufacturing processes are subdivided into hot working, cold working and, if necessary, process annealing. Few of the semis are ready for use as such. They more typically travel to first-stage manufacturers, who make metal rods, wire, and casting, and then to component manufacturers who produce such things as motors, valves, and insulated cables The components in turn are incorporated by final-stage manufacturers into a variety of finished products - automobiles, commercial buildings, residential housing, and so forth. These uses account for about 79% of the world-wide consumption of copper.
  production volume 60.468 kg
  property price 5.52 EUR2005
    Literature value (http://www.economist.com/news/business/21576714-mining-industry-has-enriched-chile-its-future-precarious-copper-solution). Average price between 20015 and 2013.
  property carbon content 0
    carbon content on a dry matter basis (reserved; not for manual entry)
  property true value 2.05065e-6
    allocation property applied in "true value" allocation // value calculated from revenue
  properties: dry mass 1 kg, water in wet mass 0 kg, wet mass 1 kg, carbon content, non-fossil 0, water content 0, carbon content, fossil 0, carbon allocation 0 kg
- zinc concentrate: 0 kg; CPC 14290: Other non-ferrous metal ores and concentrates (other than uranium or thorium ores and concentrates); By-product classification allocatable product
  Calculated value from the knowledge of the properties of both products.
  production volume 4.79951e-8 kg
  property price 0.38 EUR2005; name ByP_price_EUR2005
    Temporary price data. Calculated as 90% of purchasers price based on: Zinc content in concentrate 53%. Concentrate price per kg Zn 86.5% of refined Zn price (13.5% treatment charges according to CHR Metals Limited 2005: Dynamic cost curves. http://www.minecost.com/dynamic.pdf). 2004 zinc price from USGS (2007) Mineral commodity summaries 2007. <http://minerals.usgs.gov/minerals/pubs/mcs/2007/mcs2007.pdf> [Accessed 25 May 2010]
  property zinc content 0.53; name zinc_C_zinc_concentrate
    Zinc content on a dry matter basis. Value taken from teh "zinc mine operation" /GLO dataset.
  property dry mass 1 kg; name DM_zinc_concentrate
  property carbon content 0
    carbon content on a dry matter basis (reserved; not for manual entry)
  property true value 1.12049e-16
    allocation property applied in "true value" allocation // value calculated from revenue
  properties: wet mass 1 kg, water content 0, carbon content, non-fossil 0, carbon content, fossil 0, water in wet mass 0 kg, carbon allocation 0 kg
- iron scrap, unsorted: 0 kg; source European Aluminium Association 2008; CPC 39310: Slag, dross, scalings and other waste from the manufacture of iron or steel; By-product classification Recyclable; pedigree (1,1,1,1,1)
  production volume 0.0496453 kg
  property price 0.149 EUR2005; name ironScrapAmount_price_EUR2005
    Temporary price data. Calculated as 90% of purchasers price based on: estimated at 85% of sorted scrap
  property carbon content 0
    carbon content on a dry matter basis (reserved; not for manual entry)
  property true value 4.94751e-11
    allocation property applied in "true value" allocation // value calculated from revenue
  properties: water in wet mass 0 kg, water content 0, carbon content, fossil 0, carbon content, non-fossil 0, dry mass 1 kg, wet mass 1 kg, carbon allocation 0 kg
- aluminium oxide, non-metallurgical: 0 kg; source European Aluminium Association 2008; CPC 41432: Alumina (aluminium oxide), except artificial corundum; By-product classification allocatable product; CAS 1344-28-1; pedigree (1,1,1,1,1)
  production volume 3.12399 kg
  property carbon content, non-fossil 0; name C_content_non_fossil
  property price 0.28 EUR2005; name Al2O3Amount_price_EUR2005
    From UN trade database. http://data.un.org/ Import data from the largest economies of the world are used (Brazil, India, USA, China, Japan and EU-27).
  property dry mass 1 kg; name DM
  property water content 0; name water_content
  property wet mass 1 kg; name WM
  property water in wet mass 0 kg; name WWM
  property carbon content, fossil 0; name C_content_fossil
  property carbon content 0
    carbon content on a dry matter basis (reserved; not for manual entry)
  property true value 5.85046e-9
    allocation property applied in "true value" allocation // value calculated from revenue
  properties: carbon allocation 0 kg
- aluminium, cast alloy: 0 kg; source European Aluminium Association 2008; By-product classification allocatable product; CPC 41431: Unwrought aluminium; pedigree (1,1,1,1,1)
  EcoSpold01Location=RER
  production volume 29.2024 kg
  property price 1.3 EUR2005; name castAlloyAmount_price_EUR2005
    Temporary price data. Calculated as 90% of purchasers price based on: Source: London Metal Exchange, Aluminium alloy price for 2005
  property carbon content 0
    carbon content on a dry matter basis (reserved; not for manual entry)
  property true value 2.53912e-7
    allocation property applied in "true value" allocation // value calculated from revenue
  properties: water in wet mass 0 kg, carbon content, non-fossil 0, water content 0, dry mass 1 kg, carbon content, fossil 0, wet mass 1 kg, carbon allocation 0 kg
- aluminium, wrought alloy: 0 kg; source European Aluminium Association 2008; By-product classification allocatable product; CPC 4153: Semi-finished products of aluminium or aluminium alloys; pedigree (1,1,1,1,1)
  production volume 12.7843 kg
  property price 1.44 EUR2005; name secondaryAluminiumOutput_price_EUR2005
    Estimated based on literature values and expert judgement. Aluminium ccast alloys are about 90% of the price of aluminium wrought alloys.
  property carbon content 0
    carbon content on a dry matter basis (reserved; not for manual entry)
  property true value 1.23129e-7
    allocation property applied in "true value" allocation // value calculated from revenue
  properties: wet mass 1 kg, water content 0, carbon content, fossil 0, water in wet mass 0 kg, carbon content, non-fossil 0, dry mass 1 kg, carbon allocation 0 kg

## Inputs from technosphere
- magnesium oxide: 0.00649396 kg; lognormal variance with pedigree 0.0432, pedigree (2,3,5,5,1)
  Average from finnish DB, SE-EPA and 1 site
  EcoSpold01Location=RER
  Uncertainty: average from finnish DB, SE-EPA and 1 site
  properties: wet mass 1 kg, dry mass 1 kg
- sodium chlorate, powder: 0.000599442 kg; lognormal variance with pedigree 0.0432, pedigree (2,3,5,5,1)
  EcoSpold01Location=RER
  Average from finnish DB, SE-EPA and 1 site
  Uncertainty: average from finnish DB, SE-EPA and 1 site
  properties: wet mass 1 kg, dry mass 1 kg
- diesel: 0 kg; pedigree (1,1,1,1,1)
  (same comment as for magnesium oxide)
  properties: wet mass 1 kg, dry mass 1 kg, carbon content, fossil 0.865
  note on carbon content, fossil: C-content of diesel is 86.5% (ecoinvent v2.2 report 6_IV, Tab 3.14)
- pulpwood, softwood, measured as solid wood under bark: 0.0034368 m3; lognormal variance with pedigree 0.0432, pedigree (2,3,5,5,1)
  (same comment as for sodium chlorate, powder)
  properties: water content 1.4, dry mass 450 kg, carbon content, non-fossil 0.494, wet mass 1080 kg
  note on carbon content, non-fossil: C content of dry mass is 0.494 kgC/kg dry wood (ecoinvent v2.2 report 9)
- waste textile, soiled: -0.000779275 kg; name a_wtex; lognormal variance with pedigree 0.0432, pedigree (2,3,5,5,1)
  EcoSpold01Location=CH
  Average Swedish data from SE-EPA report
  Uncertainty: average Swedish data from SE-EPA report
  production volume 116355 kg; = a_wtex*apv
    Calculated from the production volume of sulfite pulp, bleached in proportion to the respective output amounts.
  property price 0 EUR2005; name a_wtex_price_EUR2005
  properties: wet mass 1 kg, carbon content, non-fossil 0.570519, dry mass 0.75 kg, water content 0.333333
  note on carbon content, non-fossil: C content of 1 kg DM was calculated after data in Tab A.4, ecoinvent v2.2 report 13_I,
- green liquor dregs: -0.00359665 kg; name a_gld; lognormal variance with pedigree 0.0432, pedigree (2,3,5,5,1)
  Average Swedish data from SE-EPA report
  EcoSpold01Location=CH
  Uncertainty: average Swedish data from SE-EPA report
  production volume 537022 kg; = a_gld*apv
    (same comment as for waste textile, soiled)
  property price 0 EUR2005; name a_gld_price_EUR2005
  properties: dry mass 0.75 kg, water content 0.333333, carbon content, non-fossil 0.390667, wet mass 1 kg
  note on carbon content, non-fossil: Tab 6.25, ecoinvent v2.2 report 11_III & Tab A.9, ecoinvent v2.2 report 13_I
- chlorine dioxide: 0.00159851 kg; lognormal variance with pedigree 0.0432, pedigree (2,3,5,5,1)
  (same comment as for sodium chlorate, powder)
  properties: dry mass 1 kg, wet mass 1 kg
- waste plastic, mixture: 0 kg; name a_wpm; pedigree (1,1,1,1,1)
  (same comment as for green liquor dregs)
  production volume 0 kg
    (same comment as for waste textile, soiled)
  property price 0 EUR2005; name a_wpm_price_EUR2005
  properties: dry mass 0.847 kg, wet mass 1 kg, water content 0.180638, carbon content, fossil 0.747344
  note on carbon content, fossil: C content in 1 kg DM was calculated using data in Tab A.2, ecoinvent v2.2 report 13_I
- heat, district or industrial, other than natural gas: 0 MJ; pedigree (1,1,1,1,1)
  (same comment as for magnesium oxide)
- electricity, medium voltage: 0 kWh; pedigree (1,1,1,1,1)
  EcoSpold01Location=NORDEL
  Average from finnish DB, SE-EPA and 1 site
  Uncertainty: average from finnish DB, SE-EPA and 1 site
- municipal solid waste: 0 kg; name a_msw; pedigree (1,1,1,1,1)
  (same comment as for waste textile, soiled)
  production volume 0 kg
    (same comment as for waste textile, soiled)
  properties: water content 0.297017, carbon content, fossil 0.171549, dry mass 0.771 kg, carbon content, non-fossil 0.261655, wet mass 1 kg
  note on carbon content, fossil: MSW composition in tab 4.1, ecoinvent v2.2 report 13_I. C content referred to 1 kg DM
- waste graphical paper: 0 kg; name a_wgp; pedigree (1,1,1,1,1)
  (same comment as for green liquor dregs)
  production volume 0 kg
    (same comment as for waste textile, soiled)
  property price 0 EUR2005; name a_wgp_price_EUR2005
  properties: wet mass 1 kg, carbon content, non-fossil 0.454955, water content 0.126126, dry mass 0.888 kg
- ash from paper production sludge: -0.00293727 kg; name a_ash_pps; lognormal variance with pedigree 0.0432, pedigree (2,3,5,5,1)
  (same comment as for green liquor dregs)
  production volume 438568 kg; = a_ash_pps*apv
    (same comment as for waste textile, soiled)
  property price 0 EUR2005; name a_ash_pps_price_EUR2005
  properties: dry mass 1 kg, wet mass 1 kg, carbon content, non-fossil 0.0092
- scrap steel: -0.000839219 kg; name a_ssteel; lognormal variance with pedigree 0.0432, pedigree (2,3,5,5,1)
  (same comment as for green liquor dregs)
  production volume 125305 kg; = a_ssteel*apv
    (same comment as for waste textile, soiled)
  property price 0 EUR2005; name a_ssteel_price_EUR2005
  properties: dry mass 1 kg, wet mass 1 kg
- sodium hydroxide, without water, in 50% solution state: 0.0423606 kg; lognormal variance with pedigree 0.0432, pedigree (2,3,5,5,1)
  (same comment as for sodium chlorate, powder)
  properties: wet mass 1 kg, dry mass 1 kg
- waste wood, untreated: 0 kg; name a_ww; pedigree (1,1,1,1,1)
  (same comment as for waste textile, soiled)
  production volume 0 kg
    (same comment as for waste textile, soiled)
  property price 0 EUR2005; name a_ww_price_EUR2005
  properties: carbon content, non-fossil 0.48632, dry mass 0.8 kg, water content 0.25, wet mass 1 kg
  note on carbon content, non-fossil: Tab A.4, ecoinvent v2.2 report 13_I. C content has been referred to 1 kg DM,
- sulfur dioxide, liquid: 0.0267751 kg; lognormal variance with pedigree 0.0432, pedigree (2,3,5,5,1)
  (same comment as for sodium chlorate, powder)
  properties: wet mass 1 kg, dry mass 1 kg
- pulpwood, hardwood, measured as solid wood under bark: 0.000793262 m3; lognormal variance with pedigree 0.0432, pedigree (2,3,5,5,1)
  (same comment as for sodium chlorate, powder)
  properties: carbon content, non-fossil 0.494, dry mass 650 kg, wet mass 1170 kg, water content 0.8
- oxygen, liquid: 0.0118889 kg; lognormal variance with pedigree 0.0432, pedigree (2,3,5,5,1)
  (same comment as for sodium chlorate, powder)
  properties: wet mass 1 kg, dry mass 1 kg
- sulfuric acid: 0.000399628 kg; lognormal variance with pedigree 0.0432, pedigree (2,3,5,5,1)
  (same comment as for magnesium oxide)
  properties: wet mass 1 kg, dry mass 1 kg
- sulfur: 0.0255762 kg; lognormal variance with pedigree 0.0432, pedigree (2,3,5,5,1)
  (same comment as for sodium chlorate, powder)
  properties: dry mass 1 kg, wet mass 1 kg
- pulp factory: 4.99535e-11 unit; lognormal variance with pedigree 0.448, pedigree (4,5,5,5,5)
  Assumption
  EcoSpold01Location=RER
  Uncertainty: assumption
- sludge from pulp and paper production: -0.0103903 kg; name a_sludge_pps; lognormal variance with pedigree 0.0432, pedigree (2,3,5,5,1)
  (same comment as for waste textile, soiled)
  production volume 1.5514e6 kg; = a_sludge_pps*apv
    (same comment as for waste textile, soiled)
  property price 0 EUR2005; name a_sludge_pps_price_EUR2005
  properties: water content 0.333333, carbon content, non-fossil 0.21, dry mass 0.75 kg, wet mass 1 kg
  note on carbon content, non-fossil: Tab 6.21, ecoinvent v2.2 report 11_III & Tab A.9, ecoinvent v2.2 report 13_I. Sludge from pulp and paper contains 15.75% carbon
- wood ash mixture, pure: -0.0446585 kg; name a_woodash; lognormal variance with pedigree 0.0432, pedigree (2,3,5,5,1)
  (same comment as for waste textile, soiled)
  production volume 6.66802e6 kg; = a_woodash*apv
    (same comment as for waste textile, soiled)
  property price 0 EUR2005; name a_woodash_price_EUR2005
  properties: wet mass 1 kg, dry mass 1 kg, carbon content, non-fossil 0.012
- lime: 0.0520516 kg; lognormal variance with pedigree 0.0432, pedigree (2,3,5,5,1)
  EcoSpold01Location=CH
  Average from finnish DB, SE-EPA and 1 site
  Uncertainty: average from finnish DB, SE-EPA and 1 site
  properties: carbon content, fossil 0.120005, wet mass 1 kg, dry mass 1 kg
- hydrogen peroxide, without water, in 50% solution state: 0.0256761 kg; lognormal variance with pedigree 0.0432, pedigree (2,3,5,5,1)
  (same comment as for sodium chlorate, powder)
  properties: dry mass 1 kg, wet mass 1 kg
- diesel: 1.02728e-5, 4.93855e-7, 2.07328e-5, 1.45225e-6, 2.09906e-6, 0.000204726 kg (6 entries); lognormal variance with pedigree 0.0432, pedigree (2,3,5,5,1)
  (same comment as for magnesium oxide)
- waste plastic, mixture: -0.000928183, -6.20176e-5, -4.69029e-6, -2.56155e-5, -1.03484e-5, -2.43243e-5, -0.0064978 kg (7 entries); lognormal variance with pedigree 0.0432, pedigree (2,3,5,5,1)
  (same comment as for green liquor dregs)
  production volume 1.12775e6 kg
- heat, district or industrial, other than natural gas: 0.00559565, 12.4818 MJ (2 entries); lognormal variance with pedigree 0.0432, pedigree (2,3,5,5,1)
  (same comment as for magnesium oxide)
- electricity, medium voltage: 0.001831, 0.000333165, 0.00564997, 0.0819187, 0.0117241, 0.038413 kWh (6 entries); lognormal variance with pedigree 0.0432, pedigree (2,3,5,5,1)
  (same comment as for electricity, medium voltage)
- municipal solid waste: -5.3558e-6, -1.34953e-6, -1.92856e-6, -0.00378784 kg (4 entries); lognormal variance with pedigree 0.0432, pedigree (2,3,5,5,1)
  (same comment as for waste textile, soiled)
  production volume 566857 kg
- waste graphical paper: -0.000117263, -1.79065e-5, -1.56576e-6, -6.47039e-5, -6.30916e-6, -1.16789e-5, -0.00217834 kg (7 entries); lognormal variance with pedigree 0.0432, pedigree (2,3,5,5,1)
  (same comment as for green liquor dregs)
  production volume 358015 kg
- waste wood, untreated: -2.81903e-5, -3.50025e-6, -2.55907e-7, -9.83114e-6, -1.48525e-6, -2.34805e-6, -0.000373999 kg (7 entries); lognormal variance with pedigree 0.0432, pedigree (2,3,5,5,1)
  (same comment as for waste textile, soiled)
  production volume 62652.6 kg

## Inputs from nature
- Water, cooling, unspecified natural origin [natural resource, in water]: 0.0174837 m3; name water_cooling_UNO_input; source Byers, W. 2003; lognormal variance with pedigree 0.0532, pedigree (2,3,5,5,1)
  Based on filled in questionnaire from 1 site
  Calculated based on literature (Byers, W., 2003, Industrial Water Management; Fibria, 2010, Sustainability Report_pulp from eucalyptus), (Vionnet, S., Quantis Water Database - Technical Report, 2012). It includes the main processes: wood washing and screening, evaporation, recausticizing, bleach plant chemical preparation and pulp dryer.
  Uncertainty: based on filled in questionnaire from 1 site
- Water, unspecified natural origin [natural resource, in water]: 0.0724326 m3; name water_UNO_input; source Byers, W. 2003; lognormal variance with pedigree 0.0546, pedigree (3,3,5,5,1)
  Average from finnish DB, SE-EPA and 1 site
  Calculated based on literature (Byers, W., 2003, Industrial Water Management; Fibria, 2010, Sustainability Report_pulp from eucalyptus), (Vionnet, S., Quantis Water Database - Technical Report, 2012). It includes the main processes: wood washing and screening, evaporation, recausticizing, bleach plant chemical preparation and pulp dryer.
  Uncertainty: average from finnish DB, SE-EPA and 1 site

## Emissions to nature
- Phosphorus [water, surface water]: 3.99628e-5 kg; lognormal variance with pedigree 0.0932, pedigree (2,3,5,5,1)
  Average from finnish DB, SE-EPA and 1 site
  Uncertainty: average from finnish DB, SE-EPA and 1 site
- COD, Chemical Oxygen Demand [water, surface water]: 0.0533504 kg; lognormal variance with pedigree 0.0932, pedigree (2,3,5,5,1)
  (same comment as for Phosphorus)
- Sulfur dioxide [air, urban air close to ground]: 0.00244772 kg; lognormal variance with pedigree 0.0432, pedigree (2,3,5,5,1)
  Process emission average from finnish DB, SE-EPA and 1 site
  Uncertainty: process emission average from finnish DB, SE-EPA and 1 site
- AOX, Adsorbable Organic Halogen as Cl [water, surface water]: 0.000199814 kg; lognormal variance with pedigree 0.0932, pedigree (2,3,5,5,1)
  (same comment as for Phosphorus)
- Sulfate [water, surface water]: 0.0234782 kg; lognormal variance with pedigree 0.0932, pedigree (2,3,5,5,1)
  (same comment as for Phosphorus)
- Nitrogen oxides [air, urban air close to ground]: 0.00142867 kg; lognormal variance with pedigree 0.0932, pedigree (2,3,5,5,1)
  (same comment as for Sulfur dioxide)
- BOD5, Biological Oxygen Demand [water, surface water]: 0.00420609 kg; lognormal variance with pedigree 0.0932, pedigree (2,3,5,5,1)
  (same comment as for Phosphorus)
- Water [air, unspecified]: 0.0235737 m3; name water_to_air_unspecified; lognormal variance with pedigree 0.0827, pedigree (2,2,5,5,1)
  Calculated value based on literature values and expert opinion. See comments in the parametres' comment field.
  property fraction, origin: unspecified 1; name fraction_origin_unspecified
  property fraction, origin: salt water 0; name fraction_origin_salt_water
  property fraction, origin: fresh water 0; name fraction_origin_fresh_water
- DOC, Dissolved Organic Carbon [water, surface water]: 0.0197594 kg; lognormal variance with pedigree 0.0932, pedigree (2,3,5,5,1)
  Calculated as equal to TOC.
  Uncertainty: average from finnish DB, SE-EPA and 1 site
- Water [water, unspecified]: 0.0663426 m3; name water_to_water_unspecified; lognormal variance with pedigree 0.0827, pedigree (2,2,5,5,1)
  (same comment as for Water)
  property wet mass 1000 kg; name WM
  property fraction, origin: fresh water 0; name fraction_origin_fresh_water_Ww
  property dry mass 0 kg; name DM
  property fraction, origin: salt water 0; name fraction_origin_salt_water_Ww
  property carbon content, fossil 0; name C_content_fossil
  property water in wet mass 1000 kg; name WWM
  property fraction, origin: unspecified 1; name fraction_origin_unspecified_Ww
  property carbon content, non-fossil 0; name C_content_non_fossil
- Suspended solids, unspecified [water, surface water]: 0.00509526 kg; lognormal variance with pedigree 0.0932, pedigree (2,3,5,5,1)
  (same comment as for Phosphorus)
- TOC, Total Organic Carbon [water, surface water]: 0.0197594 kg; lognormal variance with pedigree 0.0932, pedigree (2,3,5,5,1)
  Calculated by default as TOC (gC) = COD/2.7 (COD measured in g O2). Should more correctly be calculated from the carbon content of the specified emissions to water.
  Uncertainty: average from finnish DB, SE-EPA and 1 site
- Nitrogen [water, surface water]: 0.000509526 kg; lognormal variance with pedigree 0.0932, pedigree (2,3,5,5,1)
  (same comment as for Phosphorus)

## Sampling procedure
Based on literature and industry data (see general comment for details about sources).

## Extrapolations
This dataset is a copy of the European dataset "sulfite pulp production, bleached, RER, 2000". The uncertainty was adjusted accordingly.

## Review by Hans-Jörg Althaus 2003-08-06
Passed
