# compact fluorescent lamp

Dataset: EcoSpold 2, unit process
Geography: GLO
Time period: 2012-01-01 to 2019-12-31
Technology level: current
Classification: ISIC rev.4 ecoinvent: 2740:Manufacture of electric lighting equipment
Scenario: Business-as-Usual
System model: Allocation at the point of substitution
Generated by: Viachaslau Filimonau
Published in: Elijosiute, K 2012
Database: ecoinvent
isCopyrightProtected: true
accessRestrictedTo: 1

## General comment
This activity represents the production and disposal of an average compact fluorescent lamp which is circa 75 g in mass (excluding packaging). It has the envisaged lifetime of 1.1 years (10000 hours of operational time), 10W power and is manufactured in Europe. The figures on material inputs from technosphere and energy required to produce an average compact fluorescent lamp are taken from Elijosiute et al. 2012. The figure on the annual production volume (2.9 million units) is from Worldwatch Institute 2009.

## Included activities start
This activity starts with the reception of materials at the factory.

## Included activities end
The activity includes the processes of material and energy use in manufacturing an average compact fluorescent lamp. The inventory additionally accounts for disposal of all materials. Packaging is not included.

## Geography
Geography GLO was chosen because the dataset aims to represent the production of an average compact fluoresecent lamp. The literature sources used refer to manufacturing in Europe.

## Time period
The literature sources used refer to the underpinning technology as being current.

## Reference product
- iron scrap, unsorted: 1 kg; = iron; CPC 39310: Slag, dross, scalings and other waste from the manufacture of iron or steel; By-product classification Recyclable
  The amount is set equal to the input amount for the respective material.
  production volume 18204.6 kg; = RP_PV * (Ref('fef2fccc-b233-4c23-a2b5-d76ab914e00d') / RP)
    Calculated from production volume of reference product using the relative outputs.
  property price 0.149 EUR2005
    Temporary price data. Calculated as 90% of purchasers price based on: estimated at 85% of sorted scrap
  property carbon content 0
    carbon content on a dry matter basis (reserved; not for manual entry)
  property true value 0.0009346
    allocation property applied in "true value" allocation // value calculated from revenue
  properties: water in wet mass 0 kg, wet mass 1 kg, carbon content, fossil 0, carbon content, non-fossil 0, water content 0, dry mass 1 kg, carbon allocation 0 kg
- compact fluorescent bulb: 0 unit; name RP; By-product classification allocatable product; CPC 4653: Lighting equipment
  production volume 2.9e6 unit; name RP_PV
    Calculated from Worldwatch Institute 2009 based on the share of China (2400000) which is assumed to be equal to 85% of the global production. Source: Worldwatch Institute 2009. Strong Growth in Compact Fluorescent Bulbs Reduces Electricity Demand. Worldwatch Institute, Washington, DC, USA.
  property price 1.45 EUR2005; name RP_price_EUR2005
    Estimated value. The price is taken from TrovaPrezzi, an online search engine for prices, website (retrieved from: https://www.trovaprezzi.it/prezzo_lampadine_lampadine_fluorescenti_compatte.aspx, accessed 13Feb2018). The range of prices varies greatly from 1.4 to over 1.74 euros. A representative price of 300 was chosen. The choice is based on the most common price for an average appliance, and accounting for profit margins. According to an article from Blokhin "What profit margin is average for a company in the electronics sector?" (Source: Investopedia, retrieved from: https://www.investopedia.com/ask/answers/051215/what-profit-margin-average-company-electronics-sector.asp, 13Feb2018) the average profit margin made in the electronics sector in 2015 was of 9%.
  property lifetime capacity [h] 10000 hour
    Calculated from Elijosiute et al. 2012 who estimate the life time of a bulb to be eqaul to 10000 hours which equates to circa 1 year. Source: Elijosiute et al. 2012, 2012, Elijosiute, K, Balciukeviciute, J., and Danafas, G., Assessment of Compact Fluorescent and Incadescent Lamps: Comparative Analysis, Environmental Research, Engineering and , 3, 61, 65-72, 1 - Article, Elijosiute, K., Balciukeviciute, J., and Danafas, G., 2012. Life Cycle Assessment of Compact Fluorescent and Incadescent Lamps: Comparative Analysis. Environmental Research, Engineering and Management, 3(61), 65-72.
  property lifetime 1 year
    (same comment as for compact fluorescent bulb)
  property weight 0.75 kg; name weight
    (same comment as for compact fluorescent bulb)
  property true value 1.45; name RP_true_value
    allocation property applied in "true value" allocation // value calculated from revenue

## By-products
- electricity, for reuse in municipal waste incineration only: 0 kWh; CPC 17100: Electrical energy; By-product classification allocatable product; pedigree (1,1,1,1,1)
  Net electricity generated from this waste and used in internal MSWI plant energy redistribution.
  Uncertainty: uncertainty is calculated from uncertainties in waste composition and uncertainties in energy efficiency and the uncertainty in internal energy demand
  production volume 6044.76 kWh
  property price 0.1 EUR2005; name E_el_prod_MSWI_price_EUR2005
    Estimated to be the same price as in case of electricity, medium voltage.
  property exergy 3.6 MJ; name E_el_prod_MSWI_exergy
    This exergy property is based on the exergy content of the product.
  property true value relation 3.6; name E_el_prod_MSWI_true_value_relation
    property to calculate "true value" from
  property true value 0.000194649
    allocation property applied in "true value" allocation // value calculated from true value relation
- heat, for reuse in municipal waste incineration only: 0 MJ; CPC 17300: Steam and hot water; By-product classification allocatable product; pedigree (1,1,1,1,1)
  (same comment as for electricity, for reuse in municipal waste incineration only)
  production volume 48458.1 MJ
  property exergy 0.1842 MJ; name E_th_prod_MSWI_exergy
    This exergy property is based on the exergy content of the product.
  property true value relation 0.1842; name E_th_prod_MSWI_true_value_relation
    property to calculate "true value" from
  property price 0.0106 EUR2005; name E_th_prod_MSWI_price_EUR2005
    Average European district heat price from Ecoheatcool and Euroheat 2005-2006, Ecoheat Work package 1: The European heat market. Final report. 10.6 EUR/GJ i s the price of district heat. http://www.solarthermalworld.org/files/Ecoheatcool%20WP1%20Web.pdf?download
  property true value 8.03361e-5
    (same comment as for electricity, for reuse in municipal waste incineration only)
- aluminium oxide, non-metallurgical: 0 kg; source European Aluminium Association 2008; CPC 41432: Alumina (aluminium oxide), except artificial corundum; By-product classification allocatable product; CAS 1344-28-1; pedigree (1,1,1,1,1)
  production volume 1360.96 kg
  property carbon content, non-fossil 0; name C_content_non_fossil
  property price 0.28 EUR2005; name Al2O3Amount_price_EUR2005
    From UN trade database. http://data.un.org/ Import data from the largest economies of the world are used (Brazil, India, USA, China, Japan and EU-27).
  property dry mass 1 kg; name DM
  property water content 0; name water_content
  property wet mass 1 kg; name WM
  property water in wet mass 0 kg; name WWM
  property carbon content, fossil 0; name C_content_fossil
  property carbon content 0
    carbon content on a dry matter basis (reserved; not for manual entry)
  property true value 4.38011e-5
    allocation property applied in "true value" allocation // value calculated from revenue
  properties: carbon allocation 0 kg
- aluminium, cast alloy: 0 kg; source European Aluminium Association 2008; By-product classification allocatable product; CPC 41431: Unwrought aluminium; pedigree (1,1,1,1,1)
  EcoSpold01Location=RER
  production volume 12722 kg
  property price 1.3 EUR2005; name castAlloyAmount_price_EUR2005
  properties: water in wet mass 0 kg, carbon content, non-fossil 0, water content 0, dry mass 1 kg, carbon content, fossil 0, wet mass 1 kg, carbon content 0, carbon allocation 0 kg, true value 0.00190099
- aluminium, wrought alloy: 0 kg; source European Aluminium Association 2008; By-product classification allocatable product; CPC 4153: Semi-finished products of aluminium or aluminium alloys; pedigree (1,1,1,1,1)
  production volume 5569.45 kg
  property price 1.44 EUR2005; name secondaryAluminiumOutput_price_EUR2005
    Estimated based on literature values and expert judgement. Aluminium ccast alloys are about 90% of the price of aluminium wrought alloys.
  property carbon content 0
    carbon content on a dry matter basis (reserved; not for manual entry)
  property true value 0.000921839
    allocation property applied in "true value" allocation // value calculated from revenue
  properties: wet mass 1 kg, water content 0, carbon content, fossil 0, water in wet mass 0 kg, carbon content, non-fossil 0, dry mass 1 kg, carbon allocation 0 kg
- copper: 0 kg; source Rentz O. 1999; By-product classification allocatable product; CPC 41413: Refined copper and copper alloys, unwrought; master alloys of copper
  Literature value. Copper uses: Before end-use copper is manufactured into semi fabricated products, such as shapes and ingots (known as 'semis'). These manufacturing processes are subdivided into hot working, cold working and, if necessary, process annealing. Few of the semis are ready for use as such. They more typically travel to first-stage manufacturers, who make metal rods, wire, and casting, and then to component manufacturers who produce such things as motors, valves, and insulated cables The components in turn are incorporated by final-stage manufacturers into a variety of finished products - automobiles, commercial buildings, residential housing, and so forth. These uses account for about 79% of the world-wide consumption of copper.
  production volume 12661.5 kg
  properties: dry mass 1 kg, water in wet mass 0 kg, wet mass 1 kg, carbon content, non-fossil 0, water content 0, price 5.52 EUR2005, carbon content, fossil 0, carbon content 0, carbon allocation 0 kg, true value 0.0080335
- zinc concentrate: 0 kg; CPC 14290: Other non-ferrous metal ores and concentrates (other than uranium or thorium ores and concentrates); By-product classification allocatable product
  Calculated value from the knowledge of the properties of both products.
  production volume 0.00758324 kg
  property price 0.38 EUR2005; name ByP_price_EUR2005
    Temporary price data. Calculated as 90% of purchasers price based on: Zinc content in concentrate 53%. Concentrate price per kg Zn 86.5% of refined Zn price (13.5% treatment charges according to CHR Metals Limited 2005: Dynamic cost curves. http://www.minecost.com/dynamic.pdf). 2004 zinc price from USGS (2007) Mineral commodity summaries 2007. <http://minerals.usgs.gov/minerals/pubs/mcs/2007/mcs2007.pdf> [Accessed 25 May 2010]
  property zinc content 0.53; name zinc_C_zinc_concentrate
    Zinc content on a dry matter basis. Value taken from teh "zinc mine operation" /GLO dataset.
  property dry mass 1 kg; name DM_zinc_concentrate
  property carbon content 0
    carbon content on a dry matter basis (reserved; not for manual entry)
  property true value 1.52077e-11
    allocation property applied in "true value" allocation // value calculated from revenue
  properties: wet mass 1 kg, water content 0, carbon content, non-fossil 0, carbon content, fossil 0, water in wet mass 0 kg, carbon allocation 0 kg
- iron scrap, sorted, pressed: 0 kg; By-product classification Recyclable; CPC 39310: Slag, dross, scalings and other waste from the manufacture of iron or steel; pedigree (1,1,1,1,1)
  Iron scrap recovered from this waste.
  Uncertainty: uncertainty calculated from uncertainty in waste composition, uncertainty of share of recyclable metal, uncertainty of transfer coefficient to bottom ash, uncertainty of the efficiency of scrap removal in MSWI plant.
  production volume 16059.5 kg
  property price 0.175 EUR2005
    Temporary price data. Calculated as 90% of purchasers price based on: 2005 import and export prices (total trades (USD) divided by total weight (kg) in biggest economies of the world: EU27, USA, Brasil, China, India, Japan and Russia) from UN Commodity Trade Statistics Database (http://data.un.org/Explorer.aspxDatabase [Accessed 2011.06.20]). Commodity: Waste or scrap, of cast iron
  property carbon content 0
    carbon content on a dry matter basis (reserved; not for manual entry)
  property true value 0.000484554
    allocation property applied in "true value" allocation // value calculated from revenue
  properties: water in wet mass 0 kg, dry mass 1 kg, carbon content, fossil 0, carbon content, non-fossil 0, wet mass 1 kg, water content 0, carbon allocation 0 kg

## Inputs from technosphere
- integrated circuit, logic type: 0.000144603 kg; name circuit
  Value from literature: Ramroth, L. 2008. Comparison of Life-Cycle Analyses of Compact Fluorescent and Incandescent Lamps Based on Rated Life of Compact Fluorescent Lamp. Retrieved from: http://infohouse.p2ric.org/ref/47/46011.pdf, accessed 20180614
  properties: dry mass 1 kg, carbon content, fossil 0.221701, wet mass 1 kg
- waste electric and electronic equipment: -0.00071487 kg; = (circuit+electrode+board)*-1
  The amount is set equal to the input amount for the inputs of electronics, i.e. integrated circuit, printed wiring board and electrode.
  production volume 20358 kg; = RP_PV * ((Ref('c4710b33-4545-4d0b-aa56-a10dde92f8b8')*-1) / RP)
    Calculated from production volume of reference product using the relative outputs.
  properties: wet mass 1 kg, carbon content, fossil 0.0877555, dry mass 1 kg, carbon content, non-fossil 0.000485011
- tin: 0.0004888 kg; lognormal variance with pedigree 0.0118, pedigree (1,4,4,4,2)
  (same comment as for integrated circuit, logic type)
  properties: dry mass 1 kg, wet mass 1 kg
- waste polypropylene: 0 kg
  The amount is set equal to the input amount of polypropylene and ABS.
  production volume 0 kg
    Calculated from production volume of reference product using the relative outputs.
  properties: wet mass 1 kg, dry mass 0.841 kg, water content 0.189061, carbon content, fossil 0.825208
- scrap aluminium: 0 kg
  The amount is set equal to the input amount for the respective material.
  production volume 0 kg
    Calculated from production volume of reference product using the relative outputs.
  properties: wet mass 1 kg, dry mass 1 kg
- mercury: 5.09167e-7 kg; lognormal variance with pedigree 0.0118, pedigree (1,4,4,4,2)
  (same comment as for integrated circuit, logic type)
  properties: dry mass 1 kg, wet mass 1 kg
- acrylonitrile-butadiene-styrene copolymer: 0.000144603 kg; name ABS
  (same comment as for integrated circuit, logic type)
  properties: dry mass 1 kg, wet mass 1 kg, carbon content, fossil 0.853081
- cast iron: 0.000638495 kg; name iron
  (same comment as for integrated circuit, logic type)
  properties: wet mass 1 kg, carbon content, fossil 0.04, dry mass 1 kg
  note on carbon content, fossil: Cast iron is made by remelting pig iron in small furnaces (e.g. cupola furnaces or electric arc furnaces) and poured into moulds to make castings. It usually contains 2% to 6% carbon (ecoinvent v2.2 report 10_partII). An average content of 4% was considered
- aluminium, cast alloy: 0.000721999 kg; name alu
  (same comment as for integrated circuit, logic type)
  properties: wet mass 1 kg, dry mass 1 kg
- electricity, high voltage: 2.28107e-5 kWh; lognormal variance with pedigree 0.0118, pedigree (1,4,4,4,2)
  (same comment as for integrated circuit, logic type)
- foam glass: 0.0003055 kg; name foam
  (same comment as for integrated circuit, logic type)
  properties: wet mass 1 kg, dry mass 1 kg
- polypropylene, granulate: 0.000432792 kg; name polyprop
  (same comment as for integrated circuit, logic type)
  properties: dry mass 1 kg, carbon content, fossil 0.857143, wet mass 1 kg
- waste polyvinylchloride: 0 kg
  The amount is set equal to the input amount for the respective material.
  production volume 0 kg
    Calculated from production volume of reference product using the relative outputs.
  properties: wet mass 1 kg, water content 0.00200401, dry mass 0.998 kg, carbon content, fossil 0.440882
- flat glass factory: 4.60091e-12 unit; = 1/22133333333; lognormal variance with pedigree 0.3112, pedigree (1,4,4,4,2)
  (same comment as for integrated circuit, logic type)
- waste glass: 0 kg; name waste_glass; pedigree (1,1,1,1,1)
  Includes waste from regular glass and black glass.
  production volume 0 kg
    Calculated from production volume of reference product using the relative outputs.
  property price 0 EUR2005; name waste_glass_price_EUR2005
  properties: dry mass 1 kg, wet mass 1 kg
- scrap copper: 0 kg; name waste_copper; pedigree (1,1,1,1,1)
  The amount is set equal to the input amount for the respective material.
  production volume 0 kg
    Calculated from production volume of reference product using the relative outputs.
  property price 0 EUR2005; name waste_copper_price_EUR2005
  properties: carbon content, fossil 0.009542, wet mass 0.075 kg, dry mass 0.075 kg
- electrode, negative, Ni: 0.000162933 kg; name electrode
  (same comment as for integrated circuit, logic type)
  properties: carbon content, fossil 0.00301397, wet mass 1 kg, dry mass 1 kg
- printed wiring board, surface mounted, unspecified, Pb containing: 0.000407334 kg; name board
  (same comment as for integrated circuit, logic type)
  properties: carbon content, fossil 0.132522, dry mass 1 kg, wet mass 1 kg
- copper: 0.000626275 kg; lognormal variance with pedigree 0.0118, pedigree (1,4,4,4,2)
  (same comment as for integrated circuit, logic type)
  properties: wet mass 1 kg, dry mass 1 kg
- lead: 3.666e-6 kg
  (same comment as for integrated circuit, logic type)
  properties: dry mass 1 kg, wet mass 1 kg
- polyvinylchloride, bulk polymerised: 0.0017108 kg; name polyvynil
  (same comment as for integrated circuit, logic type)
  properties: carbon content, fossil 0.387097, dry mass 1 kg, wet mass 1 kg
  note on carbon content, fossil: Monomer is vynyl chloride, C2H3Cl (ecoinvent v2.2 report 11_II). MW=62 g/mol
- flat glass, uncoated: 0 kg; name glass; pedigree (1,1,1,1,1)
  (same comment as for integrated circuit, logic type)
  properties: dry mass 1 kg, wet mass 1 kg
- scrap tin sheet: 0 kg; name waste_tin; pedigree (1,1,1,1,1)
  The amount is set equal to the input amount for the respective material.
  production volume 0 kg
    Calculated from production volume of reference product using the relative outputs.
  property price 0 EUR2005; name waste_tin_price_EUR2005
  properties: wet mass 0.075 kg, dry mass 0.075 kg
- waste polypropylene: -5.5577e-5, -4.28466e-6, -1.76972e-6, -1.68051e-6, -6.41261e-5, -7.14946e-7, -3.24042e-7, -0.000448918 kg (8 entries)
  The amount is set equal to the input amount of polypropylene and ABS.
  production volume 16443 kg
- scrap aluminium: -0.000229024, -1.07453e-5, -0.00048223 kg (3 entries)
  The amount is set equal to the input amount for the respective material.
  production volume 20561 kg
- waste polyvinylchloride: -0.000164673, -1.26953e-5, -5.24361e-6, -4.9793e-6, -0.000190003, -2.11836e-6, -9.60124e-7, -0.00133013 kg (8 entries)
  The amount is set equal to the input amount for the respective material.
  production volume 48720 kg
- waste glass: -0.000644885, -3.12907e-5, -2.91938e-6, -1.30632e-5, -0.000339497, -4.43324e-6, -7.09881e-7, -0.00319947 kg (8 entries); lognormal variance with pedigree 0.0118, pedigree (1,4,4,4,2)
  Includes waste from regular glass and black glass.
  production volume 120640 kg
- scrap copper: -0.000198659, -9.32067e-6, -0.000418295 kg (3 entries); lognormal variance with pedigree 0.0118, pedigree (1,4,4,4,2)
  The amount is set equal to the input amount for the respective material.
  production volume 17835 kg
- flat glass, uncoated: 0.000671226, 0.00325954 kg (2 entries); lognormal variance with pedigree 0.0118, pedigree (1,4,4,4,2)
  (same comment as for integrated circuit, logic type)
- scrap tin sheet: -7.27462e-6, -0.000481526 kg (2 entries); lognormal variance with pedigree 0.0118, pedigree (1,4,4,4,2)
  The amount is set equal to the input amount for the respective material.
  production volume 13920 kg

## Emissions to nature
- Arsenic, ion [water, unspecified]: 7.32182e-7 kg
  (same comment as for integrated circuit, logic type)
- Arsenic [air, unspecified]: 5.16295e-8 kg
  (same comment as for integrated circuit, logic type)
- Lead [air, unspecified]: 1.45622e-7 kg
  (same comment as for integrated circuit, logic type)
- Lead [soil, unspecified]: 1.222e-9 kg
  (same comment as for integrated circuit, logic type)
- Arsenic [soil, unspecified]: 2.03667e-10 kg
  (same comment as for integrated circuit, logic type)
- Lead [water, unspecified]: 3.52344e-6 kg
  (same comment as for integrated circuit, logic type)
- Mercury [air, urban air close to ground]: 5.09167e-7 kg; = mercury; lognormal variance with pedigree 0.0512, pedigree (1,4,4,4,2)
  (same comment as for integrated circuit, logic type)

## Sampling procedure
Manufacturing data are taken from Elijosiute et al. 2012. Data on the annual production volume are taken from Worldwatch Institute 2009. Sources: Elijosiute, K., Balciukeviciute, J., and Danafas, G., 2012. Life Cycle Assessment of Compact Fluorescent and Incadescent Lamps: Comparative Analysis. Environmental Research, Engineering and Management, 3(61), 65-72. Worldwatch Institute 2009. Strong Growth in Compact Fluorescent Bulbs Reduces Electricity Demand. Worldwatch Institute, Washington, DC, USA. Available from: http://www.worldwatch.org/node/5920 (Accessed 20 January 2018).
