# photovoltaic laminate production, CIS

Dataset: EcoSpold 2, unit process
Geography: DE
Time period: 1998-01-01 to 2019-12-31
Technology level: current
Classification: ISIC rev.4 ecoinvent: 2610:Manufacture of electronic components and boards
Classification: EcoSpold01Categories: photovoltaic/production of components
Synonyms: copper indium selenide; CIGS; thin film
Tags: ConvertedDataset
Scenario: Business-as-Usual
System model: Allocation at the point of substitution
Share of production covered: 50 %
Generated by: Niels Jungbluth
Published in: Jungbluth, N. 2007
Database: ecoinvent
isCopyrightProtected: true
accessRestrictedTo: 1

## General comment
Production of photovoltaic thin film laminates by thermal vaporization in vacuum. The modules produced at Würth Solar have a size of 1.2m by 0.6m. The weight is 12.6kg. The efficiency is 10%. The rated nominal power is about 75-80Wp per module.
[This dataset was already contained in the ecoinvent database version 2. It was not individually updated during the transfer to ecoinvent version 3. Life Cycle Impact Assessment results may still have changed, as they are affected by changes in the supply chain, i.e. in other datasets. This dataset was generated following the ecoinvent quality guidelines for version 2. It may have been subject to central changes described in the ecoinvent version 3 change report (http://www.ecoinvent.org/database/ecoinvent-version-3/reports-of-changes/), and the results of the central updates were reviewed extensively. The changes added e.g. consistent water flows and other information throughout the database. The documentation of this dataset can be found in the ecoinvent reports of version 2, which are still available via the ecoinvent website. The change report linked above covers all central changes that were made during the conversion process.]

## Included activities end
Electricity use, materials, transport of materials, treatment of production wastes. Disposal after end of life. Process emissions not known (except Cd).

## Geography
Data for Würth Solar in Germany.

## Technology
Production technology of thin film CIS cells with thermal vaporization in vacuum.

## Time period
Data refer to 2007. Production in 2006 was ramped up.

## Parameters
- fraction, tap water, to air: 0.01; name fraction_TW_to_air; lognormal variance with pedigree 0.092025, pedigree (4,4,3,2,4)
  Calculated value based on input/output ratio.
- fraction, process water, to air: 0.15 dimensionless; name fraction_PW_to_air; lognormal variance with pedigree 0.092025, pedigree (4,4,3,2,4)
  Literature value. In case when no industry/process specific data are available, default evaporation fraction value is used. This value is 15% and is based on literature (Statistics Canada, 2007 & Shaffer, K.H., 2008, Consumptive water use in the Great Lakes Basin, USGS & Shiklomanov, 2003, World Water Resources at the Beginning of the 21st Century) and has been approved by an expert.

## Reference product
- photovoltaic laminate, CIS: 1 m2; By-product classification allocatable product; CPC 47150: Diodes, transistors and similar semi-conductor devices; photosensitive semi-conductor devices; light emitting […]
  EcoSpold01Location=DE
  production volume 10033.5 m2
    14.8 MW planned for 2007
    Calculated from GLO production volumes, assuming that Europe produces 36% of panels (info obtained from Fig 8.1, ecoinvent v2 report 6_XII). From information in ecoinvent v2 report 6_XII, laminate were treated as panels.
  property price 242 EUR2005
    The production volume of this product is small compared to other products supplied by the activities within the same ISIC 3 category. Therefore, an average price of products supplied by the activities in the same ISIC 3 code has been applied.This price is obtained as '_69 Radio, television and communication equipment, EU27' in the 'EU & DK Input Output Database' (available in SimaPro, 19.28 EUR2003 per kg DS). The price is assumed to be valid for both RER2005, world 2005. Weight of product according to Ecoinvent: approx 12.6 kg per m2.
  property true value 242
    allocation property applied in "true value" allocation // value calculated from revenue

## By-products
- electricity, for reuse in municipal waste incineration only: 0 kWh; CPC 17100: Electrical energy; By-product classification allocatable product; pedigree (1,1,1,1,1)
  Net electricity generated from this waste and used in internal MSWI plant energy redistribution.
  Uncertainty: uncertainty is calculated from uncertainties in waste composition and uncertainties in energy efficiency and the uncertainty in internal energy demand
  production volume 9430.31 kWh
  property exergy 3.6 MJ; name E_el_prod_MSWI_exergy
    This exergy property is based on the exergy content of the product.
  property true value relation 3.6; name E_el_prod_MSWI_true_value_relation
    property to calculate "true value" from
  property price 0.1 EUR2005; name E_el_prod_MSWI_price_EUR2005
    Estimated to be the same price as in case of electricity, medium voltage.
  property true value 0.120633
    allocation property applied in "true value" allocation // value calculated from true value relation
- heat, for reuse in municipal waste incineration only: 0 MJ; CPC 17300: Steam and hot water; By-product classification allocatable product; pedigree (1,1,1,1,1)
  Net useful heat generated from this waste and used in internal MSWI plant energy redistribution.
  Uncertainty: uncertainty is calculated from uncertainties in waste composition and uncertainties in energy efficiency and the uncertainty in internal energy demand
  production volume 66291.8 MJ
  property true value relation 0.1842; name E_th_prod_MSWI_true_value_relation
    property to calculate "true value" from
  property exergy 0.1842 MJ; name E_th_prod_MSWI_exergy
    This exergy property is based on the exergy content of the product.
  property price 0.0106 EUR2005; name E_th_prod_MSWI_price_EUR2005
    Average European district heat price from Ecoheatcool and Euroheat 2005-2006, Ecoheat Work package 1: The European heat market. Final report. 10.6 EUR/GJ i s the price of district heat. http://www.solarthermalworld.org/files/Ecoheatcool%20WP1%20Web.pdf?download
  property true value 0.0433896
    (same comment as for electricity, for reuse in municipal waste incineration only)
- zinc concentrate: 0 kg; CPC 14290: Other non-ferrous metal ores and concentrates (other than uranium or thorium ores and concentrates); By-product classification allocatable product
  Calculated value from the knowledge of the properties of both products.
  production volume 1.35424e-6 kg
  property price 0.38 EUR2005; name ByP_price_EUR2005
    Temporary price data. Calculated as 90% of purchasers price based on: Zinc content in concentrate 53%. Concentrate price per kg Zn 86.5% of refined Zn price (13.5% treatment charges according to CHR Metals Limited 2005: Dynamic cost curves. http://www.minecost.com/dynamic.pdf). 2004 zinc price from USGS (2007) Mineral commodity summaries 2007. <http://minerals.usgs.gov/minerals/pubs/mcs/2007/mcs2007.pdf> [Accessed 25 May 2010]
  property zinc content 0.53; name zinc_C_zinc_concentrate
    Zinc content on a dry matter basis. Value taken from teh "zinc mine operation" /GLO dataset.
  property dry mass 1 kg; name DM_zinc_concentrate
  property carbon content 0
    carbon content on a dry matter basis (reserved; not for manual entry)
  property true value 5.12889e-11
    allocation property applied in "true value" allocation // value calculated from revenue
  properties: wet mass 1 kg, water content 0, carbon content, non-fossil 0, carbon content, fossil 0, water in wet mass 0 kg, carbon allocation 0 kg

## Inputs from technosphere
- electricity, medium voltage: 122.297 kWh; lognormal variance with pedigree 0.008, pedigree (1,1,4,1,1)
  EcoSpold01Location=DE
  Company information, coating, air-conditioning, water purification, etc.
  Uncertainty: company information, coating, air-conditioning, water purification, etc.
- copper: 0.0449256 kg; lognormal variance with pedigree 0.008, pedigree (1,1,4,1,1)
  Company information
  EcoSpold01Location=RER
  Uncertainty: company information
  properties: wet mass 1 kg, dry mass 1 kg
- wastewater from glass production: -0.00263032 m3; name wastewater_output; lognormal variance with pedigree 0.008, pedigree (1,1,4,1,1)
  Company information
  EcoSpold01Location=CH
  Uncertainty: company information
  production volume 26.4093 m3
    Calculated from the production volume of photovoltaic laminate, CIS in proportion to the respective output amounts.
  property price 0 EUR2005; name wastewater_output_price_EUR2005
  properties: water content 913.443, wet mass 1000 kg, carbon content, fossil 0.0455242, dry mass 1.09356 kg
  note on carbon content, fossil: COD= 0.115 kg/m3 (Tab A.18, ecoinvent v2.2 report 13_I). COD was converted to TOC, using conversion factors in Tab 4.10 (ecoinvent v2.2 report 13_IV). TOC was considered as Total Carbon.
- zinc: 0.0120688 kg; lognormal variance with pedigree 0.0421, pedigree (3,2,5,1,1)
  EcoSpold01Location=RER
  Company information and assumption for share of metals
  Uncertainty: company information and assumption for share of metals
  properties: dry mass 1 kg, wet mass 1 kg
- solar glass, low-iron: 15.0148 kg; lognormal variance with pedigree 0.008, pedigree (1,1,4,1,1)
  EcoSpold01Location=RER
  Company information
  Uncertainty: company information
  properties: wet mass 1 kg, dry mass 1 kg
- nitrogen, liquid: 2.77592 kg; lognormal variance with pedigree 0.008, pedigree (1,1,4,1,1)
  Protection gas, company information
  EcoSpold01Location=RER
  Uncertainty: protection gas, company information
  properties: wet mass 1 kg, dry mass 1 kg
- waste plastic, mixture: -0.867472 kg; lognormal variance with pedigree 0.008, pedigree (1,1,4,1,1)
  EcoSpold01Location=CH
  Calculation for plastic parts burned after recycling
  Uncertainty: Calculation for plastic parts burned after recycling
  production volume 8709.72 kg
    (same comment as for wastewater from glass production)
  properties: water content 0.180638, wet mass 1 kg, dry mass 0.847 kg, carbon content, fossil 0.747344
  note on carbon content, fossil: C content in 1 kg DM was calculated using data in Tab A.2, ecoinvent v2.2 report 13_I
- indium: 0.00548608 kg; lognormal variance with pedigree 0.0421, pedigree (3,2,5,1,1)
  Company information and assumption for share of metals
  EcoSpold01Location=RER
  Uncertainty: company information and assumption for share of metals
  properties: dry mass 1 kg, wet mass 1 kg
- waste, from silicon wafer production, inorganic: -0.0343877 kg; lognormal variance with pedigree 0.028, pedigree (3,1,4,1,3)
  Company information, amount of deposited waste, own estimation for type
  EcoSpold01Location=CH
  Uncertainty: company information, amount of deposited waste, own estimation for type
  production volume 345.264 kg
    (same comment as for wastewater from glass production)
  properties: water content 0.103753, wet mass 1 kg, dry mass 0.906 kg, carbon content, fossil 0.0347572
- tap water: 2.66469 kg; name tap_water_input; lognormal variance with pedigree 0.008, pedigree (1,1,4,1,1)
  EcoSpold01Location=RER
  Company information
  Uncertainty: company information
  properties: carbon content, fossil 0.00178991, water content 2962.17, wet mass 1 kg, dry mass 0.000337476 kg
  note on carbon content, fossil: Bicarbonate content is 2.93 mol/m3. CO2 content is 0.1 mol/m3 (ecoinvent v2.2 report 8, Tab 93.1).
- cadmium sulfide, semiconductor-grade: 0.0340139 kg; lognormal variance with pedigree 0.0421, pedigree (3,2,5,1,1)
  Company information and assumption for share of metals
  EcoSpold01Location=US
  Uncertainty: company information and assumption for share of metals
  properties: dry mass 1 kg, wet mass 1 kg
- photovoltaic panel factory: 3.99729e-6 unit; lognormal variance with pedigree 0.3101, pedigree (1,4,4,3,1)
  Assumption
  EcoSpold01Location=GLO
  Uncertainty: Assumption
- tempering, flat glass: 15.0148 kg; lognormal variance with pedigree 0.008, pedigree (1,1,4,1,1)
  EcoSpold01Location=RER
  Assumption
  Uncertainty: Assumption
- urea, as N: 0.125275 kg; lognormal variance with pedigree 0.042, pedigree (3,1,5,1,1)
  EcoSpold01Location=RER
  Dip coating for CdS, Ampenberg 1998
  Uncertainty: dip coating for CdS, Ampenberg 1998
  properties: carbon content, fossil 0.2, dry mass 1 kg, wet mass 1 kg
- selenium: 0.0109726 kg; lognormal variance with pedigree 0.0421, pedigree (3,2,5,1,1)
  (same comment as for indium)
  properties: dry mass 1 kg, wet mass 1 kg
- ethylvinylacetate, foil: 0.867472 kg; lognormal variance with pedigree 0.008, pedigree (1,1,4,1,1)
  EcoSpold01Location=RER
  Company information
  Uncertainty: company information
  properties: carbon content, fossil 0.79734, dry mass 1 kg, wet mass 1 kg
  note on carbon content, fossil: Ethylene vinyl acetate copolymer contains 20% of vinyl acetate (ecoinvent v2.2 report 11_II)
- ammonia, liquid: 0.293131 kg; lognormal variance with pedigree 0.008, pedigree (1,1,4,1,1)
  Dip coating for CdS, company information
  EcoSpold01Location=RER
  Uncertainty: dip coating for CdS, company information
  properties: dry mass 1 kg, wet mass 1 kg
- tin: 0.0109726 kg; lognormal variance with pedigree 0.0421, pedigree (3,2,5,1,1)
  (same comment as for zinc)
  properties: wet mass 1 kg, dry mass 1 kg
- acetone, liquid: 0.011757 kg; lognormal variance with pedigree 0.042, pedigree (3,1,5,1,1)
  Cleaning agent, Ampenberg 1998
  EcoSpold01Location=RER
  Uncertainty: Cleaning agent, Ampenberg 1998
  properties: carbon content, fossil 0.62069, wet mass 1 kg, dry mass 1 kg
- molybdenum: 0.0109726 kg; lognormal variance with pedigree 0.0421, pedigree (3,2,5,1,1)
  (same comment as for zinc)
  properties: wet mass 1 kg, dry mass 1 kg
- gallium, semiconductor-grade: 0.0109726 kg; lognormal variance with pedigree 0.0421, pedigree (3,2,5,1,1)
  (same comment as for zinc)
  properties: wet mass 1 kg, dry mass 1 kg
- argon, liquid: 0.00719033 kg; lognormal variance with pedigree 0.008, pedigree (1,1,4,1,1)
  (same comment as for nitrogen, liquid)
  properties: wet mass 1 kg, dry mass 1 kg

## Emissions to nature
- Cadmium [air, urban air close to ground]: 2.09858e-8 kg; lognormal variance with pedigree 0.7041, pedigree (3,4,5,3,1)
  Rough estimation
  Uncertainty: Rough estimation
- Water [air, unspecified]: 2.66469e-5 m3; name water_to_air_unspecified; = (tap_water_input/1000*fraction_TW_to_air); lognormal variance with pedigree 0.0487, pedigree (2,2,4,1,1)
  Calculated value based on literature values and expert opinion. See comments in the parametres' comment field.
  property fraction, origin: fresh water 1; name fraction_origin_fresh_water
  property fraction, origin: salt water 0; name fraction_origin_salt_water
  property fraction, origin: unspecified 0; name fraction_origin_unspecified
- Water [water, unspecified]: 7.72976e-6 m3; name water_to_water_unspecified; = (tap_water_input/1000)*(1-fraction_TW_to_air)-(wastewater_output*-1); lognormal variance with pedigree 0.0487, pedigree (2,2,4,1,1)
  (same comment as for Water)
  property fraction, origin: fresh water 1; name fraction_origin_fresh_water_Ww
  property fraction, origin: salt water 0; name fraction_origin_salt_water_Ww
  property fraction, origin: unspecified 0; name fraction_origin_unspecified_Ww
  property carbon content, non-fossil 0; name C_content_non_fossil
  property water in wet mass 1000 kg; name WWM
  property dry mass 0 kg; name DM
  property wet mass 1000 kg; name WM
  property carbon content, fossil 0; name C_content_fossil

## Sampling procedure
Literature data based on producer information.

## Extrapolations
Data for coating materials derived from own assumptions.

## Review by Roberto Dones 2007-08-23
Passed.
none
