# operation, computer, laptop, videoconference

Dataset: EcoSpold 2, unit process
Geography: CA-QC
Time period: 2005-01-01 to 2019-12-31
Technology level: current
Classification: ISIC rev.4 ecoinvent: 6110:Wired telecommunications activities
Classification: EcoSpold01Categories: electronics/services
Tags: Recontextualization; Operation
Scenario: Business-as-Usual
System model: Allocation at the point of substitution
Generated by: Pascal Lesage
Published in: Spielmann M. 2007
Database: ecoinvent
isCopyrightProtected: true
accessRestrictedTo: 1

## General comment
The data set represents average values for one videoconference using a laptop computer.
[This dataset was already contained in the ecoinvent database version 2. It was not individually updated during the transfer to ecoinvent version 3. Life Cycle Impact Assessment results may still have changed, as they are affected by changes in the supply chain, i.e. in other datasets. This dataset was generated following the ecoinvent quality guidelines for version 2. It may have been subject to central changes described in the ecoinvent version 3 change report (http://www.ecoinvent.org/database/ecoinvent-version-3/reports-of-changes/), and the results of the central updates were reviewed extensively. The changes added e.g. consistent water flows and other information throughout the database. The documentation of this dataset can be found in the ecoinvent reports of version 2, which are still available via the ecoinvent website. The change report linked above covers all central changes that were made during the conversion process.]
Gross approximation of Quebec production volume using relative value of Quebec GDP to world GDP

## Included activities end
This data set includes the use of hardware (laptop, internet devices) and energy consumption for on hour videoconference using broadband access per participant. Consumer mix electricity consumption.

## Geography
Data for Swiss conditions
Gross approximation of Quebec production volume using relative value of Quebec GDP to world GDP

## Technology
videoconference using laptops and cameras for image and sound transmission. Band width: 0.7MBit/s. Consumer mix electricity consumption.

## Parameters
- Quebec gross domestic product 2011: 3.11e11 USD(2011); name quebecGDP2011; lognormal variance with pedigree 0.0006, pedigree (1,1,1,1,1)
  Quebec Gross domestic product for 2011, expressed in 2011 USD. Source: Institut de la statistique du Québec. Converted from CAD to USD using a yearly average exchange rate of 0.989 CAD/USD (Source: bank of Canada).
- world gross domestic product 2011: 7e13 USD(2011); name worldGDP2011; lognormal variance with pedigree 0.0006, pedigree (1,1,1,1,1)
  World Gross domestic product for 2011, expressed in 2011 USD. Source: World Bank.

## Reference product
- operation, computer, laptop, videoconference: 1 hour; CPC 84290: Other Internet telecommunications services; By-product classification allocatable product
  EcoSpold01Location=CH
  production volume 0.0177714 hour; = PARENTVALUE * quebecGDP2011/worldGDP2011
    Gross approximation of Quebec production volume using relative value of Quebec GDP to world GDP
  property price 0.130133 EUR2005
    Calculated based on inputs: The price of the product has been calculated as a sum of the values of the material and energy inputs for this product. This value is therefore a rough estimation. It may underestimate the real price since there are additional expenses when producing any product. These expences can include for example labour costs, treatment of waste materials and profit for the producer. Please consider carefully whether this level of data quality is acceptable for your application.

## Inputs from technosphere
- internet access, videoconference, 0.7 Mbit/s: 1 hour; lognormal variance with pedigree 0.1486, pedigree (4,3,4,5,1)
  EcoSpold01Location=CH
  1 hour IP router use according to user profile
  Uncertainty: 1 hour IP router use according to user profile
- operation, internet access equipment: 1 hour; lognormal variance with pedigree 0.1486, pedigree (4,3,4,5,1)
  EcoSpold01Location=CH
  1 hour network access device use according to user profile
  Uncertainty: 1 hour network access device use according to user profile
- operation, computer, laptop, video mode: 1 hour; lognormal variance with pedigree 0.1486, pedigree (4,3,4,5,1)
  1 hour laptop use according to user profile
  EcoSpold01Location=CH
  Uncertainty: 1 hour laptop use according to user profile

## Extrapolations
This dataset has been extrapolated from year 2009 to the year of the calculation (2019). The uncertainty has been adjusted accordingly.

## Review by Christian Bauer 2010-02-07
26.01.2010
passed
C:\Dokumente und Einstellungen\Marianne\Eigene Dateien\Projekte\277_Mobitool\Ecoinvent\Review\Upload 1\[Ecospold_Virtuelle_Mobilitaet-v1.1.xls]X-Process
