# electricity production, nuclear, pressure water reactor, heavy water moderated

Dataset: EcoSpold 2, unit process
Geography: RO
Time period: 2010-01-01 to 2019-12-31
Technology level: modern
Classification: EcoSpold01Categories: nuclear power/power plants
Classification: ISIC rev.4 ecoinvent: 3510:Electric power generation, transmission and distribution
Synonyms: PWR
Scenario: Business-as-Usual
System model: Allocation at the point of substitution
Generated by: Christian Bauer
Database: ecoinvent
isCopyrightProtected: true
accessRestrictedTo: 1

## General comment
This dataset represents the global production of 1kWh of electricity in a pressurized heavy water reactor nuclear plant. This dataset represents the CANDU technology (see nuclear plant construction for details) and has an installed power of 650MW (the average installed power for this technology). It is characterised by the use of heavy water (deuterium oxide) as moderator and coolant and the use of natural uranium (not enriched) as fuel. This dataset is extrapolated from the Quebec dataset, which is based on study on the production, transport and distribution of electricity in Quebec. It represents the production of Gentilly-2, the only nuclear plant in Quebec. Lifetime is estimated to 30 years for the plant based on Quebec data. Only main consumed products, wastes and emissions are included. Operation data were collected for the 2008-2013 period.
Some emission data were extrapolated from other nuclear technology (PWR).
Baumann J. (1949) Kraftwerk Rupperswil-Auenstein. Verlag Kraftwerk
Rupperswil-Auenstein AG, Rupperswil.
Nordostschweizerische Kraftwerke AG (NOK) (1956) Das Kraftwerk
Wildegg-Brugg. In: Schweizerische Bauzeitung, 74 (4), 47-52; 74 (5), 63-67; 74
(6), 83-88; 74 (7), 93-99; 74 (8), 111-116; 74 (10), 145-147; 74 (12), 167-172.

Aegerter A., Dr. Bosshardt O. (1954) Das Kraftwerk Birsfelden. In: Wasser- und
Energiewirtschaft, 46 (5-7), 165-176.

Brux G. (1983) Das Donaukraftwerk Greifenstein. In: Wasser, Energie, Luft, 75
(1-2), 11-13.

Radag A. (1979) 50 Jahre Rheinkraftwerk Albbruck-Dogern Aktiengesellschaft.
Waldshut/Rhein, 1929-1979.

Bundesamt für Energiewirtschaft (2001) Elektrizitätsstatistik 2000. Bern,
Schweiz.

## Included activities start
From the constructed power plant ready to produce electricity and from the fuel ready in the power plant.

## Included activities end
This activity ends with 1kWh of high voltage electricity produced at the power plant and arrived at the busbar.

The module includes: fuel elements, chemicals, and diesel requirements as well as the relevant transport requirements. Water use for cooling is included, but no cooling tower infrastructure. Considered radioactive waste streams are: spent fuel to conditioning (no reprocessing); operational low active waste for conditioning in the intermediate repository; and, contaminated waste from dismantling. Non-radioactive wastes are accounted for.

## Geography
Data extrapolated from Quebec dataset and a different GLO technology. Uncertainty has been adjusted accordingly.

## Technology
CANDU 6 technology is used in this plant. It is characterized by the use of heavy water as moderator and non-refined uranium as fuel. Some emission data were extrapolated from other nuclear technology. Uncertainty has been adjusted accordingly.

## Time period
Operation data were collected for the 2008-2013 period, but it is assumed valid for all the operation lifetime

## Reference product
- iron scrap, unsorted: 1 kg; = iron; CPC 39310: Slag, dross, scalings and other waste from the manufacture of iron or steel; By-product classification Recyclable; pedigree (1,1,1,1,1)
  Estimated value. Same amount entering the dataset is estimated as by-product
  production volume 7493.08 kg; = apv_electricity * (Ref('18c3644e-d31c-46de-b867-35a439881863') / amount_RP)
    Calculated from production volume of reference product using the relative outputs.
  property price 0.149 EUR2005
    Temporary price data. Calculated as 90% of purchasers price based on: estimated at 85% of sorted scrap
  property carbon content 0
    carbon content on a dry matter basis (reserved; not for manual entry)
  property true value 1.03588e-7
    allocation property applied in "true value" allocation // value calculated from revenue
  properties: water content 0, carbon content, non-fossil 0, wet mass 1 kg, water in wet mass 0 kg, dry mass 1 kg, carbon content, fossil 0, carbon allocation 0 kg
- electricity, high voltage: 0 kWh; name amount_RP; CPC 17100: Electrical energy; By-product classification allocatable product
  production volume 1.0778e10 kWh; name apv_electricity
    Literature value/statistics. For both OECD and non-OECD countries, gross electricity production 2012 with nuclear plants was taken from the IEA electricity information 2014, table 1.2. For a split of this total value into electricity production in different types of nuclear plants (boiling water reactor, pressure water reactor and pressurised heavy water reactor), data from IEAE 2014 (PRIS database) were exploited. An own electricity use of 6% (losses between gross and net electricity production) has been applied to the gross data based on IEA 2014.
    IEA. 2014. Electricity Information 2014. ISBN 978-92-64-21692-1. International Energy Agency (IEA), Paris Cedex (FR).
    IAEA. 2014. PRIS (Power Reactor Information System) - The database on nuclear power reactors. Country statistics. Online database. International Atomic Energy Agency.
  property price 0.0977 EUR2005
    Temporary price data. Calculated as 90% of purchasers price based on: 94% of the average price (to account for a 6% loss in transformation and transmission) for electricity for industrial consumersin 2005 (excluded taxes). From IEA.
  property true value 0.0977; name amount_RP_true_value
    allocation property applied in "true value" allocation // value calculated from revenue

## By-products
- iron scrap, sorted, pressed: 0 kg; By-product classification Recyclable; CPC 39310: Slag, dross, scalings and other waste from the manufacture of iron or steel; pedigree (1,1,1,1,1)
  Iron scrap recovered from this waste.
  production volume 5522.67 kg
  property price 0.175 EUR2005
    Temporary price data. Calculated as 90% of purchasers price based on: 2005 import and export prices (total trades (USD) divided by total weight (kg) in biggest economies of the world: EU27, USA, Brasil, China, India, Japan and Russia) from UN Commodity Trade Statistics Database (http://data.un.org/Explorer.aspxDatabase [Accessed 2011.06.20]). Commodity: Waste or scrap, of cast iron
  property carbon content 0
    carbon content on a dry matter basis (reserved; not for manual entry)
  property true value 8.96704e-8
    allocation property applied in "true value" allocation // value calculated from revenue
  properties: water content 0, water in wet mass 0 kg, carbon content, fossil 0, dry mass 1 kg, carbon content, non-fossil 0, wet mass 1 kg, carbon allocation 0 kg
- electricity, for reuse in municipal waste incineration only: 0 kWh; CPC 17100: Electrical energy; By-product classification allocatable product; pedigree (1,1,1,1,1)
  Net electricity generated from this waste and used in internal MSWI plant energy redistribution.
  Uncertainty: uncertainty is calculated from uncertainties in waste composition and uncertainties in energy efficiency and the uncertainty in internal energy demand
  production volume 11206.3 kWh
  property exergy 3.6 MJ; name E_el_prod_MSWI_exergy
    This exergy property is based on the exergy content of the product.
  property true value relation 3.6; name E_el_prod_MSWI_true_value_relation
    property to calculate "true value" from
  property price 0.1 EUR2005; name E_el_prod_MSWI_price_EUR2005
    Estimated to be the same price as in case of electricity, medium voltage.
  property true value 1.34414e-7
    allocation property applied in "true value" allocation // value calculated from true value relation
- heat, for reuse in municipal waste incineration only: 0 MJ; CPC 17300: Steam and hot water; By-product classification allocatable product; pedigree (1,1,1,1,1)
  Net useful heat generated from this waste and used in internal MSWI plant energy redistribution.
  Uncertainty: uncertainty is calculated from uncertainties in waste composition and uncertainties in energy efficiency and the uncertainty in internal energy demand
  production volume 82322.2 MJ
  property true value relation 0.1842; name E_th_prod_MSWI_true_value_relation
    property to calculate "true value" from
  property exergy 0.1842 MJ; name E_th_prod_MSWI_exergy
    This exergy property is based on the exergy content of the product.
  property price 0.0106 EUR2005; name E_th_prod_MSWI_price_EUR2005
    Average European district heat price from Ecoheatcool and Euroheat 2005-2006, Ecoheat Work package 1: The European heat market. Final report. 10.6 EUR/GJ i s the price of district heat. http://www.solarthermalworld.org/files/Ecoheatcool%20WP1%20Web.pdf?download
  property true value 5.05226e-8
    (same comment as for electricity, for reuse in municipal waste incineration only)
- zinc concentrate: 0 kg; CPC 14290: Other non-ferrous metal ores and concentrates (other than uranium or thorium ores and concentrates); By-product classification allocatable product
  Calculated value from the knowledge of the properties of both products.
  production volume 0.00908559 kg
  property price 0.38 EUR2005; name ByP_price_EUR2005
    Temporary price data. Calculated as 90% of purchasers price based on: Zinc content in concentrate 53%. Concentrate price per kg Zn 86.5% of refined Zn price (13.5% treatment charges according to CHR Metals Limited 2005: Dynamic cost curves. http://www.minecost.com/dynamic.pdf). 2004 zinc price from USGS (2007) Mineral commodity summaries 2007. <http://minerals.usgs.gov/minerals/pubs/mcs/2007/mcs2007.pdf> [Accessed 25 May 2010]
  property zinc content 0.53; name zinc_C_zinc_concentrate
    Zinc content on a dry matter basis. Value taken from teh "zinc mine operation" /GLO dataset.
  property dry mass 1 kg; name DM_zinc_concentrate
  property carbon content 0
    carbon content on a dry matter basis (reserved; not for manual entry)
  property true value 3.20331e-13
    allocation property applied in "true value" allocation // value calculated from revenue
  properties: wet mass 1 kg, water content 0, carbon content, non-fossil 0, carbon content, fossil 0, water in wet mass 0 kg, carbon allocation 0 kg
- core board: 0 kg; CPC 321: Pulp, paper and paperboard; By-product classification allocatable product
  EcoSpold01Location=RER
  production volume 3.98335e-5 kg
  property carbon content, non-fossil 0.430314
    Biogenic C content was calculated after biogenic C contents of chemicals used in the production of board (ecoinvent v2.2 report 11_III, part 13). The cellulose content in 1 kg of paper (on a wet mas basis) was estimated as (1-chemical content), C content of cellulose was considered 0.44 kgC/kg dry mass (ecoinvent v2.2 report, n 15a, pg 40)
  property price 0.598 EUR2005
    Export prices for the World+ according to: http://faostat.fao.org/site/626/DesktopDefault.aspx?PageID=626#ancor downloaded 28 April 2009; calculated as export value divided by export volume.
  property carbon content, fossil 0
    Fossil C content was calculated after fossil C contents of chemicals used in the production of board (ecoinvent v2.2 report 11_III, part 13).
  property carbon content 0.430314
    carbon content on a dry matter basis (reserved; not for manual entry)
  property true value 2.2101e-15
    allocation property applied in "true value" allocation // value calculated from revenue
  properties: dry mass 0.945 kg, water in wet mass 0.055 kg, wet mass 1 kg, water content 0.0582011, carbon allocation 0.406646 kg
- residual wood, dry: 0 m3; CPC 39283: Non-agglomerated wood waste and scrap; By-product classification allocatable product; pedigree (1,1,1,1,1)
  Emission factor from DS on heat generation from industrial residual wood mulitplied by the input of wood fuel (direct wood fuel plus production residues)
  production volume 3.21842 m3
  property price 26.9 EUR2005; name w_chips_price_EUR2005
    Temporary price data. Calculated as 90% of purchasers price based on: 2004 prices for World Import/Export (USD/cubicmeter) from FaoStat (http://faostat.fao.org/site/626/default.aspx#ancor, [accessed 10th June 2010]) Commodity: 'Chips and Particles' assuming this is for air-dry chips (10% water on a dry matter basis at 650 kg/m3) and no price difference for water content (i.e. assuming air-drying).
  property carbon content 0.494
    carbon content on a dry matter basis (reserved; not for manual entry)
  property true value 8.03262e-9
    allocation property applied in "true value" allocation // value calculated from revenue
  properties: wet mass 632.5 kg, carbon content, fossil 0, dry mass 550 kg, carbon content, non-fossil 0.494, water content 0.15, water in wet mass 82.5 kg, carbon allocation 271.7 kg
- bark chips, wet, measured as dry mass: 0 kg; By-product classification allocatable product; CPC 31230: Wood in chips or particles; pedigree (1,1,1,1,1)
  bark from debarking of logs, not used energetically
  production volume 150.411 kg
  property price 0.034 EUR2005; name w_bark_price_EUR2005
    Expert judgement (Urs Luginbühl, Swiss Sawmilling industry, personal communication in June 2014). Cross-reference; FAOSTAT database; http://faostat.fao.org/site/626/DesktopDefault.aspx?PageID=626#ancor; Average import/export prices of EU for 'chips and particles'. Price: 48.76 Euro/m3. The density of the wood chips is 650 kg/m3. The price is calculated to be 0.075 EUR/kg.
  property carbon content 0.494
    carbon content on a dry matter basis (reserved; not for manual entry)
  property true value 4.74483e-10
    allocation property applied in "true value" allocation // value calculated from revenue
  properties: carbon content, fossil 0, dry mass 1 kg, carbon content, non-fossil 0.494, wet mass 2.4 kg, water in wet mass 1.4 kg, water content 1.4, carbon allocation 0.494 kg
- fibreboard, soft: 0 m3; CPC 31449: Other fibreboard; By-product classification allocatable product
  production volume 94.007 m3
  property dry mass 150.62 kg; name DM_FB; = WM_FB - WiWM_FB
  property price 148 EUR2005
    (same comment as for core board)
  property water in wet mass 8.38 kg; name WiWM_FB
  property wet mass 159 kg; name WM_FB
  property carbon content, non-fossil 0.461793; = 140.8*0.494/DM_FB
    wood content converted to carbon, divided by dry mass
  property water content 0.0556367; = WiWM_FB/DM_FB
  property carbon content 0.475101
    carbon content on a dry matter basis (reserved; not for manual entry)
  property true value 1.29087e-6
    allocation property applied in "true value" allocation // value calculated from revenue
  properties: carbon content, fossil 0.0133086, carbon allocation 71.5597 kg
- biogas: 0 m3; source Raboni, Massimo 2014; By-product classification allocatable product; CPC 17200: Coal gas, water gas, producer gas and similar gases, other than petroleum gases and other gaseous hydrocarbons; pedigree (1,1,1,1,1)
  An average yield of 100 litres of biogas per kg biowaste is assumed
  production volume 0.214881 m3
  property price 0.109 EUR2005; name biogas_yield_price_EUR2005
    Temporary price data. Calculated as 90% of purchasers price based on: Same prices per energy output as natural gas, based on the proportional lower heating value (2/3 that of natural gas)
  property carbon content, non-fossil 0.449939
    Total C content in kg/Nm3 (Tab 12.8, ecoinvent v2.2 report n17), referred to 1kg DM
  property carbon content 0.449939
    carbon content on a dry matter basis (reserved; not for manual entry)
  property true value 2.17313e-12
    allocation property applied in "true value" allocation // value calculated from revenue
  properties: water in wet mass 0 kg, wet mass 1.15 kg, carbon content, fossil 0, lower heating value 0 MJ/Nm3, water content 0, dry mass 1.15 kg, carbon allocation 0.51743 kg
- compost: 0 kg; CPC 391: Wastes from food and tobacco industry; By-product classification allocatable product; pedigree (1,1,1,1,1)
  EcoSpold01Location=CH
  Biowaste is reduced in mass by a factor of 2 during composting
  production volume 2.73752 kg
  property water in wet mass 0.472 kg; name Water_in_wet_mass_compost; = 1- DM_compost
  property price 0.03 EUR2005
    Temporary price data. Calculated as 90% of purchasers price based on: Estimation done using the following sources: <http://www.wmaa.asn.au/uploads/documents/MarkWinser_1May2007.pdf>; <http://www.swlf.ait.ac.th/UpdData/International/Composting%20and%20anaerobic%20digestion_%20comparions%20for%20Europe%20and%20Asia.pdf>; <http://www.epa.gov/osw/conserve/rrr/composting/basic.htm>, accessed 2011.06.16
  property carbon content, non-fossil 0.1165
    calculation: dry matter 50%, organic matter 40% of dry matter, C content calculated from organic matter divided by 1.72. Relative to dry matter; relative to fresh matter: divided by 2 => 0.1156
  property dry mass 0.528 kg; name DM_compost
  property water content 0.893939; name Water_content_compost; = Water_in_wet_mass_compost/DM_compost
  property concentration, cadmium 0 kg/kg; name Mass_compost_concentration_Cd; = Mass_biowaste_concentration_Cd*2
    Biowaste mass is reduced by a factor of two during composting, therefore concentration is doubled
  property humus equivalent 0.061 kg
    Humus building fraction expressed in kg per kg product on a FM basis. Humus denotes the converted, primary biomass from plants or animals in the ground. More information can be found in the documentation of the composting itself: "treatment of biowaste, industrial composting".
  property concentration, copper 0 kg/kg; name Mass_compost_concentration_Cu; = Mass_biowaste_concentration_Cu*2
    (same comment as for compost)
  property concentration, calcium 0 kg/kg; name Mass_compost_Ca_concentration; = Mass_biowaste_concentration_Ca*2
    (same comment as for compost)
  property concentration, magnesium 0 kg/kg; name Mass_compost_Mg_concentration; = Mass_biowaste_concentration_Mg*2
    (same comment as for compost)
  property concentration, mercury 0 kg/kg; name Mass_compost_Hg_concentration; = Mass_biowaste_concentration_Hg*2
    (same comment as for compost)
  property concentration, lead 0 kg/kg; name Mass_compost_concentration_Pb; = Mass_biowaste_concentration_Pb*2
    (same comment as for compost)
  property concentration, nickel 0 kg/kg; name Mass_compost_Ni_concentration; = Mass_biowaste_concentration_Ni*2
    (same comment as for compost)
  property concentration, phosphorus 0 kg/kg; name Mass_compost_P_concentration; = Mass_biowaste_concentration_P*2
    (same comment as for compost)
  property concentration, sulfur 0 kg/kg; name Mass_compost_concentration_S; = Mass_biowaste_concentration_S*2
    (same comment as for compost)
  property concentration, potassium 0 kg/kg; name Mass_compost_K_concentration; = Mass_biowaste_concentration_K*2
    (same comment as for compost)
  property nickel content 1.60606e-5; name Mass_compost_Ni_content; = Mass_biowaste_Ni_content/0.5*( DM_biowaste / DM_compost)
    nickel content on a dry matter basis
  property concentration, nitrogen 0 kg/kg; = Mass_biowaste_concentration_N*2
    (same comment as for compost)
  property concentration, zinc 0 kg/kg; name Mass_compost_concentration_Zn; = Mass_biowaste_concentration_Zn*2
    (same comment as for compost)
  property lead content 2.66667e-5; name Mass_compost_Pb_content; = Mass_biowaste_Pb_content/0.5*( DM_biowaste / DM_compost)
    lead content on a dry matter basis
  property copper content 3.81818e-5; name Mass_compost_Cu_content; = Mass_biowaste_Cu_content/0.5*( DM_biowaste / DM_compost)
    copper content on a dry matter basis
  property cadmium content 2.89394e-7; name Mass_compost_Cd_content; = Mass_biowaste_Cd_content/0.5*( DM_biowaste / DM_compost)
    cadmium content on a dry matter basis
  property nitrogen content 0.0136364; name Mass_compost_N_content; = Mass_biowaste_N_content/0.5*( DM_biowaste / DM_compost)
    nitrogen content on a dry matter basis
  property magnesium content 0.00525758; name Mass_compost_Mg_content; = Mass_biowaste_Mg_content/0.5*( DM_biowaste / DM_compost)
    magnesium content on a dry matter basis
  property zinc content 0.000120303; name Mass_compost_Zn_content; = Mass_biowaste_Zn_content/0.5*( DM_biowaste / DM_compost)
    zinc content on a dry matter basis
  property potassium content 0.0099697; name Mass_compost_K_content; = Mass_biowaste_K_content/0.5*( DM_biowaste / DM_compost)
    potassium content on a dry matter basis
  property sulfur content 0.00190909; name Mass_compost_S_content; = Mass_biowaste_S_content/0.5*( DM_biowaste / DM_compost)
    sulfur content on a dry matter basis
  property calcium content 0.0504545; name Mass_compost_Ca_content; = Mass_biowaste_Ca_content/0.5*( DM_biowaste / DM_compost)
    calcium content on a dry matter basis
  property mercury content 1e-7; name Mass_compost_Hg_content; = Mass_biowaste_Hg_content/0.5*( DM_biowaste / DM_compost)
    mercury content on a dry matter basis
  property phosphorus content 0.00275758; name Mass_compost_P_content; = Mass_biowaste_P_content/0.5*( DM_biowaste / DM_compost)
    phosphorus content on a dry matter basis
  property carbon content 0.1165
    carbon content on a dry matter basis (reserved; not for manual entry)
  property true value 7.61975e-12
    allocation property applied in "true value" allocation // value calculated from revenue
  properties: carbon content, fossil 0, wet mass 1 kg, carbon allocation 0.061512 kg
- copper: 0 kg; source Rentz O. 1999; By-product classification allocatable product; CPC 41413: Refined copper and copper alloys, unwrought; master alloys of copper
  Literature value. Copper uses: Before end-use copper is manufactured into semi fabricated products, such as shapes and ingots (known as 'semis'). These manufacturing processes are subdivided into hot working, cold working and, if necessary, process annealing. Few of the semis are ready for use as such. They more typically travel to first-stage manufacturers, who make metal rods, wire, and casting, and then to component manufacturers who produce such things as motors, valves, and insulated cables The components in turn are incorporated by final-stage manufacturers into a variety of finished products - automobiles, commercial buildings, residential housing, and so forth. These uses account for about 79% of the world-wide consumption of copper.
  production volume 49.7524 kg
  property price 5.52 EUR2005
    Literature value (http://www.economist.com/news/business/21576714-mining-industry-has-enriched-chile-its-future-precarious-copper-solution). Average price between 20015 and 2013.
  property carbon content 0
    carbon content on a dry matter basis (reserved; not for manual entry)
  property true value 2.54809e-8
    allocation property applied in "true value" allocation // value calculated from revenue
  properties: dry mass 1 kg, water in wet mass 0 kg, wet mass 1 kg, carbon content, non-fossil 0, water content 0, carbon content, fossil 0, carbon allocation 0 kg
- aluminium oxide, non-metallurgical: 0 kg; source European Aluminium Association 2008; CPC 41432: Alumina (aluminium oxide), except artificial corundum; By-product classification allocatable product; CAS 1344-28-1; pedigree (1,1,1,1,1)
  production volume 2.22595 kg
  property carbon content, non-fossil 0; name C_content_non_fossil
  property price 0.28 EUR2005; name Al2O3Amount_price_EUR2005
    From UN trade database. http://data.un.org/ Import data from the largest economies of the world are used (Brazil, India, USA, China, Japan and EU-27).
  property dry mass 1 kg; name DM
  property water content 0; name water_content
  property wet mass 1 kg; name WM
  property water in wet mass 0 kg; name WWM
  property carbon content, fossil 0; name C_content_fossil
  property carbon content 0
    carbon content on a dry matter basis (reserved; not for manual entry)
  property true value 5.78276e-11
    allocation property applied in "true value" allocation // value calculated from revenue
  properties: carbon allocation 0 kg
- aluminium, cast alloy: 0 kg; source European Aluminium Association 2008; By-product classification allocatable product; CPC 41431: Unwrought aluminium; pedigree (1,1,1,1,1)
  EcoSpold01Location=RER
  production volume 20.8077 kg
  property price 1.3 EUR2005; name castAlloyAmount_price_EUR2005
    Temporary price data. Calculated as 90% of purchasers price based on: Source: London Metal Exchange, Aluminium alloy price for 2005
  property carbon content 0
    carbon content on a dry matter basis (reserved; not for manual entry)
  property true value 2.50974e-9
    allocation property applied in "true value" allocation // value calculated from revenue
  properties: water in wet mass 0 kg, carbon content, non-fossil 0, water content 0, dry mass 1 kg, carbon content, fossil 0, wet mass 1 kg, carbon allocation 0 kg
- aluminium, wrought alloy: 0 kg; source European Aluminium Association 2008; By-product classification allocatable product; CPC 4153: Semi-finished products of aluminium or aluminium alloys; pedigree (1,1,1,1,1)
  production volume 9.10922 kg
  property price 1.44 EUR2005; name secondaryAluminiumOutput_price_EUR2005
    Estimated based on literature values and expert judgement. Aluminium ccast alloys are about 90% of the price of aluminium wrought alloys.
  property carbon content 0
    carbon content on a dry matter basis (reserved; not for manual entry)
  property true value 1.21704e-9
    allocation property applied in "true value" allocation // value calculated from revenue
  properties: wet mass 1 kg, water content 0, carbon content, fossil 0, water in wet mass 0 kg, carbon content, non-fossil 0, dry mass 1 kg, carbon allocation 0 kg
- gypsum fibreboard: 0 kg; CPC 37530: Articles of plaster or of compositions based on plaster; By-product classification allocatable product
  EcoSpold01Location=CH
  production volume 3.98335e-5 kg
  property price 1.77 EUR2005
    Calculated by 2.o-The production volume of this product is small compared to other products supplied by the activities within the same ISIC 3 category. Therefore, an average price of products supplied by the activities in the same ISIC 3 code has been applied.This price is obtained as '_45 Glass, mineral wool and ceramic goods, virgin, EU27' in the 'EU & DK Input Output Database' (available in SimaPro). The price is assumed to be valid for both RER2003, RER 2004, world 2003 and world 2004.
  property carbon content, fossil 0
    Gypsum (CaSO4-2H2O) with 15-20% cellulose fibres (ecoinvent v2.2 report 7, part VIII, pg 5). C-content/dry mass of natural fibres was considered 46% (from "Evolutionary and Biochemical Aspects", A.D. Kay and T. Vrede (in Global Ecology, 2010, Elsevier B.V., S.E. Jørgensen Ed.))
  property carbon content, non-fossil 0.0805
    (same comment as for gypsum fibreboard)
  property carbon content 0.0805
    carbon content on a dry matter basis (reserved; not for manual entry)
  property true value 6.54159e-15
    allocation property applied in "true value" allocation // value calculated from revenue
  properties: water content 0, water in wet mass 0 kg, dry mass 1 kg, wet mass 1 kg, carbon allocation 0.0805 kg
- tissue paper: 0 kg; By-product classification allocatable product; CPC 321: Pulp, paper and paperboard
  EcoSpold01Location=RER
  production volume 104563 kg
  property carbon content, non-fossil 0.36169
    Biogenic C content was calculated after biogenic C contents of chemicals used in the production of the paper (in Tab 8.86 ecoinvent v2.2 report 11_III, part 8). The cellulose content in 1 kg of paper (on a wet mas basis) was estimated as (1-chemical content), C content of cellulose was considered 0.44 kgC/kg dry mass (ecoinvent v2.2 report, n 15a, pg 40)
  property price 1.34 EUR2005
    Calculated based on literature values. The price of 1 kg of tissue paper is calculated to be 1.34 euro/kg. This price is calculated as a weighted average of prices calculated based on import (net trade) of this material from the world into 5 big economies; EU, Japan, China, India, USA. The net weight and the trade value is obtained from the UN Comtrade database (average of commodity no. 730830 Doors, windows, frames of iron or steel and commodity no. 481820 Paper hankerchiefs, cleansing, facial tissues, towel), year 2005.
  property carbon content, fossil 2.22e-5
    Fossil C content was calculated after fossil C contents of chemicals used in the production of the paper (in Tab 8.86 ecoinvent v2.2 report 11_III, part 8).
  property carbon content 0.361712
    carbon content on a dry matter basis (reserved; not for manual entry)
  property true value 1.3e-5
    allocation property applied in "true value" allocation // value calculated from revenue
  properties: dry mass 0.945 kg, wet mass 1 kg, water in wet mass 0.055 kg, water content 0.0582011, carbon allocation 0.341818 kg

## Inputs from technosphere
- scrap steel: -3.49984e-6 kg; = (reinforcing_steel+ steel)*-1; lognormal variance with pedigree 0.21, pedigree (5,5,5,5,5)
  Estimated value. Same amount entering the dataset is estimated as by-product
  production volume 24737.8 kg; = apv_electricity * ((Ref('eb2f960a-c660-4899-beb1-c405874ca791')*-1) / amount_RP)
    Calculated from production volume of reference product using the relative outputs.
  properties: wet mass 1 kg, dry mass 1 kg
- hydrogen, liquid: 1.9633e-6 kg; lognormal variance with pedigree 0.0059, pedigree (2,4,3,3,2)
  Estimated value. Measured/calculated value for Quebec is extrapolated for GLO.
  properties: dry mass 1 kg, wet mass 1 kg
- paper, woodfree, coated: 1.78096e-5 kg; = (waste_paper*-1); lognormal variance with pedigree 0.002, pedigree (1,1,3,1,1)
  Estimated value. Measured/calculated value for Quebec is extrapolated for GLO.
  Uncertainty: Calculated variable. Uncertainty will be determined from propagation of uncertainty factors of underlying variables. Uncertainty of actual relation between variables not accounted at this time, although this could be included in a future update.
  properties: wet mass 1 kg, water content 0.0582011, carbon content, fossil 0.0590617, dry mass 0.945 kg, carbon content, non-fossil 0.22775
  note on carbon content, fossil: Fossil C content was calculated after fossil C contents of chemicals used in the production of the paper (in Tab 8.72 & 8.73 ecoinvent v2.2 report 11_III, part 8).
  note on carbon content, non-fossil: Biogenic C content was calculated after biogenic C contents of chemicals used in the production of the paper (in Tab 8.72 & 8.73 ecoinvent v2.2 report 11_III, part 8). The cellulose content in 1 kg of paper (on a wet mas basis) was estimated as (1-chemical content), C content of cellulose was considered 0.44 kgC/kg dry mass (ecoinvent v2.2 report, n 15a, pg 40)
- aluminium sulfate, powder: 1.53078e-5 kg; lognormal variance with pedigree 0.0059, pedigree (2,4,3,3,2)
  Estimated value. Measured/calculated value for Quebec is extrapolated for GLO.
  properties: wet mass 1 kg, dry mass 1 kg
- waste reinforced concrete: -0.0216683 kg; = (concrete*DM_concrete)*-1; lognormal variance with pedigree 0.21, pedigree (5,5,5,5,5)
  Estimated value. Same amount entering the dataset is estimated as by-product
  production volume 1.53158e8 kg; = apv_electricity * ((Ref('b18e21df-5c60-4a4f-be84-1fe5b8e0fcbb')*-1) / amount_RP)
    Calculated from production volume of reference product using the relative outputs.
  properties: water content 0.00585407, wet mass 1 kg, dry mass 0.99418 kg
- cast iron: 1.06009e-6 kg; name iron; lognormal variance with pedigree 0.0059, pedigree (2,4,3,3,2)
  Estimated value. Measured/calculated value for Quebec is extrapolated for GLO.
  properties: wet mass 1 kg, carbon content, fossil 0.04, dry mass 1 kg
  note on carbon content, fossil: Cast iron is made by remelting pig iron in small furnaces (e.g. cupola furnaces or electric arc furnaces) and poured into moulds to make castings. It usually contains 2% to 6% carbon (ecoinvent v2.2 report 10_partII). An average content of 4% was considered
- tap water: 0.0277745 kg; name drinking_water; lognormal variance with pedigree 0.0059, pedigree (2,4,3,3,2)
  Estimated value. Measured/calculated value for Quebec is extrapolated for GLO.
  properties: wet mass 1 kg, water content 2962.17, dry mass 0.000337476 kg, carbon content, fossil 0.00178991
  note on carbon content, fossil: Bicarbonate content is 2.93 mol/m3. CO2 content is 0.1 mol/m3 (ecoinvent v2.2 report 8, Tab 93.1).
- carbon dioxide, liquid: 6.91182e-7 kg; lognormal variance with pedigree 0.0053, pedigree (2,4,3,3,1)
  Estimated value. Measured/calculated value for Quebec is extrapolated for GLO.
  properties: dry mass 1 kg, carbon content, fossil 0.272727, wet mass 1 kg
- transport, freight, light commercial vehicle: 7.72885e-5 metric ton*km; lognormal variance with pedigree 0.0059, pedigree (2,4,3,3,2)
  Estimated value. Measured/calculated value for Quebec is extrapolated for GLO. This vehicle use corresponds to maintenance and operation services related to the operation of the whole company. Transports have been distributed among different activities (electricity production, transport and distribution) according to their respective use of these transports and, when the exact distribution was not available, according to the relative expenses of each activity.
- anionic resin: 1.54367e-9 kg; lognormal variance with pedigree 0.0059, pedigree (2,4,3,3,2)
  Estimated value. Measured/calculated value for Quebec is extrapolated for GLO.
  property density 0.76 kg/l; name density_resinA
  properties: carbon content, fossil 0.680721, water content 1, wet mass 1 kg, dry mass 0.5 kg
  note on carbon content, fossil: Cross-linked polystyrene beads are treated with chloromethyl methyl ether under anhydrous conditions, with either aluminum chloride or tin(IV) chloride as catalyst. Chloromethylated polystyrene is obtained. In a second stage, the chlorine in the chloromethylated group can be replaced by an amine (Anion exchange resins, in Ullmann). In this case, Trimethylamine, C3H9N, is used (ecoinvent v2.2 report 8-part 93). That is, the resine can be formulated as C12H18NCl (after Ullmann, Anion exchange resins). The resine is hydrated (ecoinvent v2.2 report 8, part II, Tab 93.7)
  note on density: Literature value. Bulk density between 560 and 960. Source: DOWEX. Fundamentals of Ion Exchange http://msdssearch.dow.com/PublishedLiteratureDOWCOM/dh_0032/0901b803800326ca.pdf?filepath=liquidseps/pdfs/noreg/177-01837.pdf&fromPage=GetDoc
- uranium hexafluoride: 3.60432e-5 kg; lognormal variance with pedigree 0.0059, pedigree (2,4,3,3,2)
  Estimated value. Measured/calculated value for Quebec is extrapolated for GLO.
  As CANDU reactors use natural uranium (unenriched UO2) but no data were collected for UO2 production (impurities removal from yellowcake, refining to UO3 and conversion to UO2) uranium hexafluoride is used as proxy (UO3 is used to produce both UO2 and UF6).
  properties: dry mass 1 kg, wet mass 1 kg
- cationic resin: 6.15533e-10 kg; lognormal variance with pedigree 0.0059, pedigree (2,4,3,3,2)
  Estimated value. Measured/calculated value for Quebec is extrapolated for GLO.
  property density 0.76 kg/l; name density_resinC
  properties: dry mass 0.5 kg, carbon content, fossil 0.521606, wet mass 1 kg, water content 1
  note on carbon content, fossil: Chemically inert polystyrene beads are treated with concentrated sulfuric or chlorosulfonic acid to give cross-linked polystyrene 3-sulfonic acid (Cation exchange resins, Ullmann). The resine was approximated as C8H8O3S (from Ullmann, Cation exchange resins). The resine is hydrated (ecoinvent v2.2 report 8, part II, Tab 93.5)
- reinforcing steel: 1.06009e-6 kg; name reinforcing_steel; lognormal variance with pedigree 0.0059, pedigree (2,4,3,3,2)
  Estimated value. Measured/calculated value for Quebec is extrapolated for GLO.
  properties: carbon content, fossil 0.004, dry mass 1 kg, wet mass 1 kg
- nitrogen, liquid: 8.60797e-7 kg; lognormal variance with pedigree 0.0059, pedigree (2,4,3,3,2)
  Estimated value. Measured/calculated value for Quebec is extrapolated for GLO.
  properties: wet mass 1 kg, dry mass 1 kg
- transport, helicopter: 3.83702e-7 hour; lognormal variance with pedigree 0.1253, pedigree (2,4,3,3,2)
  (same comment as for transport, freight, light commercial vehicle)
- diesel, burned in diesel-electric generating set, 10MW: 0.00010964 MJ; lognormal variance with pedigree 0.0059, pedigree (2,4,3,3,2)
  Estimated value. Measured/calculated value for Quebec is extrapolated for GLO.
  property heating value, gross 45.4 MJ; name GHVDiesel
  property kgFuel_Input 5695.2 kg; name inputDiesel; = 6.78E+03*densityDiesel
  property density 0.84 kg/l; name densityDiesel
  note on heating value, gross: Literature value. gross (upper) heating (calorific) value. Ecoinvent
- transport, freight, lorry, unspecified: 0.000145757 metric ton*km; lognormal variance with pedigree 0.1253, pedigree (2,4,3,3,2)
  (same comment as for transport, freight, light commercial vehicle)
- sodium hydroxide, without water, in 50% solution state: 3.58312e-5 kg; lognormal variance with pedigree 0.0059, pedigree (2,4,3,3,2)
  Estimated value. Measured/calculated value for Quebec is extrapolated for GLO.
  properties: wet mass 1 kg, dry mass 1 kg
- sodium hypochlorite, without water, in 15% solution state: 8.48076e-8 kg; lognormal variance with pedigree 0.0059, pedigree (2,4,3,3,2)
  Estimated value. Measured/calculated value for Quebec is extrapolated for GLO.
  properties: dry mass 1 kg, wet mass 1 kg
- lubricating oil: 7.46307e-7 kg; name lubricatingOil; lognormal variance with pedigree 0.0059, pedigree (2,4,3,3,2)
  Estimated value. Measured/calculated value for Quebec is extrapolated for GLO.
  properties: wet mass 1 kg, carbon content, fossil 0.75, dry mass 1 kg
  note on carbon content, fossil: Lubricating oil is produced from diesel. C-content/dry mass of fats and oils considered 75%, from: ecoinvent v2.2 report, n 15a, pg 40
- transport, passenger car: 6.51794e-5 km; lognormal variance with pedigree 0.0059, pedigree (2,4,3,3,2)
  (same comment as for transport, freight, light commercial vehicle)
- hydrazine: 5.21567e-7 kg; lognormal variance with pedigree 0.0059, pedigree (2,4,3,3,2)
  Estimated value. Measured/calculated value for Quebec is extrapolated for GLO.
  properties: dry mass 1 kg, wet mass 1 kg
- chemical, organic: 1.8276e-6 kg; lognormal variance with pedigree 0.0059, pedigree (2,4,3,3,2)
  Estimated value. Measured/calculated value for Quebec is extrapolated for GLO.
  properties: dry mass 1 kg, wet mass 1 kg, carbon content, fossil 0.628
  note on carbon content, fossil: This dataset is an unweighted average of 20 organic substances (listed in Tab 88.1, ecoinvent v2.2 report 8, part II), being part of the top100 chemicals included in this database. The C-content has also been calculated as an unweighted average of the C content of the substances composing this dataset.
- fly ash and scrubber sludge: -3.68913e-5 kg; name fly_ash; lognormal variance with pedigree 0.0059, pedigree (2,4,3,3,2)
  Estimated value. Measured/calculated value for Quebec is extrapolated for GLO.
  production volume 260758 kg; = fly_ash* apv_electricity/amount_RP
    Calculated from production volume of reference product using the relative outputs.
  property price 0 EUR2005; name fly_ash_price_EUR2005
  properties: wet mass 1 kg, dry mass 0.1 kg, water content 9, carbon content, fossil 0.167
  note on carbon content, fossil: Tab A.6, ecoinvent v2.2 report 13_I. C content has been calculated after data in the tables, and then referred to 1 kg DM
- chlorodifluoromethane: 4.40999e-8 kg; lognormal variance with pedigree 0.0059, pedigree (2,4,3,3,2)
  Estimated value. Measured/calculated value for Quebec is extrapolated for GLO.
  properties: carbon content, fossil 0.139535, wet mass 1 kg, dry mass 1 kg
- low level radioactive waste for final repository: -1.3654e-8 m3; name low_level_waste_final; lognormal variance with pedigree 0.0059, pedigree (2,4,3,3,2)
  Estimated value. Measured/calculated value for Quebec is extrapolated for GLO.
  production volume 96.5105 m3; = low_level_waste_final * apv_electricity/amount_RP
    Calculated from production volume of reference product using the relative outputs.
  property price 0 EUR2005; name low_level_waste_final_price_EUR2005
  properties: wet mass 2500 kg, dry mass 2500 kg
- waste paper, unsorted: -1.78096e-5 kg; name waste_paper; lognormal variance with pedigree 0.0059, pedigree (2,4,3,3,2)
  Estimated value. Measured/calculated value for Quebec is extrapolated for GLO.
  production volume 125883 kg; = waste_paper* apv_electricity/amount_RP
    Calculated from production volume of reference product using the relative outputs.
  property price 0.093 EUR2005; name waste_paper_price_EUR2005
- steel, low-alloyed, hot rolled: 2.43974e-6 kg; name steel; lognormal variance with pedigree 0.0059, pedigree (2,4,3,3,2)
  Estimated value. Measured/calculated value for Quebec is extrapolated for GLO.
  properties: wet mass 1 kg, carbon content, fossil 0.005, dry mass 1 kg
  note on carbon content, fossil: Low alloyed steel composition given in Tab. 3.2 ecoinvent v2.2 report 10_partII. Steel assumed to have a C content of 0.5%
- concrete, normal: 9.89422e-6 m3; name concrete; lognormal variance with pedigree 0.0059, pedigree (2,4,3,3,2)
  Estimated value. Measured/calculated value for Quebec is extrapolated for GLO.
  property dry mass 2190 kg; name DM_concrete
  properties: wet mass 2380 kg, water content 0.086758
- municipal solid waste: -2.8665e-5 kg; name municipal_solid_waste; lognormal variance with pedigree 0.0059, pedigree (2,4,3,3,2)
  Estimated value. Measured/calculated value for Quebec is extrapolated for GLO.
  production volume 202612 kg; = municipal_solid_waste* apv_electricity/amount_RP
    Calculated from production volume of reference product using the relative outputs.
  property price 0 EUR2005; name municipal_solid_waste_price_EUR2005
  properties: carbon content, non-fossil 0.261655, dry mass 0.771 kg, wet mass 1 kg, carbon content, fossil 0.171549, water content 0.297017
  note on carbon content, non-fossil: MSW composition in tab 4.1, ecoinvent v2.2 report 13_I. C content referred to 1 kg DM
- low level radioactive waste: -2.91314e-9 m3; name low_level_waste; lognormal variance with pedigree 0.0059, pedigree (2,4,3,3,2)
  Estimated value. Measured/calculated value for Quebec is extrapolated for GLO.
  production volume 20.5909 m3; = low_level_waste* apv_electricity/amount_RP
    Calculated from production volume of reference product using the relative outputs.
  property price 0 EUR2005; name low_level_waste_price_EUR2005
  properties: dry mass 2500 kg, wet mass 2500 kg
- heavy water: 8.48076e-7 kg; lognormal variance with pedigree 0.0059, pedigree (2,4,3,3,2)
  Estimated value. Measured/calculated value for Quebec is extrapolated for GLO.
  properties: wet mass 1 kg
- sodium percarbonate, powder: 2.45942e-6 kg; lognormal variance with pedigree 0.0059, pedigree (2,4,3,3,2)
  Estimated value. Measured/calculated value for Quebec is extrapolated for GLO.
  properties: carbon content, fossil 0.0902256, wet mass 1 kg, dry mass 1 kg
- hazardous waste, for incineration: -3.60432e-6 kg; name haz_waste; lognormal variance with pedigree 0.0059, pedigree (2,4,3,3,2)
  Estimated value. Measured/calculated value for Quebec is extrapolated for GLO.
  production volume 25476.4 kg; = haz_waste* apv_electricity/amount_RP
    Calculated from production volume of reference product using the relative outputs.
  property price 0 EUR2005; name haz_waste_price_EUR2005
  properties: wet mass 1 kg, dry mass 0.75 kg, water content 0.333333, carbon content, fossil 0.554667
- sulfuric acid: 0.000111522 kg; lognormal variance with pedigree 0.0059, pedigree (2,4,3,3,2)
  Estimated value. Measured/calculated value for Quebec is extrapolated for GLO.
  properties: wet mass 1 kg, dry mass 1 kg
- helium: 7.46307e-7 kg; lognormal variance with pedigree 0.0059, pedigree (2,4,3,3,2)
  Estimated value. Measured/calculated value for Quebec is extrapolated for GLO.
  properties: dry mass 1 kg, wet mass 1 kg
- waste mineral oil: -4.02836e-6 kg; name waste_oil; lognormal variance with pedigree 0.0059, pedigree (2,4,3,3,2)
  Estimated value. Measured/calculated value for Quebec is extrapolated for GLO.
  production volume 28473.6 kg; = waste_oil* apv_electricity/amount_RP
    Calculated from production volume of reference product using the relative outputs.
  property price 0 EUR2005; name waste_oil_price_EUR2005
  properties: carbon content, fossil 0.864444, water content 0.111111, dry mass 0.9 kg, wet mass 1 kg
- nuclear power plant, pressure water reactor, 650MW: 1.22282e-11 unit; = 1/(lifetime*650000*8760*0.73); lognormal variance with pedigree 0.0059, pedigree (2,4,3,3,2)
  Calculated generic value, not country specific.The amount of infrastructure input is calculated based on the assumption of an average lifetime of 30 years for this type of power plant. An average load factor for nuclear power plants of 73% was applied (PRIS database, 2018).
  Reference(s): International Atomic Energy Agency. 2018. Power Reactor Information System (PRIS), World Statistics, Load Factor, accessible online athttps://pris.iaea.org/PRIS/WorldStatistics/WorldTrendinAverageLoadFactor.aspx, last accessed February 2018
  property lifetime 30 year; name lifetime
- chlorine, liquid: 3.85026e-6 kg; lognormal variance with pedigree 0.0059, pedigree (2,4,3,3,2)
  Estimated value. Measured/calculated value for Quebec is extrapolated for GLO.
  properties: wet mass 1 kg, dry mass 1 kg
- spent nuclear fuel: -3.4446e-5 kg; name spent_nuclear_fuel; lognormal variance with pedigree 0.0059, pedigree (2,4,3,3,2)
  Estimated value. Measured/calculated value for Quebec is extrapolated for GLO.Amount of spent fuel produced per year plus concrete of storage modules
  production volume 243474 kg; = spent_nuclear_fuel * apv_electricity/amount_RP
    Calculated from production volume of reference product using the relative outputs.
  property price 0 EUR2005; name spent_nuclear_fuel_price_EUR2005
  properties: wet mass 1 kg, dry mass 1 kg

## Inputs from nature
- Water, river [natural resource, in water]: 0.0281137 m3; name process_water; lognormal variance with pedigree 0.0059, pedigree (2,4,3,3,2)
  Estimated value. Measured/calculated value for Quebec is extrapolated for GLO.
- Water, cooling, unspecified natural origin [natural resource, in water]: 0.253023 m3; name cooling_water; lognormal variance with pedigree 0.0064, pedigree (2,4,3,4,2)
  Estimated value. Measured/calculated value for Quebec is extrapolated for GLO.

## Emissions to nature
- Water [air, non-urban air or from high stacks]: 0.0562274 m3; = 0.2*(cooling_water+process_water); lognormal variance with pedigree 0.0073, pedigree (3,4,3,3,2)
  Estimated value. Estimation based on input of water. It is assumed that 20% of cooling water is evaporated and 80% is rejected to the river
- Iodine-131 [air, non-urban air or from high stacks]: 5.51249e-7 kBq; lognormal variance with pedigree 0.0059, pedigree (2,4,3,3,2)
  Estimated value. Measured/calculated value for Quebec is extrapolated for GLO.
- Silver-110 [air, non-urban air or from high stacks]: 4.77275e-9 kBq; lognormal variance with pedigree 0.4706, pedigree (2,5,5,5,5)
  Estimated value. Value extrapolated from a different PWR technology.
- Lanthanum-140 [water, surface water]: 7.54796e-7 kBq; lognormal variance with pedigree 0.4706, pedigree (2,5,5,5,5)
  Estimated value. Value extrapolated from a different PWR technology.
- Cesium-134 [water, surface water]: 0.000223892 kBq; lognormal variance with pedigree 0.0059, pedigree (2,4,3,3,2)
  Estimated value. Measured/calculated value for Quebec is extrapolated for GLO.
- Strontium-89 [water, surface water]: 5.56567e-6 kBq; lognormal variance with pedigree 0.4706, pedigree (2,5,5,5,5)
  Estimated value. Value extrapolated from a different PWR technology.
- Chromium-51 [water, surface water]: 1.15278e-5 kBq; lognormal variance with pedigree 0.4706, pedigree (2,5,5,5,5)
  Estimated value. Value extrapolated from a different PWR technology.
- Iron-59 [water, surface water]: 0.0356192 kBq; lognormal variance with pedigree 0.0059, pedigree (2,4,3,3,2)
  Estimated value. Measured/calculated value for Quebec is extrapolated for GLO.
- Niobium-95 [water, surface water]: 4.68126e-6 kBq; lognormal variance with pedigree 0.4706, pedigree (2,5,5,5,5)
  Estimated value. Value extrapolated from a different PWR technology.
- Water [water, surface water]: 0.224937 m3; = 0.8*(cooling_water+process_water)+(drinking_water/1000); lognormal variance with pedigree 0.0133, pedigree (4,4,3,3,2)
  (same comment as for Water)
- Cesium-137 [water, surface water]: 0.000315484 kBq; lognormal variance with pedigree 0.0059, pedigree (2,4,3,3,2)
  Estimated value. Measured/calculated value for Quebec is extrapolated for GLO.
- Barium-140 [air, non-urban air or from high stacks]: 4.83374e-10 kBq; lognormal variance with pedigree 0.4706, pedigree (2,5,5,5,5)
  Estimated value. Value extrapolated from a different PWR technology.
- Suspended solids, unspecified [water, surface water]: 2.69264e-5 kg; lognormal variance with pedigree 0.0059, pedigree (2,4,3,3,2)
  Estimated value. Measured/calculated value for Quebec is extrapolated for GLO.
- Iodine-131 [water, surface water]: 0.00763268 kBq; lognormal variance with pedigree 0.0059, pedigree (2,4,3,3,2)
  Estimated value. Measured/calculated value for Quebec is extrapolated for GLO.
- Technetium-99m [water, surface water]: 4.2848e-6 kBq; lognormal variance with pedigree 0.4706, pedigree (2,5,5,5,5)
  Estimated value. Value extrapolated from a different PWR technology.
- Antimony-124 [water, surface water]: 0.0391811 kBq; lognormal variance with pedigree 0.3053, pedigree (2,4,3,3,2)
  Estimated value. Measured/calculated value for Quebec is extrapolated for GLO.
- Hydrogen-3, Tritium [water, surface water]: 203.538 kBq; lognormal variance with pedigree 0.0059, pedigree (2,4,3,3,2)
  Estimated value. Measured/calculated value for Quebec is extrapolated for GLO.
- Radioactive species, other beta emitters [air, non-urban air or from high stacks]: 1.32204e-7 kBq; lognormal variance with pedigree 0.4706, pedigree (2,5,5,5,5)
  Estimated value. Value extrapolated from a different PWR technology.
- Cobalt-60 [air, non-urban air or from high stacks]: 1.1543e-7 kBq; lognormal variance with pedigree 0.4706, pedigree (2,5,5,5,5)
  Estimated value. Value extrapolated from a different PWR technology.
- Radioactive species, alpha emitters [water, surface water]: 4.60502e-8 kBq; lognormal variance with pedigree 0.4706, pedigree (2,5,5,5,5)
  Estimated value. Value extrapolated from a different PWR technology.
- Tellurium-132 [water, surface water]: 1.28392e-7 kBq; lognormal variance with pedigree 0.4706, pedigree (2,5,5,5,5)
  Estimated value. Value extrapolated from a different PWR technology.
- Hydrocarbons, unspecified [water, surface water]: 1.88273e-6 kg; lognormal variance with pedigree 0.0059, pedigree (2,4,3,3,2)
  Estimated value. Measured/calculated value for Quebec is extrapolated for GLO.
- Noble gases, radioactive, unspecified [air, non-urban air or from high stacks]: 0.394934 kBq; lognormal variance with pedigree 0.4706, pedigree (2,5,5,5,5)
  Estimated value. Value extrapolated from a different PWR technology.
- Antimony-122 [water, surface water]: 1.37846e-6 kBq; lognormal variance with pedigree 0.4706, pedigree (2,5,5,5,5)
  Estimated value. Value extrapolated from a different PWR technology.
- Molybdenum-99 [water, surface water]: 9.14904e-9 kBq; lognormal variance with pedigree 0.3433, pedigree (2,2,5,5,2)
  Estimated value. Value extrapolated from a different PWR technology.
- Zirconium-95 [air, non-urban air or from high stacks]: 8.81358e-8 kBq; lognormal variance with pedigree 0.4706, pedigree (2,5,5,5,5)
  Estimated value. Value extrapolated from a different PWR technology.
- Carbon-14 [air, non-urban air or from high stacks]: 3.74849e-5 kBq; lognormal variance with pedigree 0.3053, pedigree (2,4,3,3,2)
  Estimated value. Measured/calculated value for Quebec is extrapolated for GLO.
- Cobalt-58 [air, non-urban air or from high stacks]: 2.50074e-8 kBq; lognormal variance with pedigree 0.4706, pedigree (2,5,5,5,5)
  Estimated value. Value extrapolated from a different PWR technology.
- Carbon-14 [water, surface water]: 0.00436759 kBq; lognormal variance with pedigree 0.0059, pedigree (2,4,3,3,2)
  Estimated value. Measured/calculated value for Quebec is extrapolated for GLO.
- Ruthenium-103 [water, surface water]: 4.34579e-7 kBq; lognormal variance with pedigree 0.4706, pedigree (2,5,5,5,5)
  Estimated value. Value extrapolated from a different PWR technology.
- Tellurium-123m [water, surface water]: 2.394e-6 kBq; lognormal variance with pedigree 0.4706, pedigree (2,5,5,5,5)
  Estimated value. Value extrapolated from a different PWR technology.
- Iodine-133 [air, non-urban air or from high stacks]: 2.77521e-6 kBq; lognormal variance with pedigree 0.4706, pedigree (2,5,5,5,5)
  Estimated value. Value extrapolated from a different PWR technology.
- Xenon-133 [air, non-urban air or from high stacks]: 0.921003 kBq; lognormal variance with pedigree 0.4706, pedigree (2,5,5,5,5)
  Estimated value. Value extrapolated from a different PWR technology.
- Sodium-24 [water, surface water]: 1.52179e-5 kBq; lognormal variance with pedigree 0.4706, pedigree (2,5,5,5,5)
  Estimated value. Value extrapolated from a different PWR technology.
- Cesium-137 [air, non-urban air or from high stacks]: 1.11008e-8 kBq; lognormal variance with pedigree 0.4706, pedigree (2,5,5,5,5)
  Estimated value. Value extrapolated from a different PWR technology.
- Zirconium-95 [water, surface water]: 0.0178096 kBq; lognormal variance with pedigree 0.3053, pedigree (2,4,3,3,2)
  Estimated value. Measured/calculated value for Quebec is extrapolated for GLO.
- Cobalt-58 [water, surface water]: 0.00173832 kBq; lognormal variance with pedigree 0.4706, pedigree (2,5,5,5,5)
  Estimated value. Value extrapolated from a different PWR technology.
- Cerium-141 [water, surface water]: 2.68372e-7 kBq; lognormal variance with pedigree 0.4706, pedigree (2,5,5,5,5)
  Estimated value. Value extrapolated from a different PWR technology.
- Cobalt-60 [water, surface water]: 0.00106858 kBq; lognormal variance with pedigree 0.0059, pedigree (2,4,3,3,2)
  Estimated value. Measured/calculated value for Quebec is extrapolated for GLO.
- Niobium-95 [air, non-urban air or from high stacks]: 0.0436759 kBq; lognormal variance with pedigree 0.0059, pedigree (2,4,3,3,2)
  Estimated value. Measured/calculated value for Quebec is extrapolated for GLO.
- Antimony-125 [air, non-urban air or from high stacks]: 3.56813e-8 kBq; lognormal variance with pedigree 0.4706, pedigree (2,5,5,5,5)
  Estimated value. Value extrapolated from a different PWR technology.
- Krypton-85m [air, non-urban air or from high stacks]: 0.0150502 kBq; lognormal variance with pedigree 0.4706, pedigree (2,5,5,5,5)
  Estimated value. Value extrapolated from a different PWR technology.
- Xenon-135 [air, non-urban air or from high stacks]: 0.253123 kBq; lognormal variance with pedigree 0.4706, pedigree (2,5,5,5,5)
  Estimated value. Value extrapolated from a different PWR technology.
- Zinc-65 [water, surface water]: 0.00279865 kBq; lognormal variance with pedigree 0.0059, pedigree (2,4,3,3,2)
  Estimated value. Measured/calculated value for Quebec is extrapolated for GLO.
- Manganese-54 [water, surface water]: 1.99754e-5 kBq; lognormal variance with pedigree 0.4706, pedigree (2,5,5,5,5)
  Estimated value. Value extrapolated from a different PWR technology.
- Iodine-133 [water, surface water]: 6.34333e-7 kBq; lognormal variance with pedigree 0.4706, pedigree (2,5,5,5,5)
  Estimated value. Value extrapolated from a different PWR technology.
- Cesium-136 [water, surface water]: 4.2848e-7 kBq; lognormal variance with pedigree 0.4706, pedigree (2,5,5,5,5)
  Estimated value. Value extrapolated from a different PWR technology.
- Silver-110 [water, surface water]: 6.75504e-6 kBq; lognormal variance with pedigree 0.4706, pedigree (2,5,5,5,5)
  Estimated value. Value extrapolated from a different PWR technology.
- Antimony-125 [water, surface water]: 6.35858e-5 kBq; lognormal variance with pedigree 0.4706, pedigree (2,5,5,5,5)
  Estimated value. Value extrapolated from a different PWR technology.
- Strontium-90 [water, surface water]: 1.98229e-6 kBq; lognormal variance with pedigree 0.4706, pedigree (2,5,5,5,5)
  Estimated value. Value extrapolated from a different PWR technology.
- Cobalt-57 [water, surface water]: 1.36016e-5 kBq; lognormal variance with pedigree 0.4706, pedigree (2,5,5,5,5)
  Estimated value. Value extrapolated from a different PWR technology.
- Antimony-124 [air, non-urban air or from high stacks]: 7.24299e-10 kBq; lognormal variance with pedigree 0.4706, pedigree (2,5,5,5,5)
  Estimated value. Value extrapolated from a different PWR technology.
- Aerosols, radioactive, unspecified [air, non-urban air or from high stacks]: 2.03962e-6 kBq; lognormal variance with pedigree 0.0059, pedigree (2,4,3,3,2)
  Estimated value. Measured/calculated value for Quebec is extrapolated for GLO.
- Cerium-144 [water, surface water]: 7.34973e-7 kBq; lognormal variance with pedigree 0.4706, pedigree (2,5,5,5,5)
  Estimated value. Value extrapolated from a different PWR technology.

## Sampling procedure
Extrapolation from regional dataset

## Extrapolations
Extrapolation from regional dataset. Uncertainty has been adjusted accordingly.

## Review by Carl Vadenbo 2015-05-28
The update of the whole electricity sector for the ecoinvent v3.2 database consist of hundreds of datasets. All these datasets have passed through a streamlined review processes where the underlying modelling of production volumes, technology shares and efficiencies was reviewed in detail prior to the datasets being submitted to the database.
