# purse seiner construction, steel

Dataset: EcoSpold 2, unit process
Geography: RLA
Time period: 2010-01-01 to 2020-12-31
Technology level: current
Classification: ISIC rev.4 ecoinvent: 0311:Marine fishing
Scenario: Business-as-Usual
System model: Allocation at the point of substitution
Generated by: Angel Avadí
Published in: Avadí, A. 2018
Database: ecoinvent
isCopyrightProtected: true
accessRestrictedTo: 1

## General comment
This dataset represents the construction of steel purse seiners, per 1000 kg of light ship weight, based on data from Peru and Ecuador, corresponding to 143+12 vessels for which data was avilable with different levels of detail. Specific data for specific inventory items may be based on sub-samples for which detailed data was available. Vessel dimensions, landings and fuel use were available for roughly 661 purse seiners.
System boundaries and relation between activities

## Included activities start
Construction of vessels, including provision of all materials and work

## Included activities end
Batteries are excluded, as they do not exist in the database

## Geography
Data from Peru and Ecuador, extrapolated to Latin America (RLA)

## Technology
Peru features various shipyards and relevant ship-building and ship-retrofitting expertise.

## Reference product
- purse seiner, steel: 1 kg; name LSW; = hull+structure+copper+nylon+poly+lead+engine*1000+motors*1000+paint; source Pierre Fréon 2014; CPC 49315: Fishing vessels; factory ships and other vessels for processing or preserving fishery products; By-product classification allocatable product
  Construction of a steel purse seiner, per 1000 kg of light ship weight (LSW). Regressions based on mainly primary data were created to relate the weight of each inventory item to a purse seiner's LSW. The list of inventory items (granularity) contribute >95% of environmental impacts, as described in the reference publication.
  production volume 0.0871654 kg; name prod_vol
    GDP for Latin America as a proportion of the world
  property lifetime 35 year; name LSW_lifetime
  property lifetime capacity [h] 56000 hour; name LSW_lifetime_capacity_PMH; = 8*200*LSW_lifetime
    8 h/d times 200 d/y times lifetime
  property price 0.611929 EUR2005; name LSW_price_EUR2005
    Calculated based on inputs: The price of the product has been calculated as a sum of the values of the material and energy inputs for this product. This value is therefore a rough estimation. It may underestimate the real price since there are additional expenses when producing any product. These expences can include for example labour costs, treatment of waste materials and profit for the producer. Please consider carefully whether this level of data quality is acceptable for your application.
  property true value 611.678; name LSW_true_value
    allocation property applied in "true value" allocation // value calculated from revenue

## By-products
- iron scrap, unsorted: 0 kg; source Pierre Fréon 2014; CPC 39310: Slag, dross, scalings and other waste from the manufacture of iron or steel; By-product classification Recyclable; pedigree (1,1,1,1,1)
  Recycled steel from hull and structural elements
  Uncertainty: Based on assumptions
  production volume 0.0772123 kg
  property price 0.149 EUR2005; name iron_price_EUR2005
    Temporary price data. Calculated as 90% of purchasers price based on: estimated at 85% of sorted scrap
  property carbon content 0
    carbon content on a dry matter basis (reserved; not for manual entry)
  property true value 131.932
    allocation property applied in "true value" allocation // value calculated from revenue
  properties: dry mass 1 kg, water content 0, water in wet mass 0 kg, wet mass 1 kg, carbon content, non-fossil 0, carbon content, fossil 0, carbon allocation 0 kg
- heat, for reuse in municipal waste incineration only: 0 MJ; CPC 17300: Steam and hot water; By-product classification allocatable product; pedigree (1,1,1,1,1)
  Net electricity generated from this waste and used in internal MSWI plant energy redistribution.
  production volume 0.00576045 MJ
  property true value relation 0.1842; name E_th_prod_MSWI_true_value_relation
    property to calculate 'true value' from
  property exergy 0.1842 MJ; name E_th_prod_MSWI_exergy
    This exergy property is based on the exergy content of the product.
  property price 0.0106 EUR2005; name E_th_prod_MSWI_price_EUR2005
    Average European district heat price from Ecoheatcool and Euroheat 2005-2006, Ecoheat Work package 1: The European heat market. Final report. 10.6 EUR/GJ i s the price of district heat. http://www.solarthermalworld.org/files/Ecoheatcool%20WP1%20Web.pdf?download
  property true value 0.433538
    allocation property applied in "true value" allocation // value calculated from true value relation
- electricity, for reuse in municipal waste incineration only: 0 kWh; CPC 17100: Electrical energy; By-product classification allocatable product; pedigree (1,1,1,1,1)
  (same comment as for heat, for reuse in municipal waste incineration only)
  production volume 0.000822805 kWh
  property price 0.1 EUR2005; name E_el_prod_MSWI_price_EUR2005
    Estimated to be the same price as in case of electricity, medium voltage.
  property exergy 3.6 MJ; name E_el_prod_MSWI_exergy
    This exergy property is based on the exergy content of the product.
  property true value relation 3.6; name E_el_prod_MSWI_true_value_relation
    property to calculate 'true value' from
  property true value 1.21026
    (same comment as for heat, for reuse in municipal waste incineration only)
- copper: 0 kg; source Rentz O. 1999; By-product classification allocatable product; CPC 41413: Refined copper and copper alloys, unwrought; master alloys of copper
  Literature value. Copper uses: Before end-use copper is manufactured into semi fabricated products, such as shapes and ingots (known as 'semis'). These manufacturing processes are subdivided into hot working, cold working and, if necessary, process annealing. Few of the semis are ready for use as such. They more typically travel to first-stage manufacturers, who make metal rods, wire, and casting, and then to component manufacturers who produce such things as motors, valves, and insulated cables The components in turn are incorporated by final-stage manufacturers into a variety of finished products - automobiles, commercial buildings, residential housing, and so forth. These uses account for about 79% of the world-wide consumption of copper.
  production volume 0.000391564 kg
  properties: dry mass 1 kg, water in wet mass 0 kg, wet mass 1 kg, carbon content, non-fossil 0, water content 0, price 5.52 EUR2005, carbon content, fossil 0, carbon content 0, carbon allocation 0 kg, true value 24.7868
- zinc concentrate: 0 kg; CPC 14290: Other non-ferrous metal ores and concentrates (other than uranium or thorium ores and concentrates); By-product classification allocatable product
  Calculated value from the knowledge of the properties of both products.
  production volume 3.24265e-6 kg
  property price 0.38 EUR2005; name ByP_price_EUR2005
    Temporary price data. Calculated as 90% of purchasers price based on: Zinc content in concentrate 53%. Concentrate price per kg Zn 86.5% of refined Zn price (13.5% treatment charges according to CHR Metals Limited 2005: Dynamic cost curves. http://www.minecost.com/dynamic.pdf). 2004 zinc price from USGS (2007) Mineral commodity summaries 2007. <http://minerals.usgs.gov/minerals/pubs/mcs/2007/mcs2007.pdf> [Accessed 25 May 2010]
  property zinc content 0.53; name zinc_C_zinc_concentrate
    Zinc content on a dry matter basis. Value taken from teh "zinc mine operation" /GLO dataset.
  property dry mass 1 kg; name DM_zinc_concentrate
  property carbon content 0
    carbon content on a dry matter basis (reserved; not for manual entry)
  property true value 0.0141306
    allocation property applied in "true value" allocation // value calculated from revenue
  properties: wet mass 1 kg, water content 0, carbon content, non-fossil 0, carbon content, fossil 0, water in wet mass 0 kg, carbon allocation 0 kg

## Inputs from technosphere
All rows: source Pierre Fréon 2014
- used purse seiner, steel: -0.79433 kg; name EOL; = (LSW)*-1
  EOL of a steel purse seiner, per 1000 kg of light ship weight (LSW), at the end of its lifetime. Regressions based on mainly primary data were created to relate the weight of each inventory item to a purse seiner's LSW. The list of inventory items (granularity) contribute >95% of environmental impacts, as described in the reference publication. Includes engines and motors
  production volume 0.0871654 kg; = ABS(prod_vol*EOL/LSW)
    Calculated from production volume of reference product using the relative outputs.
  property price 0 EUR2005; name EOL_price_EUR2005
  property wet mass 1 kg; name EOL_WM
  property dry mass 1 kg; name EOL_DM
  property carbon content, non-fossil 0.000776561; name EOL_C_content_non_fossil; = 0.19963*0.389%
  property water content 0; name EOL_water_content
  property water in wet mass 0 kg; name EOL_WWM
  property carbon content, fossil 0.0648147; name EOL_C_content_fossil; = 0.005*91.3%+0.63717*6.6%+0.85714*2.1%+0.14037*0.14%
  note on carbon content, non-fossil: Calculated from the fossil carbon content of thepaint, multiplied by its relative proportion
  note on carbon content, fossil: Calculated from the fossil carbon content of the hull and gear materials, multiplied by their relative proportions
- marine engine: 2.16941e-5 unit; name engine; triangular min 2.16941e-5, mostLikely 2.16941e-5, max 2.16941e-5, pedigree (2,5,3,3,2)
  Marine diesel engine
  Uncertainty: Data from 143 vessels
  property lifetime capacity [h] 8000 hour; name engine_lifetime_capacity_PMH
  property lifetime 15 year; name engine_lifetime
- lead: 0.0129529 kg; triangular min 0.0129529, mostLikely 0.0129529, max 0.0129529, pedigree (2,3,1,1,1)
  Fishing net construction
  Uncertainty: Data from 27 vessels
  properties: wet mass 1 kg, dry mass 1 kg
- marine electric motor: 9.53587e-7 unit; name motors; triangular min 9.53587e-7, mostLikely 9.53587e-7, max 9.53587e-7, pedigree (2,5,3,3,2)
  Electric motors and pumps
  Uncertainty: Data from 143 vessels
  property lifetime capacity [h] 20000 hour; name motors_lifetime_capacity_PMH
  property lifetime 10 year; name motors_lifetime
- nylon 6-6: 0.0523678 kg; name nylon; triangular min 0.0523678, mostLikely 0.0523678, max 0.0523678, pedigree (2,3,1,1,1)
  Fishing net construction
  Uncertainty: Data from 27 vessels
  properties: wet mass 1 kg, carbon content, fossil 0.637168, dry mass 1 kg
- polyethylene, low density, granulate: 0.0169262 kg; name poly; triangular min 0.0169262, mostLikely 0.0169262, max 0.0169262, pedigree (2,3,1,1,1)
  Fishing net construction
  Uncertainty: Data from 27 vessels
  properties: carbon content, fossil 0.857143, dry mass 1 kg, wet mass 1 kg
- wire drawing, copper: 0.00452954 kg; name copper; triangular min 0.00452954, mostLikely 0.00452954, max 0.00452954, pedigree (2,3,2,3,2)
  Manufacture of copper wire
  Uncertainty: Based on 8 different estimations based on reports, shipyard work orders, invoices, etc.
- copper: 0.00452954 kg; = copper
  Copper wire for electric circuit construction, 50% recycled
  properties: dry mass 1 kg, wet mass 1 kg
- metal working, average for steel product manufacturing: 0.104895 kg; = structure
  Steel hull + transmission construction, structural elements
- alkyd paint, white, without solvent, in 60% solution state: 0.00309121 kg; name paint; triangular min 0.00309121, mostLikely 0.00309121, max 0.00309121, pedigree (2,5,3,5,2)
  Paint and antifouling paint
  Uncertainty: Data from 143 vessels
  properties: dry mass 1 kg, wet mass 1 kg, carbon content, non-fossil 0.199629, carbon content, fossil 0.140367
  note on carbon content, non-fossil: C content was calculated as an addition of C content in the raw materials.
- steel, low-alloyed: 0.104895 kg; name structure; triangular min 0.104895, mostLikely 0.104895, max 0.104895, pedigree (2,3,1,1,1)
  Steel hull + transmission construction, structural elements
  Uncertainty: Data from 143 vessels
  properties: dry mass 1 kg, carbon content, fossil 0.005, wet mass 1 kg
- steel, low-alloyed, hot rolled: 0.57692 kg; name hull; triangular min 0.57692, mostLikely 0.57692, max 0.57692, pedigree (2,3,1,1,1)
  Steel hull + auxiliary skiff construction, sheets
  Uncertainty: Data from 143 vessels
  properties: wet mass 1 kg, carbon content, fossil 0.005, dry mass 1 kg
  note on carbon content, fossil: Low alloyed steel composition given in Tab. 3.2 ecoinvent v2.2 report 10_partII. Steel assumed to have a C content of 0.5%
