# particle board production, for outdoor use

Dataset: EcoSpold 2, unit process
Geography: RER
Time period: 1986-01-01 to 2019-12-31
Technology level: current
Classification: ISIC rev.4 ecoinvent: 1621:Manufacture of veneer sheets and wood-based panels
Classification: EcoSpold01Categories: wooden materials/extraction
Scenario: Business-as-Usual
System model: Allocation at the point of substitution
Generated by: Hans-Jörg Althaus
Published in: Werner F. 2007
Database: ecoinvent
isCopyrightProtected: true
accessRestrictedTo: 1

## General comment
This dataset represents production of particle board, for outdoor use.

## Included activities end
Includes the inputs to the production processes, transports of those inputs and the process emissions as far as they are available.

## Geography
Data for Germany used for central Europe

## Technology
Average German Technology (1996)

## Parameters
- fraction, cooling water, to air: 0.2; name fraction_CW_to_air; lognormal variance with pedigree 0.092025, pedigree (4,4,3,2,4)
  Calculated value based on input/output ratio.

## Reference product
- particle board, for outdoor use: 0 m3; CPC 31431: Particle board; By-product classification allocatable product
  production volume 1.41099e7 m3
    Literature value; Faostat database (http://faostat.fao.org/site/626/DesktopDefault.aspx?PageID=626#ancor) accessed 20121029. Europe + (Total), Production Quantity, particle board, 2005 was 47081210m3/year. It is assumed that 30% of that production volume is particle board production, for outdoor use.It is assumed that 99.9% of the particle board is produced while using residual wood from industry, while 0.1% of the particle board is produced from virgin wood.
  property carbon content 0.522257
    carbon content on a dry matter basis (reserved; not for manual entry)
  property true value 217
    allocation property applied in "true value" allocation // value calculated from revenue
  properties: wet mass 680 kg, carbon content, non-fossil 0.446121, price 217 EUR2005, water in wet mass 40.2991 kg, water content 0.0629967, dry mass 639.701 kg, carbon content, fossil 0.0761352, carbon allocation 334.088 kg
- wood chips, dry, measured as dry mass: 1 kg; CPC 31230: Wood in chips or particles; By-product classification allocatable product
  production volume 8.26324e8 kg; = ABS( Ref('b41fb84f-cb60-46c2-9fb8-fc6a4c3623d8')/ Ref('36e29a9f-9725-41e3-8cb9-017e6454e9c7')* Ref('36e29a9f-9725-41e3-8cb9-017e6454e9c7', 'ProductionVolume'))
    Calculated from production volume of reference product using the relative outputs.
  property carbon content, non-fossil 0.494
    C content of dry mass is 0.494 kgC/kg dry wood (ecoinvent v2.2 report 9).
  property price 0.107 EUR2005
    Expert judgement (Urs Luginbühl, Swiss Sawmilling industry, personal communication in June 2014). Wood chips from softwood should have a price of 0.101 EUR/kg. Woodchips from hardwood should have a price of 0.112 EUR/kg. Average of these two values is used. Cross-reference; FAOSTAT database; http://faostat.fao.org/site/626/DesktopDefault.aspx?PageID=626#ancor; Average import/export prices of EU for 'chips and particles'. Price: 48.76 Euro/m3. The density of the wood chips is 650 kg/m3. The price is recalculated accordingly.
  property carbon content 0.494
    carbon content on a dry matter basis (reserved; not for manual entry)
  property true value 6.2663
    allocation property applied in "true value" allocation // value calculated from revenue
  properties: water in wet mass 0.4 kg, carbon content, fossil 0, dry mass 1 kg, wet mass 1.4 kg, water content 0.4, carbon allocation 0.494 kg

## By-products
- heat, for reuse in municipal waste incineration only: 0 MJ; CPC 17300: Steam and hot water; By-product classification allocatable product; pedigree (1,1,1,1,1)
  Net electricity generated from this waste and used in internal MSWI plant energy redistribution.
  Uncertainty: uncertainty is calculated from uncertainties in waste composition and uncertainties in energy efficiency and the uncertainty in internal energy demand
  production volume 28642.1 MJ
  property exergy 0.1842 MJ; name E_th_prod_MSWI_exergy
    This exergy property is based on the exergy content of the product.
  property price 0.0106 EUR2005; name E_th_prod_MSWI_price_EUR2005
    Average European district heat price from Ecoheatcool and Euroheat 2005-2006, Ecoheat Work package 1: The European heat market. Final report. 10.6 EUR/GJ i s the price of district heat. http://www.solarthermalworld.org/files/Ecoheatcool%20WP1%20Web.pdf?download
  property true value relation 0.1842; name E_th_prod_MSWI_true_value_relation
    property to calculate "true value" from
  property true value 1.33529e-5
    allocation property applied in "true value" allocation // value calculated from true value relation
- electricity, for reuse in municipal waste incineration only: 0 kWh; CPC 17100: Electrical energy; By-product classification allocatable product; pedigree (1,1,1,1,1)
  (same comment as for heat, for reuse in municipal waste incineration only)
  production volume 4033.59 kWh
  property true value relation 3.6; name E_el_prod_MSWI_true_value_relation
    property to calculate "true value" from
  property price 0.1 EUR2005; name E_el_prod_MSWI_price_EUR2005
    Estimated to be the same price as in case of electricity, medium voltage.
  property exergy 3.6 MJ; name E_el_prod_MSWI_exergy
    This exergy property is based on the exergy content of the product.
  property true value 3.67514e-5
    (same comment as for heat, for reuse in municipal waste incineration only)

## Inputs from technosphere
- heat, district or industrial, natural gas: 0.070114 MJ; lognormal variance with pedigree 0.0407, pedigree (1,3,5,3,1)
  EcoSpold01Location=RER
- residual wood, dry: 0.000498527 m3; = (0.02654232+0.808186+0.205499)
  Calculated value; sum of different types of residual wood.
  properties: water content 0.15, wet mass 632.5 kg, dry mass 550 kg, carbon content, non-fossil 0.494
- pulpwood, softwood, measured as solid wood under bark: 0 m3; pedigree (1,1,1,1,1)
  EcoSpold01Location=RER
  properties: carbon content, non-fossil 0.494, water content 1.4, dry mass 450 kg, wet mass 1080 kg
  note on carbon content, non-fossil: C content of dry mass is 0.494 kgC/kg dry wood (ecoinvent v2.2 report 9)
- paraffin: 0.00527173 kg; lognormal variance with pedigree 0.2627, pedigree (3,3,5,3,5)
  EcoSpold01Location=RER
  properties: wet mass 1 kg, carbon content, fossil 0.847059, dry mass 1 kg
  note on carbon content, fossil: An average composition of C12H26 (molecular weight of 170 g/mol) was assumed for n-parafins, after ecoinvent v2.2 report 8, part II, pg 398
- electricity, medium voltage: 0.0498418 kWh; lognormal variance with pedigree 0.0407, pedigree (1,3,5,3,1)
  EcoSpold01Location=UCTE
- wastewater from particle board production: -9.10572e-5 m3; name wastewater_output; lognormal variance with pedigree 0.0807, pedigree (1,3,5,3,1)
  EcoSpold01Location=CH
  production volume 2.68087e6 m3; = ABS( wastewater_output/ Ref('36e29a9f-9725-41e3-8cb9-017e6454e9c7')* Ref('36e29a9f-9725-41e3-8cb9-017e6454e9c7', 'ProductionVolume'))
    Calculated from production volume of reference product using the relative outputs.
  properties: water content 2962.17, carbon content, non-fossil 0.377131, wet mass 1000 kg, dry mass 0.337476 kg
  note on carbon content, non-fossil: BOD= 0.196 kg/m3 (Tab A.17, ecoinvent v2.2 report 13_I). BOD was converted to TOC, using conversion factors in Tab 4.10 (ecoinvent v2.2 report 13_IV). TOC was considered as Total Carbon.
- pulpwood, hardwood, measured as solid wood under bark: 0 m3; pedigree (1,1,1,1,1)
  EcoSpold01Location=RER
  properties: dry mass 650 kg, carbon content, non-fossil 0.494, water content 0.8, wet mass 1170 kg
- ammonia, liquid: 0.000306719 kg; lognormal variance with pedigree 0.2627, pedigree (3,3,5,3,5)
  EcoSpold01Location=RER
  properties: dry mass 1 kg, wet mass 1 kg
- phenolic resin: 0.0244417 kg; lognormal variance with pedigree 0.2627, pedigree (3,3,5,3,5)
  EcoSpold01Location=RER
  properties: dry mass 1 kg, carbon content, fossil 0.772277, wet mass 1 kg
  note on carbon content, fossil: (C6H5OH)-CH2-(C6H5OH) was considered to be the basic structure in phenolic resin (ecoinvent v2.2 report 8-part 61). C13H14O2, MW=202 g/mol
- wooden board factory, organic bonded boards: 1.5959e-11 unit; lognormal variance with pedigree 0.4461, pedigree (4,5,5,3,4)
  EcoSpold01Location=RER
  activityLink introduced to establish a direct link to the corresponding regional supply of this product
- hydrochloric acid, without water, in 30% solution state: 0.000651778 kg; lognormal variance with pedigree 0.2627, pedigree (3,3,5,3,5)
  EcoSpold01Location=RER
  properties: wet mass 1 kg, dry mass 1 kg
- heat, central or small-scale, other than natural gas: 0.510591 MJ; lognormal variance with pedigree 0.0407, pedigree (1,3,5,3,1)
  heat produced on site
- pulpwood, softwood, measured as solid wood under bark: 0.00010214, 8.98601e-7 m3 (2 entries); lognormal variance with pedigree 0.0407, pedigree (1,3,5,3,1)
  EcoSpold01Location=RER
- pulpwood, hardwood, measured as solid wood under bark: 5.96856e-5, 1.6582e-6 m3 (2 entries); lognormal variance with pedigree 0.0407, pedigree (1,3,5,3,1)
  EcoSpold01Location=RER

## Inputs from nature
- Water, cooling, unspecified natural origin [natural resource, in water]: 0.000116553 m3; name water_cooling_UNO_input; source Wilson, J.B. 2009; lognormal variance with pedigree 0.0513, pedigree (2,3,5,3,1)
  Calculated based on literature, (Vionnet, S., Quantis Water Database - Technical Report, 2012). It includes the processes: storage, screening, refine or hammermill, drying, blending, forming, hot pressing, panel cooling, sawing and sanding. It is assumed that the fraction (%) of process water which evaporates is an assumption based on medium density fibreboard and that 80% of water withdrawn is considered to be for cooling and 20% for process water.
  Calculated based on literature, (Vionnet, S., Quantis Water Database - Technical Report, 2012). It includes the processes: storage, screening, refine or hammermill, drying, blending, forming, hot pressing, panel cooling, sawing and sanding. It is assumed that the fraction (%) of process water which evaporates is an assumption based on medium density fibreboard and that 80% of water withdrawn is considered to be for cooling and 20% for process water.

## Emissions to nature
- Particulates, < 2.5 um [air, unspecified]: 1.86907e-6 kg; lognormal variance with pedigree 0.3707, pedigree (3,3,5,3,3)
- Particulates, > 2.5 um, and < 10um [air, unspecified]: 1.68216e-5 kg; lognormal variance with pedigree 0.1907, pedigree (3,3,5,3,3)
- Formaldehyde [air, unspecified]: 1.43774e-6 kg; lognormal variance with pedigree 0.1607, pedigree (1,3,5,3,1)
- NMVOC, non-methane volatile organic compounds, unspecified origin [air, unspecified]: 7.95552e-5 kg; lognormal variance with pedigree 0.1607, pedigree (1,3,5,3,1)
- Water [water, unspecified]: 2.18537e-6 m3; name water_to_water_unspecified; = water_cooling_UNO_input*(1-fraction_CW_to_air)-(wastewater_output*-1); lognormal variance with pedigree 0.130025, pedigree (4,4,5,2,4)
  Calculated value based on literature values and expert opinion. See comments in the parametres' comment field.
  property water in wet mass 1000 kg; name WWM
  property wet mass 1000 kg; name WM
  property dry mass 0 kg; name DM
  property fraction, origin: fresh water 0; name fraction_origin_fresh_water_Ww
  property carbon content, fossil 0; name C_content_fossil
  property fraction, origin: salt water 0; name fraction_origin_salt_water_Ww
  property fraction, origin: unspecified 1; name fraction_origin_unspecified_Ww
  property carbon content, non-fossil 0; name C_content_non_fossil
- Water [air, unspecified]: 2.33106e-5 m3; name water_to_air_unspecified; = water_cooling_UNO_input*fraction_CW_to_air; lognormal variance with pedigree 0.130025, pedigree (4,4,5,2,4)
  (same comment as for Water)
  property fraction, origin: unspecified 1; name fraction_origin_unspecified
  property fraction, origin: salt water 0; name fraction_origin_salt_water
  property fraction, origin: fresh water 0; name fraction_origin_fresh_water
- Particulates, > 10 um [air, unspecified]: 1.86907e-5 kg; lognormal variance with pedigree 0.1107, pedigree (3,3,5,3,3)

## Sampling procedure
Literature

## Extrapolations
see Geography and Technology

## Review by Roberto Dones 2007-11-13
passed
