# treatment of used trawler, steel

Dataset: EcoSpold 2, unit process
Geography: PE
Time period: 2010-01-01 to 2020-12-31
Technology level: current
Classification: ISIC rev.4 ecoinvent: 0311:Marine fishing
Scenario: Business-as-Usual
System model: Allocation at the point of substitution
Generated by: Angel Avadi
Published in: Avadí, A. 2018
Database: ecoinvent
isCopyrightProtected: true
accessRestrictedTo: 1

## General comment
This dataset represents the end of life of steel trawlers, per 1000 kg of light ship weight, based on data from Peru (2004-3013), corresponding to 9 vessels (from a fleet of 54) for which data was avilable with different levels of detail. Specific data for specific inventory items may be based on sub-samples for which detailed data was available. Vessel dimensions: 34 - 275 m3 (16 - 34 m length).
System boundaries and relation between activities

## Included activities start
Treatment of used vessel (recycling)

## Included activities end
End of life (decommissioning). Excludes engines and motors. Excludes energy for dismantling.

## Geography
Data from Peru

## Technology
Peru features various shipyards and relevant ship-building and ship-retrofitting expertise.

## Reference product
- used trawler, steel: 0 kg; name LSW; = -1*(iron+copper+nylon+paint+rubber); source Angel Avadí 2017; By-product classification Waste; CPC 94312: Ship-breaking and other dismantling of wrecks services
  EOL of a trawler, per 1000 kg of light ship weight (LSW), after 35 years lifetime. Regressions based on mainly primary data were created to relate the weight of each inventory item to a purse seiner's LSW, adjusted for trawler's gear. The list of inventory items (granularity) contribute >95% of environmental impacts, as described in the reference publication.
  production volume 0 kg; name prod_vol
    GDP for Peru as a proportion of the world
  property price 0 EUR2005; name LSW_price_EUR2005
    Waste products are assigned a price of zero as they are assumed to require further treatment.
  property water content 0; name LSW_water_content
  property wet mass 1 kg; name LSW_WM
  property water in wet mass 0 kg; name LSW_WWM
  property dry mass 1 kg; name LSW_DM
  property carbon content, fossil 0.0100447; name LSW_C_content_fossil; = 0.005*99.28%+0.63717*0.51%+0.87195*0.21%
    Calculated from the fossil carbon content of the hull and gear materials, multiplied by their relative proportions
  property carbon content, non-fossil 0.00121774; name LSW_C_content_non_fossil; = 0.19963*0.61%
    Calculated from the fossil carbon content of thepaint, multiplied by its relative proportion
  property carbon content 0.0112624
    carbon content on a dry matter basis (reserved; not for manual entry)
  properties: carbon allocation 0.0112624 kg
- iron scrap, unsorted: 1 kg; source Angel Avadí 2017; CPC 39310: Slag, dross, scalings and other waste from the manufacture of iron or steel; By-product classification Recyclable; pedigree (1,1,1,1,1)
  Recycled steel from hull and structural elements + Recycled steel from fishing gear
  Uncertainty: Based on assumptions
  production volume 0.00286599 kg

## By-products
- iron scrap, unsorted: 0 kg; name iron; source Angel Avadí 2017; CPC 39310: Slag, dross, scalings and other waste from the manufacture of iron or steel; By-product classification Recyclable; pedigree (1,1,1,1,1)
  (same comment as for iron scrap, unsorted)
  production volume 0 kg; = ABS(prod_vol*iron/LSW)
    Calculated from production volume of reference product using the relative outputs.
  property price 0.149 EUR2005; name iron_price_EUR2005
    Temporary price data. Calculated as 90% of purchasers price based on: estimated at 85% of sorted scrap
  property carbon content 0
    carbon content on a dry matter basis (reserved; not for manual entry)
  properties: carbon content, fossil 0, water content 0, dry mass 1 kg, water in wet mass 0 kg, carbon content, non-fossil 0, wet mass 1 kg, carbon allocation 0 kg
- copper: 0 kg; source Rentz O. 1999; By-product classification allocatable product; CPC 41413: Refined copper and copper alloys, unwrought; master alloys of copper
  Literature value. Copper uses: Before end-use copper is manufactured into semi fabricated products, such as shapes and ingots (known as 'semis'). These manufacturing processes are subdivided into hot working, cold working and, if necessary, process annealing. Few of the semis are ready for use as such. They more typically travel to first-stage manufacturers, who make metal rods, wire, and casting, and then to component manufacturers who produce such things as motors, valves, and insulated cables The components in turn are incorporated by final-stage manufacturers into a variety of finished products - automobiles, commercial buildings, residential housing, and so forth. These uses account for about 79% of the world-wide consumption of copper.
  property price 5.52 EUR2005
    Literature value (http://www.economist.com/news/business/21576714-mining-industry-has-enriched-chile-its-future-precarious-copper-solution). Average price between 20015 and 2013.
  property carbon content 0
    carbon content on a dry matter basis (reserved; not for manual entry)
  properties: dry mass 1 kg, water in wet mass 0 kg, wet mass 1 kg, carbon content, non-fossil 0, water content 0, carbon content, fossil 0, carbon allocation 0 kg
- electricity, for reuse in municipal waste incineration only: 0 kWh; CPC 17100: Electrical energy; By-product classification allocatable product; pedigree (1,1,1,1,1)
  Net electricity generated from this waste and used in internal MSWI plant energy redistribution.
  Uncertainty: uncertainty is calculated from uncertainties in waste composition and uncertainties in energy efficiency and the uncertainty in internal energy demand
  property exergy 3.6 MJ; name E_el_prod_MSWI_exergy
    This exergy property is based on the exergy content of the product.
  property true value relation 3.6; name E_el_prod_MSWI_true_value_relation
    property to calculate "true value" from
  property price 0.1 EUR2005; name E_el_prod_MSWI_price_EUR2005
    Estimated to be the same price as in case of electricity, medium voltage.
- heat, for reuse in municipal waste incineration only: 0 MJ; CPC 17300: Steam and hot water; By-product classification allocatable product; pedigree (1,1,1,1,1)
  Net useful heat generated from this waste and used in internal MSWI plant energy redistribution.
  Uncertainty: uncertainty is calculated from uncertainties in waste composition and uncertainties in energy efficiency and the uncertainty in internal energy demand
  property true value relation 0.1842; name E_th_prod_MSWI_true_value_relation
    property to calculate "true value" from
  property exergy 0.1842 MJ; name E_th_prod_MSWI_exergy
    This exergy property is based on the exergy content of the product.
  property price 0.0106 EUR2005; name E_th_prod_MSWI_price_EUR2005
    Average European district heat price from Ecoheatcool and Euroheat 2005-2006, Ecoheat Work package 1: The European heat market. Final report. 10.6 EUR/GJ i s the price of district heat. http://www.solarthermalworld.org/files/Ecoheatcool%20WP1%20Web.pdf?download
- zinc concentrate: 0 kg; CPC 14290: Other non-ferrous metal ores and concentrates (other than uranium or thorium ores and concentrates); By-product classification allocatable product
  Calculated value from the knowledge of the properties of both products.
  property price 0.38 EUR2005; name ByP_price_EUR2005
    Temporary price data. Calculated as 90% of purchasers price based on: Zinc content in concentrate 53%. Concentrate price per kg Zn 86.5% of refined Zn price (13.5% treatment charges according to CHR Metals Limited 2005: Dynamic cost curves. http://www.minecost.com/dynamic.pdf). 2004 zinc price from USGS (2007) Mineral commodity summaries 2007. <http://minerals.usgs.gov/minerals/pubs/mcs/2007/mcs2007.pdf> [Accessed 25 May 2010]
  property zinc content 0.53; name zinc_C_zinc_concentrate
    Zinc content on a dry matter basis. Value taken from teh "zinc mine operation" /GLO dataset.
  property dry mass 1 kg; name DM_zinc_concentrate
  property carbon content 0
    carbon content on a dry matter basis (reserved; not for manual entry)
  properties: wet mass 1 kg, water content 0, carbon content, non-fossil 0, carbon content, fossil 0, water in wet mass 0 kg, carbon allocation 0 kg

## Inputs from technosphere
All rows: source Angel Avadí 2017
- copper scrap, sorted, pressed: 0 kg; name copper; pedigree (1,1,1,1,1)
  Copper recycled from electric circuit
  Uncertainty: Based on assumptions
  production volume 0 kg; = ABS(prod_vol*copper/LSW)
    Calculated from production volume of reference product using the relative outputs.
  property price 2.84 EUR2005; name copper_price_EUR2005
  properties: wet mass 1 kg, dry mass 1 kg
- waste plastic, mixture: 0 kg; name nylon; pedigree (1,1,1,1,1)
  Nylon recycled from fishing gear
  Uncertainty: Based on assumptions
  production volume 0 kg; = ABS(prod_vol*nylon/LSW)
    Calculated from production volume of reference product using the relative outputs.
  property price 0 EUR2005; name nylon_price_EUR2005
  properties: carbon content, fossil 0.637168, wet mass 1 kg, dry mass 0.847 kg, water content 0.180638
- waste paint on metal: 0 kg; name paint; pedigree (1,1,1,1,1)
  Waste paint scrapped from hull
  Uncertainty: Based on assumptions
  production volume 0 kg; = ABS(prod_vol*paint/LSW)
    Calculated from production volume of reference product using the relative outputs.
  property price 0 EUR2005; name paint_price_EUR2005
  properties: carbon content, fossil 0.65, dry mass 1 kg, wet mass 1 kg
- waste rubber, unspecified: 0 kg; name rubber; pedigree (1,1,1,1,1)
  Rubber from fishing gear
  Uncertainty: Based on assumptions
  production volume 0 kg; = ABS(prod_vol*rubber/LSW)
    Calculated from production volume of reference product using the relative outputs.
  property price 0 EUR2005; name rubber_price_EUR2005
  properties: dry mass 1 kg, wet mass 1 kg, carbon content, fossil 0.853
- nylon 6-6: 0.000517933 kg; triangular min 0.000517933, mostLikely 0.000517933, max 0.000517933, pedigree (2,3,1,1,1)
  Fishing gear construction
  Uncertainty: Data from 9 vessels
- alkyd paint, white, without solvent, in 60% solution state: 0.000623155, 0.000623155 kg (2 suppliers, which the file names only by identifier); sum of these 0.00124631 kg; triangular min 0.000623155, mostLikely 0.000623155, max 0.000623155, pedigree (2,5,3,3,2)
  Paint and antifouling
  Uncertainty: Data from 9 vessels
- steel, low-alloyed, hot rolled: 0.184903 kg; triangular min 0.184903, mostLikely 0.184903, max 0.184903, pedigree (2,3,1,1,1)
  Steel hull, sheets
  Uncertainty: Data from 9 vessels
- synthetic rubber: 0.000435187 kg; triangular min 0.000435187, mostLikely 0.000435187, max 0.000435187, pedigree (2,3,1,1,1)
  Fishing gear construction
  Uncertainty: Data from 9 vessels
- wire drawing, copper: 0.00194302 kg; triangular min 0.00194302, mostLikely 0.00194302, max 0.00194302, pedigree (2,3,2,3,2)
  Manufacture of copper wire
  Uncertainty: Based on 8 different estimations based on reports, shipyard work orders, invoices, etc.
- metal working, average for steel product manufacturing: 0.00176118 kg
  Steel hull + transmission construction, structural elements
- steel, low-alloyed: 0.0053816 kg; triangular min 0.0053816, mostLikely 0.0053816, max 0.0053816, pedigree (2,3,1,1,1)
  Fishing gear construction
  Uncertainty: Data from 9 vessels
- reinforcing steel: 0.00176118 kg; triangular min 0.00176118, mostLikely 0.00176118, max 0.00176118, pedigree (5,5,5,5,5)
  Steel hull + transmission construction, structural elements
  Uncertainty: Data from 9 vessels
- used trawler, steel: -0.204503 kg
  EOL of a steel trawler, per 1000 kg of light ship weight (LSW), at the end of its lifetime. Regressions based on mainly primary data were created to relate the weight of each inventory item to a purse seiner's LSW, adjusted for trawler's gear. The list of inventory items (granularity) contribute >95% of environmental impacts, as described in the reference publication. Includes engines and motors
  production volume 0.002923 kg
- copper: 0.00194302 kg
  Copper for electric circuit construction, 50% recycled
- marine electric motor: 1.25857e-6 unit; triangular min 1.25857e-6, mostLikely 1.25857e-6, max 1.25857e-6, pedigree (2,5,3,3,2)
  Electric motors and pumps
  Uncertainty: Data from 9 vessels
- marine engine: 6.53801e-6 unit; triangular min 6.53801e-6, mostLikely 6.53801e-6, max 6.53801e-6, pedigree (2,5,3,3,2)
  Marine diesel engine
  Uncertainty: Data from 9 vessels
- nylon 6-6: 0.000517933 kg; triangular min 0.000517933, mostLikely 0.000517933, max 0.000517933, pedigree (2,3,1,5,1)
  Fishing gear construction
  Uncertainty: Data from 9 vessels
