# treatment of hard coal ash, sanitary landfill

Dataset: EcoSpold 2, unit process
Geography: RoW
Time period: 1994-01-01 to 2019-12-31
Technology level: current
Classification: ISIC rev.4 ecoinvent: 3821:Treatment and disposal of non-hazardous waste
Classification: EcoSpold01Categories: waste management/sanitary landfill
Tags: ConvertedDataset; Treatment
Scenario: Business-as-Usual
System model: Allocation at the point of substitution
Generated by: Gabor Doka (obsolete)
Published in: Doka G. 2007
Database: ecoinvent
isCopyrightProtected: true
accessRestrictedTo: 1

## General comment
Inventoried waste contains 100% hard coal ash small scale; .
waste composition (wet, in ppm): upper heating value 0.4712 MJ/kg; H2O n.a.; O 298030; H n.a.; C 100000; S n.a.; N n.a.; P 980; B 350; Cl n.a.; Br 97; F n.a.; I 16.4; Ag n.a.; As 92; Ba 1960; Cd 4.5; Co 49; Cr 192; Cu 146.25; Hg 0.1; Mn 693; Mo 28.5; Ni 194; Pb 376; Sb 9.5; Se 7; Sn 19.8; V 388; Zn 475; Be 19.6; Sc 39.6; Sr 1940; Ti 5880; Tl 9.5; W n.a.; Si 245000; Fe 68600; Ca 19600; Al 166600; K 19600; Mg 58800; Na 9800;
Share of carbon in waste that is biogenic 0%.
Overall degradability of waste during 100 years: 5%.
[This dataset was already contained in the ecoinvent database version 2. It was not individually updated during the transfer to ecoinvent version 3. Life Cycle Impact Assessment results may still have changed, as they are affected by changes in the supply chain, i.e. in other datasets. This dataset was generated following the ecoinvent quality guidelines for version 2. It may have been subject to central changes described in the ecoinvent version 3 change report (http://www.ecoinvent.org/database/ecoinvent-version-3/reports-of-changes/), and the results of the central updates were reviewed extensively. The changes added e.g. consistent water flows and other information throughout the database. The documentation of this dataset can be found in the ecoinvent reports of version 2, which are still available via the ecoinvent website. The change report linked above covers all central changes that were made during the conversion process.]

## Included activities end
Waste-specific short-term emissions to air via landfill gas incineration and landfill leachate. Burdens from treatment of short-term leachate (0-100a) in wastewater treatment plant (including WWTP sludge disposal in municipal incinerator). Long-term emissions from landfill to groundwater (after base lining failure).

## Geography
Technology encountered in Switzerland in 2000. Landfill includes base seal, leachate collection system, treatment of leachate in municipal wastewater treatment plant.

## Technology
Swiss municipal sanitary landfill for biogenic or untreated municipal waste ('reactive organic landfill'). Landfill gas and leachate collection system. Recultivation and monitoring for 150 years after closure.

## Reference product
- hard coal ash: -1 kg; CPC 39: Wastes or scraps; By-product classification Waste
  EcoSpold01Location=CH
  production volume 8.22803e9 kg
    Based on municipal incinerated PV (hard coal ash incineration PV was calculated as: based on coal usage in residences and small commerce (Exxon 2012), generic split into hard coal and lignite based on demand 2010 (WCA 2012), generic hard coal ash content, and a generic global rate of 21.7w% of MSW going to incineration (Pike + UNSD 2012)). The values for "treatment of hard coal ash, sanitary landfill" is adjusted for the generic global rate of 67w% MSW sent to landfill (UNSD 2011)(http://unstats.un.org/unsd/environment/wastetreatment.htm, accessed 20151008)
  property price 0 EUR2005
    Waste products are assigned a price of zero as they are assumed to require further treatment.
  property carbon content 0.1
    carbon content on a dry matter basis (reserved; not for manual entry)
  properties: dry mass 1 kg, carbon content, non-fossil 0, carbon content, fossil 0.1, wet mass 1 kg, water content 0, water in wet mass 0 kg, carbon allocation 0.1 kg

## By-products
- heat, for reuse in municipal waste incineration only: 0 MJ; CPC 17300: Steam and hot water; By-product classification allocatable product; pedigree (1,1,1,1,1)
  Net electricity generated from this waste and used in internal MSWI plant energy redistribution.
  Uncertainty: uncertainty is calculated from uncertainties in waste composition and uncertainties in energy efficiency and the uncertainty in internal energy demand
  property exergy 0.1842 MJ; name E_th_prod_MSWI_exergy
    This exergy property is based on the exergy content of the product.
  property price 0.0106 EUR2005; name E_th_prod_MSWI_price_EUR2005
    Average European district heat price from Ecoheatcool and Euroheat 2005-2006, Ecoheat Work package 1: The European heat market. Final report. 10.6 EUR/GJ i s the price of district heat. http://www.solarthermalworld.org/files/Ecoheatcool%20WP1%20Web.pdf?download
  property true value relation 0.1842; name E_th_prod_MSWI_true_value_relation
    property to calculate "true value" from
- electricity, for reuse in municipal waste incineration only: 0 kWh; CPC 17100: Electrical energy; By-product classification allocatable product; pedigree (1,1,1,1,1)
  (same comment as for heat, for reuse in municipal waste incineration only)
  property true value relation 3.6; name E_el_prod_MSWI_true_value_relation
    property to calculate "true value" from
  property price 0.1 EUR2005; name E_el_prod_MSWI_price_EUR2005
    Estimated to be the same price as in case of electricity, medium voltage.
  property exergy 3.6 MJ; name E_el_prod_MSWI_exergy
    This exergy property is based on the exergy content of the product.

## Inputs from technosphere
- aluminium sulfate, powder: 3.51e-6 kg; lognormal variance with pedigree 1.35, pedigree (5,5,5,5,5)
  EcoSpold01Location=RER
  burden from wastewater treatment of the short-term leachate (0-100a). Uncertainty calculated from unertainty of the waste composition of this waste, uncertainty in waste decomposition and short-term leaching in sanitary landfill
  Uncertainty: . Uncertainty calculated from unertainty of the waste composition of this waste, uncertainty in waste decomposition and short-term leaching in sanitary landfill
  properties: wet mass 1 kg, dry mass 1 kg
- waste graphical paper: 0 kg; pedigree (1,1,1,1,1)
  EcoSpold01Location=CH
  burden from wastewater treatment of the short-term leachate (0-100a). Uncertainty calculated from unertainty of the waste composition of this waste, uncertainty in waste decomposition and short-term leaching in sanitary landfill
  Uncertainty: . Uncertainty calculated from unertainty of the waste composition of this waste, uncertainty in waste decomposition and short-term leaching in sanitary landfill
  production volume 0 kg
    Calculated from the production volume of hard coal ash, 0% water in proportion to the respective output amounts.
  properties: water content 0.126126, wet mass 1 kg, carbon content, non-fossil 0.454955, dry mass 0.888 kg
- process-specific burdens, municipal waste incineration: 0 kg; pedigree (1,1,1,1,1)
  Burden from incineration of sludge from wastewater treatment of the short-term leachate (0-100a).
  EcoSpold01Location=CH
- process-specific burdens, slag landfill: 0 kg; pedigree (1,1,1,1,1)
  burden from incineration of sludge from wastewater treatment of the short-term leachate (0-100a). uncertainty is calculated from uncertainties in waste composition and transfer coefficients in incinerator and uncertainty of waste decomposition and short-term leaching in sanitary landfill
  EcoSpold01Location=CH
- electricity, low voltage: 0 kWh; pedigree (1,1,1,1,1)
  (same comment as for waste graphical paper)
- iron sulfate: 1.3e-5 kg; lognormal variance with pedigree 1.35, pedigree (5,5,5,5,5)
  burden from wastewater treatment of the short-term leachate (0-100a). Uncertainty calculated from unertainty of the waste composition of this waste, uncertainty in waste decomposition and short-term leaching in sanitary landfill
  EcoSpold01Location=RER
  Uncertainty: . Uncertainty calculated from unertainty of the waste composition of this waste, uncertainty in waste decomposition and short-term leaching in sanitary landfill
  properties: wet mass 1 kg, dry mass 1 kg
- quicklime, milled, packed: 7.9e-10 kg; lognormal variance with pedigree 1.272, pedigree (1,1,5,5,1)
  (same comment as for process-specific burdens, slag landfill)
  properties: dry mass 0.99 kg, wet mass 1 kg, water content 0.010101
- residual material landfill: 6.66e-13 unit; lognormal variance with pedigree 0.262, pedigree (1,1,5,5,1)
  EcoSpold01Location=CH
  burden from incineration of sludge from wastewater treatment of the short-term leachate (0-100a). uncertainty is calculated from uncertainties in waste composition and transfer coefficients in incinerator and uncertainty of waste decomposition and short-term leaching in sanitary landfill
- sewer grid, 5E9l/year, 110 km: 5.45e-10 km; lognormal variance with pedigree 0.2106, pedigree (5,5,5,5,5)
  burden from wastewater treatment of the short-term leachate (0-100a). Uncertainty calculated from unertainty of the waste composition of this waste, uncertainty in waste decomposition and short-term leaching in sanitary landfill
  EcoSpold01Location=CH
  Uncertainty: . Uncertainty calculated from unertainty of the waste composition of this waste, uncertainty in waste decomposition and short-term leaching in sanitary landfill
- heat, district or industrial, natural gas: 0 MJ; pedigree (1,1,1,1,1)
  (same comment as for iron sulfate)
- sanitary landfill facility: 5.56e-10 unit; lognormal variance with pedigree 0.042, pedigree (1,1,5,5,1)
  demands per kilogram waste. uncertainty is heeded in the module
  EcoSpold01Location=CH
- wastewater treatment facility, capacity 5E9l/year: 1.42e-11 unit; lognormal variance with pedigree 0.2106, pedigree (5,5,5,5,5)
  (same comment as for waste graphical paper)
- process-specific burdens, sanitary landfill: 1 kg; lognormal variance with pedigree 0.042, pedigree (1,1,5,5,1)
  EcoSpold01Location=CH
  demands per kilogram waste. uncertainty is heeded in the module
- slag landfill: 4.07e-12 unit; lognormal variance with pedigree 0.292, pedigree (1,1,5,5,1)
  (same comment as for process-specific burdens, slag landfill)
- cement, unspecified: 0 kg; pedigree (1,1,1,1,1)
  (same comment as for residual material landfill)
  properties: dry mass 1 kg, wet mass 1 kg
- chemical, inorganic: 6.29e-8 kg; lognormal variance with pedigree 0.852, pedigree (1,1,5,5,1)
  burden from incineration of sludge from wastewater treatment of the short-term leachate (0-100a). uncertainty is calculated from uncertainties in waste composition and transfer coefficients in incinerator and uncertainty of waste decomposition and short-term leaching in sanitary landfill
  EcoSpold01Location=GLO
  properties: carbon content, fossil 0.003, dry mass 1 kg, wet mass 1 kg
  note on carbon content, fossil: Tab A.9, ecoinvent report 13_I: 0.1 kg C/kg hard coal ash This dataset is an unweighted average of 20 inorganic substances (listed in Tab 88.1, ecoinvent v2.2 report 8, part II), being part of the top100 chemicals included in this database. The C-content has also been calculated as an unweighted average of the C content of the substances composing this dataset.
- waste cement, hydrated: 0 kg; pedigree (1,1,1,1,1)
  (same comment as for residual material landfill)
  production volume 0 kg
    (same comment as for waste graphical paper)
  properties: wet mass 1 kg, dry mass 1 kg
- sodium hydroxide, without water, in 50% solution state: 4.36e-9 kg; lognormal variance with pedigree 1.272, pedigree (1,1,5,5,1)
  burden from incineration of sludge from wastewater treatment of the short-term leachate (0-100a). uncertainty is calculated from uncertainties in waste composition and transfer coefficients in incinerator and uncertainty of waste decomposition and short-term leaching in sanitary landfill
  EcoSpold01Location=RER
  properties: wet mass 1 kg, dry mass 1 kg
- process-specific burdens, residual material landfill: 0 kg; pedigree (1,1,1,1,1)
  (same comment as for residual material landfill)
- iron (III) chloride, without water, in 40% solution state: 1.8e-5 kg; lognormal variance with pedigree 1.222, pedigree (1,1,5,5,1)
  (same comment as for process-specific burdens, slag landfill)
  properties: dry mass 1 kg, wet mass 1 kg
- electricity, high voltage: 0 kWh; pedigree (1,1,1,1,1)
  (same comment as for residual material landfill)
- municipal waste incineration facility: 1.01e-12 unit; lognormal variance with pedigree 0.232, pedigree (1,1,5,5,1)
  EcoSpold01Location=CH
  Burden from incineration of sludge from wastewater treatment of the short-term leachate (0-100a).
- chemical, organic: 6.13e-8 kg; lognormal variance with pedigree 1.792, pedigree (1,1,5,5,1)
  EcoSpold01Location=GLO
  burden from incineration of sludge from wastewater treatment of the short-term leachate (0-100a). uncertainty is calculated from uncertainties in waste composition and transfer coefficients in incinerator and uncertainty of waste decomposition and short-term leaching in sanitary landfill
  properties: carbon content, fossil 0.628, dry mass 1 kg, wet mass 1 kg
  note on carbon content, fossil: Tab A.9, ecoinvent report 13_I: 0.1 kg C/kg hard coal ash This dataset is an unweighted average of 20 organic substances (listed in Tab 88.1, ecoinvent v2.2 report 8, part II), being part of the top100 chemicals included in this database. The C-content has also been calculated as an unweighted average of the C content of the substances composing this dataset.
- waste plastic, mixture: 0 kg; pedigree (1,1,1,1,1)
  (same comment as for waste graphical paper)
  production volume 0 kg
    (same comment as for waste graphical paper)
  properties: dry mass 0.847 kg, wet mass 1 kg, water content 0.180638, carbon content, fossil 0.747344
  note on carbon content, fossil: Tab A.9, ecoinvent report 13_I: 0.1 kg C/kg hard coal ash C content in 1 kg DM was calculated using data in Tab A.2, ecoinvent v2.2 report 13_I
- heat, district or industrial, other than natural gas: 0 MJ; pedigree (1,1,1,1,1)
  (same comment as for process-specific burdens, slag landfill)
- hydrochloric acid, without water, in 30% solution state: 3.78e-8 kg; lognormal variance with pedigree 0.852, pedigree (1,1,5,5,1)
  EcoSpold01Location=RER
  burden from incineration of sludge from wastewater treatment of the short-term leachate (0-100a). uncertainty is calculated from uncertainties in waste composition and transfer coefficients in incinerator and uncertainty of waste decomposition and short-term leaching in sanitary landfill
  properties: wet mass 1 kg, dry mass 1 kg
- heat, central or small-scale, other than natural gas: 0 MJ; pedigree (1,1,1,1,1)
  (same comment as for sewer grid, 5E9l/year, 110 km)
- waste graphical paper: -1.69726e-6, -2.59179e-7, -2.26629e-8, -9.36524e-7, -9.13189e-8, -1.69041e-7, -4.09465e-6, -3.15294e-5 kg (8 entries); lognormal variance with pedigree 0.2106, pedigree (5,5,5,5,5)
  (same comment as for waste graphical paper)
  production volume 319248 kg
- process-specific burdens, municipal waste incineration: 0.00113716, 0.00288284 kg (2 entries); lognormal variance with pedigree 0.232, pedigree (1,1,5,5,1)
  (same comment as for process-specific burdens, municipal waste incineration)
- process-specific burdens, slag landfill: 0.000647782, 0.00164222 kg (2 entries); lognormal variance with pedigree 0.292, pedigree (1,1,5,5,1)
  (same comment as for process-specific burdens, slag landfill)
- electricity, low voltage: 8.32427e-6, 1.45997e-6, 3.31122e-5, 0.000118716, 2.40078e-5, 0.000363068, 5.98452e-5, 0.000170467 kWh (8 entries); lognormal variance with pedigree 0.34, pedigree (5,5,5,5,5)
  (same comment as for waste graphical paper)
- heat, district or industrial, natural gas: 2.2948e-5, 0.000522886, 0.00129737 MJ (3 entries); lognormal variance with pedigree 0.38, pedigree (5,5,5,5,5)
  (same comment as for iron sulfate)
- cement, unspecified: 3.84569e-6, 2.8167e-7, 8.02853e-7, 1.84827e-5, 1.81568e-5, 5.34407e-7, 5.86937e-6, 7.10129e-7, 7.93164e-5 kg (9 entries); lognormal variance with pedigree 0.262, pedigree (1,1,5,5,1)
  (same comment as for residual material landfill)
- waste cement, hydrated: -9.05198e-5, -0.00022948 kg (2 entries); lognormal variance with pedigree 0.262, pedigree (1,1,5,5,1)
  (same comment as for residual material landfill)
  production volume 2.63297e6 kg
- process-specific burdens, residual material landfill: 9.05198e-5, 0.00022948 kg (2 entries); lognormal variance with pedigree 0.262, pedigree (1,1,5,5,1)
  (same comment as for residual material landfill)
- electricity, high voltage: 7.09978e-6, 1.2929e-6, 2.99473e-5, 2.2084e-5, 0.000317933, 5.12066e-5, 0.000148436 kWh (7 entries); lognormal variance with pedigree 0.432, pedigree (1,1,5,5,1)
  (same comment as for residual material landfill)
- waste plastic, mixture: -4.31618e-6, -2.88391e-7, -2.18105e-8, -1.19116e-7, -4.81214e-8, -1.13112e-7, -3.67759e-6, -3.02157e-5 kg (8 entries); lognormal variance with pedigree 0.2106, pedigree (5,5,5,5,5)
  (same comment as for waste graphical paper)
  production volume 319248 kg
- heat, district or industrial, other than natural gas: 1.51011e-6, 0.00336849 MJ (2 entries); lognormal variance with pedigree 0.232, pedigree (1,1,5,5,1)
  (same comment as for process-specific burdens, slag landfill)
- heat, central or small-scale, other than natural gas: 1.88109e-5, 0.00131599 MJ (2 entries); lognormal variance with pedigree 0.38, pedigree (5,5,5,5,5)
  (same comment as for sewer grid, 5E9l/year, 110 km)

## Emissions to nature
- Selenium [air, non-urban air or from high stacks]: 9.23e-12 kg; lognormal variance with pedigree 2.882, pedigree (1,1,5,5,1)
  burden from direct release or incineration of landfill biogas. Uncertainty calculated from unertainty of the waste composition of this waste, uncertainty in waste decomposition and short-term leaching in sanitary landfill
- Lead [air, urban air close to ground]: 3.66e-12 kg; lognormal variance with pedigree 1.702, pedigree (1,1,5,5,1)
  Emissions from short-term leachate treatment and incineration of resulting sludge. Uncertainty calculated depending on waste input and uncertainty of transfer coefficents in landfill, wastewater treatment and incineration model.
- Iodide [water, surface water]: 2.06e-6 kg; lognormal variance with pedigree 1.342, pedigree (1,1,5,5,1)
  Emissions from short-term leachate treatment. Uncertainty calculated depending on waste input and uncertainty of transfer coefficents in landfill and wastewater treatment.
- Beryllium [water, surface water]: 2.89e-8 kg; lognormal variance with pedigree 1.732, pedigree (1,1,5,5,1)
  (same comment as for Lead)
- Arsenic [air, urban air close to ground]: 2.33e-10 kg; lognormal variance with pedigree 1.432, pedigree (1,1,5,5,1)
  (same comment as for Lead)
- Cadmium, ion [water, surface water]: 2.01e-8 kg; lognormal variance with pedigree 1.792, pedigree (1,1,5,5,1)
  (same comment as for Lead)
- Methane, fossil [air, non-urban air or from high stacks]: 0.00192 kg; lognormal variance with pedigree 0.392, pedigree (1,1,5,5,1)
  (same comment as for Selenium)
- Silicon [water, ground-, long-term]: 0.00473 kg; lognormal variance with pedigree 3.972, pedigree (1,1,5,5,1)
  Emissions from long-term leachate (>100a) directly from MSW landfill and indirectly via incineration of treatement sludge from leachate treatement. Uncertainty calculated depending on waste input and uncertainty of long-term transfer coefficents in landfill.
- Methane, fossil [air, urban air close to ground]: 8.44e-7 kg; lognormal variance with pedigree 0.792, pedigree (1,1,5,5,1)
  (same comment as for Lead)
- Molybdenum [air, non-urban air or from high stacks]: 3.76e-11 kg; lognormal variance with pedigree 2.692, pedigree (1,1,5,5,1)
  (same comment as for Selenium)
- Titanium [air, non-urban air or from high stacks]: 3.67e-9 kg; lognormal variance with pedigree 2.102, pedigree (1,1,5,5,1)
  (same comment as for Selenium)
- Selenium [water, ground-, long-term]: 1.98e-6 kg; lognormal variance with pedigree 1.742, pedigree (1,1,5,5,1)
  (same comment as for Silicon)
- Iodine [air, non-urban air or from high stacks]: 2.89e-8 kg; lognormal variance with pedigree 1.822, pedigree (1,1,5,5,1)
  (same comment as for Selenium)
- Cadmium [air, non-urban air or from high stacks]: 2.64e-10 kg; lognormal variance with pedigree 2.442, pedigree (1,1,5,5,1)
  (same comment as for Selenium)
- Aluminium [water, surface water]: 2.5e-5 kg; lognormal variance with pedigree 0.662, pedigree (1,1,5,5,1)
  (same comment as for Lead)
- Vanadium, ion [water, ground-, long-term]: 0.000113 kg; lognormal variance with pedigree 1.202, pedigree (1,1,5,5,1)
  (same comment as for Silicon)
- Copper [air, non-urban air or from high stacks]: 1.02e-11 kg; lognormal variance with pedigree 2.852, pedigree (1,1,5,5,1)
  (same comment as for Selenium)
- Barium [air, non-urban air or from high stacks]: 2.81e-8 kg; lognormal variance with pedigree 1.822, pedigree (1,1,5,5,1)
  (same comment as for Selenium)
- Scandium [air, urban air close to ground]: 4.39e-11 kg; lognormal variance with pedigree 1.632, pedigree (1,1,5,5,1)
  (same comment as for Lead)
- Cadmium [air, urban air close to ground]: 1.08e-12 kg; lognormal variance with pedigree 1.852, pedigree (1,1,5,5,1)
  (same comment as for Lead)
- Nickel, ion [water, ground-, long-term]: 0.000194 kg; lognormal variance with pedigree 0.912, pedigree (1,1,5,5,1)
  (same comment as for Silicon)
- Titanium, ion [water, ground-, long-term]: 0.00587 kg; lognormal variance with pedigree 0.472, pedigree (1,1,5,5,1)
  (same comment as for Silicon)
- Chloride [water, surface water]: 1.16e-5 kg; lognormal variance with pedigree 1.242, pedigree (1,1,5,5,1)
  (same comment as for Iodide)
- DOC, Dissolved Organic Carbon [water, surface water]: 2.23e-5 kg; lognormal variance with pedigree 0.772, pedigree (1,1,5,5,1)
  (same comment as for Lead)
- Molybdenum [air, urban air close to ground]: 1.48e-10 kg; lognormal variance with pedigree 1.642, pedigree (1,1,5,5,1)
  (same comment as for Lead)
- Scandium [water, surface water]: 9.58e-8 kg; lognormal variance with pedigree 1.592, pedigree (1,1,5,5,1)
  (same comment as for Lead)
- TOC, Total Organic Carbon [water, ground-, long-term]: 0.0244 kg; lognormal variance with pedigree 0.652, pedigree (1,1,5,5,1)
  (same comment as for Silicon)
- Nickel [air, non-urban air or from high stacks]: 1.41e-10 kg; lognormal variance with pedigree 2.522, pedigree (1,1,5,5,1)
  (same comment as for Selenium)
- Mercury [water, ground-, long-term]: 9.95e-8 kg; lognormal variance with pedigree 1.902, pedigree (1,1,5,5,1)
  (same comment as for Silicon)
- BOD5, Biological Oxygen Demand [water, surface water]: 2.89e-5 kg; lognormal variance with pedigree 0.772, pedigree (1,1,5,5,1)
  (same comment as for Lead)
- Iodide [water, ground-, long-term]: 1.43e-5 kg; lognormal variance with pedigree 1.242, pedigree (1,1,5,5,1)
  (same comment as for Silicon)
- Iron [air, non-urban air or from high stacks]: 1.18e-8 kg; lognormal variance with pedigree 1.982, pedigree (1,1,5,5,1)
  (same comment as for Selenium)
- Strontium [water, surface water]: 2.86e-6 kg; lognormal variance with pedigree 1.132, pedigree (1,1,5,5,1)
  (same comment as for Lead)
- Sodium [air, non-urban air or from high stacks]: 5.07e-7 kg; lognormal variance with pedigree 1.462, pedigree (1,1,5,5,1)
  (same comment as for Selenium)
- Copper, ion [water, surface water]: 9.29e-9 kg; lognormal variance with pedigree 1.792, pedigree (1,1,5,5,1)
  (same comment as for Lead)
- Sodium, ion [water, surface water]: 0.00203 kg; lognormal variance with pedigree 0.472, pedigree (1,1,5,5,1)
  (same comment as for Iodide)
- Sulfate [water, surface water]: 1.12e-5 kg; lognormal variance with pedigree 1.242, pedigree (1,1,5,5,1)
  (same comment as for Iodide)
- Cobalt [air, non-urban air or from high stacks]: 1.97e-10 kg; lognormal variance with pedigree 2.482, pedigree (1,1,5,5,1)
  (same comment as for Selenium)
- Lead [air, non-urban air or from high stacks]: 3.69e-11 kg; lognormal variance with pedigree 2.682, pedigree (1,1,5,5,1)
  (same comment as for Selenium)
- Copper, ion [water, ground-, long-term]: 0.000146 kg; lognormal variance with pedigree 0.952, pedigree (1,1,5,5,1)
  (same comment as for Silicon)
- Scandium [water, ground-, long-term]: 3.95e-5 kg; lognormal variance with pedigree 1.122, pedigree (1,1,5,5,1)
  (same comment as for Silicon)
- Bromine [air, non-urban air or from high stacks]: 1.71e-7 kg; lognormal variance with pedigree 1.582, pedigree (1,1,5,5,1)
  (same comment as for Selenium)
- NMVOC, non-methane volatile organic compounds, unspecified origin [air, urban air close to ground]: 3.72e-9 kg; lognormal variance with pedigree 0.942, pedigree (1,1,5,5,1)
  (same comment as for Lead)
- Phosphate [water, surface water]: 2.96e-6 kg; lognormal variance with pedigree 1.222, pedigree (1,1,5,5,1)
  (same comment as for Lead)
- Zinc [air, non-urban air or from high stacks]: 2.5e-10 kg; lognormal variance with pedigree 2.442, pedigree (1,1,5,5,1)
  (same comment as for Selenium)
- Aluminium [air, urban air close to ground]: 6.12e-7 kg; lognormal variance with pedigree 0.692, pedigree (1,1,5,5,1)
  (same comment as for Lead)
- Molybdenum [water, ground-, long-term]: 1.13e-5 kg; lognormal variance with pedigree 1.382, pedigree (1,1,5,5,1)
  (same comment as for Silicon)
- Carbon dioxide, fossil [air, non-urban air or from high stacks]: 0.0125 kg; lognormal variance with pedigree 0.352, pedigree (1,1,5,5,1)
  (same comment as for Selenium)
- Cadmium, ion [water, ground-, long-term]: 4.46e-6 kg; lognormal variance with pedigree 1.412, pedigree (1,1,5,5,1)
  (same comment as for Silicon)
- Beryllium [air, urban air close to ground]: 2.81e-11 kg; lognormal variance with pedigree 1.772, pedigree (1,1,5,5,1)
  (same comment as for Lead)
- Particulates, < 2.5 um [air, non-urban air or from high stacks]: 2.38e-7 kg; lognormal variance with pedigree 0.662, pedigree (1,1,5,5,1)
  (same comment as for Selenium)
- Calcium [air, non-urban air or from high stacks]: 3.19e-8 kg; lognormal variance with pedigree 1.832, pedigree (1,1,5,5,1)
  (same comment as for Selenium)
- Tin, ion [water, ground-, long-term]: 1.98e-5 kg; lognormal variance with pedigree 1.222, pedigree (1,1,5,5,1)
  (same comment as for Silicon)
- Mercury [air, non-urban air or from high stacks]: 1.37e-10 kg; lognormal variance with pedigree 2.522, pedigree (1,1,5,5,1)
  (same comment as for Selenium)
- Cobalt [water, ground-, long-term]: 4.86e-5 kg; lognormal variance with pedigree 1.092, pedigree (1,1,5,5,1)
  (same comment as for Silicon)
- Thallium [air, non-urban air or from high stacks]: 6.9e-12 kg; lognormal variance with pedigree 2.912, pedigree (1,1,5,5,1)
  (same comment as for Selenium)
- NMVOC, non-methane volatile organic compounds, unspecified origin [air, non-urban air or from high stacks]: 1.34e-8 kg; lognormal variance with pedigree 0.392, pedigree (1,1,5,5,1)
  (same comment as for Selenium)
- Barium [water, surface water]: 6.75e-6 kg; lognormal variance with pedigree 0.812, pedigree (1,1,5,5,1)
  (same comment as for Lead)
- Carbon dioxide, fossil [air, urban air close to ground]: 0.000418 kg; lognormal variance with pedigree 0.772, pedigree (1,1,5,5,1)
  (same comment as for Lead)
- Chromium, ion [water, surface water]: 1.72e-10 kg; lognormal variance with pedigree 1.672, pedigree (1,1,5,5,1)
  (same comment as for Lead)
- Beryllium [air, non-urban air or from high stacks]: 1.42e-11 kg; lognormal variance with pedigree 2.822, pedigree (1,1,5,5,1)
  (same comment as for Selenium)
- Strontium [air, urban air close to ground]: 2.78e-10 kg; lognormal variance with pedigree 1.182, pedigree (1,1,5,5,1)
  (same comment as for Lead)
- Magnesium [water, surface water]: 0.00164 kg; lognormal variance with pedigree 0.452, pedigree (1,1,5,5,1)
  (same comment as for Lead)
- Vanadium [air, urban air close to ground]: 1.01e-10 kg; lognormal variance with pedigree 1.322, pedigree (1,1,5,5,1)
  (same comment as for Lead)
- Arsenic, ion [water, surface water]: 7.28e-7 kg; lognormal variance with pedigree 1.392, pedigree (1,1,5,5,1)
  (same comment as for Lead)
- Iron, ion [water, ground-, long-term]: 0.00482 kg; lognormal variance with pedigree 1.962, pedigree (1,1,5,5,1)
  (same comment as for Silicon)
- Calcium [air, urban air close to ground]: 2.09e-8 kg; lognormal variance with pedigree 0.782, pedigree (1,1,5,5,1)
  (same comment as for Lead)
- Arsenic, ion [water, ground-, long-term]: 9.13e-5 kg; lognormal variance with pedigree 1.012, pedigree (1,1,5,5,1)
  (same comment as for Silicon)
- Barium [air, urban air close to ground]: 1.06e-7 kg; lognormal variance with pedigree 0.822, pedigree (1,1,5,5,1)
  (same comment as for Lead)
- Phosphorus [air, urban air close to ground]: 1.74e-9 kg; lognormal variance with pedigree 1.262, pedigree (1,1,5,5,1)
  (same comment as for Lead)
- Mercury [air, urban air close to ground]: 0 kg; pedigree (1,1,1,1,1)
  (same comment as for Lead)
- Sodium, ion [water, ground-, long-term]: 0.00777 kg; lognormal variance with pedigree 0.412, pedigree (1,1,5,5,1)
  (same comment as for Silicon)
- Magnesium [water, ground-, long-term]: 0.0571 kg; lognormal variance with pedigree 0.212, pedigree (1,1,5,5,1)
  (same comment as for Silicon)
- Antimony [water, surface water]: 3.4e-8 kg; lognormal variance with pedigree 1.762, pedigree (1,1,5,5,1)
  (same comment as for Lead)
- Mercury [water, surface water]: 1.08e-10 kg; lognormal variance with pedigree 2.402, pedigree (1,1,5,5,1)
  (same comment as for Lead)
- Magnesium [air, non-urban air or from high stacks]: 4.54e-7 kg; lognormal variance with pedigree 1.512, pedigree (1,1,5,5,1)
  (same comment as for Selenium)
- COD, Chemical Oxygen Demand [water, surface water]: 9.18e-5 kg; lognormal variance with pedigree 0.772, pedigree (1,1,5,5,1)
  (same comment as for Lead)
- Nickel [air, urban air close to ground]: 9.58e-15 kg; lognormal variance with pedigree 1.552, pedigree (1,1,5,5,1)
  (same comment as for Lead)
- Vanadium [air, non-urban air or from high stacks]: 5.11e-10 kg; lognormal variance with pedigree 2.342, pedigree (1,1,5,5,1)
  (same comment as for Selenium)
- Boron [water, surface water]: 6.88e-5 kg; lognormal variance with pedigree 0.872, pedigree (1,1,5,5,1)
  (same comment as for Lead)
- Tin [air, urban air close to ground]: 4.5e-12 kg; lognormal variance with pedigree 2.072, pedigree (1,1,5,5,1)
  (same comment as for Lead)
- Magnesium [air, urban air close to ground]: 2.45e-7 kg; lognormal variance with pedigree 0.482, pedigree (1,1,5,5,1)
  (same comment as for Lead)
- Cobalt [air, urban air close to ground]: 1.23e-14 kg; lognormal variance with pedigree 1.532, pedigree (1,1,5,5,1)
  (same comment as for Lead)
- Titanium [air, urban air close to ground]: 7.24e-9 kg; lognormal variance with pedigree 1.052, pedigree (1,1,5,5,1)
  (same comment as for Lead)
- Nickel, ion [water, surface water]: 3.42e-7 kg; lognormal variance with pedigree 1.432, pedigree (1,1,5,5,1)
  (same comment as for Lead)
- Copper [air, urban air close to ground]: 1.96e-13 kg; lognormal variance with pedigree 1.862, pedigree (1,1,5,5,1)
  (same comment as for Lead)
- Bromine [water, ground-, long-term]: 8.46e-5 kg; lognormal variance with pedigree 1.012, pedigree (1,1,5,5,1)
  (same comment as for Silicon)
- Chromium VI [water, surface water]: 5.73e-8 kg; lognormal variance with pedigree 1.642, pedigree (1,1,5,5,1)
  (same comment as for Lead)
- Iron [air, urban air close to ground]: 1.14e-9 kg; lognormal variance with pedigree 0.702, pedigree (1,1,5,5,1)
  (same comment as for Lead)
- Thallium [air, urban air close to ground]: 1.36e-11 kg; lognormal variance with pedigree 1.872, pedigree (1,1,5,5,1)
  (same comment as for Lead)
- Potassium, ion [water, ground-, long-term]: 0.0189 kg; lognormal variance with pedigree 0.332, pedigree (1,1,5,5,1)
  (same comment as for Silicon)
- Manganese [air, urban air close to ground]: 1.06e-13 kg; lognormal variance with pedigree 1.062, pedigree (1,1,5,5,1)
  (same comment as for Lead)
- Potassium [air, non-urban air or from high stacks]: 1.79e-7 kg; lognormal variance with pedigree 1.602, pedigree (1,1,5,5,1)
  (same comment as for Selenium)
- Silicon [air, non-urban air or from high stacks]: 1.53e-7 kg; lognormal variance with pedigree 1.712, pedigree (1,1,5,5,1)
  (same comment as for Selenium)
- Cobalt [water, surface water]: 4e-7 kg; lognormal variance with pedigree 1.412, pedigree (1,1,5,5,1)
  (same comment as for Lead)
- Aluminium [water, ground-, long-term]: 0.166 kg; lognormal variance with pedigree 0.122, pedigree (1,1,5,5,1)
  (same comment as for Silicon)
- Bromine [water, surface water]: 1.22e-5 kg; lognormal variance with pedigree 1.112, pedigree (1,1,5,5,1)
  (same comment as for Iodide)
- Carbon monoxide, fossil [air, urban air close to ground]: 1.15e-6 kg; lognormal variance with pedigree 0.432, pedigree (1,1,5,5,1)
  (same comment as for Lead)
- Phosphate [water, ground-, long-term]: 2.05e-5 kg; lognormal variance with pedigree 6.942, pedigree (1,1,5,5,1)
  (same comment as for Silicon)
- Barium [water, ground-, long-term]: 0.00194 kg; lognormal variance with pedigree 0.572, pedigree (1,1,5,5,1)
  (same comment as for Silicon)
- Zinc, ion [water, surface water]: 3.48e-7 kg; lognormal variance with pedigree 1.342, pedigree (1,1,5,5,1)
  (same comment as for Lead)
- Vanadium, ion [water, surface water]: 1.04e-6 kg; lognormal variance with pedigree 1.272, pedigree (1,1,5,5,1)
  (same comment as for Lead)
- Zinc, ion [water, ground-, long-term]: 0.000391 kg; lognormal variance with pedigree 0.802, pedigree (1,1,5,5,1)
  (same comment as for Silicon)
- Chromium [air, non-urban air or from high stacks]: 2.74e-11 kg; lognormal variance with pedigree 2.722, pedigree (1,1,5,5,1)
  (same comment as for Selenium)
- Manganese [air, non-urban air or from high stacks]: 9.92e-9 kg; lognormal variance with pedigree 1.962, pedigree (1,1,5,5,1)
  (same comment as for Selenium)
- Boron [air, urban air close to ground]: 6.96e-6 kg; lognormal variance with pedigree 0.892, pedigree (1,1,5,5,1)
  (same comment as for Lead)
- Strontium [water, ground-, long-term]: 0.00194 kg; lognormal variance with pedigree 0.612, pedigree (1,1,5,5,1)
  (same comment as for Silicon)
- Potassium, ion [water, surface water]: 0.000717 kg; lognormal variance with pedigree 0.552, pedigree (1,1,5,5,1)
  (same comment as for Iodide)
- Thallium [water, ground-, long-term]: 9.48e-6 kg; lognormal variance with pedigree 1.312, pedigree (1,1,5,5,1)
  (same comment as for Silicon)
- Selenium [water, surface water]: 2.47e-8 kg; lognormal variance with pedigree 1.802, pedigree (1,1,5,5,1)
  (same comment as for Lead)
- Manganese [water, surface water]: 2.01e-5 kg; lognormal variance with pedigree 0.922, pedigree (1,1,5,5,1)
  (same comment as for Lead)
- Molybdenum [water, surface water]: 8.89e-8 kg; lognormal variance with pedigree 1.612, pedigree (1,1,5,5,1)
  (same comment as for Lead)
- Titanium, ion [water, surface water]: 7.46e-6 kg; lognormal variance with pedigree 1.012, pedigree (1,1,5,5,1)
  (same comment as for Lead)
- COD, Chemical Oxygen Demand [water, ground-, long-term]: 0.0266 kg; lognormal variance with pedigree 0.652, pedigree (1,1,5,5,1)
  (same comment as for Silicon)
- Beryllium [water, ground-, long-term]: 1.96e-5 kg; lognormal variance with pedigree 1.222, pedigree (1,1,5,5,1)
  (same comment as for Silicon)
- Tin, ion [water, surface water]: 2.44e-9 kg; lognormal variance with pedigree 2.032, pedigree (1,1,5,5,1)
  (same comment as for Lead)
- Scandium [air, non-urban air or from high stacks]: 4.46e-11 kg; lognormal variance with pedigree 2.672, pedigree (1,1,5,5,1)
  (same comment as for Selenium)
- Silicon [air, urban air close to ground]: 1.34e-6 kg; lognormal variance with pedigree 0.662, pedigree (1,1,5,5,1)
  (same comment as for Lead)
- Tin [air, non-urban air or from high stacks]: 1.46e-12 kg; lognormal variance with pedigree 3.112, pedigree (1,1,5,5,1)
  (same comment as for Selenium)
- Antimony [air, urban air close to ground]: 2.47e-12 kg; lognormal variance with pedigree 2.402, pedigree (1,1,5,5,1)
  (same comment as for Lead)
- Iron, ion [water, surface water]: 2.39e-5 kg; lognormal variance with pedigree 0.902, pedigree (1,1,5,5,1)
  (same comment as for Lead)
- Silicon [water, surface water]: 3.68e-5 kg; lognormal variance with pedigree 0.652, pedigree (1,1,5,5,1)
  (same comment as for Lead)
- BOD5, Biological Oxygen Demand [water, ground-, long-term]: 0.00631 kg; lognormal variance with pedigree 0.652, pedigree (1,1,5,5,1)
  (same comment as for Silicon)
- Thallium [water, surface water]: 1.4e-8 kg; lognormal variance with pedigree 1.842, pedigree (1,1,5,5,1)
  (same comment as for Lead)
- Manganese [water, ground-, long-term]: 0.000656 kg; lognormal variance with pedigree 0.722, pedigree (1,1,5,5,1)
  (same comment as for Silicon)
- Zinc [air, urban air close to ground]: 1.27e-11 kg; lognormal variance with pedigree 1.402, pedigree (1,1,5,5,1)
  (same comment as for Lead)
- Lead [water, ground-, long-term]: 0.000376 kg; lognormal variance with pedigree 0.832, pedigree (1,1,5,5,1)
  (same comment as for Silicon)
- Chromium [air, urban air close to ground]: 3.98e-15 kg; lognormal variance with pedigree 1.752, pedigree (1,1,5,5,1)
  (same comment as for Lead)
- Lead [water, surface water]: 1.22e-8 kg; lognormal variance with pedigree 1.642, pedigree (1,1,5,5,1)
  (same comment as for Lead)
- Carbon monoxide, fossil [air, non-urban air or from high stacks]: 7.1e-7 kg; lognormal variance with pedigree 1.002, pedigree (1,1,5,5,1)
  (same comment as for Selenium)
- Strontium [air, non-urban air or from high stacks]: 1.41e-9 kg; lognormal variance with pedigree 2.222, pedigree (1,1,5,5,1)
  (same comment as for Selenium)
- Aluminium [air, non-urban air or from high stacks]: 1.04e-7 kg; lognormal variance with pedigree 1.742, pedigree (1,1,5,5,1)
  (same comment as for Selenium)
- Antimony [air, non-urban air or from high stacks]: 1.25e-11 kg; lognormal variance with pedigree 2.842, pedigree (1,1,5,5,1)
  (same comment as for Selenium)
- Selenium [air, urban air close to ground]: 0 kg; pedigree (1,1,1,1,1)
  (same comment as for Lead)
- DOC, Dissolved Organic Carbon [water, ground-, long-term]: 0.0244 kg; lognormal variance with pedigree 0.652, pedigree (1,1,5,5,1)
  (same comment as for Silicon)
- Antimony [water, ground-, long-term]: 9.64e-7 kg; lognormal variance with pedigree 2.622, pedigree (1,1,5,5,1)
  (same comment as for Silicon)
- Calcium, ion [water, surface water]: 0.000115 kg; lognormal variance with pedigree 0.742, pedigree (1,1,5,5,1)
  (same comment as for Lead)
- Calcium, ion [water, ground-, long-term]: 0.0195 kg; lognormal variance with pedigree 0.332, pedigree (1,1,5,5,1)
  (same comment as for Silicon)
- TOC, Total Organic Carbon [water, surface water]: 2.32e-5 kg; lognormal variance with pedigree 0.772, pedigree (1,1,5,5,1)
  (same comment as for Lead)
- Chromium VI [water, ground-, long-term]: 8.75e-7 kg; lognormal variance with pedigree 8.202, pedigree (1,1,5,5,1)
  (same comment as for Silicon)
- Boron [water, ground-, long-term]: 0.00027 kg; lognormal variance with pedigree 0.702, pedigree (1,1,5,5,1)
  (same comment as for Silicon)
- Arsenic [air, non-urban air or from high stacks]: 1.16e-8 kg; lognormal variance with pedigree 1.942, pedigree (1,1,5,5,1)
  (same comment as for Selenium)

## Sampling procedure
Landfill model based on observed leachate concentrations in literature. Extrapolated to 60'000 years heeding chemical characteristics. Initial waste composition from various literature sources.

## Extrapolations
This dataset has been copied from an original dataset covering the geography CH. The uncertainty has been adjusted accordingly.

## Review by Emilia Moreno Ruiz 2015-10-12
PV adjusted

## Review by Niels Jungbluth 2003-07-21
Passed. Calculation for standard deviation 95 of, i.e., infrastructure,
land occupation, transport services or other services can differ from
standard Pedigree approach used in this project and figures obtained by
this procedure.
