# treatment of scrap lead acid battery, remelting

Dataset: EcoSpold 2, unit process
Geography: RoW
Time period: 2000-01-01 to 2019-12-31
Technology level: current
Classification: EcoSpold01Categories: metals/extraction
Classification: ISIC rev.4 ecoinvent: 2420:Manufacture of basic precious and other non-ferrous metals
Synonyms: Recycling von Batterien; Recycling of lead acid (PbA) batteries
Tags: ConvertedDataset
Scenario: Business-as-Usual
System model: Allocation at the point of substitution
Generated by: Mischa Classen
Published in: Classen M. 2009
Database: ecoinvent
isCopyrightProtected: true
accessRestrictedTo: 1

## General comment
The module describes the production of secondary lead in Europe. The feed of secondary material consists of scrap lead acid (PbA) batteries form automotives. The data refers to one big operation in Europe that operates with representative technology.
[This dataset was already contained in the ecoinvent database version 2. It was not individually updated during the transfer to ecoinvent version 3. Life Cycle Impact Assessment results may still have changed, as they are affected by changes in the supply chain, i.e. in other datasets. This dataset was generated following the ecoinvent quality guidelines for version 2. It may have been subject to central changes described in the ecoinvent version 3 change report (http://www.ecoinvent.org/database/ecoinvent-version-3/reports-of-changes/), and the results of the central updates were reviewed extensively. The changes added e.g. consistent water flows and other information throughout the database. The documentation of this dataset can be found in the ecoinvent reports of version 2, which are still available via the ecoinvent website. The change report linked above covers all central changes that were made during the conversion process.]

## Included activities end
Collection, sorting and remelting of the lead contained in lead acid batteries.

## Geography
This module represents the European production based on a single major site in Belgium.

## Technology
The referred operation uses a shaft furnace with post combustion, which is the usual technology for secondary smelters.

## Reference product
- scrap lead acid battery: 0 kg; CPC 39364: Waste and scrap of lead; By-product classification Recyclable
  production volume 0 kg
    Calculated. The amount of lead used in the world is of 6 billion kg, of which 3/4 is used for batteries (link: http://www.worstpolluted.org/projects_reports/display/65, accessed 20151001). 98% of batteries are recycled (link: http://www.leadacidbatteryinfo.org/resources.htm, accessed 20151001 & http://www.eurobat.org/sites/default/files/ihs_eurobat_report_lead_lores_final.pdf, accessed 20151001). On average a battery weights 16.33 kg and contains 9.55 kg lead (link: https://ehs.osu.edu/FileStore/Hazardous%20wastes/Lead-Acid%20Batteries.pdf, accessed 20151001).
  property price 0 EUR2005
    Price assumed to be zero as the material needs further treatment
- lead: 1 kg; CPC 41441: Lead, unwrought; By-product classification allocatable product
  EcoSpold01Location=RER
  production volume 3.27639e9 kg

## By-products
- lead: 0 kg; CPC 41441: Lead, unwrought; By-product classification allocatable product
  EcoSpold01Location=RER
  production volume 0 kg; = Ref('1fbf8ffb-7f41-4ca9-8b8b-be505386968b')* Ref('8479529d-f074-416d-a6a2-cca569a1419c', 'ProductionVolume')
    Calculated from the production volume of scrap lead acid battery in proportion to the respective output amounts.
  property price 0.744 EUR2005
    Temporary price data. Calculated as 90% of purchasers price based on: Source: ecoinvent v2 report 10-part IX, Tab 5.10 & 2.5
  property carbon content 0
    carbon content on a dry matter basis (reserved; not for manual entry)
  properties: water content 0, water in wet mass 0 kg, dry mass 1 kg, carbon content, non-fossil 0, carbon content, fossil 0, wet mass 1 kg, carbon allocation 0 kg

## Inputs from technosphere
- nickel smelter slag: 0 kg; pedigree (1,1,1,1,1)
  EcoSpold01Location=CH
  production volume 0 kg; = Ref('90783b40-9309-4142-adf7-d12fa53340fc')* Ref('8479529d-f074-416d-a6a2-cca569a1419c', 'ProductionVolume')
    (same comment as for lead)
  properties: carbon content, fossil 0.00345, dry mass 1 kg, wet mass 1 kg
- iron (III) chloride, without water, in 40% solution state: 0 kg; pedigree (1,1,1,1,1)
  EcoSpold01Location=CH
  properties: wet mass 1 kg, dry mass 1 kg
- lime, packed: 0 kg; pedigree (1,1,1,1,1)
  EcoSpold01Location=CH
  properties: dry mass 0.998 kg, carbon content, fossil 0.117492, water content 0.00200401, wet mass 1 kg
  note on carbon content, fossil: Table 3.1, ecoinvent v2.2 report 7, part VII, pg 3. MW CaCO3=100, MW MgCO3=84
- electricity, medium voltage: 0, 0 kWh (2 entries); pedigree (1,1,1,1,1)
  EcoSpold01Location=UCTE
- sodium hydroxide, without water, in 50% solution state: 0 kg; pedigree (1,1,1,1,1)
  EcoSpold01Location=RER
  properties: dry mass 1 kg, wet mass 1 kg
- heat, central or small-scale, other than natural gas: 0 MJ; pedigree (1,1,1,1,1)
  EcoSpold01Location=RER
- sulfuric acid: 0.000220719 kg; lognormal variance with pedigree 0.38, pedigree (4,4,5,5,3)
  EcoSpold01Location=RER
  properties: dry mass 1 kg, wet mass 1 kg
- sulfur: 0 kg; pedigree (1,1,1,1,1)
  EcoSpold01Location=RER
  properties: dry mass 1 kg, wet mass 1 kg
- sodium sulfate, anhydrite: 0 kg; pedigree (1,1,1,1,1)
  EcoSpold01Location=RER
  properties: wet mass 1 kg, dry mass 1 kg
- heat, district or industrial, natural gas: 0 MJ; pedigree (1,1,1,1,1)
  EcoSpold01Location=RER
- electricity, medium voltage: 0.00173415, 0.000315542, 0.00535112, 0.0775857, 0.011104, 0.0363811 kWh (6 entries); lognormal variance with pedigree 0.044, pedigree (1,4,5,5,1)
  EcoSpold01Location=UCTE
- heat, district or industrial, natural gas: 0.00338182, 0.191191 MJ (2 entries); lognormal variance with pedigree 0.044, pedigree (1,4,5,5,1)
  EcoSpold01Location=RER
- polyethylene terephthalate, granulate, amorphous: 0.00157891 kg; source Spielmann M. 2007; lognormal variance with pedigree 0.0521, pedigree (1,4,5,3,1)
  Calculations of vehicle maintenance.
  5 kg of polyethylene, HDPE, granulate, at plant used per vehicle unit on the entire vehicle lifetime.
  Extrapolations: Data for Germany used as estimation for Europe.
  Uncertainty: LCI of one car
- ethylene, average: 0.00600878 kg; source Spielmann M. 2007; lognormal variance with pedigree 0.0521, pedigree (1,4,5,3,1)
  LCI of one car
  EcoSpold01Location=RER
  Uncertainty: LCI of one car
- lead: 0.0105556 kg; source Spielmann M. 2007; lognormal variance with pedigree 0.0521, pedigree (1,4,5,3,1)
  EcoSpold01Location=RER
  LCI of one car
  Uncertainty: LCI of one car
- steel, low-alloyed, hot rolled: 0.050266 kg; source Spielmann M. 2007; lognormal variance with pedigree 0.0521, pedigree (1,4,5,3,1)
  EcoSpold01Location=RER
  LCI of one car
  Uncertainty: LCI of one car
- waste polyethylene: -0.00632503 kg; source Spielmann M. 2007; lognormal variance with pedigree 0.0521, pedigree (1,4,5,3,1)
  LCI of one car
  Uncertainty: LCI of one car
  production volume 8.37333e8 kg
- electricity, low voltage: 0.0921873 kWh; source Spielmann M. 2007; lognormal variance with pedigree 0.0521, pedigree (1,4,5,3,1)
  LCI of one car
  EcoSpold01Location=UCTE
  Uncertainty: LCI of one car
- ethylene glycol: 0.000631564 kg; source Spielmann M. 2007; lognormal variance with pedigree 0.0521, pedigree (1,4,5,3,1)
  EcoSpold01Location=RER
  LCI of one car
  Uncertainty: LCI of one car
- sulfuric acid: 0.000221376 kg; source Spielmann M. 2007; lognormal variance with pedigree 0.0521, pedigree (1,4,5,3,1)
  LCI of one car
  EcoSpold01Location=RER
  Uncertainty: LCI of one car
- used tyre: -0.0401043 kg; source Spielmann M. 2007; lognormal variance with pedigree 0.0521, pedigree (1,4,5,3,1)
  LCI of one car
  Uncertainty: LCI of one car
  production volume 2.65853e9 kg
- polypropylene, granulate: 0.0121291 kg; source Spielmann M. 2007; lognormal variance with pedigree 0.0521, pedigree (1,4,5,3,1)
  EcoSpold01Location=RER
  LCI of one car
  Uncertainty: LCI of one car
- synthetic rubber: 0.0586877 kg; source Spielmann M. 2007; lognormal variance with pedigree 0.0521, pedigree (1,4,5,3,1)
  EcoSpold01Location=RER
  LCI of one car
  Uncertainty: LCI of one car
- scrap lead acid battery: -0.0109977 kg; source Spielmann M. 2007; lognormal variance with pedigree 0.0521, pedigree (1,4,5,3,1)
  LCI of one car
  Uncertainty: LCI of one car
  production volume 5.5264e8 kg
- polyethylene, high density, granulate: 0.00157891 kg; source Spielmann M. 2007; lognormal variance with pedigree 0.0521, pedigree (1,4,5,3,1)
  LCI of one car
  EcoSpold01Location=RER
  Uncertainty: LCI of one car
- copper: 0.00098011 kg; source Spielmann M. 2007; lognormal variance with pedigree 0.0521, pedigree (1,4,5,3,1)
  EcoSpold01Location=RER
  LCI of one car
  Uncertainty: LCI of one car
- lubricating oil: 0.00512328 kg; lognormal variance with pedigree 0.0413, pedigree (2,2,5,1,1)
  4 litres per oil change. Oil change every 15000km (9 changes). 0.9 kg/litre. Information from relevant internet sites.
- waste mineral oil: -0.00500741, -0.000115866 kg (2 entries); lognormal variance with pedigree 0.0413, pedigree (2,2,5,1,1)
  (same comment as for lubricating oil)
  production volume 6.7824e8 kg
- scrap copper: -0.000306709, -1.43901e-5 kg (2 entries); source Spielmann M. 2007; lognormal variance with pedigree 0.0521, pedigree (1,4,5,3,1)
  LCI of one car
  Uncertainty: LCI of one car
  production volume 6.28e6 kg
- waste polyethylene/polypropylene product: -0.00245631, -7.37074e-5 kg (2 entries); source Spielmann M. 2007; lognormal variance with pedigree 0.0406, pedigree (1,1,5,1,1)
  LCI of one car
  production volume 3.34933e8 kg
- road vehicle factory: 1.95667e-11 unit; source Spielmann M. 2007; lognormal variance with pedigree 0.6461, pedigree (4,5,5,3,4)
  no specific information available; proxy as for production of lorry 16 t
- waste aluminium: -0.00731081 kg; source Knechtle N. 1997; lognormal variance with pedigree 0.0213607, pedigree (1,1,3,1,1)
  production volume 1.17e6 kg
    Calculated from production volume of reference product using the relative outputs.
- steel, unalloyed: 0.50162 kg; source Knechtle N. 1997; lognormal variance with pedigree 0.002, pedigree (1,1,3,1,1)
  EcoSpold01Location=RER
  total material input for production and maintenance (estimated via default factor); the amount of material used in production is extrapolated from reference via total weight of machine
- wire drawing, copper: 0.000885375 kg; source Knechtle N. 1997; lognormal variance with pedigree 0.00200037, pedigree (1,1,3,1,1)
- heat, district or industrial, natural gas: 1.47519 MJ; source Spielmann, M. 2007; lognormal variance with pedigree 0.002, pedigree (1,1,3,1,1)
  total heat input for production and maintenance (estimated via default factor); the amount of heat used in production is extrapolated from reference via total weight of machine
  EcoSpold01Location=RER
- electronics, for control units: 0.00167685 kg; source Spielmann, M. 2007; lognormal variance with pedigree 0.069, pedigree (3,4,5,1,1)
  total material input for production (no maintenance according to reference); the amount of material used in production is extrapolated from reference via total weight of machine
- waste electric and electronic equipment: -0.00167685 kg; source Spielmann, M. 2007; lognormal variance with pedigree 0.00200009, pedigree (1,1,3,1,1)
  production volume 600000 kg
    Calculated from production volume of reference product using the relative outputs.
- injection moulding: 0.0102344 kg; source Knechtle N. 1997; lognormal variance with pedigree 0.0026, pedigree (1,1,3,1,1)
- electricity, medium voltage: 1.03935 kWh; source Spielmann, M. 2007; lognormal variance with pedigree 0.002, pedigree (1,1,3,1,1)
  total electricity input for production and maintenance (estimated via default factor); the amount of electricity used in production is extrapolated from reference via total weight of machine
  EcoSpold01Location=CH
- aluminium, cast alloy: 0.00731081 kg; source Knechtle N. 1997; lognormal variance with pedigree 23.8518, pedigree (1,1,3,1,1)
  (same comment as for steel, unalloyed)
- tap water: 0.793888, 0.00013484, 0.00112018, 0.000222846, 0.00561928, 0.000146184, 0.000415819, 0.0643043 kg (8 entries); source Spielmann, M. 2007; lognormal variance with pedigree 0.002, pedigree (1,1,3,1,1)
  total water input for production and maintenance (estimated via default factor); the amount of water used in production is extrapolated from reference via total weight of machine
- wastewater from lorry production: -0.000110512 m3; source Spielmann, M. 2007; lognormal variance with pedigree 0.661412, pedigree (1,1,3,1,1)
  total production specific waste water from production and maintenance (estimated via default factor); the amount of waste water from production is extrapolated from reference via total weight of machine
  production volume 28340 m3
    Calculated from production volume of reference product using the relative outputs.
- steel, chromium steel 18/8, hot rolled: 0.0303349 kg; source Knechtle N. 1997; lognormal variance with pedigree 0.0026, pedigree (1,1,3,1,1)
  (same comment as for steel, unalloyed)
- powder coat, steel: 0.00353881 m2; source Spielmann, M. 2007; lognormal variance with pedigree 0.0026, pedigree (1,1,3,1,1)
  total powder coating input for production and maintenance (estimated via default factor)
- scrap steel: -0.121113, -0.000153117, -0.457482 kg (3 entries); source Knechtle N. 1997; lognormal variance with pedigree 0.0026, pedigree (1,1,3,1,1)
  used for chromium steel, for which no specific dataset is available (15.09.2012)
  production volume 1.41687e8 kg
    Calculated from production volume of reference product using the relative outputs.
- waste glass sheet: -0.000430867, -1.09699e-5, -0.00194057 kg (3 entries); source Knechtle N. 1997; lognormal variance with pedigree 0.0026, pedigree (1,1,3,1,1)
  EcoSpold01Location=CH
  production volume 1.04e6 kg
    Calculated from the production volume of harvester in proportion to the respective output amounts.
- oxygen, liquid: 5.48029e-5, 0.000214155 kg (2 entries); source Spielmann, M. 2007; lognormal variance with pedigree 0.189, pedigree (3,4,5,1,5)
  used during disassembly
- scrap copper: -0.00065901 kg; source Knechtle N. 1997; lognormal variance with pedigree 0.00200028, pedigree (1,1,3,1,1)
  total material input for production and maintenance (estimated via default factor); the amount of material used in production is extrapolated from reference via total weight of machine
  production volume 600000 kg
    Calculated from production volume of reference product using the relative outputs.
- water, completely softened: 0.000111582, 0.000186332, 0.000248922 kg (3 entries); source Spielmann, M. 2007; lognormal variance with pedigree 0.069, pedigree (3,4,5,1,1)
  for battery; the amount is extrapolated from reference via total weight of machine
- flat glass, uncoated: 0.000358963, 0.00202344 kg (2 entries); source Knechtle N. 1997; lognormal variance with pedigree 0.0026, pedigree (1,1,3,1,1)
  total material input for production and maintenance (estimated via default factor); the amount of material used in production is extrapolated from reference via total weight of machine
  EcoSpold01Location=RER
- waste rubber, unspecified: -0.00932391, -0.000391416, -0.0123417 kg (3 entries); source Knechtle N. 1997; lognormal variance with pedigree 0.0020011, pedigree (1,1,3,1,1)
  production volume 7.3e6 kg
    Calculated from production volume of reference product using the relative outputs.
- wastewater, average: -0.000248208, -2.68514e-5, -0.00059134 m3 (3 entries); source Spielmann, M. 2007; lognormal variance with pedigree 1.37181, pedigree (1,1,3,1,1)
  amounts of water inputs converted to m3
  production volume 261601 m3
    Calculated from production volume of reference product using the relative outputs.
- waste polypropylene: -0.00103165, -9.14514e-5, -3.77727e-5, -3.58687e-5, -0.0013687, -1.52597e-5, -6.91632e-6, -0.00958168 kg (8 entries); source Knechtle N. 1997; lognormal variance with pedigree 0.027, pedigree (1,1,3,1,1)
  Input of PP correct for water content of waste flow
  production volume 2.16409e6 kg
    Calculated from production volume of reference product using the relative outputs.
- acetylene: 1.84534e-5, 9.36122e-5 kg (2 entries); source Spielmann, M. 2007; lognormal variance with pedigree 0.189, pedigree (3,4,5,1,5)
  used during disassembly
- cast iron: 0.068419 kg; source Spielmann, M. 2007; lognormal variance with pedigree 0.115, pedigree (3,5,5,1,4)
  total material input for production and maintenance (estimated via default factor); the amount of material used in production is calculated proportionally to the weight of the machinery (excluding cables) and the dataset on a truck (Spielmann et al. 2007)
- wire drawing, steel: 0.0921188 kg; lognormal variance with pedigree 0.002, pedigree (1,1,3,1,1)
  cables: skyline: 1 piece, lenght: 1000 m, thickness: 22 mm, weight: 2.02 kg/m; mainline: 1 pieces, lenght: 1000 m, thickness: 11 mm, weight: 0.502 kg/m; anchoring of end pole and supportive constructions: 6 cables a 80 m, thickness 10 mm; weight 0.45 kg/m and 2 cable a 40 m, thickness 10 mm and a weight of 0.45 kg. The replacement of the cables is considered via a separate maintenance factor. It is not considered that often, cables from cable cars or ski lifts are used that are worn and no longer permitted in such installations for human transport.
- zinc coat, coils: 0.00407938 m2; lognormal variance with pedigree 0.069, pedigree (3,4,5,1,1)
  Area of the cables for zinc coating is approximated via the cylindrical surface of cables (length x diameter x pi); for diameters, see comment field for wire drawing
- waste bulk iron, excluding reinforcement: -0.0218865, -0.0005721, -0.0459604 kg (3 entries); source Spielmann, M. 2007; lognormal variance with pedigree 0.00200001, pedigree (1,1,3,1,1)
  production volume 3.7875e6 kg
    Calculated from production volume of reference product using the relative outputs.
- waste mineral oil: -0.00510806 kg; lognormal variance with pedigree 0.0433, pedigree (2,2,5,5,1)
  (same comment as for lubricating oil)
  production volume 3.18773e9 kg
- lubricating oil: 0.00510806 kg; lognormal variance with pedigree 0.0433, pedigree (2,2,5,5,1)
  (same comment as for lubricating oil)
- waste polyethylene/polypropylene product: -0.0025225 kg; source Spielmann M. 2007; lognormal variance with pedigree 0.0446, pedigree (1,4,5,5,1)
  LCI of one car
  Uncertainty: LCI of one car
  production volume 1.57419e9 kg
- ethylene, average: 9.46052e-5, 0.00589633 kg (2 entries); source Spielmann M. 2007; lognormal variance with pedigree 0.054, pedigree (1,4,5,5,1)
  EcoSpold01Location=RER
  LCI of one car
  Uncertainty: LCI of one car
- waste polyethylene: -0.000774973, -5.17807e-5, -3.91609e-6, -2.13873e-5, -8.64022e-6, -2.03092e-5, -0.00542524 kg (7 entries); source Spielmann M. 2007; lognormal variance with pedigree 0.0446, pedigree (1,4,5,5,1)
  LCI of one car
  Uncertainty: LCI of one car
  production volume 3.93547e9 kg
- electricity, low voltage: 0.00121994, 0.000213962, 0.0035184, 0.0532084, 0.00877046, 0.0249824 kWh (6 entries); source Spielmann M. 2007; lognormal variance with pedigree 0.054, pedigree (1,4,5,5,1)
  LCI of one car
  EcoSpold01Location=UCTE
  Uncertainty: LCI of one car

## Emissions to nature
- Lead [air, urban air close to ground]: 0 kg; pedigree (1,1,1,1,1)
- Antimony [air, urban air close to ground]: 0 kg; pedigree (1,1,1,1,1)
- Sulfur dioxide [air, urban air close to ground]: 0 kg; pedigree (1,1,1,1,1)
- Carbon dioxide, fossil [air, non-urban air or from high stacks]: 0.000379299 kg; source Spielmann, M. 2007; lognormal variance with pedigree 0.0543166, pedigree (1,1,3,1,1)
  acethylene converted to CO2

## Sampling procedure
literature

## Extrapolations
see Geography and Technology This dataset has been copied from an original dataset covering the geography RER. The uncertainty has been adjusted accordingly.

## Review by Roberto Dones 2007-09-28
passed
