# iron ore beneficiation to 65% Fe

Dataset: EcoSpold 2, unit process
Geography: IN
Time period: 2007-01-01 to 2019-12-31
Technology level: modern
Classification: ISIC rev.4 ecoinvent: 0710:Mining of iron ores
Classification: EcoSpold01Categories: metals/extraction
Scenario: Business-as-Usual
System model: Allocation at the point of substitution
Share of production covered: 2 %
Generated by: Harshita Soni
Published in: Soni H. 2017
Database: ecoinvent
isCopyrightProtected: true
accessRestrictedTo: 1

## General comment
This dataset represents iron ore beneficiation to 65%.

The following excerpts have been taken from the report Indian Iron Ore Scenario : Low Grade Iron Ore Beneficiation by MECON

"Draft National Steel Policy 2012 of India envisages the ambitious goal of the nation to reach a production capacity of 300 Mt/yr of crude quality steel by 2025 - 26. So the corresponding demand of iron ore containing 62 - 64 % Fe would be around 490 Mt (excluding export requirement). To cope up with increasing global and domestic market demand and to achieve the goals of National Steel Policy, Indian steel industry is in need of large quantity of iron ore.

Due to increased demand and continuous depletion of high grade iron ore, it has become necessary to develop technology to effectively beneficiate low grade iron ore.

Grade % Fe (SiO2+Al2O3)%
High-grade > 65% Fe 2% to 4%
Medium-grade 62 - 65% Fe 6% to 8%
Low-grade < 62% Fe 10% to 15%

In
the last 15 years a diverse range of new enhanced gravity separators such as Kelsey centrifugal Jigs, Falcon Concentrator, Knelson Concentrator, Multi Gravity Separator (MGS), Altair Jig, Rotating spirals and Water only cyclone have been developed for beneficiation of ultra fines / slimes (below 0.15 mm). These enhanced gravity separators have been proved better for the recovery of iron values from slimes. These operate on the simple principle of the conventional gravity separators but enhanced gravitational force is imparted to increase the inertia of fine particles by using centrifugal force. The forces acting on a particle settling under the influence of centrifugal force are gravity, drag, central buoyancy and frictional forces with gravity and centrifugal forces being predominant.

A schematic flow sheet indicating different stages in the beneficiation process alongwith suitable equipment is shown in the attached image."
Report by MECON - www.meconlimited.co.in/writereaddata/MIST_2016/sesn/tech_1/5.pdf

## Included activities start
This activity starts when the iron ore arrives at the iron ore beneficiation plant.

## Included activities end
This activity ends at the gate of the beneficiation plant. After iron ore mining, iron ore beneficiation involves physical separation of iron bearing minerals from associated gangue based on difference in physical properties such as specific gravity, granulometry and magnetic susceptibility.

0.3 kg of iron ore fines are a by product that are recycled and reused as input inside the intergrated steel plant. This has been excluded from the inventory.

## Geography
Data related to India.

## Technology
Milling and mechanical sorting. Average iron yield is 65% .
The process so developed basically involves crushing, classification, processing of lumps, fines and slimes separately to produce concentrate suitable as lump and sinter fines and for pellet making. The quality is essentially defined as Fe contents, Level of SiO2 and Al2O3 contamination. The process aims at maximizing Fe recovery by subjecting the rejects/tailings generated from coarser size processing to fine size reduction and subsequent processing to recover iron values.

## Time period
Data collected in 2016 for the year 2014-15

## Parameters
- fraction, process water, to air: 0.2 dimensionless; name fraction_PW_to_air; lognormal variance with pedigree 0.092025, pedigree (4,4,3,2,4)
  Literature value (Statistics Canada, 2007 & Shaffer, K.H., 2008, Consumptive water use in the Great Lakes Basin, USGS) (Vionnet, S., Quantis Water Database - Technical Report, 2012).

## Reference product
- iron ore, beneficiated, 65% Fe: 1 kg; name RPamount; CPC 14100: Iron ores and concentrates, other than roasted iron pyrites; By-product classification allocatable product; pedigree (1,1,1,1,1)
  EcoSpold01Location=GLO
  After iron ore mining, iron ore beneficiation involves physical separation of iron bearing minerals from associated gangue based on difference in physical properties such as specific gravity, granulometry and magnetic susceptibility.
  production volume 9.6675e10 kg; name RP_PV
    Calculated based on iron ore mining in India. It is assumed that all of the iron ore mined is sent for beneficiation in India and the production volume is 75% of input. Total iron ore mined = 128,900,000,000 kg (Source is National Minerial Development Corporation (NMDC)) Iron ore beneficiated = 75% of 128,900,000,000 kg =96,675,000,000 kg
  property price 0.0467 EUR2005
    Calculated based on literature value (UN Commodity Trade Statistics Database) using data on trade value and net weight (kg) for 5 reference countries/regions (EU-27, USA, JP, CN and IN) which weighted (by net weight) average is assumed to be a good approximation of the global price. The UN classification; 2601 Iron ores and concentrates, roasted iron pyrites (accessed 20140508). Data for the year 2005.
  property carbon content, fossil 0
    Iron ores are mixtures of up to 400 different minerals. The most important ones are the iron oxides and sulphides (ecoinvent v2.2 report 10_partII)
  property carbon content, non-fossil 0
    (same comment as for iron ore, beneficiated, 65% Fe)
  property carbon content 0
    carbon content on a dry matter basis (reserved; not for manual entry)
  property true value 0.0467; name RPamount_true_value
    allocation property applied in "true value" allocation // value calculated from revenue
  properties: dry mass 1 kg, wet mass 1 kg, water in wet mass 0 kg, water content 0, carbon allocation 0 kg

## By-products
- heat, for reuse in municipal waste incineration only: 0 MJ; CPC 17300: Steam and hot water; By-product classification allocatable product; pedigree (1,1,1,1,1)
  Net electricity generated from this waste and used in internal MSWI plant energy redistribution.
  Uncertainty: uncertainty is calculated from uncertainties in waste composition and uncertainties in energy efficiency and the uncertainty in internal energy demand
  production volume 1.56855e6 MJ
  property exergy 0.1842 MJ; name E_th_prod_MSWI_exergy
    This exergy property is based on the exergy content of the product.
  property price 0.0106 EUR2005; name E_th_prod_MSWI_price_EUR2005
    Average European district heat price from Ecoheatcool and Euroheat 2005-2006, Ecoheat Work package 1: The European heat market. Final report. 10.6 EUR/GJ i s the price of district heat. http://www.solarthermalworld.org/files/Ecoheatcool%20WP1%20Web.pdf?download
  property true value relation 0.1842; name E_th_prod_MSWI_true_value_relation
    property to calculate "true value" from
  property true value 1.07042e-7
    allocation property applied in "true value" allocation // value calculated from true value relation
- electricity, for reuse in municipal waste incineration only: 0 kWh; CPC 17100: Electrical energy; By-product classification allocatable product; pedigree (1,1,1,1,1)
  (same comment as for heat, for reuse in municipal waste incineration only)
  production volume 216952 kWh
  property price 0.1 EUR2005; name E_el_prod_MSWI_price_EUR2005
    Estimated to be the same price as in case of electricity, medium voltage.
  property exergy 3.6 MJ; name E_el_prod_MSWI_exergy
    This exergy property is based on the exergy content of the product.
  property true value relation 3.6; name E_el_prod_MSWI_true_value_relation
    property to calculate "true value" from
  property true value 2.89356e-7
    (same comment as for heat, for reuse in municipal waste incineration only)

## Inputs from technosphere
- wastewater, average: -0.000295997 m3; name wastewater; = (water_UNO_input*(1-fraction_PW_to_air))*-1; lognormal variance with pedigree 0.0434, pedigree (3,3,2,1,2)
  Based on the assumption that 80% of water used is sent to wastewater treatment plant and 20% is lost in evaporation to air. The treated wastewater is recycled and reused inside the plant.
  production volume 2.86158e7 m3; = (wastewater*RP_PV)/RPamount
    Calculated from production volume of reference product using the relative outputs.
  property price 0 EUR2005; name wastewater_price_EUR2005
  properties: dry mass 0.346837 kg, water content 2882.2, carbon content, non-fossil 0.194039, wet mass 1000 kg
  note on carbon content, non-fossil: 0.0673 kg TOC/m3 (Tab A.17, ecoinvent v2.2 report 13_I). TOC was considered as Total Carbon.
- iron ore, crude ore, 63% Fe: 1.31269 kg; lognormal variance with pedigree 0.043825, pedigree (3,3,5,2,2)
  Based on data received from one iron ore beneficiation plant in India
  properties: wet mass 1 kg, dry mass 1 kg, iron content 0.63
- diesel, burned in building machine: 0.00555595 MJ; lognormal variance with pedigree 0.004, pedigree (3,3,2,1,2)
  Based on data received from one iron ore beneficiation plant in India
- electricity, medium voltage: 0.0302997 kWh; lognormal variance with pedigree 0.043825, pedigree (3,3,5,2,2)
  Based on data received from one iron ore beneficiation plant in India
  EcoSpold01Location=UCTE

## Inputs from nature
- Water, unspecified natural origin [natural resource, in water]: 0.000369997 m3; name water_UNO_input; lognormal variance with pedigree 0.043225, pedigree (3,3,5,2,2)
  Based on data received from one iron ore beneficiation plant in India

## Emissions to nature
- Lead [water, unspecified]: 1.15819e-7 kg; lognormal variance with pedigree 0.6734, pedigree (3,3,2,1,2)
  Based on ecoinvent databset for "Iron ore beneficiation, GLO" accessed through ecoeditor on 20170815
- Copper, ion [water, unspecified]: 2.89558e-7 kg; lognormal variance with pedigree 0.6734, pedigree (3,3,2,1,2)
  (same comment as for Lead)
- Oils, unspecified [water, unspecified]: 5.79105e-6 kg; lognormal variance with pedigree 0.3334, pedigree (3,3,2,1,2)
  (same comment as for Lead)
- Cyanide [water, unspecified]: 5.79105e-7 kg; lognormal variance with pedigree 0.0734, pedigree (3,3,2,1,2)
  (same comment as for Lead)
- COD, Chemical Oxygen Demand [water, unspecified]: 8.68663e-5 kg; lognormal variance with pedigree 0.0734, pedigree (3,3,2,1,2)
  (same comment as for Lead)
- TOC, Total Organic Carbon [water, unspecified]: 3.13597e-6 kg; lognormal variance with pedigree 0.0734, pedigree (3,3,2,1,2)
  (same comment as for Lead)
- Iron, ion [water, unspecified]: 2.02688e-6 kg; lognormal variance with pedigree 0.6734, pedigree (3,3,2,1,2)
  (same comment as for Lead)
- BOD5, Biological Oxygen Demand [water, unspecified]: 8.68663e-5 kg; lognormal variance with pedigree 0.0734, pedigree (3,3,2,1,2)
  (same comment as for Lead)
- Water [air, unspecified]: 7.39994e-5 m3; name water_to_air_unspecified; = (water_UNO_input*fraction_PW_to_air); lognormal variance with pedigree 0.0434, pedigree (3,3,2,1,2)
  Based on the assumption that 20% of water consumed is sent to air and 80% is wastewater
- Mercury [water, unspecified]: 5.79105e-9 kg; lognormal variance with pedigree 0.6734, pedigree (3,3,2,1,2)
  (same comment as for Lead)
- Zinc, ion [water, unspecified]: 1.15819e-6 kg; lognormal variance with pedigree 0.6734, pedigree (3,3,2,1,2)
  (same comment as for Lead)
- Arsenic, ion [water, unspecified]: 5.79105e-8 kg; lognormal variance with pedigree 0.0734, pedigree (3,3,2,1,2)
  (same comment as for Lead)
- Cadmium, ion [water, unspecified]: 5.79105e-8 kg; lognormal variance with pedigree 0.6734, pedigree (3,3,2,1,2)
  (same comment as for Lead)
- Nickel, ion [water, unspecified]: 2.89558e-7 kg; lognormal variance with pedigree 0.6734, pedigree (3,3,2,1,2)
  (same comment as for Lead)
- DOC, Dissolved Organic Carbon [water, unspecified]: 3.13597e-6 kg; lognormal variance with pedigree 0.0734, pedigree (3,3,2,1,2)
  (same comment as for Lead)
- Chromium VI [water, unspecified]: 5.79105e-8 kg; lognormal variance with pedigree 0.6734, pedigree (3,3,2,1,2)
  (same comment as for Lead)

## Sampling procedure
Based on data received from one iron ore beneficiation plant in India. It has been assumed that 70% of iron ore mined in India is sent for beneficiation.

Total iron ore mined in India : 12,89,00,000 tonnes
70% of the above is: 9,02,30,000 tonnes
Information from plant obtained for : 15,28,138 tonnes
Therefore, dataset represents 2% of total iron ore beneficiated in the country.

## Extrapolations
The data has been extrapolated for emissions to air from the dataset "iron ore beneficiation to 65%, GLO" accessed on 20170922
