# fish freezing plant construction and maintenance

Dataset: EcoSpold 2, unit process
Geography: RoW
Time period: 2011-01-01 to 2019-12-31
Technology level: current
Classification: ISIC rev.4 ecoinvent: 1020:Processing and preserving of fish, crustaceans and molluscs
Scenario: Business-as-Usual
System model: Allocation at the point of substitution
Generated by: Angel Avadí
Published in: Avadí, A. 2018
Database: ecoinvent
isCopyrightProtected: true
accessRestrictedTo: 1

## General comment
The activity represents the construction and maintenance along its lifetime of a fish freezing (including fish pre-processing) plant, expressed as the installed capacity required to process 1000 kg of raw material. The life cycle inventories were produced based on a sample of 1 Peruvian plant (processing capacity: 16 200 t/y) and data from other industry representatives.
System boundaries of fish processing plants and relations between activities

## Included activities start
From construction of the plant, through maintenance.

## Included activities end
End of life treatment of the plant

## Geography
Based on Peruvian data

## Technology
Construction and maintenance activities of Peruvian fish freezing plants, per t of processing capacity. Plants have a lifespan of 30 years.
Process diagram of small fish freezing

## Time period
Production figures represent the period 2012. Valid as of 2017.

## Parameters
- copper wire use: 0.39 kg; name copper_wire_use; triangular min 0.3, mostLikely 0.39, max 5.56, pedigree (3,3,1,1,1)
  Copper wire for construction/maintenance consumed per t of processed raw material
  Uncertainty: Data from 1 plant, assumptions for larger plants

## Reference product
- fish freezing plant: 1 unit; name plant; source Angel Avadí 2014; By-product classification allocatable product; CPC 8812: Fish processing services
  One unit of plant represents the installed capacity required to process 1 t of raw material, including annual maintenance of the infrastructure, over the plant's lifetime.
  production volume 5.18e7 unit; name prod_vol; = 25900000*3
    It is assumed that 3 new plants are built per year, with processing capacity of at least 25 900 t raw material/year
  property capacity [kg] 25932 kg; name plant_capacity_kg
  property price 17.5247 EUR2005; name plant_price_EUR2005
    Calculated based on inputs: The price of the product has been calculated as a sum of the values of the material and energy inputs for this product. This value is therefore a rough estimation. It may underestimate the real price since there are additional expenses when producing any product. These expences can include for example labour costs, treatment of waste materials and profit for the producer. Please consider carefully whether this level of data quality is acceptable for your application.
  property lifetime 30 year; name plant_lifetime
  property true value 17.5247; name plant_true_value
    allocation property applied in "true value" allocation // value calculated from revenue

## By-products
- heat, for reuse in municipal waste incineration only: 0 MJ; CPC 17300: Steam and hot water; By-product classification allocatable product; pedigree (1,1,1,1,1)
  Net electricity generated from this waste and used in internal MSWI plant energy redistribution.
  Uncertainty: uncertainty is calculated from uncertainties in waste composition and uncertainties in energy efficiency and the uncertainty in internal energy demand
  production volume 2.13224e6 MJ
  property exergy 0.1842 MJ; name E_th_prod_MSWI_exergy
    This exergy property is based on the exergy content of the product.
  property price 0.0106 EUR2005; name E_th_prod_MSWI_price_EUR2005
    Average European district heat price from Ecoheatcool and Euroheat 2005-2006, Ecoheat Work package 1: The European heat market. Final report. 10.6 EUR/GJ i s the price of district heat. http://www.solarthermalworld.org/files/Ecoheatcool%20WP1%20Web.pdf?download
  property true value relation 0.1842; name E_th_prod_MSWI_true_value_relation
    property to calculate "true value" from
  property true value 0.00024158
    allocation property applied in "true value" allocation // value calculated from true value relation
- electricity, for reuse in municipal waste incineration only: 0 kWh; CPC 17100: Electrical energy; By-product classification allocatable product; pedigree (1,1,1,1,1)
  (same comment as for heat, for reuse in municipal waste incineration only)
  production volume 301573 kWh
  property price 0.1 EUR2005; name E_el_prod_MSWI_price_EUR2005
    Estimated to be the same price as in case of electricity, medium voltage.
  property exergy 3.6 MJ; name E_el_prod_MSWI_exergy
    This exergy property is based on the exergy content of the product.
  property true value relation 3.6; name E_el_prod_MSWI_true_value_relation
    property to calculate "true value" from
  property true value 0.000667308
    (same comment as for heat, for reuse in municipal waste incineration only)
- copper: 0 kg; source Rentz O. 1999; By-product classification allocatable product; CPC 41413: Refined copper and copper alloys, unwrought; master alloys of copper
  Literature value. Copper uses: Before end-use copper is manufactured into semi fabricated products, such as shapes and ingots (known as 'semis'). These manufacturing processes are subdivided into hot working, cold working and, if necessary, process annealing. Few of the semis are ready for use as such. They more typically travel to first-stage manufacturers, who make metal rods, wire, and casting, and then to component manufacturers who produce such things as motors, valves, and insulated cables The components in turn are incorporated by final-stage manufacturers into a variety of finished products - automobiles, commercial buildings, residential housing, and so forth. These uses account for about 79% of the world-wide consumption of copper.
  production volume 1.54214e7 kg
  properties: dry mass 1 kg, water in wet mass 0 kg, wet mass 1 kg, carbon content, non-fossil 0, water content 0, price 5.52 EUR2005, carbon content, fossil 0, carbon content 0, carbon allocation 0 kg, true value 1.64336
- zinc concentrate: 0 kg; CPC 14290: Other non-ferrous metal ores and concentrates (other than uranium or thorium ores and concentrates); By-product classification allocatable product
  Calculated value from the knowledge of the properties of both products.
  production volume 0.0122404 kg
  property price 0.38 EUR2005; name ByP_price_EUR2005
    Temporary price data. Calculated as 90% of purchasers price based on: Zinc content in concentrate 53%. Concentrate price per kg Zn 86.5% of refined Zn price (13.5% treatment charges according to CHR Metals Limited 2005: Dynamic cost curves. http://www.minecost.com/dynamic.pdf). 2004 zinc price from USGS (2007) Mineral commodity summaries 2007. <http://minerals.usgs.gov/minerals/pubs/mcs/2007/mcs2007.pdf> [Accessed 25 May 2010]
  property zinc content 0.53; name zinc_C_zinc_concentrate
    Zinc content on a dry matter basis. Value taken from teh "zinc mine operation" /GLO dataset.
  property dry mass 1 kg; name DM_zinc_concentrate
  property carbon content 0
    carbon content on a dry matter basis (reserved; not for manual entry)
  property true value 8.97942e-11
    allocation property applied in "true value" allocation // value calculated from revenue
  properties: wet mass 1 kg, water content 0, carbon content, non-fossil 0, carbon content, fossil 0, water in wet mass 0 kg, carbon allocation 0 kg
- iron scrap, sorted, pressed: 0 kg; By-product classification Recyclable; CPC 39310: Slag, dross, scalings and other waste from the manufacture of iron or steel; pedigree (1,1,1,1,1)
  Iron scrap recovered from this waste.
  Uncertainty: uncertainty calculated from uncertainty in waste composition, uncertainty of share of recyclable metal, uncertainty of transfer coefficient to bottom ash, uncertainty of the efficiency of scrap removal in MSWI plant.
  production volume 460076 kg
  property price 0.175 EUR2005
    Temporary price data. Calculated as 90% of purchasers price based on: 2005 import and export prices (total trades (USD) divided by total weight (kg) in biggest economies of the world: EU27, USA, Brasil, China, India, Japan and Russia) from UN Commodity Trade Statistics Database (http://data.un.org/Explorer.aspxDatabase [Accessed 2011.06.20]). Commodity: Waste or scrap, of cast iron
  property carbon content 0
    carbon content on a dry matter basis (reserved; not for manual entry)
  property true value 4.30153e-5
    allocation property applied in "true value" allocation // value calculated from revenue
  properties: wet mass 1 kg, water in wet mass 0 kg, carbon content, non-fossil 0, carbon content, fossil 0, dry mass 1 kg, water content 0, carbon allocation 0 kg

## Inputs from technosphere
- air compressor, screw-type compressor, 300kW: 7.04864e-5 unit; source Angel Avadí 2014; triangular min 6.01e-5, mostLikely 7.04864e-5, max 0.00111, pedigree (3,3,3,5,1)
  Air compression system 600 kW
  Uncertainty: Data from 1 plant, assumptions for larger plants
- wastewater from vegetable oil refinery: -1.4015 m3; = ((water)/1000)*-1; source Avadí, A. 2018
  Proxy for wastewater from fish processing plant.
  production volume 7.94094e7 m3; = prod_vol * ((Ref('0e42b157-1aef-4e51-815d-4bf3814f0f12')*-1) / plant)
    Calculated from production volume of reference product using the relative outputs.
  properties: carbon content, fossil 0.00178991, water content 1146.05, dry mass 0.871801 kg, carbon content, non-fossil 0.8, wet mass 1000 kg
  note on carbon content, fossil: Estimated load for fish processing plant cleansing wastewater. The loading of fish processing wastewater is mainly organic (http://www.dfo-mpo.gc.ca/Library/273700.pdf)
- copper scrap, sorted, pressed: -0.356546 kg; name copper_s; = (copper_wire_use)*-1; source Angel Avadí 2014
  Waste copper wire at end of life
  production volume 2.0202e7 kg; = ABS(prod_vol*copper_s/plant)
    Calculated from production volume of reference product using the relative outputs.
  property price 2.84 EUR2005; name copper_s_price_EUR2005
  properties: dry mass 1 kg, wet mass 1 kg
- wire drawing, copper: 0.356546 kg; = copper_wire_use; source Angel Avadí 2014
  Copper wire for construction/maintenance consumed per t of processed raw material. Lifespan of plant: 30 years.
- building, hall, steel construction: 0.0914221 m2; source Angel Avadí 2014; triangular min 0.08, mostLikely 0.0914221, max 1.39, pedigree (3,3,3,5,1)
  Plant building
  Uncertainty: Data from 1 plant, assumptions for larger plants
- copper: 0.356546 kg; = copper_wire_use; source Angel Avadí 2014
  (same comment as for wire drawing, copper)
  properties: wet mass 1 kg, dry mass 1 kg
- steel, chromium steel 18/8: 0.0731376 kg; name chromium; source Angel Avadí 2014; triangular min 0.06, mostLikely 0.0731376, max 1.11, pedigree (3,3,3,5,1)
  Metal carts for tunnels
  Uncertainty: Data from 1 plant, assumptions for larger plants
  properties: wet mass 1 kg, dry mass 1 kg, carbon content, fossil 0.0008
  note on carbon content, fossil: Stainless steel model is the grade 304 steel (18/8 stainless, 18% chromium 8% nickel; max. 0.08% C)
- pump, 40W: 0.00014079 unit; source Angel Avadí 2014; triangular min 0.00012, mostLikely 0.00014079, max 0.00222, pedigree (3,3,3,5,1)
  Pumps 160 kW
  Uncertainty: Data from 1 plant, assumptions for larger plants
- tap water: 0 kg; name water; source Avadí, A. 2018; pedigree (1,1,1,1,1)
  Water for maintenance/cleansing
  Uncertainty: It is assumed that 60% of total water consumption is used during processing, and 40% for maintenance/cleaning (http://www.dfo-mpo.gc.ca/Library/273700.pdf)
  property carbon content, fossil 0.00178991; name water_CCF
  properties: wet mass 1 kg, water content 2962.17, dry mass 0.000337476 kg
  note on carbon content, fossil: Bicarbonate content is 2.93 mol/m3. CO2 content is 0.1 mol/m3 (ecoinvent v2.2 report 8, Tab 93.1).
- metal working, average for chromium steel product manufacturing: 0.0731376 kg; source Angel Avadí 2014; triangular min 0.06, mostLikely 0.0731376, max 1.11, pedigree (3,3,3,5,1)
  Construction of metal carts for tunnels
  Uncertainty: Data from 1 plant, assumptions for larger plants
- used insulation spiral-seam duct rockwool, DN 400: -0.356546 m; name insul_s; = (insulation)*-1; source Angel Avadí 2014
  Used insulation
  production volume 2.0202e7 m; = ABS(prod_vol*insul_s/plant)
    Calculated from production volume of reference product using the relative outputs.
  property price 0 EUR2005; name insul_s_price_EUR2005
  properties: wet mass 3.3 kg, dry mass 3.3 kg, carbon content, fossil 0.0107327
- waste plastic, mixture: 0 kg; name plastic_s; source Angel Avadí 2014
  Waste plastic at end of life
  production volume 0 kg
    Calculated from production volume of reference product using the relative outputs.
  property price 0 EUR2005; name plastic_s_price_EUR2005
  properties: dry mass 1 kg, carbon content, fossil 0.446018, wet mass 1 kg
- generator, 200kW electrical: 7.04864e-5 unit; source Angel Avadí 2014; triangular min 6.01e-5, mostLikely 7.04864e-5, max 0.00111, pedigree (3,3,3,5,1)
  Electric generator 400 kW
  Uncertainty: Data from 1 plant, assumptions for larger plants
- glass wool mat: 0.356546 kg; name insulation; source Angel Avadí 2014; triangular min 0.3, mostLikely 0.356546, max 5.56, pedigree (3,3,3,5,1)
  Insulation
  Uncertainty: Data from 1 plant, assumptions for larger plants
  properties: wet mass 1 kg, dry mass 1 kg, carbon content, fossil 0.0107327
  note on carbon content, fossil: A share of 16 w-% for the binders is taken into account. The binder used in this study is a mixture of phenol, formaldehyde and urea resins (ecoinvent v2.2 report 16_part XIV), and the C content was calculated as a weigthed average of phenol, formaldehyde and urea C content.
- glass fibre reinforced plastic, polyamide, injection moulded: 0.0182844 kg; name plastic; source Angel Avadí 2014; triangular min 0.0182844, mostLikely 0.0182844, max 0.0182844, pedigree (3,3,3,5,1)
  Plastic crates
  Uncertainty: Data from 1 plant, assumptions for larger plants
  properties: carbon content, fossil 0.446018, dry mass 1 kg, wet mass 1 kg
- scrap steel: 0 kg; name chromium_s; source Angel Avadí 2014
  Representing waste chromium steel
  production volume 0 kg
    Calculated from production volume of reference product using the relative outputs.
  property price 0 EUR2005; name chromium_s_price_EUR2005
  properties: wet mass 1 kg, dry mass 1 kg
- tap water: 1.57699 kg; source Avadí, A. 2018; triangular min 1.57699, mostLikely 1.57699, max 1.57699, pedigree (3,3,5,3,3)
  (same comment as for tap water)
  properties: wet mass 1 kg, water content 2962.17, carbon content, fossil 0.00178991, dry mass 0.000337476 kg
- tap water: 561.578 kg; source Avadí, A. 2018; triangular min 561.578, mostLikely 561.578, max 561.578, pedigree (3,3,5,3,3)
  (same comment as for tap water)
- tap water: 13.1009 kg; source Avadí, A. 2018; triangular min 13.1009, mostLikely 13.1009, max 13.1009, pedigree (3,3,5,3,3)
  (same comment as for tap water)
- tap water: 2.60624 kg; source Avadí, A. 2018; triangular min 2.60624, mostLikely 2.60624, max 2.60624, pedigree (3,3,5,3,3)
  (same comment as for tap water)
- tap water: 65.719 kg; source Avadí, A. 2018; triangular min 65.719, mostLikely 65.719, max 65.719, pedigree (3,3,5,3,3)
  (same comment as for tap water)
- tap water: 4.86311 kg; source Avadí, A. 2018; triangular min 4.86311, mostLikely 4.86311, max 4.86311, pedigree (3,3,5,3,3)
  (same comment as for tap water)
- tap water: 752.056 kg; source Avadí, A. 2018; triangular min 752.056, mostLikely 752.056, max 752.056, pedigree (3,3,5,3,3)
  (same comment as for tap water)
- waste plastic, mixture: -0.0020332, -0.000135851, -1.02742e-5, -5.61112e-5, -5.32829e-5, -0.00176214, -0.0142335 kg (7 entries); source Angel Avadí 2014
  Waste plastic at end of life
  production volume 1.036e6 kg
- scrap steel: -9.23475e-5, -0.0730453 kg (2 entries); source Angel Avadí 2014
  Representing waste chromium steel
  production volume 4.144e6 kg

## Sampling procedure
Data from one plant were extrapolated on the basis of built area and processing capacity to represent any plant of the same type, regardless of size.

## Extrapolations
Extrapolation to GLO based on the fact that the current technology is rather common in the world.
