# treatment of waste paperboard, sanitary landfill

Dataset: EcoSpold 2, unit process
Geography: CH
Time period: 1994-01-01 to 2019-12-31
Technology level: current
Classification: ISIC rev.4 ecoinvent: 3821:Treatment and disposal of non-hazardous waste
Classification: EcoSpold01Categories: waste management/sanitary landfill
Tags: Treatment; ConvertedDataset
Scenario: Business-as-Usual
System model: Allocation at the point of substitution
Generated by: Gabor Doka (obsolete)
Published in: Doka G. 2007
Database: ecoinvent
isCopyrightProtected: true
accessRestrictedTo: 1

## General comment
Inventoried waste contains 100% cardboard; .
waste composition (wet, in ppm): upper heating value 17.91 MJ/kg; lower heating value 15.92 MJ/kg; H2O 104370; O 392680; H 57791; C 433270; S 1776.8; N 2583.5; P n.a.; B n.a.; Cl 7173.3; Br n.a.; F n.a.; I n.a.; Ag n.a.; As 1.168; Ba 57.193; Cd 0.93313; Co 0.91806; Cr 9.2403; Cu 35.113; Hg 0.30131; Mn 95.196; Mo n.a.; Ni 10.64; Pb 28.963; Sb 0.0046044; Se 3.1073; Sn 6.7521; V n.a.; Zn 63.333; Be 1.1299; Sc n.a.; Sr 45.009; Ti n.a.; Tl n.a.; W n.a.; Si n.a.; Fe n.a.; Ca n.a.; Al n.a.; K n.a.; Mg n.a.; Na n.a.;
Share of carbon in waste that is biogenic 100%.
Overall degradability of waste during 100 years: 32.44%.
[This dataset was already contained in the ecoinvent database version 2. It was not individually updated during the transfer to ecoinvent version 3. Life Cycle Impact Assessment results may still have changed, as they are affected by changes in the supply chain, i.e. in other datasets. This dataset was generated following the ecoinvent quality guidelines for version 2. It may have been subject to central changes described in the ecoinvent version 3 change report (http://www.ecoinvent.org/database/ecoinvent-version-3/reports-of-changes/), and the results of the central updates were reviewed extensively. The changes added e.g. consistent water flows and other information throughout the database. The documentation of this dataset can be found in the ecoinvent reports of version 2, which are still available via the ecoinvent website. The change report linked above covers all central changes that were made during the conversion process.]

## Included activities end
Waste-specific short-term emissions to air via landfill gas incineration and landfill leachate. Burdens from treatment of short-term leachate (0-100a) in wastewater treatment plant (including WWTP sludge disposal in municipal incinerator). Long-term emissions from landfill to groundwater (after base lining failure).

## Geography
Technology encountered in Switzerland in 2000. Landfill includes base seal, leachate collection system, treatment of leachate in municipal wastewater treatment plant.

## Technology
Swiss municipal sanitary landfill for biogenic or untreated municipal waste ('reactive organic landfill'). Landfill gas and leachate collection system. Recultivation and monitoring for 150 years after closure.

## Reference product
- waste paperboard: -1 kg; CPC 39240: Waste and scrap of paper or paperboard; By-product classification Waste
  production volume 0 kg
    Estimated value. It is assumed that all paper and carton are either recycled or incinerated. Source:
    BAFU (2012) Combustible waste and MSWI capacity 1996 - 2010. Retrieved from: <http://www.bafu.admin.ch/abfall/01517/01519/01524/index.html?lang=en>, accessed 9th of May 2016.
  property carbon content, non-fossil 0.483259
    C content was calculated for 1 kg DM, using data in Tab A.3, ecoinvent v2.2 report 13_I.
  property price 0 EUR2005
    Waste products are assigned a price of zero as they are assumed to require further treatment.
  property carbon content 0.483259
    carbon content on a dry matter basis (reserved; not for manual entry)
  properties: wet mass 1 kg, water content 0.243781, dry mass 0.804 kg, carbon content, fossil 0, water in wet mass 0.196 kg, carbon allocation 0.38854 kg

## By-products
- electricity, for reuse in municipal waste incineration only: 0 kWh; CPC 17100: Electrical energy; By-product classification allocatable product; pedigree (1,1,1,1,1)
  Net electricity generated from this waste and used in internal MSWI plant energy redistribution.
  Uncertainty: uncertainty is calculated from uncertainties in waste composition and uncertainties in energy efficiency and the uncertainty in internal energy demand
  property exergy 3.6 MJ; name E_el_prod_MSWI_exergy
  property true value relation 3.6; name E_el_prod_MSWI_true_value_relation
  property price 0.1 EUR2005; name E_el_prod_MSWI_price_EUR2005
- heat, for reuse in municipal waste incineration only: 0 MJ; CPC 17300: Steam and hot water; By-product classification allocatable product; pedigree (1,1,1,1,1)
  Net useful heat generated from this waste and used in internal MSWI plant energy redistribution.
  Uncertainty: uncertainty is calculated from uncertainties in waste composition and uncertainties in energy efficiency and the uncertainty in internal energy demand
  property exergy 0.1842 MJ; name E_th_prod_MSWI_exergy
  property true value relation 0.1842; name E_th_prod_MSWI_true_value_relation
  property price 0.0106 EUR2005; name E_th_prod_MSWI_price_EUR2005
- zinc concentrate: 0 kg; CPC 14290: Other non-ferrous metal ores and concentrates (other than uranium or thorium ores and concentrates); By-product classification allocatable product
  Calculated value from the knowledge of the properties of both products.
  property price 0.38 EUR2005; name ByP_price_EUR2005
    Temporary price data. Calculated as 90% of purchasers price based on: Zinc content in concentrate 53%. Concentrate price per kg Zn 86.5% of refined Zn price (13.5% treatment charges according to CHR Metals Limited 2005: Dynamic cost curves. http://www.minecost.com/dynamic.pdf). 2004 zinc price from USGS (2007) Mineral commodity summaries 2007. <http://minerals.usgs.gov/minerals/pubs/mcs/2007/mcs2007.pdf> [Accessed 25 May 2010]
  property zinc content 0.53; name zinc_C_zinc_concentrate
    Zinc content on a dry matter basis. Value taken from teh "zinc mine operation" /GLO dataset.
  property dry mass 1 kg; name DM_zinc_concentrate
  property carbon content 0
    carbon content on a dry matter basis (reserved; not for manual entry)
  properties: wet mass 1 kg, water content 0, carbon content, non-fossil 0, carbon content, fossil 0, water in wet mass 0 kg, carbon allocation 0 kg

## Inputs from technosphere
- process-specific burdens, municipal waste incineration: 0.00252 kg; lognormal variance with pedigree 0.35, pedigree (1,1,5,1,1)
  Burden from incineration of sludge from wastewater treatment of the short-term leachate (0-100a).
  Burden from incineration of sludge from wastewater treatment of the short-term leachate (0-100a).;activityLink introduced to establish a direct link to the corresponding regional supply of this product
- ammonia, liquid: 2.94e-6 kg; lognormal variance with pedigree 0.48, pedigree (1,1,5,1,1)
  burden from incineration of sludge from wastewater treatment of the short-term leachate (0-100a). uncertainty is calculated from uncertainties in waste composition and transfer coefficients in incinerator and uncertainty of waste decomposition and short-term leaching in sanitary landfill
  properties: wet mass 1 kg, dry mass 1 kg
- titanium dioxide: 8.43e-8 kg; lognormal variance with pedigree 0.72, pedigree (1,1,5,1,1)
  (same comment as for ammonia, liquid)
  properties: wet mass 1 kg, dry mass 1 kg
- hydrochloric acid, without water, in 30% solution state: 7.64e-10 kg; lognormal variance with pedigree 0.55, pedigree (1,1,5,1,1)
  (same comment as for ammonia, liquid)
  properties: wet mass 1 kg, dry mass 1 kg
- process-specific burdens, slag landfill: 4.8e-5 kg; lognormal variance with pedigree 0.56, pedigree (1,1,5,1,1)
  burden from incineration of sludge from wastewater treatment of the short-term leachate (0-100a). uncertainty is calculated from uncertainties in waste composition and transfer coefficients in incinerator and uncertainty of waste decomposition and short-term leaching in sanitary landfill;activityLink introduced to establish a direct link to the corresponding regional supply of this product
- cement, unspecified: 3.77e-6 kg; lognormal variance with pedigree 0.41, pedigree (1,1,5,1,1)
  (same comment as for ammonia, liquid)
  properties: dry mass 1 kg, wet mass 1 kg
- chemical, inorganic: 1.27e-9 kg; lognormal variance with pedigree 0.55, pedigree (1,1,5,1,1)
  (same comment as for ammonia, liquid)
  properties: carbon content, fossil 0.003, wet mass 1 kg, dry mass 1 kg
  note on carbon content, fossil: This dataset is an unweighted average of 20 inorganic substances (listed in Tab 88.1, ecoinvent v2.2 report 8, part II), being part of the top100 chemicals included in this database. The C-content has also been calculated as an unweighted average of the C content of the substances composing this dataset.
- chromium oxide, flakes: 1.72e-9 kg; lognormal variance with pedigree 0.83, pedigree (5,5,5,5,5)
  burden from incineration of sludge from wastewater treatment of the short-term leachate (0-100a). Proxy for vanadium pentoxide V2O5 in SCR catalyst, uncertainty calculated from uncertainty in average DeNOx input, uncertainty in the share of thermal NOx, uncertainty of nitrogen content in average municipal waste and the unertainty in nitrogen content in *this* waste and uncertainty of waste decomposition and short-term leaching in sanitary landfill
  properties: dry mass 1 kg, wet mass 1 kg
- heat, central or small-scale, other than natural gas: 0.00015322 MJ; lognormal variance with pedigree 0.54, pedigree (5,5,5,5,5)
  burden from wastewater treatment of the short-term leachate (0-100a). Uncertainty calculated from unertainty of the waste composition of this waste, uncertainty in waste decomposition and short-term leaching in sanitary landfill
- heat, district or industrial, natural gas: 0.0004695 MJ; lognormal variance with pedigree 0.54, pedigree (5,5,5,5,5)
  (same comment as for ammonia, liquid)
- slag landfill: 8.52e-14 unit; lognormal variance with pedigree 0.56, pedigree (1,1,5,1,1)
  (same comment as for ammonia, liquid)
- sanitary landfill facility: 5.56e-10 unit; lognormal variance with pedigree 0.04, pedigree (1,1,5,1,1)
  demands per kilogram waste. uncertainty is heeded in the module
  This exchange has an activity link directly to the producing activity because the product is primarily consumed in the same geographical area where it is produced.
- waste graphical paper: -3.88e-5 kg; lognormal variance with pedigree 0.2106, pedigree (5,5,5,5,5)
  (same comment as for heat, central or small-scale, other than natural gas)
  production volume 0 kg
    Calculated from the production volume of waste packaging cardboard, 19.6% water in proportion to the respective output amounts.
  properties: wet mass 1 kg, dry mass 0.888 kg, water content 0.126126, carbon content, non-fossil 0.454955
- municipal waste incineration facility: 6.31e-13 unit; lognormal variance with pedigree 0.35, pedigree (1,1,5,1,1)
  Burden from incineration of sludge from wastewater treatment of the short-term leachate (0-100a).
  Burden from incineration of sludge from wastewater treatment of the short-term leachate (0-100a).
- waste cement, hydrated: -9.42e-6 kg; lognormal variance with pedigree 0.41, pedigree (1,1,5,1,1)
  (same comment as for ammonia, liquid)
  production volume 0 kg
    (same comment as for waste graphical paper)
  properties: dry mass 1 kg, wet mass 1 kg
- process-specific burdens, residual material landfill: 9.42e-6 kg; lognormal variance with pedigree 0.41, pedigree (1,1,5,1,1)
  (same comment as for process-specific burdens, slag landfill)
- electricity, low voltage: 0.0123 kWh; lognormal variance with pedigree 0.41, pedigree (5,5,5,5,5)
  (same comment as for heat, central or small-scale, other than natural gas)
- wastewater treatment facility, capacity 5E9l/year: 1.42e-11 unit; lognormal variance with pedigree 0.2106, pedigree (5,5,5,5,5)
  (same comment as for heat, central or small-scale, other than natural gas)
- iron (III) chloride, without water, in 40% solution state: 1.89e-7 kg; lognormal variance with pedigree 0.68, pedigree (1,1,5,1,1)
  (same comment as for ammonia, liquid)
  properties: dry mass 1 kg, wet mass 1 kg
- sodium hydroxide, without water, in 50% solution state: 1.46e-7 kg; lognormal variance with pedigree 0.4, pedigree (1,1,5,1,1)
  (same comment as for ammonia, liquid)
  properties: wet mass 1 kg, dry mass 1 kg
- chemical, organic: 9.58e-8 kg; lognormal variance with pedigree 1.56, pedigree (1,1,5,1,1)
  (same comment as for ammonia, liquid)
  properties: dry mass 1 kg, wet mass 1 kg, carbon content, fossil 0.628
  note on carbon content, fossil: This dataset is an unweighted average of 20 organic substances (listed in Tab 88.1, ecoinvent v2.2 report 8, part II), being part of the top100 chemicals included in this database. The C-content has also been calculated as an unweighted average of the C content of the substances composing this dataset.
- residual material landfill: 1.96e-14 unit; lognormal variance with pedigree 0.41, pedigree (1,1,5,1,1)
  (same comment as for ammonia, liquid)
- sewer grid, 5E9l/year, 110 km: 5.45e-10 km; lognormal variance with pedigree 0.2106, pedigree (5,5,5,5,5)
  (same comment as for heat, central or small-scale, other than natural gas)
- electricity, for reuse in municipal waste incineration only: 0.000363 kWh; name E_el_prod_MSWI; lognormal variance with pedigree 0.73, pedigree (1,1,5,1,1)
  (same comment as for ammonia, liquid)
- process-specific burdens, sanitary landfill: 1 kg; lognormal variance with pedigree 0.04, pedigree (1,1,5,1,1)
  demands per kilogram waste. uncertainty is heeded in the module;activityLink introduced to establish a direct link to the corresponding regional supply of this product
- heat, for reuse in municipal waste incineration only: 0.00212 MJ; name E_th_prod_MSWI; lognormal variance with pedigree 0.36, pedigree (1,1,5,1,1)
  (same comment as for ammonia, liquid)
- quicklime, milled, packed: 2.65e-8 kg; lognormal variance with pedigree 0.41, pedigree (1,1,5,1,1)
  (same comment as for ammonia, liquid)
  properties: wet mass 1 kg, water content 0.010101, dry mass 0.99 kg
- waste plastic, mixture: -3.88e-5 kg; lognormal variance with pedigree 0.2106, pedigree (5,5,5,5,5)
  (same comment as for heat, central or small-scale, other than natural gas)
  production volume 0 kg
    (same comment as for waste graphical paper)
  properties: dry mass 0.847 kg, water content 0.180638, carbon content, fossil 0.747344, wet mass 1 kg
  note on carbon content, fossil: C content in 1 kg DM was calculated using data in Tab A.2, ecoinvent v2.2 report 13_I

## Emissions to nature
- Cobalt [air, non-urban air or from high stacks]: 2.39e-11 kg; lognormal variance with pedigree 2.76, pedigree (1,1,5,1,1)
  burden from direct release or incineration of landfill biogas. Uncertainty calculated from unertainty of the waste composition of this waste, uncertainty in waste decomposition and short-term leaching in sanitary landfill
- NMVOC, non-methane volatile organic compounds, unspecified origin [air, non-urban air or from high stacks]: 3.77e-7 kg; lognormal variance with pedigree 0.14, pedigree (1,1,5,1,1)
  (same comment as for Cobalt)
- Hydrogen chloride [air, non-urban air or from high stacks]: 8.45e-5 kg; lognormal variance with pedigree 0.8, pedigree (1,1,5,1,1)
  (same comment as for Cobalt)
- Manganese [water, ground-, long-term]: 7.35e-5 kg; lognormal variance with pedigree 0.79, pedigree (1,1,5,1,1)
  Emissions from long-term leachate (>100a) directly from MSW landfill and indirectly via incineration of treatement sludge from leachate treatement. Uncertainty calculated depending on waste input and uncertainty of long-term transfer coefficents in landfill.
- Barium [water, ground-, long-term]: 5.37e-5 kg; lognormal variance with pedigree 0.76, pedigree (1,1,5,1,1)
  (same comment as for Manganese)
- Tin, ion [water, surface water]: 5.4e-9 kg; lognormal variance with pedigree 1.93, pedigree (1,1,5,1,1)
  Emissions from short-term leachate treatment and incineration of resulting sludge. Uncertainty calculated depending on waste input and uncertainty of transfer coefficents in landfill, wastewater treatment and incineration model.
- Lead [air, urban air close to ground]: 1.83e-12 kg; lognormal variance with pedigree 1.8, pedigree (1,1,5,1,1)
  (same comment as for Tin, ion)
- TOC, Total Organic Carbon [water, surface water]: 0.000653 kg; lognormal variance with pedigree 0.43, pedigree (1,1,5,1,1)
  (same comment as for Tin, ion)
- Zinc [air, urban air close to ground]: 1.1e-11 kg; lognormal variance with pedigree 1.44, pedigree (1,1,5,1,1)
  (same comment as for Tin, ion)
- Cadmium [air, non-urban air or from high stacks]: 3.55e-10 kg; lognormal variance with pedigree 2.4, pedigree (1,1,5,1,1)
  (same comment as for Cobalt)
- Chloride [water, surface water]: 0.00586 kg; lognormal variance with pedigree 0.45, pedigree (1,1,5,1,1)
  Emissions from short-term leachate treatment. Uncertainty calculated depending on waste input and uncertainty of transfer coefficents in landfill and wastewater treatment.
- Nitrite [water, ground-, long-term]: 1.09e-5 kg; lognormal variance with pedigree 0.62, pedigree (1,1,5,1,1)
  (same comment as for Manganese)
- Mercury [water, surface water]: 2.12e-9 kg; lognormal variance with pedigree 2.04, pedigree (1,1,5,1,1)
  (same comment as for Tin, ion)
- Arsenic, ion [water, ground-, long-term]: 1.11e-6 kg; lognormal variance with pedigree 1.57, pedigree (1,1,5,1,1)
  (same comment as for Manganese)
- Methane, non-fossil [air, urban air close to ground]: 2.3e-5 kg; lognormal variance with pedigree 0.49, pedigree (1,1,5,1,1)
  (same comment as for Tin, ion)
- COD, Chemical Oxygen Demand [water, ground-, long-term]: 0.0821 kg; lognormal variance with pedigree 0.63, pedigree (1,1,5,1,1)
  (same comment as for Manganese)
- Methane, non-fossil [air, non-urban air or from high stacks]: 0.054 kg; lognormal variance with pedigree 0.14, pedigree (1,1,5,1,1)
  (same comment as for Cobalt)
- Cobalt [air, urban air close to ground]: 1.5e-15 kg; lognormal variance with pedigree 1.86, pedigree (1,1,5,1,1)
  (same comment as for Tin, ion)
- COD, Chemical Oxygen Demand [water, surface water]: 0.00258 kg; lognormal variance with pedigree 0.43, pedigree (1,1,5,1,1)
  (same comment as for Tin, ion)
- Nickel [air, non-urban air or from high stacks]: 5.02e-11 kg; lognormal variance with pedigree 2.66, pedigree (1,1,5,1,1)
  (same comment as for Cobalt)
- Arsenic, ion [water, surface water]: 6e-8 kg; lognormal variance with pedigree 1.76, pedigree (1,1,5,1,1)
  (same comment as for Tin, ion)
- Strontium [air, non-urban air or from high stacks]: 2.12e-10 kg; lognormal variance with pedigree 2.46, pedigree (1,1,5,1,1)
  (same comment as for Cobalt)
- Dinitrogen monoxide [air, urban air close to ground]: 5.15e-6 kg; lognormal variance with pedigree 0.35, pedigree (1,1,5,1,1)
  (same comment as for Tin, ion)
- Arsenic [air, non-urban air or from high stacks]: 9.54e-10 kg; lognormal variance with pedigree 2.27, pedigree (1,1,5,1,1)
  (same comment as for Cobalt)
- Beryllium [water, surface water]: 1.08e-8 kg; lognormal variance with pedigree 1.88, pedigree (1,1,5,1,1)
  (same comment as for Tin, ion)
- Zinc, ion [water, surface water]: 3.01e-7 kg; lognormal variance with pedigree 1.38, pedigree (1,1,5,1,1)
  (same comment as for Tin, ion)
- Beryllium [air, non-urban air or from high stacks]: 5.33e-12 kg; lognormal variance with pedigree 2.95, pedigree (1,1,5,1,1)
  (same comment as for Cobalt)
- Ammonium, ion [water, surface water]: 0.00101 kg; lognormal variance with pedigree 0.41, pedigree (1,1,5,1,1)
  (same comment as for Tin, ion)
- Nitrogen [water, surface water]: 2.75e-5 kg; lognormal variance with pedigree 0.37, pedigree (1,1,5,1,1)
  (same comment as for Tin, ion)
- Cadmium, ion [water, surface water]: 2.7e-8 kg; lognormal variance with pedigree 1.79, pedigree (1,1,5,1,1)
  (same comment as for Tin, ion)
- Sulfur dioxide [air, non-urban air or from high stacks]: 7.52e-5 kg; lognormal variance with pedigree 0.9, pedigree (1,1,5,1,1)
  (same comment as for Cobalt)
- Nitrogen oxides [air, urban air close to ground]: 1.83e-5 kg; lognormal variance with pedigree 0.39, pedigree (1,1,5,1,1)
  (same comment as for Tin, ion)
- Nickel, ion [water, ground-, long-term]: 1.05e-5 kg; lognormal variance with pedigree 1.29, pedigree (1,1,5,1,1)
  (same comment as for Manganese)
- Chromium, ion [water, surface water]: 5.36e-11 kg; lognormal variance with pedigree 1.84, pedigree (1,1,5,1,1)
  (same comment as for Tin, ion)
- Cobalt [water, surface water]: 4.86e-8 kg; lognormal variance with pedigree 1.73, pedigree (1,1,5,1,1)
  (same comment as for Tin, ion)
- Mercury [air, urban air close to ground]: 1.13e-14 kg; lognormal variance with pedigree 2.09, pedigree (1,1,5,1,1)
  (same comment as for Tin, ion)
- Chloride [water, ground-, long-term]: 0.00123 kg; lognormal variance with pedigree 0.47, pedigree (1,1,5,1,1)
  (same comment as for Manganese)
- Antimony [air, urban air close to ground]: 7.76e-15 kg; lognormal variance with pedigree 2.83, pedigree (1,1,5,1,1)
  (same comment as for Tin, ion)
- Beryllium [water, ground-, long-term]: 1.12e-6 kg; lognormal variance with pedigree 1.58, pedigree (1,1,5,1,1)
  (same comment as for Manganese)
- Barium [air, non-urban air or from high stacks]: 5.31e-9 kg; lognormal variance with pedigree 2.04, pedigree (1,1,5,1,1)
  (same comment as for Cobalt)
- Nickel, ion [water, surface water]: 1.22e-7 kg; lognormal variance with pedigree 1.59, pedigree (1,1,5,1,1)
  (same comment as for Tin, ion)
- DOC, Dissolved Organic Carbon [water, ground-, long-term]: 0.075 kg; lognormal variance with pedigree 0.63, pedigree (1,1,5,1,1)
  (same comment as for Manganese)
- Cadmium [air, urban air close to ground]: 1.46e-12 kg; lognormal variance with pedigree 1.85, pedigree (1,1,5,1,1)
  (same comment as for Tin, ion)
- NMVOC, non-methane volatile organic compounds, unspecified origin [air, urban air close to ground]: 1.05e-7 kg; lognormal variance with pedigree 0.6, pedigree (1,1,5,1,1)
  (same comment as for Tin, ion)
- Nickel [air, urban air close to ground]: 3.41e-15 kg; lognormal variance with pedigree 1.7, pedigree (1,1,5,1,1)
  (same comment as for Tin, ion)
- BOD5, Biological Oxygen Demand [water, ground-, long-term]: 0.0194 kg; lognormal variance with pedigree 0.63, pedigree (1,1,5,1,1)
  (same comment as for Manganese)
- Arsenic [air, urban air close to ground]: 1.92e-11 kg; lognormal variance with pedigree 1.8, pedigree (1,1,5,1,1)
  (same comment as for Tin, ion)
- Hydrogen sulfide [water, ground-, long-term]: 0.000111 kg; lognormal variance with pedigree 0.62, pedigree (1,1,5,1,1)
  (same comment as for Manganese)
- BOD5, Biological Oxygen Demand [water, surface water]: 0.000812 kg; lognormal variance with pedigree 0.44, pedigree (1,1,5,1,1)
  (same comment as for Tin, ion)
- Chromium VI [water, ground-, long-term]: 4.35e-8 kg; lognormal variance with pedigree 8.6, pedigree (1,1,5,1,1)
  (same comment as for Manganese)
- Strontium [air, urban air close to ground]: 4.18e-11 kg; lognormal variance with pedigree 1.46, pedigree (1,1,5,1,1)
  (same comment as for Tin, ion)
- Ammonia [air, urban air close to ground]: 1.87e-6 kg; lognormal variance with pedigree 0.4, pedigree (1,1,5,1,1)
  (same comment as for Tin, ion)
- Manganese [air, urban air close to ground]: 9.48e-14 kg; lognormal variance with pedigree 1.18, pedigree (1,1,5,1,1)
  (same comment as for Tin, ion)
- Carbon dioxide, non-fossil [air, non-urban air or from high stacks]: 0.352 kg; lognormal variance with pedigree 0.1, pedigree (1,1,5,1,1)
  (same comment as for Cobalt)
- Nitrate [water, ground-, long-term]: 2.31e-5 kg; lognormal variance with pedigree 0.54, pedigree (1,1,5,1,1)
  (same comment as for Manganese)
- Tin, ion [water, ground-, long-term]: 6.74e-6 kg; lognormal variance with pedigree 1.36, pedigree (1,1,5,1,1)
  (same comment as for Manganese)
- Antimony [air, non-urban air or from high stacks]: 3.94e-14 kg; lognormal variance with pedigree 3.24, pedigree (1,1,5,1,1)
  (same comment as for Cobalt)
- Chromium [air, non-urban air or from high stacks]: 8.54e-12 kg; lognormal variance with pedigree 2.89, pedigree (1,1,5,1,1)
  (same comment as for Cobalt)
- Copper [air, non-urban air or from high stacks]: 1.59e-11 kg; lognormal variance with pedigree 2.8, pedigree (1,1,5,1,1)
  (same comment as for Cobalt)
- Selenium [air, non-urban air or from high stacks]: 2.66e-11 kg; lognormal variance with pedigree 2.74, pedigree (1,1,5,1,1)
  (same comment as for Cobalt)
- Sulfate [water, surface water]: 0.000656 kg; lognormal variance with pedigree 0.73, pedigree (1,1,5,1,1)
  (same comment as for Chloride)
- Particulates, < 2.5 um [air, non-urban air or from high stacks]: 6.7e-6 kg; lognormal variance with pedigree 0.4, pedigree (1,1,5,1,1)
  (same comment as for Cobalt)
- Copper, ion [water, surface water]: 1.45e-8 kg; lognormal variance with pedigree 1.73, pedigree (1,1,5,1,1)
  (same comment as for Tin, ion)
- Nitrogen, organic bound [water, ground-, long-term]: 0.000327 kg; lognormal variance with pedigree 0.62, pedigree (1,1,5,1,1)
  (same comment as for Manganese)
- Lead [air, non-urban air or from high stacks]: 1.85e-11 kg; lognormal variance with pedigree 2.79, pedigree (1,1,5,1,1)
  (same comment as for Cobalt)
- Copper, ion [water, ground-, long-term]: 3.51e-5 kg; lognormal variance with pedigree 1.14, pedigree (1,1,5,1,1)
  (same comment as for Manganese)
- Mercury [air, non-urban air or from high stacks]: 2.68e-9 kg; lognormal variance with pedigree 2.14, pedigree (1,1,5,1,1)
  (same comment as for Cobalt)
- Lead [water, ground-, long-term]: 2.89e-5 kg; lognormal variance with pedigree 1.17, pedigree (1,1,5,1,1)
  (same comment as for Manganese)
- Tin [air, non-urban air or from high stacks]: 3.23e-12 kg; lognormal variance with pedigree 3.02, pedigree (1,1,5,1,1)
  (same comment as for Cobalt)
- Zinc, ion [water, ground-, long-term]: 5.15e-5 kg; lognormal variance with pedigree 1.07, pedigree (1,1,5,1,1)
  (same comment as for Manganese)
- Tin [air, urban air close to ground]: 9.96e-12 kg; lognormal variance with pedigree 1.97, pedigree (1,1,5,1,1)
  (same comment as for Tin, ion)
- Lead [water, surface water]: 6.09e-9 kg; lognormal variance with pedigree 1.74, pedigree (1,1,5,1,1)
  (same comment as for Tin, ion)
- Strontium [water, ground-, long-term]: 4.46e-5 kg; lognormal variance with pedigree 1.09, pedigree (1,1,5,1,1)
  (same comment as for Manganese)
- Nitrate [water, surface water]: 0.0037 kg; lognormal variance with pedigree 0.36, pedigree (1,1,5,1,1)
  (same comment as for Tin, ion)
- Sulfate [water, ground-, long-term]: 0.00426 kg; lognormal variance with pedigree 0.62, pedigree (1,1,5,1,1)
  (same comment as for Manganese)
- Mercury [water, ground-, long-term]: 2.92e-7 kg; lognormal variance with pedigree 1.76, pedigree (1,1,5,1,1)
  (same comment as for Manganese)
- TOC, Total Organic Carbon [water, ground-, long-term]: 0.075 kg; lognormal variance with pedigree 0.63, pedigree (1,1,5,1,1)
  (same comment as for Manganese)
- Selenium [air, urban air close to ground]: 0 kg; pedigree (1,1,1,1,1)
  (same comment as for Tin, ion)
- Beryllium [air, urban air close to ground]: 1.05e-11 kg; lognormal variance with pedigree 1.93, pedigree (1,1,5,1,1)
  (same comment as for Tin, ion)
- Chromium [air, urban air close to ground]: 1.24e-15 kg; lognormal variance with pedigree 1.92, pedigree (1,1,5,1,1)
  (same comment as for Tin, ion)
- Carbon monoxide, non-fossil [air, urban air close to ground]: 7.57e-6 kg; lognormal variance with pedigree 0.5, pedigree (1,1,5,1,1)
  (same comment as for Tin, ion)
- Strontium [water, surface water]: 4.31e-7 kg; lognormal variance with pedigree 1.4, pedigree (1,1,5,1,1)
  (same comment as for Tin, ion)
- Selenium [water, surface water]: 7.1e-8 kg; lognormal variance with pedigree 1.69, pedigree (1,1,5,1,1)
  (same comment as for Tin, ion)
- Cyanide [air, urban air close to ground]: 5.25e-8 kg; lognormal variance with pedigree 0.49, pedigree (1,1,5,1,1)
  (same comment as for Tin, ion)
- Ammonium, ion [water, ground-, long-term]: 0.0002 kg; lognormal variance with pedigree 0.62, pedigree (1,1,5,1,1)
  (same comment as for Manganese)
- Antimony [water, surface water]: 1.07e-10 kg; lognormal variance with pedigree 2.19, pedigree (1,1,5,1,1)
  (same comment as for Tin, ion)
- Barium [air, urban air close to ground]: 2e-8 kg; lognormal variance with pedigree 1.14, pedigree (1,1,5,1,1)
  (same comment as for Tin, ion)
- Antimony [water, ground-, long-term]: 4.96e-10 kg; lognormal variance with pedigree 3.19, pedigree (1,1,5,1,1)
  (same comment as for Manganese)
- Copper [air, urban air close to ground]: 3.05e-13 kg; lognormal variance with pedigree 1.81, pedigree (1,1,5,1,1)
  (same comment as for Tin, ion)
- Barium [water, surface water]: 1.28e-6 kg; lognormal variance with pedigree 1.13, pedigree (1,1,5,1,1)
  (same comment as for Tin, ion)
- Carbon dioxide, non-fossil [air, urban air close to ground]: 0.0118 kg; lognormal variance with pedigree 0.43, pedigree (1,1,5,1,1)
  (same comment as for Tin, ion)
- Cobalt [water, ground-, long-term]: 8.64e-7 kg; lognormal variance with pedigree 1.54, pedigree (1,1,5,1,1)
  (same comment as for Manganese)
- DOC, Dissolved Organic Carbon [water, surface water]: 0.000627 kg; lognormal variance with pedigree 0.44, pedigree (1,1,5,1,1)
  (same comment as for Tin, ion)
- Carbon monoxide, non-fossil [air, non-urban air or from high stacks]: 1.99e-5 kg; lognormal variance with pedigree 0.75, pedigree (1,1,5,1,1)
  (same comment as for Cobalt)
- Manganese [water, surface water]: 1.8e-5 kg; lognormal variance with pedigree 1.04, pedigree (1,1,5,1,1)
  (same comment as for Tin, ion)
- Nitrite [water, surface water]: 2.13e-5 kg; lognormal variance with pedigree 0.58, pedigree (1,1,5,1,1)
  (same comment as for Tin, ion)
- Nitrogen oxides [air, non-urban air or from high stacks]: 5.4e-7 kg; lognormal variance with pedigree 0.8, pedigree (1,1,5,1,1)
  (same comment as for Cobalt)
- Chromium VI [water, surface water]: 1.79e-8 kg; lognormal variance with pedigree 1.81, pedigree (1,1,5,1,1)
  (same comment as for Tin, ion)
- Selenium [water, ground-, long-term]: 8.81e-7 kg; lognormal variance with pedigree 1.82, pedigree (1,1,5,1,1)
  (same comment as for Manganese)
- Cadmium, ion [water, ground-, long-term]: 8.8e-7 kg; lognormal variance with pedigree 1.63, pedigree (1,1,5,1,1)
  (same comment as for Manganese)
- Manganese [air, non-urban air or from high stacks]: 8.84e-9 kg; lognormal variance with pedigree 1.97, pedigree (1,1,5,1,1)
  (same comment as for Cobalt)
- Zinc [air, non-urban air or from high stacks]: 2.16e-10 kg; lognormal variance with pedigree 2.46, pedigree (1,1,5,1,1)
  (same comment as for Cobalt)

## Sampling procedure
Landfill model based on observed leachate concentrations in literature. Extrapolated to 60'000 years heeding chemical characteristics. Initial waste composition from various literature sources.

## Extrapolations
This dataset has been extrapolated from year 2000 to the year of the calculation (2019). The uncertainty has been adjusted accordingly.

## Review by Niels Jungbluth 2003-07-21
Passed. Calculation for standard deviation 95 of, i.e., infrastructure,
land occupation, transport services or other services can differ from
standard Pedigree approach used in this project and figures obtained by
this procedure.
