# treatment of waste polyethylene terephthalate, unsanitary landfill, very wet infiltration class (1000mm)

Dataset: EcoSpold 2, unit process
Geography: GLO
Time period: 2006-01-01 to 2019-12-31
Technology level: current
Classification: ISIC rev.4 ecoinvent: 3821:Treatment and disposal of non-hazardous waste
Synonyms: municipal waste landfill
Scenario: Business-as-Usual
System model: Allocation at the point of substitution
Share of production covered: 1 %
Generated by: Avraam Symeonidis
Database: ecoinvent
isCopyrightProtected: true
accessRestrictedTo: 1

## General comment
This dataset represents the activity of waste disposal of waste polyethylene terephtalate in a unsanitary landfill. Recommended use of this dataset: For PET, which goes to disposal as part of managed communal waste mixture. Larger amounts of clean, *already separated* PET could go to recycling, depending on country-specific situation. // Waste composition (wet, in ppm): upper heating value 23.13 MJ/kg; lower heating value 22.95 MJ/kg; H2O 2000; O 368750; H 63380; C 553640; S 147.87; N 6456.8; P n.a.; B n.a.; Cl 788.62; Br 69.004; F 11.829; I n.a.; Ag n.a.; As 1.873; Ba 49.289; Cd 3.2531; Co 31.052; Cr 5.4218; Cu 11.829; Hg 0.08872; Mn 17.744; Mo n.a.; Ni 3.9431; Pb 5.5203; Sb 159.2; Se 2.0701; Sn 0.98577; V 1281.5; Zn 68.676; Be 0.49289; Sc n.a.; Sr 87.241; Ti 985.77; Tl 0.39431; W n.a.; Si n.a.; Fe 98.577; Ca 295.73; Al 197.15; K n.a.; Mg n.a.; Na 1444.7; . // Share of carbon in waste that is biogenic 0%. Share of metals in waste not oxidised and bulk-recyclable (exclude very small or thin parts) Iron: 0%; Alu: 0%; Copper: 0%. Overall degradability of waste during 100 years: 1%.

## Included activities start
from final waste deposition (without transports to the site)

## Included activities end
Waste-specific short-term emissions to air via landfill gas and landfill leachate. Waste-specific long-term emissions from landfill.

## Geography
Given name of landfill location is 'infiltration class 5 very wet (2018)'. Landfill site with mean annual temperature (MAT) of 8 degC, mean annual precipitation (MAP) of 1900 mm/year, and net infiltration of 1000 mm/year.
Climate adjustments result in an alpha t (temperature) for permafrost areas of 0.999. Total climate adjustments with alpha pt of 0.999.

## Technology
This is an inventory for an unsanitary, sub-controlled landfill for municipal solid waste. Ultimate average landfill height is 15 meters. Operation phase duration is 25 years.Percentage of landfill gas directly emitted is 100w%.
Leachate of the landfill is not treated. Based on average waste composition and climate data the end of carbonate phase is estimated to be reached 1733 years after waste deposition.

## Reference product
- waste polyethylene terephthalate: -1 kg; By-product classification Waste; CPC 39270: Waste, parings and scrap of plastics; CAS 25038-59-9; pedigree (1,1,1,1,1)
  main reference product of this activity (supply of disposal service).
  Uncertainty: Uncertainty is not adjusted, as this is the refence product
  production volume 1 kg
    The amount of the annual production volume is a placeholder value. The contribution of this technology to the different local markets can be found in the markets themselves.
  property price 0 EUR2005
    Waste products are assigned a price of zero as they are assumed to require further treatment.
  property carbon content 0.55475
    carbon content on a dry matter basis (reserved; not for manual entry)
  properties: sulfur content 0.00014816, tin content 9.8775e-7, nickel content 3.951e-6, manganese content 1.7779e-5, barium content 4.9387e-5, strontium content 8.7416e-5, heating value, net 22.947 MJ, chromium content 5.4326e-6, vanadium content 0.0012841, hydrogen content 0.063507, cadmium content 3.2596e-6, chlorine content 0.0007902, selenium content 2.0743e-6, heating value, gross 23.126 MJ, cobalt content 3.1114e-5, zinc content 6.8813e-5, nitrogen content 0.0064698, sodium content 0.0014475, water in wet mass 0.002 kg, calcium content 0.00029632, wet mass 1 kg, dry mass 0.998 kg, iron content 9.8775e-5, thallium content 3.951e-7, water content 0.002004, aluminium content 0.00019755, carbon content, fossil 0.55475, titanium content 0.00098775, arsenic content 1.8767e-6, copper content 1.1853e-5, bromine content 6.9142e-5, fluorine content 1.1853e-5, beryllium content 4.9387e-7, mercury content 8.8897e-8, lead content 5.5314e-6, oxygen content 0.36949, antimony content 0.00015952, carbon allocation 0.55364 kg

## Inputs from technosphere
- diesel, burned in building machine: 0.046738 MJ; lognormal variance with pedigree 0.082256, pedigree (1,1,3,1,1)
  for waste distribution and compaction.
  Uncertainty: Uncertainty calculated from uncertainty in base parameters.
- excavation, skid-steer loader: 0.00031708 m3; lognormal variance with pedigree 0.082256, pedigree (1,1,3,1,1)
  application of daily cover.
  Uncertainty: Uncertainty calculated from uncertainty in base parameters.

## Emissions to nature
- Copper, ion [water, ground-, long-term]: 1.1829e-5 kg; lognormal variance with pedigree 0.31342, pedigree (1,1,3,1,1)
  Emissions from long-term leachate (>100a) directly from MSW landfill and indirectly via incineration of treatement sludge from leachate treatement.
  Uncertainty: Uncertainty calculated depending on waste input and uncertainty of long-term transfer coefficents in landfill.
- Zinc [air, non-urban air or from high stacks]: 7.2211e-12 kg; lognormal variance with pedigree 0.71672, pedigree (1,1,3,1,1)
  burden from direct release or incineration of landfill biogas; or windblown leachate evaporite in arid climates.
  Uncertainty: Uncertainty calculated from unertainty of the waste composition of this waste, uncertainty in waste decomposition and short-term leaching in landfill
- Vanadium, ion [water, ground-]: 1.3498e-6 kg; lognormal variance with pedigree 0.31986, pedigree (1,1,3,1,1)
  burden from short-term leachate to groundwater in uncontrolled landfill in moist cimate.
  Uncertainty: Uncertainty calculated from unertainty of the waste composition of this waste, uncertainty in waste decomposition and short-term leaching in landfill
- Mercury [water, ground-, long-term]: 8.8635e-8 kg; lognormal variance with pedigree 0.48245, pedigree (1,1,3,1,1)
  (same comment as for Copper, ion)
- Selenium [air, non-urban air or from high stacks]: 5.4511e-13 kg; lognormal variance with pedigree 0.8034, pedigree (1,1,3,1,1)
  (same comment as for Zinc)
- Beryllium [water, ground-]: 2.8621e-10 kg; lognormal variance with pedigree 0.59809, pedigree (1,1,3,1,1)
  (same comment as for Vanadium, ion)
- Cobalt [water, ground-, long-term]: 3.0952e-5 kg; lognormal variance with pedigree 0.28142, pedigree (1,1,3,1,1)
  (same comment as for Copper, ion)
- Vanadium [air, non-urban air or from high stacks]: 3.3745e-10 kg; lognormal variance with pedigree 0.59103, pedigree (1,1,3,1,1)
  (same comment as for Zinc)
- Zinc, ion [water, ground-]: 3.2495e-8 kg; lognormal variance with pedigree 0.44263, pedigree (1,1,3,1,1)
  (same comment as for Vanadium, ion)
- Chromium VI [water, ground-, long-term]: 1.0522e-8 kg; lognormal variance with pedigree 2.7764, pedigree (1,1,3,1,1)
  (same comment as for Copper, ion)
- Tin [air, non-urban air or from high stacks]: 1.4505e-14 kg; lognormal variance with pedigree 0.91756, pedigree (1,1,3,1,1)
  (same comment as for Zinc)
- Tin, ion [water, ground-]: 5.8019e-11 kg; lognormal variance with pedigree 0.65125, pedigree (1,1,3,1,1)
  (same comment as for Vanadium, ion)
- Cadmium, ion [water, ground-, long-term]: 3.2473e-6 kg; lognormal variance with pedigree 0.35593, pedigree (1,1,3,1,1)
  (same comment as for Copper, ion)
- Lead [air, non-urban air or from high stacks]: 1.0829e-13 kg; lognormal variance with pedigree 0.85248, pedigree (1,1,3,1,1)
  (same comment as for Zinc)
- Antimony [water, ground-]: 1.6769e-7 kg; lognormal variance with pedigree 0.38857, pedigree (1,1,3,1,1)
  (same comment as for Vanadium, ion)
- Arsenic, ion [water, ground-, long-term]: 1.8696e-6 kg; lognormal variance with pedigree 0.37397, pedigree (1,1,3,1,1)
  (same comment as for Copper, ion)
- Antimony [air, non-urban air or from high stacks]: 4.1922e-11 kg; lognormal variance with pedigree 0.65974, pedigree (1,1,3,1,1)
  (same comment as for Zinc)
- Selenium [water, ground-]: 2.1804e-9 kg; lognormal variance with pedigree 0.53223, pedigree (1,1,3,1,1)
  (same comment as for Vanadium, ion)
- Fluoride [water, ground-, long-term]: 1.1776e-5 kg; lognormal variance with pedigree 0.31342, pedigree (1,1,3,1,1)
  (same comment as for Copper, ion)
- Nickel [air, non-urban air or from high stacks]: 5.7242e-13 kg; lognormal variance with pedigree 0.80117, pedigree (1,1,3,1,1)
  (same comment as for Zinc)
- Lead [water, ground-]: 3.2488e-10 kg; lognormal variance with pedigree 0.59501, pedigree (1,1,3,1,1)
  (same comment as for Vanadium, ion)
- Barium [water, ground-, long-term]: 4.8725e-5 kg; lognormal variance with pedigree 0.26606, pedigree (1,1,3,1,1)
  (same comment as for Copper, ion)
- Manganese [air, non-urban air or from high stacks]: 5.0745e-11 kg; lognormal variance with pedigree 0.65593, pedigree (1,1,3,1,1)
  (same comment as for Zinc)
- Nickel, ion [water, ground-]: 2.2897e-9 kg; lognormal variance with pedigree 0.53053, pedigree (1,1,3,1,1)
  (same comment as for Vanadium, ion)
- Bromine [water, ground-, long-term]: 6.7244e-5 kg; lognormal variance with pedigree 0.25487, pedigree (1,1,3,1,1)
  (same comment as for Copper, ion)
- Mercury [air, non-urban air or from high stacks]: 2.4281e-11 kg; lognormal variance with pedigree 0.68807, pedigree (1,1,3,1,1)
  (same comment as for Zinc)
- Mercury [water, ground-]: 6.0701e-11 kg; lognormal variance with pedigree 0.65801, pedigree (1,1,3,1,1)
  (same comment as for Vanadium, ion)
- Chloride [water, ground-, long-term]: 0.0007685 kg; lognormal variance with pedigree 0.17418, pedigree (1,1,3,1,1)
  (same comment as for Copper, ion)
- Chromium [air, non-urban air or from high stacks]: 1.5432e-13 kg; lognormal variance with pedigree 0.8416, pedigree (1,1,3,1,1)
  (same comment as for Zinc)
- Manganese [water, ground-]: 2.0298e-7 kg; lognormal variance with pedigree 0.38714, pedigree (1,1,3,1,1)
  (same comment as for Vanadium, ion)
- Nitrate [water, ground-, long-term]: 0.00026997 kg; lognormal variance with pedigree 0.10713, pedigree (1,1,3,1,1)
  (same comment as for Copper, ion)
- Copper [air, non-urban air or from high stacks]: 1.6531e-13 kg; lognormal variance with pedigree 0.83775, pedigree (1,1,3,1,1)
  (same comment as for Zinc)
- Chromium VI [water, ground-]: 6.1727e-10 kg; lognormal variance with pedigree 0.57375, pedigree (1,1,3,1,1)
  (same comment as for Vanadium, ion)
- Nitrite [water, ground-, long-term]: 0.00013972 kg; lognormal variance with pedigree 0.10713, pedigree (1,1,3,1,1)
  (same comment as for Copper, ion)
- Cobalt [air, non-urban air or from high stacks]: 2.4922e-11 kg; lognormal variance with pedigree 0.67849, pedigree (1,1,3,1,1)
  (same comment as for Zinc)
- Copper, ion [water, ground-]: 5.7858e-10 kg; lognormal variance with pedigree 0.57599, pedigree (1,1,3,1,1)
  (same comment as for Vanadium, ion)
- Hydrogen sulfide [water, ground-, long-term]: 1.0724e-5 kg; lognormal variance with pedigree 0.2295, pedigree (1,1,3,1,1)
  (same comment as for Copper, ion)
- Cadmium [air, non-urban air or from high stacks]: 3.8115e-11 kg; lognormal variance with pedigree 0.66568, pedigree (1,1,3,1,1)
  (same comment as for Zinc)
- Cobalt [water, ground-]: 9.9689e-8 kg; lognormal variance with pedigree 0.40735, pedigree (1,1,3,1,1)
  (same comment as for Vanadium, ion)
- Ammonium, ion [water, ground-, long-term]: 0.002567 kg; lognormal variance with pedigree 0.10713, pedigree (1,1,3,1,1)
  (same comment as for Copper, ion)
- Barium [air, non-urban air or from high stacks]: 1.4096e-10 kg; lognormal variance with pedigree 0.62199, pedigree (1,1,3,1,1)
  (same comment as for Zinc)
- Barium [water, ground-]: 5.6383e-7 kg; lognormal variance with pedigree 0.3532, pedigree (1,1,3,1,1)
  (same comment as for Vanadium, ion)
- Nitrogen, organic bound [water, ground-, long-term]: 0.0041957 kg; lognormal variance with pedigree 0.10713, pedigree (1,1,3,1,1)
  (same comment as for Copper, ion)
- Arsenic [air, non-urban air or from high stacks]: 4.7104e-11 kg; lognormal variance with pedigree 0.65853, pedigree (1,1,3,1,1)
  (same comment as for Zinc)
- Cadmium, ion [water, ground-]: 5.7173e-9 kg; lognormal variance with pedigree 0.50097, pedigree (1,1,3,1,1)
  (same comment as for Vanadium, ion)
- DOC, Dissolved Organic Carbon [water, ground-, long-term]: 0.54811 kg; lognormal variance with pedigree 0.004586, pedigree (1,1,3,1,1)
  (same comment as for Copper, ion)
- Hydrogen fluoride [air, non-urban air or from high stacks]: 4.7097e-8 kg; lognormal variance with pedigree 0.43422, pedigree (1,1,3,1,1)
  (same comment as for Zinc)
- Bromine [water, ground-]: 1.7356e-6 kg; lognormal variance with pedigree 0.31951, pedigree (1,1,3,1,1)
  (same comment as for Vanadium, ion)
- Sulfate [water, ground-, long-term]: 0.00041138 kg; lognormal variance with pedigree 0.2295, pedigree (1,1,3,1,1)
  (same comment as for Copper, ion)
- Bromine [air, non-urban air or from high stacks]: 2.4331e-8 kg; lognormal variance with pedigree 0.45213, pedigree (1,1,3,1,1)
  (same comment as for Zinc)
- Fluoride [water, ground-]: 8.68e-9 kg; lognormal variance with pedigree 0.4867, pedigree (1,1,3,1,1)
  (same comment as for Vanadium, ion)
- BOD5, Biological Oxygen Demand [water, ground-, long-term]: 0.14192 kg; lognormal variance with pedigree 0.004586, pedigree (1,1,3,1,1)
  (same comment as for Copper, ion)
- Hydrogen chloride [air, non-urban air or from high stacks]: 2.8591e-7 kg; lognormal variance with pedigree 0.37144, pedigree (1,1,3,1,1)
  (same comment as for Zinc)
- Arsenic, ion [water, ground-]: 3.3601e-9 kg; lognormal variance with pedigree 0.51835, pedigree (1,1,3,1,1)
  (same comment as for Vanadium, ion)
- COD, Chemical Oxygen Demand [water, ground-, long-term]: 0.59949 kg; lognormal variance with pedigree 0.004586, pedigree (1,1,3,1,1)
  (same comment as for Copper, ion)
- Nitrogen oxides [air, non-urban air or from high stacks]: 8.8451e-8 kg; lognormal variance with pedigree 0.26606, pedigree (1,1,3,1,1)
  burden from direct release or incineration of landfill biogas.
  Uncertainty: Uncertainty calculated from unertainty of the waste composition of this waste, uncertainty in waste decomposition and short-term leaching in landfill
- Chloride [water, ground-]: 1.9836e-5 kg; lognormal variance with pedigree 0.23882, pedigree (1,1,3,1,1)
  (same comment as for Vanadium, ion)
- TOC, Total Organic Carbon [water, ground-, long-term]: 0.54811 kg; lognormal variance with pedigree 0.004586, pedigree (1,1,3,1,1)
  (same comment as for Copper, ion)
- Occupation, dump site [natural resource, land]: 0.0023333 m2*year; lognormal variance with pedigree 0.082256, pedigree (1,1,3,1,1)
  for landfill operation phase and spontaneous renaturation.
  Uncertainty: Uncertainty calculated from uncertainty in base parameters.
- Nitrate [water, ground-]: 6.4624e-6 kg; lognormal variance with pedigree 0.17383, pedigree (1,1,3,1,1)
  (same comment as for Vanadium, ion)
- Methane, fossil [air, non-urban air or from high stacks]: 0.0040052 kg; lognormal variance with pedigree 0.10764, pedigree (1,1,3,1,1)
  (same comment as for Nitrogen oxides)
- Nitrite [water, ground-]: 3.3445e-6 kg; lognormal variance with pedigree 0.17383, pedigree (1,1,3,1,1)
  (same comment as for Vanadium, ion)
- Carbon dioxide, fossil [air, non-urban air or from high stacks]: 0.0086713 kg; lognormal variance with pedigree 0.09751, pedigree (1,1,3,1,1)
  (same comment as for Nitrogen oxides)
- Nitrogen, organic bound [water, ground-]: 0.00010043 kg; lognormal variance with pedigree 0.17383, pedigree (1,1,3,1,1)
  (same comment as for Vanadium, ion)
- Sulfur dioxide [air, non-urban air or from high stacks]: 1.9274e-7 kg; lognormal variance with pedigree 0.40664, pedigree (1,1,3,1,1)
  (same comment as for Nitrogen oxides)
- Ammonium, ion [water, ground-]: 6.1449e-5 kg; lognormal variance with pedigree 0.17383, pedigree (1,1,3,1,1)
  (same comment as for Vanadium, ion)
- Sodium, ion [water, ground-, long-term]: 0.0013849 kg; lognormal variance with pedigree 0.15449, pedigree (1,1,3,1,1)
  (same comment as for Copper, ion)
- Hydrogen sulfide [water, ground-]: 4.0062e-8 kg; lognormal variance with pedigree 0.35081, pedigree (1,1,3,1,1)
  (same comment as for Vanadium, ion)
- Aluminium [water, ground-, long-term]: 0.00019706 kg; lognormal variance with pedigree 0.21994, pedigree (1,1,3,1,1)
  (same comment as for Copper, ion)
- Sulfate [water, ground-]: 1.5369e-6 kg; lognormal variance with pedigree 0.35081, pedigree (1,1,3,1,1)
  (same comment as for Vanadium, ion)
- Calcium, ion [water, ground-, long-term]: 0.00029535 kg; lognormal variance with pedigree 0.20649, pedigree (1,1,3,1,1)
  (same comment as for Copper, ion)
- DOC, Dissolved Organic Carbon [water, ground-]: 0.00016106 kg; lognormal variance with pedigree 0.20819, pedigree (1,1,3,1,1)
  (same comment as for Vanadium, ion)
- Thallium [water, ground-, long-term]: 3.9408e-7 kg; lognormal variance with pedigree 0.42434, pedigree (1,1,3,1,1)
  (same comment as for Copper, ion)
- Heat, waste [water, ground-, long-term]: 22.895 MJ; lognormal variance with pedigree 0.014651, pedigree (1,1,3,1,1)
  burden from long-term decomposition of waste (>100a).
  Uncertainty: Uncertainty calculated from unertainty of the waste composition of this waste, uncertainty in waste decomposition and short-term leaching in landfill
- Iron, ion [water, ground-, long-term]: 9.8564e-5 kg; lognormal variance with pedigree 0.24298, pedigree (1,1,3,1,1)
  (same comment as for Copper, ion)
- TOC, Total Organic Carbon [water, ground-]: 0.00016106 kg; lognormal variance with pedigree 0.20819, pedigree (1,1,3,1,1)
  (same comment as for Vanadium, ion)
- Titanium, ion [water, ground-, long-term]: 0.00098528 kg; lognormal variance with pedigree 0.16687, pedigree (1,1,3,1,1)
  (same comment as for Copper, ion)
- BOD5, Biological Oxygen Demand [water, ground-]: 4.1704e-5 kg; lognormal variance with pedigree 0.20819, pedigree (1,1,3,1,1)
  (same comment as for Vanadium, ion)
- Strontium [water, ground-, long-term]: 8.719e-5 kg; lognormal variance with pedigree 0.24705, pedigree (1,1,3,1,1)
  (same comment as for Copper, ion)
- COD, Chemical Oxygen Demand [water, ground-]: 0.00017616 kg; lognormal variance with pedigree 0.20819, pedigree (1,1,3,1,1)
  (same comment as for Vanadium, ion)
- Beryllium [water, ground-, long-term]: 4.926e-7 kg; lognormal variance with pedigree 0.41718, pedigree (1,1,3,1,1)
  (same comment as for Copper, ion)
- Heat, waste [soil, industrial]: 0.14135 MJ; lognormal variance with pedigree 0.081736, pedigree (1,1,3,1,1)
  burden from short-term decomposition of waste (0-100a).
  Uncertainty: Uncertainty calculated from unertainty of the waste composition of this waste, uncertainty in waste decomposition and short-term leaching in landfill
- Zinc, ion [water, ground-, long-term]: 6.8643e-5 kg; lognormal variance with pedigree 0.25501, pedigree (1,1,3,1,1)
  (same comment as for Copper, ion)
- Sodium [air, non-urban air or from high stacks]: 1.4928e-8 kg; lognormal variance with pedigree 0.46834, pedigree (1,1,3,1,1)
  (same comment as for Zinc)
- Vanadium, ion [water, ground-, long-term]: 0.00017535 kg; lognormal variance with pedigree 0.40554, pedigree (1,1,3,1,1)
  (same comment as for Copper, ion)
- Aluminium [air, non-urban air or from high stacks]: 2.4609e-11 kg; lognormal variance with pedigree 0.67625, pedigree (1,1,3,1,1)
  (same comment as for Zinc)
- Sodium, ion [water, ground-]: 5.9713e-5 kg; lognormal variance with pedigree 0.20582, pedigree (1,1,3,1,1)
  (same comment as for Vanadium, ion)
- Tin, ion [water, ground-, long-term]: 9.8572e-7 kg; lognormal variance with pedigree 0.39482, pedigree (1,1,3,1,1)
  (same comment as for Copper, ion)
- Thallium [air, non-urban air or from high stacks]: 5.7242e-14 kg; lognormal variance with pedigree 0.87589, pedigree (1,1,3,1,1)
  (same comment as for Zinc)
- Iron, ion [water, ground-]: 1.3524e-8 kg; lognormal variance with pedigree 0.47141, pedigree (1,1,3,1,1)
  (same comment as for Vanadium, ion)
- Selenium [water, ground-, long-term]: 2.7328e-7 kg; lognormal variance with pedigree 0.62691, pedigree (1,1,3,1,1)
  (same comment as for Copper, ion)
- Calcium [air, non-urban air or from high stacks]: 9.6153e-11 kg; lognormal variance with pedigree 0.63248, pedigree (1,1,3,1,1)
  (same comment as for Zinc)
- Aluminium [water, ground-]: 9.8436e-8 kg; lognormal variance with pedigree 0.40579, pedigree (1,1,3,1,1)
  (same comment as for Vanadium, ion)
- Antimony [water, ground-, long-term]: 7.0325e-6 kg; lognormal variance with pedigree 0.83522, pedigree (1,1,3,1,1)
  (same comment as for Copper, ion)
- Iron [air, non-urban air or from high stacks]: 3.381e-12 kg; lognormal variance with pedigree 0.73965, pedigree (1,1,3,1,1)
  (same comment as for Zinc)
- Calcium, ion [water, ground-]: 3.8461e-7 kg; lognormal variance with pedigree 0.3612, pedigree (1,1,3,1,1)
  (same comment as for Vanadium, ion)
- Manganese [water, ground-, long-term]: 1.7541e-5 kg; lognormal variance with pedigree 0.3, pedigree (1,1,3,1,1)
  (same comment as for Copper, ion)
- Beryllium [air, non-urban air or from high stacks]: 7.1553e-14 kg; lognormal variance with pedigree 0.86873, pedigree (1,1,3,1,1)
  (same comment as for Zinc)
- Titanium, ion [water, ground-]: 4.9218e-7 kg; lognormal variance with pedigree 0.35273, pedigree (1,1,3,1,1)
  (same comment as for Vanadium, ion)
- Lead [water, ground-, long-term]: 5.52e-6 kg; lognormal variance with pedigree 0.33857, pedigree (1,1,3,1,1)
  (same comment as for Copper, ion)
- Titanium [air, non-urban air or from high stacks]: 1.2304e-10 kg; lognormal variance with pedigree 0.62318, pedigree (1,1,3,1,1)
  (same comment as for Zinc)
- Strontium [water, ground-]: 5.0659e-8 kg; lognormal variance with pedigree 0.42796, pedigree (1,1,3,1,1)
  (same comment as for Vanadium, ion)
- Nickel, ion [water, ground-, long-term]: 3.9408e-6 kg; lognormal variance with pedigree 0.34962, pedigree (1,1,3,1,1)
  (same comment as for Copper, ion)
- Strontium [air, non-urban air or from high stacks]: 1.2665e-11 kg; lognormal variance with pedigree 0.6986, pedigree (1,1,3,1,1)
  (same comment as for Zinc)
- Thallium [water, ground-]: 2.2897e-10 kg; lognormal variance with pedigree 0.60525, pedigree (1,1,3,1,1)
  (same comment as for Vanadium, ion)

## Extrapolations
This dataset has been extrapolated from year 2012 to the year of the calculation (2019). The uncertainty has been adjusted accordingly.
