# treatment of waste paper, unsorted, sorting

Dataset: EcoSpold 2, unit process
Geography: Europe without Switzerland
Time period: 1993-01-01 to 2019-12-31
Technology level: current
Classification: EcoSpold01Categories: paper & cardboard/pulps
Classification: ISIC rev.4 ecoinvent: 3811:Collection of non-hazardous waste
Tags: ConvertedDataset
Scenario: Business-as-Usual
System model: Allocation at the point of substitution
Generated by: Roland Hischier
Published in: Hischier R. 2007
Database: ecoinvent
isCopyrightProtected: true
accessRestrictedTo: 1

## General comment
Personal communication with the European Paper & Pulp Industry, together with information from literature, is used in order to establish the dataset. All waste is assumed to be incinerated. The dataset represents the input material for DIP process, as delivered to the factory gate.
[This dataset was already contained in the ecoinvent database version 2. It was not individually updated during the transfer to ecoinvent version 3. Life Cycle Impact Assessment results may still have changed, as they are affected by changes in the supply chain, i.e. in other datasets. This dataset was generated following the ecoinvent quality guidelines for version 2. It may have been subject to central changes described in the ecoinvent version 3 change report (http://www.ecoinvent.org/database/ecoinvent-version-3/reports-of-changes/), and the results of the central updates were reviewed extensively. The changes added e.g. consistent water flows and other information throughout the database. The documentation of this dataset can be found in the ecoinvent reports of version 2, which are still available via the ecoinvent website. The change report linked above covers all central changes that were made during the conversion process.]

## Included activities end
This module includes the efforts for sorting collected paper (energy, materials), the treatment of the waste fractions extracted plus the subsequent transport to a paper production site.

## Geography
Data from the European Paper & Pulp industry, used as European average

## Technology
typical technology used in Europe arround 2005

## Reference product
- waste paper, unsorted: -1 kg; CPC 39240: Waste and scrap of paper or paperboard; By-product classification Recyclable
  EcoSpold01Location=RER
  Personal communication of industry
  production volume 2.0178e10 kg; = 58E+09*0.5*0.717-(6.15E+08)
    Estimated value. Used paper and carton in EU is of 60 million tons, of which 71.7% are recycled. 50% is assumed to be paper and 50% is assumed to be carton. The CH production volume is subtracted from the total value.
    Source: European Recovered Paper Council (2012) European Declaration on Paper Recycling 2011-2015. retrieved from http://reffibre.eu/publications/cepi-2012-paper-recycling-monitoring-report.pdf, accessed 6th May 2016. The production volume for Switzerland was subtracted.
    Peter Siegenthaler (2013) Used paper is big business. Retrieved from: http://www.swissinfo.ch/eng/used-paper-is-big-business/37276480, accessed 6th May 2016
  property price 0.093 EUR2005
    Temporary price data. Calculated as 90% of purchasers price based on: Assumed to be 10% less than for sorted waste paper

## By-products
- iron scrap, sorted, pressed: 0 kg; By-product classification Recyclable; CPC 39310: Slag, dross, scalings and other waste from the manufacture of iron or steel; pedigree (1,1,1,1,1)
  Iron scrap recovered from this waste.
  property price 0.175 EUR2005
    Temporary price data. Calculated as 90% of purchasers price based on: 2005 import and export prices (total trades (USD) divided by total weight (kg) in biggest economies of the world: EU27, USA, Brasil, China, India, Japan and Russia) from UN Commodity Trade Statistics Database (http://data.un.org/Explorer.aspxDatabase [Accessed 2011.06.20]). Commodity: Waste or scrap, of cast iron
  property carbon content 0
    carbon content on a dry matter basis (reserved; not for manual entry)
  properties: water content 0, water in wet mass 0 kg, carbon content, fossil 0, dry mass 1 kg, carbon content, non-fossil 0, wet mass 1 kg, carbon allocation 0 kg
- core board: 0 kg; CPC 321: Pulp, paper and paperboard; By-product classification allocatable product
  EcoSpold01Location=RER
  property carbon content, non-fossil 0.430314
    Biogenic C content was calculated after biogenic C contents of chemicals used in the production of board (ecoinvent v2.2 report 11_III, part 13). The cellulose content in 1 kg of paper (on a wet mas basis) was estimated as (1-chemical content), C content of cellulose was considered 0.44 kgC/kg dry mass (ecoinvent v2.2 report, n 15a, pg 40)
  property price 0.598 EUR2005
    Export prices for the World+ according to: http://faostat.fao.org/site/626/DesktopDefault.aspx?PageID=626#ancor downloaded 28 April 2009; calculated as export value divided by export volume.
  property carbon content, fossil 0
    Fossil C content was calculated after fossil C contents of chemicals used in the production of board (ecoinvent v2.2 report 11_III, part 13).
  property carbon content 0.430314
    carbon content on a dry matter basis (reserved; not for manual entry)
  properties: dry mass 0.945 kg, water in wet mass 0.055 kg, wet mass 1 kg, water content 0.0582011, carbon allocation 0.406646 kg
- residual wood, dry: 0 m3; CPC 39283: Non-agglomerated wood waste and scrap; By-product classification allocatable product; pedigree (1,1,1,1,1)
  Emission factor from DS on heat generation from industrial residual wood mulitplied by the input of wood fuel (direct wood fuel plus production residues)
  property price 26.9 EUR2005; name w_chips_price_EUR2005
    Temporary price data. Calculated as 90% of purchasers price based on: 2004 prices for World Import/Export (USD/cubicmeter) from FaoStat (http://faostat.fao.org/site/626/default.aspx#ancor, [accessed 10th June 2010]) Commodity: 'Chips and Particles' assuming this is for air-dry chips (10% water on a dry matter basis at 650 kg/m3) and no price difference for water content (i.e. assuming air-drying).
  property carbon content 0.494
    carbon content on a dry matter basis (reserved; not for manual entry)
  properties: wet mass 632.5 kg, carbon content, fossil 0, dry mass 550 kg, carbon content, non-fossil 0.494, water content 0.15, water in wet mass 82.5 kg, carbon allocation 271.7 kg
- bark chips, wet, measured as dry mass: 0 kg; By-product classification allocatable product; CPC 31230: Wood in chips or particles; pedigree (1,1,1,1,1)
  bark from debarking of logs, not used energetically
  property price 0.034 EUR2005; name w_bark_price_EUR2005
    Expert judgement (Urs Luginbühl, Swiss Sawmilling industry, personal communication in June 2014). Cross-reference; FAOSTAT database; http://faostat.fao.org/site/626/DesktopDefault.aspx?PageID=626#ancor; Average import/export prices of EU for 'chips and particles'. Price: 48.76 Euro/m3. The density of the wood chips is 650 kg/m3. The price is calculated to be 0.075 EUR/kg.
  property carbon content 0.494
    carbon content on a dry matter basis (reserved; not for manual entry)
  properties: carbon content, fossil 0, dry mass 1 kg, carbon content, non-fossil 0.494, wet mass 2.4 kg, water in wet mass 1.4 kg, water content 1.4, carbon allocation 0.494 kg
- fibreboard, soft: 0 m3; CPC 31449: Other fibreboard; By-product classification allocatable product
  property dry mass 150.62 kg; name DM_FB; = WM_FB - WiWM_FB
  property price 148 EUR2005
    (same comment as for core board)
  property water in wet mass 8.38 kg; name WiWM_FB
  property wet mass 159 kg; name WM_FB
  property carbon content, non-fossil 0.461793; = 140.8*0.494/DM_FB
    wood content converted to carbon, divided by dry mass
  property water content 0.0556367; = WiWM_FB/DM_FB
  property carbon content 0.475101
    carbon content on a dry matter basis (reserved; not for manual entry)
  properties: carbon content, fossil 0.0133086, carbon allocation 71.5597 kg
- heat, for reuse in municipal waste incineration only: 0 MJ; CPC 17300: Steam and hot water; By-product classification allocatable product; pedigree (1,1,1,1,1)
  Net electricity generated from this waste and used in internal MSWI plant energy redistribution.
  Uncertainty: uncertainty is calculated from uncertainties in waste composition and uncertainties in energy efficiency and the uncertainty in internal energy demand
  property price 0.0106 EUR2005; name E_th_prod_MSWI_price_EUR2005
    Average European district heat price from Ecoheatcool and Euroheat 2005-2006, Ecoheat Work package 1: The European heat market. Final report. 10.6 EUR/GJ i s the price of district heat. http://www.solarthermalworld.org/files/Ecoheatcool%20WP1%20Web.pdf?download
  property exergy 0.1842 MJ; name E_th_prod_MSWI_exergy
    This exergy property is based on the exergy content of the product.
  property true value relation 0.1842; name E_th_prod_MSWI_true_value_relation
    property to calculate "true value" from
- electricity, for reuse in municipal waste incineration only: 0 kWh; CPC 17100: Electrical energy; By-product classification allocatable product; pedigree (1,1,1,1,1)
  (same comment as for heat, for reuse in municipal waste incineration only)
  property true value relation 3.6; name E_el_prod_MSWI_true_value_relation
    property to calculate "true value" from
  property exergy 3.6 MJ; name E_el_prod_MSWI_exergy
    This exergy property is based on the exergy content of the product.
  property price 0.1 EUR2005; name E_el_prod_MSWI_price_EUR2005
    Estimated to be the same price as in case of electricity, medium voltage.
- biogas: 0 m3; source Raboni, Massimo 2014; By-product classification allocatable product; CPC 17200: Coal gas, water gas, producer gas and similar gases, other than petroleum gases and other gaseous hydrocarbons; pedigree (1,1,1,1,1)
  An average yield of 100 litres of biogas per kg biowaste is assumed
  property price 0.109 EUR2005; name biogas_yield_price_EUR2005
    Temporary price data. Calculated as 90% of purchasers price based on: Same prices per energy output as natural gas, based on the proportional lower heating value (2/3 that of natural gas)
  property carbon content, non-fossil 0.449939
    Total C content in kg/Nm3 (Tab 12.8, ecoinvent v2.2 report n17), referred to 1kg DM
  property carbon content 0.449939
    carbon content on a dry matter basis (reserved; not for manual entry)
  properties: water in wet mass 0 kg, wet mass 1.15 kg, carbon content, fossil 0, lower heating value 0 MJ/Nm3, water content 0, dry mass 1.15 kg, carbon allocation 0.51743 kg
- zinc concentrate: 0 kg; CPC 14290: Other non-ferrous metal ores and concentrates (other than uranium or thorium ores and concentrates); By-product classification allocatable product
  Calculated value from the knowledge of the properties of both products.
  property price 0.38 EUR2005; name ByP_price_EUR2005
    Temporary price data. Calculated as 90% of purchasers price based on: Zinc content in concentrate 53%. Concentrate price per kg Zn 86.5% of refined Zn price (13.5% treatment charges according to CHR Metals Limited 2005: Dynamic cost curves. http://www.minecost.com/dynamic.pdf). 2004 zinc price from USGS (2007) Mineral commodity summaries 2007. <http://minerals.usgs.gov/minerals/pubs/mcs/2007/mcs2007.pdf> [Accessed 25 May 2010]
  property zinc content 0.53; name zinc_C_zinc_concentrate
    Zinc content on a dry matter basis. Value taken from teh "zinc mine operation" /GLO dataset.
  property dry mass 1 kg; name DM_zinc_concentrate
  property carbon content 0
    carbon content on a dry matter basis (reserved; not for manual entry)
  properties: wet mass 1 kg, water content 0, carbon content, non-fossil 0, carbon content, fossil 0, water in wet mass 0 kg, carbon allocation 0 kg
- compost: 0 kg; CPC 391: Wastes from food and tobacco industry; By-product classification allocatable product; pedigree (1,1,1,1,1)
  EcoSpold01Location=CH
  Biowaste is reduced in mass by a factor of 2 during composting
  property water in wet mass 0.472 kg; name Water_in_wet_mass_compost; = 1- DM_compost
  property price 0.03 EUR2005
    Temporary price data. Calculated as 90% of purchasers price based on: Estimation done using the following sources: <http://www.wmaa.asn.au/uploads/documents/MarkWinser_1May2007.pdf>; <http://www.swlf.ait.ac.th/UpdData/International/Composting%20and%20anaerobic%20digestion_%20comparions%20for%20Europe%20and%20Asia.pdf>; <http://www.epa.gov/osw/conserve/rrr/composting/basic.htm>, accessed 2011.06.16
  property carbon content, non-fossil 0.1165
    calculation: dry matter 50%, organic matter 40% of dry matter, C content calculated from organic matter divided by 1.72. Relative to dry matter; relative to fresh matter: divided by 2 => 0.1156
  property dry mass 0.528 kg; name DM_compost
  property water content 0.893939; name Water_content_compost; = Water_in_wet_mass_compost/DM_compost
  property concentration, cadmium 0 kg/kg; name Mass_compost_concentration_Cd; = Mass_biowaste_concentration_Cd*2
    Biowaste mass is reduced by a factor of two during composting, therefore concentration is doubled
  property humus equivalent 0.061 kg
    Humus building fraction expressed in kg per kg product on a FM basis. Humus denotes the converted, primary biomass from plants or animals in the ground. More information can be found in the documentation of the composting itself: "treatment of biowaste, industrial composting".
  property concentration, copper 0 kg/kg; name Mass_compost_concentration_Cu; = Mass_biowaste_concentration_Cu*2
    (same comment as for compost)
  property concentration, calcium 0 kg/kg; name Mass_compost_Ca_concentration; = Mass_biowaste_concentration_Ca*2
    (same comment as for compost)
  property concentration, magnesium 0 kg/kg; name Mass_compost_Mg_concentration; = Mass_biowaste_concentration_Mg*2
    (same comment as for compost)
  property concentration, mercury 0 kg/kg; name Mass_compost_Hg_concentration; = Mass_biowaste_concentration_Hg*2
    (same comment as for compost)
  property concentration, lead 0 kg/kg; name Mass_compost_concentration_Pb; = Mass_biowaste_concentration_Pb*2
    (same comment as for compost)
  property concentration, nickel 0 kg/kg; name Mass_compost_Ni_concentration; = Mass_biowaste_concentration_Ni*2
    (same comment as for compost)
  property concentration, phosphorus 0 kg/kg; name Mass_compost_P_concentration; = Mass_biowaste_concentration_P*2
    (same comment as for compost)
  property concentration, sulfur 0 kg/kg; name Mass_compost_concentration_S; = Mass_biowaste_concentration_S*2
    (same comment as for compost)
  property concentration, potassium 0 kg/kg; name Mass_compost_K_concentration; = Mass_biowaste_concentration_K*2
    (same comment as for compost)
  property nickel content 1.60606e-5; name Mass_compost_Ni_content; = Mass_biowaste_Ni_content/0.5*( DM_biowaste / DM_compost)
    nickel content on a dry matter basis
  property concentration, nitrogen 0 kg/kg; = Mass_biowaste_concentration_N*2
    (same comment as for compost)
  property concentration, zinc 0 kg/kg; name Mass_compost_concentration_Zn; = Mass_biowaste_concentration_Zn*2
    (same comment as for compost)
  property lead content 2.66667e-5; name Mass_compost_Pb_content; = Mass_biowaste_Pb_content/0.5*( DM_biowaste / DM_compost)
    lead content on a dry matter basis
  property copper content 3.81818e-5; name Mass_compost_Cu_content; = Mass_biowaste_Cu_content/0.5*( DM_biowaste / DM_compost)
    copper content on a dry matter basis
  property cadmium content 2.89394e-7; name Mass_compost_Cd_content; = Mass_biowaste_Cd_content/0.5*( DM_biowaste / DM_compost)
    cadmium content on a dry matter basis
  property nitrogen content 0.0136364; name Mass_compost_N_content; = Mass_biowaste_N_content/0.5*( DM_biowaste / DM_compost)
    nitrogen content on a dry matter basis
  property magnesium content 0.00525758; name Mass_compost_Mg_content; = Mass_biowaste_Mg_content/0.5*( DM_biowaste / DM_compost)
    magnesium content on a dry matter basis
  property zinc content 0.000120303; name Mass_compost_Zn_content; = Mass_biowaste_Zn_content/0.5*( DM_biowaste / DM_compost)
    zinc content on a dry matter basis
  property potassium content 0.0099697; name Mass_compost_K_content; = Mass_biowaste_K_content/0.5*( DM_biowaste / DM_compost)
    potassium content on a dry matter basis
  property sulfur content 0.00190909; name Mass_compost_S_content; = Mass_biowaste_S_content/0.5*( DM_biowaste / DM_compost)
    sulfur content on a dry matter basis
  property calcium content 0.0504545; name Mass_compost_Ca_content; = Mass_biowaste_Ca_content/0.5*( DM_biowaste / DM_compost)
    calcium content on a dry matter basis
  property mercury content 1e-7; name Mass_compost_Hg_content; = Mass_biowaste_Hg_content/0.5*( DM_biowaste / DM_compost)
    mercury content on a dry matter basis
  property phosphorus content 0.00275758; name Mass_compost_P_content; = Mass_biowaste_P_content/0.5*( DM_biowaste / DM_compost)
    phosphorus content on a dry matter basis
  property carbon content 0.1165
    carbon content on a dry matter basis (reserved; not for manual entry)
  properties: carbon content, fossil 0, wet mass 1 kg, carbon allocation 0.061512 kg
- copper: 0 kg; source Rentz O. 1999; By-product classification allocatable product; CPC 41413: Refined copper and copper alloys, unwrought; master alloys of copper
  Literature value. Copper uses: Before end-use copper is manufactured into semi fabricated products, such as shapes and ingots (known as 'semis'). These manufacturing processes are subdivided into hot working, cold working and, if necessary, process annealing. Few of the semis are ready for use as such. They more typically travel to first-stage manufacturers, who make metal rods, wire, and casting, and then to component manufacturers who produce such things as motors, valves, and insulated cables The components in turn are incorporated by final-stage manufacturers into a variety of finished products - automobiles, commercial buildings, residential housing, and so forth. These uses account for about 79% of the world-wide consumption of copper.
  property price 5.52 EUR2005
    Literature value (http://www.economist.com/news/business/21576714-mining-industry-has-enriched-chile-its-future-precarious-copper-solution). Average price between 20015 and 2013.
  property carbon content 0
    carbon content on a dry matter basis (reserved; not for manual entry)
  properties: dry mass 1 kg, water in wet mass 0 kg, wet mass 1 kg, carbon content, non-fossil 0, water content 0, carbon content, fossil 0, carbon allocation 0 kg
- iron scrap, unsorted: 0 kg; source European Aluminium Association 2008; CPC 39310: Slag, dross, scalings and other waste from the manufacture of iron or steel; By-product classification Recyclable; pedigree (1,1,1,1,1)
  property price 0.149 EUR2005; name ironScrapAmount_price_EUR2005
    Temporary price data. Calculated as 90% of purchasers price based on: estimated at 85% of sorted scrap
  property carbon content 0
    carbon content on a dry matter basis (reserved; not for manual entry)
  properties: water in wet mass 0 kg, water content 0, carbon content, fossil 0, carbon content, non-fossil 0, dry mass 1 kg, wet mass 1 kg, carbon allocation 0 kg
- aluminium oxide, non-metallurgical: 0 kg; source European Aluminium Association 2008; CPC 41432: Alumina (aluminium oxide), except artificial corundum; By-product classification allocatable product; CAS 1344-28-1; pedigree (1,1,1,1,1)
  property carbon content, non-fossil 0; name C_content_non_fossil
  property price 0.28 EUR2005; name Al2O3Amount_price_EUR2005
    From UN trade database. http://data.un.org/ Import data from the largest economies of the world are used (Brazil, India, USA, China, Japan and EU-27).
  property dry mass 1 kg; name DM
  property water content 0; name water_content
  property wet mass 1 kg; name WM
  property water in wet mass 0 kg; name WWM
  property carbon content, fossil 0; name C_content_fossil
  property carbon content 0
    carbon content on a dry matter basis (reserved; not for manual entry)
  properties: carbon allocation 0 kg
- aluminium, cast alloy: 0 kg; source European Aluminium Association 2008; By-product classification allocatable product; CPC 41431: Unwrought aluminium; pedigree (1,1,1,1,1)
  EcoSpold01Location=RER
  property price 1.3 EUR2005; name castAlloyAmount_price_EUR2005
    Temporary price data. Calculated as 90% of purchasers price based on: Source: London Metal Exchange, Aluminium alloy price for 2005
  property carbon content 0
    carbon content on a dry matter basis (reserved; not for manual entry)
  properties: water in wet mass 0 kg, carbon content, non-fossil 0, water content 0, dry mass 1 kg, carbon content, fossil 0, wet mass 1 kg, carbon allocation 0 kg
- aluminium, wrought alloy: 0 kg; source European Aluminium Association 2008; By-product classification allocatable product; CPC 4153: Semi-finished products of aluminium or aluminium alloys; pedigree (1,1,1,1,1)
  property price 1.44 EUR2005; name secondaryAluminiumOutput_price_EUR2005
    Estimated based on literature values and expert judgement. Aluminium ccast alloys are about 90% of the price of aluminium wrought alloys.
  property carbon content 0
    carbon content on a dry matter basis (reserved; not for manual entry)
  properties: wet mass 1 kg, water content 0, carbon content, fossil 0, water in wet mass 0 kg, carbon content, non-fossil 0, dry mass 1 kg, carbon allocation 0 kg
- gypsum fibreboard: 0 kg; CPC 37530: Articles of plaster or of compositions based on plaster; By-product classification allocatable product
  EcoSpold01Location=CH
  property price 1.77 EUR2005
    Calculated by 2.o-The production volume of this product is small compared to other products supplied by the activities within the same ISIC 3 category. Therefore, an average price of products supplied by the activities in the same ISIC 3 code has been applied.This price is obtained as '_45 Glass, mineral wool and ceramic goods, virgin, EU27' in the 'EU & DK Input Output Database' (available in SimaPro). The price is assumed to be valid for both RER2003, RER 2004, world 2003 and world 2004.
  property carbon content, fossil 0
    Gypsum (CaSO4-2H2O) with 15-20% cellulose fibres (ecoinvent v2.2 report 7, part VIII, pg 5). C-content/dry mass of natural fibres was considered 46% (from "Evolutionary and Biochemical Aspects", A.D. Kay and T. Vrede (in Global Ecology, 2010, Elsevier B.V., S.E. Jørgensen Ed.))
  property carbon content, non-fossil 0.0805
    (same comment as for gypsum fibreboard)
  property carbon content 0.0805
    carbon content on a dry matter basis (reserved; not for manual entry)
  properties: water content 0, water in wet mass 0 kg, dry mass 1 kg, wet mass 1 kg, carbon allocation 0.0805 kg
- tissue paper: 0 kg; By-product classification allocatable product; CPC 321: Pulp, paper and paperboard
  EcoSpold01Location=RER
  property carbon content, non-fossil 0.36169
    Biogenic C content was calculated after biogenic C contents of chemicals used in the production of the paper (in Tab 8.86 ecoinvent v2.2 report 11_III, part 8). The cellulose content in 1 kg of paper (on a wet mas basis) was estimated as (1-chemical content), C content of cellulose was considered 0.44 kgC/kg dry mass (ecoinvent v2.2 report, n 15a, pg 40)
  property price 1.34 EUR2005
    Calculated based on literature values. The price of 1 kg of tissue paper is calculated to be 1.34 euro/kg. This price is calculated as a weighted average of prices calculated based on import (net trade) of this material from the world into 5 big economies; EU, Japan, China, India, USA. The net weight and the trade value is obtained from the UN Comtrade database (average of commodity no. 730830 Doors, windows, frames of iron or steel and commodity no. 481820 Paper hankerchiefs, cleansing, facial tissues, towel), year 2005.
  property carbon content, fossil 2.22e-5
    Fossil C content was calculated after fossil C contents of chemicals used in the production of the paper (in Tab 8.86 ecoinvent v2.2 report 11_III, part 8).
  property carbon content 0.361712
    carbon content on a dry matter basis (reserved; not for manual entry)
  properties: dry mass 0.945 kg, wet mass 1 kg, water in wet mass 0.055 kg, water content 0.0582011, carbon allocation 0.341818 kg

## Inputs from technosphere
- waste wood, untreated: -0.000731707 kg; lognormal variance with pedigree 0.0367, pedigree (4,3,4,3,1)
  Personal communication of industry
  EcoSpold01Location=CH
  Uncertainty: personal communication of industry
  production volume 1.47644e7 kg; = (Ref('ba7e4670-69a8-40b7-b77b-9285c85fa1ef')*-1)* Ref('4fdf5f80-6533-437a-84d2-c5016edd2749', 'ProductionVolume')/ABS( Ref('4fdf5f80-6533-437a-84d2-c5016edd2749'))
    Calculated from the production volume of waste paper, unsorted in proportion to the respective output amounts.
  properties: water content 0.25, wet mass 1 kg, dry mass 0.8 kg, carbon content, non-fossil 0.48632
  note on carbon content, non-fossil: Tab A.4, ecoinvent v2.2 report 13_I. C content has been referred to 1 kg DM,
- electricity, medium voltage: 0.00907317 kWh; lognormal variance with pedigree 0.0367, pedigree (4,3,4,3,1)
  EcoSpold01Location=UCTE
  Personal communication of industry
  Uncertainty: personal communication of industry
- steel, unalloyed: 0.00117073 kg; lognormal variance with pedigree 0.0641, pedigree (3,4,5,3,1)
  Based on data from 1 Swiss plant
  EcoSpold01Location=RER
  Uncertainty: based on data from 1 Swiss plant
  properties: wet mass 1 kg, dry mass 1 kg, carbon content, fossil 0.0025
  note on carbon content, fossil: Unalloyed steels or carbon steels are those in which the level of an individual element in no case reaches or exceeds the limiting concentration given in Tab. 3.1 ecoinvent v2.2 report 10_partII. Assumed to have a C content of 0.25%
- scrap steel: -0.000731707 kg; lognormal variance with pedigree 0.0367, pedigree (4,3,4,3,1)
  (same comment as for waste wood, untreated)
  production volume 1.47644e7 kg; = (Ref('a17d07c4-70f3-4ae2-b4fe-4f0ed4eb8574')*-1)* Ref('4fdf5f80-6533-437a-84d2-c5016edd2749', 'ProductionVolume')/ABS( Ref('4fdf5f80-6533-437a-84d2-c5016edd2749'))
    (same comment as for waste wood, untreated)
  properties: wet mass 1 kg, dry mass 1 kg
- lubricating oil: 1.17073e-5 kg; lognormal variance with pedigree 0.0641, pedigree (3,4,5,3,1)
  EcoSpold01Location=RER
  Based on data from 1 Swiss plant
  Uncertainty: based on data from 1 Swiss plant
  properties: wet mass 1 kg, carbon content, fossil 0.75, dry mass 1 kg
  note on carbon content, fossil: Lubricating oil is produced from diesel. C-content/dry mass of fats and oils considered 75%, from: ecoinvent v2.2 report, n 15a, pg 40
- heat, central or small-scale, other than natural gas: 0.0142146 MJ; lognormal variance with pedigree 0.0641, pedigree (3,4,5,3,1)
  EcoSpold01Location=CH
  Based on data from 1 Swiss plant
  Uncertainty: based on data from 1 Swiss plant
- waste paperboard: -0.00439024 kg; lognormal variance with pedigree 0.0367, pedigree (4,3,4,3,1)
  (same comment as for waste wood, untreated)
  production volume 8.85863e7 kg; = (Ref('90e50d79-307f-49ba-bdf9-95534ab6ec69')*-1)* Ref('4fdf5f80-6533-437a-84d2-c5016edd2749', 'ProductionVolume')/ABS( Ref('4fdf5f80-6533-437a-84d2-c5016edd2749'))
    (same comment as for waste wood, untreated)
  properties: dry mass 0.804 kg, carbon content, non-fossil 0.483259, wet mass 1 kg, water content 0.243781
  note on carbon content, non-fossil: C content was calculated for 1 kg DM, using data in Tab A.3, ecoinvent v2.2 report 13_I.
- waste paper sorting facility: 5.9122e-10 unit; lognormal variance with pedigree 0.448, pedigree (4,5,5,5,5)
  EcoSpold01Location=RER
  Own assumption
  Uncertainty: own assumption
- waste paper, sorted: -0.97561 kg
  EcoSpold01Location=RER
  production volume 1.96859e10 kg; = (Ref('e4c5c21e-0ba1-49ef-8a38-d8274a334ab0')*-1)* Ref('4fdf5f80-6533-437a-84d2-c5016edd2749', 'ProductionVolume')/ABS( Ref('4fdf5f80-6533-437a-84d2-c5016edd2749'))
    Unknown
    Dummy value to be replaced by measured, estimated or calculated value
  properties: dry mass 0.9 kg, price 0.104 EUR2005, carbon content, non-fossil 0.448889, wet mass 1 kg, water content 0.111111
  note on carbon content, non-fossil: The collected waste paper has a biogenic C content of 40.4% (average C-content of waste paper according to Doka 2004)
- waste plastic, mixture: -0.00939024 kg; lognormal variance with pedigree 0.0367, pedigree (4,3,4,3,1)
  (same comment as for waste wood, untreated)
  production volume 1.89476e8 kg; = (Ref('5c69d4f3-7508-42f4-88af-16f4a4a369e7')*-1)* Ref('4fdf5f80-6533-437a-84d2-c5016edd2749', 'ProductionVolume')/ABS( Ref('4fdf5f80-6533-437a-84d2-c5016edd2749'))
    (same comment as for waste wood, untreated)
  properties: water content 0.180638, wet mass 1 kg, carbon content, fossil 0.747344, dry mass 0.847 kg
  note on carbon content, fossil: C content in 1 kg DM was calculated using data in Tab A.2, ecoinvent v2.2 report 13_I
- sheet rolling, steel: 0.00117073 kg; lognormal variance with pedigree 0.0641, pedigree (3,4,5,3,1)
  (same comment as for steel, unalloyed)
- waste textile, soiled: -0.000731707 kg; lognormal variance with pedigree 0.0367, pedigree (4,3,4,3,1)
  (same comment as for waste wood, untreated)
  production volume 1.47644e7 kg; = (Ref('5d36108d-ed70-4a6e-9bca-5a49e57377af')*-1)* Ref('4fdf5f80-6533-437a-84d2-c5016edd2749', 'ProductionVolume')/ABS( Ref('4fdf5f80-6533-437a-84d2-c5016edd2749'))
    (same comment as for waste wood, untreated)
  properties: dry mass 0.75 kg, carbon content, non-fossil 0.570519, water content 0.333333, wet mass 1 kg
  note on carbon content, non-fossil: C content of 1 kg DM was calculated after data in Tab A.4, ecoinvent v2.2 report 13_I,
- waste graphical paper: -0.00841463 kg; lognormal variance with pedigree 0.0367, pedigree (4,3,4,3,1)
  EcoSpold01Location=CH
  Personal communication of industry
  Uncertainty: personal communication of industry
  production volume 1.6979e8 kg; = (Ref('5f2d41ed-be9d-49e1-9420-ceebe2c2f799')*-1)* Ref('4fdf5f80-6533-437a-84d2-c5016edd2749', 'ProductionVolume')/ABS( Ref('4fdf5f80-6533-437a-84d2-c5016edd2749'))
    (same comment as for waste wood, untreated)
  properties: carbon content, non-fossil 0.454955, water content 0.126126, wet mass 1 kg, dry mass 0.888 kg

## Sampling procedure
literature

## Extrapolations
This dataset has been extrapolated from year 2007 to the year of the calculation (2019). The uncertainty has been adjusted accordingly.

## Review by Jürgen Sutter 2007-09-13
passed.
