# treatment of condensate from light oil boiler, capacity 1.1E10l/year

Dataset: EcoSpold 2, unit process
Geography: CH
Time period: 1994-01-01 to 2019-12-31
Technology level: current
Classification: EcoSpold01Categories: waste management/wastewater treatment
Classification: ISIC rev.4 ecoinvent: 3700:Sewerage
Tags: ConvertedDataset; Treatment
Scenario: Business-as-Usual
System model: Allocation at the point of substitution
Generated by: Gabor Doka (obsolete)
Published in: Doka G. 2008
Database: ecoinvent
isCopyrightProtected: true
accessRestrictedTo: 1

## General comment
Wastewater purified in a moderatly large municipal wastewater treatment plant (capacity class 2), with an average capacity size of 71100 per-captia-equivalents PCE.
Wastewater contains (in kg/m3): TOC: 0.025 (GSD=128.4%); SO4-S: 0.084 (GSD=128.4%); NO3-N: 0.002 (GSD=128.4%); Cl: 0.01 (GSD=226.6%); F: 0.00045 (GSD=226.6%); Cr: 0.0004 (GSD=226.6%); Cu: 0.00003 (GSD=226.6%); Ni: 0.002 (GSD=226.6%); Zn: 0.00002 (GSD=226.6%); Fe: 0.002 (GSD=226.6%); Al: 0.02 (GSD=226.6%);
[This dataset was already contained in the ecoinvent database version 2. It was not individually updated during the transfer to ecoinvent version 3. Life Cycle Impact Assessment results may still have changed, as they are affected by changes in the supply chain, i.e. in other datasets. This dataset was generated following the ecoinvent quality guidelines for version 2. It may have been subject to central changes described in the ecoinvent version 3 change report (http://www.ecoinvent.org/database/ecoinvent-version-3/reports-of-changes/), and the results of the central updates were reviewed extensively. The changes added e.g. consistent water flows and other information throughout the database. The documentation of this dataset can be found in the ecoinvent reports of version 2, which are still available via the ecoinvent website. The change report linked above covers all central changes that were made during the conversion process.]

## Included activities end
Infrastructure materials for municipal wastewater treatment plant, transports, dismantling. Land use burdens.

## Geography
Specific to the technology mix encountered in Switzerland in 2000. Well applicable to modern treatment practices in Europe, North America or Japan.

## Technology
Three stage wastewater treatment (mechanical, biological, chemical) including sludge digestion (fermentation) according to the average technology in Switzerland

## Parameters
- fraction, process water, to air: 0.1 dimensionless; name fraction_PW_to_air; lognormal variance with pedigree 0.092025, pedigree (4,4,3,2,4)
  Literature value (Statistics Canada, 2007 & Shaffer, K.H., 2008, Consumptive water use in the Great Lakes Basin, USGS) (Vionnet, S., Quantis Water Database - Technical Report, 2012).

## Reference product
- condensate from light oil boiler: -1 m3; CPC 94110: Sewerage and sewage treatment services; By-product classification Waste
  production volume 0.0336675 m3
    This is a placeholder value that does not reflect real-world production volumes. This dataset does not currently require a real-world production volume to work in the database framework, and no actual data were collected yet. This has no negative effect on the results of the ecoinvent database. The placeholder value of this activity was scaled according to the nominal GDP of 2005 (source: United Nations, http://data.un.org/Glossary.aspx?q=GDP+%28current+US%24%29, accessed 20130726) to reflect an appropriate share of the global production volume, which is also a placeholder value.
  property price 0 EUR2005
    Waste products are assigned a price of zero as they are assumed to require further treatment.
  property carbon content, fossil 0.0740793
    0.025 kg TOC/m3 (Tab A.18, ecoinvent v2.2 report 13_I). TOC was considered as Total Carbon.
  property carbon content 0.0740793
    carbon content on a dry matter basis (reserved; not for manual entry)
  properties: dry mass 0.337476 kg, water in wet mass 999.663 kg, wet mass 1000 kg, carbon content, non-fossil 0, water content 2962.17, carbon allocation 0.025 kg

## By-products
- electricity, for reuse in municipal waste incineration only: 0 kWh; CPC 17100: Electrical energy; By-product classification allocatable product; pedigree (1,1,1,1,1)
  Net electricity generated from this waste and used in internal MSWI plant energy redistribution.
  Uncertainty: uncertainty is calculated from uncertainties in waste composition and uncertainties in energy efficiency and the uncertainty in internal energy demand
  property exergy 3.6 MJ; name E_el_prod_MSWI_exergy
    This exergy property is based on the exergy content of the product.
  property true value relation 3.6; name E_el_prod_MSWI_true_value_relation
    property to calculate "true value" from
  property price 0.1 EUR2005; name E_el_prod_MSWI_price_EUR2005
    Estimated to be the same price as in case of electricity, medium voltage.
- heat, for reuse in municipal waste incineration only: 0 MJ; CPC 17300: Steam and hot water; By-product classification allocatable product; pedigree (1,1,1,1,1)
  Net useful heat generated from this waste and used in internal MSWI plant energy redistribution.
  Uncertainty: uncertainty is calculated from uncertainties in waste composition and uncertainties in energy efficiency and the uncertainty in internal energy demand
  property exergy 0.1842 MJ; name E_th_prod_MSWI_exergy
    This exergy property is based on the exergy content of the product.
  property true value relation 0.1842; name E_th_prod_MSWI_true_value_relation
    property to calculate "true value" from
  property price 0.0106 EUR2005; name E_th_prod_MSWI_price_EUR2005
    Average European district heat price from Ecoheatcool and Euroheat 2005-2006, Ecoheat Work package 1: The European heat market. Final report. 10.6 EUR/GJ i s the price of district heat. http://www.solarthermalworld.org/files/Ecoheatcool%20WP1%20Web.pdf?download
- zinc concentrate: 0 kg; CPC 14290: Other non-ferrous metal ores and concentrates (other than uranium or thorium ores and concentrates); By-product classification allocatable product
  Calculated value from the knowledge of the properties of both products.
  property price 0.38 EUR2005; name ByP_price_EUR2005
    Temporary price data. Calculated as 90% of purchasers price based on: Zinc content in concentrate 53%. Concentrate price per kg Zn 86.5% of refined Zn price (13.5% treatment charges according to CHR Metals Limited 2005: Dynamic cost curves. http://www.minecost.com/dynamic.pdf). 2004 zinc price from USGS (2007) Mineral commodity summaries 2007. <http://minerals.usgs.gov/minerals/pubs/mcs/2007/mcs2007.pdf> [Accessed 25 May 2010]
  property zinc content 0.53; name zinc_C_zinc_concentrate
    Zinc content on a dry matter basis. Value taken from teh "zinc mine operation" /GLO dataset.
  property dry mass 1 kg; name DM_zinc_concentrate
  property carbon content 0
    carbon content on a dry matter basis (reserved; not for manual entry)
  properties: wet mass 1 kg, water content 0, carbon content, non-fossil 0, carbon content, fossil 0, water in wet mass 0 kg, carbon allocation 0 kg

## Inputs from technosphere
- quicklime, milled, packed: 4.0302e-9 kg; lognormal variance with pedigree 0.16, pedigree (1,1,5,1,1)
  burden from sludge incineration. Uncertainty calculated from wastewater composition and treatment model
  properties: dry mass 0.99 kg, water content 0.010101, wet mass 1 kg
- heat, district or industrial, other than natural gas: 0.063433 MJ; lognormal variance with pedigree 0.12, pedigree (1,1,5,1,1)
  (same comment as for quicklime, milled, packed)
- sewer grid, 1.1E10l/year, 242 km: 1.6832e-7 km; lognormal variance with pedigree 0.04, pedigree (1,1,5,1,1)
  uncertainty heeded in exchanges of the module
  This exchange has an activity link directly to the producing activity because the product is primarily consumed in the same geographical area where it is produced.
- electricity, low voltage: 0.066203 kWh; lognormal variance with pedigree 0.12, pedigree (1,1,5,1,1)
  direct wastewater treatment plant burden. Uncertainty calculated from wastewater composition and treatment model
- process-specific burdens, slag landfill: 0.019845 kg; lognormal variance with pedigree 0.07, pedigree (1,1,5,1,1)
  burden from sludge incineration. Uncertainty calculated from wastewater composition and treatment model;activityLink introduced to establish a direct link to the corresponding regional supply of this product
- chemical, inorganic: 4.4894e-8 kg; lognormal variance with pedigree 0.38, pedigree (1,1,5,1,1)
  (same comment as for quicklime, milled, packed)
  properties: wet mass 1 kg, dry mass 1 kg, carbon content, fossil 0.003
  note on carbon content, fossil: This dataset is an unweighted average of 20 inorganic substances (listed in Tab 88.1, ecoinvent v2.2 report 8, part II), being part of the top100 chemicals included in this database. The C-content has also been calculated as an unweighted average of the C content of the substances composing this dataset.
- municipal waste incineration facility: 1.8909e-11 unit; lognormal variance with pedigree 0.12, pedigree (1,1,5,1,1)
  (same comment as for quicklime, milled, packed)
- ammonia, liquid: 4.4735e-7 kg; lognormal variance with pedigree 0.27, pedigree (1,1,5,1,1)
  (same comment as for quicklime, milled, packed)
  properties: wet mass 1 kg, dry mass 1 kg
- electricity, high voltage: 0.010874 kWh; lognormal variance with pedigree 0.56, pedigree (1,1,5,1,1)
  (same comment as for quicklime, milled, packed)
- chromium oxide, flakes: 2.6133e-10 kg; lognormal variance with pedigree 0.59, pedigree (1,1,5,1,1)
  (same comment as for quicklime, milled, packed)
  properties: dry mass 1 kg, wet mass 1 kg
- titanium dioxide: 1.2805e-8 kg; lognormal variance with pedigree 0.59, pedigree (1,1,5,1,1)
  (same comment as for quicklime, milled, packed)
  properties: dry mass 1 kg, wet mass 1 kg
- cement, unspecified: 0.0013742 kg; lognormal variance with pedigree 0.08, pedigree (1,1,5,1,1)
  (same comment as for quicklime, milled, packed)
  properties: wet mass 1 kg, dry mass 1 kg
- process-specific burdens, residual material landfill: 0.0034355 kg; lognormal variance with pedigree 0.07, pedigree (1,1,5,1,1)
  (same comment as for process-specific burdens, slag landfill)
- wastewater treatment facility, capacity 1.1E10l/year: 1.9883e-9 unit; lognormal variance with pedigree 0.04, pedigree (1,1,5,1,1)
  (same comment as for sewer grid, 1.1E10l/year, 242 km)
- process-specific burdens, municipal waste incineration: 0.075634 kg; lognormal variance with pedigree 0.12, pedigree (1,1,5,1,1)
  (same comment as for process-specific burdens, slag landfill)
- iron (III) chloride, without water, in 40% solution state: 5.6876e-6 kg; lognormal variance with pedigree 0.55, pedigree (1,1,5,1,1)
  direct wastewater treatment plant burden plus burden from sludge incineration. Uncertainty calculated from wastewater composition and treatment model
  properties: dry mass 1 kg, wet mass 1 kg
- waste cement, hydrated: -0.0034355 kg; lognormal variance with pedigree 0.08, pedigree (1,1,5,1,1)
  (same comment as for quicklime, milled, packed)
  production volume 0.0034355 kg
    Calculated from the production volume of condensate from light oil boiler in proportion to the respective output amounts.
  properties: dry mass 1 kg, wet mass 1 kg
- heat, district or industrial, natural gas: 3.92643e-5 MJ; lognormal variance with pedigree 0.27, pedigree (1,1,5,1,1)
  (same comment as for quicklime, milled, packed)
- residual material landfill: 7.1573e-12 unit; lognormal variance with pedigree 0.07, pedigree (1,1,5,1,1)
  (same comment as for quicklime, milled, packed)
- liquid manure spreading, by vacuum tanker: 0.00017697 m3; lognormal variance with pedigree 0.04, pedigree (1,1,5,1,1)
  burden from sludge spreading. Uncertainty calculated from wastewater composition and treatment model
  This exchange has an activity link directly to the producing activity because the product is primarily consumed in the same geographical area where it is produced.
- waste graphical paper: -0.0155 kg; lognormal variance with pedigree 0.04, pedigree (1,1,5,1,1)
  (same comment as for electricity, low voltage)
  production volume 0.0155 kg
    (same comment as for waste cement, hydrated)
  properties: water content 0.126126, carbon content, non-fossil 0.454955, wet mass 1 kg, dry mass 0.888 kg
- hydrochloric acid, without water, in 30% solution state: 2.6937e-8 kg; lognormal variance with pedigree 0.38, pedigree (1,1,5,1,1)
  (same comment as for quicklime, milled, packed)
  properties: dry mass 1 kg, wet mass 1 kg
- slag landfill: 3.5279e-11 unit; lognormal variance with pedigree 0.07, pedigree (1,1,5,1,1)
  (same comment as for quicklime, milled, packed)
- sodium hydroxide, without water, in 50% solution state: 2.2229e-8 kg; lognormal variance with pedigree 0.16, pedigree (1,1,5,1,1)
  (same comment as for quicklime, milled, packed)
  properties: wet mass 1 kg, dry mass 1 kg
- waste plastic, mixture: -0.0155 kg; lognormal variance with pedigree 0.04, pedigree (1,1,5,1,1)
  (same comment as for electricity, low voltage)
  production volume 0.0155 kg
    (same comment as for waste cement, hydrated)
  properties: water content 0.180638, wet mass 1 kg, dry mass 0.847 kg, carbon content, fossil 0.747344
  note on carbon content, fossil: C content in 1 kg DM was calculated using data in Tab A.2, ecoinvent v2.2 report 13_I

## Emissions to nature
- Nickel [air, urban air close to ground]: 2.0835e-11 kg; lognormal variance with pedigree 0.83, pedigree (1,1,5,1,1)
  direct digester gas emission plus emission from sludge incineration. Uncertainty calculated from wastewater composition and treatment model
- Nitrogen [water, surface water]: 6.8098e-6 kg; lognormal variance with pedigree 0.13, pedigree (1,1,5,1,1)
  direct wastewater treatment plant emission. Uncertainty calculated from wastewater composition and treatment model
- Copper, ion [water, surface water]: 7.7818e-6 kg; lognormal variance with pedigree 0.66, pedigree (1,1,5,1,1)
  sewer overload discharge plus direct wastewater treatment plant emission plus emission from sludge incineration. Uncertainty calculated from wastewater composition and treatment model
- BOD5, Biological Oxygen Demand [water, surface water]: 0.0036744 kg; lognormal variance with pedigree 0.05, pedigree (1,1,5,1,1)
  (same comment as for Copper, ion)
- Nitrogen oxides [air, urban air close to ground]: 4.3453e-6 kg; lognormal variance with pedigree 0.13, pedigree (1,1,5,1,1)
  (same comment as for Nickel)
- Chloride [water, surface water]: 0.01 kg; lognormal variance with pedigree 0.69, pedigree (1,1,5,1,1)
  (same comment as for Copper, ion)
- Nickel, ion [water, surface water]: 0.0012131 kg; lognormal variance with pedigree 0.68, pedigree (1,1,5,1,1)
  (same comment as for Copper, ion)
- Iron [air, urban air close to ground]: 2.0166e-8 kg; lognormal variance with pedigree 0.77, pedigree (1,1,5,1,1)
  (same comment as for Nickel)
- Water [water, unspecified]: 0.9 m3; name water_to_water_unspecified; lognormal variance with pedigree 0.0807, pedigree (2,2,5,1,1)
  Calculated value based on water balance.
  property fraction, origin: salt water 0; name fraction_origin_salt_water_Ww
  property water in wet mass 1000 kg; name WWM
  property wet mass 1000 kg; name WM
  property dry mass 0 kg; name DM
  property carbon content, fossil 0; name C_content_fossil
  property fraction, origin: unspecified 0; name fraction_origin_unspecified_Ww
  property carbon content, non-fossil 0; name C_content_non_fossil
  property fraction, origin: fresh water 1; name fraction_origin_fresh_water_Ww
- Aluminium [water, ground-, long-term]: 0.0085323 kg; lognormal variance with pedigree 0.74, pedigree (1,1,5,1,1)
  emission from sludge incineration. Uncertainty calculated from wastewater composition and treatment model
- BOD5, Biological Oxygen Demand [water, ground-, long-term]: 3.1796e-5 kg; lognormal variance with pedigree 0.07, pedigree (1,1,5,1,1)
  (same comment as for Aluminium)
- Water [air, unspecified]: 0.1 m3; name water_to_air_unspecified; lognormal variance with pedigree 0.0807, pedigree (2,2,5,1,1)
  Calculated value based on water balance.
  property fraction, origin: salt water 0; name fraction_origin_salt_water
  property fraction, origin: fresh water 0; name fraction_origin_fresh_water
  property fraction, origin: unspecified 1; name fraction_origin_unspecified
- Nitrate [water, surface water]: 0.0074931 kg; lognormal variance with pedigree 0.1, pedigree (1,1,5,1,1)
  (same comment as for Copper, ion)
- Iron, ion [water, ground-, long-term]: 0.00028294 kg; lognormal variance with pedigree 1.56, pedigree (1,1,5,1,1)
  (same comment as for Aluminium)
- Zinc, ion [water, surface water]: 6.1836e-6 kg; lognormal variance with pedigree 0.67, pedigree (1,1,5,1,1)
  (same comment as for Copper, ion)
- Fluoride [water, surface water]: 0.00045 kg; lognormal variance with pedigree 0.69, pedigree (1,1,5,1,1)
  (same comment as for Copper, ion)
- Aluminium [soil, agricultural]: 0.007271 kg; lognormal variance with pedigree 0.73, pedigree (1,1,5,1,1)
  emission from sludge spreading. Uncertainty calculated from wastewater composition and treatment model
- Nitrate [water, ground-, long-term]: 3.1854e-7 kg; lognormal variance with pedigree 0.14, pedigree (1,1,5,1,1)
  (same comment as for Aluminium)
- Zinc [air, urban air close to ground]: 1.3844e-10 kg; lognormal variance with pedigree 0.78, pedigree (1,1,5,1,1)
  (same comment as for Nickel)
- Chromium VI [water, ground-, long-term]: 1.2789e-5 kg; lognormal variance with pedigree 1.11, pedigree (1,1,5,1,1)
  (same comment as for Aluminium)
- Chromium, ion [water, surface water]: 3.8504e-7 kg; lognormal variance with pedigree 0.74, pedigree (1,1,5,1,1)
  (same comment as for Aluminium)
- Chromium VI [water, surface water]: 0.00020694 kg; lognormal variance with pedigree 0.66, pedigree (1,1,5,1,1)
  (same comment as for Copper, ion)
- Zinc, ion [water, ground-, long-term]: 1.3138e-7 kg; lognormal variance with pedigree 5.53, pedigree (1,1,5,1,1)
  (same comment as for Aluminium)
- Aluminium [water, surface water]: 0.0012005 kg; lognormal variance with pedigree 0.56, pedigree (1,1,5,1,1)
  (same comment as for Copper, ion)
- Sulfate [water, surface water]: 0.25661 kg; lognormal variance with pedigree 0.1, pedigree (1,1,5,1,1)
  (same comment as for Copper, ion)
- Aluminium [air, urban air close to ground]: 1.8011e-5 kg; lognormal variance with pedigree 0.75, pedigree (1,1,5,1,1)
  (same comment as for Nickel)
- Carbon dioxide, fossil [air, urban air close to ground]: 0.071518 kg; lognormal variance with pedigree 0.05, pedigree (1,1,5,1,1)
  (same comment as for Aluminium)
- Iron, ion [water, surface water]: 0.0010152 kg; lognormal variance with pedigree 0.68, pedigree (1,1,5,1,1)
  (same comment as for Copper, ion)
- Zinc [soil, agricultural]: 5.344e-6 kg; lognormal variance with pedigree 0.73, pedigree (1,1,5,1,1)
  (same comment as for Aluminium)
- DOC, Dissolved Organic Carbon [water, ground-, long-term]: 3.8465e-5 kg; lognormal variance with pedigree 0.07, pedigree (1,1,5,1,1)
  (same comment as for Aluminium)
- Chromium [air, urban air close to ground]: 8.9329e-12 kg; lognormal variance with pedigree 0.82, pedigree (1,1,5,1,1)
  (same comment as for Nickel)
- Carbon monoxide, fossil [air, urban air close to ground]: 6.7344e-5 kg; lognormal variance with pedigree 0.14, pedigree (1,1,5,1,1)
  (same comment as for Aluminium)
- Cyanide [air, urban air close to ground]: 7.9805e-9 kg; lognormal variance with pedigree 0.29, pedigree (1,1,5,1,1)
  (same comment as for Aluminium)
- COD, Chemical Oxygen Demand [water, surface water]: 0.011189 kg; lognormal variance with pedigree 0.04, pedigree (1,1,5,1,1)
  (same comment as for Copper, ion)
- DOC, Dissolved Organic Carbon [water, surface water]: 0.0028001 kg; lognormal variance with pedigree 0.04, pedigree (1,1,5,1,1)
  (same comment as for Copper, ion)
- TOC, Total Organic Carbon [water, surface water]: 0.0029977 kg; lognormal variance with pedigree 0.04, pedigree (1,1,5,1,1)
  (same comment as for Copper, ion)
- Dinitrogen monoxide [air, urban air close to ground]: 5.4378e-6 kg; lognormal variance with pedigree 0.1, pedigree (1,1,5,1,1)
  direct wastewater treatment plant emission plus direct digester gas emission plus emission from sludge incineration plus emission from sludge spreading. Uncertainty calculated from wastewater composition and treatment model
- COD, Chemical Oxygen Demand [water, ground-, long-term]: 9.7208e-5 kg; lognormal variance with pedigree 0.07, pedigree (1,1,5,1,1)
  (same comment as for Aluminium)
- TOC, Total Organic Carbon [water, ground-, long-term]: 3.8465e-5 kg; lognormal variance with pedigree 0.07, pedigree (1,1,5,1,1)
  (same comment as for Aluminium)
- Carbon [soil, agricultural]: 0.0024842 kg; lognormal variance with pedigree 0.06, pedigree (1,1,5,1,1)
  (same comment as for Aluminium)
- Nickel, ion [water, ground-, long-term]: 0.00045199 kg; lognormal variance with pedigree 0.73, pedigree (1,1,5,1,1)
  (same comment as for Aluminium)
- Copper, ion [water, ground-, long-term]: 1.1014e-5 kg; lognormal variance with pedigree 0.75, pedigree (1,1,5,1,1)
  (same comment as for Aluminium)
- Iron [soil, agricultural]: 0.00038094 kg; lognormal variance with pedigree 0.73, pedigree (1,1,5,1,1)
  (same comment as for Aluminium)
- Copper [soil, agricultural]: 8.5929e-6 kg; lognormal variance with pedigree 0.73, pedigree (1,1,5,1,1)
  (same comment as for Aluminium)
- NMVOC, non-methane volatile organic compounds, unspecified origin [air, urban air close to ground]: 8.4744e-7 kg; lognormal variance with pedigree 0.21, pedigree (1,1,5,1,1)
  direct digester gas emission. Uncertainty calculated from wastewater composition and treatment model
- Chromium [soil, agricultural]: 7.6188e-5 kg; lognormal variance with pedigree 0.73, pedigree (1,1,5,1,1)
  (same comment as for Aluminium)
- Ammonia [air, urban air close to ground]: 2.2109e-6 kg; lognormal variance with pedigree 0.32, pedigree (1,1,5,1,1)
  direct digester gas emission plus emission from sludge incineration plus emission from sludge spreading. Uncertainty calculated from wastewater composition and treatment model
- Nickel [soil, agricultural]: 0.00030444 kg; lognormal variance with pedigree 0.73, pedigree (1,1,5,1,1)
  (same comment as for Aluminium)
- Methane, fossil [air, urban air close to ground]: 0.00018674 kg; lognormal variance with pedigree 0.1, pedigree (1,1,5,1,1)
  (same comment as for Aluminium)
- Copper [air, urban air close to ground]: 1.0058e-10 kg; lognormal variance with pedigree 0.78, pedigree (1,1,5,1,1)
  (same comment as for Nickel)

## Extrapolations
This dataset has been extrapolated from year 2000 to the year of the calculation (2019). The uncertainty has been adjusted accordingly.

## Review by Niels Jungbluth 2009-01-22
passed.
