# maintenance, motor scooter

Dataset: EcoSpold 2, unit process
Geography: CH
Time period: 2007-01-01 to 2019-12-31
Technology level: current
Classification: ISIC rev.4 ecoinvent: 4540:Sale, maintenance and repair of motorcycles and related parts and accessori
Classification: EcoSpold01Categories: transport systems/road
Tags: ConvertedDataset
Scenario: Business-as-Usual
System model: Allocation at the point of substitution
Generated by: Marianne Leuenberger
Published in: Spielmann M. 2007
Database: ecoinvent
isCopyrightProtected: true
accessRestrictedTo: 1

## General comment
The data reflects the replacement of parts for the maintenance of a scooter of c 90kg (50cc). Mainly plastic and steel parts are replaced. Battery replacement: once. Life expectancy battery: 25'000 km.
[This dataset was already contained in the ecoinvent database version 2. It was not individually updated during the transfer to ecoinvent version 3. Life Cycle Impact Assessment results may still have changed, as they are affected by changes in the supply chain, i.e. in other datasets. This dataset was generated following the ecoinvent quality guidelines for version 2. It may have been subject to central changes described in the ecoinvent version 3 change report (http://www.ecoinvent.org/database/ecoinvent-version-3/reports-of-changes/), and the results of the central updates were reviewed extensively. The changes added e.g. consistent water flows and other information throughout the database. The documentation of this dataset can be found in the ecoinvent reports of version 2, which are still available via the ecoinvent website. The change report linked above covers all central changes that were made during the conversion process.]

## Included activities end
This data sets includes the maintenance of a scooter throughout its life cycle.

## Geography
Data cover maintenance in Switzerland

## Technology
Maintenance of a scooter (50cc)

## Parameters
- fraction, process water, to air: 0.15 dimensionless; name fraction_PW_to_air; lognormal variance with pedigree 0.092025, pedigree (4,4,3,2,4)
  Literature value. In case when no industry/process specific data are available, default evaporation fraction value is used. This value is 15% and is based on literature (Statistics Canada, 2007 & Shaffer, K.H., 2008, Consumptive water use in the Great Lakes Basin, USGS & Shiklomanov, 2003, World Water Resources at the Beginning of the 21st Century) and has been approved by an expert.
- fraction, tap water, to air: 0.15; name fraction_TW_to_air; = fraction_PW_to_air; lognormal variance with pedigree 0.092025, pedigree (4,4,3,2,4)
  Calculated value. See comment in the other parametres present in this dataset. Tap water is considered to be always used as process water, thus process water fractions to air are applied to all tap water input flows to calculate the amount of water consumed in the processes.

## Reference product
- maintenance, motor scooter: 1 unit; CPC 87142: Maintenance and repair services of motorcycles; By-product classification allocatable product
  EcoSpold01Location=CH
  production volume 0.0336675 unit
    This is a placeholder value that does not reflect real-world production volumes. This dataset does not currently require a real-world production volume to work in the database framework, and no actual data were collected yet. This has no negative effect on the results of the ecoinvent database. The placeholder value of this activity was scaled according to the nominal GDP of 2005 (source: United Nations, http://data.un.org/Glossary.aspx?q=GDP+%28current+US%24%29, accessed 20130726) to reflect an appropriate share of the global production volume, which is also a placeholder value.
  property price 79.9119 EUR2005
    Calculated based on inputs: The price of the product has been calculated as a sum of the values of the material and energy inputs for this product. This value is therefore a rough estimation. It may underestimate the real price since there are additional expenses when producing any product. These expences can include for example labour costs, treatment of waste materials and profit for the producer. Please consider carefully whether this level of data quality is acceptable for your application.
  property true value 79.9119
    allocation property applied in "true value" allocation // value calculated from revenue

## By-products
- iron scrap, sorted, pressed: 0 kg; By-product classification Recyclable; CPC 39310: Slag, dross, scalings and other waste from the manufacture of iron or steel; pedigree (1,1,1,1,1)
  this flow replaces the output "Ni-Co-Fe residues from Ni-metal hydride battery, pyrometallurgical processing"
  Uncertainty: data of 1 European plant - reported in Fisher (2006)
  production volume 0.24934 kg
  property wet mass 1 kg; name WM
  property carbon content, fossil 0; name C_content_fossil
  property carbon content, non-fossil 0; name C_content_non_fossil
  property water content 0; name water_content
  property dry mass 1 kg; name DM
  property price 0.175 EUR2005
    Temporary price data. Calculated as 90% of purchasers price based on: 2005 import and export prices (total trades (USD) divided by total weight (kg) in biggest economies of the world: EU27, USA, Brasil, China, India, Japan and Russia) from UN Commodity Trade Statistics Database (http://data.un.org/Explorer.aspxDatabase [Accessed 2011.06.20]). Commodity: Waste or scrap, of cast iron
  property water in wet mass 0 kg; name WWM
  property carbon content 0
    carbon content on a dry matter basis (reserved; not for manual entry)
  property true value 0.0969481
    allocation property applied in "true value" allocation // value calculated from revenue
  properties: carbon allocation 0 kg
- heat, for reuse in municipal waste incineration only: 0 MJ; CPC 17300: Steam and hot water; By-product classification allocatable product; pedigree (1,1,1,1,1)
  Net electricity generated from this waste and used in internal MSWI plant energy redistribution.
  Uncertainty: uncertainty is calculated from uncertainties in waste composition and uncertainties in energy efficiency and the uncertainty in internal energy demand
  production volume 163.686 MJ
  property exergy 0.1842 MJ; name E_th_prod_MSWI_exergy
    This exergy property is based on the exergy content of the product.
  property price 0.0106 EUR2005; name E_th_prod_MSWI_price_EUR2005
    Average European district heat price from Ecoheatcool and Euroheat 2005-2006, Ecoheat Work package 1: The European heat market. Final report. 10.6 EUR/GJ i s the price of district heat. http://www.solarthermalworld.org/files/Ecoheatcool%20WP1%20Web.pdf?download
  property true value relation 0.1842; name E_th_prod_MSWI_true_value_relation
    property to calculate "true value" from
  property true value 1.07526
    allocation property applied in "true value" allocation // value calculated from true value relation
- electricity, for reuse in municipal waste incineration only: 0 kWh; CPC 17100: Electrical energy; By-product classification allocatable product; pedigree (1,1,1,1,1)
  (same comment as for heat, for reuse in municipal waste incineration only)
  production volume 23.3039 kWh
  property price 0.1 EUR2005; name E_el_prod_MSWI_price_EUR2005
    Estimated to be the same price as in case of electricity, medium voltage.
  property exergy 3.6 MJ; name E_el_prod_MSWI_exergy
    This exergy property is based on the exergy content of the product.
  property true value relation 3.6; name E_el_prod_MSWI_true_value_relation
    property to calculate "true value" from
  property true value 2.99188
    (same comment as for heat, for reuse in municipal waste incineration only)
- zinc concentrate: 0 kg; CPC 14290: Other non-ferrous metal ores and concentrates (other than uranium or thorium ores and concentrates); By-product classification allocatable product
  Calculated value from the knowledge of the properties of both products.
  production volume 0.0294106 kg
  property price 0.38 EUR2005; name ByP_price_EUR2005
    Temporary price data. Calculated as 90% of purchasers price based on: Zinc content in concentrate 53%. Concentrate price per kg Zn 86.5% of refined Zn price (13.5% treatment charges according to CHR Metals Limited 2005: Dynamic cost curves. http://www.minecost.com/dynamic.pdf). 2004 zinc price from USGS (2007) Mineral commodity summaries 2007. <http://minerals.usgs.gov/minerals/pubs/mcs/2007/mcs2007.pdf> [Accessed 25 May 2010]
  property zinc content 0.53; name zinc_C_zinc_concentrate
    Zinc content on a dry matter basis. Value taken from teh "zinc mine operation" /GLO dataset.
  property dry mass 1 kg; name DM_zinc_concentrate
  property carbon content 0
    carbon content on a dry matter basis (reserved; not for manual entry)
  property true value 0.011176
    allocation property applied in "true value" allocation // value calculated from revenue
  properties: wet mass 1 kg, water content 0, carbon content, non-fossil 0, carbon content, fossil 0, water in wet mass 0 kg, carbon allocation 0 kg
- cobalt: 0 kg; CPC 41601: Tungsten, molybdenum, tantalum, magnesium, cobalt, cadmium, titanium, zirconium, beryllium, gallium, hafnium, […]; By-product classification allocatable product
  EcoSpold01Location=GLO
  production volume 0.0908552 kg
  property price 39.7 EUR2005
    Temporary price data. Calculated as 90% of purchasers price based on: Cobalt in USGS (2007) Mineral commodity summaries 2007. <http://minerals.usgs.gov/minerals/pubs/mcs/2007/mcs2007.pdf>
  property carbon content 0
    carbon content on a dry matter basis (reserved; not for manual entry)
  property true value 6.55905
    allocation property applied in "true value" allocation // value calculated from revenue
  properties: dry mass 1 kg, water content 0, water in wet mass 0 kg, carbon content, non-fossil 0, wet mass 1 kg, carbon content, fossil 0, carbon allocation 0 kg
- iron scrap, unsorted: 0 kg; CPC 39310: Slag, dross, scalings and other waste from the manufacture of iron or steel; By-product classification Recyclable
  This flow substitutes the original byproduct "iron and steel, from used Li-ion battery pyrometallurgical process". Following an update in the production process of Li-battery, the byproduct of steel corresponds to reinforcing steel.
  production volume 0.0743621 kg
  property price 0.149 EUR2005
    Temporary price data. Calculated as 90% of purchasers price based on: estimated at 85% of sorted scrap
  property carbon content 0
    carbon content on a dry matter basis (reserved; not for manual entry)
  property true value 0.0201483
    allocation property applied in "true value" allocation // value calculated from revenue
  properties: carbon content, fossil 0, wet mass 1 kg, water in wet mass 0 kg, carbon content, non-fossil 0, water content 0, dry mass 1 kg, carbon allocation 0 kg
- lithium carbonate: 0 kg; CPC 34240: Phosphates of triammonium; salts and peroxysalts of inorganic acids and metals n.e.c.; By-product classification allocatable product; CAS 554-13-2
  EcoSpold01Location=GLO
  production volume 0.0338145 kg
  property price 6.75 EUR2005
    For lithium, there is no exchange trading, no terminal storage market and only an extremely limited spot market (Reuters, 2016). The lithium price is negotiated bilateral and based on customer specifications with price information rarely publicly documented (European Lithium, 2017). Roskill Information Services estimate the price for technical grade lithium carbonate in 2017 between 6900 and 7800 USD per tonne, with a price premium of 500 USD for battery grade lithium (European Lithium, 2017). USGS estimates the price for lithium carbonate, battery grade, to be 7400USD in 2016 (USGS, 2017). Here an average price of 7500 USD per tonne lithium carbonate is assumed, average exchange rate 1 USD = 0.9 EUR in 2017 (Oanda, 2017). Resulting in a price for lithium carbonate of 6.75EUR/kg.
    Reference(s):
    European Lithium. 2017. Lithium Market. Online source: http://europeanlithium.com/lithium/lithium-market/, accessed 10 October 2017.
    Reuters. 2016. What price lithium, the metal of the future? Andy Home. Online source: https://www.reuters.com/article/us-lithium-batteries-ahome/what-price-lithium-the-metal-of-the-future-andy-home-idUSKCN0YS19D, accessed 10 October 2017.
    Oanda. 2017. https://www.oanda.com/lang/de/currency/average, accessed 10 October 2017.
    USGS. 2017. Lithium. Commodity Overview. Online https://minerals.usgs.gov/minerals/pubs/commodity/lithium/mcs-2017-lithi.pdf, accessed 10 October, 2017.
  property carbon content 0.16255
    carbon content on a dry matter basis (reserved; not for manual entry)
  property true value 0.415057
    allocation property applied in "true value" allocation // value calculated from revenue
  properties: dry mass 1 kg, carbon content, non-fossil 0, water in wet mass 0 kg, carbon content, fossil 0.16255, water content 0, wet mass 1 kg, carbon allocation 0.16255 kg
- sulfuric acid: 0 kg; source Althaus H.-J. 2004; CPC 34231: Chemical elements n.e.c.; inorganic acids except phosphoric, nitric and sulphonitric; inorganic oxygen compoun[…]; By-product classification allocatable product; pedigree (1,1,1,1,1)
  production volume 0.043549 kg
  properties: price 0.031 EUR2005, carbon content, non-fossil 0, dry mass 1 kg, carbon content, fossil 0, wet mass 1 kg, water content 0, water in wet mass 0 kg, carbon content 0, carbon allocation 0 kg, true value 0.00245494
- copper: 0 kg; By-product classification allocatable product; CPC 41413: Refined copper and copper alloys, unwrought; master alloys of copper; pedigree (1,1,1,1,1)
  Calculated value. Based on Li-ioin battery composition and hydrometallurgical treatment process outputs. The efficiency of Cu, Al and Manganese recovery is estimated 70% based on the estimations of the original process for Cu recovery.
  production volume 0.0124292 kg
  property price 5.52 EUR2005; name copper_bp_price_EUR2005
    Literature value (http://www.economist.com/news/business/21576714-mining-industry-has-enriched-chile-its-future-precarious-copper-solution). Average price between 20015 and 2013.
  property carbon content 0
    carbon content on a dry matter basis (reserved; not for manual entry)
  property true value 0.124762
    allocation property applied in "true value" allocation // value calculated from revenue
  properties: carbon content, non-fossil 0, water in wet mass 0 kg, wet mass 1 kg, water content 0, dry mass 1 kg, carbon content, fossil 0, carbon allocation 0 kg
- manganese: 0 kg; CPC 41603: Bismuth, antimony, manganese, chromium and articles thereof; including waste and scrap of bismuth or manganese; By-product classification allocatable product; pedigree (1,1,1,1,1)
  (same comment as for copper)
  production volume 0.00222356 kg
  property price 1.24 EUR2005; name manganese_bp_price_EUR2005
    Literature value (USGS,http://minerals.usgs.gov/minerals/pubs/commodity/manganese/myb1-2009-manga.pdf, accessed 20160222). The price for manganese ore (48% manganese) is reported to be 6.61 USD/metric ton unit (MTU) = 10kg. The resulting price is (1/0.48*0.661=) 1.38 USD. Cross reference; in 2005 manganese was traded on the markets for 1.5 USD/kg (http://www.infomine.com/investment/metal-prices/manganese/all/, accessed 20160704).
  property carbon content 0
    carbon content on a dry matter basis (reserved; not for manual entry)
  property true value 0.00501385
    allocation property applied in "true value" allocation // value calculated from revenue
  properties: dry mass 1 kg, water in wet mass 0 kg, carbon content, fossil 0, wet mass 1 kg, carbon content, non-fossil 0, water content 0, carbon allocation 0 kg
- aluminium oxide, non-metallurgical: 0 kg; source European Aluminium Association 2008; CPC 41432: Alumina (aluminium oxide), except artificial corundum; By-product classification allocatable product; CAS 1344-28-1; pedigree (1,1,1,1,1)
  production volume 0.000147752 kg
  property carbon content, non-fossil 0; name C_content_non_fossil
  property price 0.28 EUR2005; name Al2O3Amount_price_EUR2005
    From UN trade database. http://data.un.org/ Import data from the largest economies of the world are used (Brazil, India, USA, China, Japan and EU-27).
  property dry mass 1 kg; name DM
  property water content 0; name water_content
  property wet mass 1 kg; name WM
  property water in wet mass 0 kg; name WWM
  property carbon content, fossil 0; name C_content_fossil
  property carbon content 0
    carbon content on a dry matter basis (reserved; not for manual entry)
  property true value 7.52303e-5
    allocation property applied in "true value" allocation // value calculated from revenue
  properties: carbon allocation 0 kg
- aluminium, cast alloy: 0 kg; source European Aluminium Association 2008; By-product classification allocatable product; CPC 41431: Unwrought aluminium; pedigree (1,1,1,1,1)
  EcoSpold01Location=RER
  production volume 0.00138116 kg
  property price 1.3 EUR2005; name castAlloyAmount_price_EUR2005
    Temporary price data. Calculated as 90% of purchasers price based on: Source: London Metal Exchange, Aluminium alloy price for 2005
  property carbon content 0
    carbon content on a dry matter basis (reserved; not for manual entry)
  property true value 0.00326503
    allocation property applied in "true value" allocation // value calculated from revenue
  properties: water in wet mass 0 kg, carbon content, non-fossil 0, water content 0, dry mass 1 kg, carbon content, fossil 0, wet mass 1 kg, carbon allocation 0 kg
- aluminium, wrought alloy: 0 kg; source European Aluminium Association 2008; By-product classification allocatable product; CPC 4153: Semi-finished products of aluminium or aluminium alloys; pedigree (1,1,1,1,1)
  production volume 0.000604644 kg
  property price 1.44 EUR2005; name secondaryAluminiumOutput_price_EUR2005
    Estimated based on literature values and expert judgement. Aluminium ccast alloys are about 90% of the price of aluminium wrought alloys.
  property carbon content 0
    carbon content on a dry matter basis (reserved; not for manual entry)
  property true value 0.0015833
    allocation property applied in "true value" allocation // value calculated from revenue
  properties: wet mass 1 kg, water content 0, carbon content, fossil 0, water in wet mass 0 kg, carbon content, non-fossil 0, dry mass 1 kg, carbon allocation 0 kg
- manganese dioxide: 0 kg; CPC 34220: Zinc oxide; zinc peroxide; chromium oxides and hydroxides; manganese oxides; iron oxides and hydroxides; earth[…]; By-product classification allocatable product
  EcoSpold01Location=GLO
  production volume 0.00170781 kg
  property price 1.04 EUR2005
    Calculated value based on data from United Nations Commodity Trade Statistics Database (comtrade.un.org). UN comtrade category: 282010 Managanese dioxide. Prices from the year 2005. Using exchange rate of 1EURO = 1.209 USD. Average of price of import into 5 main markets (EU, US, JP, IN and CN).
  property carbon content 0
    carbon content on a dry matter basis (reserved; not for manual entry)
  property true value 0.00322977
    allocation property applied in "true value" allocation // value calculated from revenue
  properties: water in wet mass 0 kg, wet mass 1 kg, dry mass 1 kg, carbon content, fossil 0, water content 0, carbon content, non-fossil 0, carbon allocation 0 kg

## Inputs from technosphere
- lead: 1.13882 kg; lognormal variance with pedigree 0.0341, pedigree (4,2,4,1,3)
  Estimation: 2 batteries per 50000km
  EcoSpold01Location=RER
  Uncertainty: Estimation: 2 batteries per 50000km
  properties: dry mass 1 kg, wet mass 1 kg
- aluminium alloy, AlMg3: 1.31403 kg; lognormal variance with pedigree 0.0267, pedigree (2,2,4,1,3)
  EcoSpold01Location=RER
  Estimation:5% of aluminium parts replaced
  Uncertainty: Estimation:5% of aluminium parts replaced
  properties: dry mass 1 kg, wet mass 1 kg
- synthetic rubber: 41.32 kg; lognormal variance with pedigree 0.0267, pedigree (2,2,4,1,3)
  EcoSpold01Location=RER
  Estimation: 3.75 (bike)/3 (scooter) tyre-sets use in life-time
  Uncertainty: Estimation: 3.75 (bike)/3 (scooter) tyre-sets use in life-time
  properties: wet mass 1 kg, dry mass 1 kg, carbon content, fossil 0.871949
  note on carbon content, fossil: EPDM (Ethylene-propene-diene terpolymer) rubber is a terpolymer of ethylene, propene, and a diene with the residual unsaturated portion of the diene in the side chain (ecoinvent v2.2 report 7-part XX & Ullmann). Chemical formula (deduced from Evidences of Solvent-Induced Miscibility in Polychloroprene-co-Ethylene-Propene Diene Terpolymer Blends, Dubey et al., Journal of Applied Polymer Science, 2009, 111:1884–1891): C20H35
- section bar extrusion, aluminium: 1.31403 kg; lognormal variance with pedigree 0.0961, pedigree (4,2,4,1,4)
  Assumption for pipe drawing
  EcoSpold01Location=RER
  Uncertainty: Assumption for pipe drawing
- injection moulding: 1.6399 kg; lognormal variance with pedigree 0.0961, pedigree (4,2,4,1,4)
  EcoSpold01Location=RER
  Assumption
  Uncertainty: Assumption
- used Ni-metal hydride battery: -0.664801 kg; lognormal variance with pedigree 0.0267, pedigree (2,2,4,1,3)
  EcoSpold01Location=GLO
  Amount of S-Pb batteries replaced
  Uncertainty: Amount of S-Pb batteries replaced
  production volume 0.341561 kg
    Calculated from the production volume of maintenance, motor scooter in proportion to the respective output amounts.
  properties: carbon content, fossil 0.328011, dry mass 1 kg, wet mass 1 kg
- steel, low-alloyed, hot rolled: 0.927615 kg; lognormal variance with pedigree 0.0267, pedigree (2,2,4,1,3)
  EcoSpold01Location=RER
  Estimation: 5% of steel parts replaced, Scooter: 10%
  Uncertainty: Estimation: 5% of steel parts replaced, Scooter: 10%
  properties: carbon content, fossil 0.005, wet mass 1 kg, dry mass 1 kg
  note on carbon content, fossil: Low alloyed steel composition given in Tab. 3.2 ecoinvent v2.2 report 10_partII. Steel assumed to have a C content of 0.5%
- polyethylene, high density, granulate: 1.6399 kg; lognormal variance with pedigree 0.0267, pedigree (2,2,4,1,3)
  EcoSpold01Location=RER
  Estimation: Bicycle: 50% of plastic parts once replaced, Scooter 15% replaced
  Uncertainty: Estimation: Bicycle: 50% of plastic parts once replaced, Scooter 15% replaced
  properties: dry mass 1 kg, carbon content, fossil 0.857143, wet mass 1 kg
  note on carbon content, fossil: Polyethylene is formed out of a huge amount of ethylene monomers (C2H4) (ecoinvent v2.2 report 11_II). MW=28 g/mol
- waste plastic, mixture: -1.6399 kg; lognormal variance with pedigree 0.0341, pedigree (4,2,4,1,3)
  Plastics to municipal incineration
  EcoSpold01Location=CH
  Uncertainty: plastics to municipal incineration
  production volume 1.872 kg
    (same comment as for used Ni-metal hydride battery)
  properties: dry mass 0.847 kg, carbon content, fossil 0.747344, water content 0.180638, wet mass 1 kg
  note on carbon content, fossil: C content in 1 kg DM was calculated using data in Tab A.2, ecoinvent v2.2 report 13_I
- waste rubber, unspecified: -20.66 kg; lognormal variance with pedigree 0.0341, pedigree (4,2,4,1,3)
  50% of tyres to municipal incineration
  EcoSpold01Location=CH
  Uncertainty: 50% of tyres to municipal incineration
  production volume 23.584 kg
    (same comment as for used Ni-metal hydride battery)
  properties: wet mass 1 kg, carbon content, fossil 0.853, dry mass 1 kg
- chromium steel removed by turning, average, conventional: 0.927615 kg; lognormal variance with pedigree 0.0961, pedigree (4,2,4,1,4)
  Assumption
  EcoSpold01Location=RER
  Uncertainty: Assumption
  properties: dry mass 1 kg, wet mass 1 kg, carbon content, fossil 0.0008
- used Li-ion battery: -0.544104 kg; lognormal variance with pedigree 0.0267, pedigree (2,2,4,1,3)
  Amount of S-Pb batteries replaced
  EcoSpold01Location=GLO
  Uncertainty: Amount of S-Pb batteries replaced
  production volume 0.341561 kg
    (same comment as for used Ni-metal hydride battery)
  properties: carbon content, fossil 0.328011, wet mass 1 kg, dry mass 1 kg
- sulfuric acid: 0.0700814 kg; lognormal variance with pedigree 0.0341, pedigree (4,2,4,1,3)
  (same comment as for lead)
  properties: wet mass 1 kg, dry mass 1 kg
- tap water: 30.17 kg; name tap_water_input; lognormal variance with pedigree 0.0092, pedigree (2,3,4,1,1)
  EcoSpold01Location=RER
  Assumption based on: Cherry, C.R. 2007, 1488 liters waste water for all production phases (incl. Battery manufacturing --> 50%)
  Uncertainty: Assumption based on: Cherry, C.R. 2007, 1488 liters waste water for all production phases (incl. Battery manufacturing --> 50%)
  properties: water content 2962.17, carbon content, fossil 0.00178991, wet mass 1 kg, dry mass 0.000337476 kg
  note on carbon content, fossil: Bicarbonate content is 2.93 mol/m3. CO2 content is 0.1 mol/m3 (ecoinvent v2.2 report 8, Tab 93.1).

## Emissions to nature
- Water [air, unspecified]: 0.00452551 m3; name water_to_air_unspecified; = (tap_water_input/1000*fraction_TW_to_air); lognormal variance with pedigree 0.0487, pedigree (2,2,4,1,1)
  Calculated value based on literature values and expert opinion. See comments in the parametres' comment field.
  property fraction, origin: salt water 0; name fraction_origin_salt_water
  property fraction, origin: fresh water 1; name fraction_origin_fresh_water
  property fraction, origin: unspecified 0; name fraction_origin_unspecified
- Water [water, unspecified]: 0.0256445 m3; name water_to_water_unspecified; = (tap_water_input/1000)*(1-fraction_TW_to_air); lognormal variance with pedigree 0.0487, pedigree (2,2,4,1,1)
  (same comment as for Water)
  property fraction, origin: salt water 0; name fraction_origin_salt_water_Ww
  property fraction, origin: fresh water 1; name fraction_origin_fresh_water_Ww
  property fraction, origin: unspecified 0; name fraction_origin_unspecified_Ww
  property water in wet mass 1000 kg; name WWM
  property dry mass 0 kg; name DM
  property carbon content, non-fossil 0; name C_content_non_fossil
  property wet mass 1000 kg; name WM
  property carbon content, fossil 0; name C_content_fossil

## Sampling procedure
Literature

## Review by Christian Bauer 2010-03-25
passed
C:\Dokumente und Einstellungen\Marianne\Eigene Dateien\Projekte\277_Mobitool\Ecoinvent\Review\Upload 1\corrections\[Ecospold_Maintenance_ebikes-v1.2.xls]X-Process
