# hydropower plant construction, reservoir, non-alpine regions

Dataset: EcoSpold 2, unit process
Geography: RER
Time period: 1945-01-01 to 2019-12-31
Technology level: current
Classification: EcoSpold01Categories: hydro power/production of components
Classification: ISIC rev.4 ecoinvent: 4220a: Construction of utility projects for electricity production, except for liquid fuels
Tags: ConvertedDataset
Scenario: Business-as-Usual
System model: Allocation at the point of substitution
Generated by: Christian Bauer
Published in: Bolliger, R. 2007
Database: ecoinvent
isCopyrightProtected: true
accessRestrictedTo: 1

## General comment
This dataset represents a reservoir hydro power plant unit for non-alpine regions. Due to the fact that this dataset is based on data of Swiss dams and then extrapolated to non-alpine regions, the uncertainty is increased. Non-alpine regions are considered to be represented by all European countries using hydropower and modelled in ecoinvent except from Austria, Italy, France and Finland. A representative sample of various types of dams in Switzerland is taken into account, i.e. 52 reservoir power plants with an annual gross production output of 17.8 TWh and an installed capacity of 9130 MW. As far as the construction is concerned, reservoir power plants and pumped storage power plants are dealt with together due to the fact that the construction efforts are related. Lifetime is assumed to be 150 years for the dam and 80 years for the rest of materials. The data refers to plant construction of a mix of types of dams built between 1945 and 1970; therefore they might not be representative for more modern construction, for an individual type and for small-scale and smallest-scale plants.
[This dataset was already contained in the ecoinvent database version 2. It was not individually updated during the transfer to ecoinvent version 3. Life Cycle Impact Assessment results may still have changed, as they are affected by changes in the supply chain, i.e. in other datasets. This dataset was generated following the ecoinvent quality guidelines for version 2. It may have been subject to central changes described in the ecoinvent version 3 change report (http://www.ecoinvent.org/database/ecoinvent-version-3/reports-of-changes/), and the results of the central updates were reviewed extensively. The changes added e.g. consistent water flows and other information throughout the database. The documentation of this dataset can be found in the ecoinvent reports of version 2, which are still available via the ecoinvent website. The change report linked above covers all central changes that were made during the conversion process.]

## Included activities start
From reception of the various construction materials (cement, reinforcing steel, chromium steel, low-alloyed steel, explosives, gravel) for the construction of a reservoir hydropower plant for non-alpine regions.

## Included activities end
This activity ends with a reservoir hydro power plant, with a lifetime of 150 years (dam) resp. 80 years (all remaining parts). The dataset includes particle emissions during the construction activities. Transformers are included, while further infrastructure like outdoor substations, high-voltage lines, etc. are excluded. The dataset doesn't include neither the flue ash input, although flue ash is used as concrete additive. Due to the lack of information or insignificant amounts, copper consumption in generators, the need for landfill capacity for the excavated materials of adits and the recycling potential of materials after expiration of the life time are not taken into account.

## Geography
The dataset represents the average of a characteristic sample of Swiss reservoir hydropower plants valid for non-alpine region conditions (i.e. all European countries modelled in ecoinvent with hydropower except from Austria, Italy, France and Finland).

## Technology
Storage power plants have an appendant reservoir. The size of the reservoir can range from daily, monthly to annual storage reservoirs. According to the net head high-pressure, medium-pressure and low-pressure systems can be distinguished. High- and medium-pressure systems are constructed as dams. High-pressure storage power plants with a head of over 50 meters are very common in Switzerland. For this dataset concrete dams (arch dams and gravity dams) with a height of more then 30 meters are taken into account. Also pumped storage power plants are included because in most cases the data is only available for the overall generation system. The same counts for high- and medium-pressure and alpine run-of-river power plants which are also included in the storage power plant dataset. Due to the fact that the efforts for the plant construction are similar to storage power plants and that the estimated production is comparatively low, high- and medium-pressure run-of-river power plants are covered by the reservoir power station dataset.
The technology used in the dataset has an overall efficiency of 82%, more modern technologies show an overall efficiency of about 88%. The overall efficiency is composed of the efficiency of the works water channel, the turbine, the generator and the transformer and are listed below:

Efficiency of power plant current modern
Works water channel 0.95 0.95
Turbine 0.87 0.91
Generator 0.96 0.98
Transformer 0.98 0.99
Reservoir power plant total
without works water channel 0.82 0.88
with works water channel 0.78 0.84
Pumped storage power plant 0.70 0.74

The losses along the works water channel are primarily caused by friction and are calculated from the difference between gross and net head. Based on this calculation the efficiency of the works water channel amounts to 95%. The losses depend on the flow rate and have its maximum at full load. The smaller the cross section of adits and pressure pipelines, the higher the flow velocity and thus the friction losses. In older plants according to Bischof (1992) the efficiency of works water channels could be increased generally more than by replacing turbines and generators.

The efficiency losses in turbines depend on the turbine type (Kaplan, Francis, Pelton, etc.), the turbine output and on the ratio between turbined water amount and the rated water amount. In König (1997) examples for curve progressions of the relationship between these variables are shown. For current power plants an efficiency of 87% is assumed, more modern turbines show an efficiency of about 91%.

The efficiency of generators depends on the output, the rotation speed of the generator and the cooling system. Some relevant data can be found in König (1997). For today’s power plants an efficiency of approximately 96% is assumed, modern generators show an efficiency of about 98%. The efficiency of transformers amounts to 98%, respectively 99%.
References:
Bischof, R. (1992) Modernisierungspotential bei bestehenden Wasserkraftwerken. Vortrag beim Schweizerischen Technischen Verband, Sektion Graubünden, 21. Oktober 1992. Churwalden, Schweiz [unpublished].
König F., von (1985) Bau von Wasserkraftanlagen. C.F. Müller, Karlsruhe.

## Parameters
- fraction, process water, to air: 0.15 dimensionless; name fraction_PW_to_air; lognormal variance with pedigree 0.092025, pedigree (4,4,3,2,4)
  Literature value. In case when no industry/process specific data are available, default evaporation fraction value is used. This value is 15% and is based on literature (Statistics Canada, 2007 & Shaffer, K.H., 2008, Consumptive water use in the Great Lakes Basin, USGS & Shiklomanov, 2003, World Water Resources at the Beginning of the 21st Century) and has been approved by an expert.
- fraction, tap water, to air: 0.15; name fraction_TW_to_air; = fraction_PW_to_air; lognormal variance with pedigree 0.092025, pedigree (4,4,3,2,4)
  Calculated value. See comment in the other parametres present in this dataset. Tap water is considered to be always used as process water, thus process water fractions to air are applied to all tap water input flows to calculate the amount of water consumed in the processes.

## Reference product
- hydropower plant, reservoir, non-alpine regions: 1 unit; CPC 53262: Power plants; By-product classification allocatable product
  EcoSpold01Location=RER
  production volume 1.32237 unit
    This is a placeholder value that does not reflect real-world production volumes. This dataset does not currently require a real-world production volume to work in the database framework, and no actual data were collected yet. This has no negative effect on the results of the ecoinvent database. The placeholder value of this activity was scaled according to the nominal GDP of 2005 (source: United Nations, http://data.un.org/Glossary.aspx?q=GDP+%28current+US%24%29, accessed 20130726) to reflect an appropriate share of the global production volume, which is also a placeholder value.
  property price 5.36981e10 EUR2005
    Calculated based on literature. Data supplied by 2.0 Consultants. 2003 data from EU27 I/O database-79 Building, non-residential EU 27. Based on consumption of iron basic, iron, after first processing, fabricated metal products (except machinery) and machinery and equipment - 1131000000 kg.
  property true value 5.36981e10
    allocation property applied in "true value" allocation // value calculated from revenue

## By-products
- iron scrap, sorted, pressed: 0 kg; By-product classification Recyclable; CPC 39310: Slag, dross, scalings and other waste from the manufacture of iron or steel; pedigree (1,1,1,1,1)
  Iron scrap recovered from this waste.
  production volume 3.22291e7 kg
  property price 0.175 EUR2005
    Temporary price data. Calculated as 90% of purchasers price based on: 2005 import and export prices (total trades (USD) divided by total weight (kg) in biggest economies of the world: EU27, USA, Brasil, China, India, Japan and Russia) from UN Commodity Trade Statistics Database (http://data.un.org/Explorer.aspxDatabase [Accessed 2011.06.20]). Commodity: Waste or scrap, of cast iron
  property carbon content 0
    carbon content on a dry matter basis (reserved; not for manual entry)
  property true value 464494
    allocation property applied in "true value" allocation // value calculated from revenue
  properties: water content 0, water in wet mass 0 kg, carbon content, fossil 0, dry mass 1 kg, carbon content, non-fossil 0, wet mass 1 kg, carbon allocation 0 kg

## Inputs from technosphere
- waste reinforced concrete: 0 kg; pedigree (1,1,1,1,1)
  Estimation. According to experts the dams are left in situ after the siltation of the lake i.e. the dams are not transported or demolished. The same counts for the facing of adit systems. Hence what the demolition is concerned, materials (but not transportation) are taken into account. The exchange flow "waste reinforced concrete" includes the disposal of gravel, cement and reinforced steel. It is assumed that the demolition is done with the help of diggers; the dataset does not represent the demolition via blasting. For the disposal of reinforced concrete a value of 9.21. 10^10 kg is assumed.
  The steel derived from turbines, generators, transformer, shutoff devices, pressure pipelines etc. can be recycled, steel deriving from reinforcements, armored conduits etc. in the majority of cases is left in situ, i.e. it can be classified as waste. Due to the lack of detailed data, a recycling quota of 0% is assumed.
  EcoSpold01Location=CH
  production volume 0 kg
    Calculated from the production volume of hydropower plant, reservoir, non-alpine regions in proportion to the respective output amounts.
  properties: water content 0.00585407, wet mass 1 kg, dry mass 0.99418 kg
- reinforcing steel: 1.70999e8 kg; source Bertschinger, H 1959; lognormal variance with pedigree 0.34, pedigree (1,1,5,1,1)
  Calculated Value. Data regarding material consumption for infrastructure are adopted from the Swiss power plant sample as it stands. For reservoir power plants built in other European countries than Austria, Italy, France and Switzerland an uncertainty factor of 3 is assumed. This is due to the fact that major differences in hydrological and geological conditions, construction technology and landscape can occur.
  Based on data of six power plants and on literature, specific steel consumption of 40g/(kWh/a) with a span of 23-46 g/(kWh/a) is estimated. Reinforcing steel accounts for 25% (i.e. 9-12 g/(kWh/a)). Specific reinforcing steel consumption averaged over life time (i.e. 150 years) amounts to 0.063 g/kWh. The total reinforcing steel consumption for one hydro power plant unit is 1.71 . 10^8 kg/unit.
  Data regarding steel consumption is available for the following power plants: Vorderrhein, Bergell, Salanfe, Hinterrhein, Engadin and Linth Limmern
  Further references:
  Condrau L. (1962) Die Kraftwerke Vorderrhein. In: Terra Grischuna, 21 (5), 352-355.
  Kraftwerke Vorderrhein AG (KVR) (Hg.) (1963) Die Kraftwerke Vorderrhein im Bündner Oberland. Hg. von der Kraftwerke Vorderrhein AG Disentis zur Einweihung am 27. Juni 1963.
  Kraftwerke Vorderrhein AG (KVR) (1968) Die Kraftwerke Vorderrhein im Bündner Oberland, mitgeteilt von der Kraftwerke Vorderrhein AG. In: Kraftwerkbau, 13 (1), 5-30.
  Kraftwerke Vorderrhein AG (KVR) (1968) Die Kraftwerke Vorderrhein im Bündner Oberland, mitgeteilt von der Kraftwerke Vorderrhein AG. In: Kraftwerkbau, 13 (1), 5-30.
  SALANFE S.A. (1951) Das Speicherkraftwerk Salanfe-Miéville. Nach Mitteilungen der SALANFE S.A. In: Schweizerische Bauzeitung, 69 (52), 735-744.
  Walther C., Fetz B. (Hg.) (1963) Sondernummer zur Einweihung der Kraftwerkanlagen Hinterrhein-Valle di Lei. In: Terra Grischuna, 22 (4), 153-348.
  Walther C., Fetz B. (Hg.) (1971): Engadiner Kraftwerke. In: Terra Grischuna, 30 (4), 159-216.
  Weber E. et al. (1965) Die Kraftwerke Linth-Limmern. In: Kraftwerkbau, 10 (2-3), 1-23.
  and unpublished sources
  EcoSpold01Location=RER
  Uncertainty: An uncertainty factor of 3 is assumed.
  properties: wet mass 1 kg, dry mass 1 kg, carbon content, fossil 0.004
- electricity, medium voltage: 2.81998e9 kWh; source Blenio Kraftwerke 1968; lognormal variance with pedigree 0.18, pedigree (1,1,5,1,1)
  EcoSpold01Location=UCTE
  Calculated Value. Electricity for construction work is adapted according to the country-specific UCTE supply modules. Data regarding energy consumption for construction works are adopted from the Swiss power plant sample as it stands. Due to the fact that there already are large uncertainties regarding data for Swiss power plants, the uncertainty factors were not adopted to European conditions.
  Specific electricity consumption varies between 0.09 und 0.32 kWh/(kWh/a) with a mean value of 0.16 kWh/(kWh/a). Specific electricity consumption weighted over life time (i.e. 150 years) amounts to 0.0011 kWh/kWh. The total electricity consumption for one hydro power plant unit is 2.82 . 10^9 kWh/unit.
  Further references:
  Bertschinger, H. (1959) Versorgungs- und Transportprobleme beim Bau der Bergeller Kraftwerke der Stadt Zürich. In: Wasser- und Energiewirtschaft, 51 (7), 191-198.
  Kraftwerke Vorderrhein AG (KVR) (Hg.) (1963) Die Kraftwerke Vorderrhein im Bündner Oberland. Hg. von der Kraftwerke Vorderrhein AG Disentis zur Einweihung am 27. Juni 1963.
  Töndury G.A. (1964): Einweihung der Kraftwerkgruppe Blenio. In: Wasser- und Energiewirtschaft, 56 (12), 398-403.
  Walther C., Fetz B. (Hg.) (1963) Sondernummer zur Einweihung der Kraftwerkanlagen Hinterrhein-Valle di Lei. In: Terra Grischuna, 22 (4), 153-348.
  Weber E. et al. (1965) Die Kraftwerke Linth-Limmern. In: Kraftwerkbau, 10 (2-3), 1-23.
  and unpublished sources
- gravel, round: 7.79993e10 kg; source Schnitter G 1958; lognormal variance with pedigree 0.34, pedigree (1,1,5,1,1)
  EcoSpold01Location=CH
  Calculated Value. Data regarding material consumption for infrastructure are adopted from the Swiss power plant sample as it stands. For reservoir power plants built in other European countries than Austria, Italy, France and Switzerland an uncertainty factor of 3 is assumed. This is due to the fact that major differences in hydrological and geological conditions, construction technology and landscape can occur.
  For 1 m3 of concrete 0.8 m3 of gravel, 0.127 m3 of water and 0.073 m3 of cement are mixed. This corresponds to 2000 kg of gravel or 3.77g gravel per kWh. The total gravel consumption for one hydro power plant unit is 7.8. 10^10 kg/unit.
  Further references:
  Frey-Bär O. (1961) Technologie des bétons. In: Wasser- und Energiewirtschaft, 53 (6-7), 159-163.
  Robert A. (1962) L'aménagement hydro-électrique de la Gougra. Les caractéristiques générales de l'aménagement et les ouvrages d'adduction et de dérivation. In: Schweizerische Bauzeitung, 80 (15), 249-255; 80 (16), 276-280; 80 (17), 289-296.
  Uncertainty: An uncertainty factor of 3 is assumed.
  properties: dry mass 1 kg, wet mass 1 kg
- cement, Portland: 0 kg; source Schnitter G 1958; pedigree (1,1,1,1,1)
  Calculated Value. Data regarding material consumption for infrastructure are adopted from the Swiss power plant sample as it stands. For reservoir power plants built in other European countries than Austria, Italy, France and Switzerland an uncertainty factor of 3 is assumed. This is due to the fact that major differences in hydrological and geological conditions, construction technology and landscape can occur.
  In addition to the aggregates (sand, gravel and water) the quantitatively most important building material in hydro power plants is cement. Cement is used for: dams (most striking), grouting, adits, surge tanks, water catchment, river engineering, equalizing reservoirs, power stations, transport cable railways or residential buildings for personnel.
  The calculation of cement consumption is based on data of 52 Swiss power plants and on literature. Where no literature was available, the following assumptions were made:
  - arch dams need more higher dosed face concrete, due to the slim design; a ratio of 2/3 face concrete and 1/3 mass concrete is assumed
  - gravity dams are composed of a large amount of mass concrete and less face concrete, hence a ratio of 1/3 face concrete and 2/3 mass concrete is assumed
  Cement for dams was calculated from dam volume and average cement content, respectively from mean value of 230 kg/m3 if data was missing. Where no data was available, the total amount of cement was calculated from the amount of cement for dams and the mean value of the ratio of cement for dams and total amount of cement. The cement for dam’s share of the total amount of cement ranges between 60% and 90% with a mean value of 71%.
  Average cement consumption varies between 172 and 294 kg/m3 with an arithmetic average of 230 kg/m3. Specific cement consumption varies between 0.05 and 0.96 kg/(kWh/a) with an arithmetic average of 0.39 kg/(kWh/a) per plant. A weighted average of 0.45kg (kWh/a) is calculated from total amount of cement of all plants divided by total net production of all plants. For the calculation of the specific cement consumption the weighted average is used because this figure best represents an average reservoir hydro power station. With an average life time of 150 years for dams and 100 years for adits a specific cement consumption of 3.26 g/kWh distributed over the overall life time is estimated. The total cement consumption for one hydro power plant unit is 8.97. 10^9 kg/unit.
  Further references:
  Vischer D; Huber A. (1985) Wasserbau. Springer-Verlag, Berlin etc., 4. Auflage.
  Frey-Bär O. (1961) Technologie des bétons. In: Wasser- und Energiewirtschaft, 53 (6-7), 159-163.
  Robert A. (1962) L'aménagement hydro-électrique de la Gougra. Les caractéristiques générales de l'aménagement et les ouvrages d'adduction et de dérivation. In: Schweizerische Bauzeitung, 80 (15), 249-255; 80 (16), 276-280; 80 (17), 289-296.
  EcoSpold01Location=CH
  Uncertainty: An uncertainty factor of 3 is assumed.
  properties: dry mass 1 kg, wet mass 1 kg
- explosive, tovex: 4.86996e7 kg; source Bertschinger, H 1959; lognormal variance with pedigree 0.34, pedigree (1,1,5,1,1)
  Calculated Value. Data regarding material consumption for infrastructure are adopted from the Swiss power plant sample as it stands. For reservoir power plants built in other European countries than Austria, Italy, France and Switzerland an uncertainty factor of 3 is assumed. This is due to the fact that major differences in hydrological and geological conditions, construction technology and landscape can occur.
  Specific explosive consumption varies between 1.7 and 4.9 g /(kWh/a), with a mean value of 2.9 g/(kWh/a). Average explosive consumption per kg excavated material is between 0.00019 und 0.00049 kg/kg. Specific explosive consumption averaged over life time (i.e. 150 years) amounts to 0.019 g/kWh. The total explosive consumption for one hydro power plant unit is 4.87 . 10^7 kg/unit.
  .
  Further references:
  Béguin P., Jeanneret J.-R (1963) Aménagement de la Dranse d'Entremont. In: Wasser- und Energiewirtschaft, 55 (8), 265-274.
  Blenio Kraftwerke (1968) Der Ausbau der Blenio Kraftwerke. Mitteilung der Geschäftsleitung der Blenio Kraftwerke AG. In: Wasser- und Energiewirtschaft, 60 (7-8), 211-216.
  Condrau L. (1962) Die Kraftwerke Vorderrhein. In: Terra Grischuna, 21 (5), 352-355.
  Kraftwerke Vorderrhein AG (KVR) (Hg.) (1963) Die Kraftwerke Vorderrhein im Bündner Oberland. Hg. von der Kraftwerke Vorderrhein AG Disentis zur Einweihung am 27. Juni 1963.
  Kraftwerke Vorderrhein AG (KVR) (1968) Die Kraftwerke Vorderrhein im Bündner Oberland, mitgeteilt von der Kraftwerke Vorderrhein AG. In: Kraftwerkbau, 13 (1), 5-30.
  Töndury G.A. (1956) Besuch bei den Bergeller Kraftwerken der Stadt Zürich. In: Wasser- und Energiewirtschaft, 48 (12), 356-363.
  Töndury G.A. (1964): Einweihung der Kraftwerkgruppe Blenio. In: Wasser- und Energiewirtschaft, 56 (12), 398-403.
  Weber E. et al. (1965) Die Kraftwerke Linth-Limmern. In: Kraftwerkbau, 10 (2-3), 1-23.
  and unpublished sources
  EcoSpold01Location=CH
  Uncertainty: An uncertainty factor of 3 is assumed.
  properties: wet mass 1 kg, dry mass 0.92 kg, carbon content, fossil 0.0483756, water content 0.0869565
  note on carbon content, fossil: Composition in Tab 4.1, ecoinvent v2.2 report n 7-part XVIII. 23% of wet mass consists of CH6N2O3
- steel, chromium steel 18/8, hot rolled: 1.91998e8 kg; source Bertschinger, H 1959; lognormal variance with pedigree 0.34, pedigree (1,1,5,1,1)
  EcoSpold01Location=RER
  Calculated Value. Data regarding material consumption for infrastructure are adopted from the Swiss power plant sample as it stands. For reservoir power plants built in other European countries than Austria, Italy, France and Switzerland an uncertainty factor of 3 is assumed. This is due to the fact that major differences in hydrological and geological conditions, construction technology and landscape can occur.
  Based on data of six power plants and on literature, specific steel consumption of 40g/(kWh/a) with a span of 23-46 g/(kWh/a) is estimated. Chromium steel accounts for 15% (i.e. 4-9g/(kWh/a)) and is used for generators and turbines. Specific chromium steel consumption averaged over life time (i.e. 80 years) amounts to 0.066 g/kWh. The total chromium steel consumption for one hydro power plant unit is 1.92. 10^8 kg/unit.
  Data regarding steel consumption is available for the following power plants: Vorderrhein, Bergell, Salanfe, Hinterrhein, Engadin and Linth Limmern
  Further references:
  Condrau L. (1962) Die Kraftwerke Vorderrhein. In: Terra Grischuna, 21 (5), 352-355.
  Kraftwerke Vorderrhein AG (KVR) (Hg.) (1963) Die Kraftwerke Vorderrhein im Bündner Oberland. Hg. von der Kraftwerke Vorderrhein AG Disentis zur Einweihung am 27. Juni 1963.
  Kraftwerke Vorderrhein AG (KVR) (1968) Die Kraftwerke Vorderrhein im Bündner Oberland, mitgeteilt von der Kraftwerke Vorderrhein AG. In: Kraftwerkbau, 13 (1), 5-30.
  Kraftwerke Vorderrhein AG (KVR) (1968) Die Kraftwerke Vorderrhein im Bündner Oberland, mitgeteilt von der Kraftwerke Vorderrhein AG. In: Kraftwerkbau, 13 (1), 5-30.
  SALANFE S.A. (1951) Das Speicherkraftwerk Salanfe-Miéville. Nach Mitteilungen der SALANFE S.A. In: Schweizerische Bauzeitung, 69 (52), 735-744.
  Walther C., Fetz B. (Hg.) (1963) Sondernummer zur Einweihung der Kraftwerkanlagen Hinterrhein-Valle di Lei. In: Terra Grischuna, 22 (4), 153-348.
  Walther C., Fetz B. (Hg.) (1971): Engadiner Kraftwerke. In: Terra Grischuna, 30 (4), 159-216.
  Weber E. et al. (1965) Die Kraftwerke Linth-Limmern. In: Kraftwerkbau, 10 (2-3), 1-23.
  and unpublished sources
  Uncertainty: An uncertainty factor of 3 is assumed.
  properties: dry mass 1 kg, carbon content, fossil 0.0008, wet mass 1 kg
  note on carbon content, fossil: Stainless steel model is the grade 304 steel (18/8 stainless, 18% chromium 8% nickel; max. 0.08% C)
- diesel, burned in building machine: 5.14996e9 MJ; source Blenio Kraftwerke 1968; lognormal variance with pedigree 0.11, pedigree (1,1,5,1,1)
  Calculated Value. Data regarding energy consumption for construction works are adopted from the Swiss power plant sample as it stands. Due to the fact that there already are large uncertainties regarding data for Swiss power plants, the uncertainty factors were not adopted to European conditions. Where possible more suitable modules were used.
  Specific fuel consumption (primarily diesel oil) amounts to approximately 7 g /(kWh/a), weighted over life time (i.e. 150 years) it amounts to 0.047 g/kWh with a net calorific value of 42.8 MJ/kg. The total fuel consumption for one hydro power plant unit is 5.15 . 10^9 MJ/unit
  Further references:
  Kraftwerke Vorderrhein AG (KVR) (Hg.) (1963) Die Kraftwerke Vorderrhein im Bündner Oberland. Hg. von der Kraftwerke Vorderrhein AG Disentis zur Einweihung am 27. Juni 1963.
  Töndury G.A. (1964): Einweihung der Kraftwerkgruppe Blenio. In: Wasser- und Energiewirtschaft, 56 (12), 398-403.
  Walther C., Fetz B. (Hg.) (1963) Sondernummer zur Einweihung der Kraftwerkanlagen Hinterrhein-Valle di Lei. In: Terra Grischuna, 22 (4), 153-348.
  Weber E. et al. (1965) Die Kraftwerke Linth-Limmern. In: Kraftwerkbau, 10 (2-3), 1-23.
  and unpublished sources
  EcoSpold01Location=GLO
- steel, low-alloyed, hot rolled: 7.67993e8 kg; source Bertschinger, H 1959; lognormal variance with pedigree 0.34, pedigree (1,1,5,1,1)
  EcoSpold01Location=RER
  Calculated Value. Data regarding material consumption for infrastructure are adopted from the Swiss power plant sample as it stands. For reservoir power plants built in other European countries than Austria, Italy, France and Switzerland an uncertainty factor of 3 is assumed. This is due to the fact that major differences in hydrological and geological conditions, construction technology and landscape can occur.
  Based on data of six power plants and on literature, specific steel consumption of 40g/(kWh/a) with a span of 23-46 g/(kWh/a) is estimated. Low-alloyed steel accounts for 60% (i.e. 20-27g/(kWh/a)) and is used for armored conduit for rock anchors and pressure tunnels. Specific low-alloyed steel consumption averaged over life time (i.e. 80 years) amounts to 0.03 g/kWh. The total low-alloyed steel consumption for one hydro power plant unit is 7.68. 10^8 kg/unit.
  Data regarding steel consumption is available for the following power plants: Vorderrhein, Bergell, Salanfe, Hinterrhein, Engadin and Linth Limmern
  Further references:
  Condrau L. (1962) Die Kraftwerke Vorderrhein. In: Terra Grischuna, 21 (5), 352-355.
  Kraftwerke Vorderrhein AG (KVR) (Hg.) (1963) Die Kraftwerke Vorderrhein im Bündner Oberland. Hg. von der Kraftwerke Vorderrhein AG Disentis zur Einweihung am 27. Juni 1963.
  Kraftwerke Vorderrhein AG (KVR) (1968) Die Kraftwerke Vorderrhein im Bündner Oberland, mitgeteilt von der Kraftwerke Vorderrhein AG. In: Kraftwerkbau, 13 (1), 5-30.
  Kraftwerke Vorderrhein AG (KVR) (1968) Die Kraftwerke Vorderrhein im Bündner Oberland, mitgeteilt von der Kraftwerke Vorderrhein AG. In: Kraftwerkbau, 13 (1), 5-30.
  SALANFE S.A. (1951) Das Speicherkraftwerk Salanfe-Miéville. Nach Mitteilungen der SALANFE S.A. In: Schweizerische Bauzeitung, 69 (52), 735-744.
  Walther C., Fetz B. (Hg.) (1963) Sondernummer zur Einweihung der Kraftwerkanlagen Hinterrhein-Valle di Lei. In: Terra Grischuna, 22 (4), 153-348.
  Walther C., Fetz B. (Hg.) (1971): Engadiner Kraftwerke. In: Terra Grischuna, 30 (4), 159-216.
  Weber E. et al. (1965) Die Kraftwerke Linth-Limmern. In: Kraftwerkbau, 10 (2-3), 1-23.
  and unpublished sources
  Uncertainty: An uncertainty factor of 3 is assumed.
  properties: carbon content, fossil 0.005, wet mass 1 kg, dry mass 1 kg
  note on carbon content, fossil: Low alloyed steel composition given in Tab. 3.2 ecoinvent v2.2 report 10_partII. Steel assumed to have a C content of 0.5%
- tap water: 4.94996e9 kg; name tap_water_input; lognormal variance with pedigree 0.34, pedigree (1,1,5,1,1)
  EcoSpold01Location=RER
  Estimation. Data are adopted from the Swiss power plant sample as it stands. For reservoir power plants built in other European countries than Austria, Italy, France and Switzerland an uncertainty factor of 3 is assumed. This is due to the fact that major differences in hydrological and geological conditions, construction technology and landscape can occur.
  For 1 m3 of concrete 0.8 m3 of gravel, 0.127 m3 of water and 0.073 m3 of cement are mixed. This corresponds to 127 kg of water or 1.63 g water per kWh. The total water consumption for one hydro power plant unit is 4.95. 10^9 kg/unit.
  Estimation. Data are adopted from the Swiss power plant sample as it stands. For reservoir power plants built in other European countries than Austria, Italy, France and Switzerland an uncertainty factor of 3 is assumed. This is due to the fact that major differences in hydrological and geological conditions, construction technology and landscape can occur.
  For 1 m3 of concrete 0.8 m3 of gravel, 0.127 m3 of water and 0.073 m3 of cement are mixed. This corresponds to 127 kg of water or 1.63 g water per kWh. The total water consumption for one hydro power plant unit is 4.95. 10^9 kg/unit.
  Uncertainty: An uncertainty factor of 3 is assumed.
  properties: wet mass 1 kg, water content 2962.17, carbon content, fossil 0.00178991, dry mass 0.000337476 kg
  note on carbon content, fossil: Bicarbonate content is 2.93 mol/m3. CO2 content is 0.1 mol/m3 (ecoinvent v2.2 report 8, Tab 93.1).
- waste reinforced concrete: -9.11336e10, -9.65629e8 kg (2 entries); lognormal variance with pedigree 0.18, pedigree (1,1,5,1,1)
  (same comment as for waste reinforced concrete)
  production volume 9.21e10 kg
- cement, Portland: 8.8635e9, 1.06418e8 kg (2 entries); source Schnitter G 1958; lognormal variance with pedigree 0.34, pedigree (1,1,5,1,1)
  (same comment as for cement, Portland)

## Emissions to nature
- Water [air, unspecified]: 742494 m3; name water_to_air_unspecified; = (tap_water_input/1000*fraction_TW_to_air); lognormal variance with pedigree 0.0807, pedigree (2,2,5,1,1)
  Calculated value based on literature values and expert opinion. See comments in the parametres' comment field.
  property fraction, origin: salt water 0; name fraction_origin_salt_water
  property fraction, origin: unspecified 0; name fraction_origin_unspecified
  property fraction, origin: fresh water 1; name fraction_origin_fresh_water
- Particulates, > 10 um [air, non-urban air or from high stacks]: 2.42998e7 kg; source Kellenberger D. 2007; lognormal variance with pedigree 0.4, pedigree (1,1,5,1,1)
  Estimation. Data regarding particle emissions are adopted from the Swiss power plant sample as it stands. Due to the fact that there already are large uncertainties regarding data for Swiss power plants, the uncertainty factors were not adopted to European conditions. Where possible more suitable modules were used.
  Particle emissions are generated during rock blasting, excavation of loose rock, dispersion of dust due to the movement of vehicles on non asphaltic building ground and concrete mixing. Due to the lack of information regarding the amount and size distribution of particle emissions, emission data of mining limestone and bauxite is used for the first three aspects. The mining of bauxite causes 1.5 g total suspended particulates (TSP) per kg excavation material (Althaus et al. 2004 „Metals"), the mining of limestone causes 0.16g TSP/kg excavation material (Kellenberger et al. 2005 „Building products"). These figures include both all mining processes and dust formation during reloading processes. The data of limestone mining is used for the size distribution of particle emissions (Kellenberger et al. 2005 „Building products"). For particulates > 10 um 70% size distribution is indicated.
  The data of two small plants regarding the total volume of excavation material is available (1.6 kg/(kWh/a) and 5.8 kg/(kWh/a).Due to the fact that higher amounts of excavation material in plants with a higher production potential is expected, the weighted mean value of 3.2 kg/(kWh/a) is doubled arbitrarily. For the calculation of particle emissions 6.4 kg (excavation material)/(kWh/a) are estimated. Particle emissions of 0.3 g (TSP)/kg(excavation material) are assumed with a ratio of 90% limestone mining and 10% bauxite mining. Particle emissions caused by the mining process are listed below:
  Emissions [g/(kWh/a)]
  Total dust TSP 1.9
  Particles >10 um 1.33
  Further particle emissions are caused during concrete mixing. In (EPA 2002) 0.06kg (TSP)/t concrete for controlled mixing is indicated. The size distribution of particle emissions according to (EPA 1995) for particulates >10 um is 50% or 30 g/t.
  With an average concrete consumption of 0.0014 m3/(kWh/a) and a concrete density of 2200 kg/m3 the particle emissions caused by concrete mixing can be calculated:
  Emissions [g/(kWh/a)]
  Total dust TSP 0.185
  Particles >10 um 0.092
  The total particle emissions caused by the construction of a hydro power plant (mining and concrete mixing) per kWh and per power plant unit are listed below:
  Emissions [g/(kWh/a) emissions [kg/unit]
  Total dust TSP 2.08 3.56E7
  Particles >10 um 1.42 2.57E7
  Further information: http://www.epa.gov/ttn/chief/ap42/ accessed Mai 2002
  Further information about size distribution of particle emissions: http://www.epa.gov/ttn/chief/ap42/appendix/appb-2.pdf. Accessed 19.4.2005
- Water [water, unspecified]: 4.20746e6 m3; name water_to_water_unspecified; = (tap_water_input/1000)*(1-fraction_TW_to_air); lognormal variance with pedigree 0.0807, pedigree (2,2,5,1,1)
  (same comment as for Water)
  property carbon content, non-fossil 0; name C_content_non_fossil
  property carbon content, fossil 0; name C_content_fossil
  property dry mass 0 kg; name DM
  property water in wet mass 1000 kg; name WWM
  property wet mass 1000 kg; name WM
  property fraction, origin: salt water 0; name fraction_origin_salt_water_Ww
  property fraction, origin: fresh water 1; name fraction_origin_fresh_water_Ww
  property fraction, origin: unspecified 0; name fraction_origin_unspecified_Ww
- Particulates, > 2.5 um, and < 10um [air, non-urban air or from high stacks]: 9.21992e6 kg; source Kellenberger D. 2007; lognormal variance with pedigree 0.34, pedigree (1,1,5,1,1)
  Estimation. Data regarding particle emissions are adopted from the Swiss power plant sample as it stands. Due to the fact that there already are large uncertainties regarding data for Swiss power plants, the uncertainty factors were not adopted to European conditions. Where possible more suitable modules were used.
  Particle emissions are generated during rock blasting, excavation of loose rock, dispersion of dust due to the movement of vehicles on non asphaltic building ground and concrete mixing. Due to the lack of information regarding the amount and size distribution of particle emissions, emission data of mining limestone and bauxite is used for the first three aspects. The mining of bauxite causes 1.5 g total suspended particulates (TSP) per kg excavation material (Althaus et al. 2004 „Metals"), the mining of limestone causes 0.16g TSP/kg excavation material (Kellenberger et al. 2005 „Building products"). These figures include both all mining processes and dust formation during reloading processes. The data of limestone mining is used for the size distribution of particle emissions (Kellenberger et al. 2005 „Building products"). For particulates > 2.5 um and < 10 um 25% size distribution is indicated.
  The data of two small plants regarding the total volume of excavation material is available (1.6 kg/(kWh/a) and 5.8 kg/(kWh/a).Due to the fact that higher amounts of excavation material in plants with a higher production potential is expected, the weighted mean value of 3.2 kg/(kWh/a) is doubled arbitrarily. For the calculation of particle emissions 6.4 kg (excavation material)/(kWh/a) are estimated. Particle emissions of 0.3 g (TSP)/kg(excavation material) are assumed with a ratio of 90% limestone mining and 10% bauxite mining. Particle emissions caused by the mining process are listed below:
  Emissions [g/(kWh/a)]
  Total dust TSP 1.9
  Particles 2.5-10 um 0.475
  Further particle emissions are caused during concrete mixing. In (EPA 2002) 0.06kg (TSP)/t concrete for controlled mixing are indicated. The size distribution of particle emissions > 2.5 um and < 10 um according to (EPA 1995) is 35 % or 21 g/t.
  With an average concrete consumption of 0.0014 m3/(kWh/a) and a concrete density of 2200 kg/m3 the particle emissions caused by concrete mixing can be calculated:
  Emissions [g/(kWh/a)]
  Total dust TSP 0.185
  Particles 2.5-10 um 0.065
  The total particle emissions caused by the construction of a hydro power plant (mining and concrete mixing) per kWh and per power plant unit are listed below:
  Emissions [g/(kWh/a) emissions [kg/unit]
  Total dust TSP 2.08 3.56E7
  Particles 2.5-10 um 0.54 1.01E7
  Further information: http://www.epa.gov/ttn/chief/ap42/ accessed Mai 2002
  Further information about size distribution of particle emissions: http://www.epa.gov/ttn/chief/ap42/appendix/appb-2.pdf. Accessed 19.4.2005
- Particulates, < 2.5 um [air, non-urban air or from high stacks]: 2.09998e6 kg; source Kellenberger D. 2007; lognormal variance with pedigree 0.57, pedigree (1,1,5,1,1)
  Estimation. Data regarding particle emissions are adopted from the Swiss power plant sample as it stands. Due to the fact that there already are large uncertainties regarding data for Swiss power plants, the uncertainty factors were not adopted to European conditions. Where possible more suitable modules were used.
  Particle emissions are generated during rock blasting, excavation of loose rock, dispersion of dust due to the movement of vehicles on non asphaltic building ground and concrete mixing. Due to the lack of information regarding the amount and size distribution of particle emissions, emission data of mining limestone and bauxite is used for the first three aspects. The mining of bauxite causes 1.5 g total suspended particulates (TSP) per kg excavation material (Althaus et al. 2004 „Metals"), the mining of limestone causes 0.16g TSP/kg excavation material (Kellenberger et al. 2005 „Building products"). These figures include both all mining processes and dust formation during reloading processes. The data of limestone mining is used for the size distribution of particle emissions (Kellenberger et al. 2005 „Building products"). For particulates < 2.5 um 5% size distribution is indicated.
  The data of two small plants regarding the total volume of excavation material is available (1.6 kg/(kWh/a) and 5.8 kg/(kWh/a).Due to the fact that higher amounts of excavation material in plants with a higher production potential is expected, the weighted mean value of 3.2 kg/(kWh/a) is doubled arbitrarily. For the calculation of particle emissions 6.4 kg (excavation material)/(kWh/a) are estimated. Particle emissions of 0.3 g (TSP)/kg(excavation material) are assumed with a ratio of 90% limestone mining and 10% bauxite mining. Particle emissions caused by the mining process are listed below:
  Emissions [g/(kWh/a)]
  Total dust TSP 1.9
  Particles <2.5 um 0.095
  Further particle emissions are caused during concrete mixing. In (EPA 2002) 0.06kg (TSP)/t concrete for controlled mixing are indicated. The size distribution of particle emissions according to (EPA 1995) for particulates < 2.5 um is 15% or 9 g/t.
  With an average concrete consumption of 0.0014 m3/(kWh/a) and a concrete density of 2200 kg/m3 the particle emissions caused by concrete mixing can be calculated:
  Emissions [g/(kWh/a)]
  Total dust TSP 0.185
  Particles <2.5 um 0.028
  The total particle emissions caused by the construction of a hydro power plant (mining and concrete mixing) per kWh and per power plant unit are listed below:
  Emissions [g/(kWh/a) emissions [kg/unit]
  Total dust TSP 2.08 3.56E7
  Particles <2.5 um 0.12 2.47E10
  Further references:
  Althaus H.-J., Blaser S., Classen M. and Jungbluth N. (2004) Life Cycle Inventories of Metals. Final report ecoinvent 2000 No. 10. EMPA Dübendorf, Swiss Centre for Life Cycle Inventories, Dübendorf, CH
  Further information: http://www.epa.gov/ttn/chief/ap42/ accessed Mai 2002
  Further information about size distribution of particle emissions: http://www.epa.gov/ttn/chief/ap42/appendix/appb-2.pdf. Accessed 19.4.2005

## Sampling procedure
Sampling procedure based on literature. Some information regarding the results is given without source notes or detailed, comprehensible derivation due to the guaranteed confidential treatment of data.

## Extrapolations
The dataset is based on data of various types of dams in Switzerland and extrapolated to non-alpine region conditions. Therefore, uncertainty is increased. Non-alpine regions are considered to be represented by all European countries using hydropower and modelled in ecoinvent except from Austria, Italy, France and Finland.

## Review by Roland Hischier 2011-09-23
Transfer of documentation done.

## Review by Christian Bauer 2009-02-24
Passed.
