# clear-cutting, primary forest to arable land, perennial crop

Dataset: EcoSpold 2, unit process
Geography: BR-GO
Time period: 2014-01-01 to 2019-12-31
Technology level: current
Classification: ISIC rev.4 ecoinvent: 68:Real estate activities
Tags: BRLUC
Scenario: Business-as-Usual
System model: Allocation at the point of substitution
Generated by: Marilia Folegatti
Database: ecoinvent
isCopyrightProtected: true
accessRestrictedTo: 1

## General comment
This dataset represents the interventions associated with the clear-cutting of primary forest for the provision of arable land tenure, annual crop. NPP (net primary productivity of a given land, in kg C / m2 and year) and VEG (above-ground biomass, below-ground biomass and dead organic matter) values are parameterized.
VEG values and production volumes are derived from the Appendix S1 and S2 of Novaes et al. 2017. The most updated data is available in www.cnpma.embrapa.br/forms/BRLUC.php. In this reference, VEG values of primary forests and grassland were estimated based in Brazil, 2016 and croplands, pasture man made and forest intensive VEG values based in European Commission, 2010 and weighted according to climate categories occurrence per state. NPP values are reported by Haberl et al. (2007) and the average value for Latin America is adopted. The types of exchanges and their emission factors are the same from land transformations datasets 'clear-cutting, primary forest to arable land, annual crop, BR, 2010 - 2015' and 'land already in use, annual cropland to annual crop, BR, 2010 - 2015' available in Ecoinvent database (Rossi, 2017a,b), which in turn were retrieved from Andrea & Merlet (2001).
Bibliography is listed below:
- Andrea, M.O., Merlet, P. (2001). Emission of trace gases and aerosols from biomass burning. Global Biogeochemical Cycles. V 15, N4, p.955-966.
- Brazil (2016). Third National Communication of Brazil to the United Nations Framework Convention on Climate Change âEURO“ Volume III. Ministry of Science, Technology and Innovation, Brasília.
- European Commission (2010) Comission decision of 10 June 2010 on guidelines for the calculation of land carbon stocks for the purpose of Annex V to Directive 2009/28/EC. European Union, Brussels.
- Haberl H, Erb KH, Krausmann F, Gaube V, Bondeau A, Plutzar C, Gingrich S, Lucht W, Fischer-Kowalski M. 2007. Quantifying and mapping the human appropriation of net primary production in earth's terrestrial ecosystems. PNAS. v104 n31: 12942-12947.
- Jungbluth, N. et al. (2007) Life Cycle Inventories of Bioenergy. ecoinvent report No. 17. Dubendorf, CH: Swiss Centre for Life Cycle Inventories.
- Krausmann, F., Erb, K. H., Gingrich, S., Lauk, C., & Haberl, H. (2008). Global patterns of socioeconomic biomass flows in the year 2000: A comprehensive assessment of supply, consumption and constraints. Ecological Economics, 65(3), 471-487.
- Novaes RML, Pazianotto RA, Brandao M, Alves BJR, May A, Folegatti-Matsuura MIS. 2017. Estimating 20-year landuse change and derived CO2 emissions associated with crops, pasture and forestry in Brazil and each of its 27 states. Glob Change Biol. 23:3716âEURO“3728 .doi.org/10.1111/gcb.13708
- Rossi V, 2017a, clear-cutting, primary forest to arable land, annual crop, BR, Undefined, ecoinvent database version 3.3. Accessed in September, 2017
- Rossi V, 2017b, land already in use, annual cropland to annual crop, annual crop, BR, Undefined, ecoinvent database version 3.3. Accessed in September, 2017
[This dataset is meant to replace the following datasets:
- clear-cutting, primary forest to arable land, perennial crop, BR, 2010 - 2015]

## Included activities start
This activity starts with the natural state of primary forest.

## Included activities end
The dataset includes the carbon stored in Above-Ground Biomass (AGB), Below-Ground Biomass (BGB) and Dead Organic Matter (DOM) pools. It includes the fluxes from these carbon pools in terms of CO2 and other trace gases caused by the burning of biomass. It also includes a rough estimation for the machine use required for the clear-cutting, with emissions and ocupation exchanges based in an European model.
The loss/gain of Soil Organic Carbon (SOC) usually associated with a land tranformation is accounted for in the downstream activity using the arable land tenure, given that it depends on the subsequent land use practice.
This activity ends with the provision of arable land tenure, measured in unit kg carbon Potential Net Primary Production (NPP0).

## Parameters
- LUC_crop_specific: 1
  This parameter allows to switch between a 'crop specific' and a 'country specific' approach when calculating the LUC of a crop. By default, the chosen approach is 'crop specific', so the value of the parameter is 1. If you want to apply a 'country specific' approach, turn the parameter to 0.
- Above and below ground biomass: 2.73451; name VEG; lognormal variance with pedigree 0.0106, pedigree (3,1,1,1,3)
  This is the difference between biomass carbon stocks of previous and final land use vegetation (t0 - t1). This is derived from Novaes et al. 2017.
- NPP0, net primary productivity: 0.811; name NPP; lognormal variance with pedigree 0.022825, pedigree (2,5,2,2,3)
  This is net primary production and it is the average value for Latin America as reported by Haberl et al. (2007) .

## Reference product
- land tenure, arable land, measured as carbon net primary productivity, perennial crop: 1 kg; CPC 7: Financial and related services; real estate services; and rental and leasing services; By-product classification allocatable product
  Yield = 1.0 kg C NPP/ha - Land that is made available for the cultivation of perennial crops, expressed in kg carbon net primary productivity
  production volume 8.40128e6 kg
    Production volume is expressed in NPP as an indirect measure of area. Its value is derived from the proportion this land transformation activity contributes to the mix of land transformations that compose Land Tenure Market of the reference product (e.g. annual crops). Those proportions are derived from Novaes et al. 2017, Appendix S2, tab 'Search results', box 4c and represent over which land uses the reference product expanded in what proportion. In this box the proportional value is converted in the PV amount and the maximum and minimum values as the extremities of a triangular distribution in the uncertainty field. Each geography has a different mix. Most updated data is available in www.cnpma.embrapa.br/forms/BRLUC.php. Those proportions are multiplied by the total PV value of the reference product, which by Ecoinvent default is: Current area of reference product (ha)*NPP value (=8110 Kg C /ha)*6.23%*20-1years. The 6.23% value comes from the proportion Brazilian Total Biomass Appropriation (TBA) in relation to the total sum of TBA of the World, according to Krausmann et al., 2008, Supplementar Table 5.\nThe production volumes and market shares of land tenure and LUC have a high level of uncertainty, which can have large impacts in overall LCIA results (Novaes et al. 2017). However, the uncertainty associated with these data could not easily be reflected in the datasets. Uncertainty assessments should take this limitation into consideration.
  property carbon content 0
    carbon content on a dry matter basis (reserved; not for manual entry)
  properties: price 0 EUR2005, wet mass 0 kg, dry mass 0 kg, water content 0, carbon content, non-fossil 0, water in wet mass 0 kg, carbon allocation 0 kg

## Inputs from technosphere
- power sawing, without catalytic converter: 0.000353258 hour; = 0.238*VEG/NPP*0.12/0.47/580
  Calculated Value: 0.238 (hours/m3) * VEG / NPP * 0.12 (fraction of VEG not burned*) / 0.47 (ratio C to biomass**) / 580 (kg/m3)
  *According to the Third National Communication of Brazil to the United Nations Framework Convention on Climate Change (Brazil, 2016, p.186), when converting forest for agricultural or livestock use, the rate of 12% of the original biomass is removed in the form of commercial wood, such as wood for the production of charcoal, or for use as fuel for various purposes. The rest is usually left in the field and burned.
  **Brazil (2016, Tab A1.7, p.244) presents the value of 47% for all carbon pools considered in forests (AGB, BGB, DOM) for Brazilian forests.
- diesel, burned in building machine: 0.902439 MJ; = 72.96*VEG/NPP/0.47/580
  Calculated Value: 72.96 (MJ/m3) * VEG / NPP / 0.47 (ratio C to biomass*) / 580 (kg/m3).
  *Brazil (2016, Tab A1.7, p.244) presents the value of 47% for all carbon pools considered in forests (AGB, BGB, DOM) for Brazilian forests.

## Inputs from nature
- Transformation, from forest, primary (non-use) [natural resource, land]: 1.23305 m2; = 1/NPP
  Corresponds to the reference flow.
- Occupation, construction site [natural resource, land]: 0.0474248 m2*year; = 2/52*1/NPP
  Calculated: The time required for the clear cutting is estimated to be two weeks (Jungbluth et al., 2007)
- Energy, gross calorific value, in biomass, primary forest [natural resource, biotic]: 134.871 MJ; = VEG/NPP*40
  Calculated Value: considering 15 MJ/kg (17% moisture wet basis) and 45% C in dry wood, 40 MJ/kg C in wood. 15 MJ is taken to reflect UHV rather than LHV.
- Transformation, to permanent crop [natural resource, land]: 1.23305 m2; = 1/NPP
  Corresponds to the reference flow.
- Carbon, organic, in soil or biomass stock [natural resource, in ground]: 3.37178 kg; = VEG/NPP
  Calculated value: above and below ground biomass, in kg C per reference flow. In the case of carbon emission (positive VEG value) the flux is from the soil and biomass; in cases of carbon sequestration (negative VEG value), the flux is from the air.

## Emissions to nature
- Carbon monoxide, from soil or biomass stock [air, non-urban air or from high stacks]: 0.284292 kg; = VEG/NPP/0.47*0.88*0.433*0.104
  Calculated Value: VEG / NPP / 0.47 (ratio C to biomass*) * 0.88 (fraction burned**) * CF (Combustion Factor of biome***) * EmissionFactor
  The share of VEG that is burned is multiplied with the emission factor.
  *Brazil (2016, Tab A1.7, p.244) presents the value of 47% for all carbon pools considered in forests (AGB, BGB, DOM) for Brazilian forests.
  **According to the Third National Communication of Brazil to the United Nations Framework Convention on Climate Change (Brazil, 2016, p.186), when converting forest for agricultural or livestock use, the rate of 12% of the original biomass is removed in the form of commercial wood, such as wood for the production of charcoal, or for use as fuel for various purposes. The rest is usually left in the field and burned.
  ***According to IPCC (2006, v4 p2.43), the Combustion Factor is calculated in function of the size and architecture of the fuel load (i.e., a smaller proportion of large, coarse fuel such as tree stems will be burnt compared to fine fuels, such as grass leaves), the moisture content of the fuel and the type of fire (i.e., intensity and rate of spread which is markedly affected by climatic variability and regional differences. The CF values came from Brazil (2016, Table 3.112, p.186/187), and are weighted averages for the biomes of the states.
- Propene [air, non-urban air or from high stacks]: 0.00150347 kg; = VEG/NPP/0.47*0.88*0.433*0.00055
  (same comment as for Carbon monoxide, from soil or biomass stock)
- Nitrogen oxides [air, non-urban air or from high stacks]: 0.00437373 kg; = VEG/NPP/0.47*0.88*0.433*0.0016
  (same comment as for Carbon monoxide, from soil or biomass stock)
- Formic acid [air, non-urban air or from high stacks]: 0.00300694 kg; = VEG/NPP/0.47*0.88*0.433*0.0011
  (same comment as for Carbon monoxide, from soil or biomass stock)
- Ethyne [air, non-urban air or from high stacks]: 0.000109343 kg; = VEG/NPP/0.47*0.88*0.433*4E-05
  (same comment as for Carbon monoxide, from soil or biomass stock)
- Ethane [air, non-urban air or from high stacks]: 0.0032803 kg; = VEG/NPP/0.47*0.88*0.433*0.0012
  (same comment as for Carbon monoxide, from soil or biomass stock)
- Benzene [air, non-urban air or from high stacks]: 0.00109343 kg; = VEG/NPP/0.47*0.88*0.433*0.0004
  (same comment as for Carbon monoxide, from soil or biomass stock)
- Sulfur dioxide [air, non-urban air or from high stacks]: 0.00155814 kg; = VEG/NPP/0.47*0.88*0.433*0.00057
  (same comment as for Carbon monoxide, from soil or biomass stock)
- Phenol [air, non-urban air or from high stacks]: 1.64015e-5 kg; = VEG/NPP/0.47*0.88*0.433*6E-06
  (same comment as for Carbon monoxide, from soil or biomass stock)
- Particulates, < 2.5 um [air, non-urban air or from high stacks]: 0.0248756 kg; = VEG/NPP/0.47*0.88*0.433*0.0091
  (same comment as for Carbon monoxide, from soil or biomass stock)
- Furan [air, non-urban air or from high stacks]: 0.0131212 kg; = VEG/NPP/0.47*0.88*0.433*0.0048
  (same comment as for Carbon monoxide, from soil or biomass stock)
- Ammonia [air, non-urban air or from high stacks]: 0.00355365 kg; = VEG/NPP/0.47*0.88*0.433*0.0013
  (same comment as for Carbon monoxide, from soil or biomass stock)
- Propane [air, non-urban air or from high stacks]: 0.000410037 kg; = VEG/NPP/0.47*0.88*0.433*0.00015
  (same comment as for Carbon monoxide, from soil or biomass stock)
- Acetic acid [air, non-urban air or from high stacks]: 0.00574052 kg; = VEG/NPP/0.47*0.88*0.433*0.0021
  (same comment as for Carbon monoxide, from soil or biomass stock)
- Carbon dioxide, from soil or biomass stock [air, non-urban air or from high stacks]: 11.3349 kg; = VEG/NPP/0.47*1.58
  Calculated Value: The entire biomass (either burned or degraded) is multiplied with the emission factor. No wood from clear-cutting is considered harvested. In the case of carbon emission (positive VEG value) the flux is towards the air; in cases of carbon sequestration (negative VEG value), the flux is towards the soil.
- Acetaldehyde [air, non-urban air or from high stacks]: 0.00177683 kg; = VEG/NPP/0.47*0.88*0.433*0.00065
  (same comment as for Carbon monoxide, from soil or biomass stock)
- Benzene, ethyl- [air, non-urban air or from high stacks]: 6.56059e-5 kg; = VEG/NPP/0.47*0.88*0.433*2.4E-05
  (same comment as for Carbon monoxide, from soil or biomass stock)
- Particulates, > 2.5 um, and < 10um [air, non-urban air or from high stacks]: 0.0226887 kg; = VEG/NPP/0.47*0.88*0.433*0.0083
  (same comment as for Carbon monoxide, from soil or biomass stock)
- Methane, from soil or biomass stock [air, non-urban air or from high stacks]: 0.0185883 kg; = VEG/NPP/0.47*0.88*0.433*0.0068
  (same comment as for Carbon monoxide, from soil or biomass stock)
- Acetone [air, non-urban air or from high stacks]: 0.00169482 kg; = VEG/NPP/0.47*0.88*0.433*0.00062
  (same comment as for Carbon monoxide, from soil or biomass stock)
- Ethanol [air, non-urban air or from high stacks]: 4.92044e-5 kg; = VEG/NPP/0.47*0.88*0.433*1.8E-05
  (same comment as for Carbon monoxide, from soil or biomass stock)
- Ethene [air, non-urban air or from high stacks]: 0.00533048 kg; = VEG/NPP/0.47*0.88*0.433*0.00195
  (same comment as for Carbon monoxide, from soil or biomass stock)
- Toluene [air, non-urban air or from high stacks]: 0.000683395 kg; = VEG/NPP/0.47*0.88*0.433*0.00025
  (same comment as for Carbon monoxide, from soil or biomass stock)
- Cyanide [air, non-urban air or from high stacks]: 0.00929417 kg; = VEG/NPP/0.47*0.88*0.433*0.0034
  (same comment as for Carbon monoxide, from soil or biomass stock)
- Formaldehyde [air, non-urban air or from high stacks]: 0.00382701 kg; = VEG/NPP/0.47*0.88*0.433*0.0014
  (same comment as for Carbon monoxide, from soil or biomass stock)
- Methanol [air, non-urban air or from high stacks]: 0.00546716 kg; = VEG/NPP/0.47*0.88*0.433*0.002
  (same comment as for Carbon monoxide, from soil or biomass stock)
- PAH, polycyclic aromatic hydrocarbons [air, non-urban air or from high stacks]: 6.83395e-5 kg; = VEG/NPP/0.47*0.88*0.433*2.5E-05
  (same comment as for Carbon monoxide, from soil or biomass stock)
- Dinitrogen monoxide [air, non-urban air or from high stacks]: 0.000546716 kg; = VEG/NPP/0.47*0.88*0.433*0.0002
  (same comment as for Carbon monoxide, from soil or biomass stock)
- Xylene [air, non-urban air or from high stacks]: 0.000164015 kg; = VEG/NPP/0.47*0.88*0.433*6E-05
  (same comment as for Carbon monoxide, from soil or biomass stock)
- Terpenes [air, non-urban air or from high stacks]: 0.000410037 kg; = VEG/NPP/0.47*0.88*0.433*0.00015
  (same comment as for Carbon monoxide, from soil or biomass stock)
- Acetonitrile [air, non-urban air or from high stacks]: 0.000492044 kg; = VEG/NPP/0.47*0.88*0.433*0.00018
  (same comment as for Carbon monoxide, from soil or biomass stock)
- Isoprene [air, non-urban air or from high stacks]: 4.37373e-5 kg; = VEG/NPP/0.47*0.88*0.433*1.6E-05
  (same comment as for Carbon monoxide, from soil or biomass stock)

## Sampling procedure
There was no sampling.

## Extrapolations
From the data of Novaes et al., 2017, the only extrapolation is the convertion of land transformation scenarios into production volumes and its uncertainty values. More details about this can be found in the PV_comment.

Exchanges emission factors are the same from land transformations datasets 'clear-cutting, primary forest to arable land, annual crop, BR, 2010 - 2015' (Rossi, 2017a) and 'land already in use, annual cropland to annual crop, BR, 2010 - 2015' (Rossi, 2017b), thus extrapolated from a national level to state level.
