# cement plaster production, hand-mixed on site

Dataset: EcoSpold 2, unit process
Geography: IN
Time period: 2014-04-01 to 2019-12-31
Technology level: current
Classification: ISIC rev.4 ecoinvent: 2395:Manufacture of articles of concrete, cement and plaster
Scenario: Business-as-Usual
System model: Allocation at the point of substitution
Generated by: P V Kiran Ananth
Published in: Kiran Ananth P. V. 2017
Database: ecoinvent
isCopyrightProtected: true
accessRestrictedTo: 1

## General comment
Plastering is done on the walls to remove surface imperfections, maintain line level and alignment. In addition to that it also acts as a protective surface for external walls. Cement plaster, Gypsum plaster and Lime plaster are the commonly used plastering materials for house constructions. Cement plaster is made by mixing cement and sand in the proportions required. Cement plaster is applied to both interior and exterior walls to give them a smooth surface.
The differences between mortar and plaster lie in the capacity of plasters to take better finish, which depend to a very large extent on the type of sand used in the mix. For plasters we use finer sand. However in mortar we use coarse particles of sand.
Mix ratio is the volumetric mixing ratio of cement and aggregates. Mix Ratio varies from 1:3 to 1:6 depending upon the application area. The mix ratio accounted for this dataset is 1:6. This dataset considered hand-mixed on site production and its application is for plastering larger area like big buildings.

## Included activities start
Activities startes with reception of cement, aggregates and water at civil site.

## Included activities end
Activity ends with cement plaster, ready to be applied. The tap water consumption for cleaning the container and tools is excluded due to lack of data.

## Geography
Data represents for Indian geography.

## Technology
Mixing of cement, water and aggregates done by hand mixing.

## Time period
Data available for above period.

## Reference product
- cement plaster: 1 m3; CPC 3741: Plasters; By-product classification allocatable product
  production volume 4.13e7 m3; = 59E+09*(10%*5%)*14%
    The production volume of pre-mixed dry mortars worldwide is estimated to be: "Total production of cement/gypsum/lime based dry mortars worldwide is 59,0 million tons, of which 57% is produced in Western Europe, 14% in Eastern Europe, 10% in Asia/Pacific, and about 6% each in North America, Latin America and Middle East/Africa."(Schinski, E., n.d. Dry mortars - Markets and Trends. Hercules GmbH, Aqualon Division, Düsseldorf, Germany. Retrieved from: http://www.apfac.pt/congresso2005/comunicacoes/Paper%2056.pdf, accessed 20171025). According to Schinski (n.d.), 35% of dry mix mortars are cement based renders, 32% are cement tiles, 17% are gypsum plasters and 14% are cement based mortars. India is in the top 3 global producers of cement with China and US, India produces around 10% of what China produces (WorldAtlas, 2017. Top Cement Producing Countries In The World, Retrieved from: http://www.worldatlas.com/articles/top-cement-producing-countries-in-the-world.html, accessed 20172510). Based on expert judgement it is therefore assumed that India represents 5% of the Asia and Pacific production. The production volume is therefore calculated as 59 million tons * (10%*5%) *14%.
  property price 1917 EUR2005
    Calculated value based on data from United Nations Commodity Trade Statistics Database (comtrade.un.org). UN comtrade category: 680990 Articles of plater etc, other than plasterboard. Year 2005. Using exchange rate of 1EURO = 1.209 USD. Average of price of import into 5 main markets (EU, US, JP, IN and CN).
  property carbon content 0
    carbon content on a dry matter basis (reserved; not for manual entry)
  properties: carbon content, fossil 0, dry mass 1917 kg, water content 0, water in wet mass 0 kg, carbon content, non-fossil 0, wet mass 1917 kg, carbon allocation 0 kg

## Inputs from technosphere
- sand: 1667 kg; lognormal variance with pedigree 0.005325, pedigree (3,2,3,2,2)
  Calculated value. For Cement plaster mix ratio assumed here is 1:6 (volume basis). Density of Cement 1440 kg/m3 and density of sand 1600 kg/m3 considered for calculation purpose.
  properties: wet mass 1 kg, dry mass 1 kg
- cement, pozzolana and fly ash 25-35%: 250 kg; lognormal variance with pedigree 0.005325, pedigree (3,2,3,2,2)
  (same comment as for sand)
  properties: wet mass 1 kg, dry mass 1 kg
- tap water: 383 kg; name water_input; lognormal variance with pedigree 0.0034, pedigree (3,3,2,1,1)
  Calculated value. Usually around 20% of water by weight of the total dry material is mixed in the mixture to achieve the desire workability. For Cement plaster mix ratio assumed here is 1:6 (volume basis). Density of Cement 1440 kg/m3 and density of sand 1600 kg/m3 considered for calculation purpose.
  properties: carbon content, fossil 0.00178991, wet mass 1 kg, water content 2962.17, dry mass 0.000337476 kg
  note on carbon content, fossil: Bicarbonate content is 2.93 mol/m3. CO2 content is 0.1 mol/m3 (ecoinvent v2.2 report 8, Tab 93.1).

## Emissions to nature
- Water [water, unspecified]: 0.0766 m3; = water_input*0.2/1000; lognormal variance with pedigree 0.0512, pedigree (4,3,3,1,4)
  Assumed value. It was considered that 80% of water present in air and remaining 20% water present as water.
- Water [air, unspecified]: 0.3064 m3; = water_input*0.8/1000; lognormal variance with pedigree 0.0512, pedigree (4,3,3,1,4)
  (same comment as for Water)

## Sampling procedure
Data collected by consulting with two cement plaster manufacturer and secondary research.

## Extrapolations
This dataset has been extrapolated from year 2017 to the year of the calculation (2019). The uncertainty has been adjusted accordingly.
