# suction, sawdust

Dataset: EcoSpold 2, unit process
Geography: CA-QC
Time period: 2012-01-01 to 2019-12-31
Technology level: current
Classification: ISIC rev.4 ecoinvent: 1610:Sawmilling and planing of wood
Tags: recontextualization
Scenario: Business-as-Usual
System model: Allocation at the point of substitution
Generated by: Hugues Imbeault-Tétreault
Database: ecoinvent
isCopyrightProtected: true
accessRestrictedTo: 1

## General comment
This data represents the service of collecting sawdust, expressed per kg dry mass and transporting it to its silo via aspiration. The exchanges of this child dataset are identical to the GLO dataset. This dataset was created to enable linking to regional markets (e.g. for electricity). Data quality indicators were adjusted accordingly.
The process chain in a sawmill is a net of interlinked processes; the process structure depends on the individual design and technologies in place for each sawmill. The structuring of the sawmilling processes is based on the identification of the core processes in a sawmill that are attributable to several co-products (such as upstream processes like forestry and transport of logs to the sawmill) sorting, storing and the sawing of the (debarked) log. Other processes are attributable directly to one of the co-products such as the chipping of residual wood (either after sawing or as part of the profile chipping), the chipping of the bark (the "debarking") or the suction of saw dust as collection and internal transport.
The following figure illustrates the general structure of the sawmilling processes before eventual drying and planing:
The data was provided by and approved by the Swiss forest industry (Holzindustrie Schweiz HIS).

## Included activities start
The activity starts with the sawdust at the sawing machine.

## Included activities end
This activity ends with the sawdust collected at a silo at the sawmill site. The dataset does not include direct wood dust emissions nor specific infrastructure, which is taken into account as a rough estimate in the sawmilling process.

## Geography
Child dataset exchanges identical to GLO dataset. Dataset created to enable linking to regional markets (e.g. for electricity). Data quality indicators adjusted accordingly.

## Reference product
- saw dust, loose, wet, measured as dry mass: 0 kg; source BFS 2013; CPC 3928: Sawdust and wood waste and scrap; By-product classification allocatable product
  estimated from the production volumes of sawdust resulting from the sawing of softwood and hardwood; extrapolated to GLO values via the production of sawnwood (C) in Switzerland and globally based on FAOStat
  production volume 0 kg; name p_sawdust; = (3.7751E06+5.0154E07)/1079420*1.1134E+07
    Sum of sawdust from the sawing of hardwood (3.77E06 kg/year) and softwood (5.02 E07 kg/year) in the corresponding dataset for Switzerland, extrapolated to CA-QC values via ratio of production of sawn timber in CH and CA-QC according to FAOStat and Statistics Canada, respectively.
  property carbon content 0.494
    carbon content on a dry matter basis (reserved; not for manual entry)
  properties: water content 0.7, dry mass 1 kg, water in wet mass 0.7 kg, carbon content, non-fossil 0.494, price 0.034 EUR2005, carbon content, fossil 0, wet mass 1.7 kg, carbon allocation 0.494 kg
- saw dust, wet, measured as dry mass: 1 kg; source BFS 2013; By-product classification allocatable product; CPC 3928: Sawdust and wood waste and scrap; pedigree (1,1,1,1,1)
  sawdust collected for further used
  production volume 5.56268e8 kg

## By-products
- saw dust, wet, measured as dry mass: 0 kg; source BFS 2013; By-product classification allocatable product; CPC 3928: Sawdust and wood waste and scrap; pedigree (1,1,1,1,1)
  sawdust collected for further used
  production volume 0 kg; = p_sawdust
    Calculated from production volume of reference product using the relative outputs.
  property price 0.101 EUR2005
    Expert judgement (Urs Luginbühl, Swiss Sawmilling industry, personal communication in June 2014). Cross-reference; FAOSTAT (accessed 20140429). The price is calculated by using data on total world import quantity (m3) and import value (1000 USD), year 2005. 13564451 m3 of Wood Residues was imported in the world in 2005. The import value was 690978000 USD. The calculated price is thus (690978000/13564451=50.9*0.8=) 41.1 Euro/m3. The density of saw dust, wet, measured as dry mass is 550 kg/m3. The recalculated price is (1/550*41.1=) 0.075 Euro/kg.
  property carbon content 0.494
    carbon content on a dry matter basis (reserved; not for manual entry)
  properties: carbon content, non-fossil 0.494, carbon content, fossil 0, water in wet mass 0.7 kg, water content 0.7, wet mass 1.7 kg, dry mass 1 kg, carbon allocation 0.494 kg

## Inputs from technosphere
- electricity, medium voltage: 0.014081 kWh; source BFS 2013; lognormal variance with pedigree 0.216, pedigree (5,5,5,5,5)
  electricity used for the aspiration and transport of sawdust from the sawing processes
- heat, district or industrial, other than natural gas: 0.000221859 MJ; lognormal variance with pedigree 0.0032, pedigree (1,3,3,1,1)
  Light fuel oil burned for heating. Calculated based on reported fuel input volume, fuel density, net heating value per kg and efficiency.
- waste mineral oil: -7.56411e-5 kg; lognormal variance with pedigree 0.1026, pedigree (1,3,3,1,1)
  waste motor oil and hydraulic fluids; greases are used in a dissipative way
  production volume 1.91286e6 kg
- lubricating oil: 5.83815e-5 kg; lognormal variance with pedigree 0.1026, pedigree (1,3,3,1,1)
  Hydraulic fluids, motor oils and greases.
- saw dust, loose, wet, measured as dry mass: -0.0245531 kg; lognormal variance with pedigree 0.2526, pedigree (1,3,3,1,1)
  calculated by the share and basic density as the moisture content is over 30%
  production volume 6.20913e8 kg
- propane, burned in building machine: 0.000816579 MJ; lognormal variance with pedigree 0.0032, pedigree (1,3,3,1,1)
  Propane for internal transport. Calculated based on reported fuel input volume, fuel density, net heating value per kg and efficiency.
- sawlog and veneer log, softwood, measured as solid wood under bark: 0.00104268 m3; lognormal variance with pedigree 0.2526, pedigree (1,3,3,1,1)
  input of the log, from which 1 m3 of sawnwood is produced
- sawmill: 1.19491e-10 unit; lognormal variance with pedigree 0.2532, pedigree (2,1,3,4,1)
  value taken from econvent 2.2
- bark: -0.0485702 kg; lognormal variance with pedigree 0.0086, pedigree (1,3,3,1,1)
  calculated by the share and basic density as the moisture content is over 30%
  production volume 1.22827e9 kg
- heat, district or industrial, natural gas: 0.000943742 MJ; lognormal variance with pedigree 0.0032, pedigree (1,3,3,1,1)
  Calculated based on reported natural gas input, the net heating value per m³ of natural gas and efficiency.
- diesel, burned in building machine: 0.0986574 MJ; lognormal variance with pedigree 0.1027, pedigree (1,3,3,3,1)
  Diesel for internal transport. Calculated based on reported fuel input volume, fuel density and net heating value per kg.
- heat, district or industrial, other than natural gas: 0.00241024 MJ; lognormal variance with pedigree 0.0032, pedigree (1,3,3,1,1)
  Heavy fuel oil burned for heating. Calculated based on reported fuel input volume, net heating value per liter and efficiency.

## Inputs from nature
- Water, river [natural resource, in water]: 6.25227e-5 m3; lognormal variance with pedigree 0.0032, pedigree (1,3,3,1,1)
  data from industry

## Emissions to nature
- Particulates, < 2.5 um [air, non-urban air or from high stacks]: 1.15126e-5 kg; lognormal variance with pedigree 0.3032, pedigree (2,3,3,1,1)
  data from industry; process emissions
- Particulates, > 10 um [air, non-urban air or from high stacks]: 2.12792e-5 kg; lognormal variance with pedigree 0.0432, pedigree (2,3,3,1,1)
  data from industry; process emissions
- Water [air, unspecified]: 2.06325e-5 m3; lognormal variance with pedigree 0.0038, pedigree (2,3,3,1,1)
  33% of water intake is assumed dissipated.
- Particulates, > 2.5 um, and < 10um [air, non-urban air or from high stacks]: 4.25585e-6 kg; lognormal variance with pedigree 0.1232, pedigree (2,3,3,1,1)
  data from industry; process emissions
- Water [water, surface water]: 4.18902e-5 m3; lognormal variance with pedigree 0.0038, pedigree (2,3,3,1,1)
  67% of water intake is assumed discharged.
- Suspended solids, unspecified [water, surface water]: 4.91059e-7 kg; lognormal variance with pedigree 0.0426, pedigree (1,3,3,1,1)
  data from industry

## Sampling procedure
complementary literature and sampling from sawmills

## Extrapolations
Data from Switzerland. Child dataset exchanges identical to GLO dataset. Dataset created to enable linking to regional markets (e.g. for electricity). Data quality indicators adjusted accordingly.
