# biogas purification to methane 96 vol-%

Dataset: EcoSpold 2, unit process
Geography: CH
Time period: 2004-01-01 to 2019-12-31
Technology level: current
Classification: ISIC rev.4 ecoinvent: 3821:Treatment and disposal of non-hazardous waste
Classification: EcoSpold01Categories: biomass/fuels
Tags: ConvertedDataset
Scenario: Business-as-Usual
System model: Allocation at the point of substitution
Share of production covered: 100 %
Generated by: Michael Spielmann (obsolete)
Published in: Jungbluth N. 2007
Database: ecoinvent
isCopyrightProtected: true
accessRestrictedTo: 1

## General comment
The data presented is derived from information available from the manufacturer of biogas upgrading plants. The upgraded gas leaves the process with a pressure of 5 bar. For the composition of the product gas we assume a share of 96 Vol. % of methane.
[This dataset was already contained in the ecoinvent database version 2. It was not individually updated during the transfer to ecoinvent version 3. Life Cycle Impact Assessment results may still have changed, as they are affected by changes in the supply chain, i.e. in other datasets. This dataset was generated following the ecoinvent quality guidelines for version 2. It may have been subject to central changes described in the ecoinvent version 3 change report (http://www.ecoinvent.org/database/ecoinvent-version-3/reports-of-changes/), and the results of the central updates were reviewed extensively. The changes added e.g. consistent water flows and other information throughout the database. The documentation of this dataset can be found in the ecoinvent reports of version 2, which are still available via the ecoinvent website. The change report linked above covers all central changes that were made during the conversion process.]

## Included activities end
Electricity consumption and emissions represent the raw gas compression, H2S removal, gas conditioning and methane enrichment of biogas. The production and disposal of activated carbon are neglected. Infrastructure expenditures are included employing generic data for facilities of a chemical plant as a first approximation.

## Geography
A plant using the described technology is in operation in Switzerland.

## Technology
Pressure Switch Adsorption (PSA)

## Reference product
- methane, 96% by volume: 1 m3; CPC 17200: Coal gas, water gas, producer gas and similar gases, other than petroleum gases and other gaseous hydrocarbons; By-product classification allocatable product
  production volume 7.25e7 m3
    Not known
    Corresponding to 540 GWh; Source: ecoinvent 2
  property price 0.144 EUR2005
    Temporary price data. Calculated as 90% of purchasers price based on: Same prices per energy output as natural gas, based on the proportional heating value (55.5 MJ/kg for methane; 54.8 MJ/kg for natural gas)
  property carbon content 0.695496
    carbon content on a dry matter basis (reserved; not for manual entry)
  properties: wet mass 0.752 kg, carbon content, fossil 0, water in wet mass 0 kg, water content 0, carbon content, non-fossil 0.695496, dry mass 0.752 kg, carbon allocation 0.523013 kg

## Inputs from technosphere
- biogas: 1.5 m3; lognormal variance with pedigree 0.0446, pedigree (3,4,5,1,1)
  Literature studies and own calculations. Basic uncertainty has been adjusted based on variations of literature data.
  properties: dry mass 1.15 kg, wet mass 1.15 kg, carbon content, non-fossil 0.449939
  note on carbon content, non-fossil: Total C content in kg/Nm3 (Tab 12.8, ecoinvent v2.2 report n17), referred to 1kg DM
- chemical factory, organics: 4e-10 unit; lognormal variance with pedigree 0.448, pedigree (4,5,5,5,5)
  Rough estimation
  EcoSpold01Location=RER
  Uncertainty: rough estimation
- electricity, medium voltage: 0.5 kWh; lognormal variance with pedigree 0.164, pedigree (3,4,5,1,1)
  Literature studies and own calculations (basic uncertainty is increased to 2.,0, in contrast to standard values)
  EcoSpold01Location=CH
  Uncertainty: literature studies and own calculations (basic uncertainty is increased to 2.,0, in contrast to standard values)

## Emissions to nature
- Hydrogen sulfide [air, non-urban air or from high stacks]: 3.4875e-6 kg; lognormal variance with pedigree 0.0407, pedigree (2,1,5,3,1)
  Literature studies and own calculations (basic uncertainty is increased, in contrast to standard values)
  Uncertainty: literature studies and own calculations (basic uncertainty is increased, in contrast to standard values)
- Carbon dioxide, non-fossil [air, non-urban air or from high stacks]: 0.86586 kg; lognormal variance with pedigree 0.0501, pedigree (1,1,5,3,1)
  (same comment as for Hydrogen sulfide)
- Methane, non-fossil [air, non-urban air or from high stacks]: 0.022257 kg; lognormal variance with pedigree 0.0507, pedigree (2,1,5,3,1)
  (same comment as for Hydrogen sulfide)
- Sulfur dioxide [air, non-urban air or from high stacks]: 0.00055158 kg; lognormal variance with pedigree 0.0407, pedigree (2,1,5,3,1)
  (same comment as for Hydrogen sulfide)

## Sampling procedure
Literature data

## Extrapolations
This dataset has been extrapolated from year 2005 to the year of the calculation (2019). The uncertainty has been adjusted accordingly.

## Review by Christian Bauer 2009-02-03
Passed.
