# treatment of wastewater from black chrome coating, capacity 1.1E10l/year

Dataset: EcoSpold 2, unit process
Geography: RoW
Time period: 1994-01-01 to 2019-12-31
Technology level: current
Classification: ISIC rev.4 ecoinvent: 3700:Sewerage
Classification: EcoSpold01Categories: waste management/wastewater treatment
Tags: Treatment; ConvertedDataset
Scenario: Business-as-Usual
System model: Allocation at the point of substitution
Generated by: Gabor Doka (obsolete)
Published in: Doka G. 2008
Database: ecoinvent
isCopyrightProtected: true
accessRestrictedTo: 1

## General comment
Wastewater purified in a moderatly large municipal wastewater treatment plant (capacity class 2), with an average capacity size of 71100 per-captia-equivalents PCE.
Wastewater contains (in kg/m3): COD: 0.002 (GSD=123.5%); BOD: 0.001 (GSD=123.5%); Ag: 0.000005 (GSD=224.1%); Cd: 0.000005 (GSD=224.1%); Cr: 0.00035 (GSD=224.1%); Cu: 0.00049 (GSD=224.1%); Ni: 0.0003 (GSD=224.1%); Pb: 0.00005 (GSD=224.1%); Zn: 0.00021 (GSD=224.1%);
[This dataset was already contained in the ecoinvent database version 2. It was not individually updated during the transfer to ecoinvent version 3. Life Cycle Impact Assessment results may still have changed, as they are affected by changes in the supply chain, i.e. in other datasets. This dataset was generated following the ecoinvent quality guidelines for version 2. It may have been subject to central changes described in the ecoinvent version 3 change report (http://www.ecoinvent.org/database/ecoinvent-version-3/reports-of-changes/), and the results of the central updates were reviewed extensively. The changes added e.g. consistent water flows and other information throughout the database. The documentation of this dataset can be found in the ecoinvent reports of version 2, which are still available via the ecoinvent website. The change report linked above covers all central changes that were made during the conversion process.]

## Included activities end
Infrastructure materials for municipal wastewater treatment plant, transports, dismantling. Land use burdens.

## Geography
Specific to the technology mix encountered in Switzerland in 2000. Well applicable to modern treatment practices in Europe, North America or Japan.

## Technology
Three stage wastewater treatment (mechanical, biological, chemical) including sludge digestion (fermentation) according to the average technology in Switzerland

## Parameters
- fraction, process water, to air: 0.1 dimensionless; name fraction_PW_to_air; lognormal variance with pedigree 0.092025, pedigree (4,4,3,2,4)

## Reference product
- wastewater from black chrome coating: -1 m3; CPC 39920: Sewage sludge; By-product classification Waste
  EcoSpold01Location=CH
  production volume 3.96633 m3
    This is a placeholder value that does not reflect real-world production volumes. This dataset does not currently require a real-world production volume to work in the database framework, and no actual data were collected yet. This has no negative effect on the results of the ecoinvent database.
  property price 0 EUR2005
    Waste products are assigned a price of zero as they are assumed to require further treatment.
  property carbon content, fossil 0.00256552
    COD= 0.002 kg/m3 (Tab A.18, ecoinvent v2.2 report 13_I). COD was converted to TOC, using conversion factors in Tab 4.10 (ecoinvent v2.2 report 13_IV). TOC was considered as Total Carbon.
  property carbon content 0.00256552
    carbon content on a dry matter basis (reserved; not for manual entry)
  properties: water content 2962.17, dry mass 0.337476 kg, wet mass 1000 kg, carbon content, non-fossil 0, water in wet mass 999.663 kg, carbon allocation 0.000865801 kg

## By-products
- heat, for reuse in municipal waste incineration only: 0 MJ; CPC 17300: Steam and hot water; By-product classification allocatable product; pedigree (1,1,1,1,1)
  Net electricity generated from this waste and used in internal MSWI plant energy redistribution.
  Uncertainty: uncertainty is calculated from uncertainties in waste composition and uncertainties in energy efficiency and the uncertainty in internal energy demand
  property exergy 0.1842 MJ; name E_th_prod_MSWI_exergy
    This exergy property is based on the exergy content of the product.
  property price 0.0106 EUR2005; name E_th_prod_MSWI_price_EUR2005
    Average European district heat price from Ecoheatcool and Euroheat 2005-2006, Ecoheat Work package 1: The European heat market. Final report. 10.6 EUR/GJ i s the price of district heat. http://www.solarthermalworld.org/files/Ecoheatcool%20WP1%20Web.pdf?download
  property true value relation 0.1842; name E_th_prod_MSWI_true_value_relation
    property to calculate "true value" from
- electricity, for reuse in municipal waste incineration only: 0 kWh; CPC 17100: Electrical energy; By-product classification allocatable product; pedigree (1,1,1,1,1)
  (same comment as for heat, for reuse in municipal waste incineration only)
  property price 0.1 EUR2005; name E_el_prod_MSWI_price_EUR2005
    Estimated to be the same price as in case of electricity, medium voltage.
  property exergy 3.6 MJ; name E_el_prod_MSWI_exergy
    This exergy property is based on the exergy content of the product.
  property true value relation 3.6; name E_el_prod_MSWI_true_value_relation
    property to calculate "true value" from

## Inputs from technosphere
- residual material landfill: 6.0273e-13 unit; lognormal variance with pedigree 0.072, pedigree (1,1,5,5,1)
  burden from sludge incineration. Uncertainty calculated from wastewater composition and treatment model
  EcoSpold01Location=CH
- process-specific burdens, slag landfill: 0 kg; pedigree (1,1,1,1,1)
  (same comment as for residual material landfill)
- municipal waste incineration facility: 7.4696e-13 unit; lognormal variance with pedigree 0.072, pedigree (1,1,5,5,1)
  (same comment as for residual material landfill)
- slag landfill: 6.7118e-13 unit; lognormal variance with pedigree 0.072, pedigree (1,1,5,5,1)
  EcoSpold01Location=CH
  burden from sludge incineration. Uncertainty calculated from wastewater composition and treatment model
- process-specific burdens, residual material landfill: 0 kg; pedigree (1,1,1,1,1)
  (same comment as for residual material landfill)
- wastewater treatment facility, capacity 1.1E10l/year: 1.9883e-9 unit; lognormal variance with pedigree 0.042, pedigree (1,1,5,5,1)
  EcoSpold01Location=CH
  uncertainty heeded in exchanges of the module
- hydrochloric acid, without water, in 30% solution state: 5.6954e-8 kg; lognormal variance with pedigree 0.352, pedigree (1,1,5,5,1)
  EcoSpold01Location=RER
  burden from sludge incineration. Uncertainty calculated from wastewater composition and treatment model
  properties: dry mass 1 kg, wet mass 1 kg
- heat, district or industrial, natural gas: 0 MJ; pedigree (1,1,1,1,1)
  direct wastewater treatment plant burden. Uncertainty calculated from wastewater composition and treatment model
  EcoSpold01Location=RER
- iron (III) chloride, without water, in 40% solution state: 1.7323e-5 kg; lognormal variance with pedigree 0.352, pedigree (1,1,5,5,1)
  EcoSpold01Location=CH
  direct wastewater treatment plant burden plus burden from sludge incineration. Uncertainty calculated from wastewater composition and treatment model
  properties: wet mass 1 kg, dry mass 1 kg
- process-specific burdens, municipal waste incineration: 0 kg; pedigree (1,1,1,1,1)
  (same comment as for slag landfill)
- electricity, low voltage: 0 kWh; pedigree (1,1,1,1,1)
  EcoSpold01Location=CH
  direct wastewater treatment plant burden. Uncertainty calculated from wastewater composition and treatment model
- chemical, organic: 4.6881e-6 kg; lognormal variance with pedigree 0.722, pedigree (1,1,5,5,1)
  burden from sludge incineration. Uncertainty calculated from wastewater composition and treatment model
  EcoSpold01Location=GLO
  properties: carbon content, fossil 0.628, dry mass 1 kg, wet mass 1 kg
  note on carbon content, fossil: This dataset is an unweighted average of 20 organic substances (listed in Tab 88.1, ecoinvent v2.2 report 8, part II), being part of the top100 chemicals included in this database. The C-content has also been calculated as an unweighted average of the C content of the substances composing this dataset.
- electricity, high voltage: 0 kWh; pedigree (1,1,1,1,1)
  (same comment as for slag landfill)
- liquid manure spreading, by vacuum tanker: 6.8904e-6 m3; lognormal variance with pedigree 0.042, pedigree (1,1,5,5,1)
  EcoSpold01Location=CH
  burden from sludge spreading. Uncertainty calculated from wastewater composition and treatment model
- waste cement, hydrated: 0 kg; pedigree (1,1,1,1,1)
  (same comment as for slag landfill)
  production volume 0 kg
    Calculated from the production volume of wastewater from black chrome coating in proportion to the respective output amounts.
  properties: wet mass 1 kg, dry mass 1 kg
- sewer grid, 1.1E10l/year, 242 km: 1.6832e-7 km; lognormal variance with pedigree 0.042, pedigree (1,1,5,5,1)
  EcoSpold01Location=CH
  uncertainty heeded in exchanges of the module
- heat, central or small-scale, other than natural gas: 0 MJ; pedigree (1,1,1,1,1)
  direct wastewater treatment plant burden. Uncertainty calculated from wastewater composition and treatment model
  EcoSpold01Location=CH
- waste plastic, mixture: 0 kg; pedigree (1,1,1,1,1)
  (same comment as for electricity, low voltage)
  production volume 0 kg
    (same comment as for waste cement, hydrated)
  properties: water content 0.180638, dry mass 0.847 kg, carbon content, fossil 0.747344, wet mass 1 kg
  note on carbon content, fossil: C content in 1 kg DM was calculated using data in Tab A.2, ecoinvent v2.2 report 13_I
- heat, district or industrial, other than natural gas: 0 MJ; pedigree (1,1,1,1,1)
  (same comment as for residual material landfill)
- chemical, inorganic: 9.4923e-8 kg; lognormal variance with pedigree 0.352, pedigree (1,1,5,5,1)
  (same comment as for chemical, organic)
  properties: carbon content, fossil 0.003, wet mass 1 kg, dry mass 1 kg
  note on carbon content, fossil: This dataset is an unweighted average of 20 inorganic substances (listed in Tab 88.1, ecoinvent v2.2 report 8, part II), being part of the top100 chemicals included in this database. The C-content has also been calculated as an unweighted average of the C content of the substances composing this dataset.
- cement, unspecified: 0 kg; pedigree (1,1,1,1,1)
  (same comment as for slag landfill)
  properties: dry mass 1 kg, wet mass 1 kg
- waste graphical paper: -0.0155 kg; lognormal variance with pedigree 0.042, pedigree (1,1,5,5,1)
  (same comment as for heat, central or small-scale, other than natural gas)
  production volume 0.062 kg
    (same comment as for waste cement, hydrated)
  properties: water content 0.126126, carbon content, non-fossil 0.454955, dry mass 0.888 kg, wet mass 1 kg
- process-specific burdens, slag landfill: 0.000106796, 0.000270744 kg (2 entries); lognormal variance with pedigree 0.072, pedigree (1,1,5,5,1)
  (same comment as for residual material landfill)
- process-specific burdens, residual material landfill: 8.18384e-5, 0.000207472 kg (2 entries); lognormal variance with pedigree 0.072, pedigree (1,1,5,5,1)
  (same comment as for residual material landfill)
- heat, district or industrial, natural gas: 0.00015013, 0.00342082, 0.00848761 MJ (3 entries); lognormal variance with pedigree 0.052, pedigree (1,1,5,5,1)
  (same comment as for heat, district or industrial, natural gas)
- process-specific burdens, municipal waste incineration: 0.000845201, 0.0021427 kg (2 entries); lognormal variance with pedigree 0.072, pedigree (1,1,5,5,1)
  (same comment as for slag landfill)
- electricity, low voltage: 0.000307528, 5.39365e-5, 0.00122328, 0.00438578, 0.000886932, 0.013413, 0.00221089, 0.00629765 kWh (8 entries); lognormal variance with pedigree 0.042, pedigree (1,1,5,5,1)
  (same comment as for electricity, low voltage)
- electricity, high voltage: 4.49285e-6, 8.18167e-7, 1.89511e-5, 6.37932e-5, 1.39751e-5, 0.000201193, 3.24043e-5, 9.39324e-5 kWh (8 entries); lognormal variance with pedigree 0.512, pedigree (1,1,5,5,1)
  (same comment as for slag landfill)
- waste cement, hydrated: -8.18384e-5, -0.000207472 kg (2 entries); lognormal variance with pedigree 0.082, pedigree (1,1,5,5,1)
  (same comment as for slag landfill)
  production volume 0.0011475 kg
- heat, central or small-scale, other than natural gas: 0.000123304, 0.00862622 MJ (2 entries); lognormal variance with pedigree 0.052, pedigree (1,1,5,5,1)
  (same comment as for heat, central or small-scale, other than natural gas)
- waste plastic, mixture: -0.00172425, -0.000115208, -8.71297e-6, -4.75849e-5, -1.92238e-5, -4.51863e-5, -0.00146914, -0.0120707 kg (8 entries); lognormal variance with pedigree 0.042, pedigree (1,1,5,5,1)
  (same comment as for electricity, low voltage)
  production volume 0.0614782 kg
- heat, district or industrial, other than natural gas: 1.09365e-6, 6.52718e-5, 0.00243953 MJ (3 entries); lognormal variance with pedigree 0.072, pedigree (1,1,5,5,1)
  (same comment as for residual material landfill)
- cement, unspecified: 3.47675e-6, 2.54648e-7, 7.25829e-7, 1.67095e-5, 1.64149e-5, 4.83138e-7, 5.30628e-6, 6.42001e-7, 7.1707e-5 kg (9 entries); lognormal variance with pedigree 0.082, pedigree (1,1,5,5,1)
  (same comment as for slag landfill)

## Emissions to nature
- Zinc, ion [water, surface water]: 6.4927e-5 kg; lognormal variance with pedigree 0.652, pedigree (1,1,5,5,1)
  sewer overload discharge plus direct wastewater treatment plant emission plus emission from sludge incineration. Uncertainty calculated from wastewater composition and treatment model
- Silver [soil, agricultural]: 1.4322e-6 kg; lognormal variance with pedigree 0.712, pedigree (1,1,5,5,1)
  emission from sludge spreading. Uncertainty calculated from wastewater composition and treatment model
- Carbon dioxide, fossil [air, urban air close to ground]: 0.0024702 kg; lognormal variance with pedigree 0.062, pedigree (1,1,5,5,1)
  emission from sludge incineration. Uncertainty calculated from wastewater composition and treatment model
- Lead [water, ground-, long-term]: 1.9445e-6 kg; lognormal variance with pedigree 6.922, pedigree (1,1,5,5,1)
  (same comment as for Carbon dioxide, fossil)
- Copper [soil, agricultural]: 0.00014035 kg; lognormal variance with pedigree 0.712, pedigree (1,1,5,5,1)
  (same comment as for Silver)
- TOC, Total Organic Carbon [water, surface water]: 0.00010384 kg; lognormal variance with pedigree 0.072, pedigree (1,1,5,5,1)
  (same comment as for Zinc, ion)
- Carbon [soil, agricultural]: 8.7831e-5 kg; lognormal variance with pedigree 0.112, pedigree (1,1,5,5,1)
  (same comment as for Silver)
- NMVOC, non-methane volatile organic compounds, unspecified origin [air, urban air close to ground]: 2.9962e-8 kg; lognormal variance with pedigree 0.262, pedigree (1,1,5,5,1)
  direct digester gas emission. Uncertainty calculated from wastewater composition and treatment model
- Nickel [air, urban air close to ground]: 3.1253e-12 kg; lognormal variance with pedigree 0.812, pedigree (1,1,5,5,1)
  direct digester gas emission plus emission from sludge incineration. Uncertainty calculated from wastewater composition and treatment model
- Water [air, unspecified]: 0.1 m3; name water_to_air_unspecified; lognormal variance with pedigree 0.0827, pedigree (2,2,5,5,1)
  Calculated value based on water balance.
  property fraction, origin: salt water 0; name fraction_origin_salt_water
  property fraction, origin: fresh water 0; name fraction_origin_fresh_water
  property fraction, origin: unspecified 1; name fraction_origin_unspecified
- Silver, ion [water, surface water]: 1.2971e-6 kg; lognormal variance with pedigree 0.652, pedigree (1,1,5,5,1)
  (same comment as for Zinc, ion)
- Nickel, ion [water, ground-, long-term]: 6.7798e-5 kg; lognormal variance with pedigree 0.712, pedigree (1,1,5,5,1)
  (same comment as for Carbon dioxide, fossil)
- Water [water, unspecified]: 0.9 m3; name water_to_water_unspecified; lognormal variance with pedigree 0.0827, pedigree (2,2,5,5,1)
  Calculated value based on water balance.
  property fraction, origin: salt water 0; name fraction_origin_salt_water_Ww
  property fraction, origin: unspecified 0; name fraction_origin_unspecified_Ww
  property fraction, origin: fresh water 1; name fraction_origin_fresh_water_Ww
  property wet mass 1000 kg; name WM
  property carbon content, fossil 0; name C_content_fossil
  property carbon content, non-fossil 0; name C_content_non_fossil
  property dry mass 0 kg; name DM
  property water in wet mass 1000 kg; name WWM
- Zinc, ion [water, ground-, long-term]: 1.3795e-6 kg; lognormal variance with pedigree 5.512, pedigree (1,1,5,5,1)
  (same comment as for Carbon dioxide, fossil)
- Copper, ion [water, ground-, long-term]: 0.0001799 kg; lognormal variance with pedigree 0.732, pedigree (1,1,5,5,1)
  (same comment as for Carbon dioxide, fossil)
- Cadmium, ion [water, ground-, long-term]: 1.5153e-8 kg; lognormal variance with pedigree 6.902, pedigree (1,1,5,5,1)
  (same comment as for Carbon dioxide, fossil)
- Zinc [soil, agricultural]: 5.6112e-5 kg; lognormal variance with pedigree 0.712, pedigree (1,1,5,5,1)
  (same comment as for Silver)
- Lead [air, urban air close to ground]: 1.0147e-9 kg; lognormal variance with pedigree 0.752, pedigree (1,1,5,5,1)
  (same comment as for Nickel)
- Chromium [air, urban air close to ground]: 7.8163e-12 kg; lognormal variance with pedigree 0.802, pedigree (1,1,5,5,1)
  (same comment as for Nickel)
- COD, Chemical Oxygen Demand [water, ground-, long-term]: 3.4369e-6 kg; lognormal variance with pedigree 0.122, pedigree (1,1,5,5,1)
  (same comment as for Carbon dioxide, fossil)
- Nickel, ion [water, surface water]: 0.00018197 kg; lognormal variance with pedigree 0.672, pedigree (1,1,5,5,1)
  (same comment as for Zinc, ion)
- Silver [air, urban air close to ground]: 2.9502e-11 kg; lognormal variance with pedigree 0.762, pedigree (1,1,5,5,1)
  (same comment as for Nickel)
- Copper [air, urban air close to ground]: 1.6429e-9 kg; lognormal variance with pedigree 0.762, pedigree (1,1,5,5,1)
  (same comment as for Nickel)
- Copper, ion [water, surface water]: 0.0001271 kg; lognormal variance with pedigree 0.652, pedigree (1,1,5,5,1)
  (same comment as for Zinc, ion)
- Chromium VI [water, ground-, long-term]: 1.119e-5 kg; lognormal variance with pedigree 1.092, pedigree (1,1,5,5,1)
  (same comment as for Carbon dioxide, fossil)
- Methane, fossil [air, urban air close to ground]: 6.6037e-6 kg; lognormal variance with pedigree 0.142, pedigree (1,1,5,5,1)
  (same comment as for Carbon dioxide, fossil)
- Nickel [soil, agricultural]: 4.5667e-5 kg; lognormal variance with pedigree 0.712, pedigree (1,1,5,5,1)
  (same comment as for Silver)
- Chromium, ion [water, surface water]: 3.3691e-7 kg; lognormal variance with pedigree 0.722, pedigree (1,1,5,5,1)
  (same comment as for Carbon dioxide, fossil)
- Cadmium, ion [water, surface water]: 2.5382e-6 kg; lognormal variance with pedigree 0.662, pedigree (1,1,5,5,1)
  (same comment as for Zinc, ion)
- Lead [soil, agricultural]: 1.7212e-5 kg; lognormal variance with pedigree 0.712, pedigree (1,1,5,5,1)
  (same comment as for Silver)
- Chromium [soil, agricultural]: 6.6665e-5 kg; lognormal variance with pedigree 0.712, pedigree (1,1,5,5,1)
  (same comment as for Silver)
- Lead [water, surface water]: 5.4958e-6 kg; lognormal variance with pedigree 0.612, pedigree (1,1,5,5,1)
  (same comment as for Zinc, ion)
- Zinc [air, urban air close to ground]: 1.4536e-9 kg; lognormal variance with pedigree 0.762, pedigree (1,1,5,5,1)
  (same comment as for Nickel)
- DOC, Dissolved Organic Carbon [water, ground-, long-term]: 1.36e-6 kg; lognormal variance with pedigree 0.122, pedigree (1,1,5,5,1)
  (same comment as for Carbon dioxide, fossil)
- DOC, Dissolved Organic Carbon [water, surface water]: 9.6992e-5 kg; lognormal variance with pedigree 0.082, pedigree (1,1,5,5,1)
  (same comment as for Zinc, ion)
- Silver, ion [water, ground-, long-term]: 1.4313e-6 kg; lognormal variance with pedigree 0.802, pedigree (1,1,5,5,1)
  (same comment as for Carbon dioxide, fossil)
- COD, Chemical Oxygen Demand [water, surface water]: 0.00038756 kg; lognormal variance with pedigree 0.082, pedigree (1,1,5,5,1)
  (same comment as for Zinc, ion)
- Chromium VI [water, surface water]: 0.00018107 kg; lognormal variance with pedigree 0.652, pedigree (1,1,5,5,1)
  (same comment as for Zinc, ion)
- Carbon monoxide, fossil [air, urban air close to ground]: 2.4249e-6 kg; lognormal variance with pedigree 0.172, pedigree (1,1,5,5,1)
  (same comment as for Carbon dioxide, fossil)
- TOC, Total Organic Carbon [water, ground-, long-term]: 1.36e-6 kg; lognormal variance with pedigree 0.122, pedigree (1,1,5,5,1)
  (same comment as for Carbon dioxide, fossil)
- BOD5, Biological Oxygen Demand [water, ground-, long-term]: 1.1242e-6 kg; lognormal variance with pedigree 0.122, pedigree (1,1,5,5,1)
  (same comment as for Carbon dioxide, fossil)
- Cadmium [air, urban air close to ground]: 8.4265e-11 kg; lognormal variance with pedigree 0.742, pedigree (1,1,5,5,1)
  (same comment as for Nickel)
- BOD5, Biological Oxygen Demand [water, surface water]: 9.4817e-5 kg; lognormal variance with pedigree 0.082, pedigree (1,1,5,5,1)
  (same comment as for Zinc, ion)
- Cadmium [soil, agricultural]: 9.5235e-7 kg; lognormal variance with pedigree 0.712, pedigree (1,1,5,5,1)
  (same comment as for Silver)

## Extrapolations
wastewater compositions from literature and/or estimates This dataset has been copied from an original dataset covering the geography CH. The uncertainty has been adjusted accordingly.

## Review by Niels Jungbluth 2009-01-22
passed.
