# suction, sawdust

Dataset: EcoSpold 2, unit process
Geography: RoW
Time period: 2012-01-01 to 2019-12-31
Technology level: current
Classification: ISIC rev.4 ecoinvent: 1610:Sawmilling and planing of wood
Scenario: Business-as-Usual
System model: Allocation at the point of substitution
Generated by: Frank Werner
Database: ecoinvent
isCopyrightProtected: true
accessRestrictedTo: 1

## General comment
This data represents the service of collecting sawdust, expressed per kg dry mass and transporting it to its silo via aspiration.
The process chain in a sawmill is a net of interlinked processes; the process structure depends on the individual design and technologies in place for each sawmill. The structuring of the sawmilling processes is based on the identification of the core processes in a sawmill that are attributable to several co-products (such as upstream processes like forestry and transport of logs to the sawmill) sorting, storing and the sawing of the (debarked) log. Other processes are attributable directly to one of the co-products such as the chipping of residual wood (either after sawing or as part of the profile chipping), the chipping of the bark (the "debarking") or the suction of saw dust as collection and internal transport.
The following figure illustrates the general structure of the sawmilling processes before eventual drying and planing:
The data was provided by and approved by the Swiss forest industry (Holzindustrie Schweiz HIS).

## Included activities start
The activity starts with the sawdust at the sawing machine.

## Included activities end
This activity ends with the sawdust collected at a silo at the sawmill site. The dataset does not include direct wood dust emissions nor specific infrastructure, which is taken into account as a rough estimate in the sawmilling process.

## Reference product
- saw dust, loose, wet, measured as dry mass: 0 kg; source BFS 2013; CPC 3928: Sawdust and wood waste and scrap; By-product classification allocatable product
  estimated from the production volumes of sawdust resulting from the sawing of softwood and hardwood; extrapolated to GLO values via the production of sawnwood (C) in Switzerland and globally based on FAOStat
  production volume 0 kg; name p_sawdust; = (3.7751E06+5.0154E07)/1079420*296662059
    sum of sawdust from the sawing of hardwood (3.77E06 kg/year) and softwood (5.02 E07 kg/year) in the corresponding dataset for Switzerland, extrapolated to GLO values via ratio of production of sawn timber in CH and GLO according to FAOStat.
  property price 0.034 EUR2005
    Calculated based on inputs: The price of the product has been calculated as a sum of the values of the material and energy inputs for this product. This value is therefore a rough estimation. It may underestimate the real price since there are additional expenses when producing any product. These expences can include for example labour costs, treatment of waste materials and profit for the producer. Please consider carefully whether this level of data quality is acceptable for your application.
  property carbon content 0.494
    carbon content on a dry matter basis (reserved; not for manual entry)
  properties: water content 0.7, carbon content, non-fossil 0.494, carbon content, fossil 0, water in wet mass 0.7 kg, wet mass 1.7 kg, dry mass 1 kg, carbon allocation 0.494 kg
- saw dust, wet, measured as dry mass: 1 kg; source BFS 2013; By-product classification allocatable product; CPC 3928: Sawdust and wood waste and scrap; pedigree (1,1,1,1,1)
  sawdust collected for further used
  production volume 1.42114e10 kg
    Calculated from production volume of reference product using the relative outputs.

## By-products
- saw dust, wet, measured as dry mass: 0 kg; source BFS 2013; By-product classification allocatable product; CPC 3928: Sawdust and wood waste and scrap; pedigree (1,1,1,1,1)
  sawdust collected for further used
  production volume 0 kg; = p_sawdust
    Calculated from production volume of reference product using the relative outputs.
  property price 0.101 EUR2005
    Temporary price data. Calculated as 90% of purchasers price based on: 2004 World Export prices from FaoStat http://faostat.fao.org/site/626/DesktopDefault.aspx?PageID=626#ancor downloaded 29 April 2009; calculated as export value divided by export volume. Commodity: 'wood residues'.
  property carbon content 0.494
    carbon content on a dry matter basis (reserved; not for manual entry)
  properties: dry mass 1 kg, wet mass 1.7 kg, carbon content, fossil 0, water in wet mass 0.7 kg, water content 0.7, carbon content, non-fossil 0.494, carbon allocation 0.494 kg

## Inputs from technosphere
- electricity, medium voltage: 0 kWh; source BFS 2013; pedigree (1,1,1,1,1)
  electricity used for the aspiration and transport of sawdust from the sawing processes
- electricity, medium voltage: 6.462e-5, 1.17581e-5, 0.000271411, 9.52974e-5, 0.000923735, 0.0001994, 0.00289109, 0.00041377, 0.00120714 kWh (9 entries); source BFS 2013; lognormal variance with pedigree 0.216, pedigree (5,5,5,5,5)
  electricity used for the aspiration and transport of sawdust from the sawing processes
- saw dust, loose, wet, measured as dry mass: -0.0392025 kg; source BFS 2013; lognormal variance with pedigree 0.46, pedigree (5,5,5,5,5)
  calculated by the share and basic density as the moisture content is over 30%
  production volume 9.47915e7 kg
- waste mineral oil: -1.80233e-6 kg; source Rüter, S. 2012; lognormal variance with pedigree 0.1101, pedigree (1,5,3,3,1)
  waste motor oil; the lubricating oil is used in a dissipative way
  production volume 13689.1 kg
- bark: -0.0392956 kg; source BFS 2013; lognormal variance with pedigree 0.216, pedigree (5,5,5,5,5)
  calculated by the share and basic density as the moisture content is over 30%
  production volume 8.77699e7 kg
- sawmill: 9.02856e-11 unit; source BFS 2013; lognormal variance with pedigree 0.46, pedigree (5,5,5,5,5)
  value taken from econvent 2.2
- lubricating oil: 4.41122e-5 kg; source Rüter, S. 2012; lognormal variance with pedigree 0.1101, pedigree (1,5,3,3,1)
  Lubricating oil plus motor oil
- electricity, medium voltage: 0.00240047 kWh; source BFS 2013; lognormal variance with pedigree 0.46, pedigree (5,5,5,5,5)
  data from industry, i.e. consumption of over-all electricity of the sawmill including the first sawing step, minus electricty consumed for the chipping of residual wood, the bark handling as well as for the suction of sawdust (i.e. processes that are covered in separate datasets).
- sawlog and veneer log, hardwood, measured as solid wood under bark: 0.000184738, 0.000184738 m3 (2 entries); source BFS 2013; lognormal variance with pedigree 0.46, pedigree (5,5,5,5,5)
  input of the log, from which 1 m3 of sawnwood is produced
- diesel, burned in building machine: 0.0121265 MJ; source Rüter, S. 2012; lognormal variance with pedigree 0.1027, pedigree (1,3,3,3,1)
  Diesel for internal transport
- waste mineral oil: -4.79388e-6 kg; source Rüter, S. 2012; lognormal variance with pedigree 0.1101, pedigree (1,5,3,3,1)
  waste motor oil; the lubricating oil is used in a dissipative way
  production volume 1.86242e6 kg
- sawlog and veneer log, softwood, measured as solid wood under bark: 4.04666e-6, 0.000302588 m3 (2 entries); source BFS 2013; lognormal variance with pedigree 0.46, pedigree (5,5,5,5,5)
  input of the log, from which 1 m3 of sawnwood is produced

## Sampling procedure
complementary literature and sampling from sawmills

## Extrapolations
data from Switzerland; uncertainties have been adjusted accordingly
