# lorry production, 28 metric ton

Dataset: EcoSpold 2, unit process
Geography: RER
Time period: 1998-01-01 to 2019-12-31
Technology level: current
Classification: ISIC rev.4 ecoinvent: 2910:Manufacture of motor vehicles
Classification: EcoSpold01Categories: transport systems/road
Scenario: Business-as-Usual
System model: Allocation at the point of substitution
Generated by: Michael Spielmann (obsolete)
Published in: Spielmann M. 2007
Database: ecoinvent
isCopyrightProtected: true
accessRestrictedTo: 1

## General comment
This dataset represents the production of one lorry 28 t. The disposal of lorry is included too.

## Included activities start
The dataset starts with the material used for the production of the lorry.

## Included activities end
The dataset ends with the production of one lorry 28 t. The dataset includes the material used for the production, the energy consumption of the building machines, the water consumption, the airborne emissions and until and including the emissions to water. Vehicle disposal is as well included.

## Geography
Vehicle manufacturing data are taken from one production site in Germany.

## Technology
Current production technology, environmental issues have been addressed in the past.

## Time period
Based on the material consumption of a Volvo truck (available from product declaration Volvo Truck Corporation (2004)). The figures presented for energy consumption and airborne emissions are used for all lorry (Heavy-Duty vehicle) classes regardless of vehicle weight category. Energy expenditures for stationary combustion processes are available from environmental reports of a
German lorry manufacturer MAN Nutzfahrzeuge AG (2000) and MAN Nutzfahrzeuge AG (2000). The total value used in this study comprises stamping processes, metal part and wiring harness manufacturing,
engine production and testing as well as the final assembly. Is assumed that diesel is used for engine testing and the operation of fork-lifters. The latter is
modeled as building machine. Based on the diesel consumption for engine testing, direct environmental emissions to air are calculated, employing the emission profile of a lorry 28t empty. NMVOC emission also include emissions
of solvents (7.2 kg/lorry) used in manufacturing (95% in the final assembly). About 95% of the consumed tap water and groundwater are used in the final assembly of vehicles (own calculations based on MAN Nutzfahrzeuge AG (2002)). About 45’000 m3 of the drinking water are used for the production of de-ionised water. De-ioinsed water is used for painting processes. For the production of de-ionised water both, reverse-osmosis (20%) and ion-exchanger (80%)1 are used. About 65’000 m3 of the water output are treated at the plant; 60’000 m3 are neutralised using FE(III)Cl-precipitation and the remaining 5000 m3 are treated with ultra filtration. Among the water leaving the plant, about 50,000 m3 are contaminated. In Table 5-68 the contaminations are summarised. In this study for the calculation of the resulting environmental exchanges a particular module has been generated: “treatment lorry production effluent, to wastewater treatment, class 1” (see Doka (2003)). For rail- and road transport of materials, are employed standard distances as documented in
Frischknecht & Jungbluth (2003) to account for environmental interventions due to essential transport services in the vehicle production.
References:
Volvo Truck Corporation (2004) Environmental product declaration: Volvo 8500 Low-Entry. Download of March from http://www.volvo.com/bus/global/en-gb/volvogroup/core+values/environment/downloads.htm.
MAN Nutzfahrzeuge AG (2000) Umwelterklärung 1999. MAN Nutzfahrzeuge AG, München
MAN Nutzfahrzeuge AG (2002) Umwelterklärung 2002. MAN Nutzfahrzeuge AG, München
Doka G. (2003) Life Cycle Inventories of Waste Treatment Services. Final report ecoinvent 2000 No. 13. EMPA St. Gallen, Swiss Centre for Life Cycle Inventories, Duebendorf, CH, Online-Version under: www.ecoinvent.ch.
Frischknecht R. and Jungbluth N. (2003) Code of Practice. Final report ecoinvent 2000 No. 2. ESU-services, Uster, Swiss Centre for Life Cycle Inventories, Duebendorf, CH, Online-Version under: www.ecoinvent.ch.

## Parameters
- fraction, tap water, to air: 0.15; name fraction_TW_to_air; = fraction_PW_to_air; lognormal variance with pedigree 0.092025, pedigree (4,4,3,2,4)
  Calculated value. See comment in the other parametres present in this dataset. Tap water is considered to be always used as process water, thus process water fractions to air are applied to all tap water input flows to calculate the amount of water consumed in the processes.
- fraction, process water, to air: 0.15 dimensionless; name fraction_PW_to_air; lognormal variance with pedigree 0.092025, pedigree (4,4,3,2,4)
  Literature value. In case when no industry/process specific data are available, default evaporation fraction value is used. This value is 15% and is based on literature (Statistics Canada, 2007 & Shaffer, K.H., 2008, Consumptive water use in the Great Lakes Basin, USGS & Shiklomanov, 2003, World Water Resources at the Beginning of the 21st Century) and has been approved by an expert.

## Reference product
- lorry, 28 metric ton: 1 unit; By-product classification allocatable product; CPC 49114: Motor vehicles n.e.c. for the transport of goods
  EcoSpold01Location=RER
  production volume 1.32237 unit
    This is a placeholder value that does not reflect real-world production volumes. This dataset does not currently require a real-world production volume to work in the database framework, and no actual data were collected yet. This has no negative effect on the results of the ecoinvent database. The placeholder value of this activity was scaled according to the nominal GDP of 2005 (source: United Nations, http://data.un.org/Glossary.aspx?q=GDP+%28current+US%24%29, accessed 20130726) to reflect an appropriate share of the global production volume, which is also a placeholder value.
  property price 32580 EUR2005
    The calculated value based on literature (10859 Euro) has been re-evaluated by an expert in the field and it was concluded, that the price in reality is app. 3 times higher. Calculated based on literature; 2003-2004 data are only from 2004. According to Industrial Commodity Statistics Yearbook 2005, volume 1. Physical Quantity Data. UN. New York 2008 (hard copy ). The price divided by the number of production units of two of the highest producing countries in EU27 (Spain in 2004 and Germany in 2005) in this database. US$ converted to according to http://en.wikipedia.org/wiki/Table_of_historical_exchange_rates downloaded 2 July 2009. This is average prices of all trucks in each of the two countries. NOTE that the price for an average truck is about 3 times higher in Germany than in Spain, most likely reflecting the higher production price and smaller average size of trucks.
  property true value 32580
    allocation property applied in "true value" allocation // value calculated from revenue

## By-products
- heat, for reuse in municipal waste incineration only: 0 MJ; CPC 17300: Steam and hot water; By-product classification allocatable product; pedigree (1,1,1,1,1)
  Net useful heat generated from this waste and used in internal MSWI plant energy redistribution.
  Uncertainty: uncertainty is calculated from uncertainties in waste composition and uncertainties in energy efficiency and the uncertainty in internal energy demand
  production volume 401.866 MJ
  property price 0.0106 EUR2005; name E_th_prod_MSWI_price_EUR2005
    Average European district heat price from Ecoheatcool and Euroheat 2005-2006, Ecoheat Work package 1: The European heat market. Final report. 10.6 EUR/GJ i s the price of district heat. http://www.solarthermalworld.org/files/Ecoheatcool%20WP1%20Web.pdf?download
  property exergy 0.1842 MJ; name E_th_prod_MSWI_exergy
    This exergy property is based on the exergy content of the product.
  property true value relation 0.1842; name E_th_prod_MSWI_true_value_relation
    property to calculate "true value" from
  property true value 1.98953
    allocation property applied in "true value" allocation // value calculated from true value relation
- electricity, for reuse in municipal waste incineration only: 0 kWh; CPC 17100: Electrical energy; By-product classification allocatable product; pedigree (1,1,1,1,1)
  Net electricity generated from this waste and used in internal MSWI plant energy redistribution.
  Uncertainty: uncertainty is calculated from uncertainties in waste composition and uncertainties in energy efficiency and the uncertainty in internal energy demand
  production volume 56.3758 kWh
  property exergy 3.6 MJ; name E_el_prod_MSWI_exergy
    This exergy property is based on the exergy content of the product.
  property price 0.1 EUR2005; name E_el_prod_MSWI_price_EUR2005
    Estimated to be the same price as in case of electricity, medium voltage.
  property true value relation 3.6; name E_el_prod_MSWI_true_value_relation
    property to calculate "true value" from
  property true value 5.45446
    (same comment as for heat, for reuse in municipal waste incineration only)
- zinc concentrate: 0 kg; CPC 14290: Other non-ferrous metal ores and concentrates (other than uranium or thorium ores and concentrates); By-product classification allocatable product
  Calculated value from the knowledge of the properties of both products.
  production volume 0.0119824 kg
  property price 0.38 EUR2005; name ByP_price_EUR2005
    Temporary price data. Calculated as 90% of purchasers price based on: Zinc content in concentrate 53%. Concentrate price per kg Zn 86.5% of refined Zn price (13.5% treatment charges according to CHR Metals Limited 2005: Dynamic cost curves. http://www.minecost.com/dynamic.pdf). 2004 zinc price from USGS (2007) Mineral commodity summaries 2007. <http://minerals.usgs.gov/minerals/pubs/mcs/2007/mcs2007.pdf> [Accessed 25 May 2010]
  property zinc content 0.53; name zinc_C_zinc_concentrate
    Zinc content on a dry matter basis. Value taken from teh "zinc mine operation" /GLO dataset.
  property dry mass 1 kg; name DM_zinc_concentrate
  property carbon content 0
    carbon content on a dry matter basis (reserved; not for manual entry)
  property true value 0.00342621
    allocation property applied in "true value" allocation // value calculated from revenue
  properties: wet mass 1 kg, water content 0, carbon content, non-fossil 0, carbon content, fossil 0, water in wet mass 0 kg, carbon allocation 0 kg

## Inputs from technosphere
- wastewater, average: 0 m3; source MAN Nutzfahrzeuge AG 2000; pedigree (1,1,1,1,1)
  Literature value. Data represent MAN production sites in Germany and comprises: final truck assembly, engine manufacturing, manufacturing of metal parts. Data available from environmental reports of the company.
  Additional references:
  MAN Nutzfahrzeuge AG (2002) Umwelterklärung 2002. MAN Nutzfahrzeuge AG, München
  EcoSpold01Location=CH
  production volume 0 m3
    Calculated from the production volume of lorry, 28 metric ton in proportion to the respective output amounts.
  properties: wet mass 1000 kg, carbon content, non-fossil 0.194039, dry mass 0.346837 kg, water content 2882.2
  note on carbon content, non-fossil: 0.0673 kg TOC/m3 (Tab A.17, ecoinvent v2.2 report 13_I). TOC was considered as Total Carbon.
- lead: 73.6032 kg; source Volvo Truck Corporation 2004; lognormal variance with pedigree 0.05, pedigree (1,1,5,1,1)
  EcoSpold01Location=RER
  Estimated value. Based on the material composition of a Volvo FH as available from product declaration.
  properties: wet mass 1 kg, dry mass 1 kg
- sheet rolling, steel: 681.844 kg; source Volvo Truck Corporation 2004; lognormal variance with pedigree 0.05, pedigree (1,1,5,1,1)
  Estimated value. Based on the material composition of a Volvo FH as available from product declaration.
  EcoSpold01Location=RER
- lubricating oil: 99.9771 kg; source MAN Nutzfahrzeuge AG 2000; lognormal variance with pedigree 0.16, pedigree (1,1,5,1,1)
  EcoSpold01Location=RER
  Literature value. Data represent MAN production sites in Germany and comprises: final truck assembly, engine manufacturing, manufacturing of metal parts. Data available from environmental reports of the company. For Ca(OH)2, 50% H2O is assumed.
  Additional references:
  MAN Nutzfahrzeuge AG (2002) Umwelterklärung 2002. MAN Nutzfahrzeuge AG, München
  properties: carbon content, fossil 0.75, dry mass 1 kg, wet mass 1 kg
  note on carbon content, fossil: Lubricating oil is produced from diesel. C-content/dry mass of fats and oils considered 75%, from: ecoinvent v2.2 report, n 15a, pg 40
- alkyd paint, white, without solvent, in 60% solution state: 65.2851 kg; source Volvo Truck Corporation 2004; lognormal variance with pedigree 0.08, pedigree (1,1,5,1,1)
  (same comment as for lead)
  properties: carbon content, non-fossil 0.199629, dry mass 1 kg, carbon content, fossil 0.140367, wet mass 1 kg
  note on carbon content, non-fossil: C content was calculated as an addition of C content in the raw materials.
- hydrochloric acid, without water, in 30% solution state: 0.188957 kg; source MAN Nutzfahrzeuge AG 2000; lognormal variance with pedigree 0.05, pedigree (1,1,5,1,1)
  EcoSpold01Location=RER
  Literature value. Energy expenditures for stationary combustion processes are available from environmental reports of a German lorry manufacturer MAN Nutzfahrzeuge AG (2000)andMAN Nutzfahrzeuge AG (2000). The data is available for various manufacturing sites performing different tasks in the manufacturing chain. The total value used in this study comprises stamping processes, metal part and wiring harness manufacturing, engine production and testing as well as the final assembly.
  Additional references:
  MAN Nutzfahrzeuge AG (2002) Umwelterklärung 2002. MAN Nutzfahrzeuge AG, München.
  properties: dry mass 1 kg, wet mass 1 kg
- diesel: 166.962 kg; source MAN Nutzfahrzeuge AG 2000; lognormal variance with pedigree 0.34, pedigree (1,1,5,1,1)
  Literature value. Diesel is used for engine testing and the operation of fork-lifters. The latter is modeled as building machine. Energy expenditures for stationary combustion processes are available from environmental reports of a German lorry manufacturer MAN Nutzfahrzeuge AG (2000) and MAN Nutzfahrzeuge AG (2002). The data is available for various manufacturing sites performing different tasks in the manufacturing chain. The total value used in this study comprises stamping processes, metal part and wiring harness manufacturing, engine production and testing as well as the final assembly.
  Additional references:
  MAN Nutzfahrzeuge AG (2002) Umwelterklärung 2002. MAN Nutzfahrzeuge AG, München.
  EcoSpold01Location=RER
  properties: wet mass 1 kg, dry mass 1 kg, carbon content, fossil 0.865
  note on carbon content, fossil: C-content of diesel is 86.5% (ecoinvent v2.2 report 6_IV, Tab 3.14)
- stone wool, packed: 16.2963 kg; source Volvo Truck Corporation 2004; lognormal variance with pedigree 0.05, pedigree (1,1,5,1,1)
  EcoSpold01Location=CH
  Estimated value. Based on the material composition of a Volvo FH as available from product declaration.
  properties: carbon content, fossil 0.015401, dry mass 1 kg, wet mass 1 kg
  note on carbon content, fossil: The chemical composition of the glass fibres used in the rock wool production is similar to the composition of naturally cooled volcano basalt and has a composition listed in Tab. 3.1 and 3.2 in ecoinvent v2.2 report 16, part XIV. Rock wool contains: a minimum of 96% mineral fibres,between 0.5 and 3.0 weight percent of phenolic resin depending on the specific product characteristics, and about 0.2 percent mineral oil (ecoinvent v2.2 report 16, part XIV). An average composition of 1.8% phenolic resin, 0.2% mineral oil, and 98% mineral fibres has been assumed and used to calculate C content of the rock wool
- synthetic rubber: 611.86 kg; source Volvo Truck Corporation 2004; lognormal variance with pedigree 0.08, pedigree (1,1,5,1,1)
  (same comment as for sheet rolling, steel)
  properties: wet mass 1 kg, dry mass 1 kg, carbon content, fossil 0.871949
  note on carbon content, fossil: EPDM (Ethylene-propene-diene terpolymer) rubber is a terpolymer of ethylene, propene, and a diene with the residual unsaturated portion of the diene in the side chain (ecoinvent v2.2 report 7-part XX & Ullmann). Chemical formula (deduced from Evidences of Solvent-Induced Miscibility in Polychloroprene-co-Ethylene-Propene Diene Terpolymer Blends, Dubey et al., Journal of Applied Polymer Science, 2009, 111:1884–1891): C20H35
- aluminium, cast alloy: 112.294 kg; = 0.32*351; source Volvo Truck Corporation 2004; lognormal variance with pedigree 0.16, pedigree (1,1,5,1,1)
  351 kg aluminium, production mix. Estimated value. Based on the material composition of a Volvo FH as available from product declaration.
  0.32: part of aluminium cast alloy in aluminium, production mix. Based on the aluminium, production mix in ecoinvent v2.2.
  property water in wet mass 0 kg; name WWM
  property dry mass 1 kg; name DM
  property carbon content, fossil 0; name C_content_fossil
  property carbon content, non-fossil 0; name C_content_non_fossil
  property wet mass 1 kg; name WM
  property water content 0; name water_content
- reinforcing steel: 3969.09 kg; source Volvo Truck Corporation 2004; lognormal variance with pedigree 0.05, pedigree (1,1,5,1,1)
  Estimated value. Based on the material composition of a Volvo FH as available from product declaration. .
  EcoSpold01Location=RER
  properties: wet mass 1 kg, dry mass 1 kg, carbon content, fossil 0.004
- electricity, medium voltage: 4738.92 kWh; source MAN Nutzfahrzeuge AG 2000; lognormal variance with pedigree 0.05, pedigree (1,1,5,1,1)
  Literature value. Energy expenditures for stationary combustion processes are available from environmental reports of a German lorry manufacturer MAN Nutzfahrzeuge AG (2000)andMAN Nutzfahrzeuge AG (2000). The data is available for various manufacturing sites performing different tasks in the manufacturing chain. The total value used in this study comprises stamping processes, metal part and wiring harness manufacturing, engine production and testing as well as the final assembly.
  Additional references:
  MAN Nutzfahrzeuge AG (2002) Umwelterklärung 2002. MAN Nutzfahrzeuge AG, München.
  EcoSpold01Location=UCTE
- aluminium, wrought alloy: 238.625 kg; = 0.68*351; source Volvo Truck Corporation 2004; lognormal variance with pedigree 0.16, pedigree (1,1,5,1,1)
  351 kg aluminium, production mix. Estimated value. Based on the material composition of a Volvo FH as available from product declaration.
  0.68: part of aluminium, wrought alloy in aluminium, production mix. Based on the aluminium, production mix in ecoinvent v2.2.
  properties: dry mass 1 kg, wet mass 1 kg
- steel, chromium steel 18/8, hot rolled: 8.15814 kg; source Volvo Truck Corporation 2004; lognormal variance with pedigree 0.16, pedigree (1,1,5,1,1)
  (same comment as for lead)
  properties: wet mass 1 kg, dry mass 1 kg, carbon content, fossil 0.0008
  note on carbon content, fossil: Stainless steel model is the grade 304 steel (18/8 stainless, 18% chromium 8% nickel; max. 0.08% C)
- diesel, burned in building machine: 20.0954 MJ; source MAN Nutzfahrzeuge AG 2000; lognormal variance with pedigree 0.34, pedigree (1,1,5,1,1)
  EcoSpold01Location=GLO
  Literature value. Diesel is used for engine testing and the operation of fork-lifters. The latter is modeled as building machine. Energy expenditures for stationary combustion processes are available from environmental reports of a German lorry manufacturer MAN Nutzfahrzeuge AG (2000) and MAN Nutzfahrzeuge AG (2002). The data is available for various manufacturing sites performing different tasks in the manufacturing chain. The total value used in this study comprises stamping processes, metal part and wiring harness manufacturing, engine production and testing as well as the final assembly.
  Additional references:
  MAN Nutzfahrzeuge AG (2002) Umwelterklärung 2002. MAN Nutzfahrzeuge AG, München.
- acetic acid, without water, in 98% solution state: 0.0659849 kg; source MAN Nutzfahrzeuge AG 2000; lognormal variance with pedigree 0.05, pedigree (1,1,5,1,1)
  EcoSpold01Location=RER
  Literature value. Data represent MAN production sites in Germany and comprises: final truck assembly, engine manufacturing, manufacturing of metal parts. Data available from environmental reports of the company.
  Additional references:
  MAN Nutzfahrzeuge AG (2002) Umwelterklärung 2002. MAN Nutzfahrzeuge AG, München
  properties: carbon content, fossil 0.400016, dry mass 1 kg, wet mass 1 kg
- heat, district or industrial, other than natural gas: 860.503 MJ; source MAN Nutzfahrzeuge AG 2000; lognormal variance with pedigree 0.05, pedigree (1,1,5,1,1)
  (same comment as for hydrochloric acid, without water, in 30% solution state)
- wire drawing, copper: 48.9888 kg; source Volvo Truck Corporation 2004; lognormal variance with pedigree 0.16, pedigree (1,1,5,1,1)
  (same comment as for sheet rolling, steel)
- flat glass, uncoated: 73.3832 kg; source Volvo Truck Corporation 2004; lognormal variance with pedigree 0.08, pedigree (1,1,5,1,1)
  (same comment as for lead)
  properties: dry mass 1 kg, wet mass 1 kg
- road vehicle factory: 8.728e-7 unit; source Volvo Truck Corporation 2004; lognormal variance with pedigree 0.34, pedigree (1,1,5,1,1)
  (same comment as for lead)
- used lorry, 28 metric ton: -0.999771 unit; lognormal variance with pedigree 0.342025, pedigree (3,1,5,2,1)
  Uncertainty: own calculations
  production volume 1.32237 unit; = Ref('035ba60d-178f-49e4-a43e-cb478629b001', 'ProductionVolume') * ((Ref('3d74dd9a-342b-4af5-866d-4c16cecb5b69')*-1) / Ref('035ba60d-178f-49e4-a43e-cb478629b001'))
    Calculated from production volume of reference product using the relative outputs.
  properties: wet mass 10200 kg, dry mass 10200 kg, carbon content, non-fossil 0.00122856, carbon content, fossil 0.113682
- lime, hydrated, packed: 0.309929 kg; source MAN Nutzfahrzeuge AG 2000; lognormal variance with pedigree 0.2106, pedigree (5,5,5,5,5)
  Literature value. Data represent MAN production sites in Germany and comprises: final truck assembly, engine manufacturing, manufacturing of metal parts. Data available from environmental reports of the company. For Ca(OH)2, 50% H2O is assumed.
  Additional references:
  MAN Nutzfahrzeuge AG (2002) Umwelterklärung 2002. MAN Nutzfahrzeuge AG, München
  EcoSpold01Location=CH
  Uncertainty: 2, 50% H2O is assumed.
  properties: wet mass 1 kg, dry mass 0.997 kg, water content 0.00300903
- steel, low-alloyed, hot rolled: 19.8955 kg; source Volvo Truck Corporation 2004; lognormal variance with pedigree 1.37, pedigree (1,1,5,1,1)
  (same comment as for lead)
  properties: carbon content, fossil 0.005, wet mass 1 kg, dry mass 1 kg
  note on carbon content, fossil: Low alloyed steel composition given in Tab. 3.2 ecoinvent v2.2 report 10_partII. Steel assumed to have a C content of 0.5%
- wastewater from lorry production: -2.1795 m3; name wastewater_output; source MAN Nutzfahrzeuge AG 2000; lognormal variance with pedigree 0.05, pedigree (1,1,5,1,1)
  (same comment as for wastewater, average)
  production volume 2.18 m3
    (same comment as for wastewater, average)
  property price 0 EUR2005; name wastewater_output_price_EUR2005
  properties: wet mass 1000 kg, water content 2962.17, dry mass 0.337476 kg
- section bar rolling, steel: 2939.33 kg; source Volvo Truck Corporation 2004; lognormal variance with pedigree 0.08, pedigree (1,1,5,1,1)
  (same comment as for lead)
- pitch: 0 kg; source Volvo Truck Corporation 2004; pedigree (1,1,1,1,1)
  (same comment as for sheet rolling, steel)
  properties: carbon content, fossil 0.83, wet mass 1 kg, dry mass 1 kg
- tap water: 16396.3 kg; name tap_water_input; source MAN Nutzfahrzeuge AG 2002; lognormal variance with pedigree 0.05, pedigree (1,1,5,1,1)
  EcoSpold01Location=RER
  Calculated value. About 95% of the consumed tap water and groundwater are used in the final assembly of vehicles (own calculations based on MAN Nutzfahrzeuge AG (2002)).
  properties: carbon content, fossil 0.00178991, wet mass 1 kg, dry mass 0.000337476 kg, water content 2962.17
  note on carbon content, fossil: Bicarbonate content is 2.93 mol/m3. CO2 content is 0.1 mol/m3 (ecoinvent v2.2 report 8, Tab 93.1).
- sodium hydroxide, without water, in 50% solution state: 0.380913 kg; source MAN Nutzfahrzeuge AG 2000; lognormal variance with pedigree 0.05, pedigree (1,1,5,1,1)
  (same comment as for acetic acid, without water, in 98% solution state)
  properties: wet mass 1 kg, dry mass 1 kg
- pig iron: 2939.33 kg; source Volvo Truck Corporation 2004; lognormal variance with pedigree 0.08, pedigree (1,1,5,1,1)
  Estimated value. Based on the material composition of a Volvo FH as available from product declaration.
  EcoSpold01Location=GLO
  properties: wet mass 1 kg, carbon content, fossil 0.045, dry mass 1 kg
  note on carbon content, fossil: Pig iron is the iron produced in the blast furnace. It is an alloy of 94% Fe and more than 2% C (world average 4.5%). (ecoinvent v2.2 report 10_partII)
- nitric acid, without water, in 50% solution state: 0.0984775 kg; source MAN Nutzfahrzeuge AG 2000; lognormal variance with pedigree 0.05, pedigree (1,1,5,1,1)
  Literature value. Data represent MAN production sites in Germany and comprises: final truck assembly, engine manufacturing, manufacturing of metal parts. Data available from environmental reports of the company. For Ca(OH)2, 50% H2O is assumed.
  Additional references:
  MAN Nutzfahrzeuge AG (2002) Umwelterklärung 2002. MAN Nutzfahrzeuge AG, München
  EcoSpold01Location=RER
  properties: dry mass 1 kg, wet mass 1 kg
- brass: 32.5925 kg; source Volvo Truck Corporation 2004; lognormal variance with pedigree 0.16, pedigree (1,1,5,1,1)
  Estimated value. Based on the material composition of a Volvo FH as available from product declaration.
  EcoSpold01Location=CH
  properties: wet mass 1 kg, dry mass 1 kg
- polyethylene, high density, granulate: 374.914 kg; source Volvo Truck Corporation 2004; lognormal variance with pedigree 0.16, pedigree (1,1,5,1,1)
  (same comment as for lead)
  properties: carbon content, fossil 0.857143, wet mass 1 kg, dry mass 1 kg
  note on carbon content, fossil: Polyethylene is formed out of a huge amount of ethylene monomers (C2H4) (ecoinvent v2.2 report 11_II). MW=28 g/mol
- copper: 48.9888 kg; source Volvo Truck Corporation 2004; lognormal variance with pedigree 0.16, pedigree (1,1,5,1,1)
  (same comment as for sheet rolling, steel)
  properties: wet mass 1 kg, dry mass 1 kg
- heat, district or industrial, natural gas: 32292.6 MJ; source MAN Nutzfahrzeuge AG 2000; lognormal variance with pedigree 0.05, pedigree (1,1,5,1,1)
  Literature value. Energy expenditures for stationary combustion processes are available from environmental reports of a German lorry manufacturer MAN Nutzfahrzeuge AG (2000)andMAN Nutzfahrzeuge AG (2000). The data is available for various manufacturing sites performing different tasks in the manufacturing chain. The total value used in this study comprises stamping processes, metal part and wiring harness manufacturing, engine production and testing as well as the final assembly.
  Additional references:
  MAN Nutzfahrzeuge AG (2002) Umwelterklärung 2002. MAN Nutzfahrzeuge AG, München.
  EcoSpold01Location=RER
- sulfuric acid: 27.8936 kg; source Volvo Truck Corporation 2004; lognormal variance with pedigree 0.05, pedigree (1,1,5,1,1)
  (same comment as for sheet rolling, steel)
  properties: wet mass 1 kg, dry mass 1 kg
- electronics, for control units: 48.9888 kg; source Volvo Truck Corporation 2004; lognormal variance with pedigree 0.05, pedigree (1,1,5,1,1)
  (same comment as for lead)
  properties: carbon content, fossil 0.337146, carbon content, non-fossil 0.00013442, dry mass 1 kg, wet mass 1 kg
  note on carbon content, fossil: The control unit has a composition of 46% steel (housing), 32% plastics, 14% printed wiring boards and 8% cables (various types).;
- propylene glycol, liquid: 35.8918 kg; source Volvo Truck Corporation 2004; lognormal variance with pedigree 0.05, pedigree (1,1,5,1,1)
  (same comment as for sheet rolling, steel)
  properties: carbon content, fossil 0.473684, dry mass 1 kg, wet mass 1 kg
- cast iron: 1799.59 kg; source Volvo Truck Corporation 2004; lognormal variance with pedigree 0.08, pedigree (1,1,5,1,1)
  (same comment as for sheet rolling, steel)
  properties: carbon content, fossil 0.04, wet mass 1 kg, dry mass 1 kg
  note on carbon content, fossil: Cast iron is made by remelting pig iron in small furnaces (e.g. cupola furnaces or electric arc furnaces) and poured into moulds to make castings. It usually contains 2% to 6% carbon (ecoinvent v2.2 report 10_partII). An average content of 4% was considered
- wastewater, average: -14.3446, -1.55181 m3 (2 entries); source MAN Nutzfahrzeuge AG 2000; lognormal variance with pedigree 0.05, pedigree (1,1,5,1,1)
  (same comment as for wastewater, average)
  production volume 15.9 m3
- pitch: 16.1898, 0.106447 kg (2 entries); source Volvo Truck Corporation 2004; lognormal variance with pedigree 0.05, pedigree (1,1,5,1,1)
  (same comment as for sheet rolling, steel)

## Inputs from nature
- Water, well, in ground [natural resource, in water]: 69.4841 m3; name water_well_in_ground_input; source MAN Nutzfahrzeuge AG 2002; lognormal variance with pedigree 0.05, pedigree (1,1,5,1,1)
  Calculated value. About 95% of the consumed tap water and groundwater are used in the final assembly of vehicles (own calculations based on MAN Nutzfahrzeuge AG (2002)).

## Emissions to nature
- TOC, Total Organic Carbon [water, unspecified]: 0.0550874 kg; source Frischknecht R. 2003; lognormal variance with pedigree 0.16, pedigree (1,1,5,1,1)
  Calculated value according to ecoinvent quality guidelines Frischknecht et al. (2003)
- Nitrogen oxides [air, unspecified]: 5.99863 kg; source MAN Nutzfahrzeuge AG 2000; lognormal variance with pedigree 0.16, pedigree (1,1,5,1,1)
  Calculated value. Based on the diesel consumption for engine testing, direct environmental emissions to air are calculated, employing the emission profile of a lorry 28t empty. Is assumed that diesel is used for engine testing and the operation of fork-lifters. The latter is modeled as building machine.Energy expenditures for stationary combustion processes are available from environmental reports of a German lorry manufacturer MAN Nutzfahrzeuge AG (2000) and MAN Nutzfahrzeuge AG (2002).
  Additional references:
  MAN Nutzfahrzeuge AG (2002) Umwelterklärung 2002. MAN Nutzfahrzeuge AG, München.
- Zinc [air, unspecified]: 0.00017296 kg; source MAN Nutzfahrzeuge AG 2000; lognormal variance with pedigree 0.69, pedigree (1,1,5,1,1)
  (same comment as for Nitrogen oxides)
- Cadmium [air, unspecified]: 1.7296e-6 kg; source MAN Nutzfahrzeuge AG 2000; lognormal variance with pedigree 0.69, pedigree (1,1,5,1,1)
  (same comment as for Nitrogen oxides)
- Ammonia [air, unspecified]: 0.0222949 kg; source MAN Nutzfahrzeuge AG 2000; lognormal variance with pedigree 0.16, pedigree (1,1,5,1,1)
  (same comment as for Nitrogen oxides)
- Water [water, unspecified]: 54.9224 m3; name water_to_water_unspecified; = (tap_water_input/1000)*(1-fraction_TW_to_air)+water_well_in_ground_input*(1-fraction_PW_to_air)-2.18-15.9; lognormal variance with pedigree 0.0807, pedigree (2,2,5,1,1)
  Calculated value based on literature values and expert opinion. See comments in the parametres' comment field.
  property fraction, origin: salt water 0; name fraction_origin_salt_water_Ww
  property fraction, origin: fresh water 1; name fraction_origin_fresh_water_Ww
  property fraction, origin: unspecified 0; name fraction_origin_unspecified_Ww
- Mercury [air, unspecified]: 3.44921e-9 kg; source MAN Nutzfahrzeuge AG 2000; lognormal variance with pedigree 0.69, pedigree (1,1,5,1,1)
  (same comment as for Nitrogen oxides)
- Water [air, unspecified]: 12.8821 m3; name water_to_air_unspecified; = (tap_water_input/1000*fraction_TW_to_air)+(water_well_in_ground_input*fraction_PW_to_air); lognormal variance with pedigree 0.0807, pedigree (2,2,5,1,1)
  (same comment as for Water)
  property fraction, origin: unspecified 0; name fraction_origin_unspecified
  property fraction, origin: fresh water 1; name fraction_origin_fresh_water
  property fraction, origin: salt water 0; name fraction_origin_salt_water
- Toluene [air, unspecified]: 0.00550874 kg; source MAN Nutzfahrzeuge AG 2000; lognormal variance with pedigree 0.16, pedigree (1,1,5,1,1)
  (same comment as for Nitrogen oxides)
- Particulates, < 2.5 um [air, unspecified]: 0.253942 kg; source MAN Nutzfahrzeuge AG 2000; lognormal variance with pedigree 0.16, pedigree (1,1,5,1,1)
  (same comment as for Nitrogen oxides)
- COD, Chemical Oxygen Demand [water, unspecified]: 0.125971 kg; source MAN Nutzfahrzeuge AG 2002; lognormal variance with pedigree 0.16, pedigree (1,1,5,1,1)
  Literature value. For automotive stamping, a Chemical Oxygen Demand (COD) is reported MAN Nutzfahrzeuge AG (2002) with 12800 kg/year resulting in a specific COD of 0.126 kg/vehicle.
- BOD5, Biological Oxygen Demand [water, unspecified]: 0.125971 kg; source Frischknecht R. 2003; lognormal variance with pedigree 0.16, pedigree (1,1,5,1,1)
  Calculated value according to ecoinvent quality guidelines Frischknecht et al. (2003).
- Sulfur dioxide [air, unspecified]: 0.119973 kg; source MAN Nutzfahrzeuge AG 2000; lognormal variance with pedigree 0.16, pedigree (1,1,5,1,1)
  (same comment as for Nitrogen oxides)
- Chromium [air, unspecified]: 0.000292933 kg; source MAN Nutzfahrzeuge AG 2000; lognormal variance with pedigree 0.69, pedigree (1,1,5,1,1)
  (same comment as for Nitrogen oxides)
- NMVOC, non-methane volatile organic compounds, unspecified origin [air, unspecified]: 7.8682 kg; source MAN Nutzfahrzeuge AG 2000; lognormal variance with pedigree 0.16, pedigree (1,1,5,1,1)
  (same comment as for Nitrogen oxides)
- Carbon monoxide, fossil [air, unspecified]: 0.972778 kg; source MAN Nutzfahrzeuge AG 2000; lognormal variance with pedigree 0.16, pedigree (1,1,5,1,1)
  (same comment as for Nitrogen oxides)
- Methane, fossil [air, unspecified]: 0.0164962 kg; source MAN Nutzfahrzeuge AG 2000; lognormal variance with pedigree 0.16, pedigree (1,1,5,1,1)
  (same comment as for Nitrogen oxides)
- Xylene [air, unspecified]: 0.00550874 kg; source MAN Nutzfahrzeuge AG 2000; lognormal variance with pedigree 0.16, pedigree (1,1,5,1,1)
  (same comment as for Nitrogen oxides)
- Lead [air, unspecified]: 1.89957e-8 kg; source MAN Nutzfahrzeuge AG 2000; lognormal variance with pedigree 0.69, pedigree (1,1,5,1,1)
  (same comment as for Nitrogen oxides)
- Selenium [air, unspecified]: 1.7296e-6 kg; source MAN Nutzfahrzeuge AG 2000; lognormal variance with pedigree 0.69, pedigree (1,1,5,1,1)
  (same comment as for Nitrogen oxides)
- Benzene [air, unspecified]: 0.013097 kg; source MAN Nutzfahrzeuge AG 2000; lognormal variance with pedigree 0.16, pedigree (1,1,5,1,1)
  (same comment as for Nitrogen oxides)
- Nickel [air, unspecified]: 1.20972e-5 kg; source MAN Nutzfahrzeuge AG 2000; lognormal variance with pedigree 0.69, pedigree (1,1,5,1,1)
  (same comment as for Nitrogen oxides)
- Particulates, > 2.5 um, and < 10um [air, unspecified]: 0.0211952 kg; source MAN Nutzfahrzeuge AG 2000; lognormal variance with pedigree 0.16, pedigree (1,1,5,1,1)
  (same comment as for Nitrogen oxides)
- Dinitrogen monoxide [air, unspecified]: 0.0222949 kg; source MAN Nutzfahrzeuge AG 2000; lognormal variance with pedigree 0.16, pedigree (1,1,5,1,1)
  (same comment as for Nitrogen oxides)
- Particulates, > 10 um [air, unspecified]: 0.0108975 kg; source MAN Nutzfahrzeuge AG 2000; lognormal variance with pedigree 0.16, pedigree (1,1,5,1,1)
  (same comment as for Nitrogen oxides)
- Carbon dioxide, fossil [air, unspecified]: 632.855 kg; source MAN Nutzfahrzeuge AG 2000; lognormal variance with pedigree 0.16, pedigree (1,1,5,1,1)
  (same comment as for Nitrogen oxides)
- Copper [air, unspecified]: 0.000292933 kg; source MAN Nutzfahrzeuge AG 2000; lognormal variance with pedigree 0.69, pedigree (1,1,5,1,1)
  (same comment as for Nitrogen oxides)
- DOC, Dissolved Organic Carbon [water, unspecified]: 0.0550874 kg; source Frischknecht R. 2003; lognormal variance with pedigree 0.16, pedigree (1,1,5,1,1)
  Calculated value according to ecoinvent quality guidelines Frischknecht et al. (2003).

## Sampling procedure
Manufacturing data is taken from an environmental report of one production site. Additional data was generated via oral communcation.

## Extrapolations
Data from one production site in Germany is used as an first estimate for Europe

## Review by Emilia Moreno Ruiz 2012-02-15
trainee DS, OK, from Liliane Klemann

## Review by Niels Jungbluth 2006-09-27
passed.

## Review by Carl Vadenbo 2012-06-28
In preparation for the release of ecoinvent v3.0, the output of 'used lorry, 28 metric ton' was removed from the various 'transport, lorry, 28t' datasets and added to 'lorry, 28t, RER' in ecoinvent v2.2 and renamed to 'lorry production, 28 metric ton, GLO 2002'. The added exchange of by-product/waste was reviewed and the new dataset was accepted for inclusion into the ecoinvent database on 2012.07.05. The uncertainty information has only been adjusted for geographical representativeness in GLO, and consequently needs to be revised before subsequent releases of the database.
