# copper production, solvent-extraction electro-winning

Dataset: EcoSpold 2, unit process
Geography: GLO
Time period: 1994-01-01 to 2019-12-31
Technology level: current
Classification: ISIC rev.4 ecoinvent: 2420:Manufacture of basic precious and other non-ferrous metals
Tags: ConvertedDataset
Scenario: Business-as-Usual
System model: Allocation at the point of substitution
Share of production covered: 100 %
Generated by: [System]
Published in: Althaus H.-J. 2000
Database: ecoinvent
isCopyrightProtected: true
accessRestrictedTo: 1

## Included activities start
Mining process, starting from copper ore, in ground.

## Included activities end
This dataset ends with the refining of copper.

The dataset includes the grounding of the ore, the gravity concentration of the ore, the pretreatment of the ore prior to hydrometallurgy, the dump leaching step for copper recovery, the solution cleaning step, and the separation step. Also included are the disposal of overburden & tailings, and the Production infrastructure used directly for mining.

## Geography
This module is valid for an average world-wide process.

## Technology
Oxide ores and supergene sulphide ores (i.e. ores not containing iron) can be recovered most easily by hydro-metallurgical techniques, such as SX-EW. The general steps of mining and refining are identical to those of copper mine operation and primary copper production, respectively. The difference lies in that the beneficiation and smelting stages are by-passed and substituted with a leaching stage followed by cementation or electro-winning.

## Parameters
- fraction, process water, to air: 0.15 dimensionless; name fraction_PW_to_air; lognormal variance with pedigree 0.092025, pedigree (4,4,3,2,4)
  Literature value. In case when no industry/process specific data are available, default evaporation fraction value is used. This value is 15% and is based on literature (Statistics Canada, 2007 & Shaffer, K.H., 2008, Consumptive water use in the Great Lakes Basin, USGS & Shiklomanov, 2003, World Water Resources at the Beginning of the 21st Century) and has been approved by an expert.

## Reference product
- copper: 0 kg; name RP_amount; source Krauss U. 1999; By-product classification allocatable product; CPC 41413: Refined copper and copper alloys, unwrought; master alloys of copper
  Before end-use copper is manufactured into semi fabricated products, such as shapes and ingots (known as “semis”). These manufacturing processes are subdivided into hot working, cold working and, if necessary, process annealing.
  Few of the semis are ready for use as such. They more typically travel to first-stage manufacturers, who make metal rods, wire, and casting, and then to component manufacturers who produce such things as motors, valves, and insulated cables
  The components in turn are incorporated by final-stage manufacturers into a variety of finished products - automobiles, commercial buildings, residential housing, and so forth. These uses account for about 79% of the world-wide consumption of copper.
  Literature value.
  production volume 4.03e9 kg; name RP_PV
    Source: USGS Minerals Yearbook 2015. Available from: https://www.usgs.gov/centers/nmic/copper-statistics-and-information (downloaded 12 July 2019), Table 22 (grand total, primary, electrowon).
  property price 5.52 EUR2005; name RP_amount_price_EUR2005
    Literature value (http://www.economist.com/news/business/21576714-mining-industry-has-enriched-chile-its-future-precarious-copper-solution). Average price between 20015 and 2013.
  property carbon content 0
    carbon content on a dry matter basis (reserved; not for manual entry)
  property true value 5.52; name RP_amount_true_value
    allocation property applied in "true value" allocation // value calculated from revenue
  properties: carbon content, fossil 0, water in wet mass 0 kg, carbon content, non-fossil 0, dry mass 1 kg, wet mass 1 kg, water content 0, carbon allocation 0 kg
- sulfuric acid: 1 kg; name sulfuric_acid; CPC 34231: Chemical elements n.e.c.; inorganic acids except phosphoric, nitric and sulphonitric; inorganic oxygen compoun[…]; By-product classification allocatable product; pedigree (1,1,1,1,1)
  production volume 6.851e9 kg; = RP_PV * sulfuric_acid / abs(RP_amount)
    Calculated from production volume of reference product using the relative outputs.
  property price 0.031 EUR2005
    Temporary price data. Calculated as 90% of purchasers price based on: 2004 Import/Export data (total trades (USD) divided by total weight (kg) in EU27, USA, China, Japan and India) from UN Commodity Trade Statistics Database (http://data.un.org/Explorer.aspxDatabase [Accessed 2 July 2010]). Commodity: 'Sulphuric acid, oleum'
  property carbon content 0
    carbon content on a dry matter basis (reserved; not for manual entry)
  property true value 0.0527; name sulfuric_acid_true_value
    allocation property applied in "true value" allocation // value calculated from revenue
  properties: water in wet mass 0 kg, wet mass 1 kg, carbon content, non-fossil 0, carbon content, fossil 0, water content 0, dry mass 1 kg, carbon allocation 0 kg

## Inputs from technosphere
- blasting: 0.0015409 kg; source Krauss U. 1999; lognormal variance with pedigree 0.0587, pedigree (2,2,5,1,3)
  Proxy: Data corresponds to 'copper mine operation' process.
- electricity, high voltage: 0.00639726 kWh; source Krauss U. 1999; lognormal variance with pedigree 0.0408, pedigree (2,2,5,3,1)
  Literature value.
- conveyor belt: 1.16819e-7 m; source Classen M. 2008; lognormal variance with pedigree 0.1282, pedigree (4,2,5,3,4)
  Estimated value: Crushing and grinding operations of the material have been estimated with additional energy and mechanical wear (milling equipment) as compared to the conventional copper mine operation dataset.
  Proxy: Base data corresponds to 'copper mine operation' process.
- ammonia, liquid: 0 kg; source Hilbrans H. 1999; pedigree (1,1,1,1,1)
  Proxy: 'ammonia, liquid' is used as a proxy for leaching agents.
  Estimation from dataset author.
  properties: wet mass 1 kg, dry mass 1 kg
- steel, chromium steel 18/8, hot rolled: 0.0010625 kg; source Classen M. 2008; lognormal variance with pedigree 0.0888, pedigree (4,2,5,3,4)
  (same comment as for conveyor belt)
  properties: carbon content, fossil 0.0008, dry mass 1 kg, wet mass 1 kg
  note on carbon content, fossil: Stainless steel model is the grade 304 steel (18/8 stainless, 18% chromium 8% nickel; max. 0.08% C)
- electricity, medium voltage: 0.0126833 kWh; source Krauss U. 1999; lognormal variance with pedigree 0.1282, pedigree (4,2,5,3,4)
  Estimated value: Non mining step electricity consumption was estimated to be 40% from grid and 60% from hydropower.
  Estimated value: Crushing and grinding operations of the material have been estimated with additional energy and mechanical wear (milling equipment) as compared to the conventional copper mine operation dataset.
  Proxy: Base mining data corresponds to 'copper mine operation' process.
- mine infrastructure, open cast, non-ferrous metal: 7.67671e-11 unit; source Classen M. 2008; lognormal variance with pedigree 0.3601, pedigree (3,2,5,1,3)
  (same comment as for conveyor belt)
- diesel, burned in building machine: 0.0462271 MJ; source Krauss U. 1999; lognormal variance with pedigree 0.0587, pedigree (2,2,5,1,3)
  Proxy: Data corresponds to 'copper mine operation' process.
- sulfidic tailings, from copper mine operation: 0 kg; name sulfidic_tailings_amount; source Krauss U. 1999; pedigree (1,1,1,1,1)
  Proxy: Data corresponds to 'copper mine operation' process.
  production volume 0 kg
    Calculated from the production volume of copper in proportion to the respective output amounts.
  properties: water content 0.428571, aluminium content 0.015758, calcium content 0.0045119, silicon content 0.055278, potassium content 0.0026178, sodium content 0.0015148, wet mass 1 kg, dry mass 0.7 kg, oxygen content 0.88899, iron content 0.014771, carbon content, fossil 0.0087785, magnesium content 0.0022944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
- chemical factory, organics: 2.22513e-12 unit; lognormal variance with pedigree 0.3601, pedigree (3,2,5,1,3)
  Proxy: 'chemical factory, organics' is used as a proxy for leaching infrastructure.
  Estimation from dataset author.
- electricity, high voltage: 0.0286486 kWh; source Krauss U. 1999; lognormal variance with pedigree 0.1282, pedigree (4,2,5,3,4)
  (same comment as for electricity, medium voltage)
- ammonia, liquid: 9.69396e-7, 8.48742e-6 kg (2 entries); source Hilbrans H. 1999; lognormal variance with pedigree 0.0408, pedigree (2,2,5,3,1)
  (same comment as for ammonia, liquid)
- sulfidic tailings, from copper mine operation: -0.341291, -0.332377, -0.0951286, -0.189748, -0.142629, -0.813751, -0.117032, -0.161731, -0.11232, -0.148997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 kg (11 entries); source Krauss U. 1999; lognormal variance with pedigree 0.0407, pedigree (2,2,5,1,1)
  Proxy: Data corresponds to 'copper mine operation' process.
  production volume 2.23262e12 kg

## Inputs from nature
- Transformation, to mineral extraction site [natural resource, land]: 2.68129e-6 m2; source Martens P. N. 2002; lognormal variance with pedigree 0.1801, pedigree (3,2,5,1,3)
  Literature value
- Copper, in ground [natural resource, in ground]: 0.00795485 kg; source Krauss U. 1999; lognormal variance with pedigree 0.0407, pedigree (2,2,5,1,1)
  0.99% Cu in sulfide; 0.36% Cu and 82 ppm Mo in ore; Literature value
- Transformation, from unspecified [natural resource, land]: 2.68129e-6 m2; source Martens P. N. 2002; lognormal variance with pedigree 0.1801, pedigree (3,2,5,1,3)
  Literature value
- Water, river [natural resource, in water]: 0.000945682 m3; name water_river_input; source Krauss U. 1999; lognormal variance with pedigree 0.0407, pedigree (2,2,5,1,1)
  Literature value.
- Occupation, mineral extraction site [natural resource, land]: 8.06611e-5 m2*year; source Martens P. N. 2002; lognormal variance with pedigree 0.1001, pedigree (3,2,5,1,3)
  Literature value.

## Emissions to nature
- Water [air, unspecified]: 0.000141852 m3; name water_to_air_unspecified; = (water_river_input*fraction_PW_to_air); lognormal variance with pedigree 0.0807, pedigree (2,2,5,1,1)
  Calculated value based on literature values and expert opinion. See comments in the parametres' comment field.
  property fraction, origin: unspecified 0; name fraction_origin_unspecified
  property fraction, origin: fresh water 1; name fraction_origin_fresh_water
  property fraction, origin: salt water 0; name fraction_origin_salt_water
- Water [water, unspecified]: 0.000803829 m3; name water_to_water_unspecified; = water_river_input*(1-fraction_PW_to_air); lognormal variance with pedigree 0.0807, pedigree (2,2,5,1,1)
  (same comment as for Water)
  property wet mass 1000 kg; name WM
  property carbon content, non-fossil 0; name C_content_non_fossil
  property water in wet mass 1000 kg; name WWM
  property fraction, origin: unspecified 0; name fraction_origin_unspecified_Ww
  property fraction, origin: fresh water 1; name fraction_origin_fresh_water_Ww
  property carbon content, fossil 0; name C_content_fossil
  property fraction, origin: salt water 0; name fraction_origin_salt_water_Ww
  property dry mass 0 kg; name DM

## Sampling procedure
literature
