# acrylic acid production

Dataset: EcoSpold 2, unit process
Geography: RER
Time period: 2000-01-01 to 2020-12-31
Technology level: current
Classification: ISIC rev.4 ecoinvent: 2011:Manufacture of basic chemicals
Synonyms: Propenoic acid; 79-10-7; Propene acid; 2-Propenoic acid; Acroleic acid
Scenario: Business-as-Usual
System model: Allocation at the point of substitution
Generated by: Roland Hischier
Published in: Althaus H.-J. 2007
Database: ecoinvent
isCopyrightProtected: true
accessRestrictedTo: 1

## General comment
This dataset represents the production of 1 kg of liquid acrylic acid. Acrylic acid is a colourless, slightly water soluble liquid with an acrid odour. It belongs to the carboxylic acids. The acid may be transported stabilised with inhibitors (such as hydroquinone derivatives) to prevent polymerisation. Functionally, acrylic acid may be regarded as a derivative of ethylene in which one hydrogen atom has been replaced with a carboxyl group, although this is not the basis of its synthesis. The chemical and physical properties of the polymers can be modified through controlled variation in the selection and balance of the monomers, the extent of cross-linking and molecular mass. This flexibility is complemented by high resistance to chemical and environmental degradation, strength, clarity, and being readily available in high purity forms (Ohara et al. 2011).
Acrylic acid is a versatile chemical that can be esterified, aminated or otherwise modified and polymerised to complex molecular arrangements to suit requirements. This characteristic enables a broad range of reactions for providing performance characteristics to a range of polymers. The esters are produced by reacting acrylic acid with alcohols especially ethanol, methanol and butanol that may be saponified, converted to other esters or amides by aminolysis. Acrylates are derivatives of acrylic acid (such as methyl and ethyl acrylate) whose properties have been sufficiently modified to enable of acrylic acid to be used in different media as emulsion and solution polymers. As emulsions, these products may be used as coatings, finishes and binders leading to applications in paints, adhesives, and polishes with solutions used for industrial coatings. Two-third of the world's production of acrylic acid is used to produce acrylic esters (acrylates) primarily for use in emulsions and solution polymers for latex-based paints, coatings, adhesives and textiles. Polymers of acrylic acid can be produced as superabsorbent materials (e.g. for dipers), and soluble as a replacement for phosphates in detergents. Both of these represent fast growing applications for acrylic acid. The chemical and physical properties of the polymers can be modified through controlled variation in the selection and balance of the monomers, the extent of cross-linking and molecular mass. This flexibility is complemented by high resistance to chemical and environmental degradation, strength, clarity, and being readily available in high purity forms.
Acrylic acid is produced mainly by the oxidation of propylene, using either a single-step or two-step process. This dataset models the production of acrylic acid using the two-step propylene oxidation process. The data is mainly based on two general reports about the theoretical production of acrylic acid. The electricity consumption and water exchanges are approximated based on data from a large chemical plant (Gendorf 2016).
References:
Gendorf (2016) Umwelterklärung 2015, Werk Gendorf Industriepark, www.gendorf.de.
Ohara, T., Sato, T., Shimizu, N., Prescher, G., Schwind, H., Weiberg, O., Marten, K. and Greim, H. 2011. Acrylic Acid and Derivatives. Ullmann's Encyclopedia of Industrial Chemistry.
Althaus H.-J., Chudacoff M., Hischier R., Jungbluth N., Osses M. and Primas A. (2007) Life Cycle Inventories of Chemicals. ecoinvent report No. 8, v2.0. EMPA Dübendorf, Swiss Centre for Life Cycle Inventories, Dübendorf, CH.

## Included activities start
The activity starts when the raw materials enter the process.

## Included activities end
This activity ends with the production of 1 kg of acrylic acid. The dataset includes the processing of the raw materials and chemicals used for production, as well as emissions to air and water. Solid wastes are omitted.

## Geography
Some of the data are from Australia and the USA. Some values are based on data from a large chemical factory located in Germany. These are assumed to be valid for this geography.

## Technology
Most of the commercial acrylic acid is manufactured by the oxidation of propylene.
Two production processes can be distiguished:
- Single-step propylene oxidation: The yield in the single-step process is at best approximately 50-60%. Another drawback is the limited lifetime of the catalyst, which is a multicomponent system composed of polyvalent oxides with molybdenum oxide as main component and tellurium oxide as promotor. The disadvantages of this process lead to the development of the two-step process.
CH2=CHCH3 (propylene) + 3/2 O2 → CH2=CHCO2H (acrylic acid) + H2O (1.1)
- Two-step propylene oxidation: The limited life of the catalyst has promoted a two stage manufacturing process via acrolein using two catalysts. The first stage is the oxidation of propylene to acrolein using a bismuth molybdate catalyst in a strongly exothermic reaction (at about 370°C). In the second stage, the acrolein gas is passed over a molybdenum vanadium oxide catalyst that is also exothermic (at about 270°C - about 100°C cooler than the first stage). The crude acrylic acid is then cooled to about 80°C, absorbed in water (30 to 60% concentration) and extracted with organic solvent or water (depending on the concentration).
CH2=CHCH3 (propylene) + O2 → CH2=CHCHO (acrolein) + H2O (1.2)
CH2=CHCHO + 1/2 O2 → CH2=CHCO2H (acrylic acid) (1.3)
In a subsequent step, acrylic acid is separated from the large volume of water present in the absorber effluent. This purification runs either by distillation from the solvent or by removing from water with added inhibitors to minimise the formation of polymers. Conversion rates of up to 90% are achievable at commercial scales of production depending on technology, catalysts and conditions.
The inventory in this dataset models the production of acrylic acid from propylene by the two-step oxidation process with a process yield of 90%. The data is based on two general reports about the theoretical production of acrylic acid.
References:
Ohara, T., Sato, T., Shimizu, N., Prescher, G., Schwind, H., Weiberg, O., Marten, K. and Greim, H. 2011. Acrylic Acid and Derivatives. Ullmann's Encyclopedia of Industrial Chemistry.
Althaus H.-J., Chudacoff M., Hischier R., Jungbluth N., Osses M. and Primas A. (2007) Life Cycle Inventories of Chemicals. ecoinvent report No. 8, v2.0. EMPA Dübendorf, Swiss Centre for Life Cycle Inventories, Dübendorf, CH.

## Time period
The data in this dataset come from different years, but overall form the most realistic picture of the production. Some values are based on data published by the Gendorf factory that were collected between 2011 and 2015. The time period has been adjusted accordingly. For more details, see the comments of the exchanges.

## Reference product
- acrylic acid: 1 kg; name RP; By-product classification allocatable product; CPC 34120: Industrial monocarboxylic fatty acids; acid oils from refining; CAS 79-10-7
  Acrylic acid is a colourless, slightly water soluble liquid with an acrid odour. It belongs to the carboxylic acids. Acrylic acid is a versatile chemical that can be esterified, aminated or otherwise modified and polymerised to complex molecular arrangements to suit requirements. This characteristic enables a broad range of reactions for providing performance characteristics to a range of polymers. The esters are produced by reacting acrylic acid with alcohols especially ethanol, methanol and butanol that may be saponified, converted to other esters or amides by aminolysis. Acrylates are derivatives of acrylic acid (such as methyl and ethyl acrylate) whose properties have been sufficiently modified to enable of acrylic acid to be used in different media as emulsion and solution polymers. As emulsions, these products may be used as coatings, finishes and binders leading to applications in paints, adhesives, and polishes with solutions used for industrial coatings. Two-third of the world's production of acrylic acid is used to produce acrylic esters (acrylates) primarily for use in emulsions and solution polymers for latex-based paints, coatings, adhesives and textiles. Polymers of acrylic acid can be produced as superabsorbent materials (e.g. for dipers), and soluble as a replacement for phosphates in detergents. Both of these represent fast growing applications for acrylic acid. The chemical and physical properties of the polymers can be modified through controlled variation in the selection and balance of the monomers, the extent of cross-linking and molecular mass. This flexibility is complemented by high resistance to chemical and environmental degradation, strength, clarity, and being readily available in high purity forms.
  production volume 6.4e8 kg; name RP_PV
    According to Ullmann's Encyclopedia of Industrial Chemistry the acrylic acid production for Western Europe in year 1994 was 640000000 kg.
    Reference(s):
    Ohara, T., Sato, T., Shimizu, N., Prescher, G., Schwind, H., Weiberg, O., Marten, K. and Greim, H. 2011. Acrylic Acid and Derivatives. Ullmann's Encyclopedia of Industrial Chemistry.
  property price 1.2 EUR2005
    Calculated value based on data from United Nations Commodity Trade Statistics Database (comtrade.un.org). UN comtrade category: 291611 Acrylic acid, salts. Year 2005. Using exchange rate of 1EURO = 1.209 USD. Average of price of import into 5 main markets (EU, US, JP, IN and CN).
  property carbon content 0.5
    carbon content on a dry matter basis (reserved; not for manual entry)
  property true value 1.2; name RP_true_value
    allocation property applied in "true value" allocation // value calculated from revenue
  properties: wet mass 1 kg, dry mass 1 kg, carbon content, non-fossil 0, water content 0, water in wet mass 0 kg, carbon content, fossil 0.5, carbon allocation 0.5 kg

## By-products
- heat, for reuse in municipal waste incineration only: 0 MJ; CPC 17300: Steam and hot water; By-product classification allocatable product; pedigree (1,1,1,1,1)
  Net electricity generated from this waste and used in internal MSWI plant energy redistribution.
  Uncertainty: uncertainty is calculated from uncertainties in waste composition and uncertainties in energy efficiency and the uncertainty in internal energy demand
  production volume 390.436 MJ
  property exergy 0.1842 MJ; name E_th_prod_MSWI_exergy
    This exergy property is based on the exergy content of the product.
  property price 0.0106 EUR2005; name E_th_prod_MSWI_price_EUR2005
    Average European district heat price from Ecoheatcool and Euroheat 2005-2006, Ecoheat Work package 1: The European heat market. Final report. 10.6 EUR/GJ i s the price of district heat. http://www.solarthermalworld.org/files/Ecoheatcool%20WP1%20Web.pdf?download
  property true value relation 0.1842; name E_th_prod_MSWI_true_value_relation
    property to calculate "true value" from
  property true value 1.16811e-9
    allocation property applied in "true value" allocation // value calculated from true value relation
- electricity, for reuse in municipal waste incineration only: 0 kWh; CPC 17100: Electrical energy; By-product classification allocatable product; pedigree (1,1,1,1,1)
  (same comment as for heat, for reuse in municipal waste incineration only)
  production volume 54.8981 kWh
  property true value relation 3.6; name E_el_prod_MSWI_true_value_relation
    property to calculate "true value" from
  property price 0.1 EUR2005; name E_el_prod_MSWI_price_EUR2005
    Estimated to be the same price as in case of electricity, medium voltage.
  property exergy 3.6 MJ; name E_el_prod_MSWI_exergy
    This exergy property is based on the exergy content of the product.
  property true value 3.17451e-9
    (same comment as for heat, for reuse in municipal waste incineration only)
- zinc concentrate: 0 kg; CPC 14290: Other non-ferrous metal ores and concentrates (other than uranium or thorium ores and concentrates); By-product classification allocatable product
  Calculated value from the knowledge of the properties of both products.
  production volume 0.00742705 kg
  property price 0.38 EUR2005; name ByP_price_EUR2005
    Temporary price data. Calculated as 90% of purchasers price based on: Zinc content in concentrate 53%. Concentrate price per kg Zn 86.5% of refined Zn price (13.5% treatment charges according to CHR Metals Limited 2005: Dynamic cost curves. http://www.minecost.com/dynamic.pdf). 2004 zinc price from USGS (2007) Mineral commodity summaries 2007. <http://minerals.usgs.gov/minerals/pubs/mcs/2007/mcs2007.pdf> [Accessed 25 May 2010]
  property zinc content 0.53; name zinc_C_zinc_concentrate
    Zinc content on a dry matter basis. Value taken from teh "zinc mine operation" /GLO dataset.
  property dry mass 1 kg; name DM_zinc_concentrate
  property carbon content 0
    carbon content on a dry matter basis (reserved; not for manual entry)
  property true value 4.30488e-13
    allocation property applied in "true value" allocation // value calculated from revenue
  properties: wet mass 1 kg, water content 0, carbon content, non-fossil 0, carbon content, fossil 0, water in wet mass 0 kg, carbon allocation 0 kg

## Inputs from technosphere
- chemical factory, organics: 4e-10 unit; lognormal variance with pedigree 0.309225, pedigree (2,3,1,2,3)
  Calculated based on literature data published by the industry. For this activity, no information was readily available concerning infrastructure and land-use. Therefore, the infrastructure is estimated based on data from two chemical factories, the BASF site of Ludwigshafen and the chemical factory in Gendorf (which are both located in Germany), which produce a wide range of chemical substances. Based on this data, the following assumptions are made: the built area amounts to about 4.2 ha, the plant has an average output of 50'000 t/a and a lifespan of fifty years. The estimated infrastructure amount is therefore 4.00 E-10 units per kg of produced chemical.
  References:
  Althaus H.-J., Chudacoff M., Hischier R., Jungbluth N., Osses M. and Primas A. (2007) Life Cycle Inventories of Chemicals. ecoinvent report No. 8, v2.0. EMPA Dübendorf, Swiss Centre for Life Cycle Inventories, Dübendorf, CH.
  Gendorf (2000) Umwelterklärung 2000, Werk Gendorf. Werk Gendorf, Burgkirchen.
- hydroquinone: 0.002 kg; lognormal variance with pedigree 0.0402, pedigree (3,5,2,5,3)
  Data from 1 Australian source.
  properties: wet mass 1 kg, carbon content, fossil 0.654476, dry mass 1 kg
- propylene: 0.63 kg; lognormal variance with pedigree 0.1786, pedigree (4,5,5,5,5)
  Estimated value based on expert judgement.
  properties: dry mass 1 kg, carbon content, fossil 0.857143, wet mass 1 kg
- chemical, inorganic: 0.0003 kg; lognormal variance with pedigree 0.0402, pedigree (3,5,2,5,3)
  Data from 1 Australian source.
  properties: carbon content, fossil 0.003, wet mass 1 kg, dry mass 1 kg
  note on carbon content, fossil: This dataset is an unweighted average of 20 inorganic substances (listed in Tab 88.1, ecoinvent v2.2 report 8, part II), being part of the top100 chemicals included in this database. The C-content has also been calculated as an unweighted average of the C content of the substances composing this dataset.
- electricity, medium voltage: 0.416 kWh; lognormal variance with pedigree 0.009825, pedigree (2,3,1,2,3)
  Calculated based on literature data published by the industry. This value is a 5-year average of data (2011 - 2015) published by the Gendorf factory (Gendorf, 2016, Umwelterklärung, www.gendorf.de), (Gendorf, 2015, Umwelterklärung, www.gendorf.de), (Gendorf, 2014, Umwelterklärung, www.gendorf.de). The amount of electricity per kg of chemical substance produced is calculated using literature data published by the Gendorf factory based in Germany, which produces a wide range of chemical substances. The factory produced 1657400 tonnes of chemical substances in the year 2015 (Gendorf, 2016, Umwelterklärung, www.gendorf.de) and 740000 tonnes of intermediate products. The amount of electricity consumed in the year 2015 was 3498800 GJ (Gendorf, 2016, Umwelterklärung, www.gendorf.de). The resulting amount of electricity is 0.406 kWh/kg (year 2015) of chemical substance produced. The 5-year average (2011 - 2015, weighted by production volume) is 0.416 kWh/kg (1.5 MJ/kg). Cross-reference: the amount of chemicals produced (excluding intermediate products) in the EU-28 in the year 2011 was 327 million tonnes (Eurostat, http://ec.europa.eu/eurostat/statistics-explained/index.php/Chemicals_production_statistics, accessed 20170126). The chemical and petrochemical industry sector consumed 2.33 EJ of energy in 2011 (European Commission - Joint Research Centre, 2014, BAT on Common Waste water and Waste Gas Treatment/Management Systems in the Chemical Sector). The resulting energy (both heat and electricity) consumed per kg of chemicals produced in 2011 is thus 7.13 MJ/kg. This is higher than the value calculated using data published by Gendorf – 3.85 MJ/kg, but that is to be expected as the intermediate products are not accounted for.
- nitrogen, liquid: 0.019 kg; lognormal variance with pedigree 0.009825, pedigree (2,3,1,2,3)
  Calculated based on literature data published by the industry. This value is a 5-year average of data (2011 - 2015) published by the Gendorf factory (Gendorf, 2016, Umwelterklärung, www.gendorf.de), (Gendorf, 2015, Umwelterklärung, www.gendorf.de), (Gendorf, 2014, Umwelterklärung, www.gendorf.de). The amount of nitrogen used per kg of chemical substance produced is calculated using literature data published by the Gendorf factory based in Germany, which produces a wide range of chemical substances. The factory produced 1657400 tonnes of chemical substances in the year 2015 (Gendorf, 2016, Umwelterklärung, www.gendorf.de) and 740000 tonnes of intermediate products. The reported amount of nitrogen used in 2015 was 33512400 Nm3 (Gendorf, 2016, Umwelterklärung, www.gendorf.de). One Nm3 of nitrogen is equal to 1.2506 kg. The resulting amount of nitrogen - the 5-year average (2011 - 2015, weighted by production volume) is 0.019 kg/kg. Nitrogen is mainly used during the production of chemicals for 'blanketing', which is the process of applying gas to the vapour space of a container or vessel in order to control its composition.
  properties: wet mass 1 kg, dry mass 1 kg
- wastewater, average: 0 m3; name BP_wastewater_average; pedigree (1,1,1,1,1)
  Calculated based on literature data published by the industry. This value is a 5-year average of data (2011 - 2015) published by the Gendorf factory (Gendorf, 2016, Umwelterklärung, www.gendorf.de), (Gendorf, 2015, Umwelterklärung, www.gendorf.de), (Gendorf, 2014, Umwelterklärung, www.gendorf.de). The amount of wastewater (which is later on treated in the municipal WWTP) per kg of chemical substance produced is calculated using literature data published by the Gendorf factory based in Germany, which produces a wide range of chemical substances. The factory produced 1657400 tonnes of chemical substances in the year 2015 (Gendorf, 2016, Umwelterklärung, www.gendorf.de) and 740000 tonnes of intermediate products. The amount of wastewater which is later on treated in the municipal WWTP in the year 2015 was 1200 tonnes (Gendorf, 2016, Umwelterklärung, www.gendorf.de). The resulting amount of wastewater is 2.7E-06 m3/kg of chemical product produced.
  production volume 0 m3
    Calculated from the production volume of acrylic acid in proportion to the respective output amounts.
  property price 0 EUR2005; name BP_wastewater_average_price_EUR2005
  properties: water content 2882.2, carbon content, non-fossil 0.194039, wet mass 1000 kg, dry mass 0.346837 kg
  note on carbon content, non-fossil: 0.0673 kg TOC/m3 (Tab A.17, ecoinvent v2.2 report 13_I). TOC was considered as Total Carbon.
- ethyl acetate: 0.01 kg; lognormal variance with pedigree 0.0402, pedigree (3,5,2,5,3)
  Data from 1 Australian source.
  properties: carbon content, fossil 0.545455, dry mass 1 kg, wet mass 1 kg
- heat, district or industrial, natural gas: 0.2185 MJ; lognormal variance with pedigree 0.0402, pedigree (3,5,2,5,3)
  Data from 1 Australian source.
- tap water: 0.026 kg; lognormal variance with pedigree 0.009825, pedigree (2,3,1,2,3)
  Calculated based on literature data published by the industry. This value is a 5-year average of data (2011 - 2015) published by the Gendorf factory (Gendorf, 2016, Umwelterklärung, www.gendorf.de), (Gendorf, 2015, Umwelterklärung, www.gendorf.de), (Gendorf, 2014, Umwelterklärung, www.gendorf.de). The amount of tap water per kg of chemical substance produced is calculated using literature data published by the Gendorf factory based in Germany, which produces a wide range of chemical substances. The factory produced 1657400 tonnes of chemical substances in the year 2015 (Gendorf, 2016, Umwelterklärung, www.gendorf.de) and 740000 tonnes of intermediate products. The amount of tap water consumed in the year 2015 was 55100 tonnes (Gendorf, 2016, Umwelterklärung, www.gendorf.de). The resulting amount of tap water is 0.023 kg/kg of chemical product produced. The 5-year average (2011 - 2015, weighted by production volume) is 0.026 kg/kg.
  properties: wet mass 1 kg, dry mass 0.000337476 kg, carbon content, fossil 0.00178991, water content 2962.17
  note on carbon content, fossil: Bicarbonate content is 2.93 mol/m3. CO2 content is 0.1 mol/m3 (ecoinvent v2.2 report 8, Tab 93.1).
- wastewater, average: -2.43642e-6, -2.63575e-7 m3 (2 entries); lognormal variance with pedigree 0.009825, pedigree (2,3,1,2,3)
  (same comment as for wastewater, average)
  production volume 1728 m3

## Inputs from nature
- Oxygen [natural resource, in air]: 0.719 kg; lognormal variance with pedigree 0.1786, pedigree (4,5,5,5,5)
  Calculated based on stoechiometry: 1.5 moles of O2 per mole of propylene are consumed during the reaction.
- Water, well, in ground [natural resource, in water]: 0.00083 m3; lognormal variance with pedigree 0.009825, pedigree (2,3,1,2,3)
  Calculated based on literature data published by the industry. This value is a 5-year average of data (2011 - 2015) published by the Gendorf factory (Gendorf, 2016, Umwelterklärung, www.gendorf.de), (Gendorf, 2015, Umwelterklärung, www.gendorf.de), (Gendorf, 2014, Umwelterklärung, www.gendorf.de). The amount of groundwater and surface water (river) extracted per kg of chemical substance produced is calculated using literature data published by the Gendorf factory based in Germany, which produces a wide range of chemical substances. The factory produced 1657400 tonnes of chemical substances in the year 2015 (Gendorf, 2016, Umwelterklärung, www.gendorf.de) and 740000 tonnes of intermediate products. The amount of groundwater and surface water (river) extracted in the year 2015 was 19950000 tonnes and 21488100 tonnes respectively (Gendorf, 2016, Umwelterklärung, www.gendorf.de).
- Water, river [natural resource, in water]: 0.00086 m3; lognormal variance with pedigree 0.009825, pedigree (2,3,1,2,3)
  (same comment as for Water, well, in ground)
- Water, cooling, unspecified natural origin [natural resource, in water]: 0.0164 m3; lognormal variance with pedigree 0.009825, pedigree (2,3,1,2,3)
  Calculated based on literature data published by the industry. This value is a 5-year average of data (2011 - 2015) published by the Gendorf factory (Gendorf, 2016, Umwelterklärung, www.gendorf.de), (Gendorf, 2015, Umwelterklärung, www.gendorf.de), (Gendorf, 2014, Umwelterklärung, www.gendorf.de). The amount of water for cooling extracted per kg of chemical substance produced is calculated using literature data published by the Gendorf factory based in Germany, which produces a wide range of chemical substances. The factory produced 1657400 tonnes of chemical substances in the year 2015 (Gendorf, 2016, Umwelterklärung, www.gendorf.de) and 740000 tonnes of intermediate products. The reported amounts of water extracted as groundwater and surface water (river) are assumed to be used entirely for cooling purposes.

## Emissions to nature
- Nitrogen [air, unspecified]: 0.019 kg; lognormal variance with pedigree 0.009825, pedigree (2,3,1,2,3)
  Calculated value. The amount of nitrogen released to air is equal to the amount of nitrogen entering the activity.
- COD, Chemical Oxygen Demand [water, unspecified]: 0.000294654 kg; lognormal variance with pedigree 0.218, pedigree (4,5,5,5,5)
  Calculated value. The BOD, COD, TOC and BOD5 are calculated based on the amount and type of emissions released to water in the same activity.
- Carbon dioxide, fossil [air, urban air close to ground]: 0.737 kg; lognormal variance with pedigree 0.0402, pedigree (3,5,2,5,3)
  Calculated value, based on data from 1 US source.
- BOD5, Biological Oxygen Demand [water, unspecified]: 0.000294654 kg; lognormal variance with pedigree 0.218, pedigree (4,5,5,5,5)
  (same comment as for COD, Chemical Oxygen Demand)
- Acetic acid [water, surface water]: 0.000288 kg; lognormal variance with pedigree 0.3502, pedigree (3,5,2,5,3)
  Data from 1 US source.
- DOC, Dissolved Organic Carbon [water, unspecified]: 0.000115099 kg; lognormal variance with pedigree 0.218, pedigree (4,5,5,5,5)
  (same comment as for COD, Chemical Oxygen Demand)
- TOC, Total Organic Carbon [water, unspecified]: 0.000115099 kg; lognormal variance with pedigree 0.218, pedigree (4,5,5,5,5)
  (same comment as for COD, Chemical Oxygen Demand)
- Water [water, unspecified]: 0.0167 m3; lognormal variance with pedigree 0.009825, pedigree (2,3,1,2,3)
  Calculated based on literature data published by the industry (Gendorf, 2016, Umwelterklärung, www.gendorf.de). The amount of water released back to the environment consists of the amount of process water treated in the internal WWTP and then released back to the environment and the amount of cooling water released back to the environment.
  property fraction, origin: fresh water 0; name fraction_origin_fresh_water_Ww
  property fraction, origin: unspecified 1; name fraction_origin_unspecified_Ww
  property water in wet mass 1000 kg; name WWM
  property wet mass 1000 kg; name WM
  property fraction, origin: salt water 0; name fraction_origin_salt_water_Ww
  property carbon content, non-fossil 0; name C_content_non_fossil
  property carbon content, fossil 0; name C_content_fossil
  property dry mass 0 kg; name DM
- Water [air, unspecified]: 0.0014 m3; lognormal variance with pedigree 0.009825, pedigree (2,3,1,2,3)
  Calculated to ensure the water balance. In general, in the case of recirculating cooling systems, 77% of the water input evaporates to air. In case of once-through cooling systems, 4% of the water input evaporates to air. The process water has in the chemical industry an average evaporation rate of 20.5%. In the specific case of the Gendorf factory, the calculated evaporation rate based on the data published is 6.3%. This matches the qualitative information, that the majority of the cooling systems in Gendorf are once-through and that the amount of cooling water used is significantly higher than the amount of process water used (Gendorf, 2016, Umwelterklärung, www.gendorf.de).
  property fraction, origin: fresh water 0; name fraction_origin_fresh_water
  property fraction, origin: salt water 0; name fraction_origin_salt_water
  property fraction, origin: unspecified 1; name fraction_origin_unspecified
- Propene [air, urban air close to ground]: 1e-6 kg; lognormal variance with pedigree 0.0802, pedigree (3,5,2,5,3)
  Data from personal communication.

## Sampling procedure
Data based on literature as well as industrial data. Some values are calculated based on data from a large chemical factory located in Germany. For more details, see the comments of the exchanges.

## Review by Gregor Wernet 2017-08-04
This dataset was additionally reviewed in a separate review process by Eric Johnson of Atlantic Consulting as well as Emilia Moreno Ruiz and Gregor Wernet of ecoinvent.
