# treatment of glass cullet, mixed glass from used cathode ray tube, 0% water, inert material landfill

Dataset: EcoSpold 2, unit process
Geography: GLO
Time period: 1995-01-01 to 2019-12-31
Technology level: current
Classification: EcoSpold01Categories: waste management/inert material landfill
Classification: ISIC rev.4 ecoinvent: 3821:Treatment and disposal of non-hazardous waste
Tags: Treatment
Scenario: Business-as-Usual
System model: Allocation at the point of substitution
Generated by: Tereza Levova
Published in: Doka G. 2007
Database: ecoinvent
isCopyrightProtected: true
accessRestrictedTo: 1

## General comment
This is a proxy dataset based on treatment of waste glass, final disposal to inert material landfill.

## Included activities end
No direct emissions from inert material landfill (leachate) are inventoried as deemed negligible. Module contains only exchanges to process-specific burdens (energy, land use) and infrastructure.

## Geography
Specific to the technology encountered in Switzerland in 2000.

## Technology
landfill with renaturation after closure. 50% of the sites feature a base seal and leachate collection system.

## Reference product
- glass cullet, mixed glass from used cathode ray tube: -1 kg; By-product classification Waste; CPC 37111: Glass in the mass, in balls (except microspheres), rods or tubes, unworked; waste and scrap of glass
  production volume 1.7201e10 kg
    Calculated based on literature value. Based on knowledge of the production volumes of cathode ray tube displays.
  property price 0 EUR2005
    Waste products are assigned a price of zero as they are assumed to require further treatment.
  property dry mass 1 kg; name DM
  property wet mass 1 kg; name WM
  property carbon content 0
    carbon content on a dry matter basis (reserved; not for manual entry)
  properties: carbon content, fossil 0, water content 0, water in wet mass 0 kg, carbon content, non-fossil 0, carbon allocation 0 kg

## Inputs from technosphere
- process-specific burdens, inert material landfill: 0 kg; pedigree (1,1,1,1,1)
  EcoSpold01Location=CH
  process-specific burdens per kg waste, uncerteinty heeded in module.
- inert material landfill: 1.48e-9 unit; lognormal variance with pedigree 0.042, pedigree (1,1,5,5,1)
  landfill infrastructure per kg waste, uncerteinty heeded in module.
  EcoSpold01Location=CH
- process-specific burdens, inert material landfill: 0.00841689, 0.991583 kg (2 entries); lognormal variance with pedigree 0.042, pedigree (1,1,5,5,1)
  EcoSpold01Location=CH
  process-specific burdens per kg waste, uncerteinty heeded in module.

## Extrapolations
This dataset has been extrapolated from year 1995 to the year of the calculation (2019). The uncertainty has been adjusted accordingly.

## Review by Bo Weidema 2012-05-04
Passed
