# dichloromethane production

Dataset: EcoSpold 2, unit process
Geography: RoW
Time period: 1997-01-01 to 2019-12-31
Technology level: current
Classification: EcoSpold01Categories: chemicals/organics
Classification: ISIC rev.4 ecoinvent: 2011:Manufacture of basic chemicals
Synonyms: methylene chloride; methane dichloride; methylene bichloride; Freon 30; methylene dichloride
Tags: ConvertedDataset
Scenario: Business-as-Usual
System model: Allocation at the point of substitution
Share of production covered: 78 %
Generated by: Alex Primas
Published in: Althaus H.-J. 2007
Database: ecoinvent
isCopyrightProtected: true
accessRestrictedTo: 1

## General comment
The data source for this process is a system inventory from Boustead. Due to the cumulated form of this data only the ressources and emissions included in the data source were considered. No land occupation and land use is included in this dataset. Further it was not possible to implement an uncertainity assessment with this data.
[This dataset was already contained in the ecoinvent database version 2. It was not individually updated during the transfer to ecoinvent version 3. Life Cycle Impact Assessment results may still have changed, as they are affected by changes in the supply chain, i.e. in other datasets. This dataset was generated following the ecoinvent quality guidelines for version 2. It may have been subject to central changes described in the ecoinvent version 3 change report (http://www.ecoinvent.org/database/ecoinvent-version-3/reports-of-changes/), and the results of the central updates were reviewed extensively. The changes added e.g. consistent water flows and other information throughout the database. The documentation of this dataset can be found in the ecoinvent reports of version 2, which are still available via the ecoinvent website. The change report linked above covers all central changes that were made during the conversion process.]

## Included activities end
Raw materials, processing energy, emissions to air and water from process, energy services and transports, infrastructure only partly included, no infrastructure of main process included, no land use data included.

## Geography
Data from various plants within Europe.

## Technology
Data refers to actual technology used in the companies included. This leads in total to an average value including all important production routes for this chemical

## Time period
Time of literature publication. Measurements took place before this period.

## Parameters
- fraction, cooling water, recirculating system, to air: 0.771; name fraction_CW_R_to_air; lognormal variance with pedigree 0.0413, pedigree (2,3,1,3,1)
  Calculated based on literature value (Scown, C.D., 2011, Water Footprint of U.S. Transportation Fuels and supplying information of the article) (Vionnet, S., Quantis Water Database - Technical Report, 2012).
- fraction, process water, to air: 0.205 dimensionless; name fraction_PW_to_air; lognormal variance with pedigree 0.092025, pedigree (4,4,3,2,4)
- fraction, cooling water, to air: 0.3875; name fraction_CW_to_air; = (0.5*fraction_CW_OT_to_air)+(0.5*fraction_CW_R_to_air); lognormal variance with pedigree 0.092025, pedigree (4,4,3,2,4)
  Calculated value based on literature value (see comments of the other parametres present in this dataset) and expert opinion. In the case when no industry/literature data are available about the type of cooling or directly fraction, cooling water, to air specific for the process a default assumption is applied. It is assumed that the once-through cooling system is used in 50% of all cases and recirculating system is used in another 50% of all cases.
- fraction, cooling water, cooling pond system, to air: 0.032; name fraction_CW_CP_to_air; lognormal variance with pedigree 0.0413, pedigree (2,3,1,3,1)
  (same comment as for fraction, cooling water, recirculating system, to air)
- fraction, cooling water, once-through system, to air: 0.004; name fraction_CW_OT_to_air; lognormal variance with pedigree 0.0413, pedigree (2,3,1,3,1)
  (same comment as for fraction, cooling water, recirculating system, to air)

## Reference product
- dichloromethane: 1 kg; CPC 34110: Hydrocarbons and their halogenated, sulphonated, nitrated or nitrosated derivatives; By-product classification allocatable product; CAS 75-09-2
  EcoSpold01Location=RER
  production volume 2.67763 kg
    This is a placeholder value that does not reflect real-world production volumes. This dataset does not currently require a real-world production volume to work in the database framework, and no actual data were collected yet. This has no negative effect on the results of the ecoinvent database.
  property carbon content 0.142857
    carbon content on a dry matter basis (reserved; not for manual entry)
  property true value 0.979
    allocation property applied in "true value" allocation // value calculated from revenue
  properties: price 0.979 EUR2005, water content 0, dry mass 1 kg, water in wet mass 0 kg, carbon content, non-fossil 0, carbon content, fossil 0.142857, wet mass 1 kg, carbon allocation 0.142857 kg

## By-products
- electricity, for reuse in municipal waste incineration only: 0 kWh; CPC 17100: Electrical energy; By-product classification allocatable product; pedigree (1,1,1,1,1)
  Net electricity generated from this waste and used in internal MSWI plant energy redistribution.
  Uncertainty: uncertainty is calculated from uncertainties in waste composition and uncertainties in energy efficiency and the uncertainty in internal energy demand
  production volume 0.000111801 kWh
  property true value relation 3.6; name E_el_prod_MSWI_true_value_relation
    property to calculate "true value" from
  property exergy 3.6 MJ; name E_el_prod_MSWI_exergy
    This exergy property is based on the exergy content of the product.
  property price 0.1 EUR2005; name E_el_prod_MSWI_price_EUR2005
    Estimated to be the same price as in case of electricity, medium voltage.
  property true value 4.80062e-6
    allocation property applied in "true value" allocation // value calculated from true value relation
- heat, for reuse in municipal waste incineration only: 0 MJ; CPC 17300: Steam and hot water; By-product classification allocatable product; pedigree (1,1,1,1,1)
  Net useful heat generated from this waste and used in internal MSWI plant energy redistribution.
  Uncertainty: uncertainty is calculated from uncertainties in waste composition and uncertainties in energy efficiency and the uncertainty in internal energy demand
  production volume 0.000825306 MJ
  property true value relation 0.1842; name E_th_prod_MSWI_true_value_relation
    property to calculate "true value" from
  property exergy 0.1842 MJ; name E_th_prod_MSWI_exergy
    This exergy property is based on the exergy content of the product.
  property price 0.0106 EUR2005; name E_th_prod_MSWI_price_EUR2005
    Average European district heat price from Ecoheatcool and Euroheat 2005-2006, Ecoheat Work package 1: The European heat market. Final report. 10.6 EUR/GJ i s the price of district heat. http://www.solarthermalworld.org/files/Ecoheatcool%20WP1%20Web.pdf?download
  property true value 1.8134e-6
    (same comment as for electricity, for reuse in municipal waste incineration only)
- zinc concentrate: 0 kg; CPC 14290: Other non-ferrous metal ores and concentrates (other than uranium or thorium ores and concentrates); By-product classification allocatable product
  Calculated value from the knowledge of the properties of both products.
  production volume 2.10184e-11 kg
  property price 0.38 EUR2005; name ByP_price_EUR2005
    Temporary price data. Calculated as 90% of purchasers price based on: Zinc content in concentrate 53%. Concentrate price per kg Zn 86.5% of refined Zn price (13.5% treatment charges according to CHR Metals Limited 2005: Dynamic cost curves. http://www.minecost.com/dynamic.pdf). 2004 zinc price from USGS (2007) Mineral commodity summaries 2007. <http://minerals.usgs.gov/minerals/pubs/mcs/2007/mcs2007.pdf> [Accessed 25 May 2010]
  property zinc content 0.53; name zinc_C_zinc_concentrate
    Zinc content on a dry matter basis. Value taken from teh "zinc mine operation" /GLO dataset.
  property dry mass 1 kg; name DM_zinc_concentrate
  property carbon content 0
    carbon content on a dry matter basis (reserved; not for manual entry)
  property true value 2.66232e-12
    allocation property applied in "true value" allocation // value calculated from revenue
  properties: wet mass 1 kg, water content 0, carbon content, non-fossil 0, carbon content, fossil 0, water in wet mass 0 kg, carbon allocation 0 kg
- copper: 0 kg; By-product classification allocatable product; CPC 41413: Refined copper and copper alloys, unwrought; master alloys of copper
  production volume 5.58473e-7 kg
  property price 5.52 EUR2005
    Literature value (http://www.economist.com/news/business/21576714-mining-industry-has-enriched-chile-its-future-precarious-copper-solution). Average price between 20015 and 2013.
  property carbon content 0
    carbon content on a dry matter basis (reserved; not for manual entry)
  property true value 9.53686e-7
    allocation property applied in "true value" allocation // value calculated from revenue
  properties: water in wet mass 0 kg, water content 0, carbon content, non-fossil 0, dry mass 1 kg, carbon content, fossil 0, wet mass 1 kg, carbon allocation 0 kg
- lead: 0 kg; CPC 41441: Lead, unwrought; By-product classification allocatable product
  EcoSpold01Location=SE
  production volume 2.02303e-9 kg
  property price 0.744 EUR2005
    Temporary price data. Calculated as 90% of purchasers price based on: Source: ecoinvent v2 report 10-part IX, Tab 5.10 & 2.5
  property carbon content 0
    carbon content on a dry matter basis (reserved; not for manual entry)
  property true value 5.01711e-10
    allocation property applied in "true value" allocation // value calculated from revenue
  properties: wet mass 1 kg, water content 0, carbon content, non-fossil 0, carbon content, fossil 0, dry mass 1 kg, water in wet mass 0 kg, carbon allocation 0 kg
- nickel, 99.5%: 0 kg; CPC 41422: Unwrought nickel; By-product classification allocatable product
  EcoSpold01Location=SE
  production volume 4.22301e-9 kg
  property price 10.4 EUR2005
    Temporary price data. Calculated as 90% of purchasers price based on: 2004 nickel price from USGS (2007) Mineral commodity summaries 2007. <http://minerals.usgs.gov/minerals/pubs/mcs/2007/mcs2007.pdf> [Accessed 25 May 2010]
  property carbon content 0
    carbon content on a dry matter basis (reserved; not for manual entry)
  property true value 1.46398e-8
    allocation property applied in "true value" allocation // value calculated from revenue
  properties: water in wet mass 0 kg, wet mass 1 kg, carbon content, non-fossil 0, dry mass 1 kg, water content 0, carbon content, fossil 0, carbon allocation 0 kg
- silver: 0 kg; CPC 41310: Silver (including silver plated with gold or platinum), unwrought or in semi-manufactured forms, or in powder […]; By-product classification allocatable product; CAS 7440-22-4
  EcoSpold01Location=SE
  production volume 6.97388e-10 kg
  property price 178 EUR2005
    (same comment as for lead)
  property carbon content 0
    carbon content on a dry matter basis (reserved; not for manual entry)
  property true value 4.13784e-8
    allocation property applied in "true value" allocation // value calculated from revenue
  properties: wet mass 1 kg, carbon content, non-fossil 0, dry mass 1 kg, water content 0, carbon content, fossil 0, water in wet mass 0 kg, carbon allocation 0 kg
- palladium: 0 kg; CPC 4160: Other non-ferrous metals and articles thereof (including waste and scrap of some metals); cermets and articles […]; By-product classification allocatable product
  EcoSpold01Location=SE
  production volume 3.8605e-11 kg
  property price 5640 EUR2005
    Temporary price data. Calculated as 90% of purchasers price based on: 2004 price from USGS (2007) Mineral commodity summaries 2007. <http://minerals.usgs.gov/minerals/pubs/mcs/2007/mcs2007.pdf> [Accessed 25 May 2010]
  property carbon content 0
    carbon content on a dry matter basis (reserved; not for manual entry)
  property true value 7.25774e-8
    allocation property applied in "true value" allocation // value calculated from revenue
  properties: wet mass 1 kg, carbon content, fossil 0, water in wet mass 0 kg, water content 0, carbon content, non-fossil 0, dry mass 1 kg, carbon allocation 0 kg
- gold: 0 kg; CPC 41320: Gold (including gold plated with platinum), unwrought or in semi-manufactured forms, or in powder form; By-product classification allocatable product; CAS 7440-57-5
  EcoSpold01Location=SE
  production volume 2.11708e-11 kg
  property price 10600 EUR2005
    Temporary price data. Calculated as 90% of purchasers price based on: Source: ecoinvent v2 report 10-part IX, Tab 2.5
  property carbon content 0
    carbon content on a dry matter basis (reserved; not for manual entry)
  property true value 7.48036e-8
    allocation property applied in "true value" allocation // value calculated from revenue
  properties: wet mass 1 kg, carbon content, fossil 0, dry mass 1 kg, carbon content, non-fossil 0, water content 0, water in wet mass 0 kg, carbon allocation 0 kg
- iron scrap, sorted, pressed: 0 kg; By-product classification Recyclable; CPC 39310: Slag, dross, scalings and other waste from the manufacture of iron or steel; pedigree (1,1,1,1,1)
  Iron scrap recovered from this waste.
  production volume 1.49317e-5 kg
  property price 0.175 EUR2005
    Temporary price data. Calculated as 90% of purchasers price based on: 2005 import and export prices (total trades (USD) divided by total weight (kg) in biggest economies of the world: EU27, USA, Brasil, China, India, Japan and Russia) from UN Commodity Trade Statistics Database (http://data.un.org/Explorer.aspxDatabase [Accessed 2011.06.20]). Commodity: Waste or scrap, of cast iron
  property carbon content 0
    carbon content on a dry matter basis (reserved; not for manual entry)
  property true value 8.08156e-7
    allocation property applied in "true value" allocation // value calculated from revenue
  properties: water content 0, water in wet mass 0 kg, carbon content, fossil 0, dry mass 1 kg, carbon content, non-fossil 0, wet mass 1 kg, carbon allocation 0 kg
- iron scrap, unsorted: 0 kg; source European Aluminium Association 2008; CPC 39310: Slag, dross, scalings and other waste from the manufacture of iron or steel; By-product classification Recyclable; pedigree (1,1,1,1,1)
  production volume 3.94767e-10 kg
  property price 0.149 EUR2005; name ironScrapAmount_price_EUR2005
    Temporary price data. Calculated as 90% of purchasers price based on: estimated at 85% of sorted scrap
  property carbon content 0
    carbon content on a dry matter basis (reserved; not for manual entry)
  property true value 1.95622e-11
    allocation property applied in "true value" allocation // value calculated from revenue
  properties: water in wet mass 0 kg, water content 0, carbon content, fossil 0, carbon content, non-fossil 0, dry mass 1 kg, wet mass 1 kg, carbon allocation 0 kg
- aluminium oxide, non-metallurgical: 0 kg; source European Aluminium Association 2008; CPC 41432: Alumina (aluminium oxide), except artificial corundum; By-product classification allocatable product; CAS 1344-28-1; pedigree (1,1,1,1,1)
  production volume 2.48412e-8 kg
  property carbon content, non-fossil 0; name C_content_non_fossil
  property price 0.28 EUR2005; name Al2O3Amount_price_EUR2005
    From UN trade database. http://data.un.org/ Import data from the largest economies of the world are used (Brazil, India, USA, China, Japan and EU-27).
  property dry mass 1 kg; name DM
  property water content 0; name water_content
  property wet mass 1 kg; name WM
  property water in wet mass 0 kg; name WWM
  property carbon content, fossil 0; name C_content_fossil
  property carbon content 0
    carbon content on a dry matter basis (reserved; not for manual entry)
  property true value 2.31324e-9
    allocation property applied in "true value" allocation // value calculated from revenue
  properties: carbon allocation 0 kg
- aluminium, cast alloy: 0 kg; source European Aluminium Association 2008; By-product classification allocatable product; CPC 41431: Unwrought aluminium; pedigree (1,1,1,1,1)
  EcoSpold01Location=RER
  production volume 2.3221e-7 kg
  property price 1.3 EUR2005; name castAlloyAmount_price_EUR2005
    Temporary price data. Calculated as 90% of purchasers price based on: Source: London Metal Exchange, Aluminium alloy price for 2005
  property carbon content 0
    carbon content on a dry matter basis (reserved; not for manual entry)
  property true value 1.00396e-7
    allocation property applied in "true value" allocation // value calculated from revenue
  properties: water in wet mass 0 kg, carbon content, non-fossil 0, water content 0, dry mass 1 kg, carbon content, fossil 0, wet mass 1 kg, carbon allocation 0 kg
- aluminium, wrought alloy: 0 kg; source European Aluminium Association 2008; By-product classification allocatable product; CPC 4153: Semi-finished products of aluminium or aluminium alloys; pedigree (1,1,1,1,1)
  production volume 1.01657e-7 kg
  property price 1.44 EUR2005; name secondaryAluminiumOutput_price_EUR2005
    Estimated based on literature values and expert judgement. Aluminium ccast alloys are about 90% of the price of aluminium wrought alloys.
  property carbon content 0
    carbon content on a dry matter basis (reserved; not for manual entry)
  property true value 4.86845e-8
    allocation property applied in "true value" allocation // value calculated from revenue
  properties: wet mass 1 kg, water content 0, carbon content, fossil 0, water in wet mass 0 kg, carbon content, non-fossil 0, dry mass 1 kg, carbon allocation 0 kg

## Inputs from technosphere
- waste wood, untreated: 0 kg; pedigree (1,1,1,1,1)
  EcoSpold01Location=CH
  production volume 0 kg
    Calculated from the production volume of dichloromethane in proportion to the respective output amounts.
  properties: wet mass 1 kg, water content 0.25, dry mass 0.8 kg, carbon content, non-fossil 0.48632
  note on carbon content, non-fossil: Tab A.4, ecoinvent v2.2 report 13_I. C content has been referred to 1 kg DM,
- municipal solid waste: 0 kg; pedigree (1,1,1,1,1)
  EcoSpold01Location=CH
  production volume 0 kg
    (same comment as for waste wood, untreated)
  properties: dry mass 0.771 kg, carbon content, non-fossil 0.261655, carbon content, fossil 0.171549, water content 0.297017, wet mass 1 kg
  note on carbon content, non-fossil: MSW composition in tab 4.1, ecoinvent v2.2 report 13_I. C content referred to 1 kg DM
- average incineration residue: -0.0270998 kg; lognormal variance with pedigree 0.042, pedigree (1,1,5,5,1)
  EcoSpold01Location=CH
  production volume 0.0813 kg
    (same comment as for waste wood, untreated)
  properties: carbon content, non-fossil 0.0511208, carbon content, fossil 0.0325466, wet mass 1 kg, dry mass 1 kg
  note on carbon content, non-fossil: Tab A.1, ecoinvent v2.2 report 13_I. It is considered that 61.1% of the C has a biogenic origin
- waste plastic, mixture: 0 kg; pedigree (1,1,1,1,1)
  EcoSpold01Location=CH
  production volume 0 kg
    (same comment as for waste wood, untreated)
  properties: water content 0.180638, wet mass 1 kg, dry mass 0.847 kg, carbon content, fossil 0.747344
  note on carbon content, fossil: C content in 1 kg DM was calculated using data in Tab A.2, ecoinvent v2.2 report 13_I
- hazardous waste, for incineration: -0.000839993 kg; lognormal variance with pedigree 0.042, pedigree (1,1,5,5,1)
  EcoSpold01Location=CH
  production volume 0.00252 kg
    (same comment as for waste wood, untreated)
  properties: water content 0.333333, carbon content, fossil 0.554667, dry mass 0.75 kg, wet mass 1 kg
  note on carbon content, fossil: Tab A.6, ecoinvent v2.2 report 13_I. C content has been calculated after data in the tables, and then referred to 1 kg DM
- spoil from hard coal mining: -0.0769993 kg; lognormal variance with pedigree 0.042, pedigree (1,1,5,5,1)
  EcoSpold01Location=GLO
  production volume 0.231 kg
    (same comment as for waste wood, untreated)
  properties: carbon content, fossil 0.007879, wet mass 1 kg, dry mass 1 kg
  note on carbon content, fossil: Composition of coal spoil is adopted by proxy from lignite spoil (pg 19, Doka G. (2009) Life Cycle Inventory of the disposal of lignite spoil, coal spoil and coal tailings. Doka Life Cycle Assessments, Zurich. Commissioned by the Swiss Centre for Life Cycle Inventories ecoinvent Centre)
- decommissioned chemical production facilities: -6.99994e-6 kg; lognormal variance with pedigree 0.042, pedigree (1,1,5,5,1)
  EcoSpold01Location=RER
  production volume 2.1e-5 kg
    (same comment as for waste wood, untreated)
  properties: dry mass 1 kg, carbon content, fossil 0.0169382, carbon content, non-fossil 5.78006e-6, wet mass 1 kg
  note on carbon content, fossil: Calculated from C content in input materials in the infrastructure
- waste wood, untreated: -3.35908e-8, -4.1708e-9, -3.04932e-10, -1.17145e-8, -1.76978e-9, -2.79788e-9, -4.45647e-7 kg (7 entries); lognormal variance with pedigree 0.042, pedigree (1,1,5,5,1)
  EcoSpold01Location=CH
  production volume 1.5e-6 kg
- municipal solid waste: -2.11961e-6, -5.34088e-7, -7.63243e-7, -0.00149907 kg (4 entries); lognormal variance with pedigree 0.042, pedigree (1,1,5,5,1)
  EcoSpold01Location=CH
  production volume 0.0045075 kg
- waste plastic, mixture: -3.68666e-7, -2.46328e-8, -1.86294e-9, -1.01742e-8, -4.11028e-9, -9.6614e-9, -2.58087e-6 kg (7 entries); lognormal variance with pedigree 0.042, pedigree (1,1,5,5,1)
  EcoSpold01Location=CH
  production volume 9e-6 kg

## Inputs from nature
- Water, salt, ocean [natural resource, in water]: 1.49999e-7 m3; name water_salt_ocean_input; lognormal variance with pedigree 0.042, pedigree (1,1,5,5,1)
- Coal, brown, in ground [natural resource, in ground]: 0.0369997 kg; lognormal variance with pedigree 0.042, pedigree (1,1,5,5,1)
- Sand, unspecified, in ground [natural resource, in ground]: 0.000679994 kg; lognormal variance with pedigree 0.042, pedigree (1,1,5,5,1)
- Sodium chloride, in ground [natural resource, in ground]: 1.19999 kg; lognormal variance with pedigree 0.042, pedigree (1,1,5,5,1)
- Water, unspecified natural origin [natural resource, in water]: 0.00490996 m3; name water_UNO_input; lognormal variance with pedigree 0.042, pedigree (1,1,5,5,1)
- Coal, hard, unspecified, in ground [natural resource, in ground]: 0.279998 kg; lognormal variance with pedigree 0.042, pedigree (1,1,5,5,1)
- Water, river [natural resource, in water]: 4.09996e-6 m3; name water_river_input; lognormal variance with pedigree 0.042, pedigree (1,1,5,5,1)
- Olivine, in ground [natural resource, in ground]: 9.99991e-7 kg; lognormal variance with pedigree 0.042, pedigree (1,1,5,5,1)
- Energy, potential (in hydropower reservoir), converted [natural resource, in water]: 0.319997 MJ
- Wood, unspecified, standing [natural resource, biotic]: 1.81998e-8 m3; lognormal variance with pedigree 0.042, pedigree (1,1,5,5,1)
- Iron, in ground [natural resource, in ground]: 0.000139999 kg; lognormal variance with pedigree 0.042, pedigree (1,1,5,5,1)
  46% Fe in siderite; 25% Fe in ore
- Oil, crude, in ground [natural resource, in ground]: 0.0929992 kg; lognormal variance with pedigree 0.042, pedigree (1,1,5,5,1)
- Aluminium, in ground [natural resource, in ground]: 1.10999e-5 kg; lognormal variance with pedigree 0.042, pedigree (1,1,5,5,1)
  24% Al in bauxite; 11% Al in ore
- Water, cooling, unspecified natural origin [natural resource, in water]: 0.0239998 m3; name water_cooling_UNO_input; lognormal variance with pedigree 0.042, pedigree (1,1,5,5,1)
- Dolomite, in ground [natural resource, in ground]: 1.99998e-6 kg; lognormal variance with pedigree 0.042, pedigree (1,1,5,5,1)
- Calcite, in ground [natural resource, in ground]: 0.0259998 kg; lognormal variance with pedigree 0.042, pedigree (1,1,5,5,1)
- Barium, in ground [natural resource, in ground]: 0.000239998 kg; lognormal variance with pedigree 0.042, pedigree (1,1,5,5,1)
  15% BaSO4 in ore
- Water, well, in ground [natural resource, in water]: 0.000709994 m3; name water_well_in_ground_input; lognormal variance with pedigree 0.042, pedigree (1,1,5,5,1)
- Gas, natural, in ground [natural resource, in ground]: 0.536995 m3; lognormal variance with pedigree 0.042, pedigree (1,1,5,5,1)
- Sulfur, in ground [natural resource, in ground]: 0.00109999 kg; lognormal variance with pedigree 0.042, pedigree (1,1,5,5,1)
- Fluorspar, in ground [natural resource, in ground]: 2.99997e-6 kg; lognormal variance with pedigree 0.042, pedigree (1,1,5,5,1)
  92% CaF2 in ore
- Uranium, in ground [natural resource, in ground]: 1.71998e-5 kg; lognormal variance with pedigree 0.042, pedigree (1,1,5,5,1)

## Emissions to nature
- Mercury [air, urban air close to ground]: 4.99996e-7 kg; lognormal variance with pedigree 0.042, pedigree (1,1,5,5,1)
- Aluminium [water, surface water]: 4.99996e-7 kg; lognormal variance with pedigree 0.042, pedigree (1,1,5,5,1)
- Cyanide [water, surface water]: 4.99996e-7 kg; lognormal variance with pedigree 0.042, pedigree (1,1,5,5,1)
- Hydrogen [air, urban air close to ground]: 0.000799993 kg; lognormal variance with pedigree 0.042, pedigree (1,1,5,5,1)
- COD, Chemical Oxygen Demand [water, surface water]: 0.000139999 kg; lognormal variance with pedigree 0.042, pedigree (1,1,5,5,1)
- Nickel, ion [water, surface water]: 4.99996e-7 kg; lognormal variance with pedigree 0.042, pedigree (1,1,5,5,1)
- Particulates, > 10 um [air, urban air close to ground]: 0.00159999 kg; lognormal variance with pedigree 0.042, pedigree (1,1,5,5,1)
- Sodium, ion [water, surface water]: 0.109999 kg; lognormal variance with pedigree 0.042, pedigree (1,1,5,5,1)
- Aldehydes, unspecified [air, urban air close to ground]: 4.99996e-7 kg; lognormal variance with pedigree 0.042, pedigree (1,1,5,5,1)
- Iron, ion [water, surface water]: 1.09999e-5 kg; lognormal variance with pedigree 0.042, pedigree (1,1,5,5,1)
- Nitrate [water, surface water]: 4.99996e-7 kg; lognormal variance with pedigree 0.042, pedigree (1,1,5,5,1)
- BOD5, Biological Oxygen Demand [water, surface water]: 7.99993e-6 kg; lognormal variance with pedigree 0.042, pedigree (1,1,5,5,1)
- Ethane, 1,2-dichloro- [water, surface water]: 4.99996e-7 kg; lognormal variance with pedigree 0.042, pedigree (1,1,5,5,1)
- Ethene, chloro- [water, surface water]: 4.99996e-7 kg; lognormal variance with pedigree 0.042, pedigree (1,1,5,5,1)
- Chlorinated solvents, unspecified [water, surface water]: 7.49993e-5 kg; lognormal variance with pedigree 0.042, pedigree (1,1,5,5,1)
- Zinc, ion [water, surface water]: 4.99996e-7 kg; lognormal variance with pedigree 0.042, pedigree (1,1,5,5,1)
- Phosphorus [water, surface water]: 2.19998e-7 kg; lognormal variance with pedigree 0.042, pedigree (1,1,5,5,1)
- Carbonate [water, surface water]: 4.99996e-7 kg; lognormal variance with pedigree 0.042, pedigree (1,1,5,5,1)
- Particulates, < 2.5 um [air, urban air close to ground]: 0.00124999 kg; lognormal variance with pedigree 0.042, pedigree (1,1,5,5,1)
- Calcium, ion [water, surface water]: 0.00609995 kg; lognormal variance with pedigree 0.042, pedigree (1,1,5,5,1)
- Methane, dichlorodifluoro-, CFC-12 [air, urban air close to ground]: 6.69994e-5 kg; lognormal variance with pedigree 0.042, pedigree (1,1,5,5,1)
- Ethene, chloro- [air, urban air close to ground]: 1.99998e-6 kg; lognormal variance with pedigree 0.042, pedigree (1,1,5,5,1)
- Fluorine [air, urban air close to ground]: 4.99996e-7 kg; lognormal variance with pedigree 0.042, pedigree (1,1,5,5,1)
- Nitrogen [water, surface water]: 4.99996e-7 kg; lognormal variance with pedigree 0.042, pedigree (1,1,5,5,1)
- Mercury [water, surface water]: 4.99996e-7 kg; lognormal variance with pedigree 0.042, pedigree (1,1,5,5,1)
- Chloride [water, surface water]: 0.189998 kg; lognormal variance with pedigree 0.042, pedigree (1,1,5,5,1)
- Oils, unspecified [water, surface water]: 4.99996e-7 kg; lognormal variance with pedigree 0.042, pedigree (1,1,5,5,1)
- TOC, Total Organic Carbon [water, surface water]: 5.99995e-6 kg; lognormal variance with pedigree 0.042, pedigree (1,1,5,5,1)
- NMVOC, non-methane volatile organic compounds, unspecified origin [air, urban air close to ground]: 0.00105999 kg; lognormal variance with pedigree 0.042, pedigree (1,1,5,5,1)
- Hydrocarbons, unspecified [water, surface water]: 3.24997e-5 kg; lognormal variance with pedigree 0.042, pedigree (1,1,5,5,1)
- Carbon monoxide, fossil [air, urban air close to ground]: 0.000999991 kg; lognormal variance with pedigree 0.042, pedigree (1,1,5,5,1)
- Suspended solids, unspecified [water, surface water]: 0.000999991 kg; lognormal variance with pedigree 0.042, pedigree (1,1,5,5,1)
- Ethane, 1,2-dichloro- [air, urban air close to ground]: 1.99998e-6 kg; lognormal variance with pedigree 0.042, pedigree (1,1,5,5,1)
- Acidity, unspecified [water, surface water]: 1.99998e-5 kg; lognormal variance with pedigree 0.042, pedigree (1,1,5,5,1)
- Bromate [water, surface water]: 4.99996e-7 kg; lognormal variance with pedigree 0.042, pedigree (1,1,5,5,1)
- Chlorine [air, urban air close to ground]: 1.99998e-6 kg; lognormal variance with pedigree 0.042, pedigree (1,1,5,5,1)
- Copper, ion [water, surface water]: 4.99996e-7 kg; lognormal variance with pedigree 0.042, pedigree (1,1,5,5,1)
- Hydrocarbons, aromatic [air, urban air close to ground]: 4.99996e-7 kg; lognormal variance with pedigree 0.042, pedigree (1,1,5,5,1)
- Dissolved solids [water, surface water]: 2.59998e-5 kg; lognormal variance with pedigree 0.042, pedigree (1,1,5,5,1)
- Carbon dioxide, fossil [air, urban air close to ground]: 2.29998 kg; lognormal variance with pedigree 0.042, pedigree (1,1,5,5,1)
- Hydrogen chloride [air, urban air close to ground]: 0.000179998 kg; lognormal variance with pedigree 0.042, pedigree (1,1,5,5,1)
- Lead [air, urban air close to ground]: 4.99996e-7 kg; lognormal variance with pedigree 0.042, pedigree (1,1,5,5,1)
- Particulates, > 2.5 um, and < 10um [air, urban air close to ground]: 0.00214998 kg; lognormal variance with pedigree 0.042, pedigree (1,1,5,5,1)
- DOC, Dissolved Organic Carbon [water, surface water]: 5.99995e-6 kg; lognormal variance with pedigree 0.042, pedigree (1,1,5,5,1)
  Calculated as equal to TOC.
- AOX, Adsorbable Organic Halogen as Cl [water, surface water]: 4.99996e-7 kg; lognormal variance with pedigree 0.042, pedigree (1,1,5,5,1)
- Methane, fossil [air, urban air close to ground]: 0.0139999 kg; lognormal variance with pedigree 0.042, pedigree (1,1,5,5,1)
- Sulfate [air, urban air close to ground]: 4.89996e-7 kg; lognormal variance with pedigree 0.042, pedigree (1,1,5,5,1)
- Chlorine [water, surface water]: 4.99996e-7 kg; lognormal variance with pedigree 0.042, pedigree (1,1,5,5,1)
- Ammonia [air, urban air close to ground]: 4.99996e-7 kg; lognormal variance with pedigree 0.042, pedigree (1,1,5,5,1)
- Ammonium, ion [water, surface water]: 9.99991e-7 kg; lognormal variance with pedigree 0.042, pedigree (1,1,5,5,1)
- Hydrogen fluoride [air, urban air close to ground]: 6.99994e-6 kg; lognormal variance with pedigree 0.042, pedigree (1,1,5,5,1)
- Sulfate [water, surface water]: 0.00389997 kg; lognormal variance with pedigree 0.042, pedigree (1,1,5,5,1)
- Hydrogen sulfide [air, urban air close to ground]: 4.99996e-7 kg; lognormal variance with pedigree 0.042, pedigree (1,1,5,5,1)
- Potassium, ion [water, surface water]: 4.99996e-7 kg; lognormal variance with pedigree 0.042, pedigree (1,1,5,5,1)
- Nitrogen oxides [air, urban air close to ground]: 0.0139999 kg; lognormal variance with pedigree 0.042, pedigree (1,1,5,5,1)
- Water [air, unspecified]: 0.0104529 m3; name water_to_air_unspecified; lognormal variance with pedigree 0.0827, pedigree (2,2,5,5,1)
  Calculated value based on literature values and expert opinion. See comments in the parametres' comment field.
  property fraction, origin: fresh water 0.0140047; name fraction_origin_fresh_water
  property fraction, origin: salt water 2.94175e-6; name fraction_origin_salt_water
  property fraction, origin: unspecified 0.985992; name fraction_origin_unspecified
- Chlorate [water, surface water]: 4.99996e-7 kg; lognormal variance with pedigree 0.042, pedigree (1,1,5,5,1)
- Water [water, unspecified]: 0.0191711 m3; name water_to_water_unspecified; lognormal variance with pedigree 0.0827, pedigree (2,2,5,5,1)
  (same comment as for Water)
  property fraction, origin: fresh water 0.0296125; name fraction_origin_fresh_water_Ww
  property fraction, origin: unspecified 0.970381; name fraction_origin_unspecified_Ww
  property fraction, origin: salt water 6.22024e-6; name fraction_origin_salt_water_Ww
  property wet mass 1000 kg; name WM
  property carbon content, fossil 0; name C_content_fossil
  property carbon content, non-fossil 0; name C_content_non_fossil
  property dry mass 0 kg; name DM
  property water in wet mass 1000 kg; name WWM
- Hydrocarbons, chlorinated [air, urban air close to ground]: 0.00339997 kg; lognormal variance with pedigree 0.042, pedigree (1,1,5,5,1)
- Dinitrogen monoxide [air, urban air close to ground]: 4.99996e-7 kg; lognormal variance with pedigree 0.042, pedigree (1,1,5,5,1)
- Sulfur dioxide [air, urban air close to ground]: 0.0129999 kg; lognormal variance with pedigree 0.042, pedigree (1,1,5,5,1)
- Magnesium [water, surface water]: 7.99993e-6 kg; lognormal variance with pedigree 0.042, pedigree (1,1,5,5,1)
- Sulfide [water, surface water]: 1.79998e-5 kg; lognormal variance with pedigree 0.042, pedigree (1,1,5,5,1)
- Phenol [water, surface water]: 3.99996e-6 kg; lognormal variance with pedigree 0.042, pedigree (1,1,5,5,1)
- Fluoride [water, surface water]: 4.99996e-7 kg; lognormal variance with pedigree 0.042, pedigree (1,1,5,5,1)

## Sampling procedure
Data represent a large share of the European production. Due to the cummulated data source for the product system invetory there are important parameters as land use or soil emissions missing in this dataset. Considered are only emissions stated in the original source of Boustead.

## Extrapolations
none This dataset has been copied from an original dataset covering the geography RER. The uncertainty has been adjusted accordingly.

## Review by Roland Hischier 2010-04-06
passed.
