# treatment of stalk, in wood heater 6kW

Dataset: EcoSpold 2, unit process
Geography: IN
Time period: 2017-01-01 to 2019-12-31
Technology level: current
Classification: EcoSpold01Categories: wood energy/heating systems
Classification: ISIC rev.4 ecoinvent: 3530:Steam and air conditioning supply
Scenario: Business-as-Usual
System model: Allocation at the point of substitution
Generated by: Avraam Symeonidis
Database: ecoinvent
isCopyrightProtected: true
accessRestrictedTo: 1

## General comment
This dataset is an estimation of the treatment of average stalk (from kenaf and jute) in a wood heater of 6KW capacity. The emissions have been calculated based on standard emission factors of hardwood combustion in this type of furnace. Stalk has average dry mass content of 89% and a lower calorific value of 13.8 MJl/kg fresh mass.

## Included activities start
From reception of stalk at wood heater

## Included activities end
This activity ends with the production of heat from stalk combustion. The dataset includes the emissions to air and the disposal of ashes. The dataset doesn't include heat losses of heat distribution in a local district heating network.

## Geography
The original dataset for logs, hardwood, from forest, burned in wood heater 6kW is made for Swiss conditions and assumed to be valid for stalk in a global geography

## Technology
Stalk is known to have similar composition to hardwood. The 6kW wood heater serves as a proxy for the combustion of stalk for cooking and heating purposes. Technical details of the 6 kW wood combustion plant:

## Time period
based on temporal validity of dataset logs, hardwood, from forest burned in wood heater 6kW

## Reference product
- stalk: 0 kg; name stalk_RP; CPC 0192: Fibre crops; By-product classification allocatable product
  production volume 0 kg; name stalk_PV; = 9.4142E+08 + 3308500000 + 1417900000
    Production volume refers to kenaf stalk, jute stalk (rainfed production) and jute stalk (irrigated). The production volumes are obtained from jute production and kenaf production volumes, based on the production of the reference product fibres.
  property carbon content, non-fossil 0.38936; name stalk_RP_C_content_non_fossil; = (0.39624+0.38248)/2
    biogene carbon content on a dry matter basis. Average carbon content of jute and kenaf stalk
    Composition data obtained from Corn Stover Mature (Stalks), in (http://beefmagazine.com/images/2009%20feed%20table.pdf). First, composition data were refered to 1 kg dry mass. Then, C-contents were calculated considering a C-content/dry mass of 46% in carbohydrates (including fibres), 53% in proteins and 75% in fats. All data from "Evolutionary and Biochemical Aspects", A.D. Kay and T. Vrede (in Global Ecology, 2010, Elsevier B.V., S.E. Jørgensen Ed.).
  property dry mass 0.8949 kg; name stalk_RP_DM
  property price 0.00702 EUR2005; name stalk_RP_price_EUR2005
    Temporary price data.The price of jute fibre is 0.227 Euro (calculated as 90% of purchasers price based on: 2005 import and export prices (total trades (USD) divided by total weight (kg) in biggest economies of the world: EU27, USA, Brasil, China, India, Japan and Russia) from UN Commodity Trade Statistics Database (http://data.un.org/Explorer.aspxDatabase [Accessed 2011.06.20]). Commodity: Jute and other textile bast fibres, raw or retted)). When producing 1kg of jute fibre, 1.7027kg of stalk is produced as a by-product. The economic allocation factor in eiv2.2 was 95% for jute fibre and 5% for stalk. Following this assumption the price of the stalk is calculated to be ((0.05*0.227)/(1.7027-0.05*1.7027)=) 0.007 Euro.
  property heating value, net 13.794 MJ; name stalk_RP_Net_Heat_Value; = 3300* 4.18E-3
    net (lower) heating (calorific) value. lower calorific value of jute stalk is 3300 kcal/kg (CDM, CER methodology)
  property carbon content 0.38936
    carbon content on a dry matter basis (reserved; not for manual entry)
  properties: carbon content, fossil 0, wet mass 1 kg, water content 0.117443, water in wet mass 0.1051 kg, carbon allocation 0.348438 kg
- heat, central or small-scale, other than natural gas: 1 MJ; By-product classification allocatable product; CPC 17300: Steam and hot water; pedigree (1,1,1,1,1)
  based on stalk input (in kg), lower calorific value (13.8MJ/kg fresh mass) and calorific efficiency of heater (75%)
  production volume 5.86619e10 MJ

## By-products
- heat, central or small-scale, other than natural gas: 0 MJ; name heat_output; = stalk_RP*(-1)*13.8*0.75; By-product classification allocatable product; CPC 17300: Steam and hot water; pedigree (1,1,1,1,1)
  (same comment as for heat, central or small-scale, other than natural gas)
  production volume 0 MJ; = stalk_PV* heat_output
    Calculated from production volume of reference product and relative outputs
  property price 0.0106 EUR2005; name heat_output_price_EUR2005
    Average European district heat price from Ecoheatcool and Euroheat 2005-2006, Ecoheat Work package 1: The European heat market. Final report. 10.6 EUR/GJ i s the price of district heat. http://www.solarthermalworld.org/files/Ecoheatcool%20WP1%20Web.pdf?download
- heat, for reuse in municipal waste incineration only: 0 MJ; CPC 17300: Steam and hot water; By-product classification allocatable product; pedigree (1,1,1,1,1)
  Net electricity generated from this waste and used in internal MSWI plant energy redistribution.
  Uncertainty: uncertainty is calculated from uncertainties in waste composition and uncertainties in energy efficiency and the uncertainty in internal energy demand
  property exergy 0.1842 MJ; name E_th_prod_MSWI_exergy
    This exergy property is based on the exergy content of the product.
  property price 0.0106 EUR2005; name E_th_prod_MSWI_price_EUR2005
    (same comment as for heat, central or small-scale, other than natural gas)
  property true value relation 0.1842; name E_th_prod_MSWI_true_value_relation
    property to calculate "true value" from
- electricity, for reuse in municipal waste incineration only: 0 kWh; CPC 17100: Electrical energy; By-product classification allocatable product; pedigree (1,1,1,1,1)
  (same comment as for heat, for reuse in municipal waste incineration only)
  property price 0.1 EUR2005; name E_el_prod_MSWI_price_EUR2005
    Estimated to be the same price as in case of electricity, medium voltage.
  property exergy 3.6 MJ; name E_el_prod_MSWI_exergy
    This exergy property is based on the exergy content of the product.
  property true value relation 3.6; name E_el_prod_MSWI_true_value_relation
    property to calculate "true value" from

## Inputs from technosphere
- furnace, logs, hardwood storage area, 6kW: 0 unit; = (1/(28800*20*0.75))* heat_output; source Bauer, C. 2007; pedigree (1,1,1,1,1)
  EcoSpold01Location=CH
  based on utilisation rate of infrastructure (75%) and its lifetime capacity, calculated with the annual energy produced in the furnace (28800MJ/y) multiplied by its lifetime (20y).
  The infrastructure needed is then calculated as:
  required infrastructure (unit/reference unit)=1/(utilisation rate * lifetime capacity)
- wood ash mixture, pure: 0 kg; name ash_output; = 0.001* stalk_RP*(-1)* stalk_RP_DM; source Schmocker A. 2002; pedigree (1,1,1,1,1)
  EcoSpold01Location=CH
  Estimation. Based on ash produced in logs combustion. An average of 1% of the dry mass of wood accrue as ash (personal communication, Keel A., Holzenergie Schweiz, Juni 2002). The same is estimated for stalk.
  production volume 0 kg; = ash_output* stalk_PV
    Calculated from production volume of reference product and relative outputs
  property price 0 EUR2005; name ash_output_price_EUR2005
  properties: carbon content, non-fossil 0.012, dry mass 1 kg, wet mass 1 kg
- jute plant, harvested: 0.0133686 kg; lognormal variance with pedigree 0.0069, pedigree (2,2,2,1,1)
  The output of the jute cultivation activity. Mature jute plant s harvested. Jute is generally harvested when the plants are at early pod stage. The harvest index remains more or less constant over 60–105 day period following sowing. However, it reaches its peak during 110-120 day period following sowing.
  The plants are usually cut close to the ground by hand. A curved, sickle type knife is used to cut the plants. The plants are then sorted out according to height and diameter. The assorted plants are tied into bundles. Each bundle weighs 8-10 kg. The bundles are kept standing in the field for 3–4 days for defoliation.
- transport, freight, lorry, unspecified: 0.002548 metric ton*km; lognormal variance with pedigree 0.0088, pedigree (4,1,2,1,1)
  The plants are transported from nearby fields; the estimated distance is 15 km.
- stalk: -0.0425515 kg
  production volume 1.96e9 kg
- jute plant, harvested: 0.0782491 kg; lognormal variance with pedigree 0.0108, pedigree (4,4,2,1,1)
  Dry retted fibre yield is 6.5% of total plant volume (fresh green matter)
- electricity, low voltage: 0.000854514 kWh; lognormal variance with pedigree 0.0028, pedigree (1,4,2,1,1)
  sum of electricity used for retting water extraction and water ribbioning
- kenaf plant, harvested: 0.0782491, 0.0782491 kg (2 suppliers, which the file names only by identifier); sum of these 0.156498 kg; lognormal variance with pedigree 0.1708, pedigree (5,5,2,5,5)
  Dry retted fibre yield is 6.5% of total plant volume (fresh green matter)
- jute plant, harvested: 0.0494334 kg; lognormal variance with pedigree 0.0169, pedigree (2,2,2,5,3)
  (same comment as for jute plant, harvested)
- electricity, low voltage: 7.08575e-6, 1.24275e-6, 2.81857e-5, 2.04358e-5, 0.000309049, 0.000102711, 5.09412e-5, 0.000145104 kWh (8 suppliers, which the file names only by identifier); sum of these 0.000664755 kWh; lognormal variance with pedigree 0.0048, pedigree (1,4,2,5,1)
  sum of electricity used for retting water extraction and water ribbioning

## Inputs from nature
- Water, unspecified natural origin [natural resource, in water]: 0.000160883 m3; lognormal variance with pedigree 0.123777, pedigree (4,1,2,1,1)
  1 kg jute fibre as output of retting process requires 2.4 kg fresh jute. Again, the minimum ratio of plant material to water in stagnant water should be 1:20.
- Water, lake [natural resource, in water]: 0.00307471 m3; lognormal variance with pedigree 0.0108, pedigree (4,4,2,1,1)
  170 kgs of water converted to m3. No wastewater output is considere as the retting process is usually accomplished on jute growing fields or in canals and the wastewater either gets diluted or washed away

## Emissions to nature
- Dinitrogen monoxide [air, urban air close to ground]: 0 kg; = (stalk_RP*(-1) * 13.8)*7*1/1E6; source Hasler 2001; pedigree (1,1,1,1,1)
  Estimation. Based on standard emission factors for wood combustion (mg /MJ input) and lower calorific value. (Emission factors are given in report 06_IX, pg61)
- Toluene [air, urban air close to ground]: 0 kg; = (stalk_RP*(-1) * 13.8)*0.3*1/1E6; source Jungbluth N. 2002; pedigree (1,1,1,1,1)
  (same comment as for Dinitrogen monoxide)
- Methane, non-fossil [air, urban air close to ground]: 0 kg; = (stalk_RP*(-1) * 13.8)*20*1/1E6; source Hasler 2001; pedigree (1,1,1,1,1)
  (same comment as for Dinitrogen monoxide)
- Chromium VI [air, urban air close to ground]: 0 kg; = (stalk_RP*(-1) * 13.8)*0.004*1/1E6; source Jungbluth N. 2002; pedigree (1,1,1,1,1)
  (same comment as for Dinitrogen monoxide)
- Carbon monoxide, non-fossil [air, urban air close to ground]: 0 kg; name CO_emission; = (stalk_RP*(-1)* stalk_RP_DM)*2.35E+4/1E6 *(16+12)/12; source Jungbluth N. 2002; pedigree (1,1,1,1,1)
  Estimation. Based on emission factor of C that is emitted as CO in hardwood combustion.
  The emission factor of C as CO in logs, hardwood is 2.35E+4 mgC/Kg dry mass. This has been calculated with the lower calorific value of wood (11666MJ/m3 = 17.95MJ/kg dry mass), the dry mass content (650 kg DM/m3) and considering the output of CO (0.003059 kg) in the production of 1 MJ heat with logs, hardwood.
  0.003059 kg CO*(1 mol CO/(12+16) kg)* (12 kg/1 mol C) = 0.013 kg C
  1MJ heat produced * (1 kg dry mass/17.95 MJ)=0.05 kg dry mass wood
  1311 mg C/0.05 kg dry mass = 2.35E+4 mg C / kg DM
  property molecular weight 28 g/mol; name CO_emission_MW
- Particulates, < 2.5 um [air, urban air close to ground]: 0 kg; = (stalk_RP*(-1)* 13.8)*117*1/1E6; source Hasler 2001; pedigree (1,1,1,1,1)
  (same comment as for Dinitrogen monoxide)
- Cadmium [air, urban air close to ground]: 0 kg; = (stalk_RP*(-1) * 13.8)*0.0007*1/1E6; source Jungbluth N. 2002; pedigree (1,1,1,1,1)
  (same comment as for Dinitrogen monoxide)
- Carbon dioxide, non-fossil [air, urban air close to ground]: 0 kg; name CO2_emission; = ((stalk_RP*(-1)* stalk_RP_C_content_non_fossil)-( CO_emission*1/ CO_emission_MW*12))*1/12* CO2_emission_MW; pedigree (1,1,1,1,1)
  Based on carbon content of stalk and deducted from carbon emissions that leave the system as CO.
  The mass of CO2 is calculated with the molecular weigh of C (12g/mol) and CO2.
  The carbon is emitted in the exhaust during wood combustion. A complete combustion is assumed, thus no carbon remains in the ash.
  property molecular weight 44 g/mol; name CO2_emission_MW
- Phosphorus [air, urban air close to ground]: 0 kg; = (stalk_RP*(-1) * 13.8)*0.3*1/1E6; source Jungbluth N. 2002; pedigree (1,1,1,1,1)
  (same comment as for Dinitrogen monoxide)
- Formaldehyde [air, urban air close to ground]: 0 kg; = (stalk_RP*(-1)* 13.8)*0.13*1/1E6; source Jungbluth N. 2002; pedigree (1,1,1,1,1)
  (same comment as for Dinitrogen monoxide)
- Nickel [air, urban air close to ground]: 0 kg; = (stalk_RP*(-1)* 13.8)*0.006*1/1E6; source Jungbluth N. 2002; pedigree (1,1,1,1,1)
  (same comment as for Dinitrogen monoxide)
- Nitrogen oxides [air, urban air close to ground]: 0 kg; = (stalk_RP*(-1) * 13.8)*160*1/1E6; source Hasler 2001; pedigree (1,1,1,1,1)
  (same comment as for Dinitrogen monoxide)
- Sulfur dioxide [air, urban air close to ground]: 0 kg; = (stalk_RP*(-1)* 13.8)*2.5*1/1E6; source Hasler 2001; pedigree (1,1,1,1,1)
  (same comment as for Dinitrogen monoxide)
- Hydrocarbons, aliphatic, alkanes, unspecified [air, urban air close to ground]: 0 kg; = (stalk_RP*(-1) * 13.8)*0.91*1/1E6; source Jungbluth N. 2002; pedigree (1,1,1,1,1)
  (same comment as for Dinitrogen monoxide)
- PAH, polycyclic aromatic hydrocarbons [air, urban air close to ground]: 0 kg; = (stalk_RP*(-1)* 13.8)*0.011*1/1E6; source Jungbluth N. 2002; pedigree (1,1,1,1,1)
  (same comment as for Dinitrogen monoxide)
- Phenol, pentachloro- [air, urban air close to ground]: 0 kg; = (stalk_RP*(-1) * 13.8)*8.1E-6*1/1E6; source Jungbluth N. 2002; pedigree (1,1,1,1,1)
  (same comment as for Dinitrogen monoxide)
- Acetaldehyde [air, urban air close to ground]: 0 kg; = (stalk_RP*(-1)* 13.8)*0.061*1/1E6; source Jungbluth N. 2002; pedigree (1,1,1,1,1)
  (same comment as for Dinitrogen monoxide)
- Manganese [air, urban air close to ground]: 0 kg; = (stalk_RP*(-1)* 13.8)*0.17*1/1E6; source Jungbluth N. 2002; pedigree (1,1,1,1,1)
  (same comment as for Dinitrogen monoxide)
- Sodium [air, urban air close to ground]: 0 kg; = (stalk_RP*(-1) * 13.8)*1.3*1/1E6; source Jungbluth N. 2002; pedigree (1,1,1,1,1)
  (same comment as for Dinitrogen monoxide)
- Magnesium [air, urban air close to ground]: 0 kg; = (stalk_RP*(-1) * 13.8)*0.36*1/1E6; source Jungbluth N. 2002; pedigree (1,1,1,1,1)
  (same comment as for Dinitrogen monoxide)
- Ammonia [air, urban air close to ground]: 0 kg; = (stalk_RP*(-1)* 13.8)*1.73*1/1E6; source Jungbluth N. 2002; pedigree (1,1,1,1,1)
  (same comment as for Dinitrogen monoxide)
- Fluorine [air, urban air close to ground]: 0 kg; = (stalk_RP*(-1)* 13.8)*0.05*1/1E6; source Jungbluth N. 2002; pedigree (1,1,1,1,1)
  (same comment as for Dinitrogen monoxide)
- Benzo(a)pyrene [air, urban air close to ground]: 0 kg; = (stalk_RP*(-1)* 13.8)*5E-4*1/1E6; source Jungbluth N. 2002; pedigree (1,1,1,1,1)
  (same comment as for Dinitrogen monoxide)
- NMVOC, non-methane volatile organic compounds, unspecified origin [air, urban air close to ground]: 0 kg; = (stalk_RP*(-1) * 13.8)*9.7*1/1E6; source Hasler 2001; pedigree (1,1,1,1,1)
  (same comment as for Dinitrogen monoxide)
- Benzene [air, urban air close to ground]: 0 kg; = (stalk_RP*(-1) * 13.8)*0.91*1/1E6; source Jungbluth N. 2002; pedigree (1,1,1,1,1)
  (same comment as for Dinitrogen monoxide)
- Chlorine [air, urban air close to ground]: 0 kg; = (stalk_RP*(-1)* 13.8)*0.18*1/1E6; source Jungbluth N. 2002; pedigree (1,1,1,1,1)
  (same comment as for Dinitrogen monoxide)
- Chromium [air, urban air close to ground]: 0 kg; = (stalk_RP*(-1)* 13.8)*0.004*1/1E6; source Jungbluth N. 2002; pedigree (1,1,1,1,1)
  (same comment as for Dinitrogen monoxide)
- Benzene, ethyl- [air, urban air close to ground]: 0 kg; = (stalk_RP*(-1)* 13.8)*0.03*1/1E6; source Jungbluth N. 2002; pedigree (1,1,1,1,1)
  (same comment as for Dinitrogen monoxide)
- Calcium [air, urban air close to ground]: 0 kg; = (stalk_RP*(-1)* 13.8)*5.85*1/1E6; source Jungbluth N. 2002; pedigree (1,1,1,1,1)
  (same comment as for Dinitrogen monoxide)
- Mercury [air, urban air close to ground]: 0 kg; = (stalk_RP*(-1) * 13.8)*0.0003*1/1E6; source Jungbluth N. 2002; pedigree (1,1,1,1,1)
  (same comment as for Dinitrogen monoxide)
- Lead [air, urban air close to ground]: 0 kg; = (stalk_RP*(-1)* 13.8)*0.025*1/1E6; source Jungbluth N. 2002; pedigree (1,1,1,1,1)
  (same comment as for Dinitrogen monoxide)
- Bromine [air, urban air close to ground]: 0 kg; = (stalk_RP*(-1)* 13.8)*0.06*1/1E6; source Jungbluth N. 2002; pedigree (1,1,1,1,1)
  (same comment as for Dinitrogen monoxide)
- Arsenic [air, urban air close to ground]: 0 kg; = (stalk_RP*(-1) * 13.8)*0.001*1/1E6; source Jungbluth N. 2002; pedigree (1,1,1,1,1)
  (same comment as for Dinitrogen monoxide)
- m-Xylene [air, urban air close to ground]: 0 kg; = (stalk_RP*(-1) * 13.8)*0.12*1/1E6; source Jungbluth N. 2002; pedigree (1,1,1,1,1)
  Estimation. Based on standard emission factors for wood combustion (mg /MJ input) (Emission factors are given in report 06_IX, pg61)
- Copper [air, urban air close to ground]: 0 kg; = (stalk_RP*(-1) * 13.8)*0.022*1/1E6; source Jungbluth N. 2002; pedigree (1,1,1,1,1)
  (same comment as for Dinitrogen monoxide)
- Benzene, hexachloro- [air, urban air close to ground]: 0 kg; = (stalk_RP*(-1) * 13.8)*7.2E-9*1/1E6; source Jungbluth N. 2002; pedigree (1,1,1,1,1)
  (same comment as for Dinitrogen monoxide)
- Zinc [air, urban air close to ground]: 0 kg; = (stalk_RP*(-1)* 13.8)*0.3*1/1E6; source Jungbluth N. 2002; pedigree (1,1,1,1,1)
  (same comment as for Dinitrogen monoxide)
- Dioxins, measured as 2,3,7,8-tetrachlorodibenzo-p-dioxin [air, urban air close to ground]: 0 kg; = (stalk_RP*(-1) * 13.8)*3.1E-8*1/1E6; source Jungbluth N. 2002; pedigree (1,1,1,1,1)
  (same comment as for Dinitrogen monoxide)
- Potassium [air, urban air close to ground]: 0 kg; = (stalk_RP*(-1) * 13.8)*0.0003*1/1E6; source Jungbluth N. 2002; pedigree (1,1,1,1,1)
  (same comment as for Dinitrogen monoxide)
- Hydrocarbons, aliphatic, unsaturated [air, urban air close to ground]: 0 kg; = (stalk_RP*(-1)* 13.8)*3.1*1/1E6; source Jungbluth N. 2002; pedigree (1,1,1,1,1)
  (same comment as for Dinitrogen monoxide)
- Water [water, surface water]: 0.00323559 m3; lognormal variance with pedigree 0.123777, pedigree (4,1,2,1,1)

## Sampling procedure
Data is adapted from a wood heater of 6kw capacity.

## Extrapolations
The infrastructure and emission factors are extrapolated from a wood heater of 6kW. The data is originally based on swiss conditions and is assumed valid for global conditions and similarly dimensioned wood combustion plants with a nominal capacity up to 20 kW.
