# petroleum and gas production, on-shore

Dataset: EcoSpold 2, unit process
Geography: US
Time period: 1999-01-01 to 2019-12-31
Technology level: current
Classification: ISIC rev.4 ecoinvent: 0610:Extraction of crude petroleum
Classification: EcoSpold01Categories: oil/production
Tags: Combined Production; combined production
Scenario: Business-as-Usual
System model: Allocation at the point of substitution
Share of production covered: 57 %
Generated by: Gregor Wernet
Published in: Jungbluth, N. 2007
Database: ecoinvent
isCopyrightProtected: true
accessRestrictedTo: 1

## General comment
The multioutput-process 'combined gas and oil production' delivers the co-products crude oil and natural gas. Allocation for co-products is based on heating value.

## Included activities end
Production of oil and gas including energy use, infrastructure and emissions.

## Technology
Data source is mainly onshore production in the Niger delta, unless otherwise noted.

## Time period
Most data could be found for 1999-2000.

## Reference product
- natural gas, high pressure: 1 m3; name natural_gas; CPC 12020: Natural gas, liquefied or in the gaseous state; By-product classification allocatable product
  production volume 1.98082e11 m3; name natural_gas_PV
    m3 of natural gas produced on-shore in co-production with petroleum, in the US in 2012 (BP, 2014). Value converted from BP LHV (1 cubic meter natural gas in (BP, 2014) corresponds to 0.9 kg oil equivalent. 1 kg oil equivalent corresponds to 42 MJ) to ecoinvent standard LHV of 39MJ/m3. (The source does not specify if the cubic meters are standard or norm cubic meters. See 2015, Faist Emmenegger, Mireille, Del Duce, Andrea; Zah, Rainer, Update and extension of the inventory data for energy gases, 3 - SeparatePublication.) It is further estimated that app. 70% of natural gas is produced in stand alone production activities and the rest is produced in activities where both natural gas and petroleum are produced and that all combined oil and gas production is on-shore. Refrence(s): BP (2014). Statistical Review of World Energy, June 2014. Retrieved online from http://www.bp.com/content/dam/bp/excel/energy-economics/statistical-review-2015/bp-statistical-review-of-world-energy-2015-workbook.xlsx, 30 August, 2017
  property amount in multioutput activity_m3 1.35e10 m3; name natural_gas_amount_MO_m3
  property price 0.166 EUR2005; name natural_gas_price_EUR2005
    Temporary price data. Calculated as 90% of purchasers price based on: 2005 price for Europe-27 Import (US$ and kg) in UN Commodity Trade Statistics Database - Natural gas in gaseous state (http://data.un.org/Data.aspx?q=natural+gas&d=ComTrade&f=_l1Code%3a28%3bcmdCode%3a271121; accessed 4 January 2011), using density of natural gas of 0.8 kg/m3 for unit conversion.
  property carbon content, fossil 0.602381
    An average C content of 0.506 kg C/ m3 has been assumed (this average has been calculated using data in Tab 3.5, ecoinvent v2.2 report 6_V
  property carbon content 0.602381
    carbon content on a dry matter basis (reserved; not for manual entry)
  property true value 2.241e9; name natural_gas_true_value
    allocation property applied in "true value" allocation // value calculated from revenue
  properties: water in wet mass 0 kg, carbon content, non-fossil 0, water content 0, heating value, gross 0 MJ, dry mass 0.84 kg, wet mass 0.84 kg, carbon allocation 0.506 kg
- petroleum: 0 kg; CPC 12010: Petroleum oils and oils obtained from bituminous minerals, crude; By-product classification allocatable product
  EcoSpold01Location=NG
  production volume 0 kg; name petroleum_PV
    kg of petroleum produced in the US amounts to 394.13 million tonnes in 2012 (BP, 2014). It is estimated that 9% of petroleum is produced stand-alone, the rest in combined production with natural gas. Refrence(s): BP (2014). Statistical Review of World Energy, June 2014. Retrieved online from http://www.bp.com/content/dam/bp/excel/energy-economics/statistical-review-2015/bp-statistical-review-of-world-energy-2015-workbook.xlsx, 30 August, 2017
  property price 0.192 EUR2005
    Temporary price data. Calculated as 90% of purchasers price based on: Crude oil prices from U.S. energy information administration_Independent statistics and analysis: Weekly All Countries Spot Price FOB Weighted by Estimated Export Volume (Dollars per Barrel) (http://tonto.eia.doe.gov/dnav/pet/pet_pri_wco_k_w.htm; accessed 06072010). Conversion factors - 0.159 m3/barrel with crude oil density of 853 kg/m3
  property amount in multioutput activity_kg 1.07e11 kg; name petroleum_amount_MO_kg
  property carbon content, fossil 0.85
    C-content of crude oil is 83-87% (ecoinven report 6_IV, Tab 3.2). An average C-content of 0.85 kg C/kg crude oil was considered
  property carbon content 0.85
    carbon content on a dry matter basis (reserved; not for manual entry)
  properties: water in wet mass 0 kg, water content 0, dry mass 1 kg, wet mass 1 kg, carbon content, non-fossil 0, carbon allocation 0.85 kg

## By-products
- electricity, for reuse in municipal waste incineration only: 0 kWh; CPC 17100: Electrical energy; By-product classification allocatable product; pedigree (1,1,1,1,1)
  Net electricity generated from this waste and used in internal MSWI plant energy redistribution.
  Uncertainty: uncertainty is calculated from uncertainties in waste composition and uncertainties in energy efficiency and the uncertainty in internal energy demand
  production volume 1.82402e6 kWh
  property exergy 3.6 MJ; name E_el_prod_MSWI_exergy
    This exergy property is based on the exergy content of the product.
  property true value relation 3.6; name E_el_prod_MSWI_true_value_relation
    property to calculate "true value" from
  property price 0.1 EUR2005; name E_el_prod_MSWI_price_EUR2005
    Estimated to be the same price as in case of electricity, medium voltage.
  property true value 13005
    allocation property applied in "true value" allocation // value calculated from true value relation
- heat, for reuse in municipal waste incineration only: 0 MJ; CPC 17300: Steam and hot water; By-product classification allocatable product; pedigree (1,1,1,1,1)
  Net useful heat generated from this waste and used in internal MSWI plant energy redistribution.
  Uncertainty: uncertainty is calculated from uncertainties in waste composition and uncertainties in energy efficiency and the uncertainty in internal energy demand
  production volume 1.34739e7 MJ
  property true value relation 0.1842; name E_th_prod_MSWI_true_value_relation
    property to calculate "true value" from
  property exergy 0.1842 MJ; name E_th_prod_MSWI_exergy
    This exergy property is based on the exergy content of the product.
  property price 0.0106 EUR2005; name E_th_prod_MSWI_price_EUR2005
    Average European district heat price from Ecoheatcool and Euroheat 2005-2006, Ecoheat Work package 1: The European heat market. Final report. 10.6 EUR/GJ i s the price of district heat. http://www.solarthermalworld.org/files/Ecoheatcool%20WP1%20Web.pdf?download
  property true value 4915.4
    (same comment as for electricity, for reuse in municipal waste incineration only)
- zinc concentrate: 0 kg; CPC 14290: Other non-ferrous metal ores and concentrates (other than uranium or thorium ores and concentrates); By-product classification allocatable product
  Calculated value from the knowledge of the properties of both products.
  production volume 5.83598e-6 kg
  property price 0.38 EUR2005; name ByP_price_EUR2005
    Temporary price data. Calculated as 90% of purchasers price based on: Zinc content in concentrate 53%. Concentrate price per kg Zn 86.5% of refined Zn price (13.5% treatment charges according to CHR Metals Limited 2005: Dynamic cost curves. http://www.minecost.com/dynamic.pdf). 2004 zinc price from USGS (2007) Mineral commodity summaries 2007. <http://minerals.usgs.gov/minerals/pubs/mcs/2007/mcs2007.pdf> [Accessed 25 May 2010]
  property zinc content 0.53; name zinc_C_zinc_concentrate
    Zinc content on a dry matter basis. Value taken from teh "zinc mine operation" /GLO dataset.
  property dry mass 1 kg; name DM_zinc_concentrate
  property carbon content 0
    carbon content on a dry matter basis (reserved; not for manual entry)
  property true value 1.22197e-7
    allocation property applied in "true value" allocation // value calculated from revenue
  properties: wet mass 1 kg, water content 0, carbon content, non-fossil 0, carbon content, fossil 0, water in wet mass 0 kg, carbon allocation 0 kg
- iron scrap, sorted, pressed: 0 kg; By-product classification Recyclable; CPC 39310: Slag, dross, scalings and other waste from the manufacture of iron or steel; pedigree (1,1,1,1,1)
  Iron scrap recovered from this waste.
  Uncertainty: uncertainty calculated from uncertainty in waste composition, uncertainty of share of recyclable metal, uncertainty of transfer coefficient to bottom ash, uncertainty of the efficiency of scrap removal in MSWI plant.
  production volume 229658 kg
  property price 0.175 EUR2005
    Temporary price data. Calculated as 90% of purchasers price based on: 2005 import and export prices (total trades (USD) divided by total weight (kg) in biggest economies of the world: EU27, USA, Brasil, China, India, Japan and Russia) from UN Commodity Trade Statistics Database (http://data.un.org/Explorer.aspxDatabase [Accessed 2011.06.20]). Commodity: Waste or scrap, of cast iron
  property carbon content 0
    carbon content on a dry matter basis (reserved; not for manual entry)
  property true value 2214.54
    allocation property applied in "true value" allocation // value calculated from revenue
  properties: dry mass 1 kg, water content 0, carbon content, non-fossil 0, water in wet mass 0 kg, carbon content, fossil 0, wet mass 1 kg, carbon allocation 0 kg
- iron scrap, unsorted: 0 kg; source European Aluminium Association 2008; CPC 39310: Slag, dross, scalings and other waste from the manufacture of iron or steel; By-product classification Recyclable; pedigree (1,1,1,1,1)
  production volume 6.53403 kg
  property price 0.149 EUR2005; name ironScrapAmount_price_EUR2005
    Temporary price data. Calculated as 90% of purchasers price based on: estimated at 85% of sorted scrap
  property carbon content 0
    carbon content on a dry matter basis (reserved; not for manual entry)
  property true value 0.0536451
    allocation property applied in "true value" allocation // value calculated from revenue
  properties: water in wet mass 0 kg, water content 0, carbon content, fossil 0, carbon content, non-fossil 0, dry mass 1 kg, wet mass 1 kg, carbon allocation 0 kg
- aluminium oxide, non-metallurgical: 0 kg; source European Aluminium Association 2008; CPC 41432: Alumina (aluminium oxide), except artificial corundum; By-product classification allocatable product; CAS 1344-28-1; pedigree (1,1,1,1,1)
  production volume 411.162 kg
  property carbon content, non-fossil 0; name C_content_non_fossil
  property price 0.28 EUR2005; name Al2O3Amount_price_EUR2005
    From UN trade database. http://data.un.org/ Import data from the largest economies of the world are used (Brazil, India, USA, China, Japan and EU-27).
  property dry mass 1 kg; name DM
  property water content 0; name water_content
  property wet mass 1 kg; name WM
  property water in wet mass 0 kg; name WWM
  property carbon content, fossil 0; name C_content_fossil
  property carbon content 0
    carbon content on a dry matter basis (reserved; not for manual entry)
  property true value 6.34357
    allocation property applied in "true value" allocation // value calculated from revenue
  properties: carbon allocation 0 kg
- aluminium, cast alloy: 0 kg; source European Aluminium Association 2008; By-product classification allocatable product; CPC 41431: Unwrought aluminium; pedigree (1,1,1,1,1)
  EcoSpold01Location=RER
  production volume 3843.45 kg
  property price 1.3 EUR2005; name castAlloyAmount_price_EUR2005
    Temporary price data. Calculated as 90% of purchasers price based on: Source: London Metal Exchange, Aluminium alloy price for 2005
  property carbon content 0
    carbon content on a dry matter basis (reserved; not for manual entry)
  property true value 275.314
    allocation property applied in "true value" allocation // value calculated from revenue
  properties: water in wet mass 0 kg, carbon content, non-fossil 0, water content 0, dry mass 1 kg, carbon content, fossil 0, wet mass 1 kg, carbon allocation 0 kg
- aluminium, wrought alloy: 0 kg; source European Aluminium Association 2008; By-product classification allocatable product; CPC 4153: Semi-finished products of aluminium or aluminium alloys; pedigree (1,1,1,1,1)
  production volume 1682.59 kg
  property price 1.44 EUR2005; name secondaryAluminiumOutput_price_EUR2005
    Estimated based on literature values and expert judgement. Aluminium ccast alloys are about 90% of the price of aluminium wrought alloys.
  property carbon content 0
    carbon content on a dry matter basis (reserved; not for manual entry)
  property true value 133.507
    allocation property applied in "true value" allocation // value calculated from revenue
  properties: wet mass 1 kg, water content 0, carbon content, fossil 0, water in wet mass 0 kg, carbon content, non-fossil 0, dry mass 1 kg, carbon allocation 0 kg
- copper: 0 kg; source Rentz O. 1999; By-product classification allocatable product; CPC 41413: Refined copper and copper alloys, unwrought; master alloys of copper
  Literature value. Copper uses: Before end-use copper is manufactured into semi fabricated products, such as shapes and ingots (known as 'semis'). These manufacturing processes are subdivided into hot working, cold working and, if necessary, process annealing. Few of the semis are ready for use as such. They more typically travel to first-stage manufacturers, who make metal rods, wire, and casting, and then to component manufacturers who produce such things as motors, valves, and insulated cables The components in turn are incorporated by final-stage manufacturers into a variety of finished products - automobiles, commercial buildings, residential housing, and so forth. These uses account for about 79% of the world-wide consumption of copper.
  production volume 7310.03 kg
  property price 5.52 EUR2005
    Literature value (http://www.economist.com/news/business/21576714-mining-industry-has-enriched-chile-its-future-precarious-copper-solution). Average price between 20015 and 2013.
  property carbon content 0
    carbon content on a dry matter basis (reserved; not for manual entry)
  property true value 2223.42
    allocation property applied in "true value" allocation // value calculated from revenue
  properties: dry mass 1 kg, water in wet mass 0 kg, wet mass 1 kg, carbon content, non-fossil 0, water content 0, carbon content, fossil 0, carbon allocation 0 kg

## Inputs from technosphere
- low level radioactive waste: -1.67516e-9 m3; name low_level_waste; = (low_level_waste_amount_MO_m3*(0.5* petroleum +0.5*natural_gas *0.84)/(0.5* 107000000000 +0.5*13500000000 *0.84))*-1; lognormal variance with pedigree 0.37, pedigree (3,5,5,5,3)
  EcoSpold01Location=CH
  Generic value, basic uncertainty estimated = 3
  Uncertainty: Generic value, basic uncertainty estimated = 3. Uncertainty has been increased to reflect the extrapolation from a different region.
  production volume 410.422 m3; = low_level_waste_amount_MO_m3*(0.5* petroleum_PV +0.5*natural_gas_PV *0.84)/(0.5* 107000000000 +0.5*13500000000 *0.84)
    Calculated from the production volume of reference products
  property amount in multioutput activity_m3 236 m3; name low_level_waste_amount_MO_m3
  property price 0 EUR2005; name low_level_waste_price_EUR2005
  properties: wet mass 2500 kg, dry mass 2500 kg
- sweet gas, burned in gas turbine: 1.1428 MJ; name sweet_gas_burned; = sweet_gas_burned_amount_MO_MJ*(0.5* petroleum +0.5*natural_gas *0.84)/(0.5* 107000000000 +0.5*13500000000 *0.84); lognormal variance with pedigree 0.1932, pedigree (2,3,5,5,5)
  Environmental report + questionnaire
  EcoSpold01Location=NO
  Uncertainty: Environmental report + questionnaire. Uncertainty has been increased to reflect the extrapolation from a different region.
  property amount in multioutput activity_MJ 1.61e11 MJ; name sweet_gas_burned_amount_MO_MJ
  properties: wet mass 0.0247059 kg, carbon content, fossil 0.589286, dry mass 0.0247059 kg
- onshore well, oil/gas: 3.42129e-6 m; name onshore_well; = onshore_well_amount_MO_m*(0.5* petroleum +0.5*natural_gas *0.84)/(0.5* 107000000000 +0.5*13500000000 *0.84); lognormal variance with pedigree 0.4632, pedigree (2,3,5,5,5)
  Environmental report
  EcoSpold01Location=GLO
  Uncertainty: Environmental report. Uncertainty has been increased to reflect the extrapolation from a different region.
  property amount in multioutput activity_m 482000 m; name onshore_well_amount_MO_m
- offshore platform, petroleum: 3.48518e-11 unit; name offshore_plattform; = offshore_plattform_amount_MO_unit*(0.5* petroleum +0.5*natural_gas *0.84)/(0.5* 107000000000 +0.5*13500000000 *0.84); lognormal variance with pedigree 0.4632, pedigree (2,3,5,5,5)
  EcoSpold01Location=OCE
  Questionnaire
  Uncertainty: Questionnaire. Uncertainty has been increased to reflect the extrapolation from a different region.
  property amount in multioutput activity_unit 4.91 unit; name offshore_plattform_amount_MO_unit
- chemical, organic: 7.52401e-7 kg; name chem_org; = chem_org_amount_MO_kg*(0.5* petroleum +0.5*natural_gas *0.84)/(0.5* 107000000000 +0.5*13500000000 *0.84); lognormal variance with pedigree 0.4632, pedigree (2,3,5,5,5)
  EcoSpold01Location=GLO
  Generic value
  Uncertainty: . Uncertainty has been increased to reflect the extrapolation from a different region.
  property amount in multioutput activity_kg 106000 kg; name chem_org_amount_MO_kg
  properties: wet mass 1 kg, carbon content, fossil 0.628, dry mass 1 kg
  note on carbon content, fossil: This dataset is an unweighted average of 20 organic substances (listed in Tab 88.1, ecoinvent v2.2 report 8, part II), being part of the top100 chemicals included in this database. The C-content has also been calculated as an unweighted average of the C content of the substances composing this dataset.
- pipeline, petroleum: 5.83465e-9 km; name pipeline; = pipeline_amount_MO_km*(0.5* petroleum +0.5*natural_gas *0.84)/(0.5* 107000000000 +0.5*13500000000 *0.84); lognormal variance with pedigree 0.4632, pedigree (2,3,5,5,5)
  EcoSpold01Location=RER
  Environmental report
  Uncertainty: Environmental report. Uncertainty has been increased to reflect the extrapolation from a different region.
  property amount in multioutput activity_km 822 km; name pipeline_amount_MO_km
- onshore petroleum field infrastructure: 1.04342e-10 unit; name onshore_petr_field; = onshore_petr_field_amount_MO_unit*(0.5* petroleum +0.5*natural_gas *0.84)/(0.5* 107000000000 +0.5*13500000000 *0.84); lognormal variance with pedigree 0.4632, pedigree (2,3,5,5,5)
  Questionnaire
  EcoSpold01Location=GLO
  Uncertainty: Questionnaire. Uncertainty has been increased to reflect the extrapolation from a different region.
  property amount in multioutput activity_unit 14.7 unit; name onshore_petr_field_amount_MO_unit
- water discharge from petroleum/natural gas extraction, onshore: 0 kg; name water_discharge; = (water_discharge_amount_MO_kg*(1* petroleum +0*natural_gas *0.84)/(1* 107000000000 +0*13500000000 *0.84))*-1; pedigree (1,1,1,1,1)
  EcoSpold01Location=GLO
  Environmental report
  Uncertainty: Environmental report. Uncertainty has been increased to reflect the extrapolation from a different region.
  production volume 1.67229e10 kg; = water_discharge_amount_MO_kg*(1* petroleum_PV +0*natural_gas_PV *0.84)/(1* 107000000000 +0*13500000000 *0.84)
    Calculated from the production volume of reference products
  property price 0 EUR2005; name water_discharge_price_EUR2005
  property amount in multioutput activity_kg 4.54e10 kg; name water_discharge_amount_MO_kg
  properties: carbon content, fossil 0.00168491, wet mass 1 kg, dry mass 0.0848608 kg, carbon content, non-fossil 0.00101223, water content 10.784
- waste natural gas, sweet: -0.194488 MJ; name waste_NG_sweet; = (waste_NG_sweet_amount_MO_MJ*(0.5* petroleum +0.5*natural_gas *0.84)/(0.5* 107000000000 +0.5*13500000000 *0.84))*-1; lognormal variance with pedigree 0.128, pedigree (5,5,5,5,3)
  Estimation based on average global conditions.
  EcoSpold01Location=GLO
  Uncertainty: Estimation for average global conditions. Uncertainty adapted to reflect this.
  production volume 4.76507e10 MJ; = waste_NG_sweet_amount_MO_MJ*(0.5* petroleum_PV +0.5*natural_gas_PV *0.84)/(0.5* 107000000000 +0.5*13500000000 *0.84)
    Calculated from the production volume of reference products
  property price 0 EUR2005; name waste_NG_sweet_price_EUR2005
  property amount in multioutput activity_MJ 2.74e10 MJ; name waste_NG_sweet_amount_MO_MJ
  properties: dry mass 0.0247059 kg, carbon content, fossil 0.589286, wet mass 0.0247059 kg
- natural gas, vented: 0.000922756 m3; name nat_gas_vented; = nat_gas_vented_amount_MO_m3*(0.5* petroleum +0.5*natural_gas *0.84)/(0.5* 107000000000 +0.5*13500000000 *0.84); lognormal variance with pedigree 0.54, pedigree (5,5,5,5,5)
  Estimated to reflect global average conditions. Uncertainty has been adjusted to reflect that.
  EcoSpold01Location=GLO
  Uncertainty: Based on an estimation of global average conditions, uncertainty is high to reflect that.
  property amount in multioutput activity_m3 1.3e8 m3; name nat_gas_vented_amount_MO_m3
  properties: wet mass 0.84 kg, dry mass 0.84 kg, carbon content, fossil 0.602381
  note on carbon content, fossil: An average C content of 0.506 kg C/ m3 has been assumed (this average has been calculated using data in Tab 3.5, ecoinvent v2.2 report 6_V
- municipal solid waste: -0.000304509 kg; name MSW; = (MSW_amount_MO_kg*(0.5* petroleum +0.5*natural_gas *0.84)/(0.5* 107000000000 +0.5*13500000000 *0.84))*-1; lognormal variance with pedigree 0.1641, pedigree (3,2,5,5,5)
  EcoSpold01Location=CH
  Environmental report
  Uncertainty: Environmental report. Uncertainty has been increased to reflect the extrapolation from a different region.
  production volume 7.46063e7 kg; = MSW_amount_MO_kg*(0.5* petroleum_PV +0.5*natural_gas_PV *0.84)/(0.5* 107000000000 +0.5*13500000000 *0.84)
    Calculated from the production volume of reference porducts
  property amount in multioutput activity_kg 4.29e7 kg; name MSW_amount_MO_kg
  properties: carbon content, non-fossil 0.261655, wet mass 1 kg, carbon content, fossil 0.171549, water content 0.297017, dry mass 0.771 kg
  note on carbon content, non-fossil: MSW composition in tab 4.1, ecoinvent v2.2 report 13_I. C content referred to 1 kg DM
- chemical, inorganic: 1.00793e-6 kg; name chem_inorg; = chem_inorg_amount_MO_kg*(0.5* petroleum +0.5*natural_gas *0.84)/(0.5* 107000000000 +0.5*13500000000 *0.84); lognormal variance with pedigree 0.4632, pedigree (2,3,5,5,5)
  Generic value
  EcoSpold01Location=GLO
  Uncertainty: . Uncertainty has been increased to reflect the extrapolation from a different region.
  property amount in multioutput activity_kg 142000 kg; name chem_inorg_amount_MO_kg
  properties: dry mass 1 kg, carbon content, fossil 0.003, wet mass 1 kg
  note on carbon content, fossil: This dataset is an unweighted average of 20 inorganic substances (listed in Tab 88.1, ecoinvent v2.2 report 8, part II), being part of the top100 chemicals included in this database. The C-content has also been calculated as an unweighted average of the C content of the substances composing this dataset.

## Inputs from nature
- Gas, natural, in ground [natural resource, in ground]: 0.99999 m3; name gas_ground; = gas_ground_amount_MO_m3*(0* petroleum +1*natural_gas *0.84)/(0* 107000000000 +1*13500000000 *0.84); lognormal variance with pedigree 0.1106, pedigree (5,3,5,1,1)
  Production
  Uncertainty: Production
  property amount in multioutput activity_m3 1.35e10 m3; name gas_ground_amount_MO_m3
- Oil, crude, in ground [natural resource, in ground]: 0 kg; name oil_ground; = oil_ground_amount_MO_kg*(1* petroleum +0*natural_gas *0.84)/(1* 107000000000 +0*13500000000 *0.84); pedigree (1,1,1,1,1)
  Statistic
  Uncertainty: Statistic
  property amount in multioutput activity_kg 1.07e11 kg; name oil_ground_amount_MO_kg

## Emissions to nature
- Oils, unspecified [water, surface water]: 5.36618e-5 kg; name oils; = oils_amount_MO_kg*(0.5* petroleum +0.5*natural_gas *0.84)/(0.5* 107000000000 +0.5*13500000000 *0.84); lognormal variance with pedigree 0.4632, pedigree (2,3,5,5,5)
  Environmental report
  Uncertainty: Environmental report. Uncertainty has been increased to reflect the extrapolation from a different region.
  property amount in multioutput activity_kg 7.56e6 kg; name oils_amount_MO_kg
- Nitrogen [water, surface water]: 4.1453e-8 kg; name N2; = N2_amount_MO_kg*(0.5* petroleum +0.5*natural_gas *0.84)/(0.5* 107000000000 +0.5*13500000000 *0.84); lognormal variance with pedigree 0.212, pedigree (3,5,5,5,5)
  Extrapolation for sum parameter
  Uncertainty: Extrapolation for sum parameter. Uncertainty has been increased to reflect the extrapolation from a different region.
  property amount in multioutput activity_kg 5840 kg; name N2_amount_MO_kg
- TOC, Total Organic Carbon [water, surface water]: 4.64217e-5 kg; name TOC; = TOC_amount_MO_kg*(0.5* petroleum +0.5*natural_gas *0.84)/(0.5* 107000000000 +0.5*13500000000 *0.84); lognormal variance with pedigree 0.212, pedigree (3,5,5,5,5)
  (same comment as for Nitrogen)
  property amount in multioutput activity_kg 6.54e6 kg; name TOC_amount_MO_kg
- DOC, Dissolved Organic Carbon [water, surface water]: 4.64217e-5 kg; name DOC; = DOC_amount_MO_kg*(0.5* petroleum +0.5*natural_gas *0.84)/(0.5* 107000000000 +0.5*13500000000 *0.84); lognormal variance with pedigree 0.212, pedigree (3,5,5,5,5)
  (same comment as for Nitrogen)
  property amount in multioutput activity_kg 6.54e6 kg; name DOC_amount_MO_kg
- COD, Chemical Oxygen Demand [water, surface water]: 0.000168935 kg; name COD; = COD_amount_MO_kg*(0.5* petroleum +0.5*natural_gas *0.84)/(0.5* 107000000000 +0.5*13500000000 *0.84); lognormal variance with pedigree 0.212, pedigree (3,5,5,5,5)
  (same comment as for Nitrogen)
  property amount in multioutput activity_kg 2.38e7 kg; name COD_amount_MO_kg
- AOX, Adsorbable Organic Halogen as Cl [water, surface water]: 5.52944e-10 kg; name AOX; = AOX_amount_MO_kg*(0.5* petroleum +0.5*natural_gas *0.84)/(0.5* 107000000000 +0.5*13500000000 *0.84); lognormal variance with pedigree 0.212, pedigree (3,5,5,5,5)
  (same comment as for Nitrogen)
  property amount in multioutput activity_kg 77.9 kg; name AOX_amount_MO_kg
- BOD5, Biological Oxygen Demand [water, surface water]: 0.000168935 kg; name BOD; = BOD_amount_MO_kg*(0.5* petroleum +0.5*natural_gas *0.84)/(0.5* 107000000000 +0.5*13500000000 *0.84); lognormal variance with pedigree 0.212, pedigree (3,5,5,5,5)
  (same comment as for Nitrogen)
  property amount in multioutput activity_kg 2.38e7 kg; name BOD_amount_MO_kg
- Methane, bromotrifluoro-, Halon 1301 [air, non-urban air or from high stacks]: 4.88351e-8 kg; name halon; = halon_amount_MO_kg*(0.5* petroleum +0.5*natural_gas *0.84)/(0.5* 107000000000 +0.5*13500000000 *0.84); lognormal variance with pedigree 0.8127, pedigree (2,2,5,5,5)
  (same comment as for Oils, unspecified)
  property amount in multioutput activity_kg 6880 kg; name halon_amount_MO_kg
- Sulfur [water, surface water]: 1.44092e-7 kg; name S2; = S2_amount_MO_kg*(0.5* petroleum +0.5*natural_gas *0.84)/(0.5* 107000000000 +0.5*13500000000 *0.84); lognormal variance with pedigree 0.212, pedigree (3,5,5,5,5)
  (same comment as for Nitrogen)
  property amount in multioutput activity_kg 20300 kg; name S2_amount_MO_kg

## Sampling procedure
Environmental report and questionnaire.

## Extrapolations
Emission data are calculated with generic assumptions. Generic assumptions also applied for chemical uses and some other exchanges.

The conditions of productions in different regions were used to extrapolate the US production conditions. Unless otherwise noted, the existing dataset for Nigerian production (for which the source is given in the source field) was used as the basis for the extrapolation.

## Review by Emilia Moreno Ruiz 2017-09-06
PV adjusted
