# single-Si wafer production, for electronics

Dataset: EcoSpold 2, unit process
Geography: RoW
Time period: 1992-01-01 to 2019-12-31
Technology level: current
Classification: ISIC rev.4 ecoinvent: 2610:Manufacture of electronic components and boards
Classification: EcoSpold01Categories: photovoltaic/production of components
Synonyms: silicon; single crystalline; monocrystalline
Tags: ConvertedDataset
Scenario: Business-as-Usual
System model: Allocation at the point of substitution
Share of production covered: 20 %
Generated by: Niels Jungbluth
Published in: Jungbluth, N. 2007
Database: ecoinvent
isCopyrightProtected: true
accessRestrictedTo: 1

## General comment
The reference flow for the life cycle inventory is 1 square metre of wafer surface. The sc-Silicon columns are sawn into square wafers with a size 156x156 mm2 (0.0243 m2) and a thickness of 270 um. The weight is 629 g/m2.
[This dataset was already contained in the ecoinvent database version 2. It was not individually updated during the transfer to ecoinvent version 3. Life Cycle Impact Assessment results may still have changed, as they are affected by changes in the supply chain, i.e. in other datasets. This dataset was generated following the ecoinvent quality guidelines for version 2. It may have been subject to central changes described in the ecoinvent version 3 change report (http://www.ecoinvent.org/database/ecoinvent-version-3/reports-of-changes/), and the results of the central updates were reviewed extensively. The changes added e.g. consistent water flows and other information throughout the database. The documentation of this dataset can be found in the ecoinvent reports of version 2, which are still available via the ecoinvent website. The change report linked above covers all central changes that were made during the conversion process.]

## Included activities end
Sawing and cleaning of wafers. The process data include electricity use, water and working material consumption (e.g. stainless steel for saw-blades, argon gas, hydrofluoric and hydrochloric acid). Production wastes to be treated and process-specific NOx- and waterborne pollutants are considered. No data on other process specific air emissions.

## Geography
Europe, Western + North America

## Technology
Use of multi wire saws.

## Time period
Collection of data in 2005. Use of data from an environmental report for a production plant (ca. 3 million wafers per year) and some data from older publications.

## Parameters
- fraction, process water, to air: 0.15 dimensionless; name fraction_PW_to_air; lognormal variance with pedigree 0.092025, pedigree (4,4,3,2,4)
- fraction, tap water, to air: 0.15; name fraction_TW_to_air; lognormal variance with pedigree 0.092025, pedigree (4,4,3,2,4)

## Reference product
- single-Si wafer, for electronics: 1 m2; CPC 47173: Parts for the goods of subclasses 47140 to 47160; By-product classification allocatable product
  EcoSpold01Location=RER
  production volume 2.67763 m2
    This is a placeholder value that does not reflect real-world production volumes. This dataset does not currently require a real-world production volume to work in the database framework, and no actual data were collected yet. This has no negative effect on the results of the ecoinvent database.
  property price 142.2 EUR2005
    Calculated based on inputs: The price of the product has been calculated as a sum of the values of the material and energy inputs for this product. This value is therefore a rough estimation. It may underestimate the real price since there are additional expenses when producing any product. These expences can include for example labour costs, treatment of waste materials and profit for the producer. Please consider carefully whether this level of data quality is acceptable for your application.
  property carbon content 0
    carbon content on a dry matter basis (reserved; not for manual entry)
  property true value 142.2
    allocation property applied in "true value" allocation // value calculated from revenue
  properties: carbon content, non-fossil 0, wet mass 0.629 kg, dry mass 0.629 kg, carbon content, fossil 0, water content 0, water in wet mass 0 kg, carbon allocation 0 kg

## By-products
- heat, for reuse in municipal waste incineration only: 0 MJ; CPC 17300: Steam and hot water; By-product classification allocatable product; pedigree (1,1,1,1,1)
  Net electricity generated from this waste and used in internal MSWI plant energy redistribution.
  Uncertainty: uncertainty is calculated from uncertainties in waste composition and uncertainties in energy efficiency and the uncertainty in internal energy demand
  production volume 0.927594 MJ
  property exergy 0.1842 MJ; name E_th_prod_MSWI_exergy
    This exergy property is based on the exergy content of the product.
  property price 0.0106 EUR2005; name E_th_prod_MSWI_price_EUR2005
    Average European district heat price from Ecoheatcool and Euroheat 2005-2006, Ecoheat Work package 1: The European heat market. Final report. 10.6 EUR/GJ i s the price of district heat. http://www.solarthermalworld.org/files/Ecoheatcool%20WP1%20Web.pdf?download
  property true value relation 0.1842; name E_th_prod_MSWI_true_value_relation
    property to calculate "true value" from
  property true value 0.0020419
    allocation property applied in "true value" allocation // value calculated from true value relation
- electricity, for reuse in municipal waste incineration only: 0 kWh; CPC 17100: Electrical energy; By-product classification allocatable product; pedigree (1,1,1,1,1)
  (same comment as for heat, for reuse in municipal waste incineration only)
  production volume 0.125574 kWh
  property price 0.1 EUR2005; name E_el_prod_MSWI_price_EUR2005
    Estimated to be the same price as in case of electricity, medium voltage.
  property exergy 3.6 MJ; name E_el_prod_MSWI_exergy
    This exergy property is based on the exergy content of the product.
  property true value relation 3.6; name E_el_prod_MSWI_true_value_relation
    property to calculate "true value" from
  property true value 0.00540237
    (same comment as for heat, for reuse in municipal waste incineration only)
- iron scrap, sorted, pressed: 0 kg; By-product classification Recyclable; CPC 39310: Slag, dross, scalings and other waste from the manufacture of iron or steel; pedigree (1,1,1,1,1)
  metallic iron scrap removed from ash reamains and recycled.
  Uncertainty: uncertainty is calculated from uncertainties in waste composition and transfer coefficients to soild residues
  production volume 0.0169983 kg
  property price 0.175 EUR2005
    Temporary price data. Calculated as 90% of purchasers price based on: 2005 import and export prices (total trades (USD) divided by total weight (kg) in biggest economies of the world: EU27, USA, Brasil, China, India, Japan and Russia) from UN Commodity Trade Statistics Database (http://data.un.org/Explorer.aspxDatabase [Accessed 2011.06.20]). Commodity: Waste or scrap, of cast iron
  property carbon content 0
    carbon content on a dry matter basis (reserved; not for manual entry)
  property true value 0.000919962
    allocation property applied in "true value" allocation // value calculated from revenue
  properties: carbon content, non-fossil 0, wet mass 1 kg, dry mass 1 kg, water content 0, carbon content, fossil 0, water in wet mass 0 kg, carbon allocation 0 kg
- copper: 0 kg; source Rentz O. 1999; By-product classification allocatable product; CPC 41413: Refined copper and copper alloys, unwrought; master alloys of copper
  Literature value. Copper uses: Before end-use copper is manufactured into semi fabricated products, such as shapes and ingots (known as 'semis'). These manufacturing processes are subdivided into hot working, cold working and, if necessary, process annealing. Few of the semis are ready for use as such. They more typically travel to first-stage manufacturers, who make metal rods, wire, and casting, and then to component manufacturers who produce such things as motors, valves, and insulated cables The components in turn are incorporated by final-stage manufacturers into a variety of finished products - automobiles, commercial buildings, residential housing, and so forth. These uses account for about 79% of the world-wide consumption of copper.
  production volume 0.000547742 kg
  property price 5.52 EUR2005
    Literature value (http://www.economist.com/news/business/21576714-mining-industry-has-enriched-chile-its-future-precarious-copper-solution). Average price between 20015 and 2013.
  property carbon content 0
    carbon content on a dry matter basis (reserved; not for manual entry)
  property true value 0.000923656
    allocation property applied in "true value" allocation // value calculated from revenue
  properties: dry mass 1 kg, water in wet mass 0 kg, wet mass 1 kg, carbon content, non-fossil 0, water content 0, carbon content, fossil 0, carbon allocation 0 kg
- zinc concentrate: 0 kg; CPC 14290: Other non-ferrous metal ores and concentrates (other than uranium or thorium ores and concentrates); By-product classification allocatable product
  Calculated value from the knowledge of the properties of both products.
  production volume 4.34758e-13 kg
  property price 0.38 EUR2005; name ByP_price_EUR2005
    Temporary price data. Calculated as 90% of purchasers price based on: Zinc content in concentrate 53%. Concentrate price per kg Zn 86.5% of refined Zn price (13.5% treatment charges according to CHR Metals Limited 2005: Dynamic cost curves. http://www.minecost.com/dynamic.pdf). 2004 zinc price from USGS (2007) Mineral commodity summaries 2007. <http://minerals.usgs.gov/minerals/pubs/mcs/2007/mcs2007.pdf> [Accessed 25 May 2010]
  property zinc content 0.53; name zinc_C_zinc_concentrate
    Zinc content on a dry matter basis. Value taken from teh "zinc mine operation" /GLO dataset.
  property dry mass 1 kg; name DM_zinc_concentrate
  property carbon content 0
    carbon content on a dry matter basis (reserved; not for manual entry)
  property true value 5.04691e-14
    allocation property applied in "true value" allocation // value calculated from revenue
  properties: wet mass 1 kg, water content 0, carbon content, non-fossil 0, carbon content, fossil 0, water in wet mass 0 kg, carbon allocation 0 kg
- iron scrap, unsorted: 0 kg; source European Aluminium Association 2008; CPC 39310: Slag, dross, scalings and other waste from the manufacture of iron or steel; By-product classification Recyclable; pedigree (1,1,1,1,1)
  production volume 4.49706e-7 kg
  property price 0.149 EUR2005; name ironScrapAmount_price_EUR2005
    Temporary price data. Calculated as 90% of purchasers price based on: estimated at 85% of sorted scrap
  property carbon content 0
    carbon content on a dry matter basis (reserved; not for manual entry)
  property true value 2.22846e-8
    allocation property applied in "true value" allocation // value calculated from revenue
  properties: water in wet mass 0 kg, water content 0, carbon content, fossil 0, carbon content, non-fossil 0, dry mass 1 kg, wet mass 1 kg, carbon allocation 0 kg
- aluminium oxide, non-metallurgical: 0 kg; source European Aluminium Association 2008; CPC 41432: Alumina (aluminium oxide), except artificial corundum; By-product classification allocatable product; CAS 1344-28-1; pedigree (1,1,1,1,1)
  production volume 2.82983e-5 kg
  property carbon content, non-fossil 0; name C_content_non_fossil
  property price 0.28 EUR2005; name Al2O3Amount_price_EUR2005
    From UN trade database. http://data.un.org/ Import data from the largest economies of the world are used (Brazil, India, USA, China, Japan and EU-27).
  property dry mass 1 kg; name DM
  property water content 0; name water_content
  property wet mass 1 kg; name WM
  property water in wet mass 0 kg; name WWM
  property carbon content, fossil 0; name C_content_fossil
  property carbon content 0
    carbon content on a dry matter basis (reserved; not for manual entry)
  property true value 2.63517e-6
    allocation property applied in "true value" allocation // value calculated from revenue
  properties: carbon allocation 0 kg
- aluminium, cast alloy: 0 kg; source European Aluminium Association 2008; By-product classification allocatable product; CPC 41431: Unwrought aluminium; pedigree (1,1,1,1,1)
  EcoSpold01Location=RER
  production volume 0.000264526 kg
  property price 1.3 EUR2005; name castAlloyAmount_price_EUR2005
    Temporary price data. Calculated as 90% of purchasers price based on: Source: London Metal Exchange, Aluminium alloy price for 2005
  property carbon content 0
    carbon content on a dry matter basis (reserved; not for manual entry)
  property true value 0.000114367
    allocation property applied in "true value" allocation // value calculated from revenue
  properties: water in wet mass 0 kg, carbon content, non-fossil 0, water content 0, dry mass 1 kg, carbon content, fossil 0, wet mass 1 kg, carbon allocation 0 kg
- aluminium, wrought alloy: 0 kg; source European Aluminium Association 2008; By-product classification allocatable product; CPC 4153: Semi-finished products of aluminium or aluminium alloys; pedigree (1,1,1,1,1)
  production volume 0.000115805 kg
  property price 1.44 EUR2005; name secondaryAluminiumOutput_price_EUR2005
    Estimated based on literature values and expert judgement. Aluminium ccast alloys are about 90% of the price of aluminium wrought alloys.
  property carbon content 0
    carbon content on a dry matter basis (reserved; not for manual entry)
  property true value 5.54598e-5
    allocation property applied in "true value" allocation // value calculated from revenue
  properties: wet mass 1 kg, water content 0, carbon content, fossil 0, water in wet mass 0 kg, carbon content, non-fossil 0, dry mass 1 kg, carbon allocation 0 kg

## Inputs from technosphere
- municipal solid waste: 0 kg; pedigree (1,1,1,1,1)
  EcoSpold01Location=CH
  Environmental report Wacker 2000
  Uncertainty: Environmental report Wacker 2000
  production volume 0 kg
    Calculated from the production volume of single-Si wafer, for electronics in proportion to the respective output amounts.
  properties: water content 0.297017, carbon content, non-fossil 0.261655, wet mass 1 kg, carbon content, fossil 0.171549, dry mass 0.771 kg
  note on carbon content, non-fossil: MSW composition in tab 4.1, ecoinvent v2.2 report 13_I. C content referred to 1 kg DM
- silicon, single crystal, Czochralski process, electronics: 1.07473 kg; lognormal variance with pedigree 0.0421, pedigree (1,2,5,5,1)
  Own calculation with de Wild 2007 data
  EcoSpold01Location=RER
  Uncertainty: Own calculation with de Wild 2007 data
  properties: dry mass 1 kg, wet mass 1 kg
- silicon carbide: 2.62983 kg; lognormal variance with pedigree 0.0421, pedigree (1,2,5,5,1)
  De Wild 2007, SiC use for sawing
  EcoSpold01Location=RER
  Uncertainty: de Wild 2007, SiC use for sawing
  properties: carbon content, fossil 0.3, wet mass 1 kg, dry mass 1 kg
- triethylene glycol: 2.70982 kg; lognormal variance with pedigree 0.0421, pedigree (1,2,5,5,1)
  EcoSpold01Location=RER
  For sawing slurry, de Wild 2007
  Uncertainty: For sawing slurry, de Wild 2007
  properties: carbon content, fossil 0.479881, dry mass 1 kg, wet mass 1 kg
- acrylic binder, without water, in 34% solution state: 0.00199987 kg; lognormal variance with pedigree 0.0421, pedigree (1,2,5,5,1)
  De Wild 2007, adhesive for temporarily attachment of bricks to wire-sawing equipment
  EcoSpold01Location=RER
  Uncertainty: de Wild 2007, adhesive for temporarily attachment of bricks to wire-sawing equipment
  properties: carbon content, fossil 0.599846, wet mass 1 kg, dry mass 1 kg
  note on carbon content, fossil: The acrylic acid ethyl ester (ethyl acrylate) is used for both solvent- and water-based paints, and in textiles as a binder in nonwoven fabrics and flocking (Acrylic acid and derivatives: uses, Ullmann). It was used as a representative example of acrylic binders. Its formula is C5H8O2
- paper, woodfree, coated: 0.189987 kg; lognormal variance with pedigree 0.056, pedigree (3,4,5,5,1)
  EcoSpold01Location=RER
  Hagedorn 1992
  Uncertainty: Hagedorn 1992
  properties: water content 0.0582011, carbon content, fossil 0.0590617, carbon content, non-fossil 0.22775, wet mass 1 kg, dry mass 0.945 kg
  note on carbon content, fossil: Fossil C content was calculated after fossil C contents of chemicals used in the production of the paper (in Tab 8.72 & 8.73 ecoinvent v2.2 report 11_III, part 8).
  note on carbon content, non-fossil: Biogenic C content was calculated after biogenic C contents of chemicals used in the production of the paper (in Tab 8.72 & 8.73 ecoinvent v2.2 report 11_III, part 8). The cellulose content in 1 kg of paper (on a wet mas basis) was estimated as (1-chemical content), C content of cellulose was considered 0.44 kgC/kg dry mass (ecoinvent v2.2 report, n 15a, pg 40)
- wire drawing, steel: 1.4899 kg; lognormal variance with pedigree 0.0421, pedigree (1,2,5,5,1)
  EcoSpold01Location=RER
  De Wild 2007, wire saws
  Uncertainty: de Wild 2007, wire saws
- sodium hydroxide, without water, in 50% solution state: 0.014999 kg; lognormal variance with pedigree 0.0421, pedigree (1,2,5,5,1)
  De Wild 2007, for wafer cleaning
  EcoSpold01Location=RER
  Uncertainty: de Wild 2007, for wafer cleaning
  properties: dry mass 1 kg, wet mass 1 kg
- waste, from silicon wafer production, inorganic: -7.25982 kg; lognormal variance with pedigree 0.0546, pedigree (2,4,5,5,1)
  (same comment as for municipal solid waste)
  production volume 21.7809 kg
    (same comment as for municipal solid waste)
  properties: water content 0.103753, carbon content, fossil 0.0347572, dry mass 0.906 kg, wet mass 1 kg
- electricity, medium voltage: 0 kWh; pedigree (1,1,1,1,1)
  EcoSpold01Location=UCTE
  Estimation based on literature data, high range of literature values
  Uncertainty: Estimation based on literature data, high range of literature values
- polystyrene, high impact: 0.199987 kg; lognormal variance with pedigree 0.072, pedigree (4,4,5,5,1)
  Estimation packaging
  EcoSpold01Location=RER
  Uncertainty: estimation packaging
  properties: dry mass 1 kg, carbon content, fossil 0.923077, wet mass 1 kg
  note on carbon content, fossil: Chemical formula of polystyrene is (C8H8)n (ecoinvent v2.2 report 11_II)
- nitric acid, without water, in 50% solution state: 0.370345 kg; lognormal variance with pedigree 0.124, pedigree (5,4,5,5,1)
  Calculated with NOx emissions, Wacker 2006
  EcoSpold01Location=RER
  Uncertainty: calculated with NOx emissions, Wacker 2006
  properties: wet mass 1 kg, dry mass 1 kg
- brass: 0.0074495 kg; lognormal variance with pedigree 0.0421, pedigree (1,2,5,5,1)
  De Wild 2007, wire saws, high resistance brass-coated steel with carbon content in the range 0.7%-0.9%, 5g/kg brass
  EcoSpold01Location=CH
  Uncertainty: de Wild 2007, wire saws, high resistance brass-coated steel with carbon content in the range 0.7%-0.9%, 5g/kg brass
  properties: dry mass 1 kg, wet mass 1 kg
- wafer factory: 3.99973e-6 unit; lognormal variance with pedigree 0.3421, pedigree (1,2,5,5,1)
  Literature
  EcoSpold01Location=DE
  Uncertainty: Literature
- dipropylene glycol monomethyl ether: 0.29998 kg; lognormal variance with pedigree 0.0421, pedigree (1,2,5,5,1)
  EcoSpold01Location=RER
  De Wild 2007, for wafer cleaning
  Uncertainty: de Wild 2007, for wafer cleaning
  properties: dry mass 1 kg, wet mass 1 kg, carbon content, fossil 0.567568
- waste, from silicon wafer production: -0.0616769 kg; lognormal variance with pedigree 0.0421, pedigree (1,2,5,5,1)
  Environmental report Wacker 2000
  EcoSpold01Location=DE
  Uncertainty: Environmental report Wacker 2000
  production volume 0.185043 kg
    (same comment as for municipal solid waste)
  properties: wet mass 1 kg, carbon content, fossil 0.0347496, dry mass 1 kg
- glass wool mat: 0.00999933 kg; lognormal variance with pedigree 0.0427, pedigree (2,2,5,5,1)
  EcoSpold01Location=CH
  De Wild 2007, for temporarily attachment of bricks to wire sawing equipment
  Uncertainty: de Wild 2007, for temporarily attachment of bricks to wire sawing equipment
  properties: carbon content, fossil 0.0107327, wet mass 1 kg, dry mass 1 kg
  note on carbon content, fossil: A share of 16 w-% for the binders is taken into account. The binder used in this study is a mixture of phenol, formaldehyde and urea resins (ecoinvent v2.2 report 16_part XIV), and the C content was calculated as a weigthed average of phenol, formaldehyde and urea C content.
- steel, low-alloyed, hot rolled: 1.4825 kg; lognormal variance with pedigree 0.0421, pedigree (1,2,5,5,1)
  EcoSpold01Location=RER
  De Wild 2007, wire saws, high resistance brass-coated steel with carbon content in the range 0.7%-0.9%, 5g/kg brass
  Uncertainty: de Wild 2007, wire saws, high resistance brass-coated steel with carbon content in the range 0.7%-0.9%, 5g/kg brass
  properties: wet mass 1 kg, dry mass 1 kg, carbon content, fossil 0.005
  note on carbon content, fossil: Low alloyed steel composition given in Tab. 3.2 ecoinvent v2.2 report 10_partII. Steel assumed to have a C content of 0.5%
- packaging film, low density polyethylene: 0.0999933 kg; lognormal variance with pedigree 0.072, pedigree (4,4,5,5,1)
  EcoSpold01Location=RER
  Estimation packaging
  Uncertainty: estimation packaging
  properties: carbon content, fossil 0.857143, wet mass 1 kg, dry mass 1 kg
  note on carbon content, fossil: Polyethylene is formed out of a huge amount of ethylene monomers (C2H4) (ecoinvent v2.2 report 11_II). MW=28 g/mol
- argon, liquid: 0.574962 kg; lognormal variance with pedigree 0.056, pedigree (3,4,5,5,1)
  EcoSpold01Location=RER
  Protection gas sawing, Phylipsen 1995
  Uncertainty: Protection gas sawing, Phylipsen 1995
  properties: dry mass 1 kg, wet mass 1 kg
- alkylbenzene sulfonate, linear, petrochemical: 0.239984 kg; lognormal variance with pedigree 0.0421, pedigree (1,2,5,5,1)
  (same comment as for dipropylene glycol monomethyl ether)
  properties: dry mass 1 kg, carbon content, fossil 0.407018, wet mass 1 kg
  note on carbon content, fossil: European LAS is a mixture of differ-ent homologues (C10-C13 alkyl chains) including all positional isomers with the exception of 1-alkyl substituted ones. The typical homologue distribution is 15%, 30%, 30% and 25% for C10, C11, C12 and C13 with an average alkyl chain of C11.6 and an average molecular weight of 342 as the sodium salt (ecoinvent v2.2 report 12)
- hydrochloric acid, without water, in 30% solution state: 0.00269982 kg; lognormal variance with pedigree 0.0421, pedigree (1,2,5,5,1)
  (same comment as for dipropylene glycol monomethyl ether)
  properties: wet mass 1 kg, dry mass 1 kg
- acetic acid, without water, in 98% solution state: 0.0389974 kg; lognormal variance with pedigree 0.0421, pedigree (1,2,5,5,1)
  (same comment as for sodium hydroxide, without water, in 50% solution state)
  properties: carbon content, fossil 0.400016, dry mass 1 kg, wet mass 1 kg
- tap water: 0 kg; name tap_water_input; pedigree (1,1,1,1,1)
  EcoSpold01Location=RER
  Wacker 2006
  Uncertainty: Wacker 2006
  properties: carbon content, fossil 0.00178991, water content 2962.17, dry mass 0.000337476 kg, wet mass 1 kg
  note on carbon content, fossil: Bicarbonate content is 2.93 mol/m3. CO2 content is 0.1 mol/m3 (ecoinvent v2.2 report 8, Tab 93.1).
- heat, district or industrial, natural gas: 0 MJ; pedigree (1,1,1,1,1)
  De Wild 2007, for removing adhesive after sawing
  EcoSpold01Location=RER
  Uncertainty: de Wild 2007, for removing adhesive after sawing
- municipal solid waste: -0.00241445, -0.000608381, -0.000869412, -1.70759 kg (4 entries); lognormal variance with pedigree 0.0546, pedigree (2,4,5,5,1)
  (same comment as for municipal solid waste)
  production volume 5.1348 kg
- electricity, medium voltage: 0.392696, 0.0714541, 1.21175, 17.5692, 2.51448, 8.23846 kWh (6 entries); lognormal variance with pedigree 0.176, pedigree (3,4,5,5,1)
  (same comment as for electricity, medium voltage)
- tap water: 1.28359, 10.6634, 2.12134, 53.4918, 1.39158, 3.95832, 612.134 kg (7 entries); lognormal variance with pedigree 0.0421, pedigree (1,2,5,5,1)
  EcoSpold01Location=RER
  Wacker 2006
  Uncertainty: Wacker 2006
- heat, district or industrial, natural gas: 0.0625664, 3.53719 MJ (2 entries); lognormal variance with pedigree 0.0421, pedigree (1,2,5,5,1)
  (same comment as for heat, district or industrial, natural gas)

## Emissions to nature
- BOD5, Biological Oxygen Demand [water, surface water]: 0.029553 kg; lognormal variance with pedigree 0.096, pedigree (3,4,5,5,1)
  Extrapolation for sum parameter
  Uncertainty: Extrapolation for sum parameter
- Nickel, ion [water, surface water]: 6.0504e-5 kg; lognormal variance with pedigree 0.7046, pedigree (2,4,5,5,1)
  Environmental report Wacker 2000
  Uncertainty: Environmental report Wacker 2000
- Water [air, unspecified]: 0.102757 m3; name water_to_air_unspecified; lognormal variance with pedigree 0.0827, pedigree (2,2,5,5,1)
  Calculated value based on literature values and expert opinion. See comments in the parametres' comment field.
  property fraction, origin: salt water 0; name fraction_origin_salt_water
  property fraction, origin: fresh water 1; name fraction_origin_fresh_water
  property fraction, origin: unspecified 0; name fraction_origin_unspecified
- Chromium, ion [water, surface water]: 3.0252e-5 kg; lognormal variance with pedigree 0.3546, pedigree (2,4,5,5,1)
  Environmental report Wacker 2000
  Uncertainty: Environmental report Wacker 2000
- Nitrogen oxides [air, urban air close to ground]: 0.370345 kg; lognormal variance with pedigree 0.0946, pedigree (2,4,5,5,1)
  Environmental report Wacker 2006
  Uncertainty: Environmental report Wacker 2006
- AOX, Adsorbable Organic Halogen as Cl [water, surface water]: 0.000501257 kg; lognormal variance with pedigree 0.0946, pedigree (2,4,5,5,1)
  Environmental report Wacker 2006, formed by nitric acid use
  Uncertainty: Environmental report Wacker 2006, formed by nitric acid use
- DOC, Dissolved Organic Carbon [water, surface water]: 0.0110823 kg; lognormal variance with pedigree 0.096, pedigree (3,4,5,5,1)
  Extrapolation for sum parameter
  Uncertainty: Extrapolation for sum parameter
- Lead [water, surface water]: 3.0252e-5 kg; lognormal variance with pedigree 0.7046, pedigree (2,4,5,5,1)
  Environmental report Wacker 2000
  Uncertainty: Environmental report Wacker 2000
- COD, Chemical Oxygen Demand [water, surface water]: 0.029553 kg; lognormal variance with pedigree 0.0946, pedigree (2,4,5,5,1)
  Environmental report Wacker 2000
  Uncertainty: Environmental report Wacker 2000
- TOC, Total Organic Carbon [water, surface water]: 0.0110823 kg; lognormal variance with pedigree 0.096, pedigree (3,4,5,5,1)
  Extrapolation for sum parameter
  Uncertainty: Extrapolation for sum parameter
- Copper, ion [water, surface water]: 6.0504e-5 kg; lognormal variance with pedigree 0.3546, pedigree (2,4,5,5,1)
  Environmental report Wacker 2000
  Uncertainty: Environmental report Wacker 2000
- Cadmium, ion [water, surface water]: 6.0504e-6 kg; lognormal variance with pedigree 0.3546, pedigree (2,4,5,5,1)
  Environmental report Wacker 2000
  Uncertainty: Environmental report Wacker 2000
- Nitrogen [water, surface water]: 0.00994424 kg; lognormal variance with pedigree 0.0946, pedigree (2,4,5,5,1)
  Environmental report Wacker 2006, 50% of total emissions
  Uncertainty: Environmental report Wacker 2006, 50% of total emissions
- Mercury [water, surface water]: 6.0504e-6 kg; lognormal variance with pedigree 0.7046, pedigree (2,4,5,5,1)
  Environmental report Wacker 2000
  Uncertainty: Environmental report Wacker 2000
- Phosphate [water, surface water]: 0.000501257 kg; lognormal variance with pedigree 0.0946, pedigree (2,4,5,5,1)
  Environmental report Wacker 2006
  Uncertainty: Environmental report Wacker 2006
- Water [water, unspecified]: 0.582288 m3; name water_to_water_unspecified; lognormal variance with pedigree 0.0827, pedigree (2,2,5,5,1)
  (same comment as for Water)
  property fraction, origin: fresh water 1; name fraction_origin_fresh_water_Ww
  property fraction, origin: unspecified 0; name fraction_origin_unspecified_Ww
  property wet mass 1000 kg; name WM
  property water in wet mass 1000 kg; name WWM
  property carbon content, non-fossil 0; name C_content_non_fossil
  property carbon content, fossil 0; name C_content_fossil
  property dry mass 0 kg; name DM
  property fraction, origin: salt water 0; name fraction_origin_salt_water_Ww

## Sampling procedure
Data collection by factory representatives. Environmental report and LCA studies.

## Extrapolations
own estimation with data for PV wafer This dataset has been copied from an original dataset covering the geography RER. The uncertainty has been adjusted accordingly.

## Review by Roberto Dones 2007-08-23
Passed.
none
