# fishmeal and fish oil plant construction and maintenance

Dataset: EcoSpold 2, unit process
Geography: RoW
Time period: 2010-01-01 to 2020-12-31
Technology level: current
Classification: ISIC rev.4 ecoinvent: 03:Fishing and aquaculture
Scenario: Business-as-Usual
System model: Allocation at the point of substitution
Generated by: Angel Avadí
Published in: Avadí, A. 2018
Database: ecoinvent
isCopyrightProtected: true
accessRestrictedTo: 1

## General comment
The activity represents the construction and maintenance along its lifetime of a fishmeal and fish oil (reduction) plant, expressed as the installed capacity required to process 1000 kg of raw material. The life cycle inventories were produced based on a representative sample of 3 Peruvian plants and their activity. ~200 fishmeal plants existed in Peru as of 2016. This dataset may be adapted to other global production sites.
System boundaries of FMFO production and relations between activities

## Included activities start
From construction of the plant, through maintenance.

## Included activities end
End of life treatment of the plant

## Geography
Based on Peruvian data

## Technology
The dataset is a weighted average of 3 different plants producing different fishmeal qualities and using two types of fuel (natural gas and residual fuel R500), representing respectively state of the art technology (indirect heat) and more conventional technology (direct heat). The three plants represent 17% of the national production in 2009-2012. Plants have a lifespan of 30 years.

## Time period
Production figures represent the period 2005-2015, relative production of the three fishmeal types represent the period 2012-2014 (chosen due to an ongoing trend in shifting production from FAQ to Prime), and fishmeal and fish oil yields represent the period 2001-2011. Valid as of 2017.

## Parameters
- copper wire use: 0.0049 kg; name copper_wire_use; triangular min 0.00282, mostLikely 0.0049, max 0.00585, pedigree (1,3,1,1,1)
  Copper wire for construction/maintenance consumed per t of processed raw material
  Uncertainty: Data from 3 representative plants, production-weighted average.
- metal manufacturing: 0.345 kg; name metalworks; triangular min 0.044, mostLikely 0.345, max 0.387, pedigree (1,3,1,1,1)
  Metalworks for construction/maintenance consumed per t of processed raw material
  Uncertainty: Data from 3 representative plants, production-weighted average.

## Reference product
- fishmeal plant: 0 unit; name plant; source Pierre Fréon 2017; By-product classification allocatable product; CPC 8812: Fish processing services
  One unit of plant represents the installed capacity required to process 1 t of raw material, including annual maintenance of the infrastructure.
  production volume 1.345e6 unit; name prod_vol
    In average 10 new plants are built per year, with processing capacity of at least 155 000 t raw material/year
  property lifetime 30 year; name plant_lifetime
  property price 3.45405 EUR2005; name plant_price_EUR2005
    Calculated based on inputs: The price of the product has been calculated as a sum of the values of the material and energy inputs for this product. This value is therefore a rough estimation. It may underestimate the real price since there are additional expenses when producing any product. These expences can include for example labour costs, treatment of waste materials and profit for the producer. Please consider carefully whether this level of data quality is acceptable for your application.
  property capacity [kg] 1000 kg; name plant_capacity_kg
  property true value 3.45405; name plant_true_value
    allocation property applied in "true value" allocation // value calculated from revenue
- iron scrap, unsorted: 1 kg; name iron_s; = metalworks*0.87; source Pierre Fréon 2017; CPC 39310: Slag, dross, scalings and other waste from the manufacture of iron or steel; By-product classification Recyclable
  Waste steel and iron at end of life
  production volume 403702 kg; = ABS(prod_vol*iron_s/plant)
    Calculated from production volume of reference product using the relative outputs.
  property price 0.149 EUR2005; name iron_s_price_EUR2005
    Temporary price data. Calculated as 90% of purchasers price based on: estimated at 85% of sorted scrap
  property carbon content 0.005
    carbon content on a dry matter basis (reserved; not for manual entry)
  property true value 0.0447224; name iron_s_true_value
    allocation property applied in "true value" allocation // value calculated from revenue
  properties: water content 0, water in wet mass 0 kg, carbon content, fossil 0.005, carbon content, non-fossil 0, dry mass 1 kg, wet mass 1 kg, carbon allocation 0.005 kg

## By-products
- copper: 0 kg; source Rentz O. 1999; By-product classification allocatable product; CPC 41413: Refined copper and copper alloys, unwrought; master alloys of copper
  Literature value. Copper uses: Before end-use copper is manufactured into semi fabricated products, such as shapes and ingots (known as 'semis'). These manufacturing processes are subdivided into hot working, cold working and, if necessary, process annealing. Few of the semis are ready for use as such. They more typically travel to first-stage manufacturers, who make metal rods, wire, and casting, and then to component manufacturers who produce such things as motors, valves, and insulated cables The components in turn are incorporated by final-stage manufacturers into a variety of finished products - automobiles, commercial buildings, residential housing, and so forth. These uses account for about 79% of the world-wide consumption of copper.
  production volume 5030.92 kg
  properties: dry mass 1 kg, water in wet mass 0 kg, wet mass 1 kg, carbon content, non-fossil 0, water content 0, price 5.52 EUR2005, carbon content, fossil 0, carbon content 0, carbon allocation 0 kg, true value 0.0206473
- electricity, for reuse in municipal waste incineration only: 0 kWh; CPC 17100: Electrical energy; By-product classification allocatable product; pedigree (1,1,1,1,1)
  Net electricity generated from this waste and used in internal MSWI plant energy redistribution.
  Uncertainty: uncertainty is calculated from uncertainties in waste composition and uncertainties in energy efficiency and the uncertainty in internal energy demand
  production volume 0.0591205 kWh
  property exergy 3.6 MJ; name E_el_prod_MSWI_exergy
    This exergy property is based on the exergy content of the product.
  property true value relation 3.6; name E_el_prod_MSWI_true_value_relation
    property to calculate "true value" from
  property price 0.1 EUR2005; name E_el_prod_MSWI_price_EUR2005
    Estimated to be the same price as in case of electricity, medium voltage.
  property true value 5.6576e-9
    allocation property applied in "true value" allocation // value calculated from true value relation
- heat, for reuse in municipal waste incineration only: 0 MJ; CPC 17300: Steam and hot water; By-product classification allocatable product; pedigree (1,1,1,1,1)
  Net useful heat generated from this waste and used in internal MSWI plant energy redistribution.
  Uncertainty: uncertainty is calculated from uncertainties in waste composition and uncertainties in energy efficiency and the uncertainty in internal energy demand
  production volume 0.422845 MJ
  property true value relation 0.1842; name E_th_prod_MSWI_true_value_relation
    property to calculate "true value" from
  property exergy 0.1842 MJ; name E_th_prod_MSWI_exergy
    This exergy property is based on the exergy content of the product.
  property price 0.0106 EUR2005; name E_th_prod_MSWI_price_EUR2005
    Average European district heat price from Ecoheatcool and Euroheat 2005-2006, Ecoheat Work package 1: The European heat market. Final report. 10.6 EUR/GJ i s the price of district heat. http://www.solarthermalworld.org/files/Ecoheatcool%20WP1%20Web.pdf?download
  property true value 2.07044e-9
    (same comment as for electricity, for reuse in municipal waste incineration only)
- zinc concentrate: 0 kg; CPC 14290: Other non-ferrous metal ores and concentrates (other than uranium or thorium ores and concentrates); By-product classification allocatable product
  Calculated value from the knowledge of the properties of both products.
  production volume 3.99318e-6 kg
  property price 0.38 EUR2005; name ByP_price_EUR2005
    Temporary price data. Calculated as 90% of purchasers price based on: Zinc content in concentrate 53%. Concentrate price per kg Zn 86.5% of refined Zn price (13.5% treatment charges according to CHR Metals Limited 2005: Dynamic cost curves. http://www.minecost.com/dynamic.pdf). 2004 zinc price from USGS (2007) Mineral commodity summaries 2007. <http://minerals.usgs.gov/minerals/pubs/mcs/2007/mcs2007.pdf> [Accessed 25 May 2010]
  property zinc content 0.53; name zinc_C_zinc_concentrate
    Zinc content on a dry matter basis. Value taken from teh "zinc mine operation" /GLO dataset.
  property dry mass 1 kg; name DM_zinc_concentrate
  property carbon content 0
    carbon content on a dry matter basis (reserved; not for manual entry)
  property true value 1.12818e-12
    allocation property applied in "true value" allocation // value calculated from revenue
  properties: wet mass 1 kg, water content 0, carbon content, non-fossil 0, carbon content, fossil 0, water in wet mass 0 kg, carbon allocation 0 kg
- iron scrap, sorted, pressed: 0 kg; By-product classification Recyclable; CPC 39310: Slag, dross, scalings and other waste from the manufacture of iron or steel; pedigree (1,1,1,1,1)
  Iron scrap recovered from this waste.
  Uncertainty: uncertainty calculated from uncertainty in waste composition, uncertainty of share of recyclable metal, uncertainty of transfer coefficient to bottom ash, uncertainty of the efficiency of scrap removal in MSWI plant.
  production volume 6697.22 kg
  property price 0.175 EUR2005
    Temporary price data. Calculated as 90% of purchasers price based on: 2005 import and export prices (total trades (USD) divided by total weight (kg) in biggest economies of the world: EU27, USA, Brasil, China, India, Japan and Russia) from UN Commodity Trade Statistics Database (http://data.un.org/Explorer.aspxDatabase [Accessed 2011.06.20]). Commodity: Waste or scrap, of cast iron
  property carbon content 0
    carbon content on a dry matter basis (reserved; not for manual entry)
  property true value 2.41155e-5
    allocation property applied in "true value" allocation // value calculated from revenue
  properties: wet mass 1 kg, water in wet mass 0 kg, carbon content, non-fossil 0, carbon content, fossil 0, dry mass 1 kg, water content 0, carbon allocation 0 kg

## Inputs from technosphere
All rows: source Pierre Fréon 2017
- copper: 0.000207447 kg; = copper_wire_use
  Copper wire for construction/maintenance consumed per t of processed raw material. Lifespan of plant: 30 years.
  properties: dry mass 1 kg, wet mass 1 kg
- sodium hydroxide, without water, in 50% solution state: 0.0254017 kg; name soda; triangular min 0.0254017, mostLikely 0.0254017, max 0.0254017, pedigree (1,3,1,5,1)
  Caustic soda used for maintenance per t of processed raw material.
  Uncertainty: Data from 3 representative plants, production-weighted average.
  properties: wet mass 1 kg, dry mass 1 kg
- steel, low-alloyed: 0.0127072 kg; = metalworks*0.87
  Steel used for construction/maintenance consumed per t of processed raw material. Lifespan of plant: 30 years.
  properties: dry mass 1 kg, wet mass 1 kg, carbon content, fossil 0.005
- metal working, average for metal product manufacturing: 0.014606 kg; = metalworks
  Metal works/manufacturing for construction/maintenance consumed per t of processed raw material. Lifespan of plant: 30 years.
- wire drawing, copper: 0.000207447 kg; = copper_wire_use
  (same comment as for copper)
- steel, chromium steel 18/8: 0.00189878 kg; = metalworks*0.13
  (same comment as for steel, low-alloyed)
  properties: dry mass 1 kg, carbon content, fossil 0.0008, wet mass 1 kg
  note on carbon content, fossil: Stainless steel model is the grade 304 steel (18/8 stainless, 18% chromium 8% nickel; max. 0.08% C)
- tap water: 0 kg; name water; pedigree (1,1,1,1,1)
  Fresh water, partially aggregated with seawater, used for maintenance
  property carbon content, fossil 0.00178991; name water_CCF
  properties: wet mass 1 kg, dry mass 0.000337476 kg, water content 2962.17
  note on carbon content, fossil: Bicarbonate content is 2.93 mol/m3. CO2 content is 0.1 mol/m3 (ecoinvent v2.2 report 8, Tab 93.1).
- copper scrap, sorted, pressed: -0.000207447 kg; name copper_s; = (copper_wire_use)*-1
  Waste copper wire at end of life
  production volume 6590.5 kg; = ABS(prod_vol*copper_s/plant)
    Calculated from production volume of reference product using the relative outputs.
  property price 2.84 EUR2005; name copper_s_price_EUR2005
  properties: dry mass 1 kg, wet mass 1 kg
- concrete, normal: 0 m3; name concrete; pedigree (1,1,1,1,1)
  Concrete for construction/maintenance consumed per t of processed raw material. Lifespan of plant: 30 years.
  Uncertainty: Data from 3 representative plants, production-weighted average.Density of concrete: 2.41 kg/L
  properties: dry mass 2190 kg, wet mass 2380 kg, water content 0.086758
- waste concrete: 0 kg; name concrete_s
  Waste concrete at end of life
  production volume 0 kg
    Calculated from production volume of reference product using the relative outputs.
  property price 0 EUR2005; name concrete_s_price_EUR2005
  properties: dry mass 0.920168 kg, water content 0.086758, wet mass 1 kg
- scrap steel: 0 kg; name chromium_s
  Representing waste chromium steel
  production volume 0 kg
    Calculated from production volume of reference product using the relative outputs.
  property price 0 EUR2005; name chromium_s_price_EUR2005
  properties: dry mass 1 kg, wet mass 1 kg
- sodium chloride, powder: 0.0173578 kg; name brine; triangular min 0.0173578, mostLikely 0.0173578, max 0.0173578, pedigree (1,3,1,5,1)
  Sodium use for water softening per t of processed raw material.
  Uncertainty: Data from 3 representative plants, production-weighted average.
  properties: dry mass 1 kg, wet mass 1 kg
- tap water: 0.0852709 kg; triangular min 0.0852709, mostLikely 0.0852709, max 0.0852709, pedigree (3,3,2,2,1)
  Fresh water, partially aggregated with seawater, used for maintenance
  properties: wet mass 1 kg, carbon content, fossil 0.00178991, dry mass 0.000337476 kg, water content 2962.17
- tap water: 30.3656 kg; triangular min 30.3656, mostLikely 30.3656, max 30.3656, pedigree (3,3,2,2,1)
  Fresh water, partially aggregated with seawater, used for maintenance
- tap water: 0.708388 kg; triangular min 0.708388, mostLikely 0.708388, max 0.708388, pedigree (3,3,2,2,1)
  Fresh water, partially aggregated with seawater, used for maintenance
- tap water: 0.140924 kg; triangular min 0.140924, mostLikely 0.140924, max 0.140924, pedigree (3,3,2,2,1)
  Fresh water, partially aggregated with seawater, used for maintenance
- tap water: 3.55355 kg; triangular min 3.55355, mostLikely 3.55355, max 3.55355, pedigree (3,3,2,2,1)
  Fresh water, partially aggregated with seawater, used for maintenance
- tap water: 0.262958 kg; triangular min 0.262958, mostLikely 0.262958, max 0.262958, pedigree (3,3,2,2,1)
  Fresh water, partially aggregated with seawater, used for maintenance
- tap water: 40.6651 kg; triangular min 40.6651, mostLikely 40.6651, max 40.6651, pedigree (3,3,2,2,1)
  Fresh water, partially aggregated with seawater, used for maintenance
- concrete, normal: 3.49123e-7 m3; triangular min 3.49123e-7, mostLikely 3.49123e-7, max 3.49123e-7, pedigree (1,3,1,5,1)
  (same comment as for concrete, normal)
- concrete, normal: 1.15883e-5 m3; triangular min 1.15883e-5, mostLikely 1.15883e-5, max 1.15883e-5, pedigree (1,3,1,5,1)
  (same comment as for concrete, normal)
- concrete, normal: 1.20749e-6 m3; triangular min 1.20749e-6, mostLikely 1.20749e-6, max 1.20749e-6, pedigree (1,3,1,5,1)
  (same comment as for concrete, normal)
- concrete, normal: 9.77545e-6 m3; triangular min 9.77545e-6, mostLikely 9.77545e-6, max 9.77545e-6, pedigree (1,3,1,5,1)
  (same comment as for concrete, normal)
- concrete, normal: 2.32854e-5 m3; triangular min 2.32854e-5, mostLikely 2.32854e-5, max 2.32854e-5, pedigree (1,3,1,5,1)
  (same comment as for concrete, normal)
- concrete, normal: 7.85403e-7 m3; triangular min 7.85403e-7, mostLikely 7.85403e-7, max 7.85403e-7, pedigree (1,3,1,5,1)
  (same comment as for concrete, normal)
- concrete, normal: 0.000452576 m3; triangular min 0.000452576, mostLikely 0.000452576, max 0.000452576, pedigree (1,3,1,5,1)
  (same comment as for concrete, normal)
- waste concrete: -0.00385452, -1.0902 kg (2 entries)
  Waste concrete at end of life
  production volume 3.47575e7 kg
- scrap steel: -2.3975e-6, -0.00189638 kg (2 entries)
  Representing waste chromium steel
  production volume 60323.2 kg

## Emissions to nature
- Water [water, ocean]: 0.0758246 m3; = (water+soda+brine)/1000; source Pierre Fréon 2017
  Waste water used for maintenance and pumped back to the ocean. Includes all cleansing agents

## Sampling procedure
Data from 3 fishmeal plants, opperated by the largest and one of the other main fish processing companies in the country. These plants are representative of the current technology and management, as determined by interviews with many technical, commercial, academic and governmental representatives.

## Extrapolations
Extrapolation to GLO based on the fact that the current technology is rather common in the world.
