# electricity voltage transformation from high to medium voltage, aluminium industry

Dataset: EcoSpold 2, unit process
Geography: IAI Area, EU27 & EFTA
Time period: 2015-01-01 to 2019-12-31
Technology level: current
Classification: ISIC rev.4 ecoinvent: 3510:Electric power generation, transmission and distribution
Tags: electricity, primary aluminium industry
Scenario: Business-as-Usual
System model: Allocation at the point of substitution
Generated by: Pascal Lesage
Database: ecoinvent
isCopyrightProtected: true
accessRestrictedTo: 1

## General comment
This dataset represents the transformation of electricity voltage from high to medium voltage. It is specific to the electricity mix consumed by aluminium producers in aluminium-producing countries within EU27 and EFTA (see Geography comment field for list of countries). It includes transformation losses. Capital goods are however included in electricity markets.
It is assumed the primary aluminium industry consumes medium voltage electricity.
This dataset represents the transformation of electricity voltage from high to medium voltage.
Definition of the voltage levels:
- High voltage level above 24 kV (large scale industry)
- Medium voltage level between 1 kV and 24 kV (medium to small scale industry, service sector
and public buildings)
- Low voltage level below 1 kV (Households)

## Included activities start
This activity starts with the high voltage electricity arriving at the transformer station.

## Included activities end
This activity ends with 1kWh of high voltage electricity transformed to medium voltage.
This dataset includes the losses during voltage transformation.
It doesn't include the transformer station itself as this is included in the dataset for the transmission network.

## Geography
Aluminium producing European countries within EU27 and EFTA whose aluminium producers are part of the European Aluminium Association (France, Germany, Greece, Iceland, Italy, Netherlands, Norway, Spain, Sweden, United Kingdom, Romania, Slovakia and Slovenia)

## Time period
Production volume updated with 2015 data from IAI

## Reference product
- electricity, medium voltage, aluminium industry: 1 kWh; CPC 17100: Electrical energy; By-product classification allocatable product
  production volume 6.03e10 kWh
    Calculated value. Based on the region's total production of high voltage electricity for the aluminium industry less high voltage transportation losses and losses of transforming from high to medium voltage. Please refer to the aluminium industry high voltage electricity production datasets for more information on the calculation of the annual production volume of high voltage electricity.
  property price 0.1 EUR2005
    Estimated to be the same as the generic "electricity, medium voltage".

## Inputs from technosphere
- electricity, high voltage, aluminium industry: 0 kWh
- electricity, high voltage, aluminium industry: 1.00585 kWh; lognormal variance with pedigree 0.002, pedigree (1,1,3,1,1)
  Calculated, see 'Extrapolations'

## Extrapolations
This dataset has been extrapolated from year 2015 to the year of the calculation (2019). The uncertainty has been adjusted accordingly.
