# hydropower plant construction, reservoir, alpine region

Dataset: EcoSpold 2, unit process
Geography: RoW
Time period: 1945-01-01 to 2019-12-31
Technology level: current
Classification: EcoSpold01Categories: hydro power/production of components
Classification: ISIC rev.4 ecoinvent: 4220a: Construction of utility projects for electricity production, except for liquid fuels
Tags: ConvertedDataset
Scenario: Business-as-Usual
System model: Allocation at the point of substitution
Generated by: Christian Bauer
Published in: Bolliger, R. 2007
Database: ecoinvent
isCopyrightProtected: true
accessRestrictedTo: 1

## General comment
This study adresses Swiss dams only. The data have been directly applied to preliminary describe dam-mixes in the alpine region, increasing the uncertainties somewhat. The alpine region is considered to be represented by Austria, Italy and France. Considering the difficulty to clearly seperate within the Swiss dams system for some of the dams function for normal electricity generation from pumping storage, the same basic information has been used for the modules describing the two functions. A representative sample of Swiss dams with a height of more than 30 metres is taken into account for calculating the numbers. Lifetime is assumed to be 150 years for the dam and 80 years rest of materials. The data refers to plant construction of a mix of types of dams built between 1945 and 1970, therefore they might not be representative for more modern construction, nor for an individual type.
[This dataset was already contained in the ecoinvent database version 2. It was not individually updated during the transfer to ecoinvent version 3. Life Cycle Impact Assessment results may still have changed, as they are affected by changes in the supply chain, i.e. in other datasets. This dataset was generated following the ecoinvent quality guidelines for version 2. It may have been subject to central changes described in the ecoinvent version 3 change report (http://www.ecoinvent.org/database/ecoinvent-version-3/reports-of-changes/), and the results of the central updates were reviewed extensively. The changes added e.g. consistent water flows and other information throughout the database. The documentation of this dataset can be found in the ecoinvent reports of version 2, which are still available via the ecoinvent website. The change report linked above covers all central changes that were made during the conversion process.]

## Included activities end
Includes the most important materials used for the construction: cement, gravel, water, steel, explosives. Also includes transports and energy used for the construction. Inluded direct burdens to the environment are particle emissions caused by the construction and the disposal of the dam.

## Geography
Data for Swiss avergage conditions, directly used here.

## Technology
Construction technology refers to a mix of types of dams built in Switzerland between 1945 and 1970, therefore they might not be representative for more modern construction, nor for an individual type.

## Parameters
- fraction, tap water, to air: 0.15; name fraction_TW_to_air; lognormal variance with pedigree 0.092025, pedigree (4,4,3,2,4)
- fraction, process water, to air: 0.15 dimensionless; name fraction_PW_to_air; lognormal variance with pedigree 0.092025, pedigree (4,4,3,2,4)

## Reference product
- hydropower plant, reservoir, alpine region: 1 unit; By-product classification allocatable product; CPC 53262: Power plants
  EcoSpold01Location=RER
  production volume 2.67763 unit
    This is a placeholder value that does not reflect real-world production volumes. This dataset does not currently require a real-world production volume to work in the database framework, and no actual data were collected yet. This has no negative effect on the results of the ecoinvent database.
  property price 4.28411e10 EUR2005
    EU27 I/O database(in the 'EU & DK Input Output Database' (available in SimaPro)); -79 Building, non-residential EU 27 (calculated to be 38.169 EUR2003/kg). Based on consumption of (_53 Iron basic, virgin, EU27;7.25517782294095E-3 kg/EUR building; 0.45 EUR2003 per kg DS), (_61 Iron, after first processing, EU27;5.8766830719783E-3kg/EUR building; 0.62 EUR2003 per kg DS), (_65 Fabricated metal products, except machinery, EU27; 8.9167022775554E-3 kg/EUR building; 3.63 EUR2003 per kg DS) and (_66 Machinery and equipment n.e.c., EU27;4.15071881936446E-3 kg/EUR building; 5.71 EUR2003 per kg DS) -1131000000 kg
  property true value 4.28411e10
    allocation property applied in "true value" allocation // value calculated from revenue

## By-products
- heat, for reuse in municipal waste incineration only: 0 MJ; CPC 17300: Steam and hot water; By-product classification allocatable product; pedigree (1,1,1,1,1)
  Net electricity generated from this waste and used in internal MSWI plant energy redistribution.
  Uncertainty: uncertainty is calculated from uncertainties in waste composition and uncertainties in energy efficiency and the uncertainty in internal energy demand
  production volume 230223 MJ
  property exergy 0.1842 MJ; name E_th_prod_MSWI_exergy
    This exergy property is based on the exergy content of the product.
  property price 0.0106 EUR2005; name E_th_prod_MSWI_price_EUR2005
    Average European district heat price from Ecoheatcool and Euroheat 2005-2006, Ecoheat Work package 1: The European heat market. Final report. 10.6 EUR/GJ i s the price of district heat. http://www.solarthermalworld.org/files/Ecoheatcool%20WP1%20Web.pdf?download
  property true value relation 0.1842; name E_th_prod_MSWI_true_value_relation
    property to calculate "true value" from
  property true value 504.801
    allocation property applied in "true value" allocation // value calculated from true value relation
- electricity, for reuse in municipal waste incineration only: 0 kWh; CPC 17100: Electrical energy; By-product classification allocatable product; pedigree (1,1,1,1,1)
  (same comment as for heat, for reuse in municipal waste incineration only)
  production volume 32421.6 kWh
  property true value relation 3.6; name E_el_prod_MSWI_true_value_relation
    property to calculate "true value" from
  property price 0.1 EUR2005; name E_el_prod_MSWI_price_EUR2005
    Estimated to be the same price as in case of electricity, medium voltage.
  property exergy 3.6 MJ; name E_el_prod_MSWI_exergy
    This exergy property is based on the exergy content of the product.
  property true value 1389.37
    (same comment as for heat, for reuse in municipal waste incineration only)

## Inputs from technosphere
- cement, Portland: 0 kg; pedigree (1,1,1,1,1)
  EcoSpold01Location=CH
  own assumption, includes lifetime
  properties: wet mass 1 kg, dry mass 1 kg
- gravel, round: 7.8e10 kg; lognormal variance with pedigree 0.182, pedigree (1,1,5,5,1)
  own assumption, includes lifetime
  EcoSpold01Location=CH
  properties: dry mass 1 kg, wet mass 1 kg
- electricity, medium voltage: 0 kWh; pedigree (1,1,1,1,1)
  EcoSpold01Location=UCTE
  own assumption, includes lifetime
- explosive, tovex: 4.87e7 kg; lognormal variance with pedigree 0.212, pedigree (1,1,5,5,1)
  EcoSpold01Location=CH
  own assumption, includes lifetime
  properties: water content 0.0869565, carbon content, fossil 0.0483756, wet mass 1 kg, dry mass 0.92 kg
  note on carbon content, fossil: Composition in Tab 4.1, ecoinvent v2.2 report n 7-part XVIII. 23% of wet mass consists of CH6N2O3
- reinforcing steel: 1.71e8 kg; lognormal variance with pedigree 0.212, pedigree (1,1,5,5,1)
  own assumption, includes lifetime
  EcoSpold01Location=RER
  properties: carbon content, fossil 0.004, dry mass 1 kg, wet mass 1 kg
- steel, low-alloyed, hot rolled: 7.68e8 kg; lognormal variance with pedigree 0.212, pedigree (1,1,5,5,1)
  EcoSpold01Location=RER
  own assumption, includes lifetime
  properties: carbon content, fossil 0.005, dry mass 1 kg, wet mass 1 kg
  note on carbon content, fossil: Low alloyed steel composition given in Tab. 3.2 ecoinvent v2.2 report 10_partII. Steel assumed to have a C content of 0.5%
- waste reinforced concrete: -9.21e10 kg; lognormal variance with pedigree 0.182, pedigree (1,1,5,5,1)
  EcoSpold01Location=CH
  own assumption, includes lifetime
  production volume 2.763e11 kg
    Calculated from the production volume of hydropower plant, reservoir, alpine region in proportion to the respective output amounts.
  properties: water content 0.00585407, dry mass 0.99418 kg, wet mass 1 kg
- diesel, burned in building machine: 5.15e9 MJ; lognormal variance with pedigree 0.112, pedigree (1,1,5,5,1)
  EcoSpold01Location=GLO
  own assumption, includes lifetime
- tap water: 0 kg; name tap_water_input; pedigree (1,1,1,1,1)
  Estimation. Data are adopted from the Swiss power plant sample as it stands. It is assumed that dams in Austria, Italy and France are built in similar alpine conditions compared to Switzerland, i.e. no major changes are expected. Uncertainty is increased by a factor of 0.2.
  For 1 m3 of concrete 0.8 m3 of gravel, 0.127 m3 of water and 0.073 m3 of cement are mixed. This corresponds to 127 kg of water or 1.63 g water per kWh. The total water consumption for one hydro power plant unit is 4.95. 10^9 kg/unit.
  Estimation. Data are adopted from the Swiss power plant sample as it stands. It is assumed that dams in Austria, Italy and France are built in similar alpine conditions compared to Switzerland, i.e. no major changes are expected. Uncertainty is increased by a factor of 0.2.
  For 1 m3 of concrete 0.8 m3 of gravel, 0.127 m3 of water and 0.073 m3 of cement are mixed. This corresponds to 127 kg of water or 1.63 g water per kWh. The total water consumption for one hydro power plant unit is 4.95. 10^9 kg/unit.
  EcoSpold01Location=RER
  properties: water content 2962.17, carbon content, fossil 0.00178991, dry mass 0.000337476 kg, wet mass 1 kg
  note on carbon content, fossil: Bicarbonate content is 2.93 mol/m3. CO2 content is 0.1 mol/m3 (ecoinvent v2.2 report 8, Tab 93.1).
- steel, chromium steel 18/8, hot rolled: 1.92e8 kg; lognormal variance with pedigree 0.142, pedigree (1,1,5,5,1)
  own assumption, includes lifetime
  EcoSpold01Location=RER
  properties: dry mass 1 kg, wet mass 1 kg, carbon content, fossil 0.0008
  note on carbon content, fossil: Stainless steel model is the grade 304 steel (18/8 stainless, 18% chromium 8% nickel; max. 0.08% C)
- cement, Portland: 1.01013e9, 3.25722e7, 5.64512e7, 4.63065e7, 1.13016e9, 4.75706e7, 6.64681e9 kg (7 entries); lognormal variance with pedigree 0.182, pedigree (1,1,5,5,1)
  EcoSpold01Location=CH
  own assumption, includes lifetime
- electricity, medium voltage: 3.69159e7, 6.71714e6, 1.13912e8, 1.65161e9, 2.36377e8, 7.74466e8 kWh (6 entries); lognormal variance with pedigree 0.182, pedigree (1,1,5,5,1)
  EcoSpold01Location=UCTE
  own assumption, includes lifetime
- tap water: 9.27497e6, 7.70518e7, 1.53284e7, 3.86522e8, 1.00553e7, 2.8602e7, 4.42317e9 kg (7 entries); lognormal variance with pedigree 0.182, pedigree (1,1,5,5,1)
  (same comment as for tap water)

## Emissions to nature
- Water [air, unspecified]: 742500 m3; name water_to_air_unspecified; lognormal variance with pedigree 0.0827, pedigree (2,2,5,5,1)
  Calculated value based on literature values and expert opinion. See comments in the parametres' comment field.
  property fraction, origin: salt water 0; name fraction_origin_salt_water
  property fraction, origin: fresh water 1; name fraction_origin_fresh_water
  property fraction, origin: unspecified 0; name fraction_origin_unspecified
- Particulates, > 2.5 um, and < 10um [air, non-urban air or from high stacks]: 9.22e6 kg; lognormal variance with pedigree 0.342, pedigree (1,1,5,5,1)
  own assumption, includes lifetime
- Water [water, unspecified]: 4.2075e6 m3; name water_to_water_unspecified; lognormal variance with pedigree 0.0827, pedigree (2,2,5,5,1)
  (same comment as for Water)
  property fraction, origin: unspecified 0; name fraction_origin_unspecified_Ww
  property fraction, origin: salt water 0; name fraction_origin_salt_water_Ww
  property fraction, origin: fresh water 1; name fraction_origin_fresh_water_Ww
  property wet mass 1000 kg; name WM
  property carbon content, non-fossil 0; name C_content_non_fossil
  property dry mass 0 kg; name DM
  property carbon content, fossil 0; name C_content_fossil
  property water in wet mass 1000 kg; name WWM
- Particulates, > 10 um [air, non-urban air or from high stacks]: 2.43e7 kg; lognormal variance with pedigree 0.402, pedigree (1,1,5,5,1)
  own assumption, includes lifetime
- Particulates, < 2.5 um [air, non-urban air or from high stacks]: 2.1e6 kg; lognormal variance with pedigree 0.572, pedigree (1,1,5,5,1)
  own assumption, includes lifetime

## Sampling procedure
literature

## Extrapolations
see Geography/Text This dataset has been copied from an original dataset covering the geography RER. The uncertainty has been adjusted accordingly.

## Review by Christian Bauer 2009-02-24
Passed.
