# storage production, 10'000 l

Dataset: EcoSpold 2, unit process
Geography: RER
Time period: 1987-01-01 to 2019-12-31
Technology level: current
Classification: ISIC rev.4 ecoinvent: 2512:Manufacture of tanks, reservoirs and containers of metal
Classification: EcoSpold01Categories: natural gas/cogeneration
Tags: ConvertedDataset
Scenario: Business-as-Usual
System model: Allocation at the point of substitution
Generated by: Thomas Heck
Published in: Heck, T. 2007
Database: ecoinvent
isCopyrightProtected: true
accessRestrictedTo: 1

## General comment
Inventory refers to infrastructure of an existing natural gas cogeneration plant (lambda=1 motor, 160kWe, operation start 1987) at Jakobsberg, Basel, Switzerland. (Life time for operation assumed 100'000 h.)
[This dataset was already contained in the ecoinvent database version 2. It was not individually updated during the transfer to ecoinvent version 3. Life Cycle Impact Assessment results may still have changed, as they are affected by changes in the supply chain, i.e. in other datasets. This dataset was generated following the ecoinvent quality guidelines for version 2. It may have been subject to central changes described in the ecoinvent version 3 change report (http://www.ecoinvent.org/database/ecoinvent-version-3/reports-of-changes/), and the results of the central updates were reviewed extensively. The changes added e.g. consistent water flows and other information throughout the database. The documentation of this dataset can be found in the ecoinvent reports of version 2, which are still available via the ecoinvent website. The change report linked above covers all central changes that were made during the conversion process.]

## Included activities end
The module includes the most important materials used for production. It includes also the transport of these materials and the water needed for production. It applies also modules for welding and sheet rolling.

## Geography
Data refers to a plant in Switzerland, assumed valid for Europe (RER)

## Technology
Component of a specific cogeneration unit installed in Switzerland. Technology at end of 1980s.

## Parameters
- fraction, process water, to air: 0.15 dimensionless; name fraction_PW_to_air; lognormal variance with pedigree 0.092025, pedigree (4,4,3,2,4)
  Literature value. In case when no industry/process specific data are available, default evaporation fraction value is used. This value is 15% and is based on literature (Statistics Canada, 2007 & Shaffer, K.H., 2008, Consumptive water use in the Great Lakes Basin, USGS & Shiklomanov, 2003, World Water Resources at the Beginning of the 21st Century) and has been approved by an expert.

## Reference product
- storage, 10'000 l: 1 unit; CPC 42210: Reservoirs, tanks, vats and similar containers (other than for compressed or liquefied gas), of iron, steel or[…]; By-product classification allocatable product
  EcoSpold01Location=RER
  production volume 1.32237 unit
    This is a placeholder value that does not reflect real-world production volumes. This dataset does not currently require a real-world production volume to work in the database framework, and no actual data were collected yet. This has no negative effect on the results of the ecoinvent database. The placeholder value of this activity was scaled according to the nominal GDP of 2005 (source: United Nations, http://data.un.org/Glossary.aspx?q=GDP+%28current+US%24%29, accessed 20130726) to reflect an appropriate share of the global production volume, which is also a placeholder value.
  property price 1318.22 EUR2005
    Calculated based on inputs: The price of the product has been calculated as a sum of the values of the material and energy inputs for this product. This value is therefore a rough estimation. It may underestimate the real price since there are additional expenses when producing any product. These expences can include for example labour costs, treatment of waste materials and profit for the producer. Please consider carefully whether this level of data quality is acceptable for your application.
  property true value 1318.22
    allocation property applied in "true value" allocation // value calculated from revenue

## By-products
- heat, for reuse in municipal waste incineration only: 0 MJ; CPC 17300: Steam and hot water; By-product classification allocatable product; pedigree (1,1,1,1,1)
  Net electricity generated from this waste and used in internal MSWI plant energy redistribution.
  Uncertainty: uncertainty is calculated from uncertainties in waste composition and uncertainties in energy efficiency and the uncertainty in internal energy demand
  production volume 2.30465 MJ
  property exergy 0.1842 MJ; name E_th_prod_MSWI_exergy
    This exergy property is based on the exergy content of the product.
  property price 0.0106 EUR2005; name E_th_prod_MSWI_price_EUR2005
    Average European district heat price from Ecoheatcool and Euroheat 2005-2006, Ecoheat Work package 1: The European heat market. Final report. 10.6 EUR/GJ i s the price of district heat. http://www.solarthermalworld.org/files/Ecoheatcool%20WP1%20Web.pdf?download
  property true value relation 0.1842; name E_th_prod_MSWI_true_value_relation
    property to calculate "true value" from
  property true value 0.00545771
    allocation property applied in "true value" allocation // value calculated from true value relation
- electricity, for reuse in municipal waste incineration only: 0 kWh; CPC 17100: Electrical energy; By-product classification allocatable product; pedigree (1,1,1,1,1)
  (same comment as for heat, for reuse in municipal waste incineration only)
  production volume 0.324051 kWh
  property true value relation 3.6; name E_el_prod_MSWI_true_value_relation
    property to calculate "true value" from
  property price 0.1 EUR2005; name E_el_prod_MSWI_price_EUR2005
    Estimated to be the same price as in case of electricity, medium voltage.
  property exergy 3.6 MJ; name E_el_prod_MSWI_exergy
    This exergy property is based on the exergy content of the product.
  property true value 0.0149081
    (same comment as for heat, for reuse in municipal waste incineration only)
- zinc concentrate: 0 kg; CPC 14290: Other non-ferrous metal ores and concentrates (other than uranium or thorium ores and concentrates); By-product classification allocatable product
  Calculated value from the knowledge of the properties of both products.
  production volume 4.38402e-5 kg
  property price 0.38 EUR2005; name ByP_price_EUR2005
    Temporary price data. Calculated as 90% of purchasers price based on: Zinc content in concentrate 53%. Concentrate price per kg Zn 86.5% of refined Zn price (13.5% treatment charges according to CHR Metals Limited 2005: Dynamic cost curves. http://www.minecost.com/dynamic.pdf). 2004 zinc price from USGS (2007) Mineral commodity summaries 2007. <http://minerals.usgs.gov/minerals/pubs/mcs/2007/mcs2007.pdf> [Accessed 25 May 2010]
  property zinc content 0.53; name zinc_C_zinc_concentrate
    Zinc content on a dry matter basis. Value taken from teh "zinc mine operation" /GLO dataset.
  property dry mass 1 kg; name DM_zinc_concentrate
  property carbon content 0
    carbon content on a dry matter basis (reserved; not for manual entry)
  property true value 3.83642e-6
    allocation property applied in "true value" allocation // value calculated from revenue
  properties: wet mass 1 kg, water content 0, carbon content, non-fossil 0, carbon content, fossil 0, water in wet mass 0 kg, carbon allocation 0 kg

## Inputs from technosphere
- welding, arc, aluminium: 17.6997 m; lognormal variance with pedigree 0.05, pedigree (1,1,5,1,1)
  EcoSpold01Location=RER
  low uncertainty, defined by size
- alkyd paint, white, without water, in 60% solution state: 4.19994 kg; lognormal variance with pedigree 0.186, pedigree (4,5,5,1,1)
  Basic uncertainty:2
  EcoSpold01Location=RER
  properties: carbon content, fossil 0.414587, carbon content, non-fossil 0.161654, wet mass 1 kg, dry mass 1 kg
  note on carbon content, fossil: C content was calculated as an addition of C content in the raw materials.
- waste mineral wool, for final disposal: 0 kg; pedigree (1,1,1,1,1)
  EcoSpold01Location=CH
  production volume 0 kg
    Calculated from the production volume of storage, 10'000 l in proportion to the respective output amounts.
  properties: wet mass 1 kg, dry mass 1 kg
- sheet rolling, aluminium: 87.1987 kg; lognormal variance with pedigree 0.186, pedigree (4,5,5,1,1)
  EcoSpold01Location=RER
  Basic uncertainty:2
- steel, chromium steel 18/8, hot rolled: 3.69994 kg; lognormal variance with pedigree 0.186, pedigree (4,5,5,1,1)
  Basic uncertainty:2
  EcoSpold01Location=RER
  properties: dry mass 1 kg, wet mass 1 kg, carbon content, fossil 0.0008
  note on carbon content, fossil: Stainless steel model is the grade 304 steel (18/8 stainless, 18% chromium 8% nickel; max. 0.08% C)
- wastewater from pig iron production: 0 m3; name wastewater_output; pedigree (1,1,1,1,1)
  EcoSpold01Location=CH
  rough estimate, uncertainty refers to amount of water only; not quantified here: composition of waste water unkown, therefore high uncertainty of applicability of modul.
  production volume 0 m3
    (same comment as for waste mineral wool, for final disposal)
  property price 0 EUR2005; name wastewater_output_price_EUR2005
  properties: carbon content, fossil 1.2149e-5, water content 2962.17, wet mass 1000 kg, dry mass 0.337476 kg
  note on carbon content, fossil: TOC = 0.0000041 kg/m3 (Tab A.19, ecoinvent v2.2 report 13_I). TOC was considered as Total Carbon.
- sheet rolling, steel: 1769.97 kg; lognormal variance with pedigree 0.186, pedigree (4,5,5,1,1)
  EcoSpold01Location=RER
  Basic uncertainty:2
- reinforcing steel: 1769.97 kg; lognormal variance with pedigree 0.186, pedigree (4,5,5,1,1)
  Basic uncertainty:2
  EcoSpold01Location=RER
  properties: dry mass 1 kg, wet mass 1 kg, carbon content, fossil 0.004
- stone wool: 83.9987 kg; lognormal variance with pedigree 0.186, pedigree (4,5,5,1,1)
  EcoSpold01Location=CH
  Basic uncertainty:2
  properties: carbon content, fossil 0.015401, wet mass 1 kg, dry mass 1 kg
  note on carbon content, fossil: The chemical composition of the glass fibres used in the rock wool production is similar to the composition of naturally cooled volcano basalt and has a composition listed in Tab. 3.1 and 3.2 in ecoinvent v2.2 report 16, part XIV. Rock wool contains: a minimum of 96% mineral fibres,between 0.5 and 3.0 weight percent of phenolic resin depending on the specific product characteristics, and about 0.2 percent mineral oil (ecoinvent v2.2 report 16, part XIV). An average composition of 1.8% phenolic resin, 0.2% mineral oil, and 98% mineral fibres has been assumed and used to calculate C content of the rock wool
- aluminium, wrought alloy: 87.1987 kg; lognormal variance with pedigree 0.186, pedigree (4,5,5,1,1)
  EcoSpold01Location=RER
  Basic uncertainty:2
  properties: dry mass 1 kg, wet mass 1 kg
- welding, arc, steel: 15.3998 m; lognormal variance with pedigree 0.05, pedigree (1,1,5,1,1)
  low uncertainty, defined by size
  EcoSpold01Location=RER
- waste mineral wool, for final disposal: -83.5423, -0.456397 kg (2 entries); lognormal variance with pedigree 0.1227, pedigree (3,3,5,3,4)
  EcoSpold01Location=CH
  production volume 84 kg
- wastewater from pig iron production: -7.85095, -2.3489 m3 (2 entries); lognormal variance with pedigree 0.34, pedigree (1,1,5,1,1)
  (same comment as for wastewater from pig iron production)
  production volume 10.2 m3

## Inputs from nature
- Water, unspecified natural origin [natural resource, in water]: 12.7998 m3; name water_UNO_input; lognormal variance with pedigree 0.34, pedigree (1,1,5,1,1)
  rough estimate

## Emissions to nature
- Water [air, unspecified]: 1.91997 m3; name water_to_air_unspecified; = (water_UNO_input*fraction_PW_to_air); lognormal variance with pedigree 0.0807, pedigree (2,2,5,1,1)
  Calculated value based on literature values and expert opinion. See comments in the parametres' comment field.
  property fraction, origin: salt water 0; name fraction_origin_salt_water
  property fraction, origin: unspecified 1; name fraction_origin_unspecified
  property fraction, origin: fresh water 0; name fraction_origin_fresh_water
- Water [water, unspecified]: 0.679989 m3; name water_to_water_unspecified; = water_UNO_input*(1-fraction_PW_to_air)-(wastewater_output*-1); lognormal variance with pedigree 0.0807, pedigree (2,2,5,1,1)
  (same comment as for Water)
  property fraction, origin: fresh water 0; name fraction_origin_fresh_water_Ww
  property fraction, origin: salt water 0; name fraction_origin_salt_water_Ww
  property fraction, origin: unspecified 1; name fraction_origin_unspecified_Ww
  property water in wet mass 1000 kg; name WWM
  property wet mass 1000 kg; name WM
  property dry mass 0 kg; name DM
  property carbon content, fossil 0; name C_content_fossil
  property carbon content, non-fossil 0; name C_content_non_fossil

## Sampling procedure
Operator and manufacturer information

## Extrapolations
see Geography/Text

## Review by Gerald Rebitzer (obsolete) 2003-08-27
had passed
