# sanitary ceramics production

Dataset: EcoSpold 2, unit process
Geography: RoW
Time period: 1998-01-01 to 2019-12-31
Technology level: current
Classification: ISIC rev.4 ecoinvent: 2392:Manufacture of clay building materials
Classification: EcoSpold01Categories: construction materials/others
Tags: ConvertedDataset
Scenario: Business-as-Usual
System model: Allocation at the point of substitution
Generated by: Hans-Jörg Althaus
Published in: Kellenberger D. 2007
Database: ecoinvent
isCopyrightProtected: true
accessRestrictedTo: 1

## General comment
Data from one producer only. Composition of ceramic might differ from case to case. This dataset refers to oxidic ceramics.
[This dataset was already contained in the ecoinvent database version 2. It was not individually updated during the transfer to ecoinvent version 3. Life Cycle Impact Assessment results may still have changed, as they are affected by changes in the supply chain, i.e. in other datasets. This dataset was generated following the ecoinvent quality guidelines for version 2. It may have been subject to central changes described in the ecoinvent version 3 change report (http://www.ecoinvent.org/database/ecoinvent-version-3/reports-of-changes/), and the results of the central updates were reviewed extensively. The changes added e.g. consistent water flows and other information throughout the database. The documentation of this dataset can be found in the ecoinvent reports of version 2, which are still available via the ecoinvent website. The change report linked above covers all central changes that were made during the conversion process.]

## Included activities end
gate to gate production of sanitary ceramics, including transports of raw materials to factory and of product to Switzerland

## Geography
data from two factories of one producer in Austria

## Technology
large scale production in Europe. Gas fired kiln

## Parameters
- fraction, tap water, to air: 0.15; name fraction_TW_to_air; lognormal variance with pedigree 0.092025, pedigree (4,4,3,2,4)
- fraction, process water, to air: 0.15 dimensionless; name fraction_PW_to_air; lognormal variance with pedigree 0.092025, pedigree (4,4,3,2,4)

## Reference product
- sanitary ceramics: 1 kg; CPC 373: Refractory products and structural non-refractory clay products; By-product classification allocatable product
  EcoSpold01Location=CH
  production volume 3.96633 kg
    This is a placeholder value that does not reflect real-world production volumes. This dataset does not currently require a real-world production volume to work in the database framework, and no actual data were collected yet. This has no negative effect on the results of the ecoinvent database.
  property price 3.33 EUR2005
    According to Industrial Commodity Statistics Yearbook 2005, volume 1. Physical Quantity Data. UN. New York 2008 (hard copy ). The price is for the highest producing country in EU27 where the data are present (France) and Sanitary ceramic fittings. US$ converted to according to http://en.wikipedia.org/wiki/Table_of_historical_exchange_rates downloaded 1 July 2009. Note that there are prices for countries with no information on production volume, e.g. Germany, indicating that production volume data are incomplete.
  property carbon content 0
    carbon content on a dry matter basis (reserved; not for manual entry)
  property true value 3.33
    allocation property applied in "true value" allocation // value calculated from revenue
  properties: carbon content, fossil 0, water content 0, wet mass 1 kg, carbon content, non-fossil 0, dry mass 1 kg, water in wet mass 0 kg, carbon allocation 0 kg

## By-products
- heat, for reuse in municipal waste incineration only: 0 MJ; CPC 17300: Steam and hot water; By-product classification allocatable product; pedigree (1,1,1,1,1)
  Net electricity generated from this waste and used in internal MSWI plant energy redistribution.
  Uncertainty: uncertainty is calculated from uncertainties in waste composition and uncertainties in energy efficiency and the uncertainty in internal energy demand
  production volume 0.0212219 MJ
  property exergy 0.1842 MJ; name E_th_prod_MSWI_exergy
    This exergy property is based on the exergy content of the product.
  property price 0.0106 EUR2005; name E_th_prod_MSWI_price_EUR2005
    Average European district heat price from Ecoheatcool and Euroheat 2005-2006, Ecoheat Work package 1: The European heat market. Final report. 10.6 EUR/GJ i s the price of district heat. http://www.solarthermalworld.org/files/Ecoheatcool%20WP1%20Web.pdf?download
  property true value relation 0.1842; name E_th_prod_MSWI_true_value_relation
    property to calculate "true value" from
  property true value 4.3187e-5
    allocation property applied in "true value" allocation // value calculated from true value relation
- electricity, for reuse in municipal waste incineration only: 0 kWh; CPC 17100: Electrical energy; By-product classification allocatable product; pedigree (1,1,1,1,1)
  (same comment as for heat, for reuse in municipal waste incineration only)
  production volume 0.00287438 kWh
  property price 0.1 EUR2005; name E_el_prod_MSWI_price_EUR2005
    Estimated to be the same price as in case of electricity, medium voltage.
  property exergy 3.6 MJ; name E_el_prod_MSWI_exergy
    This exergy property is based on the exergy content of the product.
  property true value relation 3.6; name E_el_prod_MSWI_true_value_relation
    property to calculate "true value" from
  property true value 0.000114316
    (same comment as for heat, for reuse in municipal waste incineration only)
- iron scrap, sorted, pressed: 0 kg; By-product classification Recyclable; CPC 39310: Slag, dross, scalings and other waste from the manufacture of iron or steel; pedigree (1,1,1,1,1)
  metallic iron scrap removed from ash reamains and recycled.
  Uncertainty: uncertainty is calculated from uncertainties in waste composition and transfer coefficients to soild residues
  production volume 0.000383346 kg
  property price 0.175 EUR2005
    Temporary price data. Calculated as 90% of purchasers price based on: 2005 import and export prices (total trades (USD) divided by total weight (kg) in biggest economies of the world: EU27, USA, Brasil, China, India, Japan and Russia) from UN Commodity Trade Statistics Database (http://data.un.org/Explorer.aspxDatabase [Accessed 2011.06.20]). Commodity: Waste or scrap, of cast iron
  property carbon content 0
    carbon content on a dry matter basis (reserved; not for manual entry)
  property true value 1.91869e-5
    allocation property applied in "true value" allocation // value calculated from revenue
  properties: carbon content, non-fossil 0, wet mass 1 kg, dry mass 1 kg, water content 0, carbon content, fossil 0, water in wet mass 0 kg, carbon allocation 0 kg
- copper: 0 kg; source Rentz O. 1999; By-product classification allocatable product; CPC 41413: Refined copper and copper alloys, unwrought; master alloys of copper
  Literature value. Copper uses: Before end-use copper is manufactured into semi fabricated products, such as shapes and ingots (known as 'semis'). These manufacturing processes are subdivided into hot working, cold working and, if necessary, process annealing. Few of the semis are ready for use as such. They more typically travel to first-stage manufacturers, who make metal rods, wire, and casting, and then to component manufacturers who produce such things as motors, valves, and insulated cables The components in turn are incorporated by final-stage manufacturers into a variety of finished products - automobiles, commercial buildings, residential housing, and so forth. These uses account for about 79% of the world-wide consumption of copper.
  production volume 1.23527e-5 kg
  property price 5.52 EUR2005
    Literature value (http://www.economist.com/news/business/21576714-mining-industry-has-enriched-chile-its-future-precarious-copper-solution). Average price between 20015 and 2013.
  property carbon content 0
    carbon content on a dry matter basis (reserved; not for manual entry)
  property true value 1.92639e-5
    allocation property applied in "true value" allocation // value calculated from revenue
  properties: dry mass 1 kg, water in wet mass 0 kg, wet mass 1 kg, carbon content, non-fossil 0, water content 0, carbon content, fossil 0, carbon allocation 0 kg
- zinc concentrate: 0 kg; CPC 14290: Other non-ferrous metal ores and concentrates (other than uranium or thorium ores and concentrates); By-product classification allocatable product
  Calculated value from the knowledge of the properties of both products.
  production volume 9.80466e-15 kg
  property price 0.38 EUR2005; name ByP_price_EUR2005
    Temporary price data. Calculated as 90% of purchasers price based on: Zinc content in concentrate 53%. Concentrate price per kg Zn 86.5% of refined Zn price (13.5% treatment charges according to CHR Metals Limited 2005: Dynamic cost curves. http://www.minecost.com/dynamic.pdf). 2004 zinc price from USGS (2007) Mineral commodity summaries 2007. <http://minerals.usgs.gov/minerals/pubs/mcs/2007/mcs2007.pdf> [Accessed 25 May 2010]
  property zinc content 0.53; name zinc_C_zinc_concentrate
    Zinc content on a dry matter basis. Value taken from teh "zinc mine operation" /GLO dataset.
  property dry mass 1 kg; name DM_zinc_concentrate
  property carbon content 0
    carbon content on a dry matter basis (reserved; not for manual entry)
  property true value 1.05259e-15
    allocation property applied in "true value" allocation // value calculated from revenue
  properties: wet mass 1 kg, water content 0, carbon content, non-fossil 0, carbon content, fossil 0, water in wet mass 0 kg, carbon allocation 0 kg
- iron scrap, unsorted: 0 kg; source European Aluminium Association 2008; CPC 39310: Slag, dross, scalings and other waste from the manufacture of iron or steel; By-product classification Recyclable; pedigree (1,1,1,1,1)
  production volume 1.01418e-8 kg
  property price 0.149 EUR2005; name ironScrapAmount_price_EUR2005
    Temporary price data. Calculated as 90% of purchasers price based on: estimated at 85% of sorted scrap
  property carbon content 0
    carbon content on a dry matter basis (reserved; not for manual entry)
  property true value 4.64772e-10
    allocation property applied in "true value" allocation // value calculated from revenue
  properties: water in wet mass 0 kg, water content 0, carbon content, fossil 0, carbon content, non-fossil 0, dry mass 1 kg, wet mass 1 kg, carbon allocation 0 kg
- aluminium oxide, non-metallurgical: 0 kg; source European Aluminium Association 2008; CPC 41432: Alumina (aluminium oxide), except artificial corundum; By-product classification allocatable product; CAS 1344-28-1; pedigree (1,1,1,1,1)
  production volume 6.38183e-7 kg
  property carbon content, non-fossil 0; name C_content_non_fossil
  property price 0.28 EUR2005; name Al2O3Amount_price_EUR2005
    From UN trade database. http://data.un.org/ Import data from the largest economies of the world are used (Brazil, India, USA, China, Japan and EU-27).
  property dry mass 1 kg; name DM
  property water content 0; name water_content
  property wet mass 1 kg; name WM
  property water in wet mass 0 kg; name WWM
  property carbon content, fossil 0; name C_content_fossil
  property carbon content 0
    carbon content on a dry matter basis (reserved; not for manual entry)
  property true value 5.49596e-8
    allocation property applied in "true value" allocation // value calculated from revenue
  properties: carbon allocation 0 kg
- aluminium, cast alloy: 0 kg; source European Aluminium Association 2008; By-product classification allocatable product; CPC 41431: Unwrought aluminium; pedigree (1,1,1,1,1)
  EcoSpold01Location=RER
  production volume 5.9656e-6 kg
  property price 1.3 EUR2005; name castAlloyAmount_price_EUR2005
    Temporary price data. Calculated as 90% of purchasers price based on: Source: London Metal Exchange, Aluminium alloy price for 2005
  property carbon content 0
    carbon content on a dry matter basis (reserved; not for manual entry)
  property true value 2.38527e-6
    allocation property applied in "true value" allocation // value calculated from revenue
  properties: water in wet mass 0 kg, carbon content, non-fossil 0, water content 0, dry mass 1 kg, carbon content, fossil 0, wet mass 1 kg, carbon allocation 0 kg
- aluminium, wrought alloy: 0 kg; source European Aluminium Association 2008; By-product classification allocatable product; CPC 4153: Semi-finished products of aluminium or aluminium alloys; pedigree (1,1,1,1,1)
  production volume 2.61163e-6 kg
  property price 1.44 EUR2005; name secondaryAluminiumOutput_price_EUR2005
    Estimated based on literature values and expert judgement. Aluminium ccast alloys are about 90% of the price of aluminium wrought alloys.
  property carbon content 0
    carbon content on a dry matter basis (reserved; not for manual entry)
  property true value 1.15668e-6
    allocation property applied in "true value" allocation // value calculated from revenue
  properties: wet mass 1 kg, water content 0, carbon content, fossil 0, water in wet mass 0 kg, carbon content, non-fossil 0, dry mass 1 kg, carbon allocation 0 kg

## Inputs from technosphere
- ceramic factory: 3.99976e-9 unit; lognormal variance with pedigree 0.3526, pedigree (1,3,5,5,1)
  EcoSpold01Location=CH
- municipal solid waste: 0 kg; pedigree (1,1,1,1,1)
  EcoSpold01Location=CH
  production volume 0 kg
    Calculated from the production volume of sanitary ceramics in proportion to the respective output amounts.
  properties: water content 0.297017, wet mass 1 kg, carbon content, non-fossil 0.261655, dry mass 0.771 kg, carbon content, fossil 0.171549
  note on carbon content, non-fossil: MSW composition in tab 4.1, ecoinvent v2.2 report 13_I. C content referred to 1 kg DM
- stucco: 0.124993 kg; lognormal variance with pedigree 0.0426, pedigree (1,3,5,5,1)
  EcoSpold01Location=CH
  properties: wet mass 1 kg, dry mass 1 kg
- kaolin: 0.443973 kg; lognormal variance with pedigree 0.0426, pedigree (1,3,5,5,1)
  EcoSpold01Location=RER
  properties: wet mass 1 kg, dry mass 1 kg
- electricity, medium voltage: 0 kWh; pedigree (1,1,1,1,1)
  EcoSpold01Location=UCTE
- inert waste, for final disposal: -0.126992 kg; lognormal variance with pedigree 0.0426, pedigree (1,3,5,5,1)
  EcoSpold01Location=CH
  production volume 0.381 kg
    (same comment as for municipal solid waste)
  properties: dry mass 0.995 kg, water content 0.00502513, wet mass 1 kg
- heat, district or industrial, natural gas: 0 MJ; pedigree (1,1,1,1,1)
  EcoSpold01Location=RER
- polyethylene, high density, granulate: 0.00150991 kg; lognormal variance with pedigree 0.0426, pedigree (1,3,5,5,1)
  EcoSpold01Location=RER
  properties: wet mass 1 kg, carbon content, fossil 0.857143, dry mass 1 kg
  note on carbon content, fossil: Polyethylene is formed out of a huge amount of ethylene monomers (C2H4) (ecoinvent v2.2 report 11_II). MW=28 g/mol
- bilge oil: 0 kg; pedigree (1,1,1,1,1)
  EcoSpold01Location=CH
  production volume 0 kg
    (same comment as for municipal solid waste)
  properties: wet mass 1 kg, dry mass 0.1 kg, water content 9, carbon content, fossil 0.84
  note on carbon content, fossil: Tab A.6, ecoinvent v2.2 report 13_I. C content has been calculated after data in the tables, and then referred to 1 kg DM
- tap water: 0 kg; name tap_water_input; pedigree (1,1,1,1,1)
  EcoSpold01Location=RER
  properties: water content 2962.17, wet mass 1 kg, dry mass 0.000337476 kg, carbon content, fossil 0.00178991
  note on carbon content, fossil: Bicarbonate content is 2.93 mol/m3. CO2 content is 0.1 mol/m3 (ecoinvent v2.2 report 8, Tab 93.1).
- waste mineral oil: 0 kg; pedigree (1,1,1,1,1)
  EcoSpold01Location=CH
  production volume 0 kg
    (same comment as for municipal solid waste)
  properties: water content 0.111111, carbon content, fossil 0.864444, dry mass 0.9 kg, wet mass 1 kg
- feldspar: 0.378977 kg; lognormal variance with pedigree 0.0426, pedigree (1,3,5,5,1)
  EcoSpold01Location=RER
  properties: dry mass 1 kg, wet mass 1 kg
- clay: 0.424975 kg; lognormal variance with pedigree 0.0426, pedigree (1,3,5,5,1)
  EcoSpold01Location=CH
  properties: water content 0.0362694, dry mass 0.965 kg, wet mass 1 kg
- chemical, inorganic: 0.00302982 kg; lognormal variance with pedigree 0.0426, pedigree (1,3,5,5,1)
  EcoSpold01Location=GLO
  properties: carbon content, fossil 0.003, wet mass 1 kg, dry mass 1 kg
  note on carbon content, fossil: This dataset is an unweighted average of 20 inorganic substances (listed in Tab 88.1, ecoinvent v2.2 report 8, part II), being part of the top100 chemicals included in this database. The C-content has also been calculated as an unweighted average of the C content of the substances composing this dataset.
- silica sand: 0.250985 kg; lognormal variance with pedigree 0.0426, pedigree (1,3,5,5,1)
  EcoSpold01Location=DE
  properties: water content 0.010101, dry mass 0.99 kg, wet mass 1 kg
- hazardous waste, for underground deposit: -0.000101994 kg; lognormal variance with pedigree 0.0426, pedigree (1,3,5,5,1)
  EcoSpold01Location=DE
  production volume 0.000306 kg
    (same comment as for municipal solid waste)
  properties: wet mass 1 kg, carbon content, fossil 0.554667, dry mass 1 kg
  note on carbon content, fossil: Tab A.6, ecoinvent v2.2 report 13_I, average hazardous waste composition was used, and referred to 0% water mass. No waste-specific emission are currently inventoried for underground deposits. Accordingly, no waste composition must be specified. For generic, average waste to underground deposit deposition in a 200 liter steel drum without cement solidification is assumed (ecoinvent v2.2 report 13_I).
- waste plastic, mixture: 0 kg; pedigree (1,1,1,1,1)
  EcoSpold01Location=CH
  production volume 0 kg
    (same comment as for municipal solid waste)
  properties: wet mass 1 kg, carbon content, fossil 0.747344, water content 0.180638, dry mass 0.847 kg
  note on carbon content, fossil: C content in 1 kg DM was calculated using data in Tab A.2, ecoinvent v2.2 report 13_I
- waste emulsion paint: 0 kg; pedigree (1,1,1,1,1)
  EcoSpold01Location=CH
  production volume 0 kg
    (same comment as for municipal solid waste)
  properties: carbon content, fossil 0.27, dry mass 1 kg, wet mass 1 kg
  note on carbon content, fossil: Tab A.4, ecoinvent v2.2 report 13_I. C content has been calculated after data in the tables, and then referred to 1 kg DM
- spent solvent mixture: 0 kg; pedigree (1,1,1,1,1)
  EcoSpold01Location=CH
  production volume 0 kg
    (same comment as for municipal solid waste)
  properties: carbon content, fossil 0.571257, water content 0.197605, wet mass 1 kg, dry mass 0.835 kg
  note on carbon content, fossil: Tab A.7, ecoinvent v2.2 report 13_I. C content has been calculated after data in the tables, and then referred to 1 kg DM
- wastewater from ceramic production: -0.000982941 m3; lognormal variance with pedigree 0.0426, pedigree (1,3,5,5,1)
  EcoSpold01Location=CH
  production volume 0.002949 m3
    (same comment as for municipal solid waste)
  properties: dry mass 0.337476 kg, water content 2962.17, wet mass 1000 kg
- municipal solid waste: -5.03566e-5, -1.26886e-5, -0.00290235, -1.81328e-5, -0.0356142 kg (5 entries); lognormal variance with pedigree 0.0426, pedigree (1,3,5,5,1)
  EcoSpold01Location=CH
  production volume 0.1158 kg
- electricity, medium voltage: 0.00925277, 0.00168361, 0.0388627, 0.132267, 0.0285515, 0.413967, 0.0592466, 0.194116 kWh (8 entries); lognormal variance with pedigree 0.0426, pedigree (1,3,5,5,1)
  EcoSpold01Location=UCTE
- heat, district or industrial, natural gas: 0.285028, 6.49455, 16.1141 MJ (3 entries); lognormal variance with pedigree 0.0426, pedigree (1,3,5,5,1)
  EcoSpold01Location=RER
- bilge oil: -5.74743e-5, -0.000119515 kg (2 entries); lognormal variance with pedigree 0.0426, pedigree (1,3,5,5,1)
  EcoSpold01Location=CH
  production volume 0.000531 kg
- tap water: 0.000608472, 0.00505488, 0.0010056, 0.216229, 0.0253573, 0.000659663, 0.0018764, 0.290176 kg (8 entries); lognormal variance with pedigree 0.0426, pedigree (1,3,5,5,1)
  EcoSpold01Location=RER
- waste mineral oil: -7.11861e-5, -0.000211797 kg (2 entries); lognormal variance with pedigree 0.0426, pedigree (1,3,5,5,1)
  EcoSpold01Location=CH
  production volume 0.000849 kg
- waste plastic, mixture: -4.82761e-6, -3.22562e-7, -2.43948e-8, -1.3323e-7, -5.38233e-8, -1.26514e-7, -4.11335e-6, -3.37959e-5 kg (8 entries); lognormal variance with pedigree 0.0426, pedigree (1,3,5,5,1)
  EcoSpold01Location=CH
  production volume 0.0001302 kg
- waste emulsion paint: -1.29692e-8, -1.45021e-7 kg (2 entries); lognormal variance with pedigree 0.0426, pedigree (1,3,5,5,1)
  EcoSpold01Location=CH
  production volume 4.74e-7 kg
- spent solvent mixture: -1.78503e-5, -5.14455e-5 kg (2 entries); lognormal variance with pedigree 0.0426, pedigree (1,3,5,5,1)
  EcoSpold01Location=CH
  production volume 0.0002079 kg

## Inputs from nature
- Water, well, in ground [natural resource, in water]: 0.0105994 m3; name water_well_in_ground_input; lognormal variance with pedigree 0.0426, pedigree (1,3,5,5,1)

## Emissions to nature
- Water [water, unspecified]: 0.00848634 m3; name water_to_water_unspecified; lognormal variance with pedigree 0.0827, pedigree (2,2,5,5,1)
  Calculated value based on literature values and expert opinion. See comments in the parametres' comment field.
  property fraction, origin: unspecified 0; name fraction_origin_unspecified_Ww
  property fraction, origin: salt water 0; name fraction_origin_salt_water_Ww
  property fraction, origin: fresh water 1; name fraction_origin_fresh_water_Ww
  property wet mass 1000 kg; name WM
  property carbon content, fossil 0; name C_content_fossil
  property dry mass 0 kg; name DM
  property water in wet mass 1000 kg; name WWM
  property carbon content, non-fossil 0; name C_content_non_fossil
- Water [air, unspecified]: 0.00167105 m3; name water_to_air_unspecified; lognormal variance with pedigree 0.0827, pedigree (2,2,5,5,1)
  (same comment as for Water)
  property fraction, origin: salt water 0; name fraction_origin_salt_water
  property fraction, origin: fresh water 1; name fraction_origin_fresh_water
  property fraction, origin: unspecified 0; name fraction_origin_unspecified
- Particulates, < 2.5 um [air, unspecified]: 0.00870948 kg; lognormal variance with pedigree 0.1726, pedigree (1,3,5,5,1)

## Sampling procedure
environmental report

## Extrapolations
see Geography This dataset has been copied from an original dataset covering the geography CH. The uncertainty has been adjusted accordingly.

## Review by Roberto Dones 2003-08-11
passed
