# pump station construction

Dataset: EcoSpold 2, unit process
Geography: RoW
Time period: 1993-01-01 to 2019-12-31
Technology level: current
Classification: EcoSpold01Categories: water supply/production
Classification: ISIC rev.4 ecoinvent: 4220:Construction of utility projects
Tags: ConvertedDataset
Scenario: Business-as-Usual
System model: Allocation at the point of substitution
Share of production covered: 9 %
Generated by: Niels Jungbluth
Published in: Althaus H.-J. 2004
Database: ecoinvent
isCopyrightProtected: true
accessRestrictedTo: 1

## General comment
Estimation for a pump station in Marin (NE) with a capacity of 644546 m3 per year. Life time 70 years.
[This dataset was already contained in the ecoinvent database version 2. It was not individually updated during the transfer to ecoinvent version 3. Life Cycle Impact Assessment results may still have changed, as they are affected by changes in the supply chain, i.e. in other datasets. This dataset was generated following the ecoinvent quality guidelines for version 2. It may have been subject to central changes described in the ecoinvent version 3 change report (http://www.ecoinvent.org/database/ecoinvent-version-3/reports-of-changes/), and the results of the central updates were reviewed extensively. The changes added e.g. consistent water flows and other information throughout the database. The documentation of this dataset can be found in the ecoinvent reports of version 2, which are still available via the ecoinvent website. The change report linked above covers all central changes that were made during the conversion process.]

## Included activities end
Materials, transports, disposal for the infrastructure. Estimation for land use. No data for construction work.

## Geography
Data provided by a CH company in Marin (NE).

## Technology
pump station

## Time period
Time of publication.

## Reference product
- pump station: 1 unit; By-product classification allocatable product; CPC 54231: General construction services of aqueducts and other water supply conduits, except pipelines
  EcoSpold01Location=CH
  production volume 3.96633 unit
    This is a placeholder value that does not reflect real-world production volumes. This dataset does not currently require a real-world production volume to work in the database framework, and no actual data were collected yet. This has no negative effect on the results of the ecoinvent database.
  property price 1.05504e6 EUR2005
    Convert from EU 27 price to the world by currency exchange rate.
  property true value 1.05504e6
    allocation property applied in "true value" allocation // value calculated from revenue

## By-products
- iron scrap, sorted, pressed: 0 kg; By-product classification Recyclable; CPC 39310: Slag, dross, scalings and other waste from the manufacture of iron or steel; pedigree (1,1,1,1,1)
  Iron scrap recovered from this waste.
  production volume 45.2543 kg
  property price 0.175 EUR2005
    Temporary price data. Calculated as 90% of purchasers price based on: 2005 import and export prices (total trades (USD) divided by total weight (kg) in biggest economies of the world: EU27, USA, Brasil, China, India, Japan and Russia) from UN Commodity Trade Statistics Database (http://data.un.org/Explorer.aspxDatabase [Accessed 2011.06.20]). Commodity: Waste or scrap, of cast iron
  property carbon content 0
    carbon content on a dry matter basis (reserved; not for manual entry)
  property true value 0.388541
    allocation property applied in "true value" allocation // value calculated from revenue
  properties: water content 0, water in wet mass 0 kg, carbon content, fossil 0, dry mass 1 kg, carbon content, non-fossil 0, wet mass 1 kg, carbon allocation 0 kg
- heat, for reuse in municipal waste incineration only: 0 MJ; CPC 17300: Steam and hot water; By-product classification allocatable product; pedigree (1,1,1,1,1)
  Net electricity generated from this waste and used in internal MSWI plant energy redistribution.
  Uncertainty: uncertainty is calculated from uncertainties in waste composition and uncertainties in energy efficiency and the uncertainty in internal energy demand
  production volume 2146.41 MJ
  property price 0.0106 EUR2005; name E_th_prod_MSWI_price_EUR2005
    Average European district heat price from Ecoheatcool and Euroheat 2005-2006, Ecoheat Work package 1: The European heat market. Final report. 10.6 EUR/GJ i s the price of district heat. http://www.solarthermalworld.org/files/Ecoheatcool%20WP1%20Web.pdf?download
  property exergy 0.1842 MJ; name E_th_prod_MSWI_exergy
    This exergy property is based on the exergy content of the product.
  property true value relation 0.1842; name E_th_prod_MSWI_true_value_relation
    property to calculate "true value" from
  property true value 3.62871
    allocation property applied in "true value" allocation // value calculated from true value relation
- electricity, for reuse in municipal waste incineration only: 0 kWh; CPC 17100: Electrical energy; By-product classification allocatable product; pedigree (1,1,1,1,1)
  (same comment as for heat, for reuse in municipal waste incineration only)
  production volume 244.88 kWh
  property true value relation 3.6; name E_el_prod_MSWI_true_value_relation
    property to calculate "true value" from
  property price 0.1 EUR2005; name E_el_prod_MSWI_price_EUR2005
    Estimated to be the same price as in case of electricity, medium voltage.
  property exergy 3.6 MJ; name E_el_prod_MSWI_exergy
    This exergy property is based on the exergy content of the product.
  property true value 8.08468
    (same comment as for heat, for reuse in municipal waste incineration only)

## Inputs from technosphere
- brass: 0.629993 kg; lognormal variance with pedigree 0.0532, pedigree (2,3,5,5,1)
  Literature
  EcoSpold01Location=CH
  Uncertainty: Literature
  properties: wet mass 1 kg, dry mass 1 kg
- cement, unspecified: 0 kg; pedigree (1,1,1,1,1)
  Literature
  EcoSpold01Location=CH
  Uncertainty: Literature
  properties: wet mass 1 kg, dry mass 1 kg
- waste cement in concrete and mortar: 0 kg; pedigree (1,1,1,1,1)
  EcoSpold01Location=CH
  Estimation for materials used
  Uncertainty: Estimation for materials used
  production volume 0 kg
    Calculated from the production volume of pump station in proportion to the respective output amounts.
  properties: water content 0.00502513, dry mass 0.995 kg, wet mass 1 kg
- cast iron: 4491.95 kg; lognormal variance with pedigree 0.0532, pedigree (2,3,5,5,1)
  EcoSpold01Location=RER
  Literature
  Uncertainty: Literature
  properties: carbon content, fossil 0.04, dry mass 1 kg, wet mass 1 kg
  note on carbon content, fossil: Cast iron is made by remelting pig iron in small furnaces (e.g. cupola furnaces or electric arc furnaces) and poured into moulds to make castings. It usually contains 2% to 6% carbon (ecoinvent v2.2 report 10_partII). An average content of 4% was considered
- waste polyvinylchloride: 0 kg; pedigree (1,1,1,1,1)
  (same comment as for waste cement in concrete and mortar)
  production volume 0 kg
    (same comment as for waste cement in concrete and mortar)
  properties: water content 0.00200401, carbon content, fossil 0.440882, dry mass 0.998 kg, wet mass 1 kg
  note on carbon content, fossil: C content in 1 kg DM was calculated using data in Tab A.1, ecoinvent v2.2 report 13_I
- flat glass, coated: 322.996 kg; lognormal variance with pedigree 0.0532, pedigree (2,3,5,5,1)
  Literature
  EcoSpold01Location=RER
  Uncertainty: Literature
  properties: wet mass 1 kg, dry mass 1 kg
- aluminium, cast alloy: 3.51996 kg; lognormal variance with pedigree 0.0532, pedigree (2,3,5,5,1)
  Literature
  EcoSpold01Location=RER
  Uncertainty: Literature
  properties: dry mass 1 kg, wet mass 1 kg
- bronze: 1.04999 kg; lognormal variance with pedigree 0.0532, pedigree (2,3,5,5,1)
  EcoSpold01Location=CH
  Literature
  Uncertainty: Literature
  properties: dry mass 1 kg, wet mass 1 kg
- synthetic rubber: 0.419995 kg; lognormal variance with pedigree 0.0532, pedigree (2,3,5,5,1)
  EcoSpold01Location=RER
  Literature
  Uncertainty: Literature
  properties: dry mass 1 kg, carbon content, fossil 0.871949, wet mass 1 kg
  note on carbon content, fossil: EPDM (Ethylene-propene-diene terpolymer) rubber is a terpolymer of ethylene, propene, and a diene with the residual unsaturated portion of the diene in the side chain (ecoinvent v2.2 report 7-part XX & Ullmann). Chemical formula (deduced from Evidences of Solvent-Induced Miscibility in Polychloroprene-co-Ethylene-Propene Diene Terpolymer Blends, Dubey et al., Journal of Applied Polymer Science, 2009, 111:1884–1891): C20H35
- steel, low-alloyed, hot rolled: 3215.96 kg; lognormal variance with pedigree 0.0532, pedigree (2,3,5,5,1)
  EcoSpold01Location=RER
  Literature
  Uncertainty: Literature
  properties: wet mass 1 kg, carbon content, fossil 0.005, dry mass 1 kg
  note on carbon content, fossil: Low alloyed steel composition given in Tab. 3.2 ecoinvent v2.2 report 10_partII. Steel assumed to have a C content of 0.5%
- waste reinforcement steel: -4491.95 kg; lognormal variance with pedigree 0.0532, pedigree (2,3,5,5,1)
  (same comment as for waste cement in concrete and mortar)
  production volume 13476 kg
    (same comment as for waste cement in concrete and mortar)
  properties: wet mass 1 kg, dry mass 1 kg
- reinforcing steel: 17967.8 kg; lognormal variance with pedigree 0.0532, pedigree (2,3,5,5,1)
  Literature
  EcoSpold01Location=RER
  Uncertainty: Literature
  properties: wet mass 1 kg, dry mass 1 kg, carbon content, fossil 0.004
- lean concrete: 16.1048 m3; lognormal variance with pedigree 0.0532, pedigree (2,3,5,5,1)
  Literature
  EcoSpold01Location=CH
  Uncertainty: Literature
  properties: water content 0.0528846, wet mass 2190 kg, dry mass 2080 kg
- polyvinylchloride, bulk polymerised: 1163.99 kg; lognormal variance with pedigree 0.0532, pedigree (2,3,5,5,1)
  EcoSpold01Location=RER
  Literature
  Uncertainty: Literature
  properties: carbon content, fossil 0.387097, wet mass 1 kg, dry mass 1 kg
  note on carbon content, fossil: Monomer is vynyl chloride, C2H3Cl (ecoinvent v2.2 report 11_II). MW=62 g/mol
- copper: 860.99 kg; lognormal variance with pedigree 0.0532, pedigree (2,3,5,5,1)
  Literature
  EcoSpold01Location=RER
  Uncertainty: Literature
  properties: dry mass 1 kg, wet mass 1 kg
- waste rubber, unspecified: 0 kg; pedigree (1,1,1,1,1)
  (same comment as for waste cement in concrete and mortar)
  production volume 0 kg
    (same comment as for waste cement in concrete and mortar)
  properties: dry mass 1 kg, carbon content, fossil 0.853, wet mass 1 kg
- waste reinforced concrete: 0 kg; pedigree (1,1,1,1,1)
  (same comment as for waste cement in concrete and mortar)
  production volume 0 kg
    (same comment as for waste cement in concrete and mortar)
  properties: water content 0.00585407, wet mass 1 kg, dry mass 0.99418 kg
- concrete, normal: 0 m3; pedigree (1,1,1,1,1)
  EcoSpold01Location=CH
  Literature
  Uncertainty: Literature
  properties: water content 0.086758, dry mass 2190 kg, wet mass 2380 kg
- waste glass pane in burnable frame: -322.996 kg; lognormal variance with pedigree 0.0532, pedigree (2,3,5,5,1)
  (same comment as for waste cement in concrete and mortar)
  production volume 969 kg
    (same comment as for waste cement in concrete and mortar)
  properties: dry mass 1 kg, wet mass 1 kg
- aluminium, wrought alloy: 7.47991 kg; lognormal variance with pedigree 0.0532, pedigree (2,3,5,5,1)
  EcoSpold01Location=RER
  Literature
  Uncertainty: Literature
  properties: wet mass 1 kg, dry mass 1 kg
- cement, unspecified: 1586.69, 116.214, 331.248, 7625.74, 7491.29, 220.491, 2421.64, 292.991, 32725.1 kg (9 entries); lognormal variance with pedigree 0.0532, pedigree (2,3,5,5,1)
  Literature
  EcoSpold01Location=CH
  Uncertainty: Literature
- waste cement in concrete and mortar: -14939, -37872.4 kg (2 entries); lognormal variance with pedigree 0.0532, pedigree (2,3,5,5,1)
  (same comment as for waste cement in concrete and mortar)
  production volume 158436 kg
- waste polyvinylchloride: -129.484, -8.65162, -0.654308, -3.57343, -1.44363, -3.39331, -110.326, -906.46 kg (8 entries); lognormal variance with pedigree 0.0532, pedigree (2,3,5,5,1)
  (same comment as for waste cement in concrete and mortar)
  production volume 3492 kg
- waste rubber, unspecified: -0.209998, -0.209998 kg (2 entries); lognormal variance with pedigree 0.0532, pedigree (2,3,5,5,1)
  (same comment as for waste cement in concrete and mortar)
  production volume 1.26 kg
- waste reinforced concrete: -35088.6, -500775 kg (2 entries); lognormal variance with pedigree 0.0532, pedigree (2,3,5,5,1)
  (same comment as for waste cement in concrete and mortar)
  production volume 1.60761e6 kg
- concrete, normal: 5.22266, 0.544194, 4.40563, 2.47817, 10.4943, 0.353968, 203.968 m3 (7 entries); lognormal variance with pedigree 0.0532, pedigree (2,3,5,5,1)
  EcoSpold01Location=CH
  Literature
  Uncertainty: Literature

## Inputs from nature
- Occupation, industrial area [natural resource, land]: 43749.5 m2*year; lognormal variance with pedigree 0.16, pedigree (5,5,5,5,1)
  Rough estimation for 70a life time
  Uncertainty: Rough estimation for 70a life time
- Transformation, from unspecified [natural resource, land]: 624.993 m2; lognormal variance with pedigree 0.24, pedigree (5,5,5,5,1)
  Rough estimation
  Uncertainty: Rough estimation
- Transformation, to industrial area [natural resource, land]: 624.993 m2; lognormal variance with pedigree 0.24, pedigree (5,5,5,5,1)
  Rough estimation
  Uncertainty: Rough estimation

## Sampling procedure
Literature and own estimations

## Extrapolations
From single data to Swiss situation. This dataset has been copied from an original dataset covering the geography CH. The uncertainty has been adjusted accordingly.

## Review by Manuele Margni (obsolete) 2005-07-19
Passed
