# stone meal production

Dataset: EcoSpold 2, unit process
Geography: CH
Time period: 2000-01-01 to 2019-12-31
Technology level: current
Classification: EcoSpold01Categories: agricultural means of production/mineral fertiliser
Classification: ISIC rev.4 ecoinvent: 0891:Mining of chemical and fertilizer minerals
Tags: ConvertedDataset
Scenario: Business-as-Usual
System model: Allocation at the point of substitution
Generated by: Angelika Heil
Published in: Nemecek, T. 2007
Database: ecoinvent
isCopyrightProtected: true
accessRestrictedTo: 1

## General comment
Values originate from a single producer of stone meal in Switzerland, which, however, can be considered typical for the Swiss market.
[This dataset was already contained in the ecoinvent database version 2. It was not individually updated during the transfer to ecoinvent version 3. Life Cycle Impact Assessment results may still have changed, as they are affected by changes in the supply chain, i.e. in other datasets. This dataset was generated following the ecoinvent quality guidelines for version 2. It may have been subject to central changes described in the ecoinvent version 3 change report (http://www.ecoinvent.org/database/ecoinvent-version-3/reports-of-changes/), and the results of the central updates were reviewed extensively. The changes added e.g. consistent water flows and other information throughout the database. The documentation of this dataset can be found in the ecoinvent reports of version 2, which are still available via the ecoinvent website. The change report linked above covers all central changes that were made during the conversion process.]

## Included activities end
Stone meal is a by-product (filter residue) of stone mining. Energy requirements for further processing required to obtain a commercial stone meal fertiliser were included. In addition, transports from the manufacturer to the regional storehouse were taken into consideration. Infrastructure and land use were included by means of a proxy-module.

## Geography
The values refer to the market situation in Switzerland.

## Technology
Values refer to a commonly used technology for this product.

## Time period
Year when data for the inventory were communicated

## Reference product
- stone meal: 1 kg; CPC 34649: Other mineral or chemical fertilizers containing at least two nutrients (nitrogen, phosphate, potash), n.e.c.; By-product classification allocatable product
  EcoSpold01Location=CH
  production volume 0.0336675 kg
    This is a placeholder value that does not reflect real-world production volumes. This dataset does not currently require a real-world production volume to work in the database framework, and no actual data were collected yet. This has no negative effect on the results of the ecoinvent database. The placeholder value of this activity was scaled according to the nominal GDP of 2005 (source: United Nations, http://data.un.org/Glossary.aspx?q=GDP+%28current+US%24%29, accessed 20130726) to reflect an appropriate share of the global production volume, which is also a placeholder value.
  property price 0.211753 EUR2005
    Calculated based on inputs: The price of the product has been calculated as a sum of the values of the material and energy inputs for this product. This value is therefore a rough estimation. It may underestimate the real price since there are additional expenses when producing any product. These expences can include for example labour costs, treatment of waste materials and profit for the producer. Please consider carefully whether this level of data quality is acceptable for your application.
  property carbon content, non-fossil 0
    Contain 34-56% silicic acid (H4O4Si) + 30-56% lime (CaCO3) (ecoinvent v2.2 report n 15a, pg 83). A content 50% 50% was considered here.
  property carbon content, fossil 0.06
    (same comment as for stone meal)
  property carbon content 0.06
    carbon content on a dry matter basis (reserved; not for manual entry)
  properties: water content 0, water in wet mass 0 kg, dry mass 1 kg, wet mass 1 kg, carbon allocation 0.06 kg

## Inputs from technosphere
- chemical factory, organics: 4e-10 unit; lognormal variance with pedigree 0.1727, pedigree (3,3,5,3,1)
  activityLink introduced to establish a direct link to the corresponding regional supply of this product
  EcoSpold01Location=RER
- electricity, low voltage: 0.005 kWh; lognormal variance with pedigree 0.0527, pedigree (3,3,5,3,1)
  EcoSpold01Location=CH

## Sampling procedure
Data retrieved from a Swiss manufacturer.

## Extrapolations
This dataset has been extrapolated from year 2000 to the year of the calculation (2019). The uncertainty has been adjusted accordingly.

## Review by Maggie Osses 2003-07-25
Passed.
