# cheese production, soft, from cow milk

Dataset: EcoSpold 2, unit process
Geography: GLO
Time period: 2007-01-01 to 2019-12-31
Technology level: current
Classification: ISIC rev.4 ecoinvent: 1050:Manufacture of dairy products
Scenario: Business-as-Usual
System model: Allocation at the point of substitution
Generated by: Tereza Levova
Published in: Kim, D. 2013
Database: ecoinvent
isCopyrightProtected: true
accessRestrictedTo: 1

## General comment
There are a very wide range of cheese varieties and many subtle differences in processing methods. In general, however, the following process steps apply; production of coagulum through the action of rennet and/or lactic acid, separation of the resulting curds from the whey, and manipulation of the curds to produce the desired characteristics of the cheese.

Classification of cheese according to firmness and ripening (FAO, 1978, Codex General Standard for Cheese);
This activity represents soft cheese production (mozzarella type).
The dry mass is not balanced in this inventory because the emphasis was put on fat content balance.
Source: European Comission, IPPC, 2006, Reference Document on BAT in the Food, Milk and Drink Industries

## Included activities start
This boundaries of the activity are given by the physical boundaries of the creamery.

## Included activities end
This activity end when the finished product - cheese - is ready to leave the gates of the creamery.

## Technology
This dataset has been created mainly based on a study (Kim, D., et.al., 2013, Life cycle assessment of cheese and whey production in the USA) which collected data from 6 different creameries producing mozzarella. Each facility has a different size and technology. Thus this study is an average of different technologies of mozzarella production.

## Parameters
- fraction, tap water, to air: 0.15; name fraction_TW_to_air; = fraction_PW_to_air; lognormal variance with pedigree 0.092025, pedigree (4,4,3,2,4)
  Calculated value. See comment in the other parametres present in this dataset. Tap water is considered to be always used as process water, thus process water fractions to air are applied to all tap water input flows to calculate the amount of water consumed in the processes.
- fraction, process water, to air: 0.15 dimensionless; name fraction_PW_to_air; lognormal variance with pedigree 0.092025, pedigree (4,4,3,2,4)
  Literature value. In case when no industry/process specific data are available, default evaporation fraction value is used. This value is 15% and is based on literature (Statistics Canada, 2007 & Shaffer, K.H., 2008, Consumptive water use in the Great Lakes Basin, USGS & Shiklomanov, 2003, World Water Resources at the Beginning of the 21st Century) and has been approved by an expert.

## Reference product
- whey: 1 kg; = (0.333+0.113)/DM_whey; CPC 22130: Whey; By-product classification allocatable product; pedigree (1,1,1,1,1)
  Calculated value based on literature (Kim, D., et.al., 2013, Life cycle assessment of cheese and whey production in the USA).
  The whey produced in this process is 74.7% dry whey and 25.3% wet whey. The ratio between wet and dry mass dictates the amount of energy needed (for the drying).
  production volume 2.79011e10 kg; = Ref('8dd5d83d-7594-47a6-9d5f-d4effddc570b')/ cheese_RP* Ref('e626074c-80ce-4f50-a40b-97181f861765', 'ProductionVolume')
    Calculated from production volume of reference product using the relative outputs.
  property price 0.0354 EUR2005
    Temporary price data. Calculated as 90% of purchasers price based on: 2005 import prices (total trades (USD) divided by total weight (kg) in biggest economies of the world: EU27, USA, Brasil, China, India, Japan and Russia) from UN Commodity Trade Statistics Database (http://data.un.org/Explorer.aspxDatabase [Accessed 2011.06.23]). Commodity: Whey. The calculated price is 0.553 EUR/kg of dry mass of whey. The dry mass content is 0.064 kg/kg of wet mass of whey. Thus the price is (0.553*0.064=) 0.035 EUR/ kg of wet mass of whey. Cross-reference: the price of wet whey on the Swiss market is 0.02 CHF/kg (0.022 EUR/kg). Source: http://www.esu-services.ch/fileadmin/download/kopf-2015-agrarforschung-molke.pdf, accessed 20150917.
  property water in wet mass 0.936 kg; name WWM_whey
  property water content 14.625; = WWM_whey/DM_whey
  property wet mass 1 kg; name WM_whey
  property dry mass 0.064 kg; name DM_whey
  property carbon content 0.340757
    carbon content on a dry matter basis (reserved; not for manual entry)
  property true value 0.246694
    allocation property applied in "true value" allocation // value calculated from revenue
  properties: carbon content, fossil 0, carbon content, non-fossil 0.340757, carbon allocation 0.0218084 kg
- cheese, from cow milk, fresh, unripened: 0 kg; name cheese_RP; = 0.512/0.4999; By-product classification allocatable product; CPC 22251: Cheese from milk of cattle, fresh or processed
  Calculated based on literature value. The life cycle inventory of mozzarella production plant total processed solids is extracted from literature (Kim, D., et.al., 2013, Life cycle assessment of cheese and whey production in the USA).
  Four products are represented by the plant total processed solids; mozzarella cheese, dry whey, wet whey and other co-products. These are represented in the following ratios on dry mass basis 51.2%:33.3%:11.3:4.2% (personal communication with Daesoo Kim, Ralph E. Martin Department of Chemical Engineering, University of Arkansas, USA).
  0.4999 kg is the dry mass of mozzarella (calculated based on literature data; USDA, National Nutrient Database for Standard Reference, accessed 20130123).
  production volume 4.10066e9 kg; = 18715934000*0.313*0.7
    Calculated based on literature value and assumptions.
    18715934000 kg is the amount of cheese from cow milk produced in the world in 2011 (Faostat, accessed 20130124).
    5161863000 kg is the amount of cheese from cow milk produced in the USA in 2011 (Faostat, accessed 20130124).
    1615241112 kg is the amount of mozzarella produced in the USA in 2011 (IDFA, http://www.idfa.org/files/resources/cheese-production.pdf, accessed 20140124). Thus 31.3% of all cheese from cow milk produced in the USA in 2011 is mozzarella.
    It is estimated, that the cheese production in the whole world follows the same pattern as in the USA, i.e. 31.3% of all cheese from cow milk in the world is the mozzarella type.
    Further more it is estimated, that 70% of this cheese is produce as a reference product and in 30% as by-product of different dairy products activities.
  property carbon content, non-fossil 0.4899
    Biogenic carbon content on a dry matter basis. Proxy value, calculated from the chemical composition of an average fresh cheese from data published by Health Canada (<http://webprod3.hc-sc.gc.ca/cnf-fce/report-rapport.do?lang=eng>).
  property carbon content, fossil 0
    Fossil carbon content on a dry matter basis. Proxy value, calculated from the chemical composition of an average fresh cheese from data published by Health Canada (<http://webprod3.hc-sc.gc.ca/cnf-fce/report-rapport.do?lang=eng>).
  property fat content 0.014
    Fat content, on a wet mass basis. Average value calculated from a fat mass balance on the collected data.
  property price 3.34 EUR2005; name cheese_RP_price_EUR2005
    Calculated based on data from FAOSTAT (accessed 20140428). The price is calculated by using data on total world import quantity (tonnes) and import value (1000 USD), year 2005. 3544090 tonnes of Cheese, whole, cow milk was imported in the world in 2005. The import value was 14276166000 USD. The calculated price is thus (14276166/3544090=4.028*0.8=) 3.249 Euro. Using the same approach the calculated price for 2010 was 3.84 Euro.
  property carbon content 0.4899
    carbon content on a dry matter basis (reserved; not for manual entry)
  property true value 3.42084; name cheese_RP_true_value
    allocation property applied in "true value" allocation // value calculated from revenue
  properties: wet mass 1 kg, water in wet mass 0.8248 kg, water content 4.70776, dry mass 0.1752 kg, carbon allocation 0.0858305 kg

## By-products
- electricity, for reuse in municipal waste incineration only: 0 kWh; CPC 17100: Electrical energy; By-product classification allocatable product; pedigree (1,1,1,1,1)
  Net electricity generated from this waste and used in internal MSWI plant energy redistribution.
  Uncertainty: uncertainty is calculated from uncertainties in waste composition and uncertainties in energy efficiency and the uncertainty in internal energy demand
  production volume 2.96588e6 kWh
  property exergy 3.6 MJ; name E_el_prod_MSWI_exergy
    This exergy property is based on the exergy content of the product.
  property true value relation 3.6; name E_el_prod_MSWI_true_value_relation
    property to calculate "true value" from
  property price 0.1 EUR2005; name E_el_prod_MSWI_price_EUR2005
    Estimated to be the same price as in case of electricity, medium voltage.
  property true value 4.86505e-5
    allocation property applied in "true value" allocation // value calculated from true value relation
- heat, for reuse in municipal waste incineration only: 0 MJ; CPC 17300: Steam and hot water; By-product classification allocatable product; pedigree (1,1,1,1,1)
  Net useful heat generated from this waste and used in internal MSWI plant energy redistribution.
  Uncertainty: uncertainty is calculated from uncertainties in waste composition and uncertainties in energy efficiency and the uncertainty in internal energy demand
  production volume 2.56426e7 MJ
  property true value relation 0.1842; name E_th_prod_MSWI_true_value_relation
    property to calculate "true value" from
  property exergy 0.1842 MJ; name E_th_prod_MSWI_exergy
    This exergy property is based on the exergy content of the product.
  property price 0.0106 EUR2005; name E_th_prod_MSWI_price_EUR2005
    Average European district heat price from Ecoheatcool and Euroheat 2005-2006, Ecoheat Work package 1: The European heat market. Final report. 10.6 EUR/GJ i s the price of district heat. http://www.solarthermalworld.org/files/Ecoheatcool%20WP1%20Web.pdf?download
  property true value 2.06337e-5
    (same comment as for electricity, for reuse in municipal waste incineration only)
- zinc concentrate: 0 kg; CPC 14290: Other non-ferrous metal ores and concentrates (other than uranium or thorium ores and concentrates); By-product classification allocatable product
  Calculated value from the knowledge of the properties of both products.
  production volume 2142.52 kg
  property price 0.38 EUR2005; name ByP_price_EUR2005
    Temporary price data. Calculated as 90% of purchasers price based on: Zinc content in concentrate 53%. Concentrate price per kg Zn 86.5% of refined Zn price (13.5% treatment charges according to CHR Metals Limited 2005: Dynamic cost curves. http://www.minecost.com/dynamic.pdf). 2004 zinc price from USGS (2007) Mineral commodity summaries 2007. <http://minerals.usgs.gov/minerals/pubs/mcs/2007/mcs2007.pdf> [Accessed 25 May 2010]
  property zinc content 0.53; name zinc_C_zinc_concentrate
    Zinc content on a dry matter basis. Value taken from teh "zinc mine operation" /GLO dataset.
  property dry mass 1 kg; name DM_zinc_concentrate
  property carbon content 0
    carbon content on a dry matter basis (reserved; not for manual entry)
  property true value 2.68224e-9
    allocation property applied in "true value" allocation // value calculated from revenue
  properties: wet mass 1 kg, water content 0, carbon content, non-fossil 0, carbon content, fossil 0, water in wet mass 0 kg, carbon allocation 0 kg
- biogas: 0 m3; source Raboni, Massimo 2014; By-product classification allocatable product; CPC 17200: Coal gas, water gas, producer gas and similar gases, other than petroleum gases and other gaseous hydrocarbons; pedigree (1,1,1,1,1)
  An average yield of 100 litres of biogas per kg biowaste is assumed
  production volume 573567 m3
  property carbon content, non-fossil 0.449939
    Total C content in kg/Nm3 (Tab 12.8, ecoinvent v2.2 report n17), referred to 1kg DM
  property price 0.109 EUR2005; name biogas_yield_price_EUR2005
    Temporary price data. Calculated as 90% of purchasers price based on: Same prices per energy output as natural gas, based on the proportional lower heating value (2/3 that of natural gas)
  property carbon content 0.449939
    carbon content on a dry matter basis (reserved; not for manual entry)
  property true value 1.86822e-6
    allocation property applied in "true value" allocation // value calculated from revenue
  properties: dry mass 1.15 kg, wet mass 1.15 kg, carbon content, fossil 0, water content 0, lower heating value 0 MJ/Nm3, water in wet mass 0 kg, carbon allocation 0.51743 kg
- compost: 0 kg; CPC 391: Wastes from food and tobacco industry; By-product classification allocatable product; pedigree (1,1,1,1,1)
  EcoSpold01Location=CH
  Biowaste is reduced in mass by a factor of 2 during composting
  production volume 9.80106e6 kg
  property nitrogen content 0.0136364; name Mass_compost_N_content; = Mass_biowaste_N_content/0.5*( DM_biowaste / DM_compost)
    nitrogen content on a dry matter basis
  property water in wet mass 0.472 kg; name Water_in_wet_mass_compost; = 1- DM_compost
  property price 0.03 EUR2005
    Temporary price data. Calculated as 90% of purchasers price based on: Estimation done using the following sources: <http://www.wmaa.asn.au/uploads/documents/MarkWinser_1May2007.pdf>; <http://www.swlf.ait.ac.th/UpdData/International/Composting%20and%20anaerobic%20digestion_%20comparions%20for%20Europe%20and%20Asia.pdf>; <http://www.epa.gov/osw/conserve/rrr/composting/basic.htm>, accessed 2011.06.16
  property carbon content, non-fossil 0.1165
    calculation: dry matter 50%, organic matter 40% of dry matter, C content calculated from organic matter divided by 1.72. Relative to dry matter; relative to fresh matter: divided by 2 => 0.1156
  property dry mass 0.528 kg; name DM_compost
  property water content 0.893939; name Water_content_compost; = Water_in_wet_mass_compost/DM_compost
  property concentration, cadmium 0 kg/kg; name Mass_compost_concentration_Cd; = Mass_biowaste_concentration_Cd*2
    Biowaste mass is reduced by a factor of two during composting, therefore concentration is doubled
  property humus equivalent 0.061 kg
    Humus building fraction expressed in kg per kg product on a FM basis. Humus denotes the converted, primary biomass from plants or animals in the ground. More information can be found in the documentation of the composting itself: "treatment of biowaste, industrial composting".
  property concentration, copper 0 kg/kg; name Mass_compost_concentration_Cu; = Mass_biowaste_concentration_Cu*2
    (same comment as for compost)
  property concentration, calcium 0 kg/kg; name Mass_compost_Ca_concentration; = Mass_biowaste_concentration_Ca*2
    (same comment as for compost)
  property concentration, magnesium 0 kg/kg; name Mass_compost_Mg_concentration; = Mass_biowaste_concentration_Mg*2
    (same comment as for compost)
  property concentration, mercury 0 kg/kg; name Mass_compost_Hg_concentration; = Mass_biowaste_concentration_Hg*2
    (same comment as for compost)
  property concentration, lead 0 kg/kg; name Mass_compost_concentration_Pb; = Mass_biowaste_concentration_Pb*2
    (same comment as for compost)
  property concentration, nickel 0 kg/kg; name Mass_compost_Ni_concentration; = Mass_biowaste_concentration_Ni*2
    (same comment as for compost)
  property concentration, phosphorus 0 kg/kg; name Mass_compost_P_concentration; = Mass_biowaste_concentration_P*2
    (same comment as for compost)
  property concentration, sulfur 0 kg/kg; name Mass_compost_concentration_S; = Mass_biowaste_concentration_S*2
    (same comment as for compost)
  property concentration, potassium 0 kg/kg; name Mass_compost_K_concentration; = Mass_biowaste_concentration_K*2
    (same comment as for compost)
  property nickel content 1.60606e-5; name Mass_compost_Ni_content; = Mass_biowaste_Ni_content/0.5*( DM_biowaste / DM_compost)
    nickel content on a dry matter basis
  property concentration, nitrogen 0 kg/kg; = Mass_biowaste_concentration_N*2
    (same comment as for compost)
  property concentration, zinc 0 kg/kg; name Mass_compost_concentration_Zn; = Mass_biowaste_concentration_Zn*2
    (same comment as for compost)
  property lead content 2.66667e-5; name Mass_compost_Pb_content; = Mass_biowaste_Pb_content/0.5*( DM_biowaste / DM_compost)
    lead content on a dry matter basis
  property copper content 3.81818e-5; name Mass_compost_Cu_content; = Mass_biowaste_Cu_content/0.5*( DM_biowaste / DM_compost)
    copper content on a dry matter basis
  property cadmium content 2.89394e-7; name Mass_compost_Cd_content; = Mass_biowaste_Cd_content/0.5*( DM_biowaste / DM_compost)
    cadmium content on a dry matter basis
  property magnesium content 0.00525758; name Mass_compost_Mg_content; = Mass_biowaste_Mg_content/0.5*( DM_biowaste / DM_compost)
    magnesium content on a dry matter basis
  property zinc content 0.000120303; name Mass_compost_Zn_content; = Mass_biowaste_Zn_content/0.5*( DM_biowaste / DM_compost)
    zinc content on a dry matter basis
  property potassium content 0.0099697; name Mass_compost_K_content; = Mass_biowaste_K_content/0.5*( DM_biowaste / DM_compost)
    potassium content on a dry matter basis
  property sulfur content 0.00190909; name Mass_compost_S_content; = Mass_biowaste_S_content/0.5*( DM_biowaste / DM_compost)
    sulfur content on a dry matter basis
  property calcium content 0.0504545; name Mass_compost_Ca_content; = Mass_biowaste_Ca_content/0.5*( DM_biowaste / DM_compost)
    calcium content on a dry matter basis
  property mercury content 1e-7; name Mass_compost_Hg_content; = Mass_biowaste_Hg_content/0.5*( DM_biowaste / DM_compost)
    mercury content on a dry matter basis
  property phosphorus content 0.00275758; name Mass_compost_P_content; = Mass_biowaste_P_content/0.5*( DM_biowaste / DM_compost)
    phosphorus content on a dry matter basis
  property carbon content 0.1165
    carbon content on a dry matter basis (reserved; not for manual entry)
  property true value 3.8065e-5
    allocation property applied in "true value" allocation // value calculated from revenue
  properties: carbon content, fossil 0, wet mass 1 kg, carbon allocation 0.061512 kg
- iron scrap, sorted, pressed: 0 kg; By-product classification Recyclable; CPC 39310: Slag, dross, scalings and other waste from the manufacture of iron or steel; pedigree (1,1,1,1,1)
  Iron scrap recovered from this waste.
  Uncertainty: uncertainty calculated from uncertainty in waste composition, uncertainty of share of recyclable metal, uncertainty of transfer coefficient to bottom ash, uncertainty of the efficiency of scrap removal in MSWI plant.
  production volume 2.22759 kg
  property price 0.175 EUR2005
    Temporary price data. Calculated as 90% of purchasers price based on: 2005 import and export prices (total trades (USD) divided by total weight (kg) in biggest economies of the world: EU27, USA, Brasil, China, India, Japan and Russia) from UN Commodity Trade Statistics Database (http://data.un.org/Explorer.aspxDatabase [Accessed 2011.06.20]). Commodity: Waste or scrap, of cast iron
  property carbon content 0
    carbon content on a dry matter basis (reserved; not for manual entry)
  property true value 2.38996e-11
    allocation property applied in "true value" allocation // value calculated from revenue
  properties: carbon content, fossil 0, dry mass 1 kg, carbon content, non-fossil 0, water in wet mass 0 kg, wet mass 1 kg, water content 0, carbon allocation 0 kg
- iron scrap, unsorted: 0 kg; source European Aluminium Association 2008; CPC 39310: Slag, dross, scalings and other waste from the manufacture of iron or steel; By-product classification Recyclable; pedigree (1,1,1,1,1)
  production volume 0.000254054 kg
  property price 0.149 EUR2005; name ironScrapAmount_price_EUR2005
    Temporary price data. Calculated as 90% of purchasers price based on: estimated at 85% of sorted scrap
  property carbon content 0
    carbon content on a dry matter basis (reserved; not for manual entry)
  property true value 6.55353e-16
    allocation property applied in "true value" allocation // value calculated from revenue
  properties: water in wet mass 0 kg, water content 0, carbon content, fossil 0, carbon content, non-fossil 0, dry mass 1 kg, wet mass 1 kg, carbon allocation 0 kg
- aluminium oxide, non-metallurgical: 0 kg; source European Aluminium Association 2008; CPC 41432: Alumina (aluminium oxide), except artificial corundum; By-product classification allocatable product; CAS 1344-28-1; pedigree (1,1,1,1,1)
  production volume 0.0159867 kg
  property carbon content, non-fossil 0; name C_content_non_fossil
  property price 0.28 EUR2005; name Al2O3Amount_price_EUR2005
    From UN trade database. http://data.un.org/ Import data from the largest economies of the world are used (Brazil, India, USA, China, Japan and EU-27).
  property dry mass 1 kg; name DM
  property water content 0; name water_content
  property wet mass 1 kg; name WM
  property water in wet mass 0 kg; name WWM
  property carbon content, fossil 0; name C_content_fossil
  property carbon content 0
    carbon content on a dry matter basis (reserved; not for manual entry)
  property true value 7.7496e-14
    allocation property applied in "true value" allocation // value calculated from revenue
  properties: carbon allocation 0 kg
- aluminium, cast alloy: 0 kg; source European Aluminium Association 2008; By-product classification allocatable product; CPC 41431: Unwrought aluminium; pedigree (1,1,1,1,1)
  EcoSpold01Location=RER
  production volume 0.14944 kg
  property price 1.3 EUR2005; name castAlloyAmount_price_EUR2005
    Temporary price data. Calculated as 90% of purchasers price based on: Source: London Metal Exchange, Aluminium alloy price for 2005
  property carbon content 0
    carbon content on a dry matter basis (reserved; not for manual entry)
  property true value 3.36336e-12
    allocation property applied in "true value" allocation // value calculated from revenue
  properties: water in wet mass 0 kg, carbon content, non-fossil 0, water content 0, dry mass 1 kg, carbon content, fossil 0, wet mass 1 kg, carbon allocation 0 kg
- aluminium, wrought alloy: 0 kg; source European Aluminium Association 2008; By-product classification allocatable product; CPC 4153: Semi-finished products of aluminium or aluminium alloys; pedigree (1,1,1,1,1)
  production volume 0.0654219 kg
  property price 1.44 EUR2005; name secondaryAluminiumOutput_price_EUR2005
    Estimated based on literature values and expert judgement. Aluminium ccast alloys are about 90% of the price of aluminium wrought alloys.
  property carbon content 0
    carbon content on a dry matter basis (reserved; not for manual entry)
  property true value 1.63098e-12
    allocation property applied in "true value" allocation // value calculated from revenue
  properties: wet mass 1 kg, water content 0, carbon content, fossil 0, water in wet mass 0 kg, carbon content, non-fossil 0, dry mass 1 kg, carbon allocation 0 kg
- copper: 0 kg; source Rentz O. 1999; By-product classification allocatable product; CPC 41413: Refined copper and copper alloys, unwrought; master alloys of copper
  Literature value. Copper uses: Before end-use copper is manufactured into semi fabricated products, such as shapes and ingots (known as 'semis'). These manufacturing processes are subdivided into hot working, cold working and, if necessary, process annealing. Few of the semis are ready for use as such. They more typically travel to first-stage manufacturers, who make metal rods, wire, and casting, and then to component manufacturers who produce such things as motors, valves, and insulated cables The components in turn are incorporated by final-stage manufacturers into a variety of finished products - automobiles, commercial buildings, residential housing, and so forth. These uses account for about 79% of the world-wide consumption of copper.
  production volume 0.0333142 kg
  property price 5.52 EUR2005
    Literature value (http://www.economist.com/news/business/21576714-mining-industry-has-enriched-chile-its-future-precarious-copper-solution). Average price between 20015 and 2013.
  property carbon content 0
    carbon content on a dry matter basis (reserved; not for manual entry)
  property true value 2.34374e-11
    allocation property applied in "true value" allocation // value calculated from revenue
  properties: dry mass 1 kg, water in wet mass 0 kg, wet mass 1 kg, carbon content, non-fossil 0, water content 0, carbon content, fossil 0, carbon allocation 0 kg

## Inputs from technosphere
- chemical, organic: 0.0014864 kg; source Kim, D. 2013; lognormal variance with pedigree 0.0138, pedigree (3,4,4,4,2)
  Literature value (Kim, D., et.al., 2013, Life cycle assessment of cheese and whey production in the USA).
  properties: wet mass 1 kg, carbon content, fossil 0.628, dry mass 1 kg
  note on carbon content, fossil: This dataset is an unweighted average of 20 organic substances (listed in Tab 88.1, ecoinvent v2.2 report 8, part II), being part of the top100 chemicals included in this database. The C-content has also been calculated as an unweighted average of the C content of the substances composing this dataset.
- cream, from cow milk: 4.21791e-6 kg; source Kim, D. 2013; lognormal variance with pedigree 0.0138, pedigree (3,4,4,4,2)
  (same comment as for chemical, organic)
  properties: water content 2.33222, carbon content, non-fossil 0.6847, dry mass 0.3001 kg, wet mass 1 kg, fat (total lipid) content 0.241 kg
- tap water: 0.106064 kg; name tap_water_input; = (((wastewater*-1)-(1+fraction_TW_to_air)* water_well_in_ground_input)*1000)/(1- fraction_TW_to_air); lognormal variance with pedigree 0.0138, pedigree (3,4,4,4,2)
  Calculated value. The amount of tap water on the output of the activity is calculated from the amount of wastewater.
  properties: wet mass 1 kg, water content 2962.17, dry mass 0.000337476 kg, carbon content, fossil 0.00178991
  note on carbon content, fossil: Bicarbonate content is 2.93 mol/m3. CO2 content is 0.1 mol/m3 (ecoinvent v2.2 report 8, Tab 93.1).
- electricity, medium voltage: 0.00699767 kWh; source Kim, D. 2013; lognormal variance with pedigree 0.0138, pedigree (3,4,4,4,2)
  (same comment as for chemical, organic)
- nitric acid, without water, in 50% solution state: 0 kg; source Kim, D. 2013; pedigree (1,1,1,1,1)
  (same comment as for chemical, organic)
  properties: dry mass 1 kg, wet mass 1 kg
- dairy: 8.99004e-7 m3; = cheese_RP*(1/dairy_lifetime_capacity* milk_input/dairy_lifetime); source Schmid, A. 2010; lognormal variance with pedigree 0.3132, pedigree (3,4,4,4,2)
  Calculated based on literature data (Schmid, A.; 2010, Bachelor-Thesis; Carbon Footprint von Schweizer Käse, supervised by T.Nemecek, Agroscope).
  20 years is the lifetime of a dairy
  (18*10*3=) 540m3 is the volume of the dairy
  2.2E6 kg/year is the amount of milk proccessed annually in the dairy of volume of 540m3.
  property lifetime 20 year; name dairy_lifetime
  property lifetime capacity [kg] 4074.07 kg; name dairy_lifetime_capacity; = 2.2E6/(10*18*3)
  note on lifetime capacity [kg]: Calculated based on literature value. The lifetime capacity might vary a lot dipending on the size of the dairy. This dairy of volume of (18*10*3=) 540m3 has a capacity of 2.2E6 kg of process milk/year. This milk can be processed to many different products such as cheese, butter or yogurt.
- heat, district or industrial, natural gas: 0.041793 MJ; source Kim, D. 2013; lognormal variance with pedigree 0.0138, pedigree (3,4,4,4,2)
  (same comment as for chemical, organic)
- cow milk: 0.0715211 kg; name milk_input; source Kim, D. 2013; lognormal variance with pedigree 0.0138, pedigree (3,4,4,4,2)
  Literature value (Kim, D., et.al., 2013, Life cycle assessment of cheese and whey production in the USA).
  kg of Fat and Protein Corrected Milk. FPCM is 4.0% fat and 3.3% true protein content. Conversion to FPCM is as follow, according to the International Dairy Federation: FPCM (kg/yr) = Production (kg/yr) x [0.1226 x Fat% + 0.0776 x Protein% + 0.2534]
  properties: dry mass 0.1231 kg, wet mass 1 kg, water content 7.12348, carbon content, non-fossil 0.53797
- potassium hydroxide: 1.2451e-5 kg; source Kim, D. 2013; lognormal variance with pedigree 0.0138, pedigree (3,4,4,4,2)
  (same comment as for chemical, organic)
  properties: water content 0.168224, dry mass 0.856 kg, wet mass 1 kg
- wastewater from potato starch production: -0.000129336 m3; name wastewater; source Kim, D. 2013; lognormal variance with pedigree 0.0138, pedigree (3,4,4,4,2)
  Literature value (Kim, D., et.al., 2013, Life cycle assessment of cheese and whey production in the USA).
  Wastewater from potato starch production is a proxy for the wastewater from butter production for which data are not available.
  production volume 5.36503e7 m3; = wastewater/ cheese_RP* Ref('e626074c-80ce-4f50-a40b-97181f861765', 'ProductionVolume')
    Calculated from production volume of reference product using the relative outputs.
  property price 0 EUR2005; name wastewater_price_EUR2005
  properties: water content 1146.05, wet mass 1000 kg, carbon content, non-fossil 0.993118, dry mass 0.871801 kg
- sodium hydroxide, without water, in 50% solution state: 0.000123545 kg; source Kim, D. 2013; lognormal variance with pedigree 0.0138, pedigree (3,4,4,4,2)
  (same comment as for chemical, organic)
  properties: wet mass 1 kg, dry mass 1 kg
- biowaste: 0 kg; source Kim, D. 2013; pedigree (1,1,1,1,1)
  (same comment as for chemical, organic)
  production volume 0 kg
    Calculated from production volume of reference product using the relative outputs.
  properties: carbon content, non-fossil 0.1624, wet mass 1 kg, water content 1.5, dry mass 0.4 kg
- chemical, inorganic: 0.0014864 kg; source Kim, D. 2013; lognormal variance with pedigree 0.0138, pedigree (3,4,4,4,2)
  (same comment as for chemical, organic)
  properties: wet mass 1 kg, carbon content, fossil 0.003, dry mass 1 kg
  note on carbon content, fossil: This dataset is an unweighted average of 20 inorganic substances (listed in Tab 88.1, ecoinvent v2.2 report 8, part II), being part of the top100 chemicals included in this database. The C-content has also been calculated as an unweighted average of the C content of the substances composing this dataset.
- skimmed milk, from cow milk: 0.00175666 kg; source Kim, D. 2013; lognormal variance with pedigree 0.0138, pedigree (3,4,4,4,2)
  (same comment as for chemical, organic)
  properties: dry mass 0.0916 kg, fat (total lipid) content 0.008734 kg, ash content 0.081878 kg, carbon content, non-fossil 0.4506, wet mass 1 kg, water content 9.917, carbohydrates content 0.541485 kg
  note on fat (total lipid) content: Calculated based on literature data (USDA, National Nutrient Database for Standard Reference, accessed 20130123), "Milk, nonfat, fluid, without added vitamin A and vitamin D (fat free or skim)".
  note on carbon content, non-fossil: Calculated value. Biogene carbon content on a dry matter basis.
- nitric acid, without water, in 50% solution state: 4.33296e-5, 0.000205691 kg (2 entries); source Kim, D. 2013; lognormal variance with pedigree 0.0138, pedigree (3,4,4,4,2)
  (same comment as for chemical, organic)
- biowaste: -6.81907e-7, -6.2635e-5 kg (2 entries); source Kim, D. 2013; lognormal variance with pedigree 0.0138, pedigree (3,4,4,4,2)
  (same comment as for chemical, organic)
  production volume 2.62646e7 kg

## Inputs from nature
- Water, well, in ground [natural resource, in water]: 3.40714e-5 m3; name water_well_in_ground_input; source Kim, D. 2013; lognormal variance with pedigree 0.0138, pedigree (3,4,4,4,2)
  (same comment as for chemical, organic)

## Emissions to nature
- Water [air, unspecified]: 2.10203e-5 m3; name water_to_air_unspecified; = (((tap_water_input/1000)+water_well_in_ground_input)*fraction_TW_to_air); lognormal variance with pedigree 0.0138, pedigree (3,4,4,4,2)
  Calculated value.
  property fraction, origin: unspecified 0; name fraction_origin_unspecified
  property fraction, origin: fresh water 1; name fraction_origin_fresh_water
  property fraction, origin: salt water 0; name fraction_origin_salt_water

## Sampling procedure
In total six mozzarella manufactoring facilities shared their data used to compile this LCI. The cumulative production of these factories is 0.35 million tons.

## Extrapolations
This dataset has been extrapolated from the local, US dataset. The uncertainty data have been adjusted accordingly.
