# maize grain, feed production, organic

Dataset: EcoSpold 2, unit process
Geography: RoW
Time period: 1996-01-01 to 2019-12-31
Technology level: current
Classification: ISIC rev.4 ecoinvent: 0111:Growing of cereals (except rice), leguminous crops and oil seeds
Classification: EcoSpold01Categories: agricultural means of production/feed
Tags: ConvertedDataset
Scenario: Business-as-Usual
System model: Allocation at the point of substitution
Generated by: Thomas Nemecek
Published in: Nemecek, T. 2007
Database: ecoinvent
isCopyrightProtected: true
accessRestrictedTo: 1

## General comment
The inventory refers to 1 kg processed feedstuff (fresh weight).
[This dataset was already contained in the ecoinvent database version 2. It was not individually updated during the transfer to ecoinvent version 3. Life Cycle Impact Assessment results may still have changed, as they are affected by changes in the supply chain, i.e. in other datasets. This dataset was generated following the ecoinvent quality guidelines for version 2. It may have been subject to central changes described in the ecoinvent version 3 change report (http://www.ecoinvent.org/database/ecoinvent-version-3/reports-of-changes/), and the results of the central updates were reviewed extensively. The changes added e.g. consistent water flows and other information throughout the database. The documentation of this dataset can be found in the ecoinvent reports of version 2, which are still available via the ecoinvent website. The change report linked above covers all central changes that were made during the conversion process.]

## Included activities end
The inventory includes the transport of the raw materials to the feed processing centre, processing feedstuff (crushing or milling, heat treatment, dosing, mixing squeezing and pelleting) and the storage of the feed mixes. It also includes water use and wastewater treatment, the transformation and use of land related to the storage buildings. No process emissions were included except heat waste from the use of electricity. Packaging is not included.

## Geography
Values refer to feedstuff delivered in Switzerland.

## Technology
Refers to expanded feedstuff.

## Time period
Years of the publications of the main sources

## Parameters
- fraction, process water, to air: 0.9 dimensionless; name fraction_PW_to_air; lognormal variance with pedigree 0.092025, pedigree (4,4,3,2,4)
- fraction, tap water, to air: 0.9; name fraction_TW_to_air; lognormal variance with pedigree 0.092025, pedigree (4,4,3,2,4)

## Reference product
- maize grain, feed, organic: 1 kg; By-product classification allocatable product; CPC 23319: Preparations used in animal feeding n.e.c.
  EcoSpold01Location=CH
  production volume 6.83591e8 kg
    Assumed to be equal to the organic maize grain production
  property price 0.136289 EUR2005
    Calculated based on inputs: The price of the product has been calculated as a sum of the values of the material and energy inputs for this product. This value is therefore a rough estimation. It may underestimate the real price since there are additional expenses when producing any product. These expences can include for example labour costs, treatment of waste materials and profit for the producer. Please consider carefully whether this level of data quality is acceptable for your application.
  property carbon content, non-fossil 0.46957
    Composition data obtained from Corn Grain Whole, in (http://beefmagazine.com/images/2009%20feed%20table.pdf). First, composition data were refered to 1 kg dry mass. Then, C-contents were calculated considering a C-content/dry mass of 46% in carbohydrates (including fibres), 53% in proteins and 75% in fats. All data from "Evolutionary and Biochemical Aspects", A.D. Kay and T. Vrede (in Global Ecology, 2010, Elsevier B.V., S.E. Jørgensen Ed.).
  property carbon content 0.46957
    carbon content on a dry matter basis (reserved; not for manual entry)
  property true value 0.136289
    allocation property applied in "true value" allocation // value calculated from revenue
  properties: water in wet mass 0.14 kg, carbon content, fossil 0, water content 0.162791, dry mass 0.86 kg, wet mass 1 kg, carbon allocation 0.40383 kg

## By-products
- heat, for reuse in municipal waste incineration only: 0 MJ; CPC 17300: Steam and hot water; By-product classification allocatable product; pedigree (1,1,1,1,1)
  Net electricity generated from this waste and used in internal MSWI plant energy redistribution.
  Uncertainty: uncertainty is calculated from uncertainties in waste composition and uncertainties in energy efficiency and the uncertainty in internal energy demand
  production volume 2843.39 MJ
  property exergy 0.1842 MJ; name E_th_prod_MSWI_exergy
    This exergy property is based on the exergy content of the product.
  property price 0.0106 EUR2005; name E_th_prod_MSWI_price_EUR2005
    Average European district heat price from Ecoheatcool and Euroheat 2005-2006, Ecoheat Work package 1: The European heat market. Final report. 10.6 EUR/GJ i s the price of district heat. http://www.solarthermalworld.org/files/Ecoheatcool%20WP1%20Web.pdf?download
  property true value relation 0.1842; name E_th_prod_MSWI_true_value_relation
    property to calculate "true value" from
  property true value 1.36882e-8
    allocation property applied in "true value" allocation // value calculated from true value relation
- electricity, for reuse in municipal waste incineration only: 0 kWh; CPC 17100: Electrical energy; By-product classification allocatable product; pedigree (1,1,1,1,1)
  (same comment as for heat, for reuse in municipal waste incineration only)
  production volume 393.212 kWh
  property true value relation 3.6; name E_el_prod_MSWI_true_value_relation
    property to calculate "true value" from
  property price 0.1 EUR2005; name E_el_prod_MSWI_price_EUR2005
    Estimated to be the same price as in case of electricity, medium voltage.
  property exergy 3.6 MJ; name E_el_prod_MSWI_exergy
    This exergy property is based on the exergy content of the product.
  property true value 3.69979e-8
    (same comment as for heat, for reuse in municipal waste incineration only)

## Inputs from technosphere
- maize grain, organic: 1 kg; lognormal variance with pedigree 0.06, pedigree (1,1,5,5,3)
  EcoSpold01Location=CH
  properties: carbon content, non-fossil 0.46957, dry mass 0.86 kg, water content 0.162791, wet mass 1 kg
  note on carbon content, non-fossil: Composition data obtained from Corn Grain Whole, in (http://beefmagazine.com/images/2009%20feed%20table.pdf). First, composition data were refered to 1 kg dry mass. Then, C-contents were calculated considering a C-content/dry mass of 46% in carbohydrates (including fibres), 53% in proteins and 75% in fats. All data from "Evolutionary and Biochemical Aspects", A.D. Kay and T. Vrede (in Global Ecology, 2010, Elsevier B.V., S.E. Jørgensen Ed.). Finally, C-content in kg was multiplied by kg dry mass in the exchange.
- tap water: 0 kg; name tap_water_input; source Salzgeber Ch. 1996; pedigree (1,1,1,1,1)
  Literature Value. Salzgeber & Lörcher (1996) give the total energy and water consumption of a mill processing about 30,000 tonnes of cereals per year. The mill consumes 1800 m3 water and produces 1200 m3 wastewater per year. Water consumption and wastewater output was completed from Salzgeber and Lörcher (1996), namely 56 litres tap water and 38 litres wastewater per tonne of feedstuff produced.
  EcoSpold01Location=RER
  properties: carbon content, fossil 0.00178991, water content 2962.17, dry mass 0.000337476 kg, wet mass 1 kg
  note on carbon content, fossil: Bicarbonate content is 2.93 mol/m3. CO2 content is 0.1 mol/m3 (ecoinvent v2.2 report 8, Tab 93.1).
- heat, district or industrial, natural gas: 0 MJ; pedigree (1,1,1,1,1)
  EcoSpold01Location=RER
- wastewater, average: 0 m3; pedigree (1,1,1,1,1)
  EcoSpold01Location=CH
  production volume 0 m3
    Calculated from the production volume of maize grain, feed, organic in proportion to the respective output amounts.
  properties: carbon content, non-fossil 0.194039, wet mass 1000 kg, water content 2882.2, dry mass 0.346837 kg
  note on carbon content, non-fossil: 0.0673 kg TOC/m3 (Tab A.17, ecoinvent v2.2 report 13_I). TOC was considered as Total Carbon.
- building, multi-storey: 8.5e-6 m3; lognormal variance with pedigree 0.3446, pedigree (3,3,5,5,1)
  EcoSpold01Location=RER
- electricity, low voltage: 0 kWh; pedigree (1,1,1,1,1)
  EcoSpold01Location=CH
- tap water: 6.29879e-5, 0.000523272, 0.000104098, 0.0223837, 0.00262494, 6.82871e-5, 0.000194241, 0.0300385 kg (8 entries); source Salzgeber Ch. 1996; lognormal variance with pedigree 0.1246, pedigree (3,3,5,5,4)
  (same comment as for tap water)
- heat, district or industrial, natural gas: 0.001715, 0.0390774, 0.0969576 MJ (3 entries); lognormal variance with pedigree 0.0532, pedigree (2,3,5,5,1)
  EcoSpold01Location=RER
- wastewater, average: -1.22889e-5, -2.57111e-5 m3 (2 entries); lognormal variance with pedigree 0.1246, pedigree (3,3,5,5,4)
  EcoSpold01Location=CH
  production volume 26094.9 m3
- electricity, low voltage: 0.000374004, 6.55956e-5, 0.00148771, 0.00533382, 0.00107866, 0.0163124, 0.00268881, 0.00765898 kWh (8 entries); lognormal variance with pedigree 0.0532, pedigree (2,3,5,5,1)
  EcoSpold01Location=CH

## Inputs from nature
- Occupation, construction site [natural resource, land]: 2e-6 m2*year; lognormal variance with pedigree 0.0846, pedigree (3,3,5,5,1)
- Transformation, to industrial area [natural resource, land]: 1e-6 m2; lognormal variance with pedigree 0.1646, pedigree (3,3,5,5,1)
- Transformation, from unspecified [natural resource, land]: 1e-6 m2; lognormal variance with pedigree 0.1646, pedigree (3,3,5,5,1)
- Occupation, industrial area [natural resource, land]: 5e-5 m2*year; lognormal variance with pedigree 0.0846, pedigree (3,3,5,5,1)

## Emissions to nature
- Water [air, unspecified]: 5.04e-5 m3; name water_to_air_unspecified; lognormal variance with pedigree 0.0827, pedigree (2,2,5,5,1)
  Calculated value based on literature values and expert opinion. See comments in the parametres' comment field.
  property fraction, origin: salt water 0; name fraction_origin_salt_water
  property fraction, origin: fresh water 1; name fraction_origin_fresh_water
  property fraction, origin: unspecified 0; name fraction_origin_unspecified

## Sampling procedure
Data based on literature, trade statistics and information from feedstuff processing enterprises.

## Extrapolations
Production of imported raw material is approximated by raw material produced in Switzerland. This dataset has been copied from an original dataset covering the geography CH. The uncertainty has been adjusted accordingly.

## Review by Maggie Osses 2003-06-03
Passed.
