# clay plaster production

Dataset: EcoSpold 2, unit process
Geography: CA-QC
Time period: 1995-01-01 to 2019-12-31
Technology level: current
Classification: ISIC rev.4 ecoinvent: 2392:Manufacture of clay building materials
Classification: EcoSpold01Categories: mortar and plaster/production
Synonyms: Lehmmörtel
Tags: recontextualization
Scenario: Business-as-Usual
System model: Allocation at the point of substitution
Generated by: Pascal Lesage
Published in: Kellenberger D. 2004
Database: ecoinvent
isCopyrightProtected: true
accessRestrictedTo: 1

## General comment
The raw materials per kg ready mix product are mixed in following ratio: sand: 0.55kg, clay: 0.25kg, water: 0.2kg. After mixing it is internally transported to the packing installation and packed. Can be used without adding water. No direct process emissions are taken into account as they play a subordinate role compared to the emissions of the raw material production (e.g. drying of silica sand) and because no data are available. For inventoring the infrastructure, a yearly production amount of 150'000 tons is assumed. The lifespan of the machines is assumed to be 20 years.
Child dataset exchanges identical to GLO dataset. Created to enable linking to regional markets (e.g. for electricity). Data quality indicators adjusted accordingly.

## Included activities end
Includes the whole manufacturing process to produce clay plaster (raw material provision, raw material mixing, packing, and storage), transports to plant, and infrastructure. No requirements for administration are included. No additional buildings and land-use have been taken into account as it is assumed that the mixing process takes place in an existing building of the sand/cement industry or on the construction site

## Geography
The amount of raw materials is based on estimations. The transportation distance is an estimation. For the infrastructure RER- and for the silica sand DE-modules are used as proxy
Child dataset exchanges identical to GLO dataset. Created to enable linking to regional markets (e.g. for electricity). Data quality indicators adjusted accordingly.

## Technology
Assumed average current technology. The raw materials are mixed in a certain ratio, transported to the packing installation and packed.

## Parameters
- Quebec gross domestic product 2011: 3.11e11 USD(2011); name quebecGDP2011; lognormal variance with pedigree 0.0006, pedigree (1,1,1,1,1)
  Quebec Gross domestic product for 2011, expressed in 2011 USD. Source: Institut de la statistique du Québec. Converted from CAD to USD using a yearly average exchange rate of 0.989 CAD/USD (Source: bank of Canada).
- world gross domestic product 2011: 7e13 USD(2011); name worldGDP2011; lognormal variance with pedigree 0.0006, pedigree (1,1,1,1,1)
  World Gross domestic product for 2011, expressed in 2011 USD. Source: World Bank.
- fraction, process water, to air: 0.5 dimensionless; lognormal variance with pedigree 0.092025, pedigree (4,4,3,2,4)
- fraction, tap water, to air: 0.5; lognormal variance with pedigree 0.092025, pedigree (4,4,3,2,4)

## Reference product
- clay plaster: 1 kg; CPC 373: Refractory products and structural non-refractory clay products; By-product classification allocatable product
  EcoSpold01Location=CH
  production volume 3.60325e7 kg; = PARENTVALUE * quebecGDP2011/worldGDP2011
    Estimated. The Quebec production volume is extrapolated from the GLO production volume based on GDP.
    Quebec GDP and the word GDP are set variables.
  property price 0.12 EUR2005
    Calculated value based on data from United Nations Commodity Trade Statistics Database (comtrade.un.org). UN comtrade category: 250810 Bentonite. Year 2005. Using exchange rate of 1EURO = 1.209 USD. Average of price of import into 5 main markets (EU, US, JP, IN and CN).
  property carbon content, fossil 0
    Raw materials are listed in Tab 5.2, ecoinvent v2.2 report 7, part XVII. C content is calculated after C content of raw materials
  property carbon content, non-fossil 0
    (same comment as for clay plaster)
  property carbon content 0
    carbon content on a dry matter basis (reserved; not for manual entry)
  properties: water in wet mass 0.2 kg, water content 0.25, wet mass 1 kg, dry mass 0.8 kg, carbon allocation 0 kg

## Inputs from technosphere
All rows: lognormal variance with pedigree 0.692, pedigree (1,1,5,5,1)
- industrial machine, heavy, unspecified: 6.67e-6 kg
  estimated
  EcoSpold01Location=RER
- electricity, medium voltage: 0.0278 kWh
  EcoSpold01Location=CH
  estimated
- clay: 0.25 kg
  EcoSpold01Location=CH
  estimated
  properties: wet mass 1 kg, water content 0.0362694, dry mass 0.965 kg
- conveyor belt: 3.33e-8 m
  estimated
  EcoSpold01Location=RER
- silica sand: 0.55 kg
  EcoSpold01Location=DE
  estimated
  properties: dry mass 0.99 kg, wet mass 1 kg, water content 0.010101
- tap water: 0.2 kg
  estimated
  EcoSpold01Location=CH
  properties: wet mass 1 kg, carbon content, fossil 0.00178991, water content 2962.17, dry mass 0.000337476 kg
  note on carbon content, fossil: Bicarbonate content is 2.93 mol/m3. CO2 content is 0.1 mol/m3 (ecoinvent v2.2 report 8, Tab 93.1).

## Emissions to nature
- Water [water, unspecified]: 0.0001 m3; lognormal variance with pedigree 0.0827, pedigree (2,2,5,5,1)
  Calculated value based on literature values and expert opinion. See comments in the parametres' comment field.
  property carbon content, fossil 0; name C_content_fossil
  property dry mass 0 kg; name DM
  property carbon content, non-fossil 0; name C_content_non_fossil
  property wet mass 1000 kg; name WM
  property water in wet mass 1000 kg; name WWM
- Water [air, unspecified]: 0.0001 m3; lognormal variance with pedigree 0.0827, pedigree (2,2,5,5,1)
  (same comment as for Water)

## Sampling procedure
estimation

## Extrapolations
This dataset has been extrapolated from year 2001 to the year of the calculation (2019). The uncertainty has been adjusted accordingly.

## Review by Roberto Dones 2004-04-05
passed
