# electricity production, nuclear, pressure water reactor

Dataset: EcoSpold 2, unit process
Geography: CH
Time period: 1990-01-01 to 2019-12-31
Technology level: current
Classification: ISIC rev.4 ecoinvent: 3510:Electric power generation, transmission and distribution
Synonyms: PWR
Tags: nuclear power
Scenario: Business-as-Usual
System model: Allocation at the point of substitution
Generated by: Karin Treyer
Published in: Dones, R. 2007
Database: ecoinvent
isCopyrightProtected: true
accessRestrictedTo: 1

## General comment
This dataset represents the production of high voltage electricity at a grid-connected nuclear pressure water reactor (PWR) in Switzerland in 2011. It is based on data for Swiss nuclear PWR.
The average burnup 53 MWd/kg heavy metal of finally discharged fuel elements from the 2000/2002 fuel cycles has been assumed representative for the lifetime of the modeled plant (the burnup has increased from the initial about 33 MWd/kg heavy metal and may increase to 55 MWd/kg heavy metal in the future). The average burnup corresponds to an average enrichment of 4.2% U235 for fresh uranium fuel elements. Over the lifetime of the plant it can be assumed that 8% of the energy will be produced by MOX fuel elements. Of total fuel elements 92% are assumed to be from fresh U (thus burdened by the full upstream chain), and 8% MOX (burdened by reprocessing). For the calculation of the total net electricity delivered in 40 years lifetime, the sum of the actual production till 2002 and the prospective (8000 GWh/a) till end of life using is considered; this gives 3.11E11 kWh; the inverse gives the utilisation factor for the infrastructure. Partial information on material requirements during operation for 1991/1992 are available, which are integrated with relevant information for the modeled boiling water reactor. The diesel requirements for the yearly test of diesel emergency generators are accounted for. The transport requirements are calculated with the standard distances for chemical and diesel requirements and specific distances for fuel recharge and radioactive waste. Radioactive emission species to air and water are weighted averages of the emissions of the nuclear power plants G\xc3\xb6sgen and Beznau I+II from 1995 to 2002. Alpha aerosols emission to air have been described with \'aerosols, unspecified\'. Considered radioactive waste streams are: spent fuel to reprocessing (40%) and conditioning (60%); operational low active waste for conditioning in the intermediate repository; and, contaminated waste from dismantling.
The average burnup 53 MWd/kg heavy metal of finally discharged fuel elements from the 2000/2002 fuel cycles has been assumed representative for the lifetime of the modeled plant (the burnup has increased from the initial about 33 MWd/kg heavy metal and may increase to 55 MWd/kg heavy metal in the future). The average burnup corresponds to an average enrichment of 4.2% U235 for fresh uranium fuel elements. Over the lifetime of the plant it can be assumed that 8% of the energy will be produced by MOX fuel elements. Of total fuel elements 92% are assumed to be from fresh U (thus burdened by the full upstream chain), and 8% MOX (burdened by reprocessing). For the calculation of the total net electricity delivered in 40 years lifetime, the sum of the actual production till 2002 and the prospective (8000 GWh/a) till end of life using is considered; this gives 3.11E11 kWh; the inverse gives the utilisation factor for the infrastructure. Partial information on material requirements during operation for 1991/1992 are available, which are integrated with relevant information for the modeled boiling water reactor. The diesel requirements for the yearly test of diesel emergency generators are accounted for. Radioactive emission species to air and water are weighted averages of the emissions of the nuclear power plants Gösgen and Beznau I+II from 1995 to 2002. Alpha aerosols emission to air have been described with 'aerosols, unspecified'. Considered radioactive waste streams are: spent fuel to reprocessing (40%) and conditioning (60%); operational low active waste for conditioning in the intermediate repository; and, contaminated waste from dismantling.
[This dataset is meant to replace the following datasets:]

## Included activities start
From the constructed power plant ready to produce electricity and from the fuel ready in the power plant.

## Included activities end
The module includes fuel elements, chemicals, and diesel requirements as well as the relevant transport requirements. Water use (fresh and decarbonized) for cooling is included. Considered radioactive waste streams are: spent fuel to reprocessing and conditioning; operational low active waste for conditioning in the intermediate repository; and, contaminated waste from dismantling. Non-radioactive wastes are accounted for.

## Geography
Swiss data of one specific plant for requirements and all Swiss PWRs for emissions.

## Technology
Best current technology for fuel element. Standard technology for commercial operation.

## Time period
The Annual Production Volume is valid for the year 2011

## Parameters
All rows: lognormal variance with pedigree 0.092025, pedigree (4,4,3,2,4)
- water consumption, electricity production, nuclear, once-T and coolingP CS: 0.00296 m3/kWh; name WConsumption_EP_nuclear_onceT_andCP_CS
- fraction, cooling water, to air: 0.0380756; name fraction_CW_to_air; = (WConsumption_EP_nuclear_recirculatingCS*recirculating_CS_fraction_from_allCS+WConsumption_EP_nuclear_onceT_andCP_CS*once_through_andCP_CS_fractio_from_allCS)/(WWithdrawal_EP_nuclear_recirculating_CS*recirculating_CS_fraction_from_allCS+WWithdrawal_EP_nuclear_onceT_andCP_CS*once_through_andCP_CS_fractio_from_allCS)
  Calculated value based on literature value (Scown, 2011 & Floerke, 2009, Future changes of freshwater needs in the electricity production sector & Stiegel, 2008, Estimating Freshwater Needs to Meet Future Thermoelectric Generation Requirements) (Vionnet, S., Quantis Water Database - Technical Report, 2012).
  nan
- water consumption, electricity production, nuclear, recirculating CS: 0.0024 m3/kWh; name WConsumption_EP_nuclear_recirculatingCS
- water withdrawal, electricity production, nuclear, recirculating CS: 0.0042 m3/kWh; name WWithdrawal_EP_nuclear_recirculating_CS
- water withdrawal, electricity production, nuclear, once-T and coolingP CS: 0.0995 m3/kWh; name WWithdrawal_EP_nuclear_onceT_andCP_CS
- fraction, water, decarbonised, to air: 0.0380756; name fraction_WDC_to_air; = fraction_CW_to_air
  Calculated value. See comments in the other parametres present in this dataset. Decarbonised water is considered to be always used as cooling water, thus cooling water fractions to air are applied to all carbonised water input flows to calculate the amount of water consumed in the processes.
  nan
- once-through and cooling pond cooling systems as a fraction of all cooling syste: 0.73 dimensionless; name once_through_andCP_CS_fractio_from_allCS
  Calculated as an average of data available for Europe (Floerke, 2008, Future changes of freshwater needs in the electricity production sector) and USA (NERL, 2011, Estimating freshwater needs to meet future thermoelectric generation requirements).
  nan
- recirculating cooling system as a fraction of all cooling systems: 0.27 dimensionless; name recirculating_CS_fraction_from_allCS
  (same comment as for once-through and cooling pond cooling systems as a fraction of all coo)

## Reference product
- electricity, high voltage: 1 kWh; CPC 17100: Electrical energy; By-product classification allocatable product
  production volume 1.42493e10 kWh; name apv_electricity; = 15062000000*(1-0.06)+91000000
    Literature value/calculated value. Valid for 2011.
    Based on Stolz&Frischknecht 2015, Tables 3.7, 3.6 and the SBB railway electricity mix from Itten et al. 2012 Table 3.182.
    A loss of 6% from gross to net is assumed for nuclear power.
    An extra amount of electricity has been added due to direct linking reasons (electricity for the Swiss Federal Railways).
    Stolz, P., Frischnkecht, R. 2015. Umweltbilanz Strommix Schweiz 2011. Issued by treeze Ltd. for the Federal Office for the Environment, Switzerland.
    Itten, R., Frischknecht, R., Stucki, M. 2012. Life Cycle Inventories of Electricity Mixes and Grid. ESU-services Ltd., fair conulting in sustainability, Uster. "
  property price 0.0977 EUR2005; name electricity_price_EUR2005
    Temporary price data. Calculated as 90% of purchasers price based on: 94% of the average price (to account for a 6% loss in transformation and transmission) for electricity for industrial consumersin 2005 (excluded taxes). From IEA.
  property true value 0.0977
    allocation property applied in "true value" allocation // value calculated from revenue

## By-products
- electricity, for reuse in municipal waste incineration only: 0 kWh; CPC 17100: Electrical energy; By-product classification allocatable product; pedigree (1,1,1,1,1)
  Net electricity generated from this waste and used in internal MSWI plant energy redistribution.
  Uncertainty: uncertainty is calculated from uncertainties in waste composition and uncertainties in energy efficiency and the uncertainty in internal energy demand
  production volume 1424.03 kWh
  property exergy 3.6 MJ; name E_el_prod_MSWI_exergy
    This exergy property is based on the exergy content of the product.
  property true value relation 3.6; name E_el_prod_MSWI_true_value_relation
    property to calculate "true value" from
  property price 0.1 EUR2005; name E_el_prod_MSWI_price_EUR2005
    Estimated to be the same price as in case of electricity, medium voltage.
  property true value 1.29185e-8
    allocation property applied in "true value" allocation // value calculated from true value relation
- heat, for reuse in municipal waste incineration only: 0 MJ; CPC 17300: Steam and hot water; By-product classification allocatable product; pedigree (1,1,1,1,1)
  Net useful heat generated from this waste and used in internal MSWI plant energy redistribution.
  Uncertainty: uncertainty is calculated from uncertainties in waste composition and uncertainties in energy efficiency and the uncertainty in internal energy demand
  production volume 10456.3 MJ
  property true value relation 0.1842; name E_th_prod_MSWI_true_value_relation
    property to calculate "true value" from
  property exergy 0.1842 MJ; name E_th_prod_MSWI_exergy
    This exergy property is based on the exergy content of the product.
  property price 0.0106 EUR2005; name E_th_prod_MSWI_price_EUR2005
    Average European district heat price from Ecoheatcool and Euroheat 2005-2006, Ecoheat Work package 1: The European heat market. Final report. 10.6 EUR/GJ i s the price of district heat. http://www.solarthermalworld.org/files/Ecoheatcool%20WP1%20Web.pdf?download
  property true value 4.85354e-9
    (same comment as for electricity, for reuse in municipal waste incineration only)
- zinc concentrate: 0 kg; CPC 14290: Other non-ferrous metal ores and concentrates (other than uranium or thorium ores and concentrates); By-product classification allocatable product
  Calculated value from the knowledge of the properties of both products.
  production volume 4.21543e-8 kg
  property price 0.38 EUR2005; name ByP_price_EUR2005
    Temporary price data. Calculated as 90% of purchasers price based on: Zinc content in concentrate 53%. Concentrate price per kg Zn 86.5% of refined Zn price (13.5% treatment charges according to CHR Metals Limited 2005: Dynamic cost curves. http://www.minecost.com/dynamic.pdf). 2004 zinc price from USGS (2007) Mineral commodity summaries 2007. <http://minerals.usgs.gov/minerals/pubs/mcs/2007/mcs2007.pdf> [Accessed 25 May 2010]
  property zinc content 0.53; name zinc_C_zinc_concentrate
    Zinc content on a dry matter basis. Value taken from teh "zinc mine operation" /GLO dataset.
  property dry mass 1 kg; name DM_zinc_concentrate
  property carbon content 0
    carbon content on a dry matter basis (reserved; not for manual entry)
  property true value 1.12417e-18
    allocation property applied in "true value" allocation // value calculated from revenue
  properties: wet mass 1 kg, water content 0, carbon content, non-fossil 0, carbon content, fossil 0, water in wet mass 0 kg, carbon allocation 0 kg
- iron scrap, sorted, pressed: 0 kg; By-product classification Recyclable; CPC 39310: Slag, dross, scalings and other waste from the manufacture of iron or steel; pedigree (1,1,1,1,1)
  metallic iron scrap removed from ash reamains and recycled.
  Uncertainty: uncertainty is calculated from uncertainties in waste composition and transfer coefficients to soild residues
  production volume 157.132 kg
  property price 0.175 EUR2005
    Temporary price data. Calculated as 90% of purchasers price based on: 2005 import and export prices (total trades (USD) divided by total weight (kg) in biggest economies of the world: EU27, USA, Brasil, China, India, Japan and Russia) from UN Commodity Trade Statistics Database (http://data.un.org/Explorer.aspxDatabase [Accessed 2011.06.20]). Commodity: Waste or scrap, of cast iron
  property carbon content 0
    carbon content on a dry matter basis (reserved; not for manual entry)
  property true value 1.92979e-9
    allocation property applied in "true value" allocation // value calculated from revenue
  properties: carbon content, non-fossil 0, wet mass 1 kg, dry mass 1 kg, water content 0, carbon content, fossil 0, water in wet mass 0 kg, carbon allocation 0 kg
- copper: 0 kg; source Rentz O. 1999; By-product classification allocatable product; CPC 41413: Refined copper and copper alloys, unwrought; master alloys of copper
  Literature value. Copper uses: Before end-use copper is manufactured into semi fabricated products, such as shapes and ingots (known as 'semis'). These manufacturing processes are subdivided into hot working, cold working and, if necessary, process annealing. Few of the semis are ready for use as such. They more typically travel to first-stage manufacturers, who make metal rods, wire, and casting, and then to component manufacturers who produce such things as motors, valves, and insulated cables The components in turn are incorporated by final-stage manufacturers into a variety of finished products - automobiles, commercial buildings, residential housing, and so forth. These uses account for about 79% of the world-wide consumption of copper.
  production volume 5.00155 kg
  property price 5.52 EUR2005
    Literature value (http://www.economist.com/news/business/21576714-mining-industry-has-enriched-chile-its-future-precarious-copper-solution). Average price between 20015 and 2013.
  property carbon content 0
    carbon content on a dry matter basis (reserved; not for manual entry)
  property true value 1.93754e-9
    allocation property applied in "true value" allocation // value calculated from revenue
  properties: dry mass 1 kg, water in wet mass 0 kg, wet mass 1 kg, carbon content, non-fossil 0, water content 0, carbon content, fossil 0, carbon allocation 0 kg
- iron scrap, unsorted: 0 kg; source European Aluminium Association 2008; CPC 39310: Slag, dross, scalings and other waste from the manufacture of iron or steel; By-product classification Recyclable; pedigree (1,1,1,1,1)
  production volume 0.00447046 kg
  property price 0.149 EUR2005; name ironScrapAmount_price_EUR2005
    Temporary price data. Calculated as 90% of purchasers price based on: estimated at 85% of sorted scrap
  property carbon content 0
    carbon content on a dry matter basis (reserved; not for manual entry)
  property true value 4.67461e-14
    allocation property applied in "true value" allocation // value calculated from revenue
  properties: water in wet mass 0 kg, water content 0, carbon content, fossil 0, carbon content, non-fossil 0, dry mass 1 kg, wet mass 1 kg, carbon allocation 0 kg
- aluminium oxide, non-metallurgical: 0 kg; source European Aluminium Association 2008; CPC 41432: Alumina (aluminium oxide), except artificial corundum; By-product classification allocatable product; CAS 1344-28-1; pedigree (1,1,1,1,1)
  production volume 0.281309 kg
  property carbon content, non-fossil 0; name C_content_non_fossil
  property price 0.28 EUR2005; name Al2O3Amount_price_EUR2005
    From UN trade database. http://data.un.org/ Import data from the largest economies of the world are used (Brazil, India, USA, China, Japan and EU-27).
  property dry mass 1 kg; name DM
  property water content 0; name water_content
  property wet mass 1 kg; name WM
  property water in wet mass 0 kg; name WWM
  property carbon content, fossil 0; name C_content_fossil
  property carbon content 0
    carbon content on a dry matter basis (reserved; not for manual entry)
  property true value 5.52776e-12
    allocation property applied in "true value" allocation // value calculated from revenue
  properties: carbon allocation 0 kg
- aluminium, cast alloy: 0 kg; source European Aluminium Association 2008; By-product classification allocatable product; CPC 41431: Unwrought aluminium; pedigree (1,1,1,1,1)
  EcoSpold01Location=RER
  production volume 2.62962 kg
  property price 1.3 EUR2005; name castAlloyAmount_price_EUR2005
    Temporary price data. Calculated as 90% of purchasers price based on: Source: London Metal Exchange, Aluminium alloy price for 2005
  property carbon content 0
    carbon content on a dry matter basis (reserved; not for manual entry)
  property true value 2.39907e-10
    allocation property applied in "true value" allocation // value calculated from revenue
  properties: water in wet mass 0 kg, carbon content, non-fossil 0, water content 0, dry mass 1 kg, carbon content, fossil 0, wet mass 1 kg, carbon allocation 0 kg
- aluminium, wrought alloy: 0 kg; source European Aluminium Association 2008; By-product classification allocatable product; CPC 4153: Semi-finished products of aluminium or aluminium alloys; pedigree (1,1,1,1,1)
  production volume 1.1512 kg
  property price 1.44 EUR2005; name secondaryAluminiumOutput_price_EUR2005
    Estimated based on literature values and expert judgement. Aluminium ccast alloys are about 90% of the price of aluminium wrought alloys.
  property carbon content 0
    carbon content on a dry matter basis (reserved; not for manual entry)
  property true value 1.16337e-10
    allocation property applied in "true value" allocation // value calculated from revenue
  properties: wet mass 1 kg, water content 0, carbon content, fossil 0, water in wet mass 0 kg, carbon content, non-fossil 0, dry mass 1 kg, carbon allocation 0 kg

## Inputs from technosphere
- boric acid, anhydrous, powder: 6.43e-8 kg; lognormal variance with pedigree 0.002, pedigree (1,1,3,1,1)
  Operator information.
  properties: dry mass 1 kg, wet mass 1 kg
- lubricating oil: 1.62e-6 kg; lognormal variance with pedigree 0.012, pedigree (1,1,3,1,1)
  Operator information. Oil and fats for hydraulic systems and general lubricating use. Extrapolation from a boiling water reactor.
  properties: dry mass 1 kg, wet mass 1 kg, carbon content, fossil 0.75
  note on carbon content, fossil: Lubricating oil is produced from diesel. C-content/dry mass of fats and oils considered 75%, from: ecoinvent v2.2 report, n 15a, pg 40
- flat glass, coated: 4.37e-6 kg; lognormal variance with pedigree 0.012, pedigree (1,1,3,1,1)
  Operator information. Materials for sand blasting equipment. Extrapolation from a boiling water reactor.
  properties: wet mass 1 kg, dry mass 1 kg
- carbon dioxide, liquid: 1.67e-7 kg; lognormal variance with pedigree 0.012, pedigree (1,1,3,1,1)
  extrapolation from another plant type
  properties: carbon content, fossil 0.272727, wet mass 1 kg, dry mass 1 kg
- cationic resin: 6.43e-8 kg; lognormal variance with pedigree 0.002, pedigree (1,1,3,1,1)
  Operator information. All resin types needed are modeled as 50% anionic resin and 50% cationic resin.
  properties: dry mass 0.5 kg, carbon content, fossil 0.521606, water content 1, wet mass 1 kg
  note on carbon content, fossil: Chemically inert polystyrene beads are treated with concentrated sulfuric or chlorosulfonic acid to give cross-linked polystyrene 3-sulfonic acid (Cation exchange resins, Ullmann). The resine was approximated as C8H8O3S (from Ullmann, Cation exchange resins). The resine is hydrated (ecoinvent v2.2 report 8, part II, Tab 93.5)
- cement, Portland: 9.19e-7 kg; lognormal variance with pedigree 0.012, pedigree (1,1,3,1,1)
  Operator information. Cement use for conditioning of the hard waste. Extrapolation from a boiling water reactor.
  properties: dry mass 1 kg, wet mass 1 kg
- chemical, inorganic: 2.34e-6 kg; lognormal variance with pedigree 0.012, pedigree (1,1,3,1,1)
  Operator information. Decontamination chemicals and salt for water softening; hydrazin (N2H4), 15%. Partly extrapolation from a boiling water reactor.
  properties: dry mass 1 kg, wet mass 1 kg, carbon content, fossil 0.003
  note on carbon content, fossil: This dataset is an unweighted average of 20 inorganic substances (listed in Tab 88.1, ecoinvent v2.2 report 8, part II), being part of the top100 chemicals included in this database. The C-content has also been calculated as an unweighted average of the C content of the substances composing this dataset.
- concrete, normal: 9.74e-9 m3; lognormal variance with pedigree 0.022, pedigree (1,1,3,1,1)
  Literature value
  properties: water content 0.086758, dry mass 2190 kg, wet mass 2380 kg
- anionic resin: 6.43e-8 kg; lognormal variance with pedigree 0.002, pedigree (1,1,3,1,1)
  (same comment as for cationic resin)
  properties: carbon content, fossil 0.680721, wet mass 1 kg, dry mass 0.5 kg, water content 1
  note on carbon content, fossil: Cross-linked polystyrene beads are treated with chloromethyl methyl ether under anhydrous conditions, with either aluminum chloride or tin(IV) chloride as catalyst. Chloromethylated polystyrene is obtained. In a second stage, the chlorine in the chloromethylated group can be replaced by an amine (Anion exchange resins, in Ullmann). In this case, Trimethylamine, C3H9N, is used (ecoinvent v2.2 report 8-part 93). That is, the resine can be formulated as C12H18NCl (after Ullmann, Anion exchange resins). The resine is hydrated (ecoinvent v2.2 report 8, part II, Tab 93.7)
- diesel, burned in diesel-electric generating set, 10MW: 0.00037 MJ; lognormal variance with pedigree 0.012, pedigree (1,1,3,1,1)
  Estimation. Diesel use for testing of the emergency power in the power plant. Extrapolation from a Swiss boiling water reactor.
- chemical, organic: 1.38e-6 kg; lognormal variance with pedigree 0.002, pedigree (1,1,3,1,1)
  Operator information. This category contains solvents, frost protection, anticorrosives, industrial alcohol, washing agents.Extrapolation from a boiling water reactor.
  properties: carbon content, fossil 0.628, wet mass 1 kg, dry mass 1 kg
  note on carbon content, fossil: This dataset is an unweighted average of 20 organic substances (listed in Tab 88.1, ecoinvent v2.2 report 8, part II), being part of the top100 chemicals included in this database. The C-content has also been calculated as an unweighted average of the C content of the substances composing this dataset.
- argon, liquid: 2.61e-5 kg; lognormal variance with pedigree 0.012, pedigree (1,1,3,1,1)
  Estimation. Gas use in the power plant. Extrapolation from a Swiss boiling water reactor. Argon and helium are summed up in this exchange
  properties: dry mass 1 kg, wet mass 1 kg
- cement, unspecified: 9e-7 kg; lognormal variance with pedigree 0.5187, pedigree (3,3,4,3,3)
  Operator information
  properties: wet mass 1 kg, dry mass 1 kg
- pitch: 7.71e-7 kg; lognormal variance with pedigree 0.012, pedigree (1,1,3,1,1)
  Operator information.
  properties: dry mass 1 kg, carbon content, fossil 0.83, wet mass 1 kg
- low level radioactive waste: -1.8032e-9 m3; name low_level_waste; lognormal variance with pedigree 0.002, pedigree (1,1,3,1,1)
  Literature data
  production volume 25.6943 m3; = low_level_waste * apv_electricity
    Calculated from the production volume of electricity, high voltage in proportion to the respective output amounts.
  property price 0 EUR2005; name low_level_waste_price_EUR2005
  properties: wet mass 2500 kg, dry mass 2500 kg
- low level radioactive waste for final repository: -2.84e-8 m3; name low_level_waste_final; lognormal variance with pedigree 0.022, pedigree (1,1,3,1,1)
  Literature data
  production volume 404.68 m3; = low_level_waste_final * apv_electricity
    (same comment as for low level radioactive waste)
  property price 0 EUR2005; name low_level_waste_final_price_EUR2005
  properties: dry mass 2500 kg, wet mass 2500 kg
- paper, woodfree, coated: 6.43e-7 kg; lognormal variance with pedigree 0.012, pedigree (1,1,3,1,1)
  Operator information. Paper use in office. No other office materials have been considered. Extrapolation from a boiling water reactor.
  properties: carbon content, non-fossil 0.22775, carbon content, fossil 0.0590617, water content 0.0582011, dry mass 0.945 kg, wet mass 1 kg
  note on carbon content, non-fossil: Biogenic C content was calculated after biogenic C contents of chemicals used in the production of the paper (in Tab 8.72 & 8.73 ecoinvent v2.2 report 11_III, part 8). The cellulose content in 1 kg of paper (on a wet mas basis) was estimated as (1-chemical content), C content of cellulose was considered 0.44 kgC/kg dry mass (ecoinvent v2.2 report, n 15a, pg 40)
  note on carbon content, fossil: Fossil C content was calculated after fossil C contents of chemicals used in the production of the paper (in Tab 8.72 & 8.73 ecoinvent v2.2 report 11_III, part 8).
- spent nuclear fuel: -2.464e-6 kg; name spent_nuclear_fuel; lognormal variance with pedigree 0.002, pedigree (1,1,3,1,1)
  Literature data
  production volume 35110.2 kg; = spent_nuclear_fuel * apv_electricity
    (same comment as for low level radioactive waste)
  property price 0 EUR2005; name spent_nuclear_price_EUR2005
  properties: dry mass 1 kg, wet mass 1 kg
- hazardous waste, for incineration: -9.7e-7 kg; name hazwaste; lognormal variance with pedigree 0.012, pedigree (1,1,3,1,1)
  Literature data. extrapolation from another plant type
  production volume 13821.8 kg; = hazwaste * apv_electricity
    (same comment as for low level radioactive waste)
  property price 0 EUR2005; name hazwaste_price_EUR2005
  properties: wet mass 1 kg, water content 0.333333, carbon content, fossil 0.554667, dry mass 0.75 kg
  note on carbon content, fossil: Tab A.6, ecoinvent v2.2 report 13_I. C content has been calculated after data in the tables, and then referred to 1 kg DM
- acetylene: 3.6e-8 kg; lognormal variance with pedigree 0.012, pedigree (1,1,3,1,1)
  Operator information
  properties: wet mass 1 kg, dry mass 1 kg, carbon content, fossil 0.923077
  note on carbon content, fossil: C2H2. ecoinvent v2.2 report n 8. Produced from partial oxidation of natural gas
- nuclear power plant, pressure water reactor 1000MW: 0 unit; uniform min 0, max 0, pedigree (1,1,3,1,1)
  Estimation. Total net electricity over a lifetime: 3.11E11 kWh
- fly ash and scrubber sludge: -2.19e-6 kg; name fly_ash; lognormal variance with pedigree 0.012, pedigree (1,1,3,1,1)
  Literature data. extrapolation from another plant type
  production volume 31205.9 kg; = fly_ash * apv_electricity
    (same comment as for low level radioactive waste)
  property price 0 EUR2005; name fly_ash_price_EUR2005
  properties: dry mass 0.1 kg, carbon content, fossil 0.167, wet mass 1 kg, water content 9
- sodium hypochlorite, without water, in 15% solution state: 1.73e-5 kg; lognormal variance with pedigree 0.012, pedigree (1,1,3,1,1)
  Literature value. Used for decarbonising of the water, additionally to the chemical use listed in the activity for production of the 'water, decarbonised, at user'.
  properties: wet mass 1 kg, dry mass 1 kg
- waste mineral oil: -1.63e-6 kg; name waste_oil; lognormal variance with pedigree 0.012, pedigree (1,1,3,1,1)
  Literature data. extrapolation from another plant type
  production volume 23226.3 kg; = waste_oil* apv_electricity
    (same comment as for low level radioactive waste)
  property price 0 EUR2005; name waste_oil_price_EUR2005
  properties: wet mass 1 kg, carbon content, fossil 0.864444, water content 0.111111, dry mass 0.9 kg
- water, decarbonised: 2.83743 kg; name water_decarbonised_input; = 700/(7.78E9/(365*24*60*60)); lognormal variance with pedigree 0.012, pedigree (1,1,3,1,1)
  It is estimated that all decarbonised water in the mentioned table is evaporated.
  In contrast to the literature reference and the datasets in ecoinvent version 2, this dataset only takes into account real water use, i.e. the water which is evaporated during the cooling process.
  Estimated average net electricity production per year: 7.78E9 kWh/y (Tab. 9.3, p. 166)
  Water use in BWR see Tab. 9.17 p.196 in Dones et al. - decarbonised water use (700 kg/s)
  Estimated average net electricity production per year: 7.78E9 kWh/y (Tab. 9.3, p. 166)
  Water use in BWR see Tab. 9.17 p.196 in Dones et al. - decarbonised water use (700 kg/s)
  own estimation.
  It is estimated that all decarbonised water in the mentioned table is evaporated.
  In contrast to the literature reference and the datasets in ecoinvent version 2, this dataset only takes into account real water use, i.e. the water which is evaporated during the cooling process.
  properties: wet mass 1 kg
- cast iron: 1.29e-7 kg; lognormal variance with pedigree 0.012, pedigree (1,1,3,1,1)
  Operator information. Extrapolation from a boiling water reactor.
  properties: carbon content, fossil 0.04, wet mass 1 kg, dry mass 1 kg
  note on carbon content, fossil: Cast iron is made by remelting pig iron in small furnaces (e.g. cupola furnaces or electric arc furnaces) and poured into moulds to make castings. It usually contains 2% to 6% carbon (ecoinvent v2.2 report 10_partII). An average content of 4% was considered
- reinforcing steel: 4.7e-7 kg; lognormal variance with pedigree 0.012, pedigree (1,1,3,1,1)
  Operator information
  properties: wet mass 1 kg, carbon content, fossil 0.004, dry mass 1 kg
- nuclear power plant, pressure water reactor 1000MW: 3.22e-12 unit; lognormal variance with pedigree 0.0439, pedigree (2,2,5,5,2)
  Estimation. Total net electricity over a lifetime: 3.11E11 kWh
- nitrogen, liquid: 6.17e-5 kg; lognormal variance with pedigree 0.012, pedigree (1,1,3,1,1)
  Estimation. Gas use in the power plant. Extrapolation from a Swiss boiling water reactor. Nitrogen use and use of forming gas (5-10% H2, 90-95% N2) are summed up in this exchange.
  properties: wet mass 1 kg, dry mass 1 kg
- steel, low-alloyed, hot rolled: 1.6e-6 kg; lognormal variance with pedigree 0.042, pedigree (1,1,3,1,1)
  Literature value
  properties: carbon content, fossil 0.005, wet mass 1 kg, dry mass 1 kg
  note on carbon content, fossil: Low alloyed steel composition given in Tab. 3.2 ecoinvent v2.2 report 10_partII. Steel assumed to have a C content of 0.5%
- hydrogen, liquid: 1.03e-5 kg; lognormal variance with pedigree 0.012, pedigree (1,1,3,1,1)
  Estimation. Gas use in the power plant. Extrapolation from a Swiss boiling water reactor.
  properties: dry mass 1 kg, wet mass 1 kg
- oxygen, liquid: 1.67e-5 kg; lognormal variance with pedigree 0.012, pedigree (1,1,3,1,1)
  Estimation. Gas use in the power plant. Extrapolation from a Swiss boiling water reactor.
  properties: dry mass 1 kg, wet mass 1 kg
- nuclear fuel element, for pressure water reactor, UO2 4.2% & MOX: 2.46e-6 kg; lognormal variance with pedigree 0.002, pedigree (1,1,3,1,1)
  Literature value
  properties: wet mass 1 kg, dry mass 1 kg

## Inputs from nature
- Water, cooling, unspecified natural origin [natural resource, in water]: 0.073769 m3; name water_cooling_UNO_input; source Corinne D. Scown 2011, p. p. 166/196; lognormal variance with pedigree 0.098025, pedigree (4,4,4,2,4)
  Calculated based on literature data.
  Calculated based on literature (Scown, C.D., et al., 2011, Water Footprint of U.S. Trasportation Fuels;Scown, C.D., et al., 2011, Water Footprint of U.S. Trasportation Fuels (SI); Stiegel, 2008, Estimating Freshwater Needs to Meet Future Thermoelectric Generation Requirements; Floerke, M., 2009, Future changes of freshwater needs in the electricity production sector), (Vionnet, S., Quantis Water Database - Technical Report, 2012). Water use in this process is modelled based on literature (see references). The process boundaries are given by the boundaries of the power plant. The process ends when the energy (MJ) is produced and ready to be used for electricity production (kWh).
  property carbon content, fossil 0.0104329; name C_content_fossil
  property carbon content, non-fossil 0; name C_content_non_fossil
  property wet mass 1000 kg; name WM
  property dry mass 0.1101 kg; name DM
  property water content 9081.65; name water_content
  property water in wet mass 999.89 kg; name WWM

## Emissions to nature
- Niobium-95 [air, non-urban air or from high stacks]: 1.12e-10 kBq; lognormal variance with pedigree 0.042, pedigree (1,1,3,1,1)
  BAG 1996-2003. Bundesamt für Gesundheit. Umweltradioaktivitat und Strahlendosen in der Schweiz. BAG, Abteilung Strahlenschutz, Sektion Überwachung der Radioaktivitat. Freiburg, Schweiz.
  Operator data. Weighted radioactive emissions into air of Swiss nuclear power plants 1995-2002 (Weighting with net electricity production).
- Strontium-90 [water, surface water]: 1.3e-6 kBq; lognormal variance with pedigree 0.042, pedigree (1,1,3,1,1)
  Operator data. Weighted radioactive emissions into water of Swiss nuclear power plants 1995-2002 (Weighting with net electricity production).
  BAG 1996-2003. Bundesamt für Gesundheit. Umweltradioaktivitat und Strahlendosen in der Schweiz. BAG, Abteilung Strahlenschutz, Sektion Überwachung der Radioaktivitat. Freiburg, Schweiz.
- Zirconium-95 [air, non-urban air or from high stacks]: 5.78e-8 kBq; lognormal variance with pedigree 0.042, pedigree (1,1,3,1,1)
  (same comment as for Niobium-95)
- Cobalt-58 [air, non-urban air or from high stacks]: 1.64e-8 kBq; lognormal variance with pedigree 0.042, pedigree (1,1,3,1,1)
  (same comment as for Niobium-95)
- Cesium-137 [water, surface water]: 0.0001 kBq; lognormal variance with pedigree 0.042, pedigree (1,1,3,1,1)
  BAG 1996-2003. Bundesamt für Gesundheit. Umweltradioaktivitat und Strahlendosen in der Schweiz. BAG, Abteilung Strahlenschutz, Sektion Überwachung der Radioaktivitat. Freiburg, Schweiz.
  Operator data. Weighted radioactive emissions into water of Swiss nuclear power plants 1995-2002 (Weighting with net electricity production).
- Noble gases, radioactive, unspecified [air, non-urban air or from high stacks]: 0.259 kBq; lognormal variance with pedigree 0.042, pedigree (1,1,3,1,1)
  Operator data. Weighted radioactive emissions into air of Swiss nuclear power plants 1995-2002 (Weighting with net electricity production).
  BAG 1996-2003. Bundesamt für Gesundheit. Umweltradioaktivitat und Strahlendosen in der Schweiz. BAG, Abteilung Strahlenschutz, Sektion Überwachung der Radioaktivitat. Freiburg, Schweiz.
- Sodium-24 [water, surface water]: 9.98e-6 kBq; lognormal variance with pedigree 0.042, pedigree (1,1,3,1,1)
  (same comment as for Strontium-90)
- Cobalt-58 [water, surface water]: 0.00114 kBq; lognormal variance with pedigree 0.042, pedigree (1,1,3,1,1)
  (same comment as for Cesium-137)
- Cobalt-57 [water, surface water]: 8.92e-6 kBq; lognormal variance with pedigree 0.042, pedigree (1,1,3,1,1)
  (same comment as for Cesium-137)
- Iodine-131 [air, non-urban air or from high stacks]: 3.38e-6 kBq; lognormal variance with pedigree 0.042, pedigree (1,1,3,1,1)
  (same comment as for Noble gases, radioactive, unspecified)
- Niobium-95 [water, surface water]: 3.07e-6 kBq; lognormal variance with pedigree 0.042, pedigree (1,1,3,1,1)
  (same comment as for Strontium-90)
- Zirconium-95 [water, surface water]: 1.5e-6 kBq; lognormal variance with pedigree 0.042, pedigree (1,1,3,1,1)
  (same comment as for Strontium-90)
- Krypton-85m [air, non-urban air or from high stacks]: 0.00987 kBq; lognormal variance with pedigree 0.042, pedigree (1,1,3,1,1)
  (same comment as for Niobium-95)
- Cobalt-60 [air, non-urban air or from high stacks]: 7.57e-8 kBq; lognormal variance with pedigree 0.042, pedigree (1,1,3,1,1)
  (same comment as for Niobium-95)
- Technetium-99m [water, surface water]: 2.81e-6 kBq; lognormal variance with pedigree 0.042, pedigree (1,1,3,1,1)
  (same comment as for Strontium-90)
- Cerium-144 [water, surface water]: 4.82e-7 kBq; lognormal variance with pedigree 0.042, pedigree (1,1,3,1,1)
  (same comment as for Cesium-137)
- Water [water, unspecified]: 0.0736896 m3; name water_to_water_unspecified; = (water_decarbonised_input/1000)*(1-fraction_WDC_to_air)+water_cooling_UNO_input*(1-fraction_CW_to_air); lognormal variance with pedigree 0.098025, pedigree (4,4,4,2,4)
  Calculated value based on literature values and expert opinion. See comments in the parametres' comment field.
  property fraction, origin: salt water 0; name fraction_origin_salt_water_Ww
  property fraction, origin: fresh water 0.0951915; name fraction_origin_fresh_water_Ww
  property fraction, origin: unspecified 0.904808; name fraction_origin_unspecified_Ww
- Manganese-54 [water, surface water]: 1.31e-5 kBq; lognormal variance with pedigree 0.042, pedigree (1,1,3,1,1)
  (same comment as for Cesium-137)
- Xenon-133 [air, non-urban air or from high stacks]: 0.604 kBq; lognormal variance with pedigree 0.042, pedigree (1,1,3,1,1)
  (same comment as for Niobium-95)
- Water [air, unspecified]: 0.00291684 m3; name water_to_air_unspecified; = (water_decarbonised_input/1000)*fraction_WDC_to_air+water_cooling_UNO_input*fraction_CW_to_air; lognormal variance with pedigree 0.098025, pedigree (4,4,4,2,4)
  (same comment as for Water)
  property fraction, origin: unspecified 0.74438; name fraction_origin_unspecified
  property fraction, origin: fresh water 0.25562; name fraction_origin_fresh_water
  property fraction, origin: salt water 0; name fraction_origin_salt_water
- Iodine-133 [water, surface water]: 4.16e-7 kBq; lognormal variance with pedigree 0.042, pedigree (1,1,3,1,1)
  (same comment as for Cesium-137)
- Cesium-137 [air, non-urban air or from high stacks]: 7.28e-9 kBq; lognormal variance with pedigree 0.042, pedigree (1,1,3,1,1)
  (same comment as for Niobium-95)
- Silver-110 [water, surface water]: 4.43e-6 kBq; lognormal variance with pedigree 0.042, pedigree (1,1,3,1,1)
  (same comment as for Cesium-137)
- Tellurium-132 [water, surface water]: 8.42e-8 kBq; lognormal variance with pedigree 0.042, pedigree (1,1,3,1,1)
  (same comment as for Strontium-90)
- Cesium-136 [water, surface water]: 2.81e-7 kBq; lognormal variance with pedigree 0.042, pedigree (1,1,3,1,1)
  (same comment as for Cesium-137)
- Iodine-133 [air, non-urban air or from high stacks]: 1.82e-6 kBq; lognormal variance with pedigree 0.042, pedigree (1,1,3,1,1)
  (same comment as for Noble gases, radioactive, unspecified)
- Lanthanum-140 [water, surface water]: 4.95e-7 kBq; lognormal variance with pedigree 0.042, pedigree (1,1,3,1,1)
  (same comment as for Strontium-90)
- Antimony-125 [air, non-urban air or from high stacks]: 2.34e-8 kBq; lognormal variance with pedigree 0.042, pedigree (1,1,3,1,1)
  (same comment as for Niobium-95)
- Antimony-124 [air, non-urban air or from high stacks]: 4.75e-10 kBq; lognormal variance with pedigree 0.042, pedigree (1,1,3,1,1)
  (same comment as for Noble gases, radioactive, unspecified)
- Cesium-134 [water, surface water]: 3.77e-6 kBq; lognormal variance with pedigree 0.042, pedigree (1,1,3,1,1)
  (same comment as for Cesium-137)
- Radioactive species, alpha emitters [water, surface water]: 3.02e-8 kBq; lognormal variance with pedigree 0.042, pedigree (1,1,3,1,1)
  (same comment as for Strontium-90)
- Cobalt-60 [water, surface water]: 0.000395 kBq; lognormal variance with pedigree 0.042, pedigree (1,1,3,1,1)
  (same comment as for Strontium-90)
- Iron-59 [water, surface water]: 4.2e-7 kBq; lognormal variance with pedigree 0.042, pedigree (1,1,3,1,1)
  (same comment as for Strontium-90)
- Carbon-14 [air, non-urban air or from high stacks]: 0.00764 kBq; lognormal variance with pedigree 0.042, pedigree (1,1,3,1,1)
  (same comment as for Noble gases, radioactive, unspecified)
- Barium-140 [air, non-urban air or from high stacks]: 3.17e-10 kBq; lognormal variance with pedigree 0.042, pedigree (1,1,3,1,1)
  (same comment as for Niobium-95)
- Chromium-51 [water, surface water]: 7.56e-6 kBq; lognormal variance with pedigree 0.042, pedigree (1,1,3,1,1)
  (same comment as for Cesium-137)
- Ruthenium-103 [water, surface water]: 2.85e-7 kBq; lognormal variance with pedigree 0.042, pedigree (1,1,3,1,1)
  (same comment as for Cesium-137)
- Tellurium-123m [water, surface water]: 1.57e-6 kBq; lognormal variance with pedigree 0.042, pedigree (1,1,3,1,1)
  (same comment as for Strontium-90)
- Zinc-65 [water, surface water]: 2.63e-7 kBq; lognormal variance with pedigree 0.042, pedigree (1,1,3,1,1)
  (same comment as for Cesium-137)
- Antimony-125 [water, surface water]: 4.17e-5 kBq; lognormal variance with pedigree 0.042, pedigree (1,1,3,1,1)
  (same comment as for Cesium-137)
- Antimony-122 [water, surface water]: 9.04e-7 kBq; lognormal variance with pedigree 0.042, pedigree (1,1,3,1,1)
  (same comment as for Cesium-137)
- Radioactive species, other beta emitters [air, non-urban air or from high stacks]: 8.67e-8 kBq; lognormal variance with pedigree 0.042, pedigree (1,1,3,1,1)
  (same comment as for Noble gases, radioactive, unspecified)
- Molybdenum-99 [water, surface water]: 6e-9 kBq; lognormal variance with pedigree 0.042, pedigree (1,1,3,1,1)
  (same comment as for Cesium-137)
- Iodine-131 [water, surface water]: 8.21e-6 kBq; lognormal variance with pedigree 0.042, pedigree (1,1,3,1,1)
  (same comment as for Strontium-90)
- Strontium-89 [water, surface water]: 3.65e-6 kBq; lognormal variance with pedigree 0.042, pedigree (1,1,3,1,1)
  (same comment as for Cesium-137)
- Silver-110 [air, non-urban air or from high stacks]: 3.13e-9 kBq; lognormal variance with pedigree 0.042, pedigree (1,1,3,1,1)
  (same comment as for Niobium-95)
- Aerosols, radioactive, unspecified [air, non-urban air or from high stacks]: 5.37e-9 kBq; lognormal variance with pedigree 0.042, pedigree (1,1,3,1,1)
  (same comment as for Noble gases, radioactive, unspecified)
- Hydrogen-3, Tritium [water, surface water]: 1.86 kBq; lognormal variance with pedigree 0.042, pedigree (1,1,3,1,1)
  uncertainty declared in reports for radioactive releases
- Cerium-141 [water, surface water]: 1.76e-7 kBq; lognormal variance with pedigree 0.042, pedigree (1,1,3,1,1)
  (same comment as for Cesium-137)
- Antimony-124 [water, surface water]: 4.13e-5 kBq; lognormal variance with pedigree 0.042, pedigree (1,1,3,1,1)
  (same comment as for Strontium-90)
- Xenon-135 [air, non-urban air or from high stacks]: 0.166 kBq; lognormal variance with pedigree 0.042, pedigree (1,1,3,1,1)
  (same comment as for Niobium-95)

## Sampling procedure
Literature, statistics of radioactive emissions, and information from operators.

## Review by Carl Vadenbo 2015-06-21
The update of the whole electricity sector for the ecoinvent v3.2 database consist of hundreds of datasets. All these datasets have passed through a streamlined review processes where the underlying modelling of production volumes, technology shares and efficiencies was reviewed in detail prior to the datasets being submitted to the database.
