# reeled raw silk hank production

Dataset: EcoSpold 2, unit process
Geography: IN
Time period: 2015-04-01 to 2019-03-31
Technology level: current
Classification: EcoSpold01Categories: textiles/processing
Classification: ISIC rev.4 ecoinvent: 1311:Preparation and spinning of textile fibres
Scenario: Business-as-Usual
System model: Allocation at the point of substitution
Generated by: Madhuri Nigam
Published in: Faist Emmenegger, M. 2018
Database: ecoinvent
isCopyrightProtected: true
accessRestrictedTo: 1

## General comment
Inventory refers to production of 1 kg raw silk
This dataset represents the production of 1 kg reeled silk from 8 kg cocoon input. Government operated Silk reeling centres are operating in various districts of the Central Indian region. It is promoted as a local revenue source for government and employment for the women. Cocoons are delivered from cocoon banks to reeling centres which usually operate on 10 basin reeling unit. These centres are usually adjoining mulberry gardens and silk worm rearing centres.
On receiving the cocoons are first dried in electric ovens of capacity 50 kg. the cocoons are dried fist at 120˚C and gradually decreasing for over 5-6 hours.
The dried cocoons are then immersed in hot water and transferred to 10 basin reeling unit. Ends are brushed and reeled on spools and re-reeled into hanks of 70 gm each.
Total water requirement of cooking and reeling is 0.16 m3/kg raw silk, electricity requirement 3.39 kWh/ kg raw silk, fuelwood requirement (Acasia), 16 kg with an energy input of 312.8 MJ/kg raw silk. Waste silk is sold for reuse in silk carpet industry and other waste is sold in pharma, oil and other industry. Waste water from cooking and reeling goes to adjoining mulberry fields as it is rich in proteins. Electricity is generally solar based and reeling units have their own solar panels.
.The result of this activity is 1 kg raw silk.

## Included activities start
From reception of cocoons.

## Included activities end
This activity ends with produced 1 kg reeled raw silk as the final product. Machinery is excluded.

## Geography
Average based on data collected from Government operated Reeling centre running on benchmarked technolgy of Silk production which is average for silk production in Central India. Data was also collected from Government operated cocoon distribution centre.

## Technology
The following processes are used to process cocoons into raw silk: Oven drying, cooking and reeling and winding. These processes take in cocoons and heat them in oven for 6-7 hours, cooked in hot water. The cocoons are reeled in 10 basin Silk reeling machine. The reeled silk thus obtained is rereeled to form a standard hank of 70 g.

## Reference product
- reeled raw silk hank: 1 kg; name RSH; CPC 26110: Raw silk (not thrown); By-product classification allocatable product; pedigree (1,1,1,1,1)
  production volume 2.0478e7 kg
    Annual production volume of raw silk has been calculated from <http://texmin.nic.in/sites/default/files/3_Mulberry_Silk_Production_0.pdf> for 2015-16
  property carbon content, non-fossil 0.3769
    "Carbon content on a dry mass basis. All carbon is assumed to be biogenic due to the nature of the product. Carbon content of cotton is 0.44 kg of non-fossil carbon per kg of dry mass of cotton. Value is calculated based on the the composition of silk which is 64% cellulose. The data uses composition of silk fibers accessed on 10/11/2017 on: http://textilefashionstudy.com/chemical-composition-of-silk-fiber-silk-natural-fiber/
    "
  property price 18.875 EUR2005; name RSH_price_EUR2005
    Estimated value. The range found on different source was between 16 and 50 USD. The value of 25USD is here assumed. The source used to retrieved the price are: Woldwide butterflies, retrieved from: http://www.wwb.co.uk/pure-english-silk-hank, accesed 1Feb2018; MadeinChina.com, retrieved from: http://www.made-in-china.com/products-search/hot-china-products/Silk_Yarn_Hank_Price.html, accessed 1Feb2018; alibaba.com, retrieved from: https://www.alibaba.com/trade/search?fsb=y&IndexArea=product_en&CatId=&SearchText=raw+silk+hank+price, accessed 1Feb2018).
  property carbon content 0.3769
    carbon content on a dry matter basis (reserved; not for manual entry)
  property true value 18.875; name RSH_true_value
    allocation property applied in "true value" allocation // value calculated from revenue
  properties: water content 0.0309278, dry mass 0.97 kg, carbon content, fossil 0, water in wet mass 0.03 kg, wet mass 1 kg, carbon allocation 0.365593 kg

## By-products
- fibre, silk, short: 0 kg; By-product classification Recyclable; CPC 39211: Silk waste; pedigree (1,1,1,1,1)
  Leftover silk waste that is used to produce goods of inferior quality.
  production volume 6.1434e7 kg; = Ref('d9f702ac-def2-4e49-971c-7b8405666796', 'ProductionVolume') * (Ref('0165a8d4-b2fa-4436-a004-cede82c2edad') / RSH)
    Calculated from production volume of reference product using the relative outputs.
  property carbon content, non-fossil 0.3769
    (same comment as for reeled raw silk hank)
  property price 11.7644 EUR2005
    Estimated value. The Central Silk board of India reports a range of price of 675-750 Rupies per kg for Noil Yarn (Govt of India, Ministry of Textile 2018, Retrieved from http://www.csb.gov.in/statistics/silk-bulletin/silk-yarn-prices/, accessed 1Feb2018)
  property carbon content 0.3769
    carbon content on a dry matter basis (reserved; not for manual entry)
  property true value 35.2931
    allocation property applied in "true value" allocation // value calculated from revenue
  properties: carbon content, fossil 0, wet mass 1 kg, dry mass 0.97 kg, water in wet mass 0.03 kg, water content 0.0309278, carbon allocation 0.365593 kg
- heat, for reuse in municipal waste incineration only: 0 MJ; CPC 17300: Steam and hot water; By-product classification allocatable product; pedigree (1,1,1,1,1)
  Net electricity generated from this waste and used in internal MSWI plant energy redistribution.
  Uncertainty: uncertainty is calculated from uncertainties in waste composition and uncertainties in energy efficiency and the uncertainty in internal energy demand
  production volume 2.71224e7 MJ
  property price 0.0106 EUR2005; name E_th_prod_MSWI_price_EUR2005
    Average European district heat price from Ecoheatcool and Euroheat 2005-2006, Ecoheat Work package 1: The European heat market. Final report. 10.6 EUR/GJ i s the price of district heat. http://www.solarthermalworld.org/files/Ecoheatcool%20WP1%20Web.pdf?download
  property exergy 0.1842 MJ; name E_th_prod_MSWI_exergy
    This exergy property is based on the exergy content of the product.
  property true value relation 0.1842; name E_th_prod_MSWI_true_value_relation
    property to calculate "true value" from
  property true value 0.00903522
    allocation property applied in "true value" allocation // value calculated from true value relation
- electricity, for reuse in municipal waste incineration only: 0 kWh; CPC 17100: Electrical energy; By-product classification allocatable product; pedigree (1,1,1,1,1)
  (same comment as for heat, for reuse in municipal waste incineration only)
  production volume 3.07498e6 kWh
  property true value relation 3.6; name E_el_prod_MSWI_true_value_relation
    property to calculate "true value" from
  property exergy 3.6 MJ; name E_el_prod_MSWI_exergy
    This exergy property is based on the exergy content of the product.
  property price 0.1 EUR2005; name E_el_prod_MSWI_price_EUR2005
    Estimated to be the same price as in case of electricity, medium voltage.
  property true value 0.0200201
    (same comment as for heat, for reuse in municipal waste incineration only)
- biogas: 0 m3; source Raboni, Massimo 2014; By-product classification allocatable product; CPC 17200: Coal gas, water gas, producer gas and similar gases, other than petroleum gases and other gaseous hydrocarbons; pedigree (1,1,1,1,1)
  An average yield of 100 litres of biogas per kg biowaste is assumed
  production volume 199038 m3
  property price 0.109 EUR2005; name biogas_yield_price_EUR2005
    Temporary price data. Calculated as 90% of purchasers price based on: Same prices per energy output as natural gas, based on the proportional lower heating value (2/3 that of natural gas)
  property carbon content, non-fossil 0.449939
    Total C content in kg/Nm3 (Tab 12.8, ecoinvent v2.2 report n17), referred to 1kg DM
  property carbon content 0.449939
    carbon content on a dry matter basis (reserved; not for manual entry)
  property true value 0.00105944
    allocation property applied in "true value" allocation // value calculated from revenue
  properties: water in wet mass 0 kg, wet mass 1.15 kg, carbon content, fossil 0, lower heating value 0 MJ/Nm3, water content 0, dry mass 1.15 kg, carbon allocation 0.51743 kg
- zinc concentrate: 0 kg; CPC 14290: Other non-ferrous metal ores and concentrates (other than uranium or thorium ores and concentrates); By-product classification allocatable product
  Calculated value from the knowledge of the properties of both products.
  production volume 7.85611 kg
  property price 0.38 EUR2005; name ByP_price_EUR2005
    Temporary price data. Calculated as 90% of purchasers price based on: Zinc content in concentrate 53%. Concentrate price per kg Zn 86.5% of refined Zn price (13.5% treatment charges according to CHR Metals Limited 2005: Dynamic cost curves. http://www.minecost.com/dynamic.pdf). 2004 zinc price from USGS (2007) Mineral commodity summaries 2007. <http://minerals.usgs.gov/minerals/pubs/mcs/2007/mcs2007.pdf> [Accessed 25 May 2010]
  property zinc content 0.53; name zinc_C_zinc_concentrate
    Zinc content on a dry matter basis. Value taken from teh "zinc mine operation" /GLO dataset.
  property dry mass 1 kg; name DM_zinc_concentrate
  property carbon content 0
    carbon content on a dry matter basis (reserved; not for manual entry)
  property true value 1.45782e-7
    allocation property applied in "true value" allocation // value calculated from revenue
  properties: wet mass 1 kg, water content 0, carbon content, non-fossil 0, carbon content, fossil 0, water in wet mass 0 kg, carbon allocation 0 kg
- compost: 0 kg; CPC 391: Wastes from food and tobacco industry; By-product classification allocatable product; pedigree (1,1,1,1,1)
  EcoSpold01Location=CH
  Biowaste is reduced in mass by a factor of 2 during composting
  production volume 1.58557e7 kg
  property water in wet mass 0.472 kg; name Water_in_wet_mass_compost; = 1- DM_compost
  property price 0.03 EUR2005
    Temporary price data. Calculated as 90% of purchasers price based on: Estimation done using the following sources: <http://www.wmaa.asn.au/uploads/documents/MarkWinser_1May2007.pdf>; <http://www.swlf.ait.ac.th/UpdData/International/Composting%20and%20anaerobic%20digestion_%20comparions%20for%20Europe%20and%20Asia.pdf>; <http://www.epa.gov/osw/conserve/rrr/composting/basic.htm>, accessed 2011.06.16
  property carbon content, non-fossil 0.1165
    calculation: dry matter 50%, organic matter 40% of dry matter, C content calculated from organic matter divided by 1.72. Relative to dry matter; relative to fresh matter: divided by 2 => 0.1156
  property dry mass 0.528 kg; name DM_compost
  property water content 0.893939; name Water_content_compost; = Water_in_wet_mass_compost/DM_compost
  property concentration, cadmium 0 kg/kg; name Mass_compost_concentration_Cd; = Mass_biowaste_concentration_Cd*2
    Biowaste mass is reduced by a factor of two during composting, therefore concentration is doubled
  property humus equivalent 0.061 kg
    Humus building fraction expressed in kg per kg product on a FM basis. Humus denotes the converted, primary biomass from plants or animals in the ground. More information can be found in the documentation of the composting itself: "treatment of biowaste, industrial composting".
  property concentration, copper 0 kg/kg; name Mass_compost_concentration_Cu; = Mass_biowaste_concentration_Cu*2
    (same comment as for compost)
  property concentration, calcium 0 kg/kg; name Mass_compost_Ca_concentration; = Mass_biowaste_concentration_Ca*2
    (same comment as for compost)
  property concentration, magnesium 0 kg/kg; name Mass_compost_Mg_concentration; = Mass_biowaste_concentration_Mg*2
    (same comment as for compost)
  property concentration, mercury 0 kg/kg; name Mass_compost_Hg_concentration; = Mass_biowaste_concentration_Hg*2
    (same comment as for compost)
  property concentration, lead 0 kg/kg; name Mass_compost_concentration_Pb; = Mass_biowaste_concentration_Pb*2
    (same comment as for compost)
  property concentration, nickel 0 kg/kg; name Mass_compost_Ni_concentration; = Mass_biowaste_concentration_Ni*2
    (same comment as for compost)
  property concentration, phosphorus 0 kg/kg; name Mass_compost_P_concentration; = Mass_biowaste_concentration_P*2
    (same comment as for compost)
  property concentration, sulfur 0 kg/kg; name Mass_compost_concentration_S; = Mass_biowaste_concentration_S*2
    (same comment as for compost)
  property concentration, potassium 0 kg/kg; name Mass_compost_K_concentration; = Mass_biowaste_concentration_K*2
    (same comment as for compost)
  property nickel content 1.60606e-5; name Mass_compost_Ni_content; = Mass_biowaste_Ni_content/0.5*( DM_biowaste / DM_compost)
    nickel content on a dry matter basis
  property concentration, nitrogen 0 kg/kg; = Mass_biowaste_concentration_N*2
    (same comment as for compost)
  property concentration, zinc 0 kg/kg; name Mass_compost_concentration_Zn; = Mass_biowaste_concentration_Zn*2
    (same comment as for compost)
  property lead content 2.66667e-5; name Mass_compost_Pb_content; = Mass_biowaste_Pb_content/0.5*( DM_biowaste / DM_compost)
    lead content on a dry matter basis
  property copper content 3.81818e-5; name Mass_compost_Cu_content; = Mass_biowaste_Cu_content/0.5*( DM_biowaste / DM_compost)
    copper content on a dry matter basis
  property cadmium content 2.89394e-7; name Mass_compost_Cd_content; = Mass_biowaste_Cd_content/0.5*( DM_biowaste / DM_compost)
    cadmium content on a dry matter basis
  property nitrogen content 0.0136364; name Mass_compost_N_content; = Mass_biowaste_N_content/0.5*( DM_biowaste / DM_compost)
    nitrogen content on a dry matter basis
  property magnesium content 0.00525758; name Mass_compost_Mg_content; = Mass_biowaste_Mg_content/0.5*( DM_biowaste / DM_compost)
    magnesium content on a dry matter basis
  property zinc content 0.000120303; name Mass_compost_Zn_content; = Mass_biowaste_Zn_content/0.5*( DM_biowaste / DM_compost)
    zinc content on a dry matter basis
  property potassium content 0.0099697; name Mass_compost_K_content; = Mass_biowaste_K_content/0.5*( DM_biowaste / DM_compost)
    potassium content on a dry matter basis
  property sulfur content 0.00190909; name Mass_compost_S_content; = Mass_biowaste_S_content/0.5*( DM_biowaste / DM_compost)
    sulfur content on a dry matter basis
  property calcium content 0.0504545; name Mass_compost_Ca_content; = Mass_biowaste_Ca_content/0.5*( DM_biowaste / DM_compost)
    calcium content on a dry matter basis
  property mercury content 1e-7; name Mass_compost_Hg_content; = Mass_biowaste_Hg_content/0.5*( DM_biowaste / DM_compost)
    mercury content on a dry matter basis
  property phosphorus content 0.00275758; name Mass_compost_P_content; = Mass_biowaste_P_content/0.5*( DM_biowaste / DM_compost)
    phosphorus content on a dry matter basis
  property carbon content 0.1165
    carbon content on a dry matter basis (reserved; not for manual entry)
  property true value 0.0232284
    allocation property applied in "true value" allocation // value calculated from revenue
  properties: carbon content, fossil 0, wet mass 1 kg, carbon allocation 0.061512 kg
- iron scrap, sorted, pressed: 0 kg; By-product classification Recyclable; CPC 39310: Slag, dross, scalings and other waste from the manufacture of iron or steel; pedigree (1,1,1,1,1)
  metallic iron scrap removed from ash reamains and recycled.
  Uncertainty: uncertainty is calculated from uncertainties in waste composition and transfer coefficients to soild residues
  production volume 1.66636 kg
  property price 0.175 EUR2005
    Temporary price data. Calculated as 90% of purchasers price based on: 2005 import and export prices (total trades (USD) divided by total weight (kg) in biggest economies of the world: EU27, USA, Brasil, China, India, Japan and Russia) from UN Commodity Trade Statistics Database (http://data.un.org/Explorer.aspxDatabase [Accessed 2011.06.20]). Commodity: Waste or scrap, of cast iron
  property carbon content 0
    carbon content on a dry matter basis (reserved; not for manual entry)
  property true value 1.42403e-8
    allocation property applied in "true value" allocation // value calculated from revenue
  properties: carbon content, non-fossil 0, wet mass 1 kg, dry mass 1 kg, water content 0, carbon content, fossil 0, water in wet mass 0 kg, carbon allocation 0 kg
- copper: 0 kg; source Rentz O. 1999; By-product classification allocatable product; CPC 41413: Refined copper and copper alloys, unwrought; master alloys of copper
  Literature value. Copper uses: Before end-use copper is manufactured into semi fabricated products, such as shapes and ingots (known as 'semis'). These manufacturing processes are subdivided into hot working, cold working and, if necessary, process annealing. Few of the semis are ready for use as such. They more typically travel to first-stage manufacturers, who make metal rods, wire, and casting, and then to component manufacturers who produce such things as motors, valves, and insulated cables The components in turn are incorporated by final-stage manufacturers into a variety of finished products - automobiles, commercial buildings, residential housing, and so forth. These uses account for about 79% of the world-wide consumption of copper.
  production volume 0.0530404 kg
  property price 5.52 EUR2005
    Literature value (http://www.economist.com/news/business/21576714-mining-industry-has-enriched-chile-its-future-precarious-copper-solution). Average price between 20015 and 2013.
  property carbon content 0
    carbon content on a dry matter basis (reserved; not for manual entry)
  property true value 1.42974e-8
    allocation property applied in "true value" allocation // value calculated from revenue
  properties: dry mass 1 kg, water in wet mass 0 kg, wet mass 1 kg, carbon content, non-fossil 0, water content 0, carbon content, fossil 0, carbon allocation 0 kg
- iron scrap, unsorted: 0 kg; source European Aluminium Association 2008; CPC 39310: Slag, dross, scalings and other waste from the manufacture of iron or steel; By-product classification Recyclable; pedigree (1,1,1,1,1)
  production volume 4.74083e-5 kg
  property price 0.149 EUR2005; name ironScrapAmount_price_EUR2005
    Temporary price data. Calculated as 90% of purchasers price based on: estimated at 85% of sorted scrap
  property carbon content 0
    carbon content on a dry matter basis (reserved; not for manual entry)
  property true value 3.44948e-13
    allocation property applied in "true value" allocation // value calculated from revenue
  properties: water in wet mass 0 kg, water content 0, carbon content, fossil 0, carbon content, non-fossil 0, dry mass 1 kg, wet mass 1 kg, carbon allocation 0 kg
- aluminium oxide, non-metallurgical: 0 kg; source European Aluminium Association 2008; CPC 41432: Alumina (aluminium oxide), except artificial corundum; By-product classification allocatable product; CAS 1344-28-1; pedigree (1,1,1,1,1)
  production volume 0.00298323 kg
  property carbon content, non-fossil 0; name C_content_non_fossil
  property price 0.28 EUR2005; name Al2O3Amount_price_EUR2005
    From UN trade database. http://data.un.org/ Import data from the largest economies of the world are used (Brazil, India, USA, China, Japan and EU-27).
  property dry mass 1 kg; name DM
  property water content 0; name water_content
  property wet mass 1 kg; name WM
  property water in wet mass 0 kg; name WWM
  property carbon content, fossil 0; name C_content_fossil
  property carbon content 0
    carbon content on a dry matter basis (reserved; not for manual entry)
  property true value 4.07903e-11
    allocation property applied in "true value" allocation // value calculated from revenue
  properties: carbon allocation 0 kg
- aluminium, cast alloy: 0 kg; source European Aluminium Association 2008; By-product classification allocatable product; CPC 41431: Unwrought aluminium; pedigree (1,1,1,1,1)
  EcoSpold01Location=RER
  production volume 0.0278866 kg
  property price 1.3 EUR2005; name castAlloyAmount_price_EUR2005
    Temporary price data. Calculated as 90% of purchasers price based on: Source: London Metal Exchange, Aluminium alloy price for 2005
  property carbon content 0
    carbon content on a dry matter basis (reserved; not for manual entry)
  property true value 1.77032e-9
    allocation property applied in "true value" allocation // value calculated from revenue
  properties: water in wet mass 0 kg, carbon content, non-fossil 0, water content 0, dry mass 1 kg, carbon content, fossil 0, wet mass 1 kg, carbon allocation 0 kg
- aluminium, wrought alloy: 0 kg; source European Aluminium Association 2008; By-product classification allocatable product; CPC 4153: Semi-finished products of aluminium or aluminium alloys; pedigree (1,1,1,1,1)
  production volume 0.0122082 kg
  property price 1.44 EUR2005; name secondaryAluminiumOutput_price_EUR2005
    Estimated based on literature values and expert judgement. Aluminium ccast alloys are about 90% of the price of aluminium wrought alloys.
  property carbon content 0
    carbon content on a dry matter basis (reserved; not for manual entry)
  property true value 8.58473e-10
    allocation property applied in "true value" allocation // value calculated from revenue
  properties: wet mass 1 kg, water content 0, carbon content, fossil 0, water in wet mass 0 kg, carbon content, non-fossil 0, dry mass 1 kg, carbon allocation 0 kg

## Inputs from technosphere
- cocoons: 2.78488 kg; name SC; lognormal variance with pedigree 0.0108, pedigree (4,4,2,1,1)
  Primary data collected from the Silk Reeling Centre
  properties: wet mass 1 kg, dry mass 0.5 kg, carbon content, non-fossil 0.475, water content 1
  note on carbon content, non-fossil: Biogenic carbon content of vegetation on a dry mass basis (47.5% DM) derived from FAOSTAT. Reference: http://www.fao.org/forestry/17111/en
- electricity, low voltage: 1.18079 kWh; = 2.16+0.410+0.171+0.171+0.480; lognormal variance with pedigree 0.0028, pedigree (1,4,2,1,1)
  sum of electricity used for
  Heater Power for dryer (6 heater, 3kw each)
  Hot air drying (blowers)
  Reeling
  Re-reeling (for standard hank-70gm)
  Utilities: Utilities considred here as the process is dependent on it. Primary data collected from Silk reeling centre
- heat, central or small-scale, other than natural gas: 108.889 MJ; = 16*19.55; lognormal variance with pedigree 0.0028, pedigree (1,4,2,1,1)
  16 kg of firewood used for cooking/ kg reference product multiplied by the calorific value of Acacia tereticornis used (firewood). Primary data collected from Silk reeling centre.
- tap water: 55.6975 kg; name water; lognormal variance with pedigree 0.0082, pedigree (1,4,2,1,1)
  Primary data collected from the Silk reeling Centre
  properties: dry mass 0.000337476 kg, carbon content, fossil 0.00178991, water content 2962.17, wet mass 1 kg
  note on carbon content, fossil: Bicarbonate content is 2.93 mol/m3. CO2 content is 0.1 mol/m3 (ecoinvent v2.2 report 8, Tab 93.1).
- biowaste: -1.39244 kg; name BW; lognormal variance with pedigree 0.0034, pedigree (2,4,2,1,1)
  cocoon waste (mostly pupae) which is sold outside the plant to carpet industry, oil and pharma industry. The data is primary data provided by the reeling centre
  production volume 8.1912e7 kg; = Ref('d9f702ac-def2-4e49-971c-7b8405666796', 'ProductionVolume') * ((Ref('9e971124-9c0a-48cb-90ce-6afb55dc8cf2')*-1) / Ref('d9f702ac-def2-4e49-971c-7b8405666796'))
    Calculated from production volume of reference product using the relative outputs.
  property price 0 EUR2005; name BW_price_EUR2005
  properties: water content 1.5, wet mass 1 kg, dry mass 0.4 kg, carbon content, non-fossil 0.1624
- wastewater from textile production: -0.044558 m3; = ( (water/1000)*.8)*-1; lognormal variance with pedigree 0.0028, pedigree (1,4,2,1,1)
  considering 80% waste water after 20% evaporation. Divided by thousand to convert kg to m3
  production volume 2.62118e6 m3; = Ref('d9f702ac-def2-4e49-971c-7b8405666796', 'ProductionVolume') * ((Ref('7af15ca6-9de6-476c-87b8-912899496b64')*-1) / RSH)
    Calculated from production volume of reference product using the relative outputs.
  properties: BOD5, mass per volume 0.495 kg/m3, mass concentration, magnesium 0.003219 kg/m3, carbon content, non-fossil 0.216883, mass concentration, copper 0.0001091 kg/m3, water content 4192.34, wet mass 1000 kg, mass concentration, aluminium 0.0007758 kg/m3, mass concentration, zinc 0.0001075 kg/m3, mass concentration, iron 0.0005904 kg/m3, COD, mass per volume 0.501 kg/m3, mass concentration, potassium 0.01647 kg/m3, dry mass 0.238473 kg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
  note on carbon content, non-fossil: COD is 7.79e-4 kg/kg (Tab 12.11, ecoinvent v2.2 report 18_III). COD was converted to TOC, using conversion factors in Tab 4.10 (ecoinvent v2.2 report 13_IV). TOC was considered as Total Carbon.
- building, hall: 0.00142814 m2; = 800/(3900*50); lognormal variance with pedigree 0.3008, pedigree (2,1,2,1,1)
  square meters of building divided by production per year and life time of the plant

## Emissions to nature
- Water [air, unspecified]: 0.0111395 m3; = (water/1000)*.2; lognormal variance with pedigree 0.0028, pedigree (1,4,2,1,1)
  considering 20% evaporation rate

## Sampling procedure
Field data from Silk reeling centre at Hoshangabad, Madhya Pradesh. Employees of District silk reeling centre were interviewed to provide data based on the representativeness of currently used technology,
