# treatment of waste polyethylene terephthalate, municipal incineration

Dataset: EcoSpold 2, unit process
Geography: CH
Time period: 1994-01-01 to 2019-12-31
Technology level: outdated
Classification: EcoSpold01Categories: waste management/municipal incineration
Classification: ISIC rev.4 ecoinvent: 3821:Treatment and disposal of non-hazardous waste
Synonyms: Pegoterate; Poly(oxyethyleneoxyterephthaloyl); PET
Tags: ConvertedDataset; Treatment
Scenario: Business-as-Usual
System model: Allocation at the point of substitution
Generated by: Gabor Doka (obsolete)
Published in: Doka G. 2007
Database: ecoinvent
isCopyrightProtected: true
accessRestrictedTo: 1

## General comment
Inventoried waste contains 100% PET; .
waste composition (wet, in ppm): upper heating value 23.13 MJ/kg; lower heating value 22.95 MJ/kg; H2O 2000; O 368750; H 63380; C 553640; S 147.87; N 6456.8; P n.a.; B n.a.; Cl 788.62; Br 69.004; F 11.829; I n.a.; Ag n.a.; As 1.873; Ba 49.289; Cd 3.2531; Co 31.052; Cr 5.4218; Cu 11.829; Hg 0.08872; Mn 17.744; Mo n.a.; Ni 3.9431; Pb 5.5203; Sb 159.2; Se 2.0701; Sn 0.98577; V 1281.5; Zn 68.676; Be 0.49289; Sc n.a.; Sr 87.241; Ti 985.77; Tl 0.39431; W n.a.; Si n.a.; Fe 98.577; Ca 295.73; Al 197.15; K n.a.; Mg n.a.; Na 1444.7;
Share of carbon in waste that is biogenic 0%.
Share of iron in waste that is metallic/recyclable 0%.
Net energy produced in MSWI: 2.46MJ/kg waste electric energy and 5.03MJ/kg waste thermal energy
Allocation of energy production: no substitution or expansion. Total burden allocated to waste disposal function of MSWI.
One kg of this waste produces 0.0106 kg of slag and 0.003547 kg of residues, which are landfilled. Additional solidification with 0.001419 kg of cement.
[This dataset was already contained in the ecoinvent database version 2. It was not individually updated during the transfer to ecoinvent version 3. Life Cycle Impact Assessment results may still have changed, as they are affected by changes in the supply chain, i.e. in other datasets. This dataset was generated following the ecoinvent quality guidelines for version 2. It may have been subject to central changes described in the ecoinvent version 3 change report (http://www.ecoinvent.org/database/ecoinvent-version-3/reports-of-changes/), and the results of the central updates were reviewed extensively. The changes added e.g. consistent water flows and other information throughout the database. The documentation of this dataset can be found in the ecoinvent reports of version 2, which are still available via the ecoinvent website. The change report linked above covers all central changes that were made during the conversion process.]

## Included activities end
waste-specific air and water emisions from incineration, auxiliary material consumption for flue gas cleaning. Short-term emissions to river water and long-term emisisons to ground water from slag compartment (from bottom slag) and residual material landfill (from solidified fly ashes and scrubber slugde). Process energy demands for MSWI.

## Geography
Specific to the technology mix encountered in Switzerland in 2000. Well applicable to modern incineration practices in Europe, North America or Japan.

## Technology
replaced by newer incineration technology with fly ash extraction. Average Swiss MSWI plants in 2000 with electrostatic precipitator for fly ash (ESP), wet flue gas scrubber and 29.4% SNCR , 32.2% SCR-high dust , 24.6% SCR-low dust -DeNOx facilities and 13.8% without Denox (by burnt waste, according to Swiss average). Share of waste incinerated in plants with magnetic scrap separation from slag : 50%. Gross electric efficiency technology mix 12.997% and Gross thermal efficiency technology mix 25.57%

## Time period
Waste composition as given in literature reference, theoretical data or other source. Transfer coefficients for modern Swiss MSWI. Emission speciation based on early 90ies data.

## Reference product
- waste polyethylene terephthalate: -1 kg; By-product classification Waste; CPC 39270: Waste, parings and scrap of plastics; CAS 25038-59-9
  EcoSpold01Location=CH
  production volume 0 kg
    outdated. Replaced by newer incineration technology with fly ash extraction.
  property price 0 EUR2005
    Waste products are assigned a price of zero as they are assumed to require further treatment.
  property carbon content, fossil 0.554108
    C content in 1 kg DM was calculated using data in Tab A.1, ecoinvent v2.2 report 13_I
  property carbon content 0.554108
    carbon content on a dry matter basis (reserved; not for manual entry)
  properties: wet mass 1 kg, carbon content, non-fossil 0, dry mass 0.998 kg, water in wet mass 0.002 kg, water content 0.00200401, carbon allocation 0.553 kg

## Inputs from technosphere
- titanium dioxide: 9.32e-6 kg; lognormal variance with pedigree 2.09, pedigree (1,1,5,1,1)
  uncertainty calculated from uncertainty in average DeNOx input, uncertainty in the share of thermal NOx, uncertainty of nitrogen content in average municipal waste and the unertainty in nitrogen content in *this* waste.
  EcoSpold01Location=RER
  properties: dry mass 1 kg, wet mass 1 kg
- sodium hydroxide, without water, in 50% solution state: 0.000841 kg; lognormal variance with pedigree 0.65, pedigree (1,1,5,1,1)
  EcoSpold01Location=RER
  uncertainty calculated from uncertainty in average auxiliary material input, and the unertainty of the waste composition of this waste
  properties: wet mass 1 kg, dry mass 1 kg
- iron (III) chloride, without water, in 40% solution state: 3.04e-5 kg; lognormal variance with pedigree 0.41, pedigree (1,1,5,1,1)
  uncertainty calculated from uncertainty in average auxiliary material input, and the unertainty of the waste composition of this waste
  EcoSpold01Location=CH
  properties: dry mass 1 kg, wet mass 1 kg
- process-specific burdens, residual material landfill: 0.00355 kg; lognormal variance with pedigree 0.07, pedigree (1,1,5,1,1)
  uncertainty is calculated from uncertainties in waste composition and transfer coefficients in incinerator;activityLink introduced to establish a direct link to the corresponding regional supply of this product
  EcoSpold01Location=CH
- quicklime, milled, packed: 0.000139 kg; lognormal variance with pedigree 0.71, pedigree (1,1,5,1,1)
  (same comment as for iron (III) chloride, without water, in 40% solution state)
  properties: dry mass 0.99 kg, wet mass 1 kg, water content 0.010101
- cement, unspecified: 0.00142 kg; lognormal variance with pedigree 0.08, pedigree (1,1,5,1,1)
  Cement for solidification of landfilled residual material. Uncertainty calculated from unertainty of the waste composition of this waste, of transfer coefficients in the incinerator and of the solidification recipe.
  EcoSpold01Location=CH
  properties: wet mass 1 kg, dry mass 1 kg
- ammonia, liquid: 0.000326 kg; lognormal variance with pedigree 1.38, pedigree (1,1,5,1,1)
  uncertainty calculated from uncertainty in average DeNOx input, uncertainty in the share of thermal NOx, uncertainty of nitrogen content in average municipal waste and the unertainty in nitrogen content in *this* waste.
  EcoSpold01Location=CH
  properties: dry mass 1 kg, wet mass 1 kg
- chromium oxide, flakes: 1.9e-7 kg; lognormal variance with pedigree 2.09, pedigree (1,1,5,1,1)
  Proxy for vanadium pentoxide V2O5 in SCR catalyst, uncertainty calculated from uncertainty in average DeNOx input, uncertainty in the share of thermal NOx, uncertainty of nitrogen content in average municipal waste and the unertainty in nitrogen content in *this* waste.
  EcoSpold01Location=RER
  properties: dry mass 1 kg, wet mass 1 kg
- residual material landfill: 7.39e-12 unit; lognormal variance with pedigree 0.07, pedigree (1,1,5,1,1)
  EcoSpold01Location=CH
  uncertainty is calculated from uncertainties in waste composition and transfer coefficients in incinerator
- process-specific burdens, municipal waste incineration: 1 kg; lognormal variance with pedigree 0.04, pedigree (1,1,5,1,1)
  EcoSpold01Location=CH
  demands per kilogram waste. uncertainty is heeded in the module;activityLink introduced to establish a direct link to the corresponding regional supply of this product
- chemical, inorganic: 3.79e-6 kg; lognormal variance with pedigree 0.41, pedigree (1,1,5,1,1)
  EcoSpold01Location=GLO
  Proxy for Polyelectrolyte. uncertainty calculated from uncertainty in average auxiliary material input, and the unertainty of the waste composition of this waste
  properties: carbon content, fossil 0.003, wet mass 1 kg, dry mass 1 kg
  note on carbon content, fossil: This dataset is an unweighted average of 20 inorganic substances (listed in Tab 88.1, ecoinvent v2.2 report 8, part II), being part of the top100 chemicals included in this database. The C-content has also been calculated as an unweighted average of the C content of the substances composing this dataset.
- chemical, organic: 1.31e-5 kg; lognormal variance with pedigree 1.43, pedigree (1,1,5,1,1)
  EcoSpold01Location=GLO
  Proxy for TMT15. uncertainty calculated from uncertainty in average auxiliary material input, and the unertainty of the waste composition of this waste
  properties: wet mass 1 kg, dry mass 1 kg, carbon content, fossil 0.628
  note on carbon content, fossil: This dataset is an unweighted average of 20 organic substances (listed in Tab 88.1, ecoinvent v2.2 report 8, part II), being part of the top100 chemicals included in this database. The C-content has also been calculated as an unweighted average of the C content of the substances composing this dataset.
- municipal waste incineration facility: 2.5e-10 unit; lognormal variance with pedigree 0.04, pedigree (1,1,5,1,1)
  EcoSpold01Location=CH
  demands per kilogram waste. uncertainty is heeded in the module
- heat, district or industrial, natural gas: 0.02862 MJ; lognormal variance with pedigree 1.38, pedigree (1,1,5,1,1)
  EcoSpold01Location=RER
  uncertainty calculated from uncertainty in average DeNOx input, uncertainty in the share of thermal NOx, uncertainty of nitrogen content in average municipal waste and the unertainty in nitrogen content in *this* waste.
- hydrochloric acid, without water, in 30% solution state: 2.27e-6 kg; lognormal variance with pedigree 0.41, pedigree (1,1,5,1,1)
  (same comment as for sodium hydroxide, without water, in 50% solution state)
  properties: dry mass 1 kg, wet mass 1 kg
- slag landfill: 1.88e-11 unit; lognormal variance with pedigree 0.08, pedigree (1,1,5,1,1)
  (same comment as for residual material landfill)
- waste cement, hydrated: -0.00355 kg; lognormal variance with pedigree 0.08, pedigree (1,1,5,1,1)
  EcoSpold01Location=CH
  Hydrated cement for solidification of landfilled residual material. Uncertainty calculated from unertainty of the waste composition of this waste and transfer coefficients in the incinerator and of the solidification recipe.
  production volume 0 kg; = Ref('7e2429ee-6088-413b-9b48-5d92b53cbe14', 'ProductionVolume')* (Ref('257c667f-2a88-49ae-b98e-def580874023')*-1)
    Calculated from the production volume of waste polyethylene terephtalate, 0.2% water in proportion to the respective output amounts.
  properties: wet mass 1 kg, dry mass 1 kg
- process-specific burdens, slag landfill: 0.0106 kg; lognormal variance with pedigree 0.08, pedigree (1,1,5,1,1)
  EcoSpold01Location=CH
  uncertainty is calculated from uncertainties in waste composition and transfer coefficients in incinerator;activityLink introduced to establish a direct link to the corresponding regional supply of this product

## Emissions to nature
- Mercury [water, surface water]: 9.49e-10 kg; lognormal variance with pedigree 1.93, pedigree (1,1,5,1,1)
  uncertainty is calculated from uncertainties in waste composition and transfer coefficients in incinerator and landfills
- BOD5, Biological Oxygen Demand [water, ground-, long-term]: 0.00447 kg; lognormal variance with pedigree 0.06, pedigree (1,1,5,1,1)
  Long-term emissions from landfilling of incineration residues. uncertainty is calculated from uncertainties in waste composition and transfer coefficients in incinerator and landfills.
- Calcium [air, urban air close to ground]: 4.93e-7 kg; lognormal variance with pedigree 0.87, pedigree (1,1,5,1,1)
  uncertainty is calculated from uncertainties in waste composition and transfer coefficients in incinerator
- Arsenic, ion [water, surface water]: 8.44e-7 kg; lognormal variance with pedigree 1.29, pedigree (1,1,5,1,1)
  (same comment as for Mercury)
- Antimony [water, surface water]: 5.53e-5 kg; lognormal variance with pedigree 0.79, pedigree (1,1,5,1,1)
  (same comment as for Mercury)
- Nickel [air, urban air close to ground]: 1.7e-13 kg; lognormal variance with pedigree 1.53, pedigree (1,1,5,1,1)
  (same comment as for Calcium)
- Nitrate [water, ground-, long-term]: 0.000232 kg; lognormal variance with pedigree 0.47, pedigree (1,1,5,1,1)
  (same comment as for BOD5, Biological Oxygen Demand)
- Methane, fossil [air, urban air close to ground]: 6.38e-6 kg; lognormal variance with pedigree 0.091225, pedigree (2,3,5,2,1)
  Confidential data from 5 plants in Switzerland and Germany
  Uncertainty: & basic uncertainty of 1.5; confidential data from 5 plants in Switzerland and Germany
- Mercury [air, urban air close to ground]: 3.06e-15 kg; lognormal variance with pedigree 2.06, pedigree (1,1,5,1,1)
  (same comment as for Calcium)
- Chromium VI [water, surface water]: 1.77e-7 kg; lognormal variance with pedigree 1.3, pedigree (1,1,5,1,1)
  (same comment as for Mercury)
- Vanadium, ion [water, surface water]: 8.65e-7 kg; lognormal variance with pedigree 0.92, pedigree (1,1,5,1,1)
  (same comment as for Mercury)
- Calcium, ion [water, surface water]: 1.12e-6 kg; lognormal variance with pedigree 1.31, pedigree (1,1,5,1,1)
  (same comment as for Mercury)
- Manganese [air, urban air close to ground]: 9.66e-14 kg; lognormal variance with pedigree 1.36, pedigree (1,1,5,1,1)
  (same comment as for Calcium)
- Copper, ion [water, surface water]: 4.8e-10 kg; lognormal variance with pedigree 1.88, pedigree (1,1,5,1,1)
  (same comment as for Mercury)
- Barium [water, surface water]: 6.78e-9 kg; lognormal variance with pedigree 1.98, pedigree (1,1,5,1,1)
  (same comment as for Mercury)
- Tin [air, urban air close to ground]: 1.31e-9 kg; lognormal variance with pedigree 1.63, pedigree (1,1,5,1,1)
  (same comment as for Calcium)
- Manganese [water, ground-, long-term]: 1.53e-5 kg; lognormal variance with pedigree 1.32, pedigree (1,1,5,1,1)
  (same comment as for BOD5, Biological Oxygen Demand)
- Nitrate [water, surface water]: 8.26e-5 kg; lognormal variance with pedigree 0.34, pedigree (1,1,5,1,1)
  (same comment as for Mercury)
- Cadmium, ion [water, surface water]: 1.48e-9 kg; lognormal variance with pedigree 1.42, pedigree (1,1,5,1,1)
  (same comment as for Mercury)
- Antimony [water, ground-, long-term]: 0.000102 kg; lognormal variance with pedigree 0.76, pedigree (1,1,5,1,1)
  (same comment as for BOD5, Biological Oxygen Demand)
- Chloride [water, surface water]: 0.00077 kg; lognormal variance with pedigree 0.66, pedigree (1,1,5,1,1)
  (same comment as for Mercury)
- Zinc [air, urban air close to ground]: 1.12e-9 kg; lognormal variance with pedigree 1.1, pedigree (1,1,5,1,1)
  (same comment as for Calcium)
- Aluminium [water, ground-, long-term]: 0.000146 kg; lognormal variance with pedigree 0.85, pedigree (1,1,5,1,1)
  (same comment as for BOD5, Biological Oxygen Demand)
- Fluoride [water, surface water]: 9.09e-7 kg; lognormal variance with pedigree 0.93, pedigree (1,1,5,1,1)
  (same comment as for Mercury)
- Chromium, ion [water, surface water]: 1.73e-8 kg; lognormal variance with pedigree 1.4, pedigree (1,1,5,1,1)
  (same comment as for Mercury)
- Antimony [air, urban air close to ground]: 6.19e-13 kg; lognormal variance with pedigree 1.06, pedigree (1,1,5,1,1)
  (same comment as for Calcium)
- Cadmium [air, urban air close to ground]: 1.79e-10 kg; lognormal variance with pedigree 1.5, pedigree (1,1,5,1,1)
  (same comment as for Calcium)
- Ammonia [air, urban air close to ground]: 5.12e-6 kg; lognormal variance with pedigree 1.49, pedigree (1,1,5,1,1)
  uncertainty calculated from uncertainty in average N-emissions, uncertainty in the share of thermal NOx, uncertainty of nitrogen content in average municipal waste and the unertainty in nitrogen content in *this* waste.
- Strontium [water, surface water]: 5.49e-8 kg; lognormal variance with pedigree 1.73, pedigree (1,1,5,1,1)
  (same comment as for Mercury)
- Selenium [water, surface water]: 6.74e-7 kg; lognormal variance with pedigree 1.21, pedigree (1,1,5,1,1)
  (same comment as for Mercury)
- Sulfate [water, surface water]: 7.18e-5 kg; lognormal variance with pedigree 0.48, pedigree (1,1,5,1,1)
  (same comment as for Mercury)
- Cobalt [water, ground-, long-term]: 2.72e-5 kg; lognormal variance with pedigree 1.11, pedigree (1,1,5,1,1)
  (same comment as for BOD5, Biological Oxygen Demand)
- DOC, Dissolved Organic Carbon [water, ground-, long-term]: 0.00541 kg; lognormal variance with pedigree 0.06, pedigree (1,1,5,1,1)
  (same comment as for BOD5, Biological Oxygen Demand)
- Vanadium [air, urban air close to ground]: 1.28e-7 kg; lognormal variance with pedigree 0.7, pedigree (1,1,5,1,1)
  (same comment as for Calcium)
- Cadmium, ion [water, ground-, long-term]: 3.26e-8 kg; lognormal variance with pedigree 7.2, pedigree (1,1,5,1,1)
  (same comment as for BOD5, Biological Oxygen Demand)
- Sodium, ion [water, ground-, long-term]: 0.00112 kg; lognormal variance with pedigree 0.43, pedigree (1,1,5,1,1)
  (same comment as for BOD5, Biological Oxygen Demand)
- Copper, ion [water, ground-, long-term]: 9.56e-6 kg; lognormal variance with pedigree 1.25, pedigree (1,1,5,1,1)
  (same comment as for BOD5, Biological Oxygen Demand)
- Zinc, ion [water, ground-, long-term]: 1.06e-6 kg; lognormal variance with pedigree 5.63, pedigree (1,1,5,1,1)
  (same comment as for BOD5, Biological Oxygen Demand)
- Sulfur dioxide [air, urban air close to ground]: 6.3e-7 kg; lognormal variance with pedigree 0.97, pedigree (1,1,5,1,1)
  (same comment as for Calcium)
- Thallium [air, urban air close to ground]: 3.94e-10 kg; lognormal variance with pedigree 1.75, pedigree (1,1,5,1,1)
  (same comment as for Calcium)
- Cobalt [water, surface water]: 5.31e-9 kg; lognormal variance with pedigree 1.6, pedigree (1,1,5,1,1)
  (same comment as for Mercury)
- Aluminium [water, surface water]: 1.64e-8 kg; lognormal variance with pedigree 1.21, pedigree (1,1,5,1,1)
  (same comment as for Mercury)
- Zinc, ion [water, surface water]: 1.26e-8 kg; lognormal variance with pedigree 0.93, pedigree (1,1,5,1,1)
  (same comment as for Mercury)
- Hydrogen fluoride [air, urban air close to ground]: 6.23e-9 kg; lognormal variance with pedigree 1.31, pedigree (1,1,5,1,1)
  (same comment as for Calcium)
- Tin, ion [water, ground-, long-term]: 4.96e-7 kg; lognormal variance with pedigree 1.94, pedigree (1,1,5,1,1)
  (same comment as for BOD5, Biological Oxygen Demand)
- Aluminium [air, urban air close to ground]: 3.08e-7 kg; lognormal variance with pedigree 0.93, pedigree (1,1,5,1,1)
  (same comment as for Calcium)
- Thallium [water, surface water]: 2.42e-10 kg; lognormal variance with pedigree 1.9, pedigree (1,1,5,1,1)
  (same comment as for Mercury)
- Calcium, ion [water, ground-, long-term]: 0.000257 kg; lognormal variance with pedigree 0.83, pedigree (1,1,5,1,1)
  (same comment as for BOD5, Biological Oxygen Demand)
- Barium [water, ground-, long-term]: 4.38e-5 kg; lognormal variance with pedigree 1.14, pedigree (1,1,5,1,1)
  (same comment as for BOD5, Biological Oxygen Demand)
- Nickel, ion [water, ground-, long-term]: 3.69e-6 kg; lognormal variance with pedigree 1.38, pedigree (1,1,5,1,1)
  (same comment as for BOD5, Biological Oxygen Demand)
- Cobalt [air, urban air close to ground]: 9.86e-13 kg; lognormal variance with pedigree 1.26, pedigree (1,1,5,1,1)
  (same comment as for Calcium)
- Carbon dioxide, fossil [air, urban air close to ground]: 2.01 kg; lognormal variance with pedigree 0.05, pedigree (1,1,5,1,1)
  (same comment as for Calcium)
- Chloride [water, ground-, long-term]: 1.86e-5 kg; lognormal variance with pedigree 0.36, pedigree (1,1,5,1,1)
  (same comment as for BOD5, Biological Oxygen Demand)
- Tin, ion [water, surface water]: 3.66e-11 kg; lognormal variance with pedigree 1.63, pedigree (1,1,5,1,1)
  (same comment as for Mercury)
- Strontium [air, urban air close to ground]: 8.72e-9 kg; lognormal variance with pedigree 1.06, pedigree (1,1,5,1,1)
  (same comment as for Calcium)
- DOC, Dissolved Organic Carbon [water, surface water]: 1.52e-5 kg; lognormal variance with pedigree 0.28, pedigree (1,1,5,1,1)
  (same comment as for Mercury)
- Beryllium [water, ground-, long-term]: 3.97e-7 kg; lognormal variance with pedigree 1.48, pedigree (1,1,5,1,1)
  (same comment as for BOD5, Biological Oxygen Demand)
- Vanadium, ion [water, ground-, long-term]: 0.00022 kg; lognormal variance with pedigree 1.42, pedigree (1,1,5,1,1)
  (same comment as for BOD5, Biological Oxygen Demand)
- Fluoride [water, ground-, long-term]: 1.06e-5 kg; lognormal variance with pedigree 0.89, pedigree (1,1,5,1,1)
  (same comment as for BOD5, Biological Oxygen Demand)
- Beryllium [water, surface water]: 3.06e-10 kg; lognormal variance with pedigree 1.94, pedigree (1,1,5,1,1)
  (same comment as for Mercury)
- Selenium [water, ground-, long-term]: 1.39e-6 kg; lognormal variance with pedigree 1.03, pedigree (1,1,5,1,1)
  (same comment as for BOD5, Biological Oxygen Demand)
- Beryllium [air, urban air close to ground]: 4.93e-10 kg; lognormal variance with pedigree 1.72, pedigree (1,1,5,1,1)
  (same comment as for Calcium)
- Sodium, ion [water, surface water]: 0.000312 kg; lognormal variance with pedigree 0.35, pedigree (1,1,5,1,1)
  (same comment as for Mercury)
- Chromium [air, urban air close to ground]: 4.01e-13 kg; lognormal variance with pedigree 1.49, pedigree (1,1,5,1,1)
  (same comment as for Calcium)
- Titanium, ion [water, surface water]: 4.75e-9 kg; lognormal variance with pedigree 2.06, pedigree (1,1,5,1,1)
  (same comment as for Mercury)
- Thallium [water, ground-, long-term]: 2.3e-7 kg; lognormal variance with pedigree 1.31, pedigree (1,1,5,1,1)
  (same comment as for BOD5, Biological Oxygen Demand)
- Bromine [water, surface water]: 5.69e-5 kg; lognormal variance with pedigree 0.88, pedigree (1,1,5,1,1)
  (same comment as for Mercury)
- Nickel, ion [water, surface water]: 2.47e-9 kg; lognormal variance with pedigree 2, pedigree (1,1,5,1,1)
  (same comment as for Mercury)
- Bromine [water, ground-, long-term]: 1.21e-5 kg; lognormal variance with pedigree 1.05, pedigree (1,1,5,1,1)
  (same comment as for BOD5, Biological Oxygen Demand)
- Sodium [air, urban air close to ground]: 1.36e-5 kg; lognormal variance with pedigree 0.66, pedigree (1,1,5,1,1)
  (same comment as for Calcium)
- Lead [water, surface water]: 1.54e-10 kg; lognormal variance with pedigree 1.35, pedigree (1,1,5,1,1)
  (same comment as for Mercury)
- Iron, ion [water, ground-, long-term]: 4.62e-5 kg; lognormal variance with pedigree 1.74, pedigree (1,1,5,1,1)
  (same comment as for BOD5, Biological Oxygen Demand)
- Iron, ion [water, surface water]: 3.37e-8 kg; lognormal variance with pedigree 0.98, pedigree (1,1,5,1,1)
  (same comment as for Mercury)
- Selenium [air, urban air close to ground]: 1.04e-14 kg; lognormal variance with pedigree 1.63, pedigree (1,1,5,1,1)
  (same comment as for Calcium)
- Sulfate [water, ground-, long-term]: 0.000371 kg; lognormal variance with pedigree 0.59, pedigree (1,1,5,1,1)
  (same comment as for BOD5, Biological Oxygen Demand)
- Copper [air, urban air close to ground]: 8.73e-11 kg; lognormal variance with pedigree 1.34, pedigree (1,1,5,1,1)
  (same comment as for Calcium)
- COD, Chemical Oxygen Demand [water, surface water]: 3.7e-5 kg; lognormal variance with pedigree 0.29, pedigree (1,1,5,1,1)
  (same comment as for Mercury)
- Arsenic, ion [water, ground-, long-term]: 1.03e-6 kg; lognormal variance with pedigree 1.53, pedigree (1,1,5,1,1)
  (same comment as for BOD5, Biological Oxygen Demand)
- Bromine [air, urban air close to ground]: 2.07e-7 kg; lognormal variance with pedigree 1.06, pedigree (1,1,5,1,1)
  (same comment as for Calcium)
- COD, Chemical Oxygen Demand [water, ground-, long-term]: 0.0137 kg; lognormal variance with pedigree 0.06, pedigree (1,1,5,1,1)
  (same comment as for BOD5, Biological Oxygen Demand)
- TOC, Total Organic Carbon [water, surface water]: 1.52e-5 kg; lognormal variance with pedigree 0.28, pedigree (1,1,5,1,1)
  (same comment as for Mercury)
- Nitrogen oxides [air, urban air close to ground]: 0.000205 kg; lognormal variance with pedigree 1.49, pedigree (1,1,5,1,1)
  (same comment as for Ammonia)
- Carbon monoxide, fossil [air, urban air close to ground]: 0.000223 kg; lognormal variance with pedigree 0.690625, pedigree (1,3,5,2,1)
  Literature data from switzerland and germany adapted to plant age distribution in switzerland
  Uncertainty: & basic uncertainty of 5; literature data from switzerland and germany adapted to plant age distribution in switzerland
- Barium [air, urban air close to ground]: 4.93e-8 kg; lognormal variance with pedigree 1.11, pedigree (1,1,5,1,1)
  (same comment as for Calcium)
- Titanium, ion [water, ground-, long-term]: 0.000295 kg; lognormal variance with pedigree 1.06, pedigree (1,1,5,1,1)
  (same comment as for BOD5, Biological Oxygen Demand)
- Hydrogen chloride [air, urban air close to ground]: 8.76e-9 kg; lognormal variance with pedigree 0.78, pedigree (1,1,5,1,1)
  (same comment as for Calcium)
- Manganese [water, surface water]: 9.93e-10 kg; lognormal variance with pedigree 1.99, pedigree (1,1,5,1,1)
  (same comment as for Mercury)
- Mercury [water, ground-, long-term]: 4.62e-9 kg; lognormal variance with pedigree 3.69, pedigree (1,1,5,1,1)
  (same comment as for BOD5, Biological Oxygen Demand)
- Dinitrogen monoxide [air, urban air close to ground]: 2.73e-5 kg; lognormal variance with pedigree 1.49, pedigree (1,1,5,1,1)
  (same comment as for Ammonia)
- Lead [air, urban air close to ground]: 2.05e-10 kg; lognormal variance with pedigree 1.43, pedigree (1,1,5,1,1)
  (same comment as for Calcium)
- Arsenic [air, urban air close to ground]: 1.91e-14 kg; lognormal variance with pedigree 1.64, pedigree (1,1,5,1,1)
  (same comment as for Calcium)
- BOD5, Biological Oxygen Demand [water, surface water]: 2.07e-5 kg; lognormal variance with pedigree 0.16, pedigree (1,1,5,1,1)
  (same comment as for Mercury)
- Strontium [water, ground-, long-term]: 8.71e-5 kg; lognormal variance with pedigree 1.02, pedigree (1,1,5,1,1)
  (same comment as for BOD5, Biological Oxygen Demand)
- TOC, Total Organic Carbon [water, ground-, long-term]: 0.00541 kg; lognormal variance with pedigree 0.06, pedigree (1,1,5,1,1)
  (same comment as for BOD5, Biological Oxygen Demand)
- Chromium VI [water, ground-, long-term]: 5.74e-7 kg; lognormal variance with pedigree 1.59, pedigree (1,1,5,1,1)
  (same comment as for BOD5, Biological Oxygen Demand)
- Cyanide [air, urban air close to ground]: 5.81e-6 kg; lognormal variance with pedigree 1.49, pedigree (1,1,5,1,1)
  (same comment as for Ammonia)
- Iron [air, urban air close to ground]: 3.29e-9 kg; lognormal variance with pedigree 1.05, pedigree (1,1,5,1,1)
  (same comment as for Calcium)
- Titanium [air, urban air close to ground]: 9.86e-7 kg; lognormal variance with pedigree 0.72, pedigree (1,1,5,1,1)
  (same comment as for Calcium)
- Lead [water, ground-, long-term]: 3.93e-7 kg; lognormal variance with pedigree 7.42, pedigree (1,1,5,1,1)
  (same comment as for BOD5, Biological Oxygen Demand)

## Sampling procedure
waste-specific calculation based on literature data

## Extrapolations
This dataset has been extrapolated from year 2000 to the year of the calculation (2019). The uncertainty has been adjusted accordingly.

## Review by Niels Jungbluth 2003-07-15
Passed. Calculation for standard deviation 95 of, i.e., infrastructure,
land occupation, transport services or other services can differ from
standard Pedigree approach used in this project and figures obtained by
this procedure.
