# treatment of residue from mechanical treatment, cathode ray tube display, municipal waste incineration

Dataset: EcoSpold 2, unit process
Geography: CH
Time period: 1994-01-01 to 2019-12-31
Technology level: outdated
Classification: EcoSpold01Categories: waste management/municipal incineration
Classification: ISIC rev.4 ecoinvent: 3821:Treatment and disposal of non-hazardous waste
Tags: Treatment; ConvertedDataset
Scenario: Business-as-Usual
System model: Allocation at the point of substitution
Generated by: Roland Hischier
Published in: Hischier R. 2007
Database: ecoinvent
isCopyrightProtected: true
accessRestrictedTo: 1

## General comment
Inventoried waste contains 1.84% rubber; 45.1% Plastics from electronic consumer goods; 45.1% Plastics from electronic industrial goods; 2.32% MSWI iron scrap; 2.2% Alu in MSW; 1.39% Glass; 1.87% wiring copper; 0.07% Pb in ASR inert; 0.01% silver; .
waste composition (wet, in ppm): upper heating value 33.29 MJ/kg; lower heating value 31.9 MJ/kg; H2O 8559.4; O 56031; H 68786; C 751200; S 401.86; N 12010; P 470.05; B n.a.; Cl 6228.7; Br 4966.3; F 225.74; I n.a.; Ag 100; As 6.7723; Ba 159.83; Cd 136.18; Co 26.617; Cr 79.466; Cu 21899; Hg 0.76754; Mn 61.911; Mo 2.7089; Ni 476.75; Pb 843.04; Sb 4334.8; Se 1.7694; Sn 198.85; V 6.4772; Zn 697.99; Be 0.42129; Sc n.a.; Sr 74.569; Ti 4042.6; Tl 0.33704; W n.a.; Si 8386.7; Fe 20341; Ca 3822.2; Al 24293; K 105.65; Mg n.a.; Na 1022.1;
Share of carbon in waste that is biogenic 0%.
Share of iron in waste that is metallic/recyclable 93%.
Net energy produced in MSWI: 3.63MJ/kg waste electric energy and 7.32MJ/kg waste thermal energy
Allocation of energy production: no substitution or expansion. Total burden allocated to waste disposal function of MSWI.
One kg of this waste produces 0.1177 kg of slag and 0.01679 kg of residues, which are landfilled. Additional solidification with 0.006715 kg of cement.
[This dataset was already contained in the ecoinvent database version 2. It was not individually updated during the transfer to ecoinvent version 3. Life Cycle Impact Assessment results may still have changed, as they are affected by changes in the supply chain, i.e. in other datasets. This dataset was generated following the ecoinvent quality guidelines for version 2. It may have been subject to central changes described in the ecoinvent version 3 change report (http://www.ecoinvent.org/database/ecoinvent-version-3/reports-of-changes/), and the results of the central updates were reviewed extensively. The changes added e.g. consistent water flows and other information throughout the database. The documentation of this dataset can be found in the ecoinvent reports of version 2, which are still available via the ecoinvent website. The change report linked above covers all central changes that were made during the conversion process.]

## Included activities end
waste-specific air and water emisions from incineration, auxiliary material consumption for flue gas cleaning. Short-term emissions to river water and long-term emisisons to ground water from slag compartment (from bottom slag) and residual material landfill (from solidified fly ashes and scrubber slugde). Process energy demands for MSWI.

## Geography
Specific to the technology mix encountered in Switzerland in 2000. Well applicable to modern incineration practices in Europe, North America or Japan.

## Technology
replaced by newer incineration technology with fly ash extraction. Average Swiss MSWI plants in 2000 (grate incinerators) with electrostatic precipitator for fly ash (ESP), wet flue gas scrubber and 29.4% SNCR , 32.2% SCR-high dust , 24.6% SCR-low dust -DeNOx facilities and 13.8% without Denox (by burnt waste, according to Swiss average). Share of waste incinerated in plants with magnetic scrap separation from slag : 50%. Gross electric efficiency technology mix 12.997% and Gross thermal efficiency technology mix 25.57%

## Time period
Waste composition as given in literature reference, theoretical data or other source. Transfer coefficients for modern Swiss MSWI. Emission speciation based on early 90ies data.

## Reference product
- residue from mechanical treatment, cathode ray tube display: -1 kg; CPC 39990: Other wastes n.e.c.; By-product classification Waste
  EcoSpold01Location=CH
  production volume 0 kg
    outdated. Replaced by newer incineration technology with fly ash extraction.
  property price 0 EUR2005
    Waste products are assigned a price of zero as they are assumed to require further treatment.
  property carbon content, fossil 0.764801
    Tab 4.24, ecoinvent v2.2 report 18_V, for details in fraction composition. Carbon content in plastic was calculated using data in Tab A.2, ecoinvent v2.2 report 13_I. Others was also considered plastic, and calculated the same way (from pg 70, ecoinvent v2.2 report 18_V). Ferro was assumed to have a C content of 0.012 kg C/ kg (C content of steel, calculated out of emission factors published in Commission Decision of 18 July 2007 establishing guidelines for the monitoring and reporting of greenhouse gas emissions pursuant to Directive 2003/87/EC of the European Parliament and of the Council (notified under document number C(2007) 3416)). The other component of the fraction were considered to content no C.
  property carbon content 0.764801
    carbon content on a dry matter basis (reserved; not for manual entry)
  properties: dry mass 1 kg, water in wet mass 0 kg, wet mass 1 kg, carbon content, non-fossil 0, water content 0, carbon allocation 0.764801 kg

## Inputs from technosphere
- residual material landfill: 3.4974e-11 unit; lognormal variance with pedigree 0.12, pedigree (1,1,5,1,1)
  uncertainty is calculated from uncertainties in waste composition and transfer coefficients in incinerator
  EcoSpold01Location=CH
- quicklime, milled, packed: 0.0010646 kg; lognormal variance with pedigree 0.46, pedigree (1,1,5,1,1)
  uncertainty calculated from uncertainty in average auxiliary material input, and the unertainty of the waste composition of this waste
  EcoSpold01Location=CH
  properties: wet mass 1 kg, water content 0.010101, dry mass 0.99 kg
- slag landfill: 2.0919e-10 unit; lognormal variance with pedigree 0.09, pedigree (1,1,5,1,1)
  EcoSpold01Location=CH
  uncertainty is calculated from uncertainties in waste composition and transfer coefficients in incinerator
- process-specific burdens, residual material landfill: 0.016787 kg; lognormal variance with pedigree 0.12, pedigree (1,1,5,1,1)
  EcoSpold01Location=CH
  uncertainty is calculated from uncertainties in waste composition and transfer coefficients in incinerator;activityLink introduced to establish a direct link to the corresponding regional supply of this product
- sodium hydroxide, without water, in 50% solution state: 0.0061486 kg; lognormal variance with pedigree 0.45, pedigree (1,1,5,1,1)
  EcoSpold01Location=RER
  uncertainty calculated from uncertainty in average auxiliary material input, and the unertainty of the waste composition of this waste
  properties: dry mass 1 kg, wet mass 1 kg
- heat, district or industrial, natural gas: 0.0531783 MJ; lognormal variance with pedigree 1.3, pedigree (1,1,5,1,1)
  uncertainty calculated from uncertainty in average DeNOx input, uncertainty in the share of thermal NOx, uncertainty of nitrogen content in average municipal waste and the unertainty in nitrogen content in *this* waste.
  EcoSpold01Location=RER
- process-specific burdens, municipal waste incineration: 1 kg; lognormal variance with pedigree 0.04, pedigree (1,1,5,1,1)
  demands per kilogram waste. uncertainty is heeded in the module;activityLink introduced to establish a direct link to the corresponding regional supply of this product
  EcoSpold01Location=CH
- chemical, organic: 0.0005428 kg; lognormal variance with pedigree 0.97, pedigree (1,1,5,1,1)
  Proxy for TMT15. uncertainty calculated from uncertainty in average auxiliary material input, and the unertainty of the waste composition of this waste
  EcoSpold01Location=GLO
  properties: dry mass 1 kg, wet mass 1 kg, carbon content, fossil 0.628
  note on carbon content, fossil: This dataset is an unweighted average of 20 organic substances (listed in Tab 88.1, ecoinvent v2.2 report 8, part II), being part of the top100 chemicals included in this database. The C-content has also been calculated as an unweighted average of the C content of the substances composing this dataset.
- chromium oxide, flakes: 3.5394e-7 kg; lognormal variance with pedigree 2.01, pedigree (1,1,5,1,1)
  Proxy for vanadium pentoxide V2O5 in SCR catalyst, uncertainty calculated from uncertainty in average DeNOx input, uncertainty in the share of thermal NOx, uncertainty of nitrogen content in average municipal waste and the unertainty in nitrogen content in *this* waste.
  EcoSpold01Location=RER
  properties: dry mass 1 kg, wet mass 1 kg
- waste cement, hydrated: -0.016787 kg; lognormal variance with pedigree 0.12, pedigree (1,1,5,1,1)
  Hydrated cement for solidification of landfilled residual material. Uncertainty calculated from unertainty of the waste composition of this waste and transfer coefficients in the incinerator and of the solidification recipe.
  EcoSpold01Location=CH
  production volume 0 kg; = Ref('78bb2768-2a0a-4957-99b0-9fed8dfc2998', 'ProductionVolume')* (Ref('2966c84f-d6d7-458a-ae8b-5c5ea3e2670e')*-1)
    Calculated from the production volume of residue from mechanical treatment, cathode ray tube display in proportion to the respective output amounts.
  properties: dry mass 1 kg, wet mass 1 kg
- titanium dioxide: 1.7343e-5 kg; lognormal variance with pedigree 2.01, pedigree (1,1,5,1,1)
  (same comment as for heat, district or industrial, natural gas)
  properties: wet mass 1 kg, dry mass 1 kg
- municipal waste incineration facility: 2.5e-10 unit; lognormal variance with pedigree 0.04, pedigree (1,1,5,1,1)
  EcoSpold01Location=CH
  demands per kilogram waste. uncertainty is heeded in the module
- iron (III) chloride, without water, in 40% solution state: 0.00052087 kg; lognormal variance with pedigree 0.32, pedigree (1,1,5,1,1)
  (same comment as for quicklime, milled, packed)
  properties: wet mass 1 kg, dry mass 1 kg
- cement, unspecified: 0.0067149 kg; lognormal variance with pedigree 0.12, pedigree (1,1,5,1,1)
  Cement for solidification of landfilled residual material. Uncertainty calculated from unertainty of the waste composition of this waste, of transfer coefficients in the incinerator and of the solidification recipe.
  EcoSpold01Location=CH
  properties: dry mass 1 kg, wet mass 1 kg
- chemical, inorganic: 2.1111e-5 kg; lognormal variance with pedigree 0.37, pedigree (1,1,5,1,1)
  EcoSpold01Location=GLO
  Proxy for Polyelectrolyte. uncertainty calculated from uncertainty in average auxiliary material input, and the unertainty of the waste composition of this waste
  properties: carbon content, fossil 0.003, dry mass 1 kg, wet mass 1 kg
  note on carbon content, fossil: This dataset is an unweighted average of 20 inorganic substances (listed in Tab 88.1, ecoinvent v2.2 report 8, part II), being part of the top100 chemicals included in this database. The C-content has also been calculated as an unweighted average of the C content of the substances composing this dataset.
- hydrochloric acid, without water, in 30% solution state: 1.2667e-5 kg; lognormal variance with pedigree 0.37, pedigree (1,1,5,1,1)
  uncertainty calculated from uncertainty in average auxiliary material input, and the unertainty of the waste composition of this waste
  EcoSpold01Location=RER
  properties: wet mass 1 kg, dry mass 1 kg
- process-specific burdens, slag landfill: 0.11767 kg; lognormal variance with pedigree 0.09, pedigree (1,1,5,1,1)
  uncertainty is calculated from uncertainties in waste composition and transfer coefficients in incinerator;activityLink introduced to establish a direct link to the corresponding regional supply of this product
  EcoSpold01Location=CH
- ammonia, liquid: 0.00060588 kg; lognormal variance with pedigree 1.3, pedigree (1,1,5,1,1)
  EcoSpold01Location=CH
  uncertainty calculated from uncertainty in average DeNOx input, uncertainty in the share of thermal NOx, uncertainty of nitrogen content in average municipal waste and the unertainty in nitrogen content in *this* waste.
  properties: dry mass 1 kg, wet mass 1 kg

## Emissions to nature
- Cadmium [air, urban air close to ground]: 7.4917e-9 kg; lognormal variance with pedigree 1, pedigree (1,1,5,1,1)
  uncertainty is calculated from uncertainties in waste composition and transfer coefficients in incinerator
- Iron, ion [water, surface water]: 5.6731e-7 kg; lognormal variance with pedigree 0.42, pedigree (1,1,5,1,1)
  uncertainty is calculated from uncertainties in waste composition and transfer coefficients in incinerator and landfills
- Mercury [water, surface water]: 8.208e-9 kg; lognormal variance with pedigree 1.61, pedigree (1,1,5,1,1)
  (same comment as for Iron, ion)
- Fluoride [water, surface water]: 1.7353e-5 kg; lognormal variance with pedigree 0.62, pedigree (1,1,5,1,1)
  (same comment as for Iron, ion)
- Selenium [water, ground-, long-term]: 1.1897e-6 kg; lognormal variance with pedigree 1.05, pedigree (1,1,5,1,1)
  Long-term emissions from landfilling of incineration residues. uncertainty is calculated from uncertainties in waste composition and transfer coefficients in incinerator and landfills.
- Bromine [water, surface water]: 0.0040929 kg; lognormal variance with pedigree 0.4, pedigree (1,1,5,1,1)
  (same comment as for Iron, ion)
- Strontium [water, ground-, long-term]: 7.4472e-5 kg; lognormal variance with pedigree 1.04, pedigree (1,1,5,1,1)
  (same comment as for Selenium)
- Aluminium [air, urban air close to ground]: 3.3805e-6 kg; lognormal variance with pedigree 0.33, pedigree (1,1,5,1,1)
  (same comment as for Cadmium)
- Potassium [air, urban air close to ground]: 3.1852e-7 kg; lognormal variance with pedigree 1.01, pedigree (1,1,5,1,1)
  (same comment as for Cadmium)
- Zinc [air, urban air close to ground]: 1.1315e-8 kg; lognormal variance with pedigree 0.79, pedigree (1,1,5,1,1)
  (same comment as for Cadmium)
- Antimony [water, ground-, long-term]: 0.002768 kg; lognormal variance with pedigree 0.4, pedigree (1,1,5,1,1)
  (same comment as for Selenium)
- Zinc, ion [water, surface water]: 1.275e-7 kg; lognormal variance with pedigree 0.67, pedigree (1,1,5,1,1)
  (same comment as for Iron, ion)
- Thallium [water, surface water]: 2.0647e-10 kg; lognormal variance with pedigree 1.92, pedigree (1,1,5,1,1)
  (same comment as for Iron, ion)
- Carbon dioxide, fossil [air, urban air close to ground]: 2.7237 kg; lognormal variance with pedigree 0.04, pedigree (1,1,5,1,1)
  (same comment as for Cadmium)
- Cobalt [water, surface water]: 4.5534e-9 kg; lognormal variance with pedigree 1.63, pedigree (1,1,5,1,1)
  (same comment as for Iron, ion)
- Manganese [water, ground-, long-term]: 6.1042e-5 kg; lognormal variance with pedigree 1.06, pedigree (1,1,5,1,1)
  (same comment as for Selenium)
- Phosphate [water, surface water]: 8.9527e-8 kg; lognormal variance with pedigree 1.11, pedigree (1,1,5,1,1)
  (same comment as for Iron, ion)
- Antimony [air, urban air close to ground]: 1.6843e-11 kg; lognormal variance with pedigree 0.63, pedigree (1,1,5,1,1)
  (same comment as for Cadmium)
- Titanium, ion [water, surface water]: 1.9484e-8 kg; lognormal variance with pedigree 1.87, pedigree (1,1,5,1,1)
  (same comment as for Iron, ion)
- Lead [water, surface water]: 1.6667e-8 kg; lognormal variance with pedigree 1.62, pedigree (1,1,5,1,1)
  (same comment as for Iron, ion)
- Phosphorus [air, urban air close to ground]: 4.5149e-7 kg; lognormal variance with pedigree 0.81, pedigree (1,1,5,1,1)
  (same comment as for Cadmium)
- Nitrate [water, surface water]: 0.00015362 kg; lognormal variance with pedigree 0.29, pedigree (1,1,5,1,1)
  (same comment as for Iron, ion)
- Zinc, ion [water, ground-, long-term]: 1.6117e-5 kg; lognormal variance with pedigree 5.26, pedigree (1,1,5,1,1)
  (same comment as for Selenium)
- Sodium [air, urban air close to ground]: 1.1852e-6 kg; lognormal variance with pedigree 0.71, pedigree (1,1,5,1,1)
  (same comment as for Cadmium)
- Beryllium [water, surface water]: 2.618e-10 kg; lognormal variance with pedigree 1.96, pedigree (1,1,5,1,1)
  (same comment as for Iron, ion)
- Arsenic, ion [water, ground-, long-term]: 3.7192e-6 kg; lognormal variance with pedigree 1.36, pedigree (1,1,5,1,1)
  (same comment as for Selenium)
- Phosphate [water, ground-, long-term]: 5.3627e-5 kg; lognormal variance with pedigree 5.03, pedigree (1,1,5,1,1)
  (same comment as for Selenium)
- Hydrogen chloride [air, urban air close to ground]: 6.7755e-8 kg; lognormal variance with pedigree 0.52, pedigree (1,1,5,1,1)
  (same comment as for Cadmium)
- Arsenic, ion [water, surface water]: 3.0531e-6 kg; lognormal variance with pedigree 1.13, pedigree (1,1,5,1,1)
  (same comment as for Iron, ion)
- Molybdenum [water, ground-, long-term]: 2.2408e-6 kg; lognormal variance with pedigree 1.48, pedigree (1,1,5,1,1)
  (same comment as for Selenium)
- Mercury [air, urban air close to ground]: 2.6509e-14 kg; lognormal variance with pedigree 1.75, pedigree (1,1,5,1,1)
  (same comment as for Cadmium)
- Antimony [water, surface water]: 0.0015029 kg; lognormal variance with pedigree 0.43, pedigree (1,1,5,1,1)
  (same comment as for Iron, ion)
- Beryllium [water, ground-, long-term]: 3.393e-7 kg; lognormal variance with pedigree 1.5, pedigree (1,1,5,1,1)
  (same comment as for Selenium)
- Titanium [air, urban air close to ground]: 4.0426e-6 kg; lognormal variance with pedigree 0.54, pedigree (1,1,5,1,1)
  (same comment as for Cadmium)
- Bromine [water, ground-, long-term]: 0.00086844 kg; lognormal variance with pedigree 0.5, pedigree (1,1,5,1,1)
  (same comment as for Selenium)
- Tin, ion [water, ground-, long-term]: 0.0001076 kg; lognormal variance with pedigree 1.2, pedigree (1,1,5,1,1)
  (same comment as for Selenium)
- Silicon [water, ground-, long-term]: 0.00028133 kg; lognormal variance with pedigree 5.79, pedigree (1,1,5,1,1)
  (same comment as for Selenium)
- Strontium [air, urban air close to ground]: 7.4569e-9 kg; lognormal variance with pedigree 1.08, pedigree (1,1,5,1,1)
  (same comment as for Cadmium)
- Copper, ion [water, ground-, long-term]: 0.021346 kg; lognormal variance with pedigree 0.31, pedigree (1,1,5,1,1)
  (same comment as for Selenium)
- BOD5, Biological Oxygen Demand [water, surface water]: 2.8112e-5 kg; lognormal variance with pedigree 0.16, pedigree (1,1,5,1,1)
  (same comment as for Iron, ion)
- Nitrate [water, ground-, long-term]: 0.00043142 kg; lognormal variance with pedigree 0.4, pedigree (1,1,5,1,1)
  (same comment as for Selenium)
- Copper [air, urban air close to ground]: 2.1291e-8 kg; lognormal variance with pedigree 0.39, pedigree (1,1,5,1,1)
  (same comment as for Cadmium)
- Cadmium, ion [water, ground-, long-term]: 1.5006e-6 kg; lognormal variance with pedigree 6.8, pedigree (1,1,5,1,1)
  (same comment as for Selenium)
- Strontium [water, surface water]: 4.6951e-8 kg; lognormal variance with pedigree 1.75, pedigree (1,1,5,1,1)
  (same comment as for Iron, ion)
- Chromium, ion [water, surface water]: 1.5109e-7 kg; lognormal variance with pedigree 1.05, pedigree (1,1,5,1,1)
  (same comment as for Iron, ion)
- Beryllium [air, urban air close to ground]: 4.2129e-10 kg; lognormal variance with pedigree 1.74, pedigree (1,1,5,1,1)
  (same comment as for Cadmium)
- Ammonia [air, urban air close to ground]: 9.5159e-6 kg; lognormal variance with pedigree 1.41, pedigree (1,1,5,1,1)
  uncertainty calculated from uncertainty in average N-emissions, uncertainty in the share of thermal NOx, uncertainty of nitrogen content in average municipal waste and the unertainty in nitrogen content in *this* waste.
- Manganese [water, surface water]: 3.1984e-9 kg; lognormal variance with pedigree 2.08, pedigree (1,1,5,1,1)
  (same comment as for Iron, ion)
- Manganese [air, urban air close to ground]: 3.3925e-14 kg; lognormal variance with pedigree 1.21, pedigree (1,1,5,1,1)
  (same comment as for Cadmium)
- Aluminium [water, surface water]: 4.7082e-7 kg; lognormal variance with pedigree 1.12, pedigree (1,1,5,1,1)
  (same comment as for Iron, ion)
- Arsenic [air, urban air close to ground]: 6.9077e-14 kg; lognormal variance with pedigree 1.47, pedigree (1,1,5,1,1)
  (same comment as for Cadmium)
- Molybdenum [air, urban air close to ground]: 5.4178e-9 kg; lognormal variance with pedigree 1.49, pedigree (1,1,5,1,1)
  (same comment as for Cadmium)
- Barium [air, urban air close to ground]: 1.5983e-7 kg; lognormal variance with pedigree 0.96, pedigree (1,1,5,1,1)
  (same comment as for Cadmium)
- Tin [air, urban air close to ground]: 2.4315e-7 kg; lognormal variance with pedigree 0.93, pedigree (1,1,5,1,1)
  (same comment as for Cadmium)
- Tin, ion [water, surface water]: 7.0495e-9 kg; lognormal variance with pedigree 1.09, pedigree (1,1,5,1,1)
  (same comment as for Iron, ion)
- Calcium, ion [water, ground-, long-term]: 0.0034531 kg; lognormal variance with pedigree 0.51, pedigree (1,1,5,1,1)
  (same comment as for Selenium)
- Silicon [air, urban air close to ground]: 6.2329e-6 kg; lognormal variance with pedigree 0.45, pedigree (1,1,5,1,1)
  (same comment as for Cadmium)
- Sulfur dioxide [air, urban air close to ground]: 1.6369e-6 kg; lognormal variance with pedigree 0.83, pedigree (1,1,5,1,1)
  (same comment as for Cadmium)
- Thallium [air, urban air close to ground]: 3.3704e-10 kg; lognormal variance with pedigree 1.77, pedigree (1,1,5,1,1)
  (same comment as for Cadmium)
- Sodium, ion [water, ground-, long-term]: 0.00088434 kg; lognormal variance with pedigree 0.67, pedigree (1,1,5,1,1)
  (same comment as for Selenium)
- Sulfate [water, surface water]: 0.00019138 kg; lognormal variance with pedigree 0.41, pedigree (1,1,5,1,1)
  (same comment as for Iron, ion)
- Calcium, ion [water, surface water]: 1.5039e-5 kg; lognormal variance with pedigree 0.99, pedigree (1,1,5,1,1)
  (same comment as for Iron, ion)
- Nickel [air, urban air close to ground]: 1.9524e-11 kg; lognormal variance with pedigree 0.89, pedigree (1,1,5,1,1)
  (same comment as for Cadmium)
- Vanadium, ion [water, surface water]: 3.0301e-9 kg; lognormal variance with pedigree 2.04, pedigree (1,1,5,1,1)
  (same comment as for Iron, ion)
- Cadmium, ion [water, surface water]: 6.1768e-8 kg; lognormal variance with pedigree 0.93, pedigree (1,1,5,1,1)
  (same comment as for Iron, ion)
- TOC, Total Organic Carbon [water, surface water]: 2.0593e-5 kg; lognormal variance with pedigree 0.27, pedigree (1,1,5,1,1)
  (same comment as for Iron, ion)
- Chromium VI [water, surface water]: 1.5455e-6 kg; lognormal variance with pedigree 0.99, pedigree (1,1,5,1,1)
  (same comment as for Iron, ion)
- Molybdenum [water, surface water]: 4.6267e-7 kg; lognormal variance with pedigree 0.98, pedigree (1,1,5,1,1)
  (same comment as for Iron, ion)
- Barium [water, surface water]: 2.1977e-8 kg; lognormal variance with pedigree 1.82, pedigree (1,1,5,1,1)
  (same comment as for Iron, ion)
- Sodium, ion [water, surface water]: 0.0001366 kg; lognormal variance with pedigree 0.68, pedigree (1,1,5,1,1)
  (same comment as for Iron, ion)
- Titanium, ion [water, ground-, long-term]: 0.0012113 kg; lognormal variance with pedigree 0.88, pedigree (1,1,5,1,1)
  (same comment as for Selenium)
- Selenium [water, surface water]: 5.7632e-7 kg; lognormal variance with pedigree 1.23, pedigree (1,1,5,1,1)
  (same comment as for Iron, ion)
- Cyanide [air, urban air close to ground]: 1.0809e-5 kg; lognormal variance with pedigree 1.41, pedigree (1,1,5,1,1)
  (same comment as for Ammonia)
- Silicon [water, surface water]: 7.7799e-7 kg; lognormal variance with pedigree 0.78, pedigree (1,1,5,1,1)
  (same comment as for Iron, ion)
- Vanadium, ion [water, ground-, long-term]: 6.8303e-7 kg; lognormal variance with pedigree 2.64, pedigree (1,1,5,1,1)
  (same comment as for Selenium)
- Calcium [air, urban air close to ground]: 4.6844e-6 kg; lognormal variance with pedigree 0.54, pedigree (1,1,5,1,1)
  (same comment as for Cadmium)
- Chloride [water, surface water]: 0.0060675 kg; lognormal variance with pedigree 0.41, pedigree (1,1,5,1,1)
  (same comment as for Iron, ion)
- Fluoride [water, ground-, long-term]: 0.00020137 kg; lognormal variance with pedigree 0.59, pedigree (1,1,5,1,1)
  (same comment as for Selenium)
- DOC, Dissolved Organic Carbon [water, ground-, long-term]: 0.0073354 kg; lognormal variance with pedigree 0.05, pedigree (1,1,5,1,1)
  (same comment as for Selenium)
- Barium [water, ground-, long-term]: 0.00014189 kg; lognormal variance with pedigree 0.99, pedigree (1,1,5,1,1)
  (same comment as for Selenium)
- Nickel, ion [water, ground-, long-term]: 0.0004479 kg; lognormal variance with pedigree 0.76, pedigree (1,1,5,1,1)
  (same comment as for Selenium)
- Dinitrogen monoxide [air, urban air close to ground]: 5.0714e-5 kg; lognormal variance with pedigree 1.41, pedigree (1,1,5,1,1)
  (same comment as for Ammonia)
- COD, Chemical Oxygen Demand [water, surface water]: 5.0208e-5 kg; lognormal variance with pedigree 0.28, pedigree (1,1,5,1,1)
  (same comment as for Iron, ion)
- Cobalt [air, urban air close to ground]: 8.451e-13 kg; lognormal variance with pedigree 1.28, pedigree (1,1,5,1,1)
  (same comment as for Cadmium)
- Mercury [water, ground-, long-term]: 3.9935e-8 kg; lognormal variance with pedigree 3.41, pedigree (1,1,5,1,1)
  (same comment as for Selenium)
- Iron [air, urban air close to ground]: 4.7569e-8 kg; lognormal variance with pedigree 0.39, pedigree (1,1,5,1,1)
  (same comment as for Cadmium)
- Cobalt [water, ground-, long-term]: 2.3304e-5 kg; lognormal variance with pedigree 1.13, pedigree (1,1,5,1,1)
  (same comment as for Selenium)
- Methane, fossil [air, urban air close to ground]: 6.3821e-6 kg; lognormal variance with pedigree 0.091225, pedigree (2,3,5,2,1)
  Confidential data from 5 plants in Switzerland and Germany
  Uncertainty: & basic uncertainty of 1.5; confidential data from 5 plants in Switzerland and Germany
- Thallium [water, ground-, long-term]: 1.9667e-7 kg; lognormal variance with pedigree 1.32, pedigree (1,1,5,1,1)
  (same comment as for Selenium)
- Chromium [air, urban air close to ground]: 3.5052e-12 kg; lognormal variance with pedigree 1.13, pedigree (1,1,5,1,1)
  (same comment as for Cadmium)
- Bromine [air, urban air close to ground]: 1.4899e-5 kg; lognormal variance with pedigree 0.51, pedigree (1,1,5,1,1)
  (same comment as for Cadmium)
- Lead [air, urban air close to ground]: 4.9414e-9 kg; lognormal variance with pedigree 0.78, pedigree (1,1,5,1,1)
  (same comment as for Cadmium)
- Vanadium [air, urban air close to ground]: 6.7723e-11 kg; lognormal variance with pedigree 1.41, pedigree (1,1,5,1,1)
  (same comment as for Cadmium)
- BOD5, Biological Oxygen Demand [water, ground-, long-term]: 0.0060636 kg; lognormal variance with pedigree 0.05, pedigree (1,1,5,1,1)
  (same comment as for Selenium)
- Nitrogen oxides [air, urban air close to ground]: 0.0003821 kg; lognormal variance with pedigree 1.41, pedigree (1,1,5,1,1)
  (same comment as for Ammonia)
- Silver, ion [water, surface water]: 3.4719e-9 kg; lognormal variance with pedigree 2.1, pedigree (1,1,5,1,1)
  (same comment as for Iron, ion)
- Copper, ion [water, surface water]: 7.773e-7 kg; lognormal variance with pedigree 1.34, pedigree (1,1,5,1,1)
  (same comment as for Iron, ion)
- Chloride [water, ground-, long-term]: 0.00016119 kg; lognormal variance with pedigree 0.24, pedigree (1,1,5,1,1)
  (same comment as for Selenium)
- COD, Chemical Oxygen Demand [water, ground-, long-term]: 0.018538 kg; lognormal variance with pedigree 0.05, pedigree (1,1,5,1,1)
  (same comment as for Selenium)
- Carbon monoxide, fossil [air, urban air close to ground]: 0.0002229 kg; lognormal variance with pedigree 0.690625, pedigree (1,3,5,2,1)
  Literature data from switzerland and germany adapted to plant age distribution in switzerland
  Uncertainty: & basic uncertainty of 5; literature data from switzerland and germany adapted to plant age distribution in switzerland
- Aluminium [water, ground-, long-term]: 0.019678 kg; lognormal variance with pedigree 0.31, pedigree (1,1,5,1,1)
  (same comment as for Selenium)
- Sulfate [water, ground-, long-term]: 0.0010117 kg; lognormal variance with pedigree 0.5, pedigree (1,1,5,1,1)
  (same comment as for Selenium)
- Lead [water, ground-, long-term]: 0.00071939 kg; lognormal variance with pedigree 1.21, pedigree (1,1,5,1,1)
  (same comment as for Selenium)
- Silver, ion [water, ground-, long-term]: 9.9997e-5 kg; lognormal variance with pedigree 1, pedigree (1,1,5,1,1)
  (same comment as for Selenium)
- DOC, Dissolved Organic Carbon [water, surface water]: 2.0593e-5 kg; lognormal variance with pedigree 0.27, pedigree (1,1,5,1,1)
  (same comment as for Iron, ion)
- Hydrogen fluoride [air, urban air close to ground]: 1.1881e-7 kg; lognormal variance with pedigree 0.92, pedigree (1,1,5,1,1)
  (same comment as for Cadmium)
- Chromium VI [water, ground-, long-term]: 5.2282e-6 kg; lognormal variance with pedigree 2.12, pedigree (1,1,5,1,1)
  (same comment as for Selenium)
- TOC, Total Organic Carbon [water, ground-, long-term]: 0.0073354 kg; lognormal variance with pedigree 0.05, pedigree (1,1,5,1,1)
  (same comment as for Selenium)
- Potassium, ion [water, ground-, long-term]: 8.7009e-5 kg; lognormal variance with pedigree 0.7, pedigree (1,1,5,1,1)
  (same comment as for Selenium)
- Nickel, ion [water, surface water]: 2.9908e-7 kg; lognormal variance with pedigree 1.39, pedigree (1,1,5,1,1)
  (same comment as for Iron, ion)
- Iron, ion [water, ground-, long-term]: 0.005622 kg; lognormal variance with pedigree 0.44, pedigree (1,1,5,1,1)
  (same comment as for Selenium)
- Potassium, ion [water, surface water]: 1.832e-5 kg; lognormal variance with pedigree 0.62, pedigree (1,1,5,1,1)
  (same comment as for Iron, ion)
- Selenium [air, urban air close to ground]: 8.8987e-15 kg; lognormal variance with pedigree 1.66, pedigree (1,1,5,1,1)
  (same comment as for Cadmium)

## Sampling procedure
waste-specific calculation based on literature data

## Extrapolations
This dataset has been extrapolated from year 2000 to the year of the calculation (2019). The uncertainty has been adjusted accordingly.

## Review by Jürgen Sutter 2007-08-31
passed.
