# treatment of used motor scooter

Dataset: EcoSpold 2, unit process
Geography: RoW
Time period: 2007-01-01 to 2019-12-31
Technology level: current
Classification: ISIC rev.4 ecoinvent: 3830:Materials recovery
Classification: EcoSpold01Categories: transport systems/road
Tags: ConvertedDataset; Treatment
Scenario: Business-as-Usual
System model: Allocation at the point of substitution
Generated by: Marianne Leuenberger
Published in: Spielmann M. 2007
Database: ecoinvent
isCopyrightProtected: true
accessRestrictedTo: 1

## General comment
The data set reflects the disposal of a scooter of 90kg. Aluminium and steel parts are fully recycled. Plastics are incinerated, batteries are treated.
[This dataset was already contained in the ecoinvent database version 2. It was not individually updated during the transfer to ecoinvent version 3. Life Cycle Impact Assessment results may still have changed, as they are affected by changes in the supply chain, i.e. in other datasets. This dataset was generated following the ecoinvent quality guidelines for version 2. It may have been subject to central changes described in the ecoinvent version 3 change report (http://www.ecoinvent.org/database/ecoinvent-version-3/reports-of-changes/), and the results of the central updates were reviewed extensively. The changes added e.g. consistent water flows and other information throughout the database. The documentation of this dataset can be found in the ecoinvent reports of version 2, which are still available via the ecoinvent website. The change report linked above covers all central changes that were made during the conversion process.]

## Included activities end
This data set includes the disposal of all remaining parts, that are not recycled. All recycled parts are attributed to the reuse process (cut-off). Transport for recycled materials included.

## Geography
Data for disposal of vehicle parts in Europe.

## Reference product
- used motor scooter: -1 unit; CPC 39990: Other wastes n.e.c.; By-product classification Waste
  EcoSpold01Location=CH
  production volume 3.96633 unit
    This is a placeholder value that does not reflect real-world production volumes. This dataset does not currently require a real-world production volume to work in the database framework, and no actual data were collected yet. This has no negative effect on the results of the ecoinvent database.
  property price 0 EUR2005
    Waste products are assigned a price of zero as they are assumed to require further treatment.
  property carbon content, fossil 0.269412
    Calculated from C content in input materials in the infrastructure
  property carbon content, non-fossil 0.00092273
    Calculated from C content in input materials in the infrastructure
  property carbon content 0.270335
    carbon content on a dry matter basis (reserved; not for manual entry)
  properties: water content 0, water in wet mass 0 kg, dry mass 90 kg, wet mass 90 kg, carbon allocation 24.3302 kg

## By-products
- iron scrap, sorted, pressed: 0 kg; By-product classification Recyclable; CPC 39310: Slag, dross, scalings and other waste from the manufacture of iron or steel; pedigree (1,1,1,1,1)
  this flow replaces the output "Ni-Co-Fe residues from Ni-metal hydride battery, pyrometallurgical processing"
  Uncertainty: data of 1 European plant - reported in Fisher (2006)
  property wet mass 1 kg; name WM
  property carbon content, fossil 0; name C_content_fossil
  property carbon content, non-fossil 0; name C_content_non_fossil
  property water content 0; name water_content
  property dry mass 1 kg; name DM
  property price 0.175 EUR2005
    Temporary price data. Calculated as 90% of purchasers price based on: 2005 import and export prices (total trades (USD) divided by total weight (kg) in biggest economies of the world: EU27, USA, Brasil, China, India, Japan and Russia) from UN Commodity Trade Statistics Database (http://data.un.org/Explorer.aspxDatabase [Accessed 2011.06.20]). Commodity: Waste or scrap, of cast iron
  property water in wet mass 0 kg; name WWM
  property carbon content 0
    carbon content on a dry matter basis (reserved; not for manual entry)
  properties: carbon allocation 0 kg
- heat, for reuse in municipal waste incineration only: 0 MJ; CPC 17300: Steam and hot water; By-product classification allocatable product; pedigree (1,1,1,1,1)
  Net electricity generated from this waste and used in internal MSWI plant energy redistribution.
  Uncertainty: uncertainty is calculated from uncertainties in waste composition and uncertainties in energy efficiency and the uncertainty in internal energy demand
  property exergy 0.1842 MJ; name E_th_prod_MSWI_exergy
    This exergy property is based on the exergy content of the product.
  property price 0.0106 EUR2005; name E_th_prod_MSWI_price_EUR2005
    Average European district heat price from Ecoheatcool and Euroheat 2005-2006, Ecoheat Work package 1: The European heat market. Final report. 10.6 EUR/GJ i s the price of district heat. http://www.solarthermalworld.org/files/Ecoheatcool%20WP1%20Web.pdf?download
  property true value relation 0.1842; name E_th_prod_MSWI_true_value_relation
    property to calculate "true value" from
- electricity, for reuse in municipal waste incineration only: 0 kWh; CPC 17100: Electrical energy; By-product classification allocatable product; pedigree (1,1,1,1,1)
  (same comment as for heat, for reuse in municipal waste incineration only)
  property price 0.1 EUR2005; name E_el_prod_MSWI_price_EUR2005
    Estimated to be the same price as in case of electricity, medium voltage.
  property exergy 3.6 MJ; name E_el_prod_MSWI_exergy
    This exergy property is based on the exergy content of the product.
  property true value relation 3.6; name E_el_prod_MSWI_true_value_relation
    property to calculate "true value" from
- cobalt: 0 kg; CPC 41601: Tungsten, molybdenum, tantalum, magnesium, cobalt, cadmium, titanium, zirconium, beryllium, gallium, hafnium, […]; By-product classification allocatable product
  EcoSpold01Location=GLO
  property price 39.7 EUR2005
    Temporary price data. Calculated as 90% of purchasers price based on: Cobalt in USGS (2007) Mineral commodity summaries 2007. <http://minerals.usgs.gov/minerals/pubs/mcs/2007/mcs2007.pdf>
  property carbon content 0
    carbon content on a dry matter basis (reserved; not for manual entry)
  properties: dry mass 1 kg, water content 0, water in wet mass 0 kg, carbon content, non-fossil 0, wet mass 1 kg, carbon content, fossil 0, carbon allocation 0 kg
- iron scrap, unsorted: 0 kg; CPC 39310: Slag, dross, scalings and other waste from the manufacture of iron or steel; By-product classification Recyclable
  This flow substitutes the original byproduct "iron and steel, from used Li-ion battery pyrometallurgical process". Following an update in the production process of Li-battery, the byproduct of steel corresponds to reinforcing steel.
  property price 0.149 EUR2005
    Temporary price data. Calculated as 90% of purchasers price based on: estimated at 85% of sorted scrap
  property carbon content 0
    carbon content on a dry matter basis (reserved; not for manual entry)
  properties: carbon content, fossil 0, wet mass 1 kg, water in wet mass 0 kg, carbon content, non-fossil 0, water content 0, dry mass 1 kg, carbon allocation 0 kg
- lithium carbonate: 0 kg; CPC 34240: Phosphates of triammonium; salts and peroxysalts of inorganic acids and metals n.e.c.; By-product classification allocatable product; CAS 554-13-2
  EcoSpold01Location=GLO
  property price 6.75 EUR2005
    For lithium, there is no exchange trading, no terminal storage market and only an extremely limited spot market (Reuters, 2016). The lithium price is negotiated bilateral and based on customer specifications with price information rarely publicly documented (European Lithium, 2017). Roskill Information Services estimate the price for technical grade lithium carbonate in 2017 between 6900 and 7800 USD per tonne, with a price premium of 500 USD for battery grade lithium (European Lithium, 2017). USGS estimates the price for lithium carbonate, battery grade, to be 7400USD in 2016 (USGS, 2017). Here an average price of 7500 USD per tonne lithium carbonate is assumed, average exchange rate 1 USD = 0.9 EUR in 2017 (Oanda, 2017). Resulting in a price for lithium carbonate of 6.75EUR/kg.
    Reference(s):
    European Lithium. 2017. Lithium Market. Online source: http://europeanlithium.com/lithium/lithium-market/, accessed 10 October 2017.
    Reuters. 2016. What price lithium, the metal of the future? Andy Home. Online source: https://www.reuters.com/article/us-lithium-batteries-ahome/what-price-lithium-the-metal-of-the-future-andy-home-idUSKCN0YS19D, accessed 10 October 2017.
    Oanda. 2017. https://www.oanda.com/lang/de/currency/average, accessed 10 October 2017.
    USGS. 2017. Lithium. Commodity Overview. Online https://minerals.usgs.gov/minerals/pubs/commodity/lithium/mcs-2017-lithi.pdf, accessed 10 October, 2017.
  property carbon content 0.16255
    carbon content on a dry matter basis (reserved; not for manual entry)
  properties: dry mass 1 kg, carbon content, non-fossil 0, water in wet mass 0 kg, carbon content, fossil 0.16255, water content 0, wet mass 1 kg, carbon allocation 0.16255 kg
- sulfuric acid: 0 kg; source Althaus H.-J. 2004; CPC 34231: Chemical elements n.e.c.; inorganic acids except phosphoric, nitric and sulphonitric; inorganic oxygen compoun[…]; By-product classification allocatable product; pedigree (1,1,1,1,1)
  property price 0.031 EUR2005
    Temporary price data. Calculated as 90% of purchasers price based on: 2004 Import/Export data (total trades (USD) divided by total weight (kg) in EU27, USA, China, Japan and India) from UN Commodity Trade Statistics Database (http://data.un.org/Explorer.aspxDatabase [Accessed 2 July 2010]). Commodity: 'Sulphuric acid, oleum'
  property carbon content 0
    carbon content on a dry matter basis (reserved; not for manual entry)
  properties: carbon content, non-fossil 0, dry mass 1 kg, carbon content, fossil 0, wet mass 1 kg, water content 0, water in wet mass 0 kg, carbon allocation 0 kg
- copper: 0 kg; By-product classification allocatable product; CPC 41413: Refined copper and copper alloys, unwrought; master alloys of copper; pedigree (1,1,1,1,1)
  Calculated value. Based on Li-ioin battery composition and hydrometallurgical treatment process outputs. The efficiency of Cu, Al and Manganese recovery is estimated 70% based on the estimations of the original process for Cu recovery.
  property price 5.52 EUR2005; name copper_bp_price_EUR2005
    Literature value (http://www.economist.com/news/business/21576714-mining-industry-has-enriched-chile-its-future-precarious-copper-solution). Average price between 20015 and 2013.
  property carbon content 0
    carbon content on a dry matter basis (reserved; not for manual entry)
  properties: carbon content, non-fossil 0, water in wet mass 0 kg, wet mass 1 kg, water content 0, dry mass 1 kg, carbon content, fossil 0, carbon allocation 0 kg
- manganese: 0 kg; CPC 41603: Bismuth, antimony, manganese, chromium and articles thereof; including waste and scrap of bismuth or manganese; By-product classification allocatable product; pedigree (1,1,1,1,1)
  (same comment as for copper)
  property price 1.24 EUR2005; name manganese_bp_price_EUR2005
    Literature value (USGS,http://minerals.usgs.gov/minerals/pubs/commodity/manganese/myb1-2009-manga.pdf, accessed 20160222). The price for manganese ore (48% manganese) is reported to be 6.61 USD/metric ton unit (MTU) = 10kg. The resulting price is (1/0.48*0.661=) 1.38 USD. Cross reference; in 2005 manganese was traded on the markets for 1.5 USD/kg (http://www.infomine.com/investment/metal-prices/manganese/all/, accessed 20160704).
  property carbon content 0
    carbon content on a dry matter basis (reserved; not for manual entry)
  properties: dry mass 1 kg, water in wet mass 0 kg, carbon content, fossil 0, wet mass 1 kg, carbon content, non-fossil 0, water content 0, carbon allocation 0 kg
- aluminium oxide, non-metallurgical: 0 kg; source European Aluminium Association 2008; CPC 41432: Alumina (aluminium oxide), except artificial corundum; By-product classification allocatable product; CAS 1344-28-1; pedigree (1,1,1,1,1)
  property carbon content, non-fossil 0; name C_content_non_fossil
  property price 0.28 EUR2005; name Al2O3Amount_price_EUR2005
    From UN trade database. http://data.un.org/ Import data from the largest economies of the world are used (Brazil, India, USA, China, Japan and EU-27).
  property dry mass 1 kg; name DM
  property water content 0; name water_content
  property wet mass 1 kg; name WM
  property water in wet mass 0 kg; name WWM
  property carbon content, fossil 0; name C_content_fossil
  property carbon content 0
    carbon content on a dry matter basis (reserved; not for manual entry)
  properties: carbon allocation 0 kg
- aluminium, cast alloy: 0 kg; source European Aluminium Association 2008; By-product classification allocatable product; CPC 41431: Unwrought aluminium; pedigree (1,1,1,1,1)
  EcoSpold01Location=RER
  property price 1.3 EUR2005; name castAlloyAmount_price_EUR2005
    Temporary price data. Calculated as 90% of purchasers price based on: Source: London Metal Exchange, Aluminium alloy price for 2005
  property carbon content 0
    carbon content on a dry matter basis (reserved; not for manual entry)
  properties: water in wet mass 0 kg, carbon content, non-fossil 0, water content 0, dry mass 1 kg, carbon content, fossil 0, wet mass 1 kg, carbon allocation 0 kg
- aluminium, wrought alloy: 0 kg; source European Aluminium Association 2008; By-product classification allocatable product; CPC 4153: Semi-finished products of aluminium or aluminium alloys; pedigree (1,1,1,1,1)
  property price 1.44 EUR2005; name secondaryAluminiumOutput_price_EUR2005
    Estimated based on literature values and expert judgement. Aluminium ccast alloys are about 90% of the price of aluminium wrought alloys.
  property carbon content 0
    carbon content on a dry matter basis (reserved; not for manual entry)
  properties: wet mass 1 kg, water content 0, carbon content, fossil 0, water in wet mass 0 kg, carbon content, non-fossil 0, dry mass 1 kg, carbon allocation 0 kg
- zinc concentrate: 0 kg; CPC 14290: Other non-ferrous metal ores and concentrates (other than uranium or thorium ores and concentrates); By-product classification allocatable product
  Calculated value from the knowledge of the properties of both products.
  property price 0.38 EUR2005; name ByP_price_EUR2005
    Temporary price data. Calculated as 90% of purchasers price based on: Zinc content in concentrate 53%. Concentrate price per kg Zn 86.5% of refined Zn price (13.5% treatment charges according to CHR Metals Limited 2005: Dynamic cost curves. http://www.minecost.com/dynamic.pdf). 2004 zinc price from USGS (2007) Mineral commodity summaries 2007. <http://minerals.usgs.gov/minerals/pubs/mcs/2007/mcs2007.pdf> [Accessed 25 May 2010]
  property zinc content 0.53; name zinc_C_zinc_concentrate
    Zinc content on a dry matter basis. Value taken from teh "zinc mine operation" /GLO dataset.
  property dry mass 1 kg; name DM_zinc_concentrate
  property carbon content 0
    carbon content on a dry matter basis (reserved; not for manual entry)
  properties: wet mass 1 kg, water content 0, carbon content, non-fossil 0, carbon content, fossil 0, water in wet mass 0 kg, carbon allocation 0 kg
- manganese dioxide: 0 kg; CPC 34220: Zinc oxide; zinc peroxide; chromium oxides and hydroxides; manganese oxides; iron oxides and hydroxides; earth[…]; By-product classification allocatable product
  EcoSpold01Location=GLO
  property price 1.04 EUR2005
    Calculated value based on data from United Nations Commodity Trade Statistics Database (comtrade.un.org). UN comtrade category: 282010 Managanese dioxide. Prices from the year 2005. Using exchange rate of 1EURO = 1.209 USD. Average of price of import into 5 main markets (EU, US, JP, IN and CN).
  property carbon content 0
    carbon content on a dry matter basis (reserved; not for manual entry)
  properties: water in wet mass 0 kg, wet mass 1 kg, dry mass 1 kg, carbon content, fossil 0, water content 0, carbon content, non-fossil 0, carbon allocation 0 kg

## Inputs from technosphere
- waste rubber, unspecified: 0 kg; pedigree (1,1,1,1,1)
  50% of tyres to municipal incineration
  EcoSpold01Location=CH
  Uncertainty: 50% of tyres to municipal incineration
  production volume 0 kg
    Calculated from the production volume of used motor scooter in proportion to the respective output amounts.
  properties: wet mass 1 kg, carbon content, fossil 0.853, dry mass 1 kg
- used Ni-metal hydride battery: -3.79445 kg; lognormal variance with pedigree 0.0286, pedigree (2,1,4,5,3)
  Assumption for battery treatment
  EcoSpold01Location=GLO
  Uncertainty: Assumption for battery treatment
  production volume 5.12342 kg
    (same comment as for waste rubber, unspecified)
  properties: wet mass 1 kg, dry mass 1 kg, carbon content, fossil 0.328011
- used Li-ion battery: -3.10555 kg; lognormal variance with pedigree 0.0286, pedigree (2,1,4,5,3)
  EcoSpold01Location=GLO
  Assumption for battery treatment
  Uncertainty: Assumption for battery treatment
  production volume 5.12342 kg
    (same comment as for waste rubber, unspecified)
  properties: wet mass 1 kg, dry mass 1 kg, carbon content, fossil 0.328011
- waste plastic, mixture: 0 kg; pedigree (1,1,1,1,1)
  Assumption for plastic recycling: all parts replaced once
  EcoSpold01Location=CH
  Uncertainty: Assumption for plastic recycling: all parts replaced once
  production volume 0 kg
    (same comment as for waste rubber, unspecified)
  properties: carbon content, fossil 0.747344, wet mass 1 kg, water content 0.180638, dry mass 0.847 kg
  note on carbon content, fossil: C content in 1 kg DM was calculated using data in Tab A.2, ecoinvent v2.2 report 13_I
- zinc in car shredder residue: -0.39463 kg; lognormal variance with pedigree 0.0286, pedigree (2,1,4,5,3)
  EcoSpold01Location=CH
  Extrapolated from car disposal
  Uncertainty: Extrapolated from car disposal
  production volume 1.18389 kg
    (same comment as for waste rubber, unspecified)
  properties: dry mass 1 kg, wet mass 1 kg
- waste rubber, unspecified: -1.20155, -1.20155 kg (2 entries); lognormal variance with pedigree 0.0286, pedigree (2,1,4,5,3)
  (same comment as for waste rubber, unspecified)
  production volume 7.2093 kg
- waste plastic, mixture: -2.47291, -0.16523, -0.0124961, -0.0682459, -0.0275706, -0.0648059, -2.10703, -17.3117 kg (8 entries); lognormal variance with pedigree 0.036, pedigree (4,1,4,5,3)
  (same comment as for waste plastic, mixture)
  production volume 66.69 kg

## Sampling procedure
Literature

## Extrapolations
Some data derived from car disposal This dataset has been copied from an original dataset covering the geography CH. The uncertainty has been adjusted accordingly.

## Review by Christian Bauer 2010-02-07
26.01.2010
passed
C:\Dokumente und Einstellungen\Marianne\Eigene Dateien\Projekte\277_Mobitool\Review\[Ecospold_Disposal_ebikes-v1.1.xls]X-Process
