# bitumen seal production, VA4

Dataset: EcoSpold 2, unit process
Geography: RER
Time period: 1994-01-01 to 2019-12-31
Technology level: current
Classification: ISIC rev.4 ecoinvent: 2399:Manufacture of other non-metallic mineral products n.e.c.
Classification: EcoSpold01Categories: plastics/others
Tags: ConvertedDataset
Scenario: Business-as-Usual
System model: Allocation at the point of substitution
Generated by: Martin Lehmann
Published in: Kellenberger D. 2007
Database: ecoinvent
isCopyrightProtected: true
accessRestrictedTo: 1

## General comment
The dataset is applicable in the construction building sector. Bitumen sealing is used to protect the construction against water intrusion.
[This dataset was already contained in the ecoinvent database version 2. It was not individually updated during the transfer to ecoinvent version 3. Life Cycle Impact Assessment results may still have changed, as they are affected by changes in the supply chain, i.e. in other datasets. This dataset was generated following the ecoinvent quality guidelines for version 2. It may have been subject to central changes described in the ecoinvent version 3 change report (http://www.ecoinvent.org/database/ecoinvent-version-3/reports-of-changes/), and the results of the central updates were reviewed extensively. The changes added e.g. consistent water flows and other information throughout the database. The documentation of this dataset can be found in the ecoinvent reports of version 2, which are still available via the ecoinvent website. The change report linked above covers all central changes that were made during the conversion process.]

## Included activities end
The dataset describes the production of bitumen sealing VA4. Included processes are the extrusion of polypropylene foil, the fabrication of the sealing, the infrastructure, the transport by road and rail as well as the disposal of the bitumen cuttings in a municipal incineration. The production of bitumen sealing does not include any chemical processes. In this specific type of bitumen sealing VA4, aluminium is being sputtered onto a PE-foil.

## Geography
The data of this dataset is taken from literature studies and producer information.

## Technology
Simple processes involved (beside sputtering), a carrier material is being soaked with bitumen. The bitumen coatings are then gritted with minerals (talcum, sand).

## Time period
The production of bitumen sealing has not changed very much over the years, as there are no chemical processes involved.

## Parameters
- fraction, process water, to air: 0.15 dimensionless; name fraction_PW_to_air; lognormal variance with pedigree 0.092025, pedigree (4,4,3,2,4)
  Literature value. In case when no industry/process specific data are available, default evaporation fraction value is used. This value is 15% and is based on literature (Statistics Canada, 2007 & Shaffer, K.H., 2008, Consumptive water use in the Great Lakes Basin, USGS & Shiklomanov, 2003, World Water Resources at the Beginning of the 21st Century) and has been approved by an expert.
- fraction, tap water, to air: 0.15; name fraction_TW_to_air; = fraction_PW_to_air; lognormal variance with pedigree 0.092025, pedigree (4,4,3,2,4)
  Calculated value. See comment in the other parametres present in this dataset. Tap water is considered to be always used as process water, thus process water fractions to air are applied to all tap water input flows to calculate the amount of water consumed in the processes.

## Reference product
- bitumen seal, VA4: 1 kg; By-product classification allocatable product; CPC 37940: Bituminous mixtures based on natural and artificial stone materials and bitumen, natural asphalt or related su[…]
  EcoSpold01Location=RER
  production volume 1.32237 kg
    This is a placeholder value that does not reflect real-world production volumes. This dataset does not currently require a real-world production volume to work in the database framework, and no actual data were collected yet. This has no negative effect on the results of the ecoinvent database. The placeholder value of this activity was scaled according to the nominal GDP of 2005 (source: United Nations, http://data.un.org/Glossary.aspx?q=GDP+%28current+US%24%29, accessed 20130726) to reflect an appropriate share of the global production volume, which is also a placeholder value.
  property carbon content, fossil 0.624361
    The production of bitumen sealing does not include any chemical processes (ecoinvent v2.2 report 7_part XXIII), C content was then calculated as a weighted average of C content of the different components
  property carbon content 0.624361
    carbon content on a dry matter basis (reserved; not for manual entry)
  property true value 1.28
    allocation property applied in "true value" allocation // value calculated from revenue
  properties: price 1.28 EUR2005, dry mass 1 kg, wet mass 1 kg, water content 0, water in wet mass 0 kg, carbon content, non-fossil 0, carbon allocation 0.624361 kg

## By-products
- heat, for reuse in municipal waste incineration only: 0 MJ; CPC 17300: Steam and hot water; By-product classification allocatable product; pedigree (1,1,1,1,1)
  Net useful heat generated from this waste and used in internal MSWI plant energy redistribution.
  Uncertainty: uncertainty is calculated from uncertainties in waste composition and uncertainties in energy efficiency and the uncertainty in internal energy demand
  production volume 0.0548201 MJ
  property true value relation 0.1842; name E_th_prod_MSWI_true_value_relation
    property to calculate "true value" from
  property exergy 0.1842 MJ; name E_th_prod_MSWI_exergy
    This exergy property is based on the exergy content of the product.
  property price 0.0106 EUR2005; name E_th_prod_MSWI_price_EUR2005
    Average European district heat price from Ecoheatcool and Euroheat 2005-2006, Ecoheat Work package 1: The European heat market. Final report. 10.6 EUR/GJ i s the price of district heat. http://www.solarthermalworld.org/files/Ecoheatcool%20WP1%20Web.pdf?download
  property true value 0.000359613
    allocation property applied in "true value" allocation // value calculated from true value relation
- electricity, for reuse in municipal waste incineration only: 0 kWh; CPC 17100: Electrical energy; By-product classification allocatable product; pedigree (1,1,1,1,1)
  Net electricity generated from this waste and used in internal MSWI plant energy redistribution.
  Uncertainty: uncertainty is calculated from uncertainties in waste composition and uncertainties in energy efficiency and the uncertainty in internal energy demand
  production volume 0.00784971 kWh
  property true value relation 3.6; name E_el_prod_MSWI_true_value_relation
    property to calculate "true value" from
  property exergy 3.6 MJ; name E_el_prod_MSWI_exergy
    This exergy property is based on the exergy content of the product.
  property price 0.1 EUR2005; name E_el_prod_MSWI_price_EUR2005
    Estimated to be the same price as in case of electricity, medium voltage.
  property true value 0.00100638
    (same comment as for heat, for reuse in municipal waste incineration only)
- zinc concentrate: 0 kg; CPC 14290: Other non-ferrous metal ores and concentrates (other than uranium or thorium ores and concentrates); By-product classification allocatable product
  Calculated value from the knowledge of the properties of both products.
  production volume 7.23674e-6 kg
  property price 0.38 EUR2005; name ByP_price_EUR2005
    Temporary price data. Calculated as 90% of purchasers price based on: Zinc content in concentrate 53%. Concentrate price per kg Zn 86.5% of refined Zn price (13.5% treatment charges according to CHR Metals Limited 2005: Dynamic cost curves. http://www.minecost.com/dynamic.pdf). 2004 zinc price from USGS (2007) Mineral commodity summaries 2007. <http://minerals.usgs.gov/minerals/pubs/mcs/2007/mcs2007.pdf> [Accessed 25 May 2010]
  property zinc content 0.53; name zinc_C_zinc_concentrate
    Zinc content on a dry matter basis. Value taken from teh "zinc mine operation" /GLO dataset.
  property dry mass 1 kg; name DM_zinc_concentrate
  property carbon content 0
    carbon content on a dry matter basis (reserved; not for manual entry)
  property true value 2.74994e-6
    allocation property applied in "true value" allocation // value calculated from revenue
  properties: wet mass 1 kg, water content 0, carbon content, non-fossil 0, carbon content, fossil 0, water in wet mass 0 kg, carbon allocation 0 kg
- iron scrap, unsorted: 0 kg; source European Aluminium Association 2008; CPC 39310: Slag, dross, scalings and other waste from the manufacture of iron or steel; By-product classification Recyclable; pedigree (1,1,1,1,1)
  production volume 3.82187e-9 kg
  property price 0.149 EUR2005; name ironScrapAmount_price_EUR2005
    Temporary price data. Calculated as 90% of purchasers price based on: estimated at 85% of sorted scrap
  property carbon content 0
    carbon content on a dry matter basis (reserved; not for manual entry)
  property true value 2.84729e-10
    allocation property applied in "true value" allocation // value calculated from revenue
  properties: water in wet mass 0 kg, water content 0, carbon content, fossil 0, carbon content, non-fossil 0, dry mass 1 kg, wet mass 1 kg, carbon allocation 0 kg
- aluminium oxide, non-metallurgical: 0 kg; source European Aluminium Association 2008; CPC 41432: Alumina (aluminium oxide), except artificial corundum; By-product classification allocatable product; CAS 1344-28-1; pedigree (1,1,1,1,1)
  production volume 2.40496e-7 kg
  property carbon content, non-fossil 0; name C_content_non_fossil
  property price 0.28 EUR2005; name Al2O3Amount_price_EUR2005
    From UN trade database. http://data.un.org/ Import data from the largest economies of the world are used (Brazil, India, USA, China, Japan and EU-27).
  property dry mass 1 kg; name DM
  property water content 0; name water_content
  property wet mass 1 kg; name WM
  property water in wet mass 0 kg; name WWM
  property carbon content, fossil 0; name C_content_fossil
  property carbon content 0
    carbon content on a dry matter basis (reserved; not for manual entry)
  property true value 3.36694e-8
    allocation property applied in "true value" allocation // value calculated from revenue
  properties: carbon allocation 0 kg
- aluminium, cast alloy: 0 kg; source European Aluminium Association 2008; By-product classification allocatable product; CPC 41431: Unwrought aluminium; pedigree (1,1,1,1,1)
  EcoSpold01Location=RER
  production volume 2.2481e-6 kg
  property price 1.3 EUR2005; name castAlloyAmount_price_EUR2005
    Temporary price data. Calculated as 90% of purchasers price based on: Source: London Metal Exchange, Aluminium alloy price for 2005
  property carbon content 0
    carbon content on a dry matter basis (reserved; not for manual entry)
  property true value 1.46127e-6
    allocation property applied in "true value" allocation // value calculated from revenue
  properties: water in wet mass 0 kg, carbon content, non-fossil 0, water content 0, dry mass 1 kg, carbon content, fossil 0, wet mass 1 kg, carbon allocation 0 kg
- aluminium, wrought alloy: 0 kg; source European Aluminium Association 2008; By-product classification allocatable product; CPC 4153: Semi-finished products of aluminium or aluminium alloys; pedigree (1,1,1,1,1)
  production volume 9.84177e-7 kg
  property price 1.44 EUR2005; name secondaryAluminiumOutput_price_EUR2005
  properties: wet mass 1 kg, water content 0, carbon content, fossil 0, water in wet mass 0 kg, carbon content, non-fossil 0, dry mass 1 kg, carbon content 0, carbon allocation 0 kg, true value 7.08607e-7

## Inputs from technosphere
- waste bitumen sheet: -0.00722226 kg; lognormal variance with pedigree 0.0707, pedigree (2,4,5,3,3)
  EcoSpold01Location=CH
  production volume 0.00723 kg
    Calculated from the production volume of bitumen seal, VA4 in proportion to the respective output amounts.
  properties: water content 0.0152284, wet mass 1 kg, carbon content, fossil 0.643207, dry mass 0.985 kg
  note on carbon content, fossil: The bitumen sheet is made of 63% bitumen, 24% surface spread and filler (assumed to be pure SiO2), 6% carrier fleece (assumed to be PE) and 7% elastomer (assumed to be PS) (ecoinvent v2.2 report 13_I, pg 40). C content of bitumen, PE and PS from Tab A.6 and A.1 (ecoinvent v2.2 report 13_I, pg 40), respectively. C content of waste also given in the dataset
- aluminium, wrought alloy: 0.000544417 kg; lognormal variance with pedigree 0.0508, pedigree (2,2,5,3,1)
  EcoSpold01Location=RER
  properties: wet mass 1 kg, dry mass 1 kg
- sand: 0.119872 kg; lognormal variance with pedigree 0.0527, pedigree (2,4,5,3,1)
  EcoSpold01Location=CH
  properties: dry mass 1 kg, wet mass 1 kg
- corrugated board box: 0.00353621 kg; = 0.0177*0.2; lognormal variance with pedigree 0.0421, pedigree (1,2,5,5,1)
  This flow is issued during the process "selective coating, copper sheet, sputtering" which is used as an input in bitumen seal production. The ecoinvent dataset with the same name has been merged into this activity. This flow refers to 1 m2 of selective coat, copper sheet, sputter deposition. 0.2 m2 are used as an input for bitumen seal production.
  Uncertainty: Questionnaire
  properties: water content 0.0582011, dry mass 0.945 kg, carbon content, fossil 0.000656085, carbon content, non-fossil 0.432275, wet mass 1 kg
  note on carbon content, fossil: Fossil C content was calculated after fossil C contents of chemicals used in the production of board (Tab 10-15 & 10.16 ecoinvent v2.2 report 11_III, part 10)
  note on carbon content, non-fossil: Biogenic C content was calculated after biogenic C contents of chemicals used in the production of board (Tab 10.15 & 10.16, ecoinvent v2.2 report 11_III, part 10).
- scrap aluminium: 0 kg; pedigree (1,1,1,1,1)
  EcoSpold01Location=CH
  production volume 0 kg
    (same comment as for waste bitumen sheet)
  properties: dry mass 1 kg, wet mass 1 kg
- wastewater, from residence: -4.53514e-5 m3; = (0.000227*0.2)*-1
  This flow is issued during the process "selective coating, copper sheet, sputtering" which is used as an input in bitumen seal production. The ecoinvent dataset with the same name has been merged into this activity. This flow refers to 1 m2 of selective coat, copper sheet, sputter deposition. 0.2 m2 are used as an input for bitumen seal production.
  production volume 6.00356e-5 m3; = Ref('c40d72d0-304d-4610-82d9-d4bf15556ea6', 'ProductionVolume') * ((Ref('f2069f16-70cf-4043-89d1-28dda94aba96')*-1) / Ref('c40d72d0-304d-4610-82d9-d4bf15556ea6'))
    Calculated from production volume of reference product using the relative outputs.
  properties: dry mass 0.337476 kg, wet mass 1000 kg, carbon content, non-fossil 0.199421, water content 2962.17
  note on carbon content, non-fossil: 0.0673 kg TOC/m3 (Tab A.17, ecoinvent v2.2 report 13_I). TOC was considered as Total Carbon.
- oxygen, liquid: 0.000181605 kg; = 0.000909*0.2; lognormal variance with pedigree 0.0421, pedigree (1,2,5,5,1)
  (same comment as for corrugated board box)
  properties: wet mass 1 kg, dry mass 1 kg
- nitrogen, liquid: 0.000363611 kg; = 0.00182*0.2; lognormal variance with pedigree 0.0421, pedigree (1,2,5,5,1)
  (same comment as for corrugated board box)
  properties: wet mass 1 kg, dry mass 1 kg
- waste mineral oil: 0 kg
  (same comment as for wastewater, from residence)
  production volume 0 kg
    Calculated from production volume of reference product using the relative outputs.
  properties: dry mass 0.9 kg, carbon content, fossil 0.864444, wet mass 1 kg, water content 0.111111
  note on carbon content, fossil: Tab A.6, ecoinvent v2.2 report 13_I. C content has been calculated after data in the tables, and then referred to 1 kg DM
- pitch: 0 kg; pedigree (1,1,1,1,1)
  EcoSpold01Location=RER
  properties: carbon content, fossil 0.83, wet mass 1 kg, dry mass 1 kg
- glass fibre: 0.013086 kg; lognormal variance with pedigree 0.0527, pedigree (2,4,5,3,1)
  EcoSpold01Location=RER
  properties: wet mass 1 kg, dry mass 1 kg
- tap water: 1.44565 kg; name tap_water_input; = 7.236*0.2; lognormal variance with pedigree 0.0546, pedigree (3,3,5,5,1)
  (same comment as for corrugated board box)
  properties: carbon content, fossil 0.00178991, wet mass 1 kg, water content 2962.17, dry mass 0.000337476 kg
  note on carbon content, fossil: Bicarbonate content is 2.93 mol/m3. CO2 content is 0.1 mol/m3 (ecoinvent v2.2 report 8, Tab 93.1).
- argon, liquid: 0.000655298 kg; = 0.00328*0.2; lognormal variance with pedigree 0.0421, pedigree (1,2,5,5,1)
  This flow is issued during the process "selective coating, copper sheet, sputtering" which is used as an input in bitumen seal production. The ecoinvent dataset with the same name has been merged into this activity. This flow refers to 1 m2 of selective coat, copper sheet, sputter deposition. 0.2 m2 are used as an input for bitumen seal production.
  Uncertainty: Questionnaire (plus helium)
  properties: wet mass 1 kg, dry mass 1 kg
- metal coating facility: 6.65287e-8 unit; = 3.33E-07*0.2; lognormal variance with pedigree 0.3421, pedigree (1,2,5,5,1)
  (same comment as for corrugated board box)
- light fuel oil: 0.00123867 kg; = 0.0062*0.2; lognormal variance with pedigree 0.0421, pedigree (1,2,5,5,1)
  This flow is issued during the process "selective coating, copper sheet, sputtering" which is used as an input in bitumen seal production. The ecoinvent dataset with the same name has been merged into this activity. This flow refers to 1 m2 of selective coat, copper sheet, sputter deposition. 0.2 m2 are used as an input for bitumen seal production.
  Uncertainty: Questionnaire, including heating
  properties: carbon content, fossil 0.862, wet mass 1 kg, dry mass 1 kg
- lubricating oil: 0.000154435 kg; = 0.000773*0.2; lognormal variance with pedigree 0.0421, pedigree (1,2,5,5,1)
  (same comment as for corrugated board box)
  properties: dry mass 1 kg, wet mass 1 kg, carbon content, fossil 0.75
  note on carbon content, fossil: Lubricating oil is produced from diesel. C-content/dry mass of fats and oils considered 75%, from: ecoinvent v2.2 report, n 15a, pg 40
- polyethylene, low density, granulate: 0.000103489 kg; = 0.000518*0.2; lognormal variance with pedigree 0.0421, pedigree (1,2,5,5,1)
  This flow is issued during the process "selective coating, copper sheet, sputtering" which is used as an input in bitumen seal production. The ecoinvent dataset with the same name has been merged into this activity. This flow refers to 1 m2 of selective coat, copper sheet, sputter deposition. 0.2 m2 are used as an input for bitumen seal production.
  Uncertainty: Plastic packagings
  properties: dry mass 1 kg, wet mass 1 kg, carbon content, fossil 0.857143
- fleece, polyethylene: 0.00888049 kg; lognormal variance with pedigree 0.0527, pedigree (2,4,5,3,1)
  EcoSpold01Location=RER
  properties: carbon content, fossil 0.857143, wet mass 1 kg, dry mass 1 kg
  note on carbon content, fossil: Polyethylene is formed out of a huge amount of ethylene monomers (C2H4) (ecoinvent v2.2 report 11_II). MW=28 g/mol
- kraft paper, bleached: 0.000110881 kg; = 0.000555*0.2; lognormal variance with pedigree 0.0421, pedigree (1,2,5,5,1)
  (same comment as for corrugated board box)
  properties: water content 0.0582011, wet mass 1 kg, dry mass 0.945 kg, carbon content, fossil 9.3e-6, carbon content, non-fossil 0.428894
- chemical factory, organics: 3.99572e-10 unit; lognormal variance with pedigree 0.3527, pedigree (2,4,5,3,1)
  activityLink introduced to establish a direct link to the corresponding regional supply of this product
  EcoSpold01Location=RER
- diesel, burned in building machine: 0.0449519 MJ; = 0.225*0.2; lognormal variance with pedigree 0.0421, pedigree (1,2,5,5,1)
  This flow is issued during the process "selective coating, copper sheet, sputtering" which is used as an input in bitumen seal production. The ecoinvent dataset with the same name has been merged into this activity. This flow refers to 1 m2 of selective coat, copper sheet, sputter deposition. 0.2 m2 are used as an input for bitumen seal production.
  Uncertainty: Questionnaire, use for vehicles in plant operation
- municipal solid waste: -0.00351823 kg; = (0.00284+0.00341*0.2)*-1; lognormal variance with pedigree 0.0707, pedigree (2,4,5,3,3)
  sum of (1) electricity used in bitumen seal production process + (1) electricity used for producing 0,2m2 of selective coat, copper sheet, sputter deposition
  EcoSpold01Location=CH
  production volume 0.00284 kg
    (same comment as for waste bitumen sheet)
  properties: dry mass 0.771 kg, carbon content, non-fossil 0.261655, carbon content, fossil 0.171549, wet mass 1 kg, water content 0.297017
  note on carbon content, non-fossil: MSW composition in tab 4.1, ecoinvent v2.2 report 13_I. C content referred to 1 kg DM
- electricity, medium voltage: 1.11281 kWh; = 0.42+3.47*0.2; lognormal variance with pedigree 0.0513, pedigree (2,3,5,3,1)
  EcoSpold01Location=UCTE
  sum of (1) electricity used in bitumen seal production process + (1) electricity used for producing 0,2m2 of selective coat, copper sheet, sputter deposition
- lime: 0.141848 kg; lognormal variance with pedigree 0.05, pedigree (1,1,5,1,1)
  EcoSpold01Location=CH
  composite
  properties: wet mass 1 kg, carbon content, fossil 0.120005, dry mass 1 kg
- scrap aluminium: -5.20019e-6, -2.43981e-7 kg (2 entries); lognormal variance with pedigree 0.0707, pedigree (2,4,5,3,3)
  EcoSpold01Location=CH
  production volume 5.45e-6 kg
- waste mineral oil: -0.000150942, -3.49264e-6 kg (2 entries)
  (same comment as for wastewater, from residence)
  production volume 0.000204438 kg
- pitch: 0.717509, 0.00471756 kg (2 entries); lognormal variance with pedigree 0.0527, pedigree (2,4,5,3,1)
  EcoSpold01Location=RER

## Emissions to nature
- Water [air, unspecified]: 0.000216848 m3; name water_to_air_unspecified; = 0.0010854*0.2; lognormal variance with pedigree 1.21, pedigree (5,5,5,5,5)
  (same comment as for wastewater, from residence)
  property fraction, origin: unspecified 0; name fraction_origin_unspecified
  property fraction, origin: fresh water 1; name fraction_origin_fresh_water
  property fraction, origin: salt water 0; name fraction_origin_salt_water
- Benzo(a)pyrene [air, unspecified]: 1.79807e-9 kg; lognormal variance with pedigree 0.69, pedigree (1,1,5,1,1)
  estimation
- Water [water, unspecified]: 0.0012288 m3; name water_to_water_unspecified; = 0.0061506*0.2; lognormal variance with pedigree 1.21, pedigree (5,5,5,5,5)
  (same comment as for wastewater, from residence)
  property fraction, origin: salt water 0; name fraction_origin_salt_water_Ww
  property fraction, origin: fresh water 1; name fraction_origin_fresh_water_Ww
  property fraction, origin: unspecified 0; name fraction_origin_unspecified_Ww
- NMVOC, non-methane volatile organic compounds, unspecified origin [air, unspecified]: 0.00107884 kg; lognormal variance with pedigree 0.1727, pedigree (2,4,5,3,1)

## Sampling procedure
Literature, database

## Extrapolations
see Geography

## Review by Rolf Frischknecht 2007-11-07
passed
