# infrastructure construction, for regional distribution of oil product

Dataset: EcoSpold 2, unit process
Geography: RER
Time period: 1991-01-01 to 2019-12-31
Technology level: current
Classification: ISIC rev.4 ecoinvent: 4290a: Construction of infrastructure for petroleum refining and distribution
Classification: EcoSpold01Categories: oil/production
Tags: ConvertedDataset
Scenario: Business-as-Usual
System model: Allocation at the point of substitution
Generated by: Niels Jungbluth
Published in: Jungbluth, N. 2007
Database: ecoinvent
isCopyrightProtected: true
accessRestrictedTo: 1

## General comment
Bottom-Up estimation based on plant data. Life time is 80 years. Product storage volume of storage tanks is 10'000 m3. The average storage time is 2 months. Thus total through flow in the life time is 4.8 mio. m3.
[This dataset was already contained in the ecoinvent database version 2. It was not individually updated during the transfer to ecoinvent version 3. Life Cycle Impact Assessment results may still have changed, as they are affected by changes in the supply chain, i.e. in other datasets. This dataset was generated following the ecoinvent quality guidelines for version 2. It may have been subject to central changes described in the ecoinvent version 3 change report (http://www.ecoinvent.org/database/ecoinvent-version-3/reports-of-changes/), and the results of the central updates were reviewed extensively. The changes added e.g. consistent water flows and other information throughout the database. The documentation of this dataset can be found in the ecoinvent reports of version 2, which are still available via the ecoinvent website. The change report linked above covers all central changes that were made during the conversion process.]

## Included activities end
Infrastructure (materials and land use) for storage tanks and petrol stations.

## Geography
Data for materials investigated in CH.

## Technology
Tank storage and fuel stations.

## Time period
Publication of literature.

## Reference product
- infrastructure, for regional distribution of oil product: 1 unit; CPC 53290: Other civil engineering works; By-product classification allocatable product
  production volume 1.32237 unit
    This is a placeholder value that does not reflect real-world production volumes. This dataset does not currently require a real-world production volume to work in the database framework, and no actual data were collected yet. This has no negative effect on the results of the ecoinvent database. The placeholder value of this activity was scaled according to the nominal GDP of 2005 (source: United Nations, http://data.un.org/Glossary.aspx?q=GDP+%28current+US%24%29, accessed 20130726) to reflect an appropriate share of the global production volume, which is also a placeholder value.
  property price 2.18313e6 EUR2005
    Calculated based on inputs: The price of the product has been calculated as a sum of the values of the material and energy inputs for this product. This value is therefore a rough estimation. It may underestimate the real price since there are additional expenses when producing any product. These expences can include for example labour costs, treatment of waste materials and profit for the producer. Please consider carefully whether this level of data quality is acceptable for your application.
  property true value 2.18313e6
    allocation property applied in "true value" allocation // value calculated from revenue

## By-products
- electricity, for reuse in municipal waste incineration only: 0 kWh; CPC 17100: Electrical energy; By-product classification allocatable product; pedigree (1,1,1,1,1)
  Net electricity generated from this waste and used in internal MSWI plant energy redistribution.
  Uncertainty: uncertainty is calculated from uncertainties in waste composition and uncertainties in energy efficiency and the uncertainty in internal energy demand
  production volume 22.7239 kWh
  property exergy 3.6 MJ; name E_el_prod_MSWI_exergy
    This exergy property is based on the exergy content of the product.
  property true value relation 3.6; name E_el_prod_MSWI_true_value_relation
    property to calculate "true value" from
  property price 0.1 EUR2005; name E_el_prod_MSWI_price_EUR2005
    Estimated to be the same price as in case of electricity, medium voltage.
  property true value 2.35056
    allocation property applied in "true value" allocation // value calculated from true value relation
- heat, for reuse in municipal waste incineration only: 0 MJ; CPC 17300: Steam and hot water; By-product classification allocatable product; pedigree (1,1,1,1,1)
  Net useful heat generated from this waste and used in internal MSWI plant energy redistribution.
  Uncertainty: uncertainty is calculated from uncertainties in waste composition and uncertainties in energy efficiency and the uncertainty in internal energy demand
  production volume 160.758 MJ
  property exergy 0.1842 MJ; name E_th_prod_MSWI_exergy
    This exergy property is based on the exergy content of the product.
  property true value relation 0.1842; name E_th_prod_MSWI_true_value_relation
    property to calculate "true value" from
  property price 0.0106 EUR2005; name E_th_prod_MSWI_price_EUR2005
    Average European district heat price from Ecoheatcool and Euroheat 2005-2006, Ecoheat Work package 1: The European heat market. Final report. 10.6 EUR/GJ i s the price of district heat. http://www.solarthermalworld.org/files/Ecoheatcool%20WP1%20Web.pdf?download
  property true value 0.850842
    (same comment as for electricity, for reuse in municipal waste incineration only)
- zinc concentrate: 0 kg; CPC 14290: Other non-ferrous metal ores and concentrates (other than uranium or thorium ores and concentrates); By-product classification allocatable product
  Calculated value from the knowledge of the properties of both products.
  production volume 0.00570211 kg
  property price 0.38 EUR2005; name ByP_price_EUR2005
    Temporary price data. Calculated as 90% of purchasers price based on: Zinc content in concentrate 53%. Concentrate price per kg Zn 86.5% of refined Zn price (13.5% treatment charges according to CHR Metals Limited 2005: Dynamic cost curves. http://www.minecost.com/dynamic.pdf). 2004 zinc price from USGS (2007) Mineral commodity summaries 2007. <http://minerals.usgs.gov/minerals/pubs/mcs/2007/mcs2007.pdf> [Accessed 25 May 2010]
  property zinc content 0.53; name zinc_C_zinc_concentrate
    Zinc content on a dry matter basis. Value taken from teh "zinc mine operation" /GLO dataset.
  property dry mass 1 kg; name DM_zinc_concentrate
  property carbon content 0
    carbon content on a dry matter basis (reserved; not for manual entry)
  property true value 0.00174448
    allocation property applied in "true value" allocation // value calculated from revenue
  properties: wet mass 1 kg, water content 0, carbon content, non-fossil 0, carbon content, fossil 0, water in wet mass 0 kg, carbon allocation 0 kg

## Inputs from technosphere
- waste bitumen: 0 kg; pedigree (1,1,1,1,1)
  Literature
  Uncertainty: L
  production volume 0 kg
    Calculated from the production volume of infrastructure, for regional distribution of oil product in proportion to the respective output amounts.
  properties: carbon content, fossil 0.842657, water content 0.0141988, dry mass 0.986 kg, wet mass 1 kg
- reinforcing steel: 200000 kg; lognormal variance with pedigree 0.07, pedigree (3,5,5,1,1)
  Literature
  Uncertainty: L
  properties: dry mass 1 kg, carbon content, fossil 0.004, wet mass 1 kg
- concrete, normal: 454.999 m3; lognormal variance with pedigree 0.07, pedigree (3,5,5,1,1)
  Literature
  Uncertainty: L
  properties: wet mass 2380 kg, water content 0.086758, dry mass 2190 kg
- waste asphalt: -300000 kg; lognormal variance with pedigree 0.07, pedigree (3,5,5,1,1)
  Literature
  Uncertainty: L
  production volume 300000 kg
    (same comment as for waste bitumen)
  properties: carbon content, fossil 0.0440796, wet mass 1 kg, dry mass 0.999 kg, water content 0.001001
  note on carbon content, fossil: The waste contains 94.7% inert material (see Tab A.5 for details) 5.3% bitumen (see Tab A.6 for details), ecoinvent v2.2 report 13_I
- building, hall: 14300 m2; lognormal variance with pedigree 0.418, pedigree (5,5,5,1,1)
  Estimation 25% of fuel station area
  Uncertainty: E
- pitch: 0 kg; pedigree (1,1,1,1,1)
  Literature
  Uncertainty: L
  properties: carbon content, fossil 0.83, wet mass 1 kg, dry mass 1 kg
- waste concrete: 0 kg; pedigree (1,1,1,1,1)
  Literature
  Uncertainty: L
  production volume 0 kg
    (same comment as for waste bitumen)
  properties: dry mass 0.5 kg, water content 1, wet mass 1 kg
- gravel, round: 300000 kg; lognormal variance with pedigree 0.07, pedigree (3,5,5,1,1)
  Literature
  Uncertainty: L
  properties: wet mass 1 kg, dry mass 1 kg
- waste bitumen: -73089.4, -1910.51 kg (2 entries); lognormal variance with pedigree 0.07, pedigree (3,5,5,1,1)
  Literature
  Uncertainty: L
  production volume 75000 kg
- pitch: 74510, 489.897 kg (2 entries); lognormal variance with pedigree 0.07, pedigree (3,5,5,1,1)
  Literature
  Uncertainty: L
- waste concrete: -996475, -3523.15 kg (2 entries); lognormal variance with pedigree 0.07, pedigree (3,5,5,1,1)
  Literature
  Uncertainty: L
  production volume 1e6 kg

## Inputs from nature
- Transformation, to industrial area [natural resource, land]: 2500 m2; lognormal variance with pedigree 0.19, pedigree (3,5,5,1,1)
  Literature oil storage
  Uncertainty: L
- Occupation, traffic area, road network [natural resource, land]: 4.58999e6 m2*year; lognormal variance with pedigree 0.11, pedigree (3,5,5,1,1)
  Literature, life time 80 years
  Uncertainty: L
- Transformation, to traffic area, road network [natural resource, land]: 57299.9 m2; lognormal variance with pedigree 0.19, pedigree (3,5,5,1,1)
  Literature fuel station
  Uncertainty: L
- Transformation, from unspecified [natural resource, land]: 59799.9 m2; lognormal variance with pedigree 0.19, pedigree (3,5,5,1,1)
  Literature
  Uncertainty: L
- Occupation, industrial area [natural resource, land]: 200000 m2*year; lognormal variance with pedigree 0.11, pedigree (3,5,5,1,1)
  Literature, life time 80 years
  Uncertainty: L

## Sampling procedure
Literature and own estimations.

## Extrapolations
From CH to RER.

## Review by Michael Spielmann (obsolete) 2003-09-12
Passed.
