# treatment of lignite ash, opencast refill

Dataset: EcoSpold 2, unit process
Geography: AT
Time period: 1996-01-01 to 2019-12-31
Technology level: current
Classification: EcoSpold01Categories: waste management/others
Classification: ISIC rev.4 ecoinvent: 3822:Treatment and disposal of hazardous waste
Synonyms: ashes form lignite incineration disposed as backfill in opencast lignite mines
Tags: Treatment; ConvertedDataset
Scenario: Business-as-Usual
System model: Allocation at the point of substitution
Generated by: Gabor Doka (obsolete)
Published in: Doka G. 2008
Database: ecoinvent
isCopyrightProtected: true
accessRestrictedTo: 1

## General comment
backfilled waste composition is (in ppm): H2O n.a.; O n.a.; H n.a.; C n.a.; S 9796.8; N n.a.; P 104.16; B 547.49; Cl 0.78166; Br 4.1688; F 13.028; I 0.5211; Ag n.a.; As 33.611; Ba 260.55; Cd 0.23365; Co 39.083; Cr 52.11; Cu 22.39; Hg 0.041713; Mn 52.11; Mo 18.228; Ni 31.223; Pb 13.768; Sb 10.403; Se 1.4328; Sn 4.1688; V 82.025; Zn 73.989; Be 2.6055; Sc 1.3028; Sr 182.33; Ti 260.55; Tl 0.052048; W 2.6055; Si 125070; Fe 14070; Ca 52110; Al 12246; K 1563.3; Mg 7816.6; Na 2345;
[This dataset was already contained in the ecoinvent database version 2. It was not individually updated during the transfer to ecoinvent version 3. Life Cycle Impact Assessment results may still have changed, as they are affected by changes in the supply chain, i.e. in other datasets. This dataset was generated following the ecoinvent quality guidelines for version 2. It may have been subject to central changes described in the ecoinvent version 3 change report (http://www.ecoinvent.org/database/ecoinvent-version-3/reports-of-changes/), and the results of the central updates were reviewed extensively. The changes added e.g. consistent water flows and other information throughout the database. The documentation of this dataset can be found in the ecoinvent reports of version 2, which are still available via the ecoinvent website. The change report linked above covers all central changes that were made during the conversion process.]

## Included activities end
This module contains only direct emissions from lignite ash used as backfill in opencast lignite mines: short-term emissions (0-100a) and long-term emissions (>100a) both to ground water. E.g. land-use and energy consumption is *not* included.

## Geography
Ash composition calculated from country-specific coal composition (AT) and technology-specific transfer coefficients in power plant.

## Technology
Lignite ash as backfill in lignite opencast mine (together with tailings)

## Reference product
- lignite ash: -1 kg; By-product classification Waste; CPC 39: Wastes or scraps
  EcoSpold01Location=AT
  production volume 1296.59 kg
    Estimated. Electricity and synthetic natural gas production are responsible for more than 90% of lignite use (https://www.lignite.com/about-lignite/lignite-uses/, accessed 20151008) . The production volume is calculated as the sum of lignite ashes resulting from electricity and heat and power co-generation production from lignite, in the respective country.
  property price 0 EUR2005
    Waste products are assigned a price of zero as they are assumed to require further treatment.
  property carbon content 0
    carbon content on a dry matter basis (reserved; not for manual entry)
  properties: carbon content, non-fossil 0, water in wet mass 0 kg, water content 0, carbon content, fossil 0, dry mass 1 kg, wet mass 1 kg, carbon allocation 0 kg

## Emissions to nature
- Selenium [water, ground-, long-term]: 8.8022e-7 kg; lognormal variance with pedigree 1.57, pedigree (1,1,5,1,1)
  Long-term emission from lignite ash backfill. Uncertainty derived from uncertainty in ash composition and uncertainty in transfer coefficients.
- Iron, ion [water, ground-, long-term]: 0.0094024 kg; lognormal variance with pedigree 0.41, pedigree (1,1,5,1,1)
  (same comment as for Selenium)
- Chromium VI [water, ground-]: 7.8594e-6 kg; lognormal variance with pedigree 1.17, pedigree (1,1,5,1,1)
  Short-term emission from lignite ash backfill. Uncertainty derived from uncertainty in ash composition and uncertainty in transfer coefficients.
- Potassium, ion [water, ground-, long-term]: 0.00068115 kg; lognormal variance with pedigree 0.65, pedigree (1,1,5,1,1)
  (same comment as for Selenium)
- Potassium, ion [water, ground-]: 0.00088217 kg; lognormal variance with pedigree 0.65, pedigree (1,1,5,1,1)
  (same comment as for Chromium VI)
- Nickel, ion [water, ground-, long-term]: 3.1176e-5 kg; lognormal variance with pedigree 1.16, pedigree (1,1,5,1,1)
  (same comment as for Selenium)
- Iodide [water, ground-]: 5.211e-7 kg; lognormal variance with pedigree 1.69, pedigree (1,1,5,1,1)
  (same comment as for Chromium VI)
- Fluoride [water, ground-, long-term]: 1.1328e-5 kg; lognormal variance with pedigree 1.27, pedigree (1,1,5,1,1)
  (same comment as for Selenium)
- Scandium [water, ground-]: 3.6818e-7 kg; lognormal variance with pedigree 1.62, pedigree (1,1,5,1,1)
  (same comment as for Chromium VI)
- Aluminium [water, ground-]: 1.5227e-5 kg; lognormal variance with pedigree 1.01, pedigree (1,1,5,1,1)
  (same comment as for Chromium VI)
- Bromine [water, ground-]: 4.0983e-6 kg; lognormal variance with pedigree 1.42, pedigree (1,1,5,1,1)
  (same comment as for Chromium VI)
- Phosphate [water, ground-]: 2.9886e-7 kg; lognormal variance with pedigree 1.66, pedigree (1,1,5,1,1)
  (same comment as for Chromium VI)
- Arsenic, ion [water, ground-]: 3.3611e-5 kg; lognormal variance with pedigree 1.15, pedigree (1,1,5,1,1)
  (same comment as for Chromium VI)
- Barium [water, ground-, long-term]: 0.00026054 kg; lognormal variance with pedigree 0.88, pedigree (1,1,5,1,1)
  (same comment as for Selenium)
- Thallium [water, ground-]: 7.8927e-11 kg; lognormal variance with pedigree 2.58, pedigree (1,1,5,1,1)
  (same comment as for Chromium VI)
- Vanadium, ion [water, ground-, long-term]: 4.4118e-5 kg; lognormal variance with pedigree 1.12, pedigree (1,1,5,1,1)
  (same comment as for Selenium)
- Iodide [water, ground-, long-term]: 5.211e-14 kg; lognormal variance with pedigree 1.72, pedigree (1,1,5,1,1)
  (same comment as for Selenium)
- Calcium, ion [water, ground-]: 1.9723e-5 kg; lognormal variance with pedigree 1, pedigree (1,1,5,1,1)
  (same comment as for Chromium VI)
- Iron, ion [water, ground-]: 1.1773e-7 kg; lognormal variance with pedigree 1.65, pedigree (1,1,5,1,1)
  (same comment as for Chromium VI)
- Strontium [water, ground-, long-term]: 0.00018206 kg; lognormal variance with pedigree 0.92, pedigree (1,1,5,1,1)
  (same comment as for Selenium)
- Mercury [water, ground-, long-term]: 4.1705e-8 kg; lognormal variance with pedigree 2.01, pedigree (1,1,5,1,1)
  (same comment as for Selenium)
- Calcium, ion [water, ground-, long-term]: 0.052091 kg; lognormal variance with pedigree 0.22, pedigree (1,1,5,1,1)
  (same comment as for Selenium)
- Arsenic, ion [water, ground-, long-term]: 3.3611e-14 kg; lognormal variance with pedigree 1.17, pedigree (1,1,5,1,1)
  (same comment as for Selenium)
- Aluminium [water, ground-, long-term]: 0.012231 kg; lognormal variance with pedigree 0.38, pedigree (1,1,5,1,1)
  (same comment as for Selenium)
- Boron [water, ground-]: 4.2896e-6 kg; lognormal variance with pedigree 1.17, pedigree (1,1,5,1,1)
  (same comment as for Chromium VI)
- Silicon [water, ground-, long-term]: 0.089181 kg; lognormal variance with pedigree 0.17, pedigree (1,1,5,1,1)
  (same comment as for Selenium)
- Antimony [water, ground-]: 4.0121e-6 kg; lognormal variance with pedigree 1.33, pedigree (1,1,5,1,1)
  (same comment as for Chromium VI)
- Cadmium, ion [water, ground-]: 6.6441e-12 kg; lognormal variance with pedigree 2.92, pedigree (1,1,5,1,1)
  (same comment as for Chromium VI)
- Strontium [water, ground-]: 2.7649e-7 kg; lognormal variance with pedigree 1.52, pedigree (1,1,5,1,1)
  (same comment as for Chromium VI)
- Beryllium [water, ground-]: 3.9511e-9 kg; lognormal variance with pedigree 2.08, pedigree (1,1,5,1,1)
  (same comment as for Chromium VI)
- Silicon [water, ground-]: 0.00070569 kg; lognormal variance with pedigree 0.58, pedigree (1,1,5,1,1)
  (same comment as for Chromium VI)
- Tin, ion [water, ground-, long-term]: 4.1685e-6 kg; lognormal variance with pedigree 1.42, pedigree (1,1,5,1,1)
  (same comment as for Selenium)
- Copper, ion [water, ground-]: 3.6101e-9 kg; lognormal variance with pedigree 2.09, pedigree (1,1,5,1,1)
  (same comment as for Chromium VI)
- Copper, ion [water, ground-, long-term]: 2.2386e-5 kg; lognormal variance with pedigree 1.2, pedigree (1,1,5,1,1)
  (same comment as for Selenium)
- Sulfate [water, ground-]: 0.0079114 kg; lognormal variance with pedigree 0.46, pedigree (1,1,5,1,1)
  (same comment as for Chromium VI)
- Sodium, ion [water, ground-, long-term]: 0.00072031 kg; lognormal variance with pedigree 0.6, pedigree (1,1,5,1,1)
  (same comment as for Selenium)
- Magnesium [water, ground-]: 3.7201e-6 kg; lognormal variance with pedigree 1.19, pedigree (1,1,5,1,1)
  (same comment as for Chromium VI)
- Chromium VI [water, ground-, long-term]: 5.1683e-6 kg; lognormal variance with pedigree 1.16, pedigree (1,1,5,1,1)
  (same comment as for Selenium)
- Molybdenum [water, ground-, long-term]: 2.4804e-11 kg; lognormal variance with pedigree 1.25, pedigree (1,1,5,1,1)
  (same comment as for Selenium)
- Barium [water, ground-]: 9.0149e-9 kg; lognormal variance with pedigree 1.97, pedigree (1,1,5,1,1)
  (same comment as for Chromium VI)
- Beryllium [water, ground-, long-term]: 2.6016e-6 kg; lognormal variance with pedigree 1.49, pedigree (1,1,5,1,1)
  (same comment as for Selenium)
- Scandium [water, ground-, long-term]: 9.3458e-7 kg; lognormal variance with pedigree 1.58, pedigree (1,1,5,1,1)
  (same comment as for Selenium)
- Antimony [water, ground-, long-term]: 6.3912e-6 kg; lognormal variance with pedigree 1.31, pedigree (1,1,5,1,1)
  (same comment as for Selenium)
- Vanadium, ion [water, ground-]: 5.0413e-7 kg; lognormal variance with pedigree 1.45, pedigree (1,1,5,1,1)
  (same comment as for Chromium VI)
- Phosphate [water, ground-, long-term]: 0.00017902 kg; lognormal variance with pedigree 1.08, pedigree (1,1,5,1,1)
  (same comment as for Selenium)
- Boron [water, ground-, long-term]: 0.00034218 kg; lognormal variance with pedigree 0.83, pedigree (1,1,5,1,1)
  (same comment as for Selenium)
- Mercury [water, ground-]: 8.2472e-12 kg; lognormal variance with pedigree 2.88, pedigree (1,1,5,1,1)
  (same comment as for Chromium VI)
- Manganese [water, ground-]: 1.803e-9 kg; lognormal variance with pedigree 2.18, pedigree (1,1,5,1,1)
  (same comment as for Chromium VI)
- Magnesium [water, ground-, long-term]: 0.0078129 kg; lognormal variance with pedigree 0.44, pedigree (1,1,5,1,1)
  (same comment as for Selenium)
- Sodium, ion [water, ground-]: 0.0016247 kg; lognormal variance with pedigree 0.59, pedigree (1,1,5,1,1)
  (same comment as for Chromium VI)
- Tungsten [water, ground-, long-term]: 1.6007e-6 kg; lognormal variance with pedigree 1.49, pedigree (1,1,5,1,1)
  (same comment as for Selenium)
- Titanium, ion [water, ground-]: 3.2397e-7 kg; lognormal variance with pedigree 1.5, pedigree (1,1,5,1,1)
  (same comment as for Chromium VI)
- Titanium, ion [water, ground-, long-term]: 0.00026023 kg; lognormal variance with pedigree 0.88, pedigree (1,1,5,1,1)
  (same comment as for Selenium)
- Lead [water, ground-]: 2.9913e-10 kg; lognormal variance with pedigree 2.42, pedigree (1,1,5,1,1)
  (same comment as for Chromium VI)
- Molybdenum [water, ground-]: 1.8228e-5 kg; lognormal variance with pedigree 1.23, pedigree (1,1,5,1,1)
  (same comment as for Chromium VI)
- Chloride [water, ground-]: 4.4597e-7 kg; lognormal variance with pedigree 1.65, pedigree (1,1,5,1,1)
  (same comment as for Chromium VI)
- Tungsten [water, ground-]: 1.0048e-6 kg; lognormal variance with pedigree 1.51, pedigree (1,1,5,1,1)
  (same comment as for Chromium VI)
- Chloride [water, ground-, long-term]: 3.3569e-7 kg; lognormal variance with pedigree 1.65, pedigree (1,1,5,1,1)
  (same comment as for Selenium)
- Bromine [water, ground-, long-term]: 7.0498e-8 kg; lognormal variance with pedigree 1.45, pedigree (1,1,5,1,1)
  (same comment as for Selenium)
- Nickel, ion [water, ground-]: 4.7348e-8 kg; lognormal variance with pedigree 1.76, pedigree (1,1,5,1,1)
  (same comment as for Chromium VI)
- Cobalt [water, ground-, long-term]: 3.9055e-5 kg; lognormal variance with pedigree 1.13, pedigree (1,1,5,1,1)
  (same comment as for Selenium)
- Zinc, ion [water, ground-, long-term]: 7.3986e-5 kg; lognormal variance with pedigree 1.04, pedigree (1,1,5,1,1)
  (same comment as for Selenium)
- Sulfate [water, ground-, long-term]: 0.021479 kg; lognormal variance with pedigree 0.41, pedigree (1,1,5,1,1)
  (same comment as for Selenium)
- Selenium [water, ground-]: 5.5256e-7 kg; lognormal variance with pedigree 1.59, pedigree (1,1,5,1,1)
  (same comment as for Chromium VI)
- Thallium [water, ground-, long-term]: 5.1969e-8 kg; lognormal variance with pedigree 1.99, pedigree (1,1,5,1,1)
  (same comment as for Selenium)
- Manganese [water, ground-, long-term]: 5.2109e-5 kg; lognormal variance with pedigree 1.09, pedigree (1,1,5,1,1)
  (same comment as for Selenium)
- Cobalt [water, ground-]: 2.7987e-8 kg; lognormal variance with pedigree 1.82, pedigree (1,1,5,1,1)
  (same comment as for Chromium VI)
- Cadmium, ion [water, ground-, long-term]: 2.3364e-7 kg; lognormal variance with pedigree 1.8, pedigree (1,1,5,1,1)
  (same comment as for Selenium)
- Tin, ion [water, ground-]: 3.3089e-10 kg; lognormal variance with pedigree 2.41, pedigree (1,1,5,1,1)
  (same comment as for Chromium VI)
- Lead [water, ground-, long-term]: 1.3767e-5 kg; lognormal variance with pedigree 1.27, pedigree (1,1,5,1,1)
  (same comment as for Selenium)
- Zinc, ion [water, ground-]: 3.7983e-9 kg; lognormal variance with pedigree 2.09, pedigree (1,1,5,1,1)
  (same comment as for Chromium VI)
- Fluoride [water, ground-]: 1.6996e-6 kg; lognormal variance with pedigree 1.37, pedigree (1,1,5,1,1)
  (same comment as for Chromium VI)

## Sampling procedure
country-specific calculation based on literature data

## Extrapolations
This dataset has been extrapolated from year 2000 to the year of the calculation (2019). The uncertainty has been adjusted accordingly.

## Review by Niels Jungbluth 2009-01-22
passed.
