# synthetic gas production, from wood, at fluidized bed gasifier

Dataset: EcoSpold 2, unit process
Geography: CH
Time period: 1995-01-01 to 2019-12-31
Technology level: current
Classification: EcoSpold01Categories: biomass/fuels
Classification: ISIC rev.4 ecoinvent: 3520:Manufacture of gas; distribution of gaseous fuels through mains
Synonyms: syngas; synthesis gas
Tags: ConvertedDataset
Scenario: Business-as-Usual
System model: Allocation at the point of substitution
Share of production covered: 0 %
Generated by: Edgard Gnansounou
Published in: Jungbluth N. 2007
Database: ecoinvent
isCopyrightProtected: true
accessRestrictedTo: 1

## General comment
Composition (% mol.) of the resulting gas is 15.5% H2, 39.2% CO, 34.9% CO2, 8.7% CH4 and 1.7% CnHm on a nitrogen and water free basis. Nitrogen content is 50.4%. Density is 1.15 kg/Nm3. Lower heating value of the gas is 5.4 MJ/Nm3. Heat is supplied by syngas combustion. Inventory refers to the net production of 1 Nm3 syngas. Net gas yield is 1.984 Nm3/kg of wood (dry matter).
[This dataset was already contained in the ecoinvent database version 2. It was not individually updated during the transfer to ecoinvent version 3. Life Cycle Impact Assessment results may still have changed, as they are affected by changes in the supply chain, i.e. in other datasets. This dataset was generated following the ecoinvent quality guidelines for version 2. It may have been subject to central changes described in the ecoinvent version 3 change report (http://www.ecoinvent.org/database/ecoinvent-version-3/reports-of-changes/), and the results of the central updates were reviewed extensively. The changes added e.g. consistent water flows and other information throughout the database. The documentation of this dataset can be found in the ecoinvent reports of version 2, which are still available via the ecoinvent website. The change report linked above covers all central changes that were made during the conversion process.]

## Included activities end
This process refers to the conversion of wood chips into synthetic gas. It includes drying (down to 10-15% moisture) and further comminution of wood chips (down to a size of 30x30x30 mm), fluidized bed gasification of the wood chips and treatment of the resulting syngas to remove impurities and contaminants.

## Geography
Data from various literatures sources and gasification plants worldwide, and from one pilot plant in CH

## Technology
The technology corresponds to an average indirectly heated, atmospheric, circulating Fluidized bed gasification, followed by a low temperature wet gas treatment. No energy integration with the subsequent processing of the gas is considered. The Fluidized bed gasification plant is typically >10 MWth input capacity.

## Time period
Data from 1995 to 2004, first large scale facilities in the near future

## Parameters
- fraction, process water, to air: 0.15 dimensionless; name fraction_PW_to_air; lognormal variance with pedigree 0.092025, pedigree (4,4,3,2,4)
  Literature value. In case when no industry/process specific data are available, default evaporation fraction value is used. This value is 15% and is based on literature (Statistics Canada, 2007 & Shaffer, K.H., 2008, Consumptive water use in the Great Lakes Basin, USGS & Shiklomanov, 2003, World Water Resources at the Beginning of the 21st Century) and has been approved by an expert.
- fraction, tap water, to air: 0.15; name fraction_TW_to_air; = fraction_PW_to_air; lognormal variance with pedigree 0.092025, pedigree (4,4,3,2,4)
  Calculated value. See comment in the other parametres present in this dataset. Tap water is considered to be always used as process water, thus process water fractions to air are applied to all tap water input flows to calculate the amount of water consumed in the processes.

## Reference product
- synthetic gas: 1 m3; By-product classification allocatable product; CPC 17200: Coal gas, water gas, producer gas and similar gases, other than petroleum gases and other gaseous hydrocarbons
  EcoSpold01Location=CH
  production volume 586920 m3
    In 2004, CH syngas production is limited to 2 pilot-scale Fixed bed gasifiers.
    134 m3 per GWh. 1 pilot plant; 0.5 MW. See dataset on synthetic gas factory construction.
  property carbon content, non-fossil 0.161
    Density of the gas (1.15 kg/Nm3), and its dry mass were used to convert 0.140 kgC/kg in kg C/Nm3. All data from Tab 18.6, ecoinvent v2.2 report n 17.
  property carbon content 0.161
    carbon content on a dry matter basis (reserved; not for manual entry)
  property true value 0.15
    allocation property applied in "true value" allocation // value calculated from revenue
  properties: water in wet mass 0.092 kg, price 0.15 EUR2005, water content 0.0869565, dry mass 1.058 kg, carbon content, fossil 0, wet mass 1.15 kg, carbon allocation 0.170338 kg

## By-products
- electricity, for reuse in municipal waste incineration only: 0 kWh; CPC 17100: Electrical energy; By-product classification allocatable product; pedigree (1,1,1,1,1)
  Net electricity generated from this waste and used in internal MSWI plant energy redistribution.
  Uncertainty: uncertainty is calculated from uncertainties in waste composition and uncertainties in energy efficiency and the uncertainty in internal energy demand
  production volume 0.868591 kWh
  property exergy 3.6 MJ; name E_el_prod_MSWI_exergy
    This exergy property is based on the exergy content of the product.
  property true value relation 3.6; name E_el_prod_MSWI_true_value_relation
    property to calculate "true value" from
  property price 0.1 EUR2005; name E_el_prod_MSWI_price_EUR2005
    Estimated to be the same price as in case of electricity, medium voltage.
  property true value 1.90144e-7
    allocation property applied in "true value" allocation // value calculated from true value relation
- heat, for reuse in municipal waste incineration only: 0 MJ; CPC 17300: Steam and hot water; By-product classification allocatable product; pedigree (1,1,1,1,1)
  Net useful heat generated from this waste and used in internal MSWI plant energy redistribution.
  Uncertainty: uncertainty is calculated from uncertainties in waste composition and uncertainties in energy efficiency and the uncertainty in internal energy demand
  production volume 6.14516 MJ
  property true value relation 0.1842; name E_th_prod_MSWI_true_value_relation
    property to calculate "true value" from
  property exergy 0.1842 MJ; name E_th_prod_MSWI_exergy
    This exergy property is based on the exergy content of the product.
  property price 0.0106 EUR2005; name E_th_prod_MSWI_price_EUR2005
    Average European district heat price from Ecoheatcool and Euroheat 2005-2006, Ecoheat Work package 1: The European heat market. Final report. 10.6 EUR/GJ i s the price of district heat. http://www.solarthermalworld.org/files/Ecoheatcool%20WP1%20Web.pdf?download
  property true value 6.88315e-8
    (same comment as for electricity, for reuse in municipal waste incineration only)
- zinc concentrate: 0 kg; CPC 14290: Other non-ferrous metal ores and concentrates (other than uranium or thorium ores and concentrates); By-product classification allocatable product
  Calculated value from the knowledge of the properties of both products.
  production volume 0.000153741 kg
  property price 0.38 EUR2005; name ByP_price_EUR2005
    Temporary price data. Calculated as 90% of purchasers price based on: Zinc content in concentrate 53%. Concentrate price per kg Zn 86.5% of refined Zn price (13.5% treatment charges according to CHR Metals Limited 2005: Dynamic cost curves. http://www.minecost.com/dynamic.pdf). 2004 zinc price from USGS (2007) Mineral commodity summaries 2007. <http://minerals.usgs.gov/minerals/pubs/mcs/2007/mcs2007.pdf> [Accessed 25 May 2010]
  property zinc content 0.53; name zinc_C_zinc_concentrate
    Zinc content on a dry matter basis. Value taken from teh "zinc mine operation" /GLO dataset.
  property dry mass 1 kg; name DM_zinc_concentrate
  property carbon content 0
    carbon content on a dry matter basis (reserved; not for manual entry)
  property true value 9.95392e-11
    allocation property applied in "true value" allocation // value calculated from revenue
  properties: wet mass 1 kg, water content 0, carbon content, non-fossil 0, carbon content, fossil 0, water in wet mass 0 kg, carbon allocation 0 kg

## Inputs from technosphere
- wood chips, dry, measured as dry mass: 0.0993448 kg; lognormal variance with pedigree 0.069225, pedigree (2,3,5,2,3)
  Yield from literature survey, distribution from IEA Task 33 CH report
  EcoSpold01Location=RER
  Uncertainty: Yield from literature survey, distribution from IEA Task 33 CH report
  properties: water content 0.4, carbon content, non-fossil 0.494, dry mass 1 kg, wet mass 1.4 kg
  note on carbon content, non-fossil: C content of dry mass is 0.494 kgC/kg dry wood (ecoinvent v2.2 report 9).
- dolomite: 0.010157 kg; lognormal variance with pedigree 0.078025, pedigree (4,4,5,2,3)
  EcoSpold01Location=RER
  Average of several literature sources
  Uncertainty: Average of several literature sources
  properties: carbon content, fossil 0.130435, dry mass 1 kg, wet mass 1 kg
- sulfuric acid: 0.00328979 kg; lognormal variance with pedigree 0.070625, pedigree (3,3,5,2,3)
  EcoSpold01Location=RER
  Calculated from a typical quality of untreated syngas from wood
  Uncertainty: Calculated from a typical quality of untreated syngas from wood
  properties: dry mass 1 kg, wet mass 1 kg
- inert waste, for final disposal: -0.022755 kg; lognormal variance with pedigree 0.094025, pedigree (4,5,5,2,3)
  Estimate for the disposal of gasifier bed material
  EcoSpold01Location=CH
  Uncertainty: Estimate for the disposal of gasifier bed material
  production volume 13355.4 kg
    Calculated from the production volume of synthetic gas in proportion to the respective output amounts.
  properties: dry mass 0.995 kg, wet mass 1 kg, water content 0.00502513
- wood chips, wet, measured as dry mass: 0.359558 kg; = 0.2890069+0.070551488; lognormal variance with pedigree 0.069225, pedigree (2,3,5,2,3)
  (same comment as for wood chips, dry, measured as dry mass)
  properties: carbon content, non-fossil 0.494, dry mass 1 kg, water content 1.4, wet mass 2.4 kg
- silica sand: 0.012598 kg; lognormal variance with pedigree 0.078025, pedigree (4,4,5,2,3)
  Average of several literature sources
  EcoSpold01Location=DE
  Uncertainty: Average of several literature sources
  properties: wet mass 1 kg, water content 0.010101, dry mass 0.99 kg
- zeolite, powder: 0.0020803 kg; lognormal variance with pedigree 0.078025, pedigree (4,4,5,2,3)
  (same comment as for dolomite)
  properties: dry mass 1 kg, wet mass 1 kg
- wood ash mixture, pure: -0.00392849 kg; lognormal variance with pedigree 0.069225, pedigree (2,3,5,2,3)
  Average of several literature sources
  EcoSpold01Location=CH
  Uncertainty: Average of several literature sources
  production volume 2305.72 kg
    (same comment as for inert waste, for final disposal)
  properties: carbon content, non-fossil 0.012, wet mass 1 kg, dry mass 1 kg
- industrial furnace, natural gas: 1.8939e-9 unit; lognormal variance with pedigree 0.378025, pedigree (3,5,5,2,3)
  EcoSpold01Location=RER
  Calculation based on energy demand of the process
  Uncertainty: Calculation based on energy demand of the process
- sodium hydroxide, without water, in 50% solution state: 0.000827989 kg; lognormal variance with pedigree 0.070625, pedigree (3,3,5,2,3)
  Calculated from a typical quality of untreated syngas from wood
  EcoSpold01Location=RER
  Uncertainty: Calculated from a typical quality of untreated syngas from wood
  properties: dry mass 1 kg, wet mass 1 kg
- tap water: 0.14326 kg; name tap_water_input; lognormal variance with pedigree 0.078025, pedigree (3,5,5,2,3)
  Weak data, one literature reference only (pilot plant)
  EcoSpold01Location=CH
  Uncertainty: Weak data, one literature reference only (pilot plant)
  properties: carbon content, fossil 0.00178991, dry mass 0.000337476 kg, water content 2962.17, wet mass 1 kg
  note on carbon content, fossil: Bicarbonate content is 2.93 mol/m3. CO2 content is 0.1 mol/m3 (ecoinvent v2.2 report 8, Tab 93.1).
- wastewater, from residence: -6.09449e-5 m3; lognormal variance with pedigree 0.094025, pedigree (4,5,5,2,3)
  Weak data, specific quality of waste water was not considered
  EcoSpold01Location=CH
  Uncertainty: Weak data, specific quality of waste water was not considered
  production volume 35.7698 m3
    (same comment as for inert waste, for final disposal)
  properties: carbon content, non-fossil 0.199421, dry mass 0.337476 kg, wet mass 1000 kg, water content 2962.17
  note on carbon content, non-fossil: 0.0673 kg TOC/m3 (Tab A.17, ecoinvent v2.2 report 13_I). TOC was considered as Total Carbon.
- electricity, medium voltage: 0.026623 kWh; lognormal variance with pedigree 0.070625, pedigree (3,3,5,2,3)
  Several literature sources
  EcoSpold01Location=CH
  Uncertainty: Several literature sources
- synthetic gas factory: 9.33428e-10 unit; lognormal variance with pedigree 0.394025, pedigree (4,5,5,2,3)
  Calculated from the production and input capacity of the reference plant
  EcoSpold01Location=CH
  Uncertainty: Calculated from the production and input capacity of the reference plant
- waste zeolite: -0.0020803 kg; lognormal variance with pedigree 0.094025, pedigree (4,5,5,2,3)
  (same comment as for inert waste, for final disposal)
  production volume 1220.97 kg
    (same comment as for inert waste, for final disposal)
  properties: wet mass 1 kg, dry mass 0.95 kg, water content 0.0526316

## Emissions to nature
- Propionic acid [air, urban air close to ground]: 7.78649e-9 kg; lognormal variance with pedigree 0.3361, pedigree (4,5,5,3,5)
  Calculation, from syngas composition and natural gas combustion
  Uncertainty: Calculation, from syngas composition and natural gas combustion
- Nitrogen oxides [air, urban air close to ground]: 6.96919e-6 kg; lognormal variance with pedigree 0.3361, pedigree (4,5,5,3,5)
  (same comment as for Propionic acid)
- Dinitrogen monoxide [air, urban air close to ground]: 3.89329e-8 kg; lognormal variance with pedigree 0.3361, pedigree (4,5,5,3,5)
  (same comment as for Propionic acid)
- Carbon monoxide, non-fossil [air, urban air close to ground]: 8.17589e-7 kg; lognormal variance with pedigree 0.9361, pedigree (4,5,5,3,5)
  (same comment as for Propionic acid)
- Acetaldehyde [air, urban air close to ground]: 3.89329e-10 kg; lognormal variance with pedigree 0.3361, pedigree (4,5,5,3,5)
  (same comment as for Propionic acid)
- Propane [air, urban air close to ground]: 7.78649e-8 kg; lognormal variance with pedigree 0.3361, pedigree (4,5,5,3,5)
  (same comment as for Propionic acid)
- Sulfur dioxide [air, urban air close to ground]: 2.1413e-7 kg; lognormal variance with pedigree 0.2961, pedigree (4,5,5,3,5)
  (same comment as for Propionic acid)
- Toluene [air, urban air close to ground]: 7.78649e-8 kg; lognormal variance with pedigree 0.3361, pedigree (4,5,5,3,5)
  (same comment as for Propionic acid)
- Water [air, unspecified]: 2.1489e-5 m3; name water_to_air_unspecified; = (tap_water_input/1000*fraction_TW_to_air); lognormal variance with pedigree 0.0807, pedigree (2,2,5,1,1)
  Calculated value based on literature values and expert opinion. See comments in the parametres' comment field.
  property fraction, origin: unspecified 0; name fraction_origin_unspecified
  property fraction, origin: fresh water 1; name fraction_origin_fresh_water
  property fraction, origin: salt water 0; name fraction_origin_salt_water
- Dioxins, measured as 2,3,7,8-tetrachlorodibenzo-p-dioxin [air, urban air close to ground]: 0 kg; pedigree (1,1,1,1,1)
  (same comment as for Propionic acid)
- Formaldehyde [air, urban air close to ground]: 3.89329e-8 kg; lognormal variance with pedigree 0.3361, pedigree (4,5,5,3,5)
  (same comment as for Propionic acid)
- Benzo(a)pyrene [air, urban air close to ground]: 3.89329e-12 kg; lognormal variance with pedigree 0.5961, pedigree (4,5,5,3,5)
  (same comment as for Propionic acid)
- Pentane [air, urban air close to ground]: 4.67189e-7 kg; lognormal variance with pedigree 0.3361, pedigree (4,5,5,3,5)
  (same comment as for Propionic acid)
- Water [water, unspecified]: 2.0301e-5 m3; name water_to_water_unspecified; = (tap_water_input/1000)*(1-fraction_TW_to_air)-0.00010147; lognormal variance with pedigree 0.0807, pedigree (2,2,5,1,1)
  (same comment as for Water)
  property dry mass 0 kg; name DM
  property carbon content, non-fossil 0; name C_content_non_fossil
  property fraction, origin: fresh water 1; name fraction_origin_fresh_water_Ww
  property fraction, origin: unspecified 0; name fraction_origin_unspecified_Ww
  property fraction, origin: salt water 0; name fraction_origin_salt_water_Ww
  property carbon content, fossil 0; name C_content_fossil
  property water in wet mass 1000 kg; name WWM
  property wet mass 1000 kg; name WM
- Mercury [air, urban air close to ground]: 1.168e-11 kg; lognormal variance with pedigree 0.9361, pedigree (4,5,5,3,5)
  (same comment as for Propionic acid)
- Benzene [air, urban air close to ground]: 1.5573e-7 kg; lognormal variance with pedigree 0.3361, pedigree (4,5,5,3,5)
  (same comment as for Propionic acid)
- Acetic acid [air, urban air close to ground]: 5.83989e-8 kg; lognormal variance with pedigree 0.3361, pedigree (4,5,5,3,5)
  (same comment as for Propionic acid)
- Particulates, < 2.5 um [air, urban air close to ground]: 7.78649e-8 kg; lognormal variance with pedigree 0.5961, pedigree (4,5,5,3,5)
  (same comment as for Propionic acid)
- Carbon dioxide, non-fossil [air, urban air close to ground]: 0.321939 kg; lognormal variance with pedigree 0.058025, pedigree (1,1,5,2,3)
  Calculation, to close carbon balance
  Uncertainty: Calculation, to close carbon balance
- Methane, non-fossil [air, urban air close to ground]: 7.78649e-7 kg; lognormal variance with pedigree 0.3361, pedigree (4,5,5,3,5)
  (same comment as for Propionic acid)
- Butane [air, urban air close to ground]: 2.7253e-7 kg; lognormal variance with pedigree 0.3361, pedigree (4,5,5,3,5)
  (same comment as for Propionic acid)
- PAH, polycyclic aromatic hydrocarbons [air, urban air close to ground]: 3.89329e-9 kg; lognormal variance with pedigree 0.5961, pedigree (4,5,5,3,5)
  (same comment as for Propionic acid)

## Sampling procedure
Cross-checking of various literature sources and pilot-to-demonstration plant operation data, adapted to Swiss context

## Review by Niels Jungbluth 2006-10-17
Passed.
none
