# tillage, cultivating, chiselling

Dataset: EcoSpold 2, unit process
Geography: CA-QC
Time period: 1991-01-01 to 2019-12-31
Technology level: current
Classification: EcoSpold01Categories: agricultural means of production/work processes
Classification: ISIC rev.4 ecoinvent: 0161:Support activities for crop production
Scenario: Business-as-Usual
System model: Allocation at the point of substitution
Generated by: Dominique Maxime
Published in: Nemecek, T. 2007
Database: ecoinvent
isCopyrightProtected: true
accessRestrictedTo: 1

## General comment
This dataset represents the service of chiselling 1 ha of agricultural land. A working width average of 3.4 m, used in sandy soil at 10 cm work depth, is considered.
[This dataset was already contained in the ecoinvent database version 2. It was not individually updated during the transfer to ecoinvent version 3. Life Cycle Impact Assessment results may still have changed, as they are affected by changes in the supply chain, i.e. in other datasets. This dataset was generated following the ecoinvent quality guidelines for version 2. It may have been subject to central changes described in the ecoinvent version 3 change report (http://www.ecoinvent.org/database/ecoinvent-version-3/reports-of-changes/), and the results of the central updates were reviewed extensively. The changes added e.g. consistent water flows and other information throughout the database. The documentation of this dataset can be found in the ecoinvent reports of version 2, which are still available via the ecoinvent website. The change report linked above covers all central changes that were made during the conversion process.]
Child dataset exchanges scaled from GLO parent dataset based on diesel consumption in Quebec. Created to proxy farm machinery/fieldwork representative of the Quebec context. Data quality indicators adjusted accordingly. Other difference with the parent dataset is the production volume, which now represents the production volume in Quebec.
Diesel consumption is calculated from primary data and models from the American Society of Agricultural and Biological Engineers (ASABE) published in 2006 and might be representative of more recent technology than the GLO parent dataset.

## Included activities start
Chiselling process starting from preliminary work at farm, like attaching the adequate machinery to the tractor.

## Included activities end
This activity ends with transfer back to farm and concluding work, like uncoupling the machine; The dataset includes transfer to field; field work for an area of land of 1 ha, including turning, idling and overlapping. The inventory takes into account the diesel fuel consumption and the amount of agricultural machinery and of the shed, which has to be attributed to the tillage cultivating by chiseling. Also taken into consideration is the amount of emissions to the air from combustion and the emission to the soil from tyre abrasion during the work process. The dataset does not include dust other than from combustion and noise.

## Geography
Child dataset air emissions related to diesel combustion are scaled from parent dataset (GLO) based on the ratio of diesel consumption in Quebec over diesel consumption of GLO. Created to proxy farm machinery/fieldwork representative of the Quebec context. Data quality indicators adjusted accordingly.
References
CRAAQ 2011
Beauregard, 2013

## Technology
Emissions by the newest models of tractors set into operation during the period from 1999 to 2001.

## Time period
Measurements were made in the last few years (1999-2001).
Diesel consumption is calculated from primary data and models from the American Society of Agricultural and Biological Engineers (ASABE) published in 2006 and might be representative of more recent time period than the GLO parent dataset.

## Parameters
- farm machinery diesel consumption ratio: 0.609032 dimensionless; name machine_diesel_ratio; = qc_diesel/ EI_diesel
  Ratio of diesel consumption for tractor and its machinery: kg diesel per ha of the Quebec machinery/kg diesel per ha of the ecoinvent's parent machinery
- quebec cropped area: 1.87476e6 ha; name qc_crop_area; lognormal variance with pedigree 0.0006, pedigree (1,1,1,1,1)
  Land in crops, Quebec, in 2011. Source: Statistics Canada, 2013. Table 004-0002 - Census of Agriculture, total area of farms and use of farm land, CANSIM (database). (accessed: 2013-11-15) ("Land in crops" includes field crops, vegetables, fruits and nursery crops, and sod.) Statistics Canada
- world arable land area: 1.39628e9 ha; name world_arable_area; lognormal variance with pedigree 0.0006, pedigree (1,1,1,1,1)
  Arable land area, World, in 2011. Source: FAOSTAT, 2013
- quebec diesel consumption: 9.44 kg/ha; name qc_diesel; lognormal variance with pedigree 0.00014121, pedigree (1,2,1,2,1)
  Diesel consumption of tractor and machinery within the Québec context; kg diesel/ha
- ecoinvent diesel consumption: 15.5 kg/ha; name EI_diesel; lognormal variance with pedigree 0.004, pedigree (1,4,1,5,1)
  Diesel consumption in the parent dataset (ecoinvent); kg diesel/ha

## Reference product
- tillage, cultivating, chiselling: 1 ha; CPC 86119: Other support services to crop production; By-product classification allocatable product
  EcoSpold01Location=CH
  production volume 937380 ha; = ParentValue* qc_crop_area/ world_arable_area
    Gross approximation of Quebec production volume using relative value of Quebec cropped area to world arable area.
  property price 19.7216 EUR2005
    Calculated based on inputs: The price of the product has been calculated as a sum of the values of the material and energy inputs for this product. This value is therefore a rough estimation. It may underestimate the real price since there are additional expenses when producing any product. These expences can include for example labour costs, treatment of waste materials and profit for the producer. Please consider carefully whether this level of data quality is acceptable for your application.

## Inputs from technosphere
- shed: 0.00573 m2; = ParentValue; lognormal variance with pedigree 0.344, pedigree (1,4,5,5,1)
  EcoSpold01Location=CH
- tractor, 4-wheel, agricultural: 0.883 kg; = ParentValue; lognormal variance with pedigree 0.044, pedigree (1,4,5,5,1)
  EcoSpold01Location=CH
- agricultural machinery, tillage: 1.48 kg; = ParentValue; lognormal variance with pedigree 0.044, pedigree (1,4,5,5,1)
  EcoSpold01Location=CH
- diesel: 9.44 kg; = ParentValue* machine_diesel_ratio; lognormal variance with pedigree 0.044, pedigree (1,4,5,5,1)
  Scaling to Quebec diesel consumption
  EcoSpold01Location=CH
  properties: wet mass 1 kg, carbon content, fossil 0.865, dry mass 1 kg
  note on carbon content, fossil: C-content of diesel is 86.5% (ecoinvent v2.2 report 6_IV, Tab 3.14)

## Emissions to nature
- Cadmium [air, non-urban air or from high stacks]: 9.44e-8 kg; = ParentValue* machine_diesel_ratio; lognormal variance with pedigree 0.7001, pedigree (1,2,5,5,3)
  Scaling to Quebec diesel consumption
- Copper [air, non-urban air or from high stacks]: 1.60785e-5 kg; = ParentValue* machine_diesel_ratio; lognormal variance with pedigree 0.7001, pedigree (1,2,5,5,3)
  Scaling to Quebec diesel consumption
- Zinc [soil, agricultural]: 0.00112 kg; = ParentValue; lognormal variance with pedigree 0.084, pedigree (1,4,5,5,1)
  Emission from tyre abrasion, not related to diesel consumption
- Sulfur dioxide [air, non-urban air or from high stacks]: 0.0095009 kg; = ParentValue* machine_diesel_ratio; lognormal variance with pedigree 0.0601, pedigree (1,2,5,5,3)
  Scaling to Quebec diesel consumption
- Lead [soil, agricultural]: 1.85e-6 kg; = ParentValue; lognormal variance with pedigree 0.084, pedigree (1,4,5,5,1)
  Emission from tyre abrasion, not related to diesel consumption
- Dinitrogen monoxide [air, non-urban air or from high stacks]: 0.0011328 kg; = ParentValue* machine_diesel_ratio; lognormal variance with pedigree 0.1001, pedigree (1,2,5,5,3)
  Scaling to Quebec diesel consumption
- PAH, polycyclic aromatic hydrocarbons [air, non-urban air or from high stacks]: 3.11215e-5 kg; = ParentValue* machine_diesel_ratio; lognormal variance with pedigree 0.3601, pedigree (1,2,5,5,3)
  Scaling to Quebec diesel consumption
- Benzene [air, non-urban air or from high stacks]: 6.88206e-5 kg; = ParentValue* machine_diesel_ratio; lognormal variance with pedigree 0.1001, pedigree (1,2,5,5,3)
  Scaling to Quebec diesel consumption
- Cadmium [soil, agricultural]: 4.24e-7 kg; = ParentValue; lognormal variance with pedigree 0.084, pedigree (1,4,5,5,1)
  Emission from tyre abrasion, not related to diesel consumption
- Ammonia [air, non-urban air or from high stacks]: 0.0001888 kg; = ParentValue* machine_diesel_ratio; lognormal variance with pedigree 0.1001, pedigree (1,2,5,5,3)
  Scaling to Quebec diesel consumption
- Zinc [air, non-urban air or from high stacks]: 9.44e-6 kg; = ParentValue* machine_diesel_ratio; lognormal variance with pedigree 0.7001, pedigree (1,2,5,5,3)
  Scaling to Quebec diesel consumption
- Nickel [air, non-urban air or from high stacks]: 6.63845e-7 kg; = ParentValue* machine_diesel_ratio; lognormal variance with pedigree 0.7001, pedigree (1,2,5,5,3)
  Scaling to Quebec diesel consumption
- Carbon monoxide, fossil [air, non-urban air or from high stacks]: 0.0791742 kg; = ParentValue* machine_diesel_ratio; lognormal variance with pedigree 0.694, pedigree (1,4,5,5,1)
  Scaling to Quebec diesel consumption
- Selenium [air, non-urban air or from high stacks]: 9.44e-8 kg; = ParentValue* machine_diesel_ratio; lognormal variance with pedigree 0.1001, pedigree (1,2,5,5,3)
  Scaling to Quebec diesel consumption
- NMVOC, non-methane volatile organic compounds, unspecified origin [air, non-urban air or from high stacks]: 0.0183928 kg; = ParentValue* machine_diesel_ratio; lognormal variance with pedigree 0.084, pedigree (1,4,5,5,1)
  Scaling to Quebec diesel consumption
- Particulates, < 2.5 um [air, non-urban air or from high stacks]: 0.0504279 kg; = ParentValue* machine_diesel_ratio; lognormal variance with pedigree 0.3601, pedigree (1,2,5,5,3)
  Scaling to Quebec diesel consumption
- Carbon dioxide, fossil [air, non-urban air or from high stacks]: 29.4163 kg; = ParentValue* machine_diesel_ratio; lognormal variance with pedigree 0.0601, pedigree (1,2,5,5,3)
  Scaling to Quebec diesel consumption
- Benzo(a)pyrene [air, non-urban air or from high stacks]: 2.83809e-7 kg; = ParentValue* machine_diesel_ratio; lognormal variance with pedigree 0.7001, pedigree (1,2,5,5,3)
  Scaling to Quebec diesel consumption
- Chromium [air, non-urban air or from high stacks]: 4.72609e-7 kg; = ParentValue* machine_diesel_ratio; lognormal variance with pedigree 0.7001, pedigree (1,2,5,5,3)
  Scaling to Quebec diesel consumption
- Methane, fossil [air, non-urban air or from high stacks]: 0.00121806 kg; = ParentValue* machine_diesel_ratio; lognormal variance with pedigree 0.1001, pedigree (1,2,5,5,3)
  Scaling to Quebec diesel consumption
- Nitrogen oxides [air, non-urban air or from high stacks]: 0.370292 kg; = ParentValue* machine_diesel_ratio; lognormal variance with pedigree 0.084, pedigree (1,4,5,5,1)
  Scaling to Quebec diesel consumption

## Sampling procedure
The inventoried HC, NOx, CO and fuel consumption values are measurements made following two test cycles (ISO 8178 C1 test and a specific 6-level-test created by the FAT) and on measurements made during the field work. The other emissions were calculated basing on literature data and the measured fuel consumption.

## Extrapolations
This dataset has been extrapolated from year 2002 to the year of the calculation (2019). The uncertainty has been adjusted accordingly.

## Review by Christian Bauer 2013-11-19
passed

## Review by Thomas Nemecek 2013-11-19
The production volume must be updated, since the formula refers to a GLO PV, which has been changed meanwhile.

## Review by Roland Hischier 2003-08-06
Passed.
