# treatment of waste polyvinylfluoride, municipal incineration with fly ash extraction

Dataset: EcoSpold 2, unit process
Geography: CH
Time period: 2006-01-01 to 2019-12-31
Technology level: current
Classification: ISIC rev.4 ecoinvent: 3821:Treatment and disposal of non-hazardous waste
Synonyms: Siedlungsabfallverbrennung; municipal waste incineration; Kehrichtverbrennung
Scenario: Business-as-Usual
System model: Allocation at the point of substitution
Share of production covered: 100 %
Generated by: Gabor Doka
Published in: Doka G. 2015
Database: ecoinvent
isCopyrightProtected: true
accessRestrictedTo: 1

## General comment
This dataset represents the activity of waste disposal of waste polyvinylfluoride in a municipal solid waste incinerator (MSWI) // Recommended use of this dataset: For PVF (Tedlar), which goes to disposal as part of communal waste mixture. // // Waste composition (wet, in ppm): upper heating value 28.09 MJ/kg; lower heating value 27.89 MJ/kg; H2O 2000; O 16911; H 71066; C 570150; S 1057; N 1057; P n.a.; B n.a.; Cl n.a.; Br 73.839; F 329620; I n.a.; Ag n.a.; As 2.0042; Ba 196.73; Cd 2.7546; Co 33.322; Cr 43.106; Cu 28.223; Hg 0.89569; Mn 84.301; Mo n.a.; Ni 21.729; Pb 16.002; Sb 45.323; Se 2.2152; Sn 391.41; V 303.95; Zn 59.775; Be 0.52742; Sc n.a.; Sr 93.353; Ti 1054.8; Tl 0.42194; W n.a.; Si n.a.; Fe 3930; Ca n.a.; Al 210.97; K n.a.; Mg n.a.; Na 1545.9; // Share of carbon in waste that is biogenic 0%. // Share of metals in waste not oxidised and bulk-recyclable (exclude very small or thin parts) Iron: 0%; Alu: 0%; Copper: 0%. // Recovery of metal scrap from bottom ash to recycling: 0g iron scrap, 0g aluminium scrap, 0g copper scrap. From this waste, the FLUWA process in the technology mix recovers 0.00915kg (DM) of a hydroxide sludge to be recycled in zinc furnaces. // Ultimately one kg of this waste produces 0.308 kg of bottom ash (can include some washed ash) and 0.1782 kg of residues, which are landfilled (technology mix). Additional solidification of residues with 0.07127 kg of cement.Net energy production: 3.53MJ/kg electric energy and 6.9MJ/kg thermal energy. //

## Included activities start
waste incineration from waste reception gate and delivery into waste bunker at incinerator plant site (without transports to the incinerator)

## Included activities end
Waste-specific short-term emissions to water from leachate. Long-term emissions from landfill to ground water.

## Geography
Specific to the technology mix encountered in Switzerland in 2012.

## Technology
average Swiss MSWI plants in 2010 (grate incinerators) with electrostatic precipitator for fly ash (ESP), wet flue gas scrubber and 25% SNCR , 42.77% SCR-high dust , 32.68% SCR-low dust -DeNOx facilities and 0% without Denox (weighted according to mass of burnt waste, representing Swiss average). Efficiency of iron scrap separation from slag : 58%. Efficiency of non-ferrous scrap separation from slag : 31%. The technology mix for this dataset includes a filter ash treatment (FLUWA) of a share of 46.22%. Gross electric efficiency technology mix 15.84% and Gross thermal efficiency technology mix 28.51%

## Time period
Waste composition as given in literature reference, theoretical data or other source. Transfer coefficients for modern MSWI.

## Reference product
- waste polyvinylfluoride: 0 kg; CPC 39270: Waste, parings and scrap of plastics; By-product classification Waste
  Main reference product of this activity (supply of disposal service).
  production volume 0 kg
    based on corresponding global production volume of MSW fraction in conventional MSWI (wo fly ash extraction) and scaled down to annual Swiss incinerated MSW mass of 3.02 mio. tonnes.
  property price 0 EUR2005
    Waste products are assigned a price of zero as they are assumed to require further treatment.
  property carbon content 0.571291
    carbon content on a dry matter basis (reserved; not for manual entry)
  properties: fluorine content 0.33028, arsenic content 2.0082e-6, hydrogen content 0.071208, sulfur content 0.0010591, oxygen content 0.016945, copper content 2.828e-5, nitrogen content 0.0010591, barium content 0.00019712, bromine content 7.3987e-5, mercury content 8.9749e-7, beryllium content 5.2848e-7, chromium content 4.3192e-5, nickel content 2.1772e-5, manganese content 8.447e-5, cadmium content 2.7601e-6, lead content 1.6034e-5, cobalt content 3.3389e-5, selenium content 2.2196e-6, titanium content 0.001057, vanadium content 0.00030456, strontium content 9.354e-5, zinc content 5.9894e-5, tin content 0.0003922, antimony content 4.5414e-5, water in wet mass 0.002 kg, iron content 0.0039379, aluminium content 0.00021139, carbon content, fossil 0.571291, dry mass 0.998 kg, sodium content 0.001549, water content 0.00200401, thallium content 4.2278e-7, wet mass 1 kg, carbon allocation 0.570148 kg
- electricity, for reuse in municipal waste incineration only: 1 kWh; CPC 17100: Electrical energy; By-product classification allocatable product; pedigree (1,1,1,1,1)
  Net electricity generated from this waste and used in internal MSWI plant energy redistribution.
  Uncertainty: uncertainty is calculated from uncertainties in waste composition and uncertainties in energy efficiency and the uncertainty in internal energy demand
  production volume 1.9604e6 kWh

## By-products
- heat, for reuse in municipal waste incineration only: 0 MJ; name E_th_prod_MSWI; CPC 17300: Steam and hot water; By-product classification allocatable product; pedigree (1,1,1,1,1)
  Net useful heat generated from this waste and used in internal MSWI plant energy redistribution.
  Uncertainty: uncertainty is calculated from uncertainties in waste composition and uncertainties in energy efficiency and the uncertainty in internal energy demand
  production volume 0 MJ
    calculated in proportion to reference product waste input to incinerator
  property true value relation 0.1842; name E_th_prod_MSWI_true_value_relation
    property to calculate "true value" from
  property exergy 0.1842 MJ; name E_th_prod_MSWI_exergy
    This exergy property is based on the exergy content of the product.
  property price 0.0106 EUR2005; name E_th_prod_MSWI_price_EUR2005
    Average European district heat price from Ecoheatcool and Euroheat 2005-2006, Ecoheat Work package 1: The European heat market. Final report. 10.6 EUR/GJ i s the price of district heat. http://www.solarthermalworld.org/files/Ecoheatcool%20WP1%20Web.pdf?download
- electricity, for reuse in municipal waste incineration only: 0 kWh; name E_el_prod_MSWI; CPC 17100: Electrical energy; By-product classification allocatable product; pedigree (1,1,1,1,1)
  (same comment as for electricity, for reuse in municipal waste incineration only)
  production volume 0 kWh
    calculated in proportion to reference product waste input to incinerator
  property exergy 3.6 MJ; name E_el_prod_MSWI_exergy
    This exergy property is based on the exergy content of the product.
  property price 0.1 EUR2005; name E_el_prod_MSWI_price_EUR2005
    Estimated to be the same price as in case of electricity, medium voltage.
  property true value relation 3.6; name E_el_prod_MSWI_true_value_relation
    property to calculate "true value" from
- zinc concentrate: 0 kg; CPC 14290: Other non-ferrous metal ores and concentrates (other than uranium or thorium ores and concentrates); By-product classification allocatable product
  Calculated value from the knowledge of the properties of both products.
  property price 0.38 EUR2005; name ByP_price_EUR2005
    Temporary price data. Calculated as 90% of purchasers price based on: Zinc content in concentrate 53%. Concentrate price per kg Zn 86.5% of refined Zn price (13.5% treatment charges according to CHR Metals Limited 2005: Dynamic cost curves. http://www.minecost.com/dynamic.pdf). 2004 zinc price from USGS (2007) Mineral commodity summaries 2007. <http://minerals.usgs.gov/minerals/pubs/mcs/2007/mcs2007.pdf> [Accessed 25 May 2010]
  property zinc content 0.53; name zinc_C_zinc_concentrate
    Zinc content on a dry matter basis. Value taken from teh "zinc mine operation" /GLO dataset.
  property dry mass 1 kg; name DM_zinc_concentrate
  property carbon content 0
    carbon content on a dry matter basis (reserved; not for manual entry)
  properties: wet mass 1 kg, water content 0, carbon content, non-fossil 0, carbon content, fossil 0, water in wet mass 0 kg, carbon allocation 0 kg

## Inputs from technosphere
- slag landfill: 0 unit; pedigree (1,1,1,1,1)
  Landfill infrastructure required for landfilling of bottom ash.
  Uncertainty: uncertainty is calculated from uncertainties in waste composition and transfer coefficients in incinerator
- chemical, inorganic: 0 kg; pedigree (1,1,1,1,1)
  Auxilliary inputs for the wastewater treatment stage of the incinerator plant. Proxy for Polyelectrolyte.
  Uncertainty: uncertainty calculated from uncertainty in average Polyelectrolyte input, of transfer coefficients in the incinerator, and the uncertainty of the waste composition of this waste
  properties: dry mass 1 kg, carbon content, fossil 0.003, wet mass 1 kg
- sodium hydroxide, without water, in 50% solution state: 0 kg; pedigree (1,1,1,1,1)
  Auxilliary inputs for the flue gas treatment stage of the incinerator plant, and partially in the filter ash treatment (FLUWA).
  Uncertainty: uncertainty calculated from uncertainty in average NaOH input, of transfer coefficients in the incinerator, and the uncertainty of the waste composition of this waste
  properties: dry mass 1 kg, wet mass 1 kg
- transport, freight, lorry, unspecified: 0 metric ton*km; pedigree (1,1,1,1,1)
  Transport services to transport incineration residues to landfills and filter ash to external treatments (FLUWA).
  Uncertainty: uncertainty calculated from uncertainty of the waste composition of this waste, uncertainty of transfer coefficients and the uncertainty in generic transportation distances
- process-specific burdens, slag landfill: 0 kg; pedigree (1,1,1,1,1)
  Mass-specific expenditures required for landfilling of bottom ash.;activityLink introduced to establish a direct link to the corresponding regional supply of this product
  Uncertainty: uncertainty is calculated from uncertainties in waste composition and transfer coefficients in incinerator
- chromium oxide, flakes: 0 kg; pedigree (1,1,1,1,1)
  Input to DeNOx stage. Active component in SCR catalyst (vanadium pentoxide, V2O5), here approximated with the available chromium trioxide.
  Uncertainty: uncertainty calculated from uncertainty in average DeNOx input, uncertainty in the share of thermal NOx, uncertainty of nitrogen content in average municipal waste and the uncertainty in nitrogen content in *this* waste.
  properties: wet mass 1 kg, dry mass 1 kg
- quicklime, milled, packed: 0 kg; pedigree (1,1,1,1,1)
  Auxilliary inputs for the flue gas treatment stage of the incinerator plant.
  Uncertainty: uncertainty calculated from uncertainty in average CaO input, of transfer coefficients in the incinerator, and the uncertainty of the waste composition of this waste
  properties: water content 0.010101, wet mass 1 kg, dry mass 0.99 kg
- iron (III) chloride, without water, in 40% solution state: 0 kg; pedigree (1,1,1,1,1)
  Auxilliary inputs for the wastewater treatment stage of the incinerator plant.
  Uncertainty: uncertainty calculated from uncertainty in average FeCl3 input, of transfer coefficients in the incinerator, and the uncertainty of the waste composition of this waste
  properties: dry mass 1 kg, wet mass 1 kg
- municipal waste incineration facility: 0 unit
  Demands per kilogram waste.
- ammonia, liquid: 0 kg; pedigree (1,1,1,1,1)
  Input to DeNOx stage (100% NH3).
  Uncertainty: uncertainty calculated from uncertainty in average DeNOx input, uncertainty in the share of thermal NOx, uncertainty of nitrogen content in average municipal waste and the uncertainty in nitrogen content in *this* waste.
  properties: wet mass 1 kg, dry mass 1 kg
- hydrochloric acid, without water, in 30% solution state: 0 kg; pedigree (1,1,1,1,1)
  Auxilliary inputs for the wastewater treatment stage of the incinerator plant.
  Uncertainty: uncertainty calculated from uncertainty in average HCl input, of transfer coefficients in the incinerator, and the uncertainty of the waste composition of this waste
  properties: wet mass 1 kg, dry mass 1 kg
- waste cement, hydrated: 0 kg; pedigree (1,1,1,1,1)
  Hydrated cement output for solidification of landfilled residual material.
  Uncertainty: Uncertainty calculated from uncertainty of the waste composition of this waste and transfer coefficients in the incinerator and of the solidification recipe.
  production volume 0 kg
    calculated in proportion to reference product waste input to incinerator
  properties: dry mass 1 kg, wet mass 1 kg
- chemical, organic: 0 kg; pedigree (1,1,1,1,1)
  Auxilliary inputs for the wastewater treatment stage of the incinerator plant. Proxy for (pure) Trisodium-trimercapto-s-triazine (CAS 17766-26-6), used as 15% diluted solution, aka TMT15.
  Uncertainty: uncertainty calculated from uncertainty in average TMT15 input, of transfer coefficients in the incinerator, and the uncertainty of the waste composition of this waste
  properties: dry mass 1 kg, wet mass 1 kg, carbon content, fossil 0.628
- residual material landfill: 0 unit; pedigree (1,1,1,1,1)
  Landfill infrastructure required for landfilling of incineration residues.
  Uncertainty: uncertainty is calculated from uncertainties in waste composition and transfer coefficients in incinerator
- cationic resin: 0 kg; pedigree (1,1,1,1,1)
  Auxilliary input for mercury removal in filter ash treatment (FLUWA).
  Uncertainty: uncertainty calculated from uncertainty in of transfer coefficients in the incinerator, and the uncertainty of the waste composition of this waste
  properties: dry mass 0.5 kg, water content 1, carbon content, fossil 0.521606, wet mass 1 kg
- hydrogen peroxide, without water, in 50% solution state: 0 kg; pedigree (1,1,1,1,1)
  Auxilliary oxidising agent for filter ash treatment (FLUWA).
  Uncertainty: uncertainty calculated from uncertainty in of transfer coefficients in the incinerator, and the uncertainty of the waste composition of this waste
  properties: dry mass 1 kg, wet mass 1 kg
- spent activated carbon with mercury: 0 kg; pedigree (1,1,1,1,1)
  Spent ion exchanger charged with mercury, from FLUWA filter ash treatment, approximated here with Spent activated carbon with mercury, deposited undergound in a polyethylene Big Bag.
  Uncertainty: uncertainty calculated from uncertainty in of transfer coefficients in the incinerator, and the uncertainty of the waste composition of this waste.
  production volume 0 kg; = ABS(Ref('0423e508-6886-4d3b-88a8-abfa1100967d', 'ProductionVolume') * (Ref('85451e9e-28f5-4b59-8712-510e2a333d30') / Ref('0423e508-6886-4d3b-88a8-abfa1100967d')))
    Calculated from production volume of reference product using the relative outputs.
  properties: wet mass 1 kg, dry mass 1 kg, carbon content, fossil 0.6
- cement, unspecified: 0 kg; pedigree (1,1,1,1,1)
  Cement required for solidification of landfilled residual material.
  Uncertainty: Uncertainty calculated from uncertainty of the waste composition of this waste, of transfer coefficients in the incinerator and of the solidification recipe.
  properties: wet mass 1 kg, dry mass 1 kg
- titanium dioxide: 0 kg; pedigree (1,1,1,1,1)
  Input to DeNOx stage (TiO2 catalyst carrier)
  Uncertainty: uncertainty calculated from uncertainty in average DeNOx input, uncertainty in the share of thermal NOx, uncertainty of nitrogen content in average municipal waste and the uncertainty in nitrogen content in *this* waste.
  properties: dry mass 1 kg, wet mass 1 kg
- process-specific burdens, residual material landfill: 0 kg; pedigree (1,1,1,1,1)
  Mass-specific expenditures required for landfilling of incineration residues.;activityLink introduced to establish a direct link to the corresponding regional supply of this product
  Uncertainty: uncertainty is calculated from uncertainties in waste composition and transfer coefficients in incinerator
- heat, district or industrial, natural gas: 0.000111619 MJ; lognormal variance with pedigree 0.2319, pedigree (1,1,3,1,1)
  Input to DeNOx stage, to heat up flue gas in low-dust SCR.
  Uncertainty: uncertainty calculated from uncertainty in average DeNOx input, uncertainty in the share of thermal NOx, uncertainty of nitrogen content in average municipal waste and the uncertainty in nitrogen content in *this* waste.
- water, decarbonised: 0 kg; pedigree (1,1,1,1,1)
  Incinerator process water used in flue gas scrubber stage.
  Uncertainty: uncertainty calculated from uncertainty in average water input, and the uncertainty of the waste composition of this waste
  properties: wet mass 1 kg
- metalliferous hydroxide sludge: 0 kg; pedigree (1,1,1,1,1)
  Metalliferous hydroxide sludge from filter ash leaching (FLUWA).
  Uncertainty: uncertainty is calculated from uncertainties in waste composition and transfer coefficients to filter ash in incinerator and the uncertainty of the transfer coefficients of the FLUWA process.
  production volume 0 kg
    calculated in proportion to reference product waste input to incinerator
  properties: sodium content 0.0013878, zinc content 0.0011523, dry mass 0.25 kg, price 0.0042 EUR2005, wet mass 1 kg, water content 3, carbon content, fossil 0.0032412, oxygen content 0.46078, fluorine content 0.52557, bromine content 0.00015939, vanadium content 0.00018923, sulfur content 0.0071045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
- building, hall, steel construction: 1.09994e-9 m2; lognormal variance with pedigree 0.442, pedigree (4,4,5,5,4)
  Rough estimation based on company data of similar branch
  This exchange has an activity link directly to the producing activity because the product is primarily consumed in the same geographical area where it is produced.
- tetrafluoroethylene: 2.59985e-7 kg; lognormal variance with pedigree 0.070625, pedigree (2,4,5,2,3)
  Value for expected serial production
  Value for expected serial production
- water, deionised: 2.99983e-8 kg; lognormal variance with pedigree 0.072025, pedigree (3,4,5,2,3)
  Data from 3kWel unit for use in photovoltaics
  Data from 3kWel unit for use in photovoltaics
- platinum: 3.74978e-9 kg; lognormal variance with pedigree 0.070625, pedigree (2,4,5,2,3)
  Value for expected serial production
  Value for expected serial production
- glass fibre: 4.99971e-7 kg; lognormal variance with pedigree 0.070625, pedigree (2,4,5,2,3)
  Value for expected serial production
  Value for expected serial production
- phenolic resin: 5.49968e-6 kg; lognormal variance with pedigree 0.072025, pedigree (3,4,5,2,3)
  High value for a future serial production
  High value for a future serial production
- waste polyvinylfluoride: -5.78478e-5 kg; lognormal variance with pedigree 0.070625, pedigree (2,4,5,2,3)
  Disposal of membrane material
  Disposal of membrane material
  production volume 0.104 kg
- electricity, medium voltage: 8.44951e-5 kWh; lognormal variance with pedigree 0.070625, pedigree (2,4,5,2,3)
  Approximation with company data of similar branch
  Approximation with company data of similar branch
- steel, chromium steel 18/8, hot rolled: 4.99971e-7 kg; lognormal variance with pedigree 0.070625, pedigree (2,4,5,2,3)
  Value for expected serial production
  Value for expected serial production
- waste plastic, industrial electronics: -3.30381e-5 kg; lognormal variance with pedigree 0.140025, pedigree (4,4,5,2,4)
  Proxy for disposal of moulded bipolar plates
  Proxy for disposal of moulded bipolar plates
  production volume 13.216 kg
- carbon black: 3.99977e-9 kg; lognormal variance with pedigree 0.280025, pedigree (4,4,5,2,5)
  Proxy for activated carbon
  Proxy for activated carbon
- aluminium, wrought alloy: 1.49991e-6 kg; lognormal variance with pedigree 0.070625, pedigree (2,4,5,2,3)
  Value for expected serial production
  Value for expected serial production
- isopropanol: 4.74972e-8 kg; lognormal variance with pedigree 0.072025, pedigree (3,4,5,2,3)
  Approximation based on similar process
  Approximation based on similar process
- building, multi-storey: 6.49962e-9 m3; lognormal variance with pedigree 0.442, pedigree (4,4,5,5,4)
  Rough estimation based on company data of similar branch
  Rough estimation based on company data of similar branch
- graphite: 2.24987e-5 kg; lognormal variance with pedigree 0.072025, pedigree (3,4,5,2,3)
  High value for a future serial production
  High value for a future serial production
- brazing solder, cadmium free: 4.18471e-6 kg; lognormal variance with pedigree 0.0421, pedigree (1,4,5,3,1)
  De Wild 2007, Sn60Pb40 plating on tabbing material, Sn plating on interconnect/terminal ribbons
  EcoSpold01Location=RER
  Uncertainty: de Wild 2007, Sn60Pb40 plating on tabbing material, Sn plating on interconnect/terminal ribbons
- ethylvinylacetate, foil: 0.000464589 kg; lognormal variance with pedigree 0.0421, pedigree (1,4,5,3,1)
  EcoSpold01Location=RER
  De Wild 2007, EVA consumption 0.96 kg/m2, 6% more than glass area
  Uncertainty: de Wild 2007, EVA consumption 0.96 kg/m2, 6% more than glass area
- waste plastic, mixture: -0.000792451 kg; lognormal variance with pedigree 0.0421, pedigree (1,4,5,3,1)
  EcoSpold01Location=CH
  Calculation, including disposal of the panel after life time
  Uncertainty: Calculation, including disposal of the panel after life time
  production volume 5.48669e6 kg
- wastewater, from residence: -9.87245e-6 m3; lognormal variance with pedigree 0.0421, pedigree (1,4,5,3,1)
  Calculation, water use
  EcoSpold01Location=CH
  Uncertainty: Calculation, water use
  production volume 69266.2 m3
- tempering, flat glass: 0.00467464 kg; lognormal variance with pedigree 0.0421, pedigree (1,4,5,3,1)
  EcoSpold01Location=RER
  De Wild 2007
  Uncertainty: de Wild 2007
- solar glass, low-iron: 0.00467464 kg; lognormal variance with pedigree 0.0601, pedigree (1,4,5,3,3)
  De Wild 2007, 4mm thickness (3.2-4 mm for different producers), 1% losses, density 2.5 g/cm3
  EcoSpold01Location=RER
  Uncertainty: de Wild 2007, 4mm thickness (3.2-4 mm for different producers), 1% losses, density 2.5 g/cm3
- glass fibre reinforced plastic, polyamide, injection moulded: 8.87394e-5 kg; lognormal variance with pedigree 0.0421, pedigree (1,4,5,3,1)
  De Wild 2007, polyphenylenoxid for junction box
  EcoSpold01Location=RER
  Uncertainty: de Wild 2007, polyphenylenoxid for junction box
- lubricating oil: 7.4528e-7 kg; lognormal variance with pedigree 0.0421, pedigree (1,4,5,3,1)
  EcoSpold01Location=RER
  GSS 2001, auxiliary material
  Uncertainty: GSS 2001, auxiliary material
- vinyl acetate: 7.62209e-7 kg; lognormal variance with pedigree 0.0421, pedigree (1,4,5,3,1)
  EcoSpold01Location=RER
  GSS 2001, ethylacetat, auxiliary material
  Uncertainty: GSS 2001, ethylacetat, auxiliary material
- nickel, 99.5%: 7.54927e-8 kg; lognormal variance with pedigree 0.0421, pedigree (1,4,5,3,1)
  De Wild 2007, plating on interconnect ribbons
  EcoSpold01Location=GLO
  Uncertainty: de Wild 2007, plating on interconnect ribbons
- wire drawing, copper: 5.22656e-5 kg; lognormal variance with pedigree 0.0421, pedigree (1,4,5,3,1)
  Estimation for use of copper wires
  EcoSpold01Location=RER
  Uncertainty: estimation for use of copper wires
- municipal solid waste: -1.52471e-5 kg; lognormal variance with pedigree 0.0421, pedigree (1,4,5,3,1)
  Alsema (personal communication) 2007, production waste
  EcoSpold01Location=CH
  Uncertainty: Alsema (personal communication) 2007, production waste
  production volume 97622.1 kg
- acetone, liquid: 6.01039e-6 kg; lognormal variance with pedigree 0.0421, pedigree (1,4,5,3,1)
  EcoSpold01Location=RER
  De Wild 2007, cleaning fluid
  Uncertainty: de Wild 2007, cleaning fluid
- heat, district or industrial, natural gas: 0.00225703 MJ; lognormal variance with pedigree 0.0426, pedigree (3,3,5,1,1)
  Calculated mean figure of 3 companies
  EcoSpold01Location=RER
  Uncertainty: calculated mean figure of 3 companies
- photovoltaic cell, multi-Si wafer: 6.68583e-5 m2; lognormal variance with pedigree 0.0421, pedigree (1,4,5,3,1)
  EcoSpold01Location=RER
  De Wild 2007, Estimation 60 cells a 1.56dm2 +2% cell loss
  Uncertainty: de Wild 2007, Estimation 60 cells a 1.56dm2 +2% cell loss
- silicone product: 5.65604e-5 kg; lognormal variance with pedigree 0.0421, pedigree (1,4,5,3,1)
  De Wild 2007, kit to attach frame and junction box and for diaphragm of laminator
  EcoSpold01Location=RER
  Uncertainty: de Wild 2007, kit to attach frame and junction box and for diaphragm of laminator
- methanol: 9.99768e-7 kg; lognormal variance with pedigree 0.0421, pedigree (1,4,5,3,1)
  GSS 2001, auxiliary material
  EcoSpold01Location=CH
  Uncertainty: GSS 2001, auxiliary material
- copper: 5.53174e-5 kg; lognormal variance with pedigree 0.0421, pedigree (1,4,5,3,1)
  EcoSpold01Location=RER
  De Wild 2007, copper ribbons for cell interconnection
  Uncertainty: de Wild 2007, copper ribbons for cell interconnection
- electricity, medium voltage: 0.00261622 kWh; lognormal variance with pedigree 0.0426, pedigree (3,3,5,1,1)
  EcoSpold01Location=UCTE
  Calculated mean figure of 3 companies
  Uncertainty: calculated mean figure of 3 companies
- polyvinylfluoride, film: 5.68221e-5 kg; lognormal variance with pedigree 0.0421, pedigree (1,4,5,3,1)
  EcoSpold01Location=US
  De Wild 2007, back foil, for solar cell module, 350 micron thickness: 2x37 micron polyvinyl fluoride, 250 micron polyethylene terephthalate; 0.488 g/m2, 7% cutting loss
  Uncertainty: de Wild 2007, back foil, for solar cell module, 350 micron thickness: 2x37 micron polyvinyl fluoride, 250 micron polyethylene terephthalate; 0.488 g/m2, 7% cutting loss
- corrugated board box: 0.000508139 kg; lognormal variance with pedigree 0.0421, pedigree (1,4,5,3,1)
  De Wild 2007, packaging estimation
  EcoSpold01Location=RER
  Uncertainty: de Wild 2007, packaging estimation
- polyethylene terephthalate, granulate, amorphous: 0.000172984 kg; lognormal variance with pedigree 0.0421, pedigree (1,4,5,3,1)
  De Wild 2007, back foil, for solar cell module, 350 micron thickness: 2x37 micron polyvinyl fluoride, 250 micron polyethylene terephthalate; 0.488 g/m2, 7% cutting loss
  EcoSpold01Location=RER
  Uncertainty: de Wild 2007, back foil, for solar cell module, 350 micron thickness: 2x37 micron polyvinyl fluoride, 250 micron polyethylene terephthalate; 0.488 g/m2, 7% cutting loss
- 1-propanol: 3.77468e-6 kg; lognormal variance with pedigree 0.0421, pedigree (1,4,5,3,1)
  De Wild 2007, soldering flux, 95% propanol
  EcoSpold01Location=RER
  Uncertainty: de Wild 2007, soldering flux, 95% propanol
- photovoltaic panel factory: 2.03783e-9 unit; lognormal variance with pedigree 0.3421, pedigree (1,4,5,3,1)
  Literature
  EcoSpold01Location=GLO
  Uncertainty: Literature
- tap water: 0.0114346 kg; lognormal variance with pedigree 0.0421, pedigree (1,4,5,3,1)
  De Wild 2007, glass rinsing and general use
  EcoSpold01Location=RER
  Uncertainty: de Wild 2007, glass rinsing and general use
- waste mineral oil: -7.28425e-7, -1.6855e-8 kg (2 suppliers, which the file names only by identifier); sum of these -7.4528e-7 kg; lognormal variance with pedigree 0.0421, pedigree (1,4,5,3,1)
  EcoSpold01Location=CH
  Calculation, oil used during production
  Uncertainty: Calculation, oil used during production
  production volume 5228.97 kg
- photovoltaic cell, ribbon-Si: 0.000298735 m2; lognormal variance with pedigree 0.0421, pedigree (1,4,5,3,1)
  (same comment as for photovoltaic cell, multi-Si wafer)
- photovoltaic cell, single-Si wafer: 6.68583e-5 m2; lognormal variance with pedigree 0.0421, pedigree (1,4,5,3,1)
  De Wild 2007, Estimation 60 cells a 1.56dm2 +2% cell loss
  EcoSpold01Location=RER
  Uncertainty: de Wild 2007, Estimation 60 cells a 1.56dm2 +2% cell loss
- aluminium alloy, AlMg3: 0.000416378 kg; lognormal variance with pedigree 0.0421, pedigree (1,4,5,3,1)
  De Wild 2007, profile for frame
  EcoSpold01Location=RER
  Uncertainty: de Wild 2007, profile for frame
- extrusion, plastic pipes: 2.75134e-5 kg; lognormal variance with pedigree 0.002, pedigree (1,1,3,1,1)
  Calculated value.
  Uncertainty: Calculated variable. Uncertainty will be determined from propagation of uncertainty factors of underlying variables. Uncertainty of actual relation between variables not accounted for at this time, although this could be included in a future update.
- polyvinylfluoride: 5.14477e-5 kg; lognormal variance with pedigree 0.0146, pedigree (3,4,3,1,3)
  Extrapolated process. This process reprensents mass of polyvinylidene fluoride. Value based on calculation based literature data.
- injection moulding: 9.99614e-6 kg; lognormal variance with pedigree 0.002, pedigree (1,1,3,1,1)
  (same comment as for extrusion, plastic pipes)
- acrylonitrile-butadiene-styrene copolymer: 3.75095e-5 kg; lognormal variance with pedigree 0.002, pedigree (1,1,3,1,1)
  (same comment as for extrusion, plastic pipes)
- polyurethane, rigid foam: 1.87358e-6, 3.79377e-6 kg (2 suppliers, which the file names only by identifier); sum of these 5.66735e-6 kg; lognormal variance with pedigree 0.0146, pedigree (3,4,3,1,3)
  Extrapolated process. This process is used ot reprensents mass of cured urethane glue. Value is based on measurements and data from specs sheet of a selected representative membrane module (UNA-620A, Pall corporation).
- waste polyvinylfluoride: -5.0682e-5 kg
  production volume 9.9817e9 kg
- waste plastic, mixture: -8.0468e-7, -3.32361e-7, -3.15608e-7, -1.20432e-5, -1.3427e-7, -6.08566e-8, -2.91632e-5 kg (7 suppliers, which the file names only by identifier); sum of these -4.28542e-5 kg
  production volume 1.09956e9 kg
- waste polyurethane: -5.45509e-7, -4.20556e-8, -1.73705e-8, -1.64949e-8, -6.29422e-7, -7.01746e-9, -3.18059e-9, -4.4063e-6 kg (8 suppliers, which the file names only by identifier); sum of these -5.66735e-6 kg
  production volume 1.09956e9 kg
- soft solder, Sn97Cu3: 4.43111e-7 kg; lognormal variance with pedigree 0.0446, pedigree (3,3,5,5,1)
  EcoSpold01Location=RER
  Solder tin
  Uncertainty: Solder tin
- silicon tetrahydride: 1.63347e-7 kg; lognormal variance with pedigree 0.0446, pedigree (3,3,5,5,1)
  EcoSpold01Location=RER
  Pacca 2006
  Uncertainty: Pacca 2006
- steel, low-alloyed, hot rolled: 4.39938e-5 kg; lognormal variance with pedigree 0.0446, pedigree (3,3,5,5,1)
  Pacca 2006
  Uncertainty: Pacca 2006
- packaging film, low density polyethylene: 1.41491e-5 kg; lognormal variance with pedigree 0.0446, pedigree (3,3,5,5,1)
  EcoSpold01Location=RER
  Madico, window film
  Uncertainty: Madico, window film
- wastewater from glass production: -1.81131e-6 m3; lognormal variance with pedigree 0.0606, pedigree (4,3,5,5,1)
  EcoSpold01Location=CH
  Calculation with water use
  Uncertainty: Calculation with water use
  production volume 44482.2 m3
- cadmium telluride, semiconductor-grade: 4.08029e-8 kg; lognormal variance with pedigree 0.064, pedigree (3,4,5,5,3)
  EcoSpold01Location=US
  Cadmium stannate (Cd2SnO4), amount less than 0.05%
  Uncertainty: Cadmium stannate (Cd2SnO4), amount less than 0.05%
- oxygen, liquid: 2.21556e-8 kg; lognormal variance with pedigree 0.0446, pedigree (3,3,5,5,1)
  EcoSpold01Location=RER
  Pacca 2006
  Uncertainty: Pacca 2006
- indium: 4.08029e-8 kg; lognormal variance with pedigree 0.064, pedigree (3,4,5,5,3)
  EcoSpold01Location=RER
  Indium tin oxide, amount less than 0.05%
  Uncertainty: Indium tin oxide, amount less than 0.05%
- polyethylene, low density, granulate: 8.41689e-7 kg; lognormal variance with pedigree 0.0446, pedigree (3,3,5,5,1)
  EcoSpold01Location=RER
  Pacca 2006
  Uncertainty: Pacca 2006
- synthetic rubber: 3.08523e-6 kg; lognormal variance with pedigree 0.0446, pedigree (3,3,5,5,1)
  Duraseal, coating of cables and rubber wire insulation
  EcoSpold01Location=RER
  Uncertainty: Duraseal, coating of cables and rubber wire insulation
- phosphoric acid, fertiliser grade, without water, in 70% solution state: 3.42401e-9 kg; lognormal variance with pedigree 0.0446, pedigree (3,3,5,5,1)
  EcoSpold01Location=US
  Phosphine (H3P)
  Uncertainty: Phosphine (H3P)
- wire drawing, copper: 3.05181e-6 kg; lognormal variance with pedigree 0.0606, pedigree (4,3,5,5,1)
  EcoSpold01Location=RER
  Assumption
  Uncertainty: Assumption
- hydrogen, liquid: 9.97608e-7 kg; lognormal variance with pedigree 0.0446, pedigree (3,3,5,5,1)
  EcoSpold01Location=RER
  Pacca 2006
  Uncertainty: Pacca 2006
- polyethylene, high density, granulate: 5.0168e-5 kg; lognormal variance with pedigree 0.0446, pedigree (3,3,5,5,1)
  EcoSpold01Location=RER
  Pacca 2006
  Uncertainty: Pacca 2006
- tap water: 4.3867e-6, 3.64425e-5, 7.24974e-6, 0.00018281, 4.75575e-6, 1.35277e-5 kg (6 suppliers, which the file names only by identifier); sum of these 0.000249172 kg; lognormal variance with pedigree 0.0446, pedigree (3,3,5,5,1)
  Pacca 2006
  EcoSpold01Location=RER
  Uncertainty: Pacca 2006
- municipal solid waste: -2.26921e-8, -5.71785e-9, -8.17114e-9 kg (3 suppliers, which the file names only by identifier); sum of these -3.65811e-8 kg; lognormal variance with pedigree 0.044, pedigree (1,4,5,5,1)
  EcoSpold01Location=CH
  Alsema (personal communication) 2007, production waste
  Uncertainty: Alsema (personal communication) 2007, production waste
  production volume 33637.5 kg
- waste rubber, unspecified: -1.24299e-7, -2.96093e-6 kg (2 suppliers, which the file names only by identifier); sum of these -3.08523e-6 kg; lognormal variance with pedigree 0.0606, pedigree (4,3,5,5,1)
  Calculation for end of life disposal
  EcoSpold01Location=CH
  Uncertainty: Calculation for end of life disposal
  production volume 75767.3 kg
- electricity, medium voltage: 2.96958e-5, 5.40338e-6, 0.000124726, 9.16332e-5, 0.00132859, 0.000190146 kWh (6 suppliers, which the file names only by identifier); sum of these 0.00177019 kWh; lognormal variance with pedigree 0.0446, pedigree (3,3,5,5,1)
  Pacca 2006
  EcoSpold01Location=US
  Uncertainty: Pacca 2006
- heat, district or industrial, other than natural gas: 4.1923e-6, 0.000251278 MJ (2 suppliers, which the file names only by identifier); sum of these 0.00025547 MJ; lognormal variance with pedigree 0.0446, pedigree (3,3,5,5,1)
  Pacca 2006
  EcoSpold01Location=RER
  Uncertainty: Pacca 2006

## Inputs from nature
- Oxygen [natural resource, in air]: 0 kg; pedigree (1,1,1,1,1)
  Oxygen from ambient air needed to combust and oxidise this waste. Net demand, i.e. without O2 leaving the plant in flue gas uncombusted.
  Uncertainty: uncertainty is calculated from uncertainties in waste composition and transfer coefficients to flue gas and soild residues in incinerator
- Occupation, industrial area [natural resource, land]: 1.97489e-7 m2*year; lognormal variance with pedigree 0.182, pedigree (4,4,5,5,4)
  Rough estimation based on company data of similar branch
- Transformation, to industrial area [natural resource, land]: 3.99977e-9 m2; lognormal variance with pedigree 0.262, pedigree (4,4,5,5,4)
  Rough estimation based on company data of similar branch
- Transformation, from unspecified [natural resource, land]: 3.99977e-9 m2; lognormal variance with pedigree 0.262, pedigree (4,4,5,5,4)
  Rough estimation based on company data of similar branch

## Emissions to nature
- Chromium VI [water, ground-, long-term]: 0 kg; pedigree (1,1,1,1,1)
  Long-term emissions from landfilling of incineration residues.
  Uncertainty: uncertainty is calculated from uncertainties in waste composition and transfer coefficients in incinerator and landfills.
- Chromium VI [water, surface water]: 0 kg; pedigree (1,1,1,1,1)
  Emissions to water from waste composition and transfer coefficients in incinerator and landfills.
  Uncertainty: uncertainty is calculated from uncertainties in waste composition and transfer coefficients in incinerator and landfills
- Nitrogen oxides [air, urban air close to ground]: 0 kg; pedigree (1,1,1,1,1)
  Sum of fuel-Nox and thermal-NOx emitted to air after DeNOx stage.
  Uncertainty: uncertainty calculated from uncertainty in average N-emissions and uncertainty in the share of thermal NOx and the uncertainty in nitrogen content in *this* waste.
- Cobalt [water, ground-, long-term]: 0 kg; pedigree (1,1,1,1,1)
  (same comment as for Chromium VI)
- Copper, ion [water, surface water]: 0 kg; pedigree (1,1,1,1,1)
  (same comment as for Chromium VI)
- Ammonia [air, urban air close to ground]: 0 kg; pedigree (1,1,1,1,1)
  Nitrogen species emitted to air after DeNOx stage.
  Uncertainty: uncertainty calculated from uncertainty in average N-emissions and uncertainty in the share of thermal NOx and the uncertainty in nitrogen content in *this* waste.
- Copper, ion [water, ground-, long-term]: 0 kg; pedigree (1,1,1,1,1)
  (same comment as for Chromium VI)
- Mercury [water, surface water]: 0 kg; pedigree (1,1,1,1,1)
  (same comment as for Chromium VI)
- Dinitrogen monoxide [air, urban air close to ground]: 0 kg; pedigree (1,1,1,1,1)
  (same comment as for Ammonia)
- Manganese [water, ground-, long-term]: 0 kg; pedigree (1,1,1,1,1)
  (same comment as for Chromium VI)
- Manganese [water, surface water]: 0 kg; pedigree (1,1,1,1,1)
  (same comment as for Chromium VI)
- Cyanide [air, urban air close to ground]: 0 kg; pedigree (1,1,1,1,1)
  (same comment as for Ammonia)
- Mercury [water, ground-, long-term]: 0 kg; pedigree (1,1,1,1,1)
  (same comment as for Chromium VI)
- Nickel, ion [water, surface water]: 0 kg; pedigree (1,1,1,1,1)
  (same comment as for Chromium VI)
- Bromine [air, urban air close to ground]: 0 kg; pedigree (1,1,1,1,1)
  Emission to air from waste composition and transfer coefficients.
  Uncertainty: uncertainty is calculated from uncertainties in waste composition and transfer coefficients in incinerator
- Nickel, ion [water, ground-, long-term]: 0 kg; pedigree (1,1,1,1,1)
  (same comment as for Chromium VI)
- Lead [water, surface water]: 0 kg; pedigree (1,1,1,1,1)
  (same comment as for Chromium VI)
- Hydrogen fluoride [air, urban air close to ground]: 0 kg; pedigree (1,1,1,1,1)
  (same comment as for Bromine)
- Lead [water, ground-, long-term]: 0 kg; pedigree (1,1,1,1,1)
  (same comment as for Chromium VI)
- Antimony [water, surface water]: 0 kg; pedigree (1,1,1,1,1)
  (same comment as for Chromium VI)
- Arsenic [air, urban air close to ground]: 0 kg; pedigree (1,1,1,1,1)
  (same comment as for Bromine)
- Antimony [water, ground-, long-term]: 0 kg; pedigree (1,1,1,1,1)
  (same comment as for Chromium VI)
- Selenium [water, surface water]: 0 kg; pedigree (1,1,1,1,1)
  (same comment as for Chromium VI)
- Barium [air, urban air close to ground]: 0 kg; pedigree (1,1,1,1,1)
  (same comment as for Bromine)
- Selenium [water, ground-, long-term]: 0 kg; pedigree (1,1,1,1,1)
  (same comment as for Chromium VI)
- Cadmium [air, urban air close to ground]: 0 kg; pedigree (1,1,1,1,1)
  (same comment as for Bromine)
- Tin, ion [water, ground-, long-term]: 0 kg; pedigree (1,1,1,1,1)
  (same comment as for Chromium VI)
- Cobalt [air, urban air close to ground]: 0 kg; pedigree (1,1,1,1,1)
  (same comment as for Bromine)
- Vanadium, ion [water, ground-, long-term]: 0 kg; pedigree (1,1,1,1,1)
  (same comment as for Chromium VI)
- Chromium [air, urban air close to ground]: 0 kg; pedigree (1,1,1,1,1)
  (same comment as for Bromine)
- Zinc, ion [water, ground-, long-term]: 0 kg; pedigree (1,1,1,1,1)
  (same comment as for Chromium VI)
- Copper [air, urban air close to ground]: 0 kg; pedigree (1,1,1,1,1)
  (same comment as for Bromine)
- Beryllium [water, ground-, long-term]: 0 kg; pedigree (1,1,1,1,1)
  (same comment as for Chromium VI)
- Mercury [air, urban air close to ground]: 0 kg; pedigree (1,1,1,1,1)
  (same comment as for Bromine)
- Strontium [water, ground-, long-term]: 0 kg; pedigree (1,1,1,1,1)
  (same comment as for Chromium VI)
- Manganese [air, urban air close to ground]: 0 kg; pedigree (1,1,1,1,1)
  (same comment as for Bromine)
- Titanium, ion [water, ground-, long-term]: 0 kg; pedigree (1,1,1,1,1)
  (same comment as for Chromium VI)
- Nickel [air, urban air close to ground]: 0 kg; pedigree (1,1,1,1,1)
  (same comment as for Bromine)
- Thallium [water, ground-, long-term]: 0 kg; pedigree (1,1,1,1,1)
  (same comment as for Chromium VI)
- Tin, ion [water, surface water]: 0 kg; pedigree (1,1,1,1,1)
  (same comment as for Chromium VI)
- Lead [air, urban air close to ground]: 0 kg; pedigree (1,1,1,1,1)
  (same comment as for Bromine)
- Silicon [water, ground-, long-term]: 0 kg; pedigree (1,1,1,1,1)
  (same comment as for Chromium VI)
- Vanadium, ion [water, surface water]: 0 kg; pedigree (1,1,1,1,1)
  (same comment as for Chromium VI)
- Antimony [air, urban air close to ground]: 0 kg; pedigree (1,1,1,1,1)
  (same comment as for Bromine)
- Iron, ion [water, ground-, long-term]: 0 kg; pedigree (1,1,1,1,1)
  (same comment as for Chromium VI)
- Zinc, ion [water, surface water]: 0 kg; pedigree (1,1,1,1,1)
  (same comment as for Chromium VI)
- Selenium [air, urban air close to ground]: 0 kg; pedigree (1,1,1,1,1)
  (same comment as for Bromine)
- Calcium, ion [water, ground-, long-term]: 0 kg; pedigree (1,1,1,1,1)
  (same comment as for Chromium VI)
- Beryllium [water, surface water]: 0 kg; pedigree (1,1,1,1,1)
  (same comment as for Chromium VI)
- Tin [air, urban air close to ground]: 0 kg; pedigree (1,1,1,1,1)
  (same comment as for Bromine)
- Aluminium [water, ground-, long-term]: 0 kg; pedigree (1,1,1,1,1)
  (same comment as for Chromium VI)
- Strontium [water, surface water]: 0 kg; pedigree (1,1,1,1,1)
  (same comment as for Chromium VI)
- Vanadium [air, urban air close to ground]: 0 kg; pedigree (1,1,1,1,1)
  (same comment as for Bromine)
- Sodium, ion [water, ground-, long-term]: 0 kg; pedigree (1,1,1,1,1)
  (same comment as for Chromium VI)
- Titanium, ion [water, surface water]: 0 kg; pedigree (1,1,1,1,1)
  (same comment as for Chromium VI)
- Zinc [air, urban air close to ground]: 0 kg; pedigree (1,1,1,1,1)
  (same comment as for Bromine)
- NMVOC, non-methane volatile organic compounds, unspecified origin [air, urban air close to ground]: 0 kg; pedigree (1,1,1,1,1)
  Incomplete combustion product emitted to air.
  Uncertainty: uncertainty calculated from uncertainty in average operation emissions, and the uncertainty of the flue gas volume from this waste.
- Thallium [water, surface water]: 0 kg; pedigree (1,1,1,1,1)
  (same comment as for Chromium VI)
- Strontium [air, urban air close to ground]: 0 kg; pedigree (1,1,1,1,1)
  (same comment as for Bromine)
- Particulates, < 2.5 um [air, urban air close to ground]: 0 kg; pedigree (1,1,1,1,1)
  (same comment as for NMVOC, non-methane volatile organic compounds, unspecified origin)
- Silicon [water, surface water]: 0 kg; pedigree (1,1,1,1,1)
  (same comment as for Chromium VI)
- Titanium [air, urban air close to ground]: 0 kg; pedigree (1,1,1,1,1)
  (same comment as for Bromine)
- Particulates, > 2.5 um, and < 10um [air, urban air close to ground]: 0 kg; pedigree (1,1,1,1,1)
  (same comment as for NMVOC, non-methane volatile organic compounds, unspecified origin)
- Iron, ion [water, surface water]: 0 kg; pedigree (1,1,1,1,1)
  (same comment as for Chromium VI)
- Thallium [air, urban air close to ground]: 0 kg; pedigree (1,1,1,1,1)
  (same comment as for Bromine)
- Dioxins, measured as 2,3,7,8-tetrachlorodibenzo-p-dioxin [air, urban air close to ground]: 0 kg; pedigree (1,1,1,1,1)
  (same comment as for NMVOC, non-methane volatile organic compounds, unspecified origin)
- Calcium, ion [water, surface water]: 0 kg; pedigree (1,1,1,1,1)
  (same comment as for Chromium VI)
- Iron [air, urban air close to ground]: 0 kg; pedigree (1,1,1,1,1)
  (same comment as for Bromine)
- Benzene [air, urban air close to ground]: 0 kg; pedigree (1,1,1,1,1)
  (same comment as for NMVOC, non-methane volatile organic compounds, unspecified origin)
- Aluminium [water, surface water]: 0 kg; pedigree (1,1,1,1,1)
  (same comment as for Chromium VI)
- Aluminium [air, urban air close to ground]: 0 kg; pedigree (1,1,1,1,1)
  (same comment as for Bromine)
- Toluene [air, urban air close to ground]: 0 kg; pedigree (1,1,1,1,1)
  (same comment as for NMVOC, non-methane volatile organic compounds, unspecified origin)
- Sodium, ion [water, surface water]: 0 kg; pedigree (1,1,1,1,1)
  (same comment as for Chromium VI)
- Sodium [air, urban air close to ground]: 0 kg; pedigree (1,1,1,1,1)
  (same comment as for Bromine)
- Benzene, pentachloro- [air, urban air close to ground]: 0 kg; pedigree (1,1,1,1,1)
  (same comment as for NMVOC, non-methane volatile organic compounds, unspecified origin)
- Chromium, ion [water, surface water]: 0 kg; pedigree (1,1,1,1,1)
  (same comment as for Chromium VI)
- COD, Chemical Oxygen Demand [water, surface water]: 0 kg; pedigree (1,1,1,1,1)
  (same comment as for Chromium VI)
- Benzene, hexachloro- [air, urban air close to ground]: 0 kg; pedigree (1,1,1,1,1)
  (same comment as for NMVOC, non-methane volatile organic compounds, unspecified origin)
- COD, Chemical Oxygen Demand [water, ground-, long-term]: 0 kg; pedigree (1,1,1,1,1)
  (same comment as for Chromium VI)
- BOD5, Biological Oxygen Demand [water, surface water]: 0 kg; pedigree (1,1,1,1,1)
  (same comment as for Chromium VI)
- Phenol, pentachloro- [air, urban air close to ground]: 0 kg; pedigree (1,1,1,1,1)
  (same comment as for NMVOC, non-methane volatile organic compounds, unspecified origin)
- TOC, Total Organic Carbon [water, ground-, long-term]: 0 kg; pedigree (1,1,1,1,1)
  (same comment as for Chromium VI)
- TOC, Total Organic Carbon [water, surface water]: 0 kg; pedigree (1,1,1,1,1)
  (same comment as for Chromium VI)
- Benzo(a)pyrene [air, urban air close to ground]: 0 kg; pedigree (1,1,1,1,1)
  (same comment as for NMVOC, non-methane volatile organic compounds, unspecified origin)
- BOD5, Biological Oxygen Demand [water, ground-, long-term]: 0 kg; pedigree (1,1,1,1,1)
  (same comment as for Chromium VI)
- Sulfate [water, surface water]: 0 kg; pedigree (1,1,1,1,1)
  (same comment as for Chromium VI)
- Heat, waste [air, urban air close to ground]: 0 MJ; pedigree (1,1,1,1,1)
  Waste heat generated from heating value of this waste plus any electricity required to process it.
  Uncertainty: uncertainty is calculated from uncertainties in waste composition and uncertainties in energy efficiency and the uncertainty in internal energy demand
- DOC, Dissolved Organic Carbon [water, ground-, long-term]: 0 kg; pedigree (1,1,1,1,1)
  (same comment as for Chromium VI)
- DOC, Dissolved Organic Carbon [water, surface water]: 0 kg; pedigree (1,1,1,1,1)
  (same comment as for Chromium VI)
- Heat, waste [water, surface water]: 0 MJ; pedigree (1,1,1,1,1)
  (same comment as for Heat, waste)
- Sulfate [water, ground-, long-term]: 0 kg; pedigree (1,1,1,1,1)
  (same comment as for Chromium VI)
- Nitrate [water, surface water]: 0 kg; pedigree (1,1,1,1,1)
  (same comment as for Chromium VI)
- Water [water, surface water]: 0 m3; pedigree (1,1,1,1,1)
  Process water released to surface water.
  Uncertainty: uncertainty calculated from uncertainty in process water input and the uncertainty of fraction to surface water.
- Bromine [water, ground-, long-term]: 0 kg; pedigree (1,1,1,1,1)
  (same comment as for Chromium VI)
- Bromine [water, surface water]: 0 kg; pedigree (1,1,1,1,1)
  (same comment as for Chromium VI)
- Water [air, urban air close to ground]: 0 m3; pedigree (1,1,1,1,1)
  Water vapour from waste humidity, hydrogen oxidation and part of the process water.
  Uncertainty: Uncertainty calculated from uncertainty in waste composition, process water input and the uncertainty of fraction to air.
- Nitrate [water, ground-, long-term]: 0 kg; pedigree (1,1,1,1,1)
  (same comment as for Chromium VI)
- Fluoride [water, surface water]: 0 kg; pedigree (1,1,1,1,1)
  (same comment as for Chromium VI)
- Fluoride [water, ground-, long-term]: 0 kg; pedigree (1,1,1,1,1)
  (same comment as for Chromium VI)
- Arsenic, ion [water, surface water]: 0 kg; pedigree (1,1,1,1,1)
  (same comment as for Chromium VI)
- Carbon monoxide, fossil [air, urban air close to ground]: 0 kg; pedigree (1,1,1,1,1)
  (same comment as for NMVOC, non-methane volatile organic compounds, unspecified origin)
- Barium [water, ground-, long-term]: 0 kg; pedigree (1,1,1,1,1)
  (same comment as for Chromium VI)
- Barium [water, surface water]: 0 kg; pedigree (1,1,1,1,1)
  (same comment as for Chromium VI)
- Carbon dioxide, fossil [air, urban air close to ground]: 0 kg; pedigree (1,1,1,1,1)
  (same comment as for Bromine)
- Arsenic, ion [water, ground-, long-term]: 0 kg; pedigree (1,1,1,1,1)
  (same comment as for Chromium VI)
- Cadmium, ion [water, surface water]: 0 kg; pedigree (1,1,1,1,1)
  (same comment as for Chromium VI)
- Methane, fossil [air, urban air close to ground]: 0 kg; pedigree (1,1,1,1,1)
  (same comment as for NMVOC, non-methane volatile organic compounds, unspecified origin)
- Cadmium, ion [water, ground-, long-term]: 0 kg; pedigree (1,1,1,1,1)
  (same comment as for Chromium VI)
- Cobalt [water, surface water]: 0 kg; pedigree (1,1,1,1,1)
  (same comment as for Chromium VI)
- Sulfur dioxide [air, urban air close to ground]: 0 kg; pedigree (1,1,1,1,1)
  (same comment as for Bromine)
- Propanol [air, urban air close to ground]: 4.74972e-8 kg; lognormal variance with pedigree 0.118025, pedigree (4,4,5,2,3)
  Estimation based on material input
- Water [water, unspecified]: 2.54985e-11 m3; lognormal variance with pedigree 0.0807, pedigree (2,2,5,1,1)
  Calculated value based on literature values and expert opinion. See comments in the parametres' comment field.
- Water [air, unspecified]: 1.48087e-6 m3; lognormal variance with pedigree 0.0807, pedigree (2,2,5,1,1)
  (same comment as for Water)
