# anti-reflex-coating, etching, solar glass

Dataset: EcoSpold 2, unit process
Geography: DK
Time period: 2002-01-01 to 2019-12-31
Technology level: current
Classification: ISIC rev.4 ecoinvent: 2310:Manufacture of glass and glass products
Classification: EcoSpold01Categories: glass/construction
Tags: ConvertedDataset
Scenario: Business-as-Usual
System model: Allocation at the point of substitution
Share of production covered: 100 %
Generated by: Niels Jungbluth
Published in: Kellenberger D. 2007
Database: ecoinvent
isCopyrightProtected: true
accessRestrictedTo: 1

## General comment
The filter cake contains silicone-sodium-fluoride and calcium carbonates or oxides. They can be disposed with the normal household wastes. Standard distances have been assumed for the transport. The exhausts from the treatment chambers go through a so-called air-scrubber (air/water cleaner). The waste material from the scrubber is collected with the water from rinsing of the glasses between the different operations of the treatment and from the final cleaning. This liquid is then passed through a waste water treatment system, resulting in clean water, to be used again in process. The dry matters from the filter press consist of non-aggressive and non-toxic materials, mainly silica-, sodium-, fluoride- and calcium- carbonates and oxides
[This dataset was already contained in the ecoinvent database version 2. It was not individually updated during the transfer to ecoinvent version 3. Life Cycle Impact Assessment results may still have changed, as they are affected by changes in the supply chain, i.e. in other datasets. This dataset was generated following the ecoinvent quality guidelines for version 2. It may have been subject to central changes described in the ecoinvent version 3 change report (http://www.ecoinvent.org/database/ecoinvent-version-3/reports-of-changes/), and the results of the central updates were reviewed extensively. The changes added e.g. consistent water flows and other information throughout the database. The documentation of this dataset can be found in the ecoinvent reports of version 2, which are still available via the ecoinvent website. The change report linked above covers all central changes that were made during the conversion process.]

## Included activities end
Gate to gate inventory for the process including cleaning, etching and clarification and drying. Losses of glass are not included.

## Geography
Production plant in DK. Some pre-products and waste treatment services estimated with European and Swiss data.

## Technology
The antireflection microstructure is impressed on the solar glass by an automatic etching procedure. Etching is made with fluorosilic acid (H2(SiF6). It is possible to produce a film layer on structured and smooth float glass as well as on tempered or un-tempered glasses.

## Time period
Time of information

## Parameters
- fraction, tap water, to air: 0.15; name fraction_TW_to_air; = fraction_PW_to_air; lognormal variance with pedigree 0.092025, pedigree (4,4,3,2,4)
  Calculated value. See comment in the other parametres present in this dataset. Tap water is considered to be always used as process water, thus process water fractions to air are applied to all tap water input flows to calculate the amount of water consumed in the processes.
- fraction, process water, to air: 0.15 dimensionless; name fraction_PW_to_air; lognormal variance with pedigree 0.092025, pedigree (4,4,3,2,4)
  Literature value. In case when no industry/process specific data are available, default evaporation fraction value is used. This value is 15% and is based on literature (Statistics Canada, 2007 & Shaffer, K.H., 2008, Consumptive water use in the Great Lakes Basin, USGS & Shiklomanov, 2003, World Water Resources at the Beginning of the 21st Century) and has been approved by an expert.

## Reference product
- anti-reflex-coating, etching, solar glass: 1 m2; CPC 35110: Paints and varnishes and related products; By-product classification allocatable product
  EcoSpold01Location=DK
  production volume 0.0225477 m2
    This is a placeholder value that does not reflect real-world production volumes. This dataset does not currently require a real-world production volume to work in the database framework, and no actual data were collected yet. This has no negative effect on the results of the ecoinvent database. The placeholder value of this activity was scaled according to the nominal GDP of 2005 (source: United Nations, http://data.un.org/Glossary.aspx?q=GDP+%28current+US%24%29, accessed 20130726) to reflect an appropriate share of the global production volume, which is also a placeholder value.
  property price 4.38 EUR2005
    Calculated from `Tempering, flat glass', by assuming the cost is the same per MJ Natural gas used.
  property true value 4.38
    allocation property applied in "true value" allocation // value calculated from revenue

## By-products
- heat, for reuse in municipal waste incineration only: 0 MJ; CPC 17300: Steam and hot water; By-product classification allocatable product; pedigree (1,1,1,1,1)
  Net electricity generated from this waste and used in internal MSWI plant energy redistribution.
  Uncertainty: uncertainty is calculated from uncertainties in waste composition and uncertainties in energy efficiency and the uncertainty in internal energy demand
  production volume 0.000641746 MJ
  property exergy 0.1842 MJ; name E_th_prod_MSWI_exergy
    This exergy property is based on the exergy content of the product.
  property price 0.0106 EUR2005; name E_th_prod_MSWI_price_EUR2005
    Average European district heat price from Ecoheatcool and Euroheat 2005-2006, Ecoheat Work package 1: The European heat market. Final report. 10.6 EUR/GJ i s the price of district heat. http://www.solarthermalworld.org/files/Ecoheatcool%20WP1%20Web.pdf?download
  property true value relation 0.1842; name E_th_prod_MSWI_true_value_relation
    property to calculate "true value" from
  property true value 4.23096e-6
    allocation property applied in "true value" allocation // value calculated from true value relation
- electricity, for reuse in municipal waste incineration only: 0 kWh; CPC 17100: Electrical energy; By-product classification allocatable product; pedigree (1,1,1,1,1)
  (same comment as for heat, for reuse in municipal waste incineration only)
  production volume 8.91312e-5 kWh
  property price 0.1 EUR2005; name E_el_prod_MSWI_price_EUR2005
    Estimated to be the same price as in case of electricity, medium voltage.
  property exergy 3.6 MJ; name E_el_prod_MSWI_exergy
    This exergy property is based on the exergy content of the product.
  property true value relation 3.6; name E_el_prod_MSWI_true_value_relation
    property to calculate "true value" from
  property true value 1.14847e-5
    (same comment as for heat, for reuse in municipal waste incineration only)

## Inputs from technosphere
All rows: lognormal variance with pedigree 0.0406, pedigree (2,1,5,1,1)
- electricity, low voltage: 1.2 kWh
  EcoSpold01Location=DK
  Data provided by manufacturer, all electricity uses in the plant
  Uncertainty: Data provided by manufacturer, all electricity uses in the plant
- heat, district or industrial, natural gas: 6.53398 MJ
  EcoSpold01Location=RER
  Data provided by manufacturer including also room heating
  Uncertainty: Data provided by manufacturer including also room heating
- glass etching factory: 1.99999e-7 unit
  EcoSpold01Location=DK
  Data provided by manufacturer
  Uncertainty: Data provided by manufacturer
- fluosilicic acid, without water, in 22% solution state: 0.133 kg
  Data provided by manufacturer
  EcoSpold01Location=RER
  Uncertainty: Data provided by manufacturer
  properties: dry mass 1 kg, wet mass 1 kg
- lime, hydrated, packed: 0.0199999 kg
  EcoSpold01Location=CH
  Data provided by manufacturer
  Uncertainty: Data provided by manufacturer
  properties: water content 0.00300903, wet mass 1 kg, dry mass 0.997 kg
- wastewater, unpolluted, from residence: -0.00999996 m3
  EcoSpold01Location=CH
  Data provided by manufacturer, fluoride emission separate considered
  Uncertainty: Data provided by manufacturer, fluoride emission separate considered
  production volume 0.01 m3
    Calculated from the production volume of anti-reflex-coating, etching, solar glass in proportion to the respective output amounts.
  properties: water content 2962.17, carbon content, fossil 0.00178991, dry mass 0.337476 kg, wet mass 1000 kg
  note on carbon content, fossil: Assumed to be like in tap water. Bicarbonate content is 2.93 mol/m3. CO2 content is 0.1 mol/m3 (ecoinvent v2.2 report 8, Tab 93.1).
- tap water: 9.99996 kg; name tap_water_input
  EcoSpold01Location=RER
  Data provided by manufacturer
  Uncertainty: Data provided by manufacturer
  properties: water content 2962.17, carbon content, fossil 0.00178991, dry mass 0.000337476 kg, wet mass 1 kg
  note on carbon content, fossil: Bicarbonate content is 2.93 mol/m3. CO2 content is 0.1 mol/m3 (ecoinvent v2.2 report 8, Tab 93.1).
- refinery sludge: -0.0249999 kg
  (same comment as for lime, hydrated, packed)
  production volume 0.025 kg
    (same comment as for wastewater, unpolluted, from residence)
  properties: wet mass 1 kg, dry mass 0.105 kg, carbon content, fossil 0.767857, water content 8.52381
  note on carbon content, fossil: Tab A.6, ecoinvent v2.2 report 13_I. C content has been calculated after data in the tables, and then referred to 1 kg DM

## Emissions to nature
- Fluoride [water, surface water]: 0.000499998 kg; lognormal variance with pedigree 0.0806, pedigree (2,1,5,1,1)
  Data provided by manufacturer, estimation no reduction in wastewater treatment
  Uncertainty: Data provided by manufacturer, estimation no reduction in wastewater treatment
- Water [air, unspecified]: 0.00149999 m3; name water_to_air_unspecified; = (tap_water_input/1000)*fraction_TW_to_air; lognormal variance with pedigree 0.0807, pedigree (2,2,5,1,1)
  Calculated value based on literature values and expert opinion. See comments in the parametres' comment field.
  property fraction, origin: unspecified 0; name fraction_origin_unspecified
  property fraction, origin: fresh water 1; name fraction_origin_fresh_water
  property fraction, origin: salt water 0; name fraction_origin_salt_water

## Sampling procedure
Personal communication

## Review by Daniel Kellenberger (obsolete) 2003-07-11
Passed.
