# treatment of sewage sludge by anaerobic digestion

Dataset: EcoSpold 2, unit process
Geography: CH
Time period: 2000-01-01 to 2019-12-31
Technology level: current
Classification: ISIC rev.4 ecoinvent: 3821:Treatment and disposal of non-hazardous waste
Classification: EcoSpold01Categories: biomass/fuels
Tags: ConvertedDataset
Scenario: Business-as-Usual
System model: Allocation at the point of substitution
Share of production covered: 100 %
Generated by: Michael Spielmann (obsolete)
Published in: Jungbluth N. 2007
Database: ecoinvent
isCopyrightProtected: true
accessRestrictedTo: 1

## General comment
This dataset represents the production of biogas from sewage sludge anaerobic digestion. The functional unit is the production of one cubic metre of biogas from raw sludge. The process is modelled in a way that a maximum amount of biogas is obtained. Raw sludge is assumed to have a share of dry matter of 4-6%. Raw sludge digestion fulfils only onefunctions: production of biogas (sewage gas).
[This dataset was already contained in the ecoinvent database version 2. It was not individually updated during the transfer to ecoinvent version 3. Life Cycle Impact Assessment results may still have changed, as they are affected by changes in the supply chain, i.e. in other datasets. This dataset was generated following the ecoinvent quality guidelines for version 2. It may have been subject to central changes described in the ecoinvent version 3 change report (http://www.ecoinvent.org/database/ecoinvent-version-3/reports-of-changes/), and the results of the central updates were reviewed extensively. The changes added e.g. consistent water flows and other information throughout the database. The documentation of this dataset can be found in the ecoinvent reports of version 2, which are still available via the ecoinvent website. The change report linked above covers all central changes that were made during the conversion process.]

## Included activities start
From the reception of sewage sludge at the anaerobic digestion plant

## Included activities end
This activity ends with biogas at the digestion plant gate. The dataset includes the environmental exchanges due to raw sludge digestion and gas storage, considering the environmental burden due to the installation (digestion tank and gasholder) and operation of the anaerobic treatment of sewage sludge. The dataset doesn't include the production of the substrate (sewage), as it'is considered as a waste product and hence no environmental burdens are accounted for. The dataset also doesn't include the actual pre-treatment of wastewater producing the raw sludge as well as the subsequent treatment of the digested sludge (gas purification) and the use of the gas for co-generation. Thus, all environmental burdens of pre-treatment and subsequent treatment of digested sludge are allocated to the waste treatment, and not accounted for in the production of sewage gas. This approach is in line with the zero-allocation for biogas in the multi-output process of biowaste treatment, applied with respect to the further treatment and use of digested matter and presswater. Data of plant infrastructure are recorded in a separate unit process.

## Geography
Data represents conditions of large plants in Switzerland

## Technology
anaerob-mesophile digestion (35 C)
In principle the produced biogas is used externally, being further upgraded to natural gas quality and used as a transportation fuel for natural gas vehicles.
In this case, process most likely is optimised in a way that the maximum yield of biogas is achieved. The reason for this is that a higher biogas throughput in the biogas
upgrading plant significantly reduces the cost for the biogas upgrading. Thus, the required energy demand
is obtained externally from conventional energy carriers.
Sewage gas is produced in digestion tanks and is temporarily stored in gasholders (pressure about 20 mbar). The fermentation process requires electricity for sludge mixing and heat for maintaining a uniform temperature in order to optimise bacterial activity. For sludge digestion usually a temperature between
30 and 40 °C is chosen; i.e. mesophile fermentation. In line with literature, we assume a degradation rate of 45% of organic dry matter and a total share of dry matter in the raw sludge of 4-6%. The products of the fermentation process are sewage gas (also referred to as biogas from sewage sludge digestion) and sewage sludge. For the use of the gas as a fuel for cogeneration no further treatment is required.
References:
Vogt 2002. Vogt R., Knappe F., Giegrich J. and Detzel A. (2002) Ökobilanz Bioabfallverwertung. Untersuchungen zur Umweltverträglichkeit von Systemen zur Verwertung von bioligisch-organischen Abfällen. In: Initiativen zum Umweltschutz, Vol. 52. Erich Schmidt Verlag, Berlin.

Ronchetti et al. 2002. Ronchetti C., Bient P. and Pridal R. (2002) Ökobilanz Klärgasverstromung. Bundesamt für Energie.

## Reference product
- sewage sludge: 0 m3; source Ronchetti C. 2002; CPC 39920: Sewage sludge; By-product classification Waste
  The input to the digestion process is raw sludge (concentrated, 5.6% dry matter content); i.e. a waste product of the successive water treatment.
  production volume 0 m3
    dummy comment (trainee)
  property price 0 EUR2005
    Waste products are assigned a price of zero as they are assumed to require further treatment.
  property carbon content 0.4096
    carbon content on a dry matter basis (reserved; not for manual entry)
  properties: wet mass 721 kg, water in wet mass 684.95 kg, carbon content, fossil 0, dry mass 36.05 kg, water content 19, carbon content, non-fossil 0.4096, carbon allocation 14.7661 kg
- biogas: 1 m3; By-product classification allocatable product; CPC 17200: Coal gas, water gas, producer gas and similar gases, other than petroleum gases and other gaseous hydrocarbons
  Gas derived from fermentation of sewage sludge.
  Sewage gas is well suited as a fuel for co-generation. The obtained heat is sufficient to cover the overall heat consumption of a WWTP, including the heat demand for the fermentation process. Furthermore, sewage gas may be directly burnt for heating purposes. In principle, the generated sewage gas can be upgraded to natural gas quality and then used as a fuel for road vehicles or fed into the natural gas network. In the year 2004 the waste water treatment plant Buholz was equipped with a biogas upgrading plant.
  The quantity (degradation rate) and quality of the biogas depend on several factors:
  • composition of the input material (share of dry organic matter)
  • duration of digestion
  • temperature inside digestion tank
  • quality and quantity of co-substrates
  EcoSpold01Location=CH
  production volume 5.5381e7 m3

## By-products
- biogas: 0 m3; By-product classification allocatable product; CPC 17200: Coal gas, water gas, producer gas and similar gases, other than petroleum gases and other gaseous hydrocarbons
  (same comment as for biogas)
  production volume 0 m3
    According to the Swiss ministry of Environment, in 2016 in Switzerland, 1163 TJ of energy produced from anaerobic digestion dedicated to the treatment of Sewage sludge. Values aexpressed in gross energy production. Assuming a calorific value of 21 MJ per Nm3 of biogas, the production volume is calculated to be 55380952 m3 of biogass. Source: Kaufmann, U. (2017). Schweizerische Statistik der erneuerbaren Energien. Ausgabe 2016, 75. Retrieved from http://www.bfe.admin.ch/php/modules/publikationen/stream.php?extlang=de&name=de_729286095.pdf&endung=Schweizerische
  property carbon content, non-fossil 0.449939
    Total C content in kg/Nm3 (Tab 12.8, ecoinvent v2.2 report n17), referred to 1kg DM
  property price 0.109 EUR2005
    Temporary price data. Calculated as 90% of purchasers price based on: Same prices per energy output as natural gas, based on the proportional lower heating value (2/3 that of natural gas)
  property carbon content 0.449939
    carbon content on a dry matter basis (reserved; not for manual entry)
  properties: carbon content, fossil 0, water in wet mass 0 kg, water content 0, wet mass 1.15 kg, dry mass 1.15 kg, carbon allocation 0.51743 kg

## Inputs from technosphere
- anaerobic digestion plant, for sewage sludge: 0 unit; pedigree (1,1,1,1,1)
  EcoSpold01Location=CH
  Calculated value, based on literature studies.
  Uncertainty: literature studies and own calculations
- electricity, low voltage: 0 kWh; source Ronchetti C. 2002; pedigree (1,1,1,1,1)
  EcoSpold01Location=CH
  Calculated value, based on literature, which reports
  an electricity consumption of 2300kWh/1000 PCE.
  Various concepts of energy supply for the digestion of sewage sludge are possible. In principle, if biogas is used as a fuel for co-generation, electricity demand can be covered partly by electricity from on-site co-generation. However, this would result in a lower process efficiency of the digestion process; i.e. ideally an adjustment with respect to the final yield of biogas is performed. On the other hand, if biogas is assumed to be used as a feedstock for transportation fuels, the process most likely would be optimised in a way that a maximum yield of biogas is achieved. The reason for this is that a higher biogas throughput in the biogas upgrading plant significantly reduces the cost for the biogas upgrading. In case that all biogas is fed in the upgrading plant, the required electricity is obtained from conventional energy carriers.
  The dataset as presented in this study is based on the assumption that biogas is upgraded and used as a fuel. For electricity the current Swiss supply mix is employed.
  Uncertainty: literature studies and own calculations
- lubricating oil: 0 kg; pedigree (1,1,1,1,1)
  Calculated value, based on literature studies.
  EcoSpold01Location=RER
  Uncertainty: literature studies and own calculations
  properties: dry mass 1 kg, wet mass 1 kg, carbon content, fossil 0.75
  note on carbon content, fossil: Lubricating oil is produced from diesel. C-content/dry mass of fats and oils considered 75%, from: ecoinvent v2.2 report, n 15a, pg 40
- heat, district or industrial, natural gas: 0 MJ; source Ronchetti C. 2002; pedigree (1,1,1,1,1)
  Calculated value, based on literature, which reported a heat consumption of 10200 kWh/1000 PCE.
  Various concepts of energy supply for the digestion of sewage
  sludge are possible. In principle, if biogas is used as a fuel for co-generation, the heat expenditures can usually covered completely by the produced heat from on-site co-generation. However, this would result in a lower process efficiency of the digestion process; i.e. ideally an adjustment with respect to the final yield of biogas is performed. On the other hand, if biogas is assumed to be used as a feedstock for transportation fuels, the process most likely would be optimised in a way that a maximum yield of biogas is achieved. The reason for this is that a higher biogas throughput in the biogas upgrading plant signifithe required heat is obtained from conventional energy carriers.
  The dataset as presented in this study is based on the assumption that biogas is upgraded and used as a fuel. For heat supply various options are possible. In this study we assume that the heat demand is covered by natural gas combustion. Alternatively also wood chips may be used.
  EcoSpold01Location=RER
  Uncertainty: literature studies and own calculations
- electricity, medium voltage: 0.0212779 kWh; lognormal variance with pedigree 0.0033, pedigree (2,2,3,1,1)
  Weighted average of reported input
- acetic acid, without water, in 98% solution state: 0.00451444 kg; lognormal variance with pedigree 0.0033, pedigree (2,2,3,1,1)
  Weighted average of reported input
- heat, from steam, in chemical industry: 0.150919 MJ; lognormal variance with pedigree 0.0033, pedigree (2,2,3,1,1)
  Weighted average of reported input
- chemical, organic: 0.000605983 kg; lognormal variance with pedigree 0.0033, pedigree (2,2,3,1,1)
  Sum input parameter covering partly confidential information on additives, solvents, catalysts. Weighted average of reported input materials.
- cobalt: 1.78585e-5 kg; lognormal variance with pedigree 0.0033, pedigree (2,2,3,1,1)
  Weighted average of reported input
- sewage sludge: -0.00538706 m3; lognormal variance with pedigree 0.0047, pedigree (3,2,3,1,1)
  Weighted average of reported waste
  production volume 15333.1 m3
- sodium hydroxide, without water, in 50% solution state: 0.0229101 kg; lognormal variance with pedigree 0.0033, pedigree (2,2,3,1,1)
  Weighted average of reported input
- nitrogen, liquid: 0.00281356 kg; lognormal variance with pedigree 0.0033, pedigree (2,2,3,1,1)
  Weighted average of reported input
- chemical factory, organics: 3.25366e-11 unit; lognormal variance with pedigree 0.309425, pedigree (2,3,2,2,3)
  Calculated based on literature data published by the industry. For this activity, no information was readily available concerning infrastructure and land-use. Therefore, the infrastructure is estimated based on data from two chemical factories, the BASF site of Ludwigshafen and the chemical factory in Gendorf (which are both located in Germany), which produce a wide range of chemical substances. Based on this data, the following assumptions are made: the built area amounts to about 4.2 ha, the plant has an average output of 50'000 t/a and a lifespan of fifty years. The estimated infrastructure amount is therefore 4.00 E-10 units per kg of produced chemical.
  References:
  Althaus H.-J., Chudacoff M., Hischier R., Jungbluth N., Osses M. and Primas A. (2007) Life Cycle Inventories of Chemicals. ecoinvent report No. 8, v2.0. EMPA Dübendorf, Swiss Centre for Life Cycle Inventories, Dübendorf, CH.
  Gendorf (2000) Umwelterklärung 2000, Werk Gendorf. Werk Gendorf, Burgkirchen.
- chemical, inorganic: 4.98156e-5 kg; lognormal variance with pedigree 0.0033, pedigree (2,2,3,1,1)
  (same comment as for chemical, organic)
- manganese: 1.7689e-5 kg; lognormal variance with pedigree 0.0033, pedigree (2,2,3,1,1)
  Weighted average of reported input
- municipal solid waste: -7.25804e-6 kg; lognormal variance with pedigree 0.0047, pedigree (3,2,3,1,1)
  Weighted average of reported waste
  production volume 365840 kg
- compressed air, 600 kPa gauge: 0.028143 m3; lognormal variance with pedigree 0.0033, pedigree (2,2,3,1,1)
  Weighted average of reported input
- xylene: 0.0535668 kg; lognormal variance with pedigree 0.0033, pedigree (2,2,3,1,1)
  Weighted average of reported input
- natural gas, high pressure: 0.00176142, 1.13727e-5 m3 (2 suppliers, which the file names only by identifier); sum of these 0.00177279 m3; lognormal variance with pedigree 0.0033, pedigree (2,2,3,1,1)
  Weighted average of reported input
- waste mineral oil: -2.971e-6, -6.87459e-8 kg (2 suppliers, which the file names only by identifier); sum of these -3.03975e-6 kg; lognormal variance with pedigree 0.0047, pedigree (3,2,3,1,1)
  Weighted average of reported waste
  production volume 153218 kg
- hazardous waste, for incineration: -3.74941e-6, -9.80073e-8 kg (2 suppliers, which the file names only by identifier); sum of these -3.84742e-6 kg; lognormal variance with pedigree 0.0047, pedigree (3,2,3,1,1)
  Weighted average of reported waste
  production volume 193928 kg
- wastewater, average: -0.000402116, -4.35014e-5 m3 (2 suppliers, which the file names only by identifier); sum of these -0.000445617 m3; lognormal variance with pedigree 0.0047, pedigree (3,2,3,1,1)
  Weighted average of reported waste
  production volume 2.24612e7 m3
- steam, in chemical industry: 0.00317867 kg; lognormal variance with pedigree 0.0072, pedigree (1,4,3,5,2)
  Calculated value based on two LCA studies: A comparative life cycle assessment of process water treatment technologies at the Secunda industrial complex, South Africa (Ras & Blottnitz, 2012) and The Sustainability of Ion Exchange Water treatment Technology (Amin, 2016).
- sodium chloride, powder: 0.0271764 kg; lognormal variance with pedigree 0.0072, pedigree (1,4,3,5,2)
  (same comment as for steam, in chemical industry)
- sulfuric acid: 0.0463455 kg; lognormal variance with pedigree 0.2106, pedigree (5,5,5,5,5)
  (same comment as for steam, in chemical industry)
- electricity, medium voltage: 0.00630882 kWh; lognormal variance with pedigree 0.0072, pedigree (1,4,3,5,2)
  Calculated value based on two LCA studies: A comparative life cycle assessment of process water treatment technologies at the Secunda industrial complex, South Africa (Ras & Blottnitz, 2012) and The Sustainability of Ion Exchange Water treatment Technology (Amin, 2016). Energy values range from 3.96E-05 MJ/kg to 4.59E-04 MJ/kg.
- magnesium oxide: 0.00221779 kg; lognormal variance with pedigree 0.0072, pedigree (1,4,3,5,2)
  (same comment as for steam, in chemical industry)
- hydrochloric acid, without water, in 30% solution state: 0.00919631 kg; lognormal variance with pedigree 0.0072, pedigree (1,4,3,5,2)
  (same comment as for steam, in chemical industry)
- aluminium sulfate, without water, in 4.33% aluminium solution state: 0.00584779 kg; lognormal variance with pedigree 0.0072, pedigree (1,4,3,5,2)
  (same comment as for steam, in chemical industry)
- wastewater, unpolluted: -0.0194852 m3; lognormal variance with pedigree 0.0072, pedigree (1,4,3,5,2)
  Estimated value based on water balance ( WaterIN - Water Out)
  production volume 516107 m3
- ion-exchanger for water treatment: 2.18382e-8 unit; lognormal variance with pedigree 0.0126, pedigree (1,4,3,5,2)
  Literature value, copied from the existing dataset " water production, deionised, from tap water, at user, GLO" (accessed in 20171201) as it was also considered adequate for this dataset.
  Reference:
  Althaus H.-J., Chudacoff M., Hischier R., Jungbluth N., Osses M. and Primas A. (2007) Life Cycle Inventories of Chemicals. ecoinvent report No. 8, v2.0. EMPA Dübendorf, Swiss Centre for Life Cycle Inventories, Dübendorf, CH.

## Inputs from nature
- Carbon dioxide, in air [natural resource, in air]: 0 kg; pedigree (1,1,1,1,1)
  Calculated value. As far as the carbon intake in the digestion process is considered; the employed figures are based on our own calculations and derived from the assumed biogas composition and emissions of carbon.
  Uncertainty: own calculations
- Water, cooling, unspecified natural origin [natural resource, in water]: 0.000136087 m3; lognormal variance with pedigree 0.0047, pedigree (3,2,3,1,1)
  Weighted average of reported input
- Water, river [natural resource, in water]: 0.129933 m3; lognormal variance with pedigree 0.0047, pedigree (3,2,3,1,1)
  Weighted average of reported input
- Water, well, in ground [natural resource, in water]: 0.139528 m3; lognormal variance with pedigree 0.0047, pedigree (3,2,3,1,1)
  Weighted average of reported input
- Water, unspecified natural origin [natural resource, in water]: 0.00022732 m3; lognormal variance with pedigree 0.0047, pedigree (3,2,3,1,1)
  Weighted average of reported input

## Emissions to nature
- Carbon dioxide, non-fossil [air, unspecified]: 0 kg; pedigree (1,1,1,1,1)
  Calculated value, based on literature studies.
  Assuming sewage gas production of 9125 Nm3/1000 PCE or 10515.31305 kg/100 PCE with a density of 1.15 kg/Nm3; carbon dioxide content in sewage gas of 3066.00 Nm3/1000 PCE or 6054 kg/1000 PCE; carbon dioxide eimissions excess-gas burning of 5% and direct from CO2-content in gas of 5%; and carbon dioxide emissions leakage of 0.75%.
  Uncertainty: literature studies and own calculations
- Methane, non-fossil [air, unspecified]: 0 kg; pedigree (1,1,1,1,1)
  Calculated value, based on literature studies.
  Assuming sewage gas production of 9125 Nm3/1000 PCE or 10515.31305 kg/100 PCE with a density of 1.15 kg/Nm3; methane content in sewage gas of 5748.75 Nm3/1000 PCE or 4095 kg/1000 PCE; methane eimissions excess-gas burning of 0% ; and methane emissions leakage of 0.75%.
  Uncertainty: literature studies and own calculations
- Lead [water, unspecified]: 3.82336e-11 kg; lognormal variance with pedigree 0.6532, pedigree (2,3,3,1,1)
  Weighted average of reported emissions
- Cobalt [water, unspecified]: 1.42201e-7 kg; lognormal variance with pedigree 0.6532, pedigree (2,3,3,1,1)
  Weighted average of reported emissions
- Suspended solids, unspecified [water, unspecified]: 3.19294e-6 kg; lognormal variance with pedigree 0.0427, pedigree (2,2,3,1,1)
  Weighted average of reported emissions
- Zinc, ion [water, unspecified]: 1.05657e-8 kg; lognormal variance with pedigree 0.6532, pedigree (2,3,3,1,1)
  Weighted average of reported emissions
- Carbon dioxide, fossil [air, unspecified]: 0.00865927 kg; lognormal variance with pedigree 0.0033, pedigree (2,2,3,1,1)
  Weighted average of reported emissions
- Benzene [air, unspecified]: 7.08842e-7 kg; lognormal variance with pedigree 0.1232, pedigree (2,3,3,1,1)
  Weighted average of reported emissions
- Methane, fossil [air, unspecified]: 1.65598e-5 kg; lognormal variance with pedigree 0.0432, pedigree (2,3,3,1,1)
  Weighted average of reported emissions
- Water [air, unspecified]: 4.08262e-5 m3; lognormal variance with pedigree 0.0107, pedigree (4,2,3,1,1)
  Calculated to close water balance
- Methanol [air, unspecified]: 7.22438e-7 kg; lognormal variance with pedigree 0.1232, pedigree (2,3,3,1,1)
  Weighted average of reported emissions
- Nitrogen oxides [air, unspecified]: 5.05931e-6 kg; lognormal variance with pedigree 0.0427, pedigree (2,2,3,1,1)
  Weighted average of reported emissions
- Toluene [air, unspecified]: 9.57285e-7 kg; lognormal variance with pedigree 0.1232, pedigree (2,3,3,1,1)
  Weighted average of reported emissions
- Dinitrogen monoxide [air, unspecified]: 5.40648e-8 kg; lognormal variance with pedigree 0.0427, pedigree (2,2,3,1,1)
  Weighted average of reported emissions
- Xylene [air, unspecified]: 2.95625e-6 kg; lognormal variance with pedigree 0.1232, pedigree (2,3,3,1,1)
  Weighted average of reported emissions
- Carbon monoxide, fossil [air, unspecified]: 7.90907e-5 kg; lognormal variance with pedigree 0.6532, pedigree (2,3,3,1,1)
  Weighted average of reported emissions
- Arsenic, ion [water, unspecified]: 2.12764e-11 kg; lognormal variance with pedigree 0.6532, pedigree (2,3,3,1,1)
  Weighted average of reported emissions
- NMVOC, non-methane volatile organic compounds, unspecified origin [air, unspecified]: 3.07409e-5 kg; lognormal variance with pedigree 0.0427, pedigree (2,2,3,1,1)
  Weighted average of reported emissions
- Phosphorus [water, unspecified]: 4.34646e-7 kg; lognormal variance with pedigree 0.0432, pedigree (2,3,3,1,1)
  Weighted average of reported emissions
- Sulfur dioxide [air, unspecified]: 2.53845e-7 kg; lognormal variance with pedigree 0.0038, pedigree (2,3,3,1,1)
  Weighted average of reported emissions
- Nitrogen, organic bound [water, unspecified]: 2.88093e-6 kg; lognormal variance with pedigree 0.0432, pedigree (2,3,3,1,1)
  Weighted average of reported emissions
- Methyl acetate [air, unspecified]: 1.31336e-6 kg; lognormal variance with pedigree 0.1232, pedigree (2,3,3,1,1)
  Weighted average of reported emissions
- Copper, ion [water, unspecified]: 3.593e-11 kg; lognormal variance with pedigree 0.6532, pedigree (2,3,3,1,1)
  Weighted average of reported emissions
- Chromium, ion [water, unspecified]: 3.33821e-9 kg; lognormal variance with pedigree 0.6532, pedigree (2,3,3,1,1)
  Weighted average of reported emissions
- Cadmium, ion [water, unspecified]: 5.02316e-12 kg; lognormal variance with pedigree 0.6532, pedigree (2,3,3,1,1)
  Weighted average of reported emissions
- Mercury [water, unspecified]: 8.05945e-11 kg; lognormal variance with pedigree 0.6532, pedigree (2,3,3,1,1)
  Weighted average of reported emissions
- Nickel, ion [water, unspecified]: 4.61465e-9 kg; lognormal variance with pedigree 0.6532, pedigree (2,3,3,1,1)
  Weighted average of reported emissions
- Chloride [water, surface water]: 0.0254294 kg; lognormal variance with pedigree 0.28, pedigree (5,5,5,5,5)
  Calculated value. Stoechiometric calculations were used to calculate the emissions to water based on the type and amount of chemicals used.
- Aluminium [water, surface water]: 0.000922298 kg; lognormal variance with pedigree 0.28, pedigree (5,5,5,5,5)
  Calculated value. Stoechiometric calculations were used to calculate the emissions to water based on the type and amount of chemicals used. Since the actual fate of the chemical is unknown, it was assume that all aluminum is emitted to the water (so basically remain in the water)
- Water [air, low population density, long-term]: 0.00344175 m3; lognormal variance with pedigree 0.0072, pedigree (1,4,3,5,2)
  Calculated value based on literature values and expert opinion taken from the pre-existing dataset “water production, deionised, from tap water" (GLO) (accessed on the 2017-12-18) as it was also considered adequate for this dataset. 15% of water lost during production of deionised water is considered to be lost to air.
- Sulfate [water, surface water]: 0.0016441 kg; lognormal variance with pedigree 0.28, pedigree (5,5,5,5,5)
  Calculated value. Stoechiometric calculations were used to calculate the emissions to water based on the type and amount of chemicals used.Since the actual fate of the chemical is unknown, it was assume that all sulfate is emitted to the water (so basically remain in the water)
- Sodium, ion [water, surface water]: 0.0232017 kg; lognormal variance with pedigree 0.28, pedigree (5,5,5,5,5)
  (same comment as for Chloride)
- Magnesium [water, surface water]: 0.00133741 kg; lognormal variance with pedigree 0.28, pedigree (5,5,5,5,5)
  Calculated value. Stoechiometric calculations were used to calculate the emissions to water based on the type and amount of chemicals used. Since the actual fate of the chemical is unknown, it was assume that all magnesium is emitted to the water (so basically remain in the water)

## Sampling procedure
Literature data

## Review by Niels Jungbluth 2006-05-05
Passed.
none

## Review by Emilia Moreno Ruiz 2012-04-24
dataset documented by trainee Macela Valles Lange
