# copper production, primary

Dataset: EcoSpold 2, unit process
Geography: RAS
Time period: 1994-01-01 to 2019-12-31
Technology level: current
Classification: ISIC rev.4 ecoinvent: 2420:Manufacture of basic precious and other non-ferrous metals
Tags: ConvertedDataset
Scenario: Business-as-Usual
System model: Allocation at the point of substitution
Share of production covered: 89.5 %
Generated by: [System]
Published in: Althaus H.-J. 2000
Database: ecoinvent
isCopyrightProtected: true
accessRestrictedTo: 1

## General comment
This activity represents the production of 1 kg of refined copper. It is used as pure metal or as alloying element in various technical applications.

## Included activities end
The module includes the pre-treatment of the ore, the reduction and the refining copper to cathode copper, including the country-specific share in hydrometalurgically won copper (SX-EW)

## Geography
This module is valid for the whole corresponding region. Some agents used like lime or sodium cyanide originate from data sets valid for Switzerland or Europe.

## Technology
The ore is pre-treated, reduced and refined according to the country specific mix of process alternatives: reverberatory furnace 22.8%; flash smelting furnaces 75.7%; other 1.5%.; SX-EW 0.0%. An overall abatement for sulphur dioxide of 20.0% was estimated.

## Parameters
- fraction, process water, to air: 0.15 dimensionless; name fraction_PW_to_air; lognormal variance with pedigree 0.092025, pedigree (4,4,3,2,4)
  Literature value. In case when no industry/process specific data are available, default evaporation fraction value is used. This value is 15% and is based on literature (Statistics Canada, 2007 & Shaffer, K.H., 2008, Consumptive water use in the Great Lakes Basin, USGS & Shiklomanov, 2003, World Water Resources at the Beginning of the 21st Century) and has been approved by an expert.

## Reference product
- copper: 1 kg; name RP_amount; By-product classification allocatable product; CPC 41413: Refined copper and copper alloys, unwrought; master alloys of copper
  production volume 8.7617e9 kg; name RP_PV
    Source: USGS Minerals Yearbook 2015. Available from: https://www.usgs.gov/centers/nmic/copper-statistics-and-information (downloaded 21 June 2019), Table 22. Data for China, India, Indonesia, Iran, Japan, Kazakstan, North Korea, Republic of Korea, Philippeans, Russia (minus PV of copper from 'platinum group metal mine operation, ore with high palladium content [RU]'), Turkey, Uzbekistan and Vietnam (primary, other)
  property price 5.52 EUR2005
    Literature value (http://www.economist.com/news/business/21576714-mining-industry-has-enriched-chile-its-future-precarious-copper-solution). Average price between 20015 and 2013.
  property carbon content 0
    carbon content on a dry matter basis (reserved; not for manual entry)
  property true value 5.52; name RP_amount_true_value
    allocation property applied in "true value" allocation // value calculated from revenue
  properties: carbon content, fossil 0, dry mass 1 kg, water content 0, wet mass 1 kg, carbon content, non-fossil 0, water in wet mass 0 kg, carbon allocation 0 kg

## By-products
- heat, for reuse in municipal waste incineration only: 0 MJ; CPC 17300: Steam and hot water; By-product classification allocatable product; pedigree (1,1,1,1,1)
  Net electricity generated from this waste and used in internal MSWI plant energy redistribution.
  Uncertainty: uncertainty is calculated from uncertainties in waste composition and uncertainties in energy efficiency and the uncertainty in internal energy demand
  production volume 3.19374e6 MJ
  property exergy 0.1842 MJ; name E_th_prod_MSWI_exergy
    This exergy property is based on the exergy content of the product.
  property price 0.0106 EUR2005; name E_th_prod_MSWI_price_EUR2005
    Average European district heat price from Ecoheatcool and Euroheat 2005-2006, Ecoheat Work package 1: The European heat market. Final report. 10.6 EUR/GJ i s the price of district heat. http://www.solarthermalworld.org/files/Ecoheatcool%20WP1%20Web.pdf?download
  property true value relation 0.1842; name E_th_prod_MSWI_true_value_relation
    property to calculate "true value" from
  property true value 2.40319e-6
    allocation property applied in "true value" allocation // value calculated from true value relation
- electricity, for reuse in municipal waste incineration only: 0 kWh; CPC 17100: Electrical energy; By-product classification allocatable product; pedigree (1,1,1,1,1)
  (same comment as for heat, for reuse in municipal waste incineration only)
  production volume 443574 kWh
  property price 0.1 EUR2005; name E_el_prod_MSWI_price_EUR2005
    Estimated to be the same price as in case of electricity, medium voltage.
  property exergy 3.6 MJ; name E_el_prod_MSWI_exergy
    This exergy property is based on the exergy content of the product.
  property true value relation 3.6; name E_el_prod_MSWI_true_value_relation
    property to calculate "true value" from
  property true value 6.52329e-6
    (same comment as for heat, for reuse in municipal waste incineration only)

## Inputs from technosphere
- copper concentrate, sulfide ore: 4.05999 kg; lognormal variance with pedigree 0.0408, pedigree (2,2,5,3,1)
  activityLink added to better reflect the reality of the supply chain
  properties: wet mass 1 kg, dry mass 1 kg
- wastewater, unpolluted: -0.00567999 m3; name wastewater_amount; lognormal variance with pedigree 0.0407, pedigree (2,2,5,1,1)
  production volume 4.97665e7 m3; = abs(wastewater_amount/RP_amount)*RP_PV
    Calculated from production volume of reference product using the relative outputs.
  property price 0 EUR2005; name wastewater_amount_price_EUR2005
  properties: water content 2962.17, dry mass 0.337476 kg, carbon content, non-fossil 0.00178991, carbon content, fossil 0.00178991, wet mass 1000 kg
  note on carbon content, fossil: Assumed to be like in tap water. Bicarbonate content is 2.93 mol/m3. CO2 content is 0.1 mol/m3 (ecoinvent v2.2 report 8, Tab 93.1).
- anode, for metal electrolysis: 0.000999998 kg; lognormal variance with pedigree 0.23, pedigree (5,5,5,5,4)
  properties: dry mass 1 kg, carbon content, fossil 0.865971, wet mass 1 kg
  note on carbon content, fossil: The main component of the anode is carbon, coming from bitumen and petroleum coke (ecoinvent v2.2 report 10). The C content in those components of the anode has been taken into account to calculate the anode final C content.
- copper slag: -0.949998 kg; name copper_slag_amount; lognormal variance with pedigree 0.0408, pedigree (2,2,5,3,1)
  production volume 8.32362e9 kg; = abs(copper_slag_amount/RP_amount)*RP_PV
    Calculated from the production volume of copper in proportion to the respective output amounts.
  property price 0 EUR2005; name copper_slag_amount_price_EUR2005
  properties: zinc content 0.00606, aluminium content 0.0267, potassium content 0.0317, magnesium content 0.00485, wet mass 1 kg, sodium content 0.008, silicon content 0.155, tungsten content 0.23999, dry mass 1 kg, iron content 0.379, calcium content 0.00713, copper content 0.00807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
- lime, packed: 0.25 kg; lognormal variance with pedigree 0.1102, pedigree (5,2,5,3,1)
  properties: wet mass 1 kg, dry mass 0.998 kg, carbon content, fossil 0.117492, water content 0.00200401
  note on carbon content, fossil: Table 3.1, ecoinvent v2.2 report 7, part VII, pg 3. MW CaCO3=100, MW MgCO3=84
- silica sand: 0.929998 kg; lognormal variance with pedigree 0.1102, pedigree (5,2,5,3,1)
  properties: dry mass 0.99 kg, wet mass 1 kg, water content 0.010101
- electricity, high voltage: 0.368999 kWh; lognormal variance with pedigree 0.0408, pedigree (2,2,5,3,1)
  activityLink added to better reflect the reality of the supply chain
- heat, district or industrial, natural gas: 3.59099 MJ; lognormal variance with pedigree 0.0408, pedigree (2,2,5,3,1)
- electricity, high voltage: 0.246 kWh; lognormal variance with pedigree 0.0408, pedigree (2,2,5,3,1)
- non-ferrous metal smelter: 1.12e-11 unit; lognormal variance with pedigree 0.3601, pedigree (3,2,5,1,3)
- oxygen, liquid: 0.309999 kg; lognormal variance with pedigree 0.0408, pedigree (2,2,5,3,1)
  properties: wet mass 1 kg, dry mass 1 kg
- heat, district or industrial, other than natural gas: 6.30625 MJ; lognormal variance with pedigree 0.0408, pedigree (2,2,5,3,1)

## Inputs from nature
- Water, river [natural resource, in water]: 0.00567999 m3; name water_river_input; lognormal variance with pedigree 0.0407, pedigree (2,2,5,1,1)

## Emissions to nature
- Carbon dioxide, fossil [air, non-urban air or from high stacks]: 0.11 kg; lognormal variance with pedigree 0.1801, pedigree (5,4,5,3,3)
- Chromium, ion [water, surface water]: 1.62e-7 kg; lognormal variance with pedigree 1.37, pedigree (1,1,5,1,1)
  reported values
- Particulates, > 10 um [air, non-urban air or from high stacks]: 0.000102 kg; lognormal variance with pedigree 0.0901, pedigree (3,2,5,1,3)
- Cadmium, ion [water, surface water]: 1.55e-8 kg; lognormal variance with pedigree 1.37, pedigree (1,1,5,1,1)
  reported values
- Copper [air, non-urban air or from high stacks]: 0.00275 kg; lognormal variance with pedigree 0.7101, pedigree (3,2,5,1,3)
- Carbon monoxide, fossil [air, non-urban air or from high stacks]: 3e-5 kg; lognormal variance with pedigree 0.7101, pedigree (3,2,5,1,3)
- Tin [air, non-urban air or from high stacks]: 0.000125 kg; lognormal variance with pedigree 0.7101, pedigree (3,2,5,1,3)
- Water [air, unspecified]: 0.000851999 m3; name water_to_air_unspecified; = (water_river_input*fraction_PW_to_air); lognormal variance with pedigree 0.0807, pedigree (2,2,5,1,1)
  Calculated value based on literature values and expert opinion. See comments in the parametres' comment field.
  property fraction, origin: fresh water 1; name fraction_origin_fresh_water
  property fraction, origin: unspecified 0; name fraction_origin_unspecified
  property fraction, origin: salt water 0; name fraction_origin_salt_water
- Lead [air, non-urban air or from high stacks]: 0.0025 kg; lognormal variance with pedigree 0.7101, pedigree (3,2,5,1,3)
- Cadmium [air, non-urban air or from high stacks]: 0.000349999 kg; lognormal variance with pedigree 0.7101, pedigree (3,2,5,1,3)
- Particulates, > 2.5 um, and < 10um [air, non-urban air or from high stacks]: 0.000304 kg; lognormal variance with pedigree 0.0701, pedigree (3,2,5,1,3)
- Manganese [air, non-urban air or from high stacks]: 0.0003 kg; lognormal variance with pedigree 0.7101, pedigree (3,2,5,1,3)
- Dioxins, measured as 2,3,7,8-tetrachlorodibenzo-p-dioxin [air, non-urban air or from high stacks]: 2e-12 kg; lognormal variance with pedigree 0.3601, pedigree (3,2,5,1,3)
- Zinc [air, non-urban air or from high stacks]: 0.000749999 kg; lognormal variance with pedigree 0.7101, pedigree (3,2,5,1,3)
- Mercury [air, non-urban air or from high stacks]: 2e-6 kg; lognormal variance with pedigree 0.7101, pedigree (3,2,5,1,3)
- Mercury [water, surface water]: 1.62e-9 kg; lognormal variance with pedigree 1.37, pedigree (1,1,5,1,1)
  reported values
- Arsenic, ion [water, surface water]: 1.06e-7 kg; lognormal variance with pedigree 1.37, pedigree (1,1,5,1,1)
  reported values
- Nickel [air, non-urban air or from high stacks]: 0.00195 kg; lognormal variance with pedigree 0.7101, pedigree (3,2,5,1,3)
- Copper, ion [water, surface water]: 2.99e-7 kg; lognormal variance with pedigree 1.37, pedigree (1,1,5,1,1)
  reported values
- Lead [water, surface water]: 9.07999e-8 kg; lognormal variance with pedigree 1.37, pedigree (1,1,5,1,1)
  reported values
- Nickel, ion [water, surface water]: 1.21e-7 kg; lognormal variance with pedigree 1.37, pedigree (1,1,5,1,1)
  reported values
- Vanadium [air, non-urban air or from high stacks]: 7.49999e-6 kg; lognormal variance with pedigree 0.7101, pedigree (3,2,5,1,3)
- Sulfur dioxide [air, non-urban air or from high stacks]: 0.576999 kg; lognormal variance with pedigree 0.1401, pedigree (5,4,5,3,3)
- NMVOC, non-methane volatile organic compounds, unspecified origin [air, non-urban air or from high stacks]: 1.5e-5 kg; lognormal variance with pedigree 0.1001, pedigree (3,2,5,1,3)
- Chromium [air, non-urban air or from high stacks]: 9.99998e-7 kg; lognormal variance with pedigree 0.7101, pedigree (3,2,5,1,3)
- Zinc, ion [water, surface water]: 4.81999e-7 kg; lognormal variance with pedigree 1.37, pedigree (1,1,5,1,1)
  reported values
- Antimony [air, non-urban air or from high stacks]: 0.000125 kg; lognormal variance with pedigree 0.7101, pedigree (3,2,5,1,3)
- Tin, ion [water, surface water]: 1.62e-7 kg; lognormal variance with pedigree 1.37, pedigree (1,1,5,1,1)
  reported values
- Arsenic [air, non-urban air or from high stacks]: 0.000999998 kg; lognormal variance with pedigree 0.7101, pedigree (3,2,5,1,3)
- Selenium [air, non-urban air or from high stacks]: 9.99998e-5 kg; lognormal variance with pedigree 0.7101, pedigree (3,2,5,1,3)
- Particulates, < 2.5 um [air, non-urban air or from high stacks]: 5.07999e-7 kg; lognormal variance with pedigree 0.3601, pedigree (3,2,5,1,3)

## Sampling procedure
literature

## Extrapolations
see Geography and Technology
