# uranium production, centrifuge, enriched 4.2%

Dataset: EcoSpold 2, unit process
Geography: GB
Time period: 1993-01-01 to 2019-12-31
Technology level: current
Classification: ISIC rev.4 ecoinvent: 2011a: Manufacture of nuclear fuels
Classification: EcoSpold01Categories: nuclear power/production
Tags: ConvertedDataset
Scenario: Business-as-Usual
System model: Allocation at the point of substitution
Generated by: [System]
Published in: Dones, R. 2007
Database: ecoinvent
isCopyrightProtected: true
accessRestrictedTo: 1

## General comment
This module uses a mix of data, some specific for the URENCO facilities in Germany, the Netherlands, and the United Kingdom taken from environmental reports, some from literature. The plants consume 40 kWh/SWU and the electricity is assumed to be supplied by the local high voltage electricity grid. The factor for the infrastructure requirement is calculated with annual throughput of 1500 t SWU for 30 years operation.
[This dataset was already contained in the ecoinvent database version 2. It was not individually updated during the transfer to ecoinvent version 3. Life Cycle Impact Assessment results may still have changed, as they are affected by changes in the supply chain, i.e. in other datasets. This dataset was generated following the ecoinvent quality guidelines for version 2. It may have been subject to central changes described in the ecoinvent version 3 change report (http://www.ecoinvent.org/database/ecoinvent-version-3/reports-of-changes/), and the results of the central updates were reviewed extensively. The changes added e.g. consistent water flows and other information throughout the database. The documentation of this dataset can be found in the ecoinvent reports of version 2, which are still available via the ecoinvent website. The change report linked above covers all central changes that were made during the conversion process.]
[This dataset is meant to replace the following datasets:]

## Included activities end
The module includes: input of UF6; electricity, diesel, and natural gas used for operation; also taken into account is the material for replacement of centrifuge; water use, lubricant oil, and wastewater treatment; concrete assumed to be used for conditioning of contaminated scrap from decommissioning; transport requirements of operation materials, industrial wastes, and contaminated waste from decommissioning (25% of the reinforced concrete and the great part of metals according to the reference). Radioactive and non-radioactive emissions to air and to water from the operation are also included. The infrastructure requirements are accounted for, though construction and operation data partially refer to different plants rather than to one single unit.

## Geography
US and Western European data.

## Technology
Current technology for uranium enrichment with centrifuge process. There exist datasets for five different enrichment grades: 3.0%, 3.8%, 3.9%, 4.2% and 4.0%

## Parameters
- fraction, cooling water, recirculating system, to air: 0.771; name fraction_CW_R_to_air; lognormal variance with pedigree 0.0413, pedigree (2,3,1,3,1)
  Calculated based on literature value (Scown, C.D., 2011, Water Footprint of U.S. Transportation Fuels and supplying information of the article) (Vionnet, S., Quantis Water Database - Technical Report, 2012).
- fraction, cooling water, once-through system, to air: 0.004; name fraction_CW_OT_to_air; lognormal variance with pedigree 0.0413, pedigree (2,3,1,3,1)
  (same comment as for fraction, cooling water, recirculating system, to air)
- fraction, water, decarbonised, to air: 0.3875; name fraction_WDC_to_air; = fraction_CW_to_air; lognormal variance with pedigree 0.092025, pedigree (4,4,3,2,4)
  Calculated value. See comments in the other parametres present in this dataset. Decarbonised water is considered to be always used as cooling water, thus cooling water fractions to air are applied to all carbonised water input flows to calculate the amount of water consumed in the processes.
- fraction, cooling water, cooling pond system, to air: 0.032; name fraction_CW_CP_to_air; lognormal variance with pedigree 0.0413, pedigree (2,3,1,3,1)
  (same comment as for fraction, cooling water, recirculating system, to air)
- fraction, cooling water, to air: 0.3875; name fraction_CW_to_air; = (0.5*fraction_CW_OT_to_air)+(0.5*fraction_CW_R_to_air); lognormal variance with pedigree 0.092025, pedigree (4,4,3,2,4)
  Calculated value based on literature value (see comments of the other parametres present in this dataset) and expert opinion. In the case when no industry/literature data are available about the type of cooling or directly fraction, cooling water, to air specific for the process a default assumption is applied. It is assumed that the once-through cooling system is used in 50% of all cases and recirculating system is used in another 50% of all cases.

## Reference product
- uranium, enriched 4.2%, per separative work unit: 1 unit; CPC 33620: Uranium enriched in U235 and its compounds; plutonium and its compounds; alloys, dispersions, ceramic products[…]; By-product classification allocatable product
  EcoSpold01Location=RER
  production volume 439200 unit; name uranium_enriched; = 12E6/5*0.183
    Total capacity installed in Europe: 12 million SWU (http://www.wise-uranium.org/efac.html#ENR). The distribution between enrichment grades is assumed to be the same for all facilities. The total production is here assumed to be split evenly over the 5 grades 3.0%, 3.8%, 3.9%, 4.2% and 4.0%.
    This production volume is further assigned in shares to the three countries in Europe with URENCO facilities, which are:
    - Germany, capacity of 1100 tSWU/year
    - United Kingdom, capacity of 850 tSWU/year
    - Netherlands, capacity of 2700 tSWU/year
  property price 168.027 EUR2005
    Calculated based on inputs: The price of the product has been calculated as a sum of the values of the material and energy inputs for this product. This value is therefore a rough estimation. It may underestimate the real price since there are additional expenses when producing any product. These expences can include for example labour costs, treatment of waste materials and profit for the producer. Please consider carefully whether this level of data quality is acceptable for your application.
  property carbon content 0
    carbon content on a dry matter basis (reserved; not for manual entry)
  property true value 168.027
    allocation property applied in "true value" allocation // value calculated from revenue
  properties: carbon content, non-fossil 0, carbon content, fossil 0, water in wet mass 0 kg, wet mass 1 kg, water content 0, dry mass 1 kg, carbon allocation 0 kg

## By-products
- electricity, for reuse in municipal waste incineration only: 0 kWh; CPC 17100: Electrical energy; By-product classification allocatable product; pedigree (1,1,1,1,1)
  Net electricity generated from this waste and used in internal MSWI plant energy redistribution.
  Uncertainty: uncertainty is calculated from uncertainties in waste composition and uncertainties in energy efficiency and the uncertainty in internal energy demand
  production volume 3531.43 kWh
  property exergy 3.6 MJ; name E_el_prod_MSWI_exergy
    This exergy property is based on the exergy content of the product.
  property true value relation 3.6; name E_el_prod_MSWI_true_value_relation
    property to calculate "true value" from
  property price 0.1 EUR2005; name E_el_prod_MSWI_price_EUR2005
    Estimated to be the same price as in case of electricity, medium voltage.
  property true value 0.00106573
    allocation property applied in "true value" allocation // value calculated from true value relation
- heat, for reuse in municipal waste incineration only: 0 MJ; CPC 17300: Steam and hot water; By-product classification allocatable product; pedigree (1,1,1,1,1)
  Net useful heat generated from this waste and used in internal MSWI plant energy redistribution.
  Uncertainty: uncertainty is calculated from uncertainties in waste composition and uncertainties in energy efficiency and the uncertainty in internal energy demand
  production volume 30099.8 MJ
  property true value relation 0.1842; name E_th_prod_MSWI_true_value_relation
    property to calculate "true value" from
  property exergy 0.1842 MJ; name E_th_prod_MSWI_exergy
    This exergy property is based on the exergy content of the product.
  property price 0.0106 EUR2005; name E_th_prod_MSWI_price_EUR2005
    Average European district heat price from Ecoheatcool and Euroheat 2005-2006, Ecoheat Work package 1: The European heat market. Final report. 10.6 EUR/GJ i s the price of district heat. http://www.solarthermalworld.org/files/Ecoheatcool%20WP1%20Web.pdf?download
  property true value 0.00046478
    (same comment as for electricity, for reuse in municipal waste incineration only)
- zinc concentrate: 0 kg; CPC 14290: Other non-ferrous metal ores and concentrates (other than uranium or thorium ores and concentrates); By-product classification allocatable product
  Calculated value from the knowledge of the properties of both products.
  production volume 2.27924e-8 kg
  property price 0.38 EUR2005; name ByP_price_EUR2005
    Temporary price data. Calculated as 90% of purchasers price based on: Zinc content in concentrate 53%. Concentrate price per kg Zn 86.5% of refined Zn price (13.5% treatment charges according to CHR Metals Limited 2005: Dynamic cost curves. http://www.minecost.com/dynamic.pdf). 2004 zinc price from USGS (2007) Mineral commodity summaries 2007. <http://minerals.usgs.gov/minerals/pubs/mcs/2007/mcs2007.pdf> [Accessed 25 May 2010]
  property zinc content 0.53; name zinc_C_zinc_concentrate
    Zinc content on a dry matter basis. Value taken from teh "zinc mine operation" /GLO dataset.
  property dry mass 1 kg; name DM_zinc_concentrate
  property carbon content 0
    carbon content on a dry matter basis (reserved; not for manual entry)
  property true value 1.97202e-14
    allocation property applied in "true value" allocation // value calculated from revenue
  properties: wet mass 1 kg, water content 0, carbon content, non-fossil 0, carbon content, fossil 0, water in wet mass 0 kg, carbon allocation 0 kg

## Inputs from technosphere
- electricity, medium voltage: 39.9996 kWh; lognormal variance with pedigree 0.05, pedigree (1,1,5,1,1)
  range of data
  EcoSpold01Location=UCTE
- steel, low-alloyed, hot rolled: 0.149999 kg; lognormal variance with pedigree 0.08, pedigree (1,1,5,1,1)
  own estimation
  EcoSpold01Location=RER
  properties: wet mass 1 kg, dry mass 1 kg, carbon content, fossil 0.005
  note on carbon content, fossil: Low alloyed steel composition given in Tab. 3.2 ecoinvent v2.2 report 10_partII. Steel assumed to have a C content of 0.5%
- diesel, burned in diesel-electric generating set, 10MW: 1.27999 MJ; lognormal variance with pedigree 0.04, pedigree (1,1,5,1,1)
  environmental report
  EcoSpold01Location=GLO
- concrete, normal: 0.000289997 m3; lognormal variance with pedigree 0.16, pedigree (1,1,5,1,1)
  EcoSpold01Location=CH
  own estimation
  properties: dry mass 2190 kg, wet mass 2380 kg, water content 0.086758
- brass: 0.00179998 kg; lognormal variance with pedigree 0.16, pedigree (1,1,5,1,1)
  EcoSpold01Location=CH
  own assumption
  properties: wet mass 1 kg, dry mass 1 kg
- waste mineral oil: -0.00239998 kg; name waste_min_oil; lognormal variance with pedigree 0.04, pedigree (1,1,5,1,1)
  EcoSpold01Location=CH
  environmental report
  production volume 1054.08 kg; = uranium_enriched* waste_min_oil
    Calculated from the production volume of uranium, enriched 4.2%, per separative work unit in proportion to the respective output amounts.
  property price 0 EUR2005; name waste_min_oil_price_EUR2005
  properties: carbon content, fossil 0.864444, water content 0.111111, wet mass 1 kg, dry mass 0.9 kg
  note on carbon content, fossil: Tab A.6, ecoinvent v2.2 report 13_I. C content has been calculated after data in the tables, and then referred to 1 kg DM
- acetylene: 2.49998e-5 kg; lognormal variance with pedigree 0.04, pedigree (1,1,5,1,1)
  EcoSpold01Location=CH
  environmental report
  properties: carbon content, fossil 0.923077, wet mass 1 kg, dry mass 1 kg
  note on carbon content, fossil: C2H2. ecoinvent v2.2 report n 8. Produced from partial oxidation of natural gas
- municipal solid waste: -0.234998 kg; name municipal_solid_waste; lognormal variance with pedigree 0.04, pedigree (1,1,5,1,1)
  environmental report
  EcoSpold01Location=CH
  production volume 103212 kg; = uranium_enriched* municipal_solid_waste
    (same comment as for waste mineral oil)
  properties: carbon content, non-fossil 0.261655, dry mass 0.771 kg, carbon content, fossil 0.171549, water content 0.297017, wet mass 1 kg
  note on carbon content, non-fossil: MSW composition in tab 4.1, ecoinvent v2.2 report 13_I. C content referred to 1 kg DM
- methanol: 0.000319997 kg; lognormal variance with pedigree 0.04, pedigree (1,1,5,1,1)
  environmental report
  EcoSpold01Location=CH
  properties: carbon content, fossil 0.375, dry mass 1 kg, wet mass 1 kg
- low level radioactive waste: -0.000629994 m3; name low_level_radioactive_waste; lognormal variance with pedigree 0.04, pedigree (1,1,5,1,1)
  environmental report
  EcoSpold01Location=CH
  production volume 276.696 m3; = uranium_enriched* low_level_radioactive_waste
    (same comment as for waste mineral oil)
  property price 0 EUR2005; name low_level_radioactive_wast_price_EUR2005
  properties: dry mass 2500 kg, wet mass 2500 kg
- sodium hydroxide, without water, in 50% solution state: 0.00279997 kg; lognormal variance with pedigree 0.04, pedigree (1,1,5,1,1)
  EcoSpold01Location=RER
  environmental report
  properties: dry mass 1 kg, wet mass 1 kg
- argon, liquid: 0.00179998 kg; lognormal variance with pedigree 0.04, pedigree (1,1,5,1,1)
  environmental report
  EcoSpold01Location=RER
  properties: wet mass 1 kg, dry mass 1 kg
- hydrogen, liquid: 1.09999e-5 kg; lognormal variance with pedigree 0.04, pedigree (1,1,5,1,1)
  EcoSpold01Location=RER
  environmental report
  properties: dry mass 1 kg, wet mass 1 kg
- soap: 0.000879992 kg; lognormal variance with pedigree 0.04, pedigree (1,1,5,1,1)
  EcoSpold01Location=RER
  environmental report
  properties: carbon content, non-fossil 0.692237, water content 0.149425, wet mass 1 kg, dry mass 0.87 kg
  note on carbon content, non-fossil: Soap (CnH2n+1 COO Na) is produced by a combined saponification and neutralisation process performed on a blend of oleochemical feedstocks comprised of short chain (C12-14, derived from coconut or palm kernel oil) and long chain (C16-18, from tallow or palm oil) esters.The ratio of short to long fatty acid chains is 20:80 (ecoinvent v2.2 report 12). Short fatty acid has been estimated as C12.5H(2*12.5+1); MW R=176 g/mol. Long fatty acid has been estimated as C16H(2*16+1); MW R=225 g/mol. MW of COONa=67 g/mol
- nitrogen, liquid: 0.000389996 kg; lognormal variance with pedigree 0.04, pedigree (1,1,5,1,1)
  EcoSpold01Location=RER
  environmental report
  properties: wet mass 1 kg, dry mass 1 kg
- water, decarbonised: 3.99996 kg; name water_decarbonised_input; lognormal variance with pedigree 0.04, pedigree (1,1,5,1,1)
  environmental report
  EcoSpold01Location=RER
  properties: wet mass 1 kg
- phosphoric acid, fertiliser grade, without water, in 70% solution state: 0.000119999 kg; lognormal variance with pedigree 0.04, pedigree (1,1,5,1,1)
  environmental report
  EcoSpold01Location=GLO
  properties: dry mass 1 kg, wet mass 1 kg
- heat, district or industrial, natural gas: 13.6799 MJ; lognormal variance with pedigree 0.04, pedigree (1,1,5,1,1)
  EcoSpold01Location=RER
  environmental report
- nitric acid, without water, in 50% solution state: 0.00149999 kg; lognormal variance with pedigree 0.04, pedigree (1,1,5,1,1)
  environmental report
  EcoSpold01Location=RER
  properties: wet mass 1 kg, dry mass 1 kg
- hydrogen peroxide, without water, in 50% solution state: 0.000679994 kg; lognormal variance with pedigree 0.04, pedigree (1,1,5,1,1)
  EcoSpold01Location=RER
  environmental report
  properties: wet mass 1 kg, dry mass 1 kg
- hydrochloric acid, without water, in 30% solution state: 0.000199998 kg; lognormal variance with pedigree 0.04, pedigree (1,1,5,1,1)
  environmental report
  EcoSpold01Location=RER
  properties: dry mass 1 kg, wet mass 1 kg
- oxygen, liquid: 3.59997e-5 kg; lognormal variance with pedigree 0.04, pedigree (1,1,5,1,1)
  EcoSpold01Location=RER
  environmental report
  properties: dry mass 1 kg, wet mass 1 kg
- uranium hexafluoride: 1.42999 kg; lognormal variance with pedigree 0.04, pedigree (1,1,5,1,1)
  calculated
  EcoSpold01Location=US
  properties: dry mass 1 kg, wet mass 1 kg
- uranium enrichment centrifuge facility: 2.21998e-8 unit; lognormal variance with pedigree 0.08, pedigree (1,1,5,1,1)
  EcoSpold01Location=GLO
  own estimation
- chemical, organic: 0.000819993 kg; lognormal variance with pedigree 0.04, pedigree (1,1,5,1,1)
  environmental report
  EcoSpold01Location=GLO
  properties: dry mass 1 kg, carbon content, fossil 0.628, wet mass 1 kg
  note on carbon content, fossil: This dataset is an unweighted average of 20 organic substances (listed in Tab 88.1, ecoinvent v2.2 report 8, part II), being part of the top100 chemicals included in this database. The C-content has also been calculated as an unweighted average of the C content of the substances composing this dataset.
- polyvinylchloride, bulk polymerised: 0.000869992 kg; lognormal variance with pedigree 0.04, pedigree (1,1,5,1,1)
  environmental report
  EcoSpold01Location=RER
  properties: carbon content, fossil 0.387097, wet mass 1 kg, dry mass 1 kg
  note on carbon content, fossil: Monomer is vynyl chloride, C2H3Cl (ecoinvent v2.2 report 11_II). MW=62 g/mol
- spent anion exchange resin from potable water production: -0.0579995 kg; name spent_anion_exchange_resin; lognormal variance with pedigree 0.04, pedigree (1,1,5,1,1)
  EcoSpold01Location=CH
  environmental report
  production volume 25473.6 kg; = uranium_enriched*spent_anion_exchange_resin
    (same comment as for waste mineral oil)
  property price 0 EUR2005; name spent_anion_exchange_resin_price_EUR2005
  properties: carbon content, fossil 0.654, dry mass 0.5 kg, wet mass 1 kg, water content 1
  note on carbon content, fossil: Tab A.12, ecoinvent v2.2 report 13_I, c content is referred to 1 kg DM
- lubricating oil: 0.00919992 kg; lognormal variance with pedigree 0.04, pedigree (1,1,5,1,1)
  EcoSpold01Location=RER
  environmental report
  properties: wet mass 1 kg, carbon content, fossil 0.75, dry mass 1 kg
  note on carbon content, fossil: Lubricating oil is produced from diesel. C-content/dry mass of fats and oils considered 75%, from: ecoinvent v2.2 report, n 15a, pg 40
- aluminium, wrought alloy: 0.0499995 kg; lognormal variance with pedigree 0.16, pedigree (1,1,5,1,1)
  own estimation
  EcoSpold01Location=RER
  properties: dry mass 1 kg, wet mass 1 kg
- chemical, inorganic: 0.0310997 kg; lognormal variance with pedigree 0.04, pedigree (1,1,5,1,1)
  EcoSpold01Location=GLO
  environmental report
  properties: dry mass 1 kg, carbon content, fossil 0.003, wet mass 1 kg
  note on carbon content, fossil: This dataset is an unweighted average of 20 inorganic substances (listed in Tab 88.1, ecoinvent v2.2 report 8, part II), being part of the top100 chemicals included in this database. The C-content has also been calculated as an unweighted average of the C content of the substances composing this dataset.

## Emissions to nature
- Ethanol [air, non-urban air or from high stacks]: 0.00129999 kg; lognormal variance with pedigree 0.04, pedigree (1,1,5,1,1)
  environmental report
- Fluoride [water, surface water]: 0.000109999 kg; lognormal variance with pedigree 0.04, pedigree (1,1,5,1,1)
  environmental report
- Water [water, unspecified]: 0.00244998 m3; name water_to_water_unspecified; = (water_decarbonised_input/1000)*(1-fraction_WDC_to_air); lognormal variance with pedigree 0.130025, pedigree (4,4,5,2,4)
  Calculated value based on literature values and expert opinion. See comments in the parametres' comment field.
  property fraction, origin: salt water 0; name fraction_origin_salt_water_Ww
  property fraction, origin: fresh water 1; name fraction_origin_fresh_water_Ww
  property fraction, origin: unspecified 0; name fraction_origin_unspecified_Ww
- Ethane, 1,1,1,2-tetrafluoro-, HFC-134a [air, non-urban air or from high stacks]: 0.000259998 kg; lognormal variance with pedigree 0.06, pedigree (1,1,5,1,1)
  extrapolated from environmental report
- Hydrogen fluoride [air, non-urban air or from high stacks]: 3.69997e-8 kg; lognormal variance with pedigree 0.04, pedigree (1,1,5,1,1)
  environmental report
- Water [air, unspecified]: 0.00154999 m3; name water_to_air_unspecified; = (water_decarbonised_input/1000)*fraction_WDC_to_air; lognormal variance with pedigree 0.130025, pedigree (4,4,5,2,4)
  (same comment as for Water)
  property fraction, origin: unspecified 0; name fraction_origin_unspecified
  property fraction, origin: fresh water 1; name fraction_origin_fresh_water
  property fraction, origin: salt water 0; name fraction_origin_salt_water
- Uranium alpha [air, non-urban air or from high stacks]: 5.79995e-5 kBq; lognormal variance with pedigree 0.04, pedigree (1,1,5,1,1)
  environmental report
- Thorium-234 [air, non-urban air or from high stacks]: 0.000289997 kBq; lognormal variance with pedigree 0.08, pedigree (1,1,5,1,1)
  emission from environmental report, but isotpes not given
- Thorium-234 [water, surface water]: 0.00309997 kBq; lognormal variance with pedigree 0.04, pedigree (1,1,5,1,1)
  environmental report
- Phosphate [water, surface water]: 0.000339997 kg; lognormal variance with pedigree 0.04, pedigree (1,1,5,1,1)
  environmental report
- Hydrocarbons, unspecified [water, surface water]: 6.09994e-5 kg; lognormal variance with pedigree 0.04, pedigree (1,1,5,1,1)
  environmental report
- Copper, ion [water, surface water]: 1.29999e-6 kg; lognormal variance with pedigree 0.04, pedigree (1,1,5,1,1)
  environmental report
- Uranium alpha [water, surface water]: 8.19993e-6 kBq; lognormal variance with pedigree 0.04, pedigree (1,1,5,1,1)
  environmental report
- Zinc, ion [water, surface water]: 3.79997e-5 kg; lognormal variance with pedigree 0.04, pedigree (1,1,5,1,1)
  environmental report
- Chromium, ion [water, surface water]: 3.79997e-6 kg; lognormal variance with pedigree 0.04, pedigree (1,1,5,1,1)
  environmental report
- Nitrate [water, surface water]: 0.00249998 kg; lognormal variance with pedigree 0.04, pedigree (1,1,5,1,1)
  environmental report
- Aluminium [water, surface water]: 0.00109999 kg; lognormal variance with pedigree 0.04, pedigree (1,1,5,1,1)
  environmental report

## Sampling procedure
Literature

## Extrapolations
This dataset is a copy from an original RER dataset valid for a mix of Germany, the Netherlands, and the United Kingdom.
