# sawmill construction

Dataset: EcoSpold 2, unit process
Geography: Europe without Switzerland
Time period: 2002-01-01 to 2019-12-31
Technology level: current
Classification: ISIC rev.4 ecoinvent: 4290:Construction of other civil engineering projects
Synonyms: sawing mill; Sägewerk
Tags: Swiss brush-up completed
Scenario: Business-as-Usual
System model: Allocation at the point of substitution
Generated by: Frank Werner
Published in: Werner F. 2007
Database: ecoinvent
isCopyrightProtected: true
accessRestrictedTo: 1

## General comment
The service life is assumed to be 50 years. Thus the life time output is 2'500'000 m3 sawn timber. This data must only be used to consider the infrastructure needed for sawing wood if this is not relevant.

## Included activities end
The land area and the material and their transports needed for building and disposal of a sawmill with a yearly output of 50'000 m3 sawn timber is included. Land used for air drying of wood is not included.

## Geography
Data are derived by averaging rough estimates of a small sawmill in Switzerland and a large sawmill in Germany. Estimates are so rough that the Geograhpy is not relevant.

## Technology
Sawmill with it's input wood storage place, a lop station, a hall with the saw and a conveyer belt.

## Reference product
- sawmill: 1 unit; name m_sawmill; CPC 53269: Other constructions for manufacturing; By-product classification allocatable product
  production volume 1.32237 unit
    This is a placeholder value that does not reflect real-world production volumes. This dataset does not currently require a real-world production volume to work in the database framework, and no actual data were collected yet. This has no negative effect on the results of the ecoinvent database. The placeholder value of this activity was scaled according to the nominal GDP of 2005 (source: United Nations, http://data.un.org/Glossary.aspx?q=GDP+%28current+US%24%29, accessed 20130726) to reflect an appropriate share of the global production volume, which is also a placeholder value.
  property lifetime capacity in m3 2.5e6 m3; name m_sawmill_Lft_capacity_m3; = 50000* m_sawmill_lifetime
    Sawmill with a yearly output of 50'000 m3 sawn timber.
  property lifetime 50 year; name m_sawmill_lifetime
    Estimated value.
  property price 2.6847e6 EUR2005
    Calculated based on inputs: The price of the product has been calculated as a sum of the values of the material and energy inputs for this product. This value is therefore a rough estimation. It may underestimate the real price since there are additional expenses when producing any product. These expences can include for example labour costs, treatment of waste materials and profit for the producer. Please consider carefully whether this level of data quality is acceptable for your application.
  property true value 2.6847e6; name m_sawmill_true_value
    allocation property applied in "true value" allocation // value calculated from revenue

## By-products
- iron scrap, sorted, pressed: 0 kg; By-product classification Recyclable; CPC 39310: Slag, dross, scalings and other waste from the manufacture of iron or steel; pedigree (1,1,1,1,1)
  Iron scrap recovered from this waste.
  production volume 42.9006 kg
  property price 0.175 EUR2005
    Temporary price data. Calculated as 90% of purchasers price based on: 2005 import and export prices (total trades (USD) divided by total weight (kg) in biggest economies of the world: EU27, USA, Brasil, China, India, Japan and Russia) from UN Commodity Trade Statistics Database (http://data.un.org/Explorer.aspxDatabase [Accessed 2011.06.20]). Commodity: Waste or scrap, of cast iron
  property carbon content 0
    carbon content on a dry matter basis (reserved; not for manual entry)
  property true value 22.2045
    allocation property applied in "true value" allocation // value calculated from revenue
  properties: water content 0, water in wet mass 0 kg, carbon content, fossil 0, dry mass 1 kg, carbon content, non-fossil 0, wet mass 1 kg, carbon allocation 0 kg

## Inputs from technosphere
- cast iron: 816993 kg; name m_cast_iron; lognormal variance with pedigree 0.0831, pedigree (3,5,5,3,3)
  properties: SAM_activityLink_1 401, SAM_activityLink_1_scaling_factor 1, carbon content, fossil 0.04, wet mass 1 kg, dry mass 1 kg
  note on SAM_activityLink_1: to be used only in special submissions in coordination with ecoinvent and the Swiss FOEN
  note on carbon content, fossil: Cast iron is made by remelting pig iron in small furnaces (e.g. cupola furnaces or electric arc furnaces) and poured into moulds to make castings. It usually contains 2% to 6% carbon (ecoinvent v2.2 report 10_partII). An average content of 4% was considered
- waste reinforced concrete: -4.93916e6 kg; name w_reinforcing_concrete; = (m_concrete*2205)*-1; lognormal variance with pedigree 0.0657, pedigree (2,1,5,3,1)
  Calculated value.
  production volume 1.67e6 kg
    Calculated from the production volume of sawmill in proportion to the respective output amounts.
  properties: SAM_activityLink_1 883, dry mass 0.99418 kg, water content 0.00585407, wet mass 1 kg, SAM_activityLink_1_scaling_factor -1
- concrete, normal: 2239.98 m3; name m_concrete; lognormal variance with pedigree 0.0831, pedigree (3,5,5,3,3)
  Linking to specific geographical region where infrastructure is located
  properties: water content 0.086758, dry mass 2190 kg, wet mass 2380 kg
- steel, low-alloyed, hot rolled: 854993 kg; name m_steel_low_alloyed; lognormal variance with pedigree 0.0831, pedigree (3,5,5,3,3)
  properties: SAM_activityLink_1_scaling_factor 1, SAM_activityLink_2 2662, SAM_activityLink_1 4222, dry mass 1 kg, carbon content, fossil 0.005, wet mass 1 kg, SAM_activityLink_2_scaling_factor 1
  note on carbon content, fossil: Low alloyed steel composition given in Tab. 3.2 ecoinvent v2.2 report 10_partII. Steel assumed to have a C content of 0.5%
- building, hall: 7779.94 m2; lognormal variance with pedigree 0.6081, pedigree (3,5,5,3,3)
  properties: SAM_activityLink_1_scaling_factor 1, SAM_activityLink_9 4433, SAM_activityLink_8 4417, SAM_activityLink_8_scaling_factor 43.0591, SAM_activityLink_9_scaling_factor 32.2622, SAM_activityLink_1 342
  note on SAM_activityLink_9: This link has been introduced to model transport specifically for the SAM model; to be used only in special submissions in coordination with ecoinvent and the Swiss FOEN.
  note on SAM_activityLink_8_scaling_factor: Scaling factor = amount of transport in corresponding KBOB dataset/amount of this input from technosphere. Source for transport distance: Life Cycle Inventories of Wood as Fuel and Construction Material/2007/Werner F. To be used only in special submissions in coordination with ecoinvent and the Swiss FOEN
- waste bulk iron, excluding reinforcement: -1.67199e6 kg; name w_waste_bulk_iron; = (m_cast_iron+m_steel_low_alloyed)*-1; lognormal variance with pedigree 0.0657, pedigree (2,1,5,3,1)
  Calculated value.
  production volume 2.211e6 kg
    Calculated from production volume of reference product using the relative outputs.
  properties: dry mass 1 kg, wet mass 1 kg
- conveyor belt: 2239.98 m; lognormal variance with pedigree 0.0831, pedigree (3,5,5,3,3)
  Linking to specific geographical region where infrastructure is located
  properties: SAM_activityLink_1 579, SAM_activityLink_1_scaling_factor 1

## Inputs from nature
- Transformation, to industrial area [natural resource, land]: 78799.3 m2; name transformation_to; = transformation_from; lognormal variance with pedigree 0.4081, pedigree (3,5,5,3,3)
  Calculated from input
- Transformation, from unspecified [natural resource, land]: 78799.3 m2; name transformation_from; lognormal variance with pedigree 0.4081, pedigree (3,5,5,3,3)
- Occupation, industrial area [natural resource, land]: 3.93897e6 m2*year; lognormal variance with pedigree 0.2581, pedigree (3,5,5,3,3)

## Sampling procedure
estimation
