# foam glass production, without cullet, electricity, label-certified

Dataset: EcoSpold 2, unit process
Geography: GLO
Time period: 2005-01-01 to 2019-12-31
Technology level: current
Classification: EcoSpold01Categories: insulation materials/production
Classification: ISIC rev.4 ecoinvent: 2399:Manufacture of other non-metallic mineral products n.e.c.
Synonyms: T4 WDS
Scenario: Business-as-Usual
System model: Allocation at the point of substitution
Share of production covered: 100 %
Generated by: Tereza Levova
Published in: Kellenberger D. 2007
Database: ecoinvent
isCopyrightProtected: true
accessRestrictedTo: 1

## General comment
Refers to foam glass of a density of 110 kg/m3 and a thermal conductivity of 0.040 W/mK produced by using label-certified electricity.
This dataset is based on the dataset for "foam glass production", adjusting the cullet input to zero, with consequences for the input of raw materials (feldspar, lime and soda), the electricity input (for melting) and the CO2 emissions (resulting from decarbonisation of the raw materials), based on data from flatt glass production and "EU commission 2012: Best Available Techniques (BAT) Reference Document for the Manufacture of Glass)"

## Included activities end
Included processes: melting, forming to a pipe, cooling down, smashing, crushing, mixing with carbon powder. Foaming by heating in a mould, cooling, cutting to slabs and packing. Internal processes (workshop, administration etc.), transport of raw materials and energy carrier for furnace, packing and infrastructure are also included.

## Geography
Data are from one company in Belgium which covers nearly 100% of the European foam glass market.

## Technology
All data refer to the year 2005. Today foam glass is made of 68% recycled glass and only recycled glass is used instead of silica sand. Recycled glass is to some extent directly injected to the cellulating furnace without melting, resulting in less energy use. The energy for the melting process is electricity. Natural gas is used for the cellulating process. All emissions from processing raw materials and heating are taken into account.

## Parameters
- cullet input, kg per kg output: 0.81385; name cullet_fraction; lognormal variance with pedigree 0.0026, pedigree (1,3,1,5,1)
  Cullet input in original dataset
- electricity input: 1.4969 kWh; name electricity_original; lognormal variance with pedigree 0.0026, pedigree (1,3,1,5,1)
  electricity use per kg glass in original dataset
- original cullet input, kg per kg raw material input: 0.68; name cullet_original; lognormal variance with pedigree 0.0026, pedigree (1,3,1,5,1)
  68% cullet in original dataset.
- Na2O in cullet: 0.13 kg; name Na2O_in_cullet; triangular min 0.12, mostLikely 0.13, max 0.14, pedigree (2,1,1,5,2)
  Average Na2O content in container glass (EU commission 2012: Best Available Techniques (BAT) Reference Document for the Manufacture of Glass)
- fraction, process water, to air: 0.15 dimensionless; name fraction_PW_to_air; lognormal variance with pedigree 0.092025, pedigree (4,4,3,2,4)
  Literature value. In case when no industry/process specific data are available, default evaporation fraction value is used. This value is 15% and is based on literature (Statistics Canada, 2007 & Shaffer, K.H., 2008, Consumptive water use in the Great Lakes Basin, USGS & Shiklomanov, 2003, World Water Resources at the Beginning of the 21st Century) and has been approved by an expert.
- energy saving factor: 0.25; name energy_saving_factor; triangular min 0.2, mostLikely 0.25, max 0.3, pedigree (2,1,1,5,1)
  Reduction of energy requirement per % cullet (EU commission 2012: Best Available Techniques (BAT) Reference Document for the Manufacture of Glass)
- fraction, tap water, to air: 0.15; name fraction_TW_to_air; = fraction_PW_to_air; lognormal variance with pedigree 0.092025, pedigree (4,4,3,2,4)
  Calculated value. See comment in the other parametres present in this dataset. Tap water is considered to be always used as process water, thus process water fractions to air are applied to all tap water input flows to calculate the amount of water consumed in the processes.
- CaO in cullet: 0.105 kg; name CaO_in_cullet; triangular min 0.09, mostLikely 0.105, max 0.12, pedigree (2,1,1,5,2)
  Average CaO content in container glass (EU commission 2012: Best Available Techniques (BAT) Reference Document for the Manufacture of Glass)
- original soda input: 0.046154 kg; name soda_original; lognormal variance with pedigree 0.0026, pedigree (1,3,1,5,1)
  Soda input in original dataset

## Reference product
- foam glass, electricity, label-certified: 1 kg; By-product classification allocatable product; CPC 37117: Paving blocks, bricks, tiles and other articles of pressed or moulded glass, of a kind used for building or co[…]
  production volume 9738.75 kg
    Estimated. The global production volume of foam glass produced from glass cullets is extrapolated from European production volume with factor 3.18 (GDP). The production of foam glass, without cullet, electricity, label-certified is estimated to be 1% of the production volume of foam glass, electricity, label-certified.
  property carbon content 0
    carbon content on a dry matter basis (reserved; not for manual entry)
  property true value 1.77
    allocation property applied in "true value" allocation // value calculated from revenue
  properties: price 1.77 EUR2005, dry mass 1 kg, water in wet mass 0 kg, wet mass 1 kg, carbon content, non-fossil 0, carbon content, fossil 0, water content 0, carbon allocation 0 kg

## By-products
- waste paperboard, sorted: 0 kg; CPC 39240: Waste and scrap of paper or paperboard; By-product classification Recyclable; pedigree (1,1,1,1,1)
  It is assumed that 86.3% (wet weight) of waste paperboard, unsorted is segregated to waste paperboard, sorted. Waste paper, sorted is later used in recycling industry where maximum 79% of it, is transformed into new paperboard.
  production volume 0.0252262 kg
  property price 0.0436 EUR2005; name ByP_waste_paperboard_sorted_price_EUR200
    Estimated value; three different sources were used to determine the price for waste paperboard, sorted. 35 AUD/tonne (http://larimer.org/solidwaste/charts/Current.htm, accessed 20130328), 70 GBP/tonne (http://www.letsrecycle.com/prices/waste%20paper, accessed 20130328) and 20 USD/tonne (http://www.oxpaperboard.com/1/post/2013/03/ox-paperboard-announces-price-adjustment-to-uncoated-recycled-paperboard.html, accessed 20130328).
  property water content 0.243781; = WWM_waste_paperboard_sorted/ DM_waste_paperboard_sorted
  property water in wet mass 0.196 kg; name WWM_waste_paperboard_sorted; = WM_waste_paperboard_sorted- DM_waste_paperboard_sorted
  property dry mass 0.804 kg; name DM_waste_paperboard_sorted
  property wet mass 1 kg; name WM_waste_paperboard_sorted
  property carbon content 0.483259
    carbon content on a dry matter basis (reserved; not for manual entry)
  property true value 0.000274965
    allocation property applied in "true value" allocation // value calculated from revenue
  properties: carbon content, non-fossil 0.483259, carbon content, fossil 0, carbon allocation 0.38854 kg
- electricity, for reuse in municipal waste incineration only: 0 kWh; CPC 17100: Electrical energy; By-product classification allocatable product; pedigree (1,1,1,1,1)
  Net electricity generated from this waste and used in internal MSWI plant energy redistribution.
  Uncertainty: uncertainty is calculated from uncertainties in waste composition and uncertainties in energy efficiency and the uncertainty in internal energy demand
  production volume 0.161585 kWh
  property true value relation 3.6; name E_el_prod_MSWI_true_value_relation
    property to calculate "true value" from
  property exergy 3.6 MJ; name E_el_prod_MSWI_exergy
    This exergy property is based on the exergy content of the product.
  property price 0.1 EUR2005; name E_el_prod_MSWI_price_EUR2005
    Estimated to be the same price as in case of electricity, medium voltage.
  property true value 0.00266209
    allocation property applied in "true value" allocation // value calculated from true value relation
- heat, for reuse in municipal waste incineration only: 0 MJ; CPC 17300: Steam and hot water; By-product classification allocatable product; pedigree (1,1,1,1,1)
  Net useful heat generated from this waste and used in internal MSWI plant energy redistribution.
  Uncertainty: uncertainty is calculated from uncertainties in waste composition and uncertainties in energy efficiency and the uncertainty in internal energy demand
  production volume 1.12643 MJ
  property true value relation 0.1842; name E_th_prod_MSWI_true_value_relation
    property to calculate "true value" from
  property exergy 0.1842 MJ; name E_th_prod_MSWI_exergy
    This exergy property is based on the exergy content of the product.
  property price 0.0106 EUR2005; name E_th_prod_MSWI_price_EUR2005
    Average European district heat price from Ecoheatcool and Euroheat 2005-2006, Ecoheat Work package 1: The European heat market. Final report. 10.6 EUR/GJ i s the price of district heat. http://www.solarthermalworld.org/files/Ecoheatcool%20WP1%20Web.pdf?download
  property true value 0.000950761
    (same comment as for electricity, for reuse in municipal waste incineration only)
- zinc concentrate: 0 kg; CPC 14290: Other non-ferrous metal ores and concentrates (other than uranium or thorium ores and concentrates); By-product classification allocatable product
  Calculated value from the knowledge of the properties of both products.
  production volume 2.01624e-5 kg
  property price 0.38 EUR2005; name ByP_price_EUR2005
    Temporary price data. Calculated as 90% of purchasers price based on: Zinc content in concentrate 53%. Concentrate price per kg Zn 86.5% of refined Zn price (13.5% treatment charges according to CHR Metals Limited 2005: Dynamic cost curves. http://www.minecost.com/dynamic.pdf). 2004 zinc price from USGS (2007) Mineral commodity summaries 2007. <http://minerals.usgs.gov/minerals/pubs/mcs/2007/mcs2007.pdf> [Accessed 25 May 2010]
  property zinc content 0.53; name zinc_C_zinc_concentrate
    Zinc content on a dry matter basis. Value taken from teh "zinc mine operation" /GLO dataset.
  property dry mass 1 kg; name DM_zinc_concentrate
  property carbon content 0
    carbon content on a dry matter basis (reserved; not for manual entry)
  property true value 2.88789e-8
    allocation property applied in "true value" allocation // value calculated from revenue
  properties: wet mass 1 kg, water content 0, carbon content, non-fossil 0, carbon content, fossil 0, water in wet mass 0 kg, carbon allocation 0 kg

## Inputs from technosphere
- electricity, medium voltage, label-certified: 1.79954 kWh; = electricity_original/(1-energy_saving_factor*cullet_original); lognormal variance with pedigree 0.0426, pedigree (1,3,5,5,1)
  Calculated from original electricity input and cullet fraction and the reduction in energy requirement per % cullet (EU commission 2012: Best Available Techniques (BAT) Reference Document for the Manufacture of Glass)
- iron ore, beneficiated, 65% Fe: 0.0276313 kg; name iron; lognormal variance with pedigree 0.0426, pedigree (1,3,5,5,1)
  EcoSpold01Location=GLO
  properties: dry mass 1 kg, wet mass 1 kg
- clay: 0 kg; pedigree (1,1,1,1,1)
  EcoSpold01Location=CH
  properties: dry mass 0.965 kg, wet mass 1 kg, water content 0.0362694
- manganese concentrate: 0.0260967 kg; name mn; lognormal variance with pedigree 0.0426, pedigree (1,3,5,5,1)
  EcoSpold01Location=GLO
  properties: dry mass 1 kg, wet mass 1 kg
- steel, chromium steel 18/8, hot rolled: 0.00126831 kg; lognormal variance with pedigree 0.0426, pedigree (1,3,5,5,1)
  EcoSpold01Location=RER
  properties: dry mass 1 kg, carbon content, fossil 0.0008, wet mass 1 kg
  note on carbon content, fossil: Stainless steel model is the grade 304 steel (18/8 stainless, 18% chromium 8% nickel; max. 0.08% C)
- corrugated board box: 0 kg; pedigree (1,1,1,1,1)
  EcoSpold01Location=RER
  properties: wet mass 1 kg, carbon content, non-fossil 0.433862, water content 0.0582011, dry mass 0.945 kg, carbon content, fossil 0.000486772
  note on carbon content, non-fossil: Biogenic C content was calculated after biogenic C contents of chemicals used in the production of board (Tab 10.15 & 10.16, ecoinvent v2.2 report 11_III, part 10).
  note on carbon content, fossil: Fossil C content was calculated after fossil C contents of chemicals used in the production of board (Tab 10-15 & 10.16 ecoinvent v2.2 report 11_III, part 10)
- foam glass factory: 5.09082e-10 unit; lognormal variance with pedigree 0.3521, pedigree (1,2,5,5,1)
  EcoSpold01Location=BE
- carbon black: 0.00614031 kg; name C; lognormal variance with pedigree 0.0426, pedigree (1,3,5,5,1)
  EcoSpold01Location=GLO
  properties: dry mass 1 kg, carbon content, fossil 0.85, wet mass 1 kg
- packaging film, low density polyethylene: 0.014568 kg; lognormal variance with pedigree 0.0426, pedigree (1,3,5,5,1)
  EcoSpold01Location=RER
  properties: carbon content, fossil 0.857143, wet mass 1 kg, dry mass 1 kg
  note on carbon content, fossil: Polyethylene is formed out of a huge amount of ethylene monomers (C2H4) (ecoinvent v2.2 report 11_II). MW=28 g/mol
- lime: 0 kg; pedigree (1,1,1,1,1)
  Calculated to correspond to give same composition of foam glass as foam glass with cullet from packaging glass. Molar mass of lime (CaCO3) to CaO:100 to 56.
  Uncertainty: ;
  property water content 0; name water_content
  property dry mass 1 kg; name DM
  property water in wet mass 0 kg; name WWM
  property carbon content, fossil 0.120005; name C_content_fossil
  property wet mass 1 kg; name WM
  property carbon content, non-fossil 0; name C_content_non_fossil
- sinter, iron: 0.000399123 kg; lognormal variance with pedigree 0.0426, pedigree (1,3,5,5,1)
  EcoSpold01Location=GLO
  properties: dry mass 1 kg, wet mass 1 kg
- potassium nitrate: 0.0024574 kg; = 0.00034104*101.1/14; lognormal variance with pedigree 0.0406, pedigree (1,3,5,1,1)
  calculated from original value given as kg N
  properties: dry mass 1 kg, wet mass 1 kg
- soda ash, light, crystalline, heptahydrate: 0.226541 kg; name soda; = cullet_fraction*Na2O_in_cullet*106/62+soda_original; lognormal variance with pedigree 0.1, pedigree (1,5,5,5,1)
  Calculated to correspond to give same composition of foam glass as foam glass with cullet from packaging glass. Molar mass of soda (Na2CO3) to Na2O:106 to 62.
  EcoSpold01Location=RER
  Uncertainty: ;
  properties: carbon content, fossil 0.0517241, wet mass 1 kg, dry mass 1 kg
- molybdenum: 7.67544e-5 kg; lognormal variance with pedigree 0.0426, pedigree (1,3,5,5,1)
  EcoSpold01Location=RER
  properties: wet mass 1 kg, dry mass 1 kg
- waste paperboard, unsorted: -0.00729168 kg; lognormal variance with pedigree 0.0426, pedigree (1,3,5,5,1)
  EcoSpold01Location=CH
  production volume 0.0292308 kg
    Calculated from the production volume of foam glass in proportion to the respective output amounts.
  properties: carbon content, non-fossil 0.483259, dry mass 0.804 kg, price 0.03924 EUR2005, water content 0.243781, wet mass 1 kg
  note on carbon content, non-fossil: C content was calculated for 1 kg DM, using data in Tab A.3, ecoinvent v2.2 report 13_I.
- heat, central or small-scale, other than natural gas: 0.0396711 MJ; lognormal variance with pedigree 0.0426, pedigree (1,3,5,5,1)
  EcoSpold01Location=CH
- silica sand: 0.455753 kg; = 1-lime*56/100-soda*62/106-feldspar-iron-mn-Al_hydroxide*102/156-C-Na2SO4*62/142; lognormal variance with pedigree 0.0426, pedigree (1,3,5,5,1)
  Calculated as residual raw material requirement.
  properties: water content 0.010101, dry mass 0.99 kg, wet mass 1 kg
- tap water: 0.0368421 kg; name tap_water_input; lognormal variance with pedigree 0.0426, pedigree (1,3,5,5,1)
  EcoSpold01Location=RER
  properties: dry mass 0.000337476 kg, water content 2962.17, wet mass 1 kg, carbon content, fossil 0.00178991
  note on carbon content, fossil: Bicarbonate content is 2.93 mol/m3. CO2 content is 0.1 mol/m3 (ecoinvent v2.2 report 8, Tab 93.1).
- wastewater, average: 0 m3; pedigree (1,1,1,1,1)
  EcoSpold01Location=CH
  production volume 0 m3
    (same comment as for waste paperboard, unsorted)
  properties: carbon content, non-fossil 0.194039, dry mass 0.346837 kg, wet mass 1000 kg, water content 2882.2
  note on carbon content, non-fossil: 0.0673 kg TOC/m3 (Tab A.17, ecoinvent v2.2 report 13_I). TOC was considered as Total Carbon.
- aluminium hydroxide: 0.00638597 kg; name Al_hydroxide; lognormal variance with pedigree 0.0426, pedigree (1,3,5,5,1)
  EcoSpold01Location=RER
  properties: dry mass 1 kg, wet mass 1 kg
- heat, district or industrial, natural gas: 11.011 MJ; lognormal variance with pedigree 0.0426, pedigree (1,3,5,5,1)
  EcoSpold01Location=RER
- diesel, burned in building machine: 0.0960301 MJ; lognormal variance with pedigree 0.0426, pedigree (1,3,5,5,1)
  EcoSpold01Location=GLO
- sodium sulfate, anhydrite: 0 kg; name Na2SO4; pedigree (1,1,1,1,1)
  EcoSpold01Location=RER
  properties: wet mass 1 kg, dry mass 1 kg
- feldspar: 0.257894 kg; lognormal variance with pedigree 0.1, pedigree (1,5,5,5,1)
  Calculated as residual raw material requirement.
  EcoSpold01Location=RER
  Uncertainty: ;
  properties: dry mass 1 kg, wet mass 1 kg
- EUR-flat pallet: 0.0015927 unit; lognormal variance with pedigree 0.0426, pedigree (1,3,5,5,1)
  26.4 kg per pallet
  EcoSpold01Location=RER
  properties: water content 0.2, dry mass 18.3333 kg, carbon content, non-fossil 0.58833, carbon content, fossil 0.0311351, wet mass 22 kg
  note on carbon content, non-fossil: C content in components of the pallet (ecoinvent v2.2 report 7_part XVIII)
- waste sealing sheet, polyethylene: 0 kg; pedigree (1,1,1,1,1)
  EcoSpold01Location=CH
  production volume 0 kg
    (same comment as for waste paperboard, unsorted)
  properties: dry mass 0.96 kg, wet mass 1 kg, water content 0.0416667, carbon content, fossil 0.851042
  note on carbon content, fossil: C content in 1 kg DM was calculated using data in Tab A.5, ecoinvent v2.2 report 13_I
- waste wood, untreated: 0 kg; pedigree (1,1,1,1,1)
  26.4 kg per pallet
  EcoSpold01Location=CH
  production volume 0 kg
    (same comment as for waste paperboard, unsorted)
  properties: water content 0.25, dry mass 0.8 kg, wet mass 1 kg, carbon content, non-fossil 0.48632
  note on carbon content, non-fossil: Tab A.4, ecoinvent v2.2 report 13_I. C content has been referred to 1 kg DM,
- clay: 5.348e-8, 0.000348411 kg (2 entries); lognormal variance with pedigree 0.0426, pedigree (1,3,5,5,1)
  EcoSpold01Location=CH
- corrugated board box: 0.0015056, 6.73164e-5, 0.00571877 kg (3 entries); lognormal variance with pedigree 0.0426, pedigree (1,3,5,5,1)
  EcoSpold01Location=RER
- lime: 0.0121052, 0.140157 kg (2 entries); lognormal variance with pedigree 0.1, pedigree (1,5,5,5,1)
  (same comment as for lime)
  properties: dry mass 1 kg, carbon content, fossil 0.120005, wet mass 1 kg
- wastewater, average: -6.47529e-5, -7.00505e-6, -0.000135477 m3 (3 entries); lognormal variance with pedigree 0.0421, pedigree (1,2,5,5,1)
  EcoSpold01Location=CH
  production volume 0.00083076 m3
- sodium sulfate, anhydrite: 0.000860488, 0.00451231 kg (2 entries); lognormal variance with pedigree 0.0426, pedigree (1,3,5,5,1)
  EcoSpold01Location=RER
- waste sealing sheet, polyethylene: -0.000216811, -0.0143512 kg (2 entries); lognormal variance with pedigree 0.0426, pedigree (1,3,5,5,1)
  EcoSpold01Location=CH
  production volume 0.0584 kg
- waste wood, untreated: -0.00403056, -0.000317109, -0.000890664, -0.000212725, -0.00255393, -0.000134558, -2.31843e-5, -0.0338829 kg (8 entries); lognormal variance with pedigree 0.0426, pedigree (1,3,5,5,1)
  26.4 kg per pallet
  EcoSpold01Location=CH
  production volume 0.168552 kg

## Inputs from nature
- Water, well, in ground [natural resource, in water]: 0.000236401 m3; name water_well_in_ground_input; lognormal variance with pedigree 0.0426, pedigree (1,3,5,5,1)

## Emissions to nature
- Particulates, < 2.5 um [air, non-urban air or from high stacks]: 4.55998e-5 kg; lognormal variance with pedigree 0.3521, pedigree (1,2,5,5,1)
- Carbon dioxide, fossil [air, non-urban air or from high stacks]: 0.161031 kg; = soda*44/106+lime*44/100; lognormal variance with pedigree 0.0446, pedigree (3,3,5,5,1)
  Stoichiometric emission of CO2 (molar mass 44) from soda (Na2CO3; molar mass 106) and lime (CaCO3; molar mass 100).
- Water [water, unspecified]: 2.50216e-5 m3; name water_to_water_unspecified; = (tap_water_input/1000)*(1-fraction_TW_to_air)+water_well_in_ground_input*(1-fraction_PW_to_air)-0.00020769; lognormal variance with pedigree 0.130025, pedigree (4,4,5,2,4)
  Calculated value based on literature values and expert opinion. See comments in the parametres' comment field.
  property fraction, origin: unspecified 0; name fraction_origin_unspecified_Ww
  property fraction, origin: fresh water 1; name fraction_origin_fresh_water_Ww
  property fraction, origin: salt water 0; name fraction_origin_salt_water_Ww
- Nitrogen oxides [air, non-urban air or from high stacks]: 0.000997808 kg; lognormal variance with pedigree 0.0846, pedigree (3,3,5,5,1)
- Water [air, unspecified]: 4.09864e-5 m3; name water_to_air_unspecified; = (tap_water_input/1000)*fraction_TW_to_air+water_well_in_ground_input*fraction_PW_to_air; lognormal variance with pedigree 0.130025, pedigree (4,4,5,2,4)
  (same comment as for Water)
  property fraction, origin: unspecified 0; name fraction_origin_unspecified
  property fraction, origin: fresh water 1; name fraction_origin_fresh_water
  property fraction, origin: salt water 0; name fraction_origin_salt_water
- Sulfur dioxide [air, non-urban air or from high stacks]: 0.000230264 kg; lognormal variance with pedigree 0.0446, pedigree (3,3,5,5,1)

## Sampling procedure
Original survey data adjusted for changed raw material composition (virgin raw materials replacing cullet)

## Extrapolations
This dataset has been copied from an original dataset covering the geography RER. The uncertainty has been adjusted accordingly.

## Review by Emilia Moreno Ruiz 2013-01-18
to model foam glass that uses label-certified electricity
