# baling

Dataset: EcoSpold 2, unit process
Geography: CA-QC
Time period: 1991-01-01 to 2019-12-31
Technology level: current
Classification: EcoSpold01Categories: agricultural means of production/work processes
Classification: ISIC rev.4 ecoinvent: 0163:Post-harvest crop activities
Scenario: Business-as-Usual
System model: Allocation at the point of substitution
Generated by: Dominique Maxime
Published in: Nemecek, T. 2007
Database: ecoinvent
isCopyrightProtected: true
accessRestrictedTo: 1

## General comment
This dataset represents the baling of round and large square bales (around 360 kg). The average baling rate is 45.7 bales per hour.
Child dataset exchanges scaled from GLO parent dataset based on diesel consumption in Quebec. Created to proxy farm machinery/fieldwork representative of the Quebec context. Data quality indicators adjusted accordingly. Other difference with the parent dataset is the production volume, which now represents the production volume in Quebec.
Diesel consumption is calculated from primary data and models from the American Society of Agricultural and Biological Engineers (ASABE) published in 2006 and might be representative of more recent technology than the GLO parent dataset.
Warning: If the parent value for diesel consumption (in the GLO parent dataset) is changed in future edition, the user must change the parameter "ecoinvent diesel consumption" accordingly in order to get the right ratio of qc/ecoinvent diesel consumption.

## Included activities start
The bailing process starts with preliminary work at the farm, like attaching the adequate machine to the tractor.

## Included activities end
This activity ends with transfer back to farm and concluding work, like uncoupling the machine. The inventory includes transfer to field; field work (for one bale); the diesel fuel consumption and the amount of agricultural machinery and of the shed, which has to be attributed to the baling. Also taken into consideration is the amount of emissions to the air from combustion and the emission to the soil from tyre abrasion during the work process. The overlapping during the field work is considered. The dataset does not include the wrapping (plastic film), loading and transport. Fodder production and cutting are not included. Also not included are dust other than from combustion, noise, and plastic material used specifically when the baled agricultural material is to be bale-ensiled.

## Geography
Child dataset air emissions related to diesel combustion are scaled from parent dataset (GLO) based on the ratio of diesel consumption in Quebec over diesel consumption of GLO. Created to proxy farm machinery/fieldwork representative of the Quebec context. Data quality indicators adjusted accordingly.

## Technology
Fuel consumption has been extrapolated to Quebec, but emissions per kg diesel were taken from the original values.

## Time period
The emissions per kg of combusted Diesel were taken from the original values but the Diesel consumption has been updated.

## Parameters
- qc child dataset diesel consumption: 0.75 kg/unit; name qc_diesel; lognormal variance with pedigree 0.010391, pedigree (1,2,1,2,1)
  Diesel consumption in the Québec agricultural fieldwork dataset in kg/bale diesel
- quebec cropped area: 1.87476e6 ha; name qc_crop_area; lognormal variance with pedigree 0.0006, pedigree (1,1,1,1,1)
  Land in crops, Quebec, in 2011. Source: Statistics Canada, 2013. Table 004-0002 - Census of Agriculture, total area of farms and use of farm land, CANSIM (database). (accessed: 2013-11-15) ("Land in crops" includes field crops, vegetables, fruits and nursery crops, and sod.) Statistics Canada
- world arable land area: 1.39628e9 ha; name world_arable_area; lognormal variance with pedigree 0.0006, pedigree (1,1,1,1,1)
  Arable land area, World, in 2011. Source: FAOSTAT, 2013
- farm machinery diesel consumption ratio: 1.00942 dimensionless; name machine_diesel_ratio; = qc_diesel/ EI_diesel; lognormal variance with pedigree 0, pedigree (1,1,1,1,1)
  Ratio of diesel consumption for tractor and its machinery: kg diesel per ha of the Quebec machinery/kg diesel per ha of the ecoinvent's parent machinery
- parent dataset diesel consumption: 0.743 kg/unit; name EI_diesel; lognormal variance with pedigree 0.004, pedigree (1,4,1,5,1)
  Diesel consumption in the parent agricultural fieldwork dataset in kg/bale diesel

## Reference product
- baling: 1 unit; CPC 86111: Post-harvest crop services; By-product classification allocatable product
  EcoSpold01Location=CH
  production volume 2.49866e6 unit; = ParentValue* qc_crop_area/ world_arable_area
    Total number of bales in Québec down-scaled from total world number (production volume of the GLO parent dataset) through the ratio of cropped area in the two regions (see mathematical relation and parameters).
  property price 1.26811 EUR2005
    Calculated based on inputs: The price of the product has been calculated as a sum of the values of the material and energy inputs for this product. This value is therefore a rough estimation. It may underestimate the real price since there are additional expenses when producing any product. These expences can include for example labour costs, treatment of waste materials and profit for the producer. Please consider carefully whether this level of data quality is acceptable for your application.

## Inputs from technosphere
- tractor, 4-wheel, agricultural: 0.0668 kg; = ParentValue; lognormal variance with pedigree 0.044, pedigree (1,4,5,5,1)
  The same amount of tractor use as in the parent dataset is used as a proxy.
  EcoSpold01Location=CH
- extrusion, plastic film: 0 kg; pedigree (1,1,1,1,1)
  This dataset has been considering different baling processes. Some processes do not use plastic film or cover. If any, plastic material is considered into the crop dataset itself.
  EcoSpold01Location=RER
- shed: 0.000247 m2; = ParentValue; lognormal variance with pedigree 0.344, pedigree (1,4,5,5,1)
  The same amount of shed use for machinery as in the parent dataset is used as a proxy.
  EcoSpold01Location=CH
- agricultural machinery, unspecified: 0.152 kg; = ParentValue; lognormal variance with pedigree 0.044, pedigree (1,4,5,5,1)
  The same amount of machinery use as in the parent dataset is used as a proxy.
  EcoSpold01Location=CH
- diesel: 0.75 kg; = ParentValue* machine_diesel_ratio; lognormal variance with pedigree 0.044, pedigree (1,4,5,5,1)
  Scaling to Quebec diesel consumption
  EcoSpold01Location=CH
  properties: carbon content, fossil 0.865, dry mass 1 kg, wet mass 1 kg
  note on carbon content, fossil: C-content of diesel is 86.5% (ecoinvent v2.2 report 6_IV, Tab 3.14)
- polyethylene, high density, granulate: 0 kg; pedigree (1,1,1,1,1)
  (same comment as for extrusion, plastic film)
  properties: dry mass 1 kg, carbon content, fossil 0.857143, wet mass 1 kg
  note on carbon content, fossil: Polyethylene is formed out of a huge amount of ethylene monomers (C2H4) (ecoinvent v2.2 report 11_II). MW=28 g/mol

## Emissions to nature
- Zinc [air, non-urban air or from high stacks]: 7.5e-7 kg; = ParentValue* machine_diesel_ratio; lognormal variance with pedigree 0.7001, pedigree (1,2,5,5,3)
  Emission from diesel combustion scaled from the parent emission factor based on the relative diesel consumption.
- Benzene [air, non-urban air or from high stacks]: 5.47106e-6 kg; = ParentValue* machine_diesel_ratio; lognormal variance with pedigree 0.1001, pedigree (1,2,5,5,3)
  (same comment as for Zinc)
- Nickel [air, non-urban air or from high stacks]: 5.24899e-8 kg; = ParentValue* machine_diesel_ratio; lognormal variance with pedigree 0.7001, pedigree (1,2,5,5,3)
  (same comment as for Zinc)
- Carbon monoxide, fossil [air, non-urban air or from high stacks]: 0.00393674 kg; = ParentValue* machine_diesel_ratio; lognormal variance with pedigree 0.694, pedigree (1,4,5,5,1)
  (same comment as for Zinc)
- Chromium [air, non-urban air or from high stacks]: 3.74495e-8 kg; = ParentValue* machine_diesel_ratio; lognormal variance with pedigree 0.7001, pedigree (1,2,5,5,3)
  (same comment as for Zinc)
- Benzo(a)pyrene [air, non-urban air or from high stacks]: 2.25101e-8 kg; = ParentValue* machine_diesel_ratio; lognormal variance with pedigree 0.7001, pedigree (1,2,5,5,3)
  (same comment as for Zinc)
- Cadmium [soil, agricultural]: 3.82e-8 kg; = ParentValue; lognormal variance with pedigree 0.084, pedigree (1,4,5,5,1)
  Emission to soil from tyre abrasion, not related to diesel combustion. The same emission factor as the parent dataset is used as a proxy.
- Particulates, < 2.5 um [air, non-urban air or from high stacks]: 0.00356326 kg; = ParentValue* machine_diesel_ratio; lognormal variance with pedigree 0.3601, pedigree (1,2,5,5,3)
  (same comment as for Zinc)
- Copper [air, non-urban air or from high stacks]: 1.27187e-6 kg; = ParentValue* machine_diesel_ratio; lognormal variance with pedigree 0.7001, pedigree (1,2,5,5,3)
  (same comment as for Zinc)
- PAH, polycyclic aromatic hydrocarbons [air, non-urban air or from high stacks]: 2.46299e-6 kg; = ParentValue* machine_diesel_ratio; lognormal variance with pedigree 0.3601, pedigree (1,2,5,5,3)
  (same comment as for Zinc)
- Lead [soil, agricultural]: 1.71e-7 kg; = ParentValue; lognormal variance with pedigree 0.084, pedigree (1,4,5,5,1)
  (same comment as for Cadmium)
- Nitrogen oxides [air, non-urban air or from high stacks]: 0.0310902 kg; = ParentValue* machine_diesel_ratio; lognormal variance with pedigree 0.084, pedigree (1,4,5,5,1)
  (same comment as for Zinc)
- Zinc [soil, agricultural]: 9.98e-5 kg; = ParentValue; lognormal variance with pedigree 0.084, pedigree (1,4,5,5,1)
  (same comment as for Cadmium)
- Carbon dioxide, fossil [air, non-urban air or from high stacks]: 2.33176 kg; = ParentValue* machine_diesel_ratio; lognormal variance with pedigree 0.0601, pedigree (1,2,5,5,3)
  (same comment as for Zinc)
- Dinitrogen monoxide [air, non-urban air or from high stacks]: 8.99394e-5 kg; = ParentValue* machine_diesel_ratio; lognormal variance with pedigree 0.1001, pedigree (1,2,5,5,3)
  (same comment as for Zinc)
- Methane, fossil [air, non-urban air or from high stacks]: 9.67026e-5 kg; = ParentValue* machine_diesel_ratio; lognormal variance with pedigree 0.1001, pedigree (1,2,5,5,3)
  (same comment as for Zinc)
- Ammonia [air, non-urban air or from high stacks]: 1.50404e-5 kg; = ParentValue* machine_diesel_ratio; lognormal variance with pedigree 0.1001, pedigree (1,2,5,5,3)
  (same comment as for Zinc)
- NMVOC, non-methane volatile organic compounds, unspecified origin [air, non-urban air or from high stacks]: 0.0017362 kg; = ParentValue* machine_diesel_ratio; lognormal variance with pedigree 0.084, pedigree (1,4,5,5,1)
  (same comment as for Zinc)
- Cadmium [air, non-urban air or from high stacks]: 7.5e-9 kg; = ParentValue* machine_diesel_ratio; lognormal variance with pedigree 0.7001, pedigree (1,2,5,5,3)
  (same comment as for Zinc)
- Selenium [air, non-urban air or from high stacks]: 7.5e-9 kg; = ParentValue* machine_diesel_ratio; lognormal variance with pedigree 0.1001, pedigree (1,2,5,5,3)
  (same comment as for Zinc)
- Sulfur dioxide [air, non-urban air or from high stacks]: 0.000756057 kg; = ParentValue* machine_diesel_ratio; lognormal variance with pedigree 0.0601, pedigree (1,2,5,5,3)
  (same comment as for Zinc)

## Sampling procedure
The inventoried HC, NOx, CO and fuel consumption values are measurements made following two test cycles (ISO 8178 C1 test and a specific 6-level-test created by the FAT) and on measurements made during the field work. The other emissions were calculated basing on literature data and the measured fuel consumption. The fuel consumption is a weighted average calculated from the bailing rate and fuel consumption per hour.

## Extrapolations
This dataset has been extrapolated from year 2002 to the year of the calculation (2019). The uncertainty has been adjusted accordingly.

## Review by Thomas Nemecek 2013-12-27
The production volume needs to be updated, since the GLO production volume has changed meanwhile.

## Review by Roland Hischier 2003-08-06
Passed.
