# treatment of waste glass from unsorted public collection, sorting

Dataset: EcoSpold 2, unit process
Geography: RoW
Time period: 1994-01-01 to 2019-12-31
Technology level: current
Classification: EcoSpold01Categories: glass/packaging
Classification: ISIC rev.4 ecoinvent: 3830:Materials recovery
Tags: ConvertedDataset
Scenario: Business-as-Usual
System model: Allocation at the point of substitution
Generated by: Roland Hischier
Published in: Hischier R. 2007
Database: ecoinvent
isCopyrightProtected: true
accessRestrictedTo: 1

## General comment
A production site with a production amount of 3 times 250 t/d (resulting in 266 kt per year) and a total life span of 50 a is assumed here.
[This dataset was already contained in the ecoinvent database version 2. It was not individually updated during the transfer to ecoinvent version 3. Life Cycle Impact Assessment results may still have changed, as they are affected by changes in the supply chain, i.e. in other datasets. This dataset was generated following the ecoinvent quality guidelines for version 2. It may have been subject to central changes described in the ecoinvent version 3 change report (http://www.ecoinvent.org/database/ecoinvent-version-3/reports-of-changes/), and the results of the central updates were reviewed extensively. The changes added e.g. consistent water flows and other information throughout the database. The documentation of this dataset can be found in the ecoinvent reports of version 2, which are still available via the ecoinvent website. The change report linked above covers all central changes that were made during the conversion process.]

## Included activities end
This module includes the efforts for sorting collected glass cullets (energy, materials). No transport efforts are included for the used auxillaries.

## Geography
module is based on information from a Swiss and a German sorting site and valuable for European conditions

## Technology
Typical technology in the middle of the 90's in Germany and Switzerland

## Parameters
- fraction, cooling water, recirculating system, to air: 0.771; name fraction_CW_R_to_air; lognormal variance with pedigree 0.0413, pedigree (2,3,1,3,1)
  Calculated based on literature value (Scown, C.D., 2011, Water Footprint of U.S. Transportation Fuels and supplying information of the article) (Vionnet, S., Quantis Water Database - Technical Report, 2012).
- fraction, cooling water, cooling pond system, to air: 0.032; name fraction_CW_CP_to_air; lognormal variance with pedigree 0.0413, pedigree (2,3,1,3,1)
  (same comment as for fraction, cooling water, recirculating system, to air)
- fraction, cooling water, once-through system, to air: 0.004; name fraction_CW_OT_to_air; lognormal variance with pedigree 0.0413, pedigree (2,3,1,3,1)
  (same comment as for fraction, cooling water, recirculating system, to air)
- fraction, process water, to air: 0.15 dimensionless; name fraction_PW_to_air; lognormal variance with pedigree 0.092025, pedigree (4,4,3,2,4)
- fraction, cooling water, to air: 0.3875; name fraction_CW_to_air; = (0.5*fraction_CW_OT_to_air)+(0.5*fraction_CW_R_to_air); lognormal variance with pedigree 0.092025, pedigree (4,4,3,2,4)
  Calculated value based on literature value (see comments of the other parametres present in this dataset) and expert opinion. In the case when no industry/literature data are available about the type of cooling or directly fraction, cooling water, to air specific for the process a default assumption is applied. It is assumed that the once-through cooling system is used in 50% of all cases and recirculating system is used in another 50% of all cases.

## Reference product
- waste packaging glass, unsorted: 0 kg; By-product classification Recyclable; CPC 37111: Glass in the mass, in balls (except microspheres), rods or tubes, unworked; waste and scrap of glass
  Based on data from 2 sites in CH & DE
  EcoSpold01Location=RER
  production volume 0 kg
    This is a placeholder value that does not reflect real-world production volumes.
  property price 0.04 EUR2005
    Temporary price data. Estimated based on expert judgement and literature (WRAP, 2008, Realising the value of recovered glass: An update; European Environment Agency, 2011, Green economy and recycling in Europe; US EPA, 1992, Markets for Recovered Glass).
- glass cullet, sorted: 1 kg; CPC 37111: Glass in the mass, in balls (except microspheres), rods or tubes, unworked; waste and scrap of glass; By-product classification Recyclable
  EcoSpold01Location=RER
  production volume 2.47929 kg

## By-products
- glass cullet, sorted: 0 kg; CPC 37111: Glass in the mass, in balls (except microspheres), rods or tubes, unworked; waste and scrap of glass; By-product classification Recyclable
  EcoSpold01Location=RER
  production volume 0 kg; = Ref('588ceca8-ef6d-4726-a1d3-7258eca86a1a')* Ref('995351f5-53d0-45db-9433-b86b693aba6b', 'ProductionVolume')/ABS( Ref('995351f5-53d0-45db-9433-b86b693aba6b'))
    Dummy value to be replaced by measured, estimated or calculated value
  property price 0.08 EUR2005
    Temporary price data. The price of the glass cullet, sorted is estimated to be two times higher than the price of the waste packaging glass, unsorted.
  property carbon content 0
    carbon content on a dry matter basis (reserved; not for manual entry)
  properties: carbon content, non-fossil 0, carbon content, fossil 0, wet mass 1 kg, water content 0, water in wet mass 0 kg, dry mass 1 kg, carbon allocation 0 kg
- electricity, for reuse in municipal waste incineration only: 0 kWh; CPC 17100: Electrical energy; By-product classification allocatable product; pedigree (1,1,1,1,1)
  Net electricity generated from this waste and used in internal MSWI plant energy redistribution.
  Uncertainty: uncertainty is calculated from uncertainties in waste composition and uncertainties in energy efficiency and the uncertainty in internal energy demand
  property exergy 3.6 MJ; name E_el_prod_MSWI_exergy
    This exergy property is based on the exergy content of the product.
  property true value relation 3.6; name E_el_prod_MSWI_true_value_relation
    property to calculate "true value" from
  property price 0.1 EUR2005; name E_el_prod_MSWI_price_EUR2005
    Estimated to be the same price as in case of electricity, medium voltage.
- heat, for reuse in municipal waste incineration only: 0 MJ; CPC 17300: Steam and hot water; By-product classification allocatable product; pedigree (1,1,1,1,1)
  Net useful heat generated from this waste and used in internal MSWI plant energy redistribution.
  Uncertainty: uncertainty is calculated from uncertainties in waste composition and uncertainties in energy efficiency and the uncertainty in internal energy demand
  property exergy 0.1842 MJ; name E_th_prod_MSWI_exergy
    This exergy property is based on the exergy content of the product.
  property true value relation 0.1842; name E_th_prod_MSWI_true_value_relation
    property to calculate "true value" from
  property price 0.0106 EUR2005; name E_th_prod_MSWI_price_EUR2005
    Average European district heat price from Ecoheatcool and Euroheat 2005-2006, Ecoheat Work package 1: The European heat market. Final report. 10.6 EUR/GJ i s the price of district heat. http://www.solarthermalworld.org/files/Ecoheatcool%20WP1%20Web.pdf?download
- zinc concentrate: 0 kg; CPC 14290: Other non-ferrous metal ores and concentrates (other than uranium or thorium ores and concentrates); By-product classification allocatable product
  Calculated value from the knowledge of the properties of both products.
  property price 0.38 EUR2005; name ByP_price_EUR2005
    Temporary price data. Calculated as 90% of purchasers price based on: Zinc content in concentrate 53%. Concentrate price per kg Zn 86.5% of refined Zn price (13.5% treatment charges according to CHR Metals Limited 2005: Dynamic cost curves. http://www.minecost.com/dynamic.pdf). 2004 zinc price from USGS (2007) Mineral commodity summaries 2007. <http://minerals.usgs.gov/minerals/pubs/mcs/2007/mcs2007.pdf> [Accessed 25 May 2010]
  property zinc content 0.53; name zinc_C_zinc_concentrate
    Zinc content on a dry matter basis. Value taken from teh "zinc mine operation" /GLO dataset.
  property dry mass 1 kg; name DM_zinc_concentrate
  property carbon content 0
    carbon content on a dry matter basis (reserved; not for manual entry)
  properties: wet mass 1 kg, water content 0, carbon content, non-fossil 0, carbon content, fossil 0, water in wet mass 0 kg, carbon allocation 0 kg
- iron scrap, sorted, pressed: 0 kg; By-product classification Recyclable; CPC 39310: Slag, dross, scalings and other waste from the manufacture of iron or steel; pedigree (1,1,1,1,1)
  metallic iron scrap removed from ash reamains and recycled.
  Uncertainty: uncertainty is calculated from uncertainties in waste composition and transfer coefficients to soild residues
  property price 0.175 EUR2005
    Temporary price data. Calculated as 90% of purchasers price based on: 2005 import and export prices (total trades (USD) divided by total weight (kg) in biggest economies of the world: EU27, USA, Brasil, China, India, Japan and Russia) from UN Commodity Trade Statistics Database (http://data.un.org/Explorer.aspxDatabase [Accessed 2011.06.20]). Commodity: Waste or scrap, of cast iron
  property carbon content 0
    carbon content on a dry matter basis (reserved; not for manual entry)
  properties: carbon content, non-fossil 0, wet mass 1 kg, dry mass 1 kg, water content 0, carbon content, fossil 0, water in wet mass 0 kg, carbon allocation 0 kg
- copper: 0 kg; source Rentz O. 1999; By-product classification allocatable product; CPC 41413: Refined copper and copper alloys, unwrought; master alloys of copper
  Literature value. Copper uses: Before end-use copper is manufactured into semi fabricated products, such as shapes and ingots (known as 'semis'). These manufacturing processes are subdivided into hot working, cold working and, if necessary, process annealing. Few of the semis are ready for use as such. They more typically travel to first-stage manufacturers, who make metal rods, wire, and casting, and then to component manufacturers who produce such things as motors, valves, and insulated cables The components in turn are incorporated by final-stage manufacturers into a variety of finished products - automobiles, commercial buildings, residential housing, and so forth. These uses account for about 79% of the world-wide consumption of copper.
  property price 5.52 EUR2005
    Literature value (http://www.economist.com/news/business/21576714-mining-industry-has-enriched-chile-its-future-precarious-copper-solution). Average price between 20015 and 2013.
  property carbon content 0
    carbon content on a dry matter basis (reserved; not for manual entry)
  properties: dry mass 1 kg, water in wet mass 0 kg, wet mass 1 kg, carbon content, non-fossil 0, water content 0, carbon content, fossil 0, carbon allocation 0 kg
- iron scrap, unsorted: 0 kg; source European Aluminium Association 2008; CPC 39310: Slag, dross, scalings and other waste from the manufacture of iron or steel; By-product classification Recyclable; pedigree (1,1,1,1,1)
  property price 0.149 EUR2005; name ironScrapAmount_price_EUR2005
    Temporary price data. Calculated as 90% of purchasers price based on: estimated at 85% of sorted scrap
  property carbon content 0
    carbon content on a dry matter basis (reserved; not for manual entry)
  properties: water in wet mass 0 kg, water content 0, carbon content, fossil 0, carbon content, non-fossil 0, dry mass 1 kg, wet mass 1 kg, carbon allocation 0 kg
- aluminium oxide, non-metallurgical: 0 kg; source European Aluminium Association 2008; CPC 41432: Alumina (aluminium oxide), except artificial corundum; By-product classification allocatable product; CAS 1344-28-1; pedigree (1,1,1,1,1)
  property carbon content, non-fossil 0; name C_content_non_fossil
  property price 0.28 EUR2005; name Al2O3Amount_price_EUR2005
    From UN trade database. http://data.un.org/ Import data from the largest economies of the world are used (Brazil, India, USA, China, Japan and EU-27).
  property dry mass 1 kg; name DM
  property water content 0; name water_content
  property wet mass 1 kg; name WM
  property water in wet mass 0 kg; name WWM
  property carbon content, fossil 0; name C_content_fossil
  property carbon content 0
    carbon content on a dry matter basis (reserved; not for manual entry)
  properties: carbon allocation 0 kg
- aluminium, cast alloy: 0 kg; source European Aluminium Association 2008; By-product classification allocatable product; CPC 41431: Unwrought aluminium; pedigree (1,1,1,1,1)
  EcoSpold01Location=RER
  property price 1.3 EUR2005; name castAlloyAmount_price_EUR2005
    Temporary price data. Calculated as 90% of purchasers price based on: Source: London Metal Exchange, Aluminium alloy price for 2005
  property carbon content 0
    carbon content on a dry matter basis (reserved; not for manual entry)
  properties: water in wet mass 0 kg, carbon content, non-fossil 0, water content 0, dry mass 1 kg, carbon content, fossil 0, wet mass 1 kg, carbon allocation 0 kg
- aluminium, wrought alloy: 0 kg; source European Aluminium Association 2008; By-product classification allocatable product; CPC 4153: Semi-finished products of aluminium or aluminium alloys; pedigree (1,1,1,1,1)
  property price 1.44 EUR2005; name secondaryAluminiumOutput_price_EUR2005
    Estimated based on literature values and expert judgement. Aluminium ccast alloys are about 90% of the price of aluminium wrought alloys.
  property carbon content 0
    carbon content on a dry matter basis (reserved; not for manual entry)
  properties: wet mass 1 kg, water content 0, carbon content, fossil 0, water in wet mass 0 kg, carbon content, non-fossil 0, dry mass 1 kg, carbon allocation 0 kg

## Inputs from technosphere
- packaging glass sorting facility: 0 unit; pedigree (1,1,1,1,1)
  Own estimation
  EcoSpold01Location=RER
  Uncertainty: own estimation
- waste plastic, mixture: 0 kg; pedigree (1,1,1,1,1)
  EcoSpold01Location=CH
  Based on data from 1 DE site
  Uncertainty: based on data from 1 DE site
  production volume 0 kg; = Ref('ffdb97b3-0680-4ce3-a8da-2263a55b2fab')* Ref('995351f5-53d0-45db-9433-b86b693aba6b', 'ProductionVolume')/ABS( Ref('995351f5-53d0-45db-9433-b86b693aba6b'))
    Calculated from the production volume of waste packaging glass, unsorted in proportion to the respective output amounts.
  properties: dry mass 0.847 kg, wet mass 1 kg, water content 0.180638, carbon content, fossil 0.747344
  note on carbon content, fossil: C content in 1 kg DM was calculated using data in Tab A.2, ecoinvent v2.2 report 13_I
- inert waste, for final disposal: 0 kg; pedigree (1,1,1,1,1)
  Based on data from 1 DE site
  EcoSpold01Location=CH
  Uncertainty: based on data from 1 DE site
  production volume 0 kg; = Ref('a7fc48b9-de92-4f19-9f2a-d53669f50ad4')* Ref('995351f5-53d0-45db-9433-b86b693aba6b', 'ProductionVolume')/ABS( Ref('995351f5-53d0-45db-9433-b86b693aba6b'))
    (same comment as for waste plastic, mixture)
  properties: wet mass 1 kg, dry mass 0.995 kg, water content 0.00502513
- waste glass: 0 kg; pedigree (1,1,1,1,1)
  (same comment as for inert waste, for final disposal)
  production volume 0 kg; = Ref('25efeac9-2f88-417d-b3dd-6a33b08c55e6')* Ref('995351f5-53d0-45db-9433-b86b693aba6b', 'ProductionVolume')/ABS( Ref('995351f5-53d0-45db-9433-b86b693aba6b'))
    (same comment as for waste plastic, mixture)
  properties: wet mass 1 kg, dry mass 1 kg
- electricity, medium voltage: 0, 0 kWh (2 entries); pedigree (1,1,1,1,1)
  EcoSpold01Location=UCTE
  Based on data from 2 sites in CH & DE
  Uncertainty: based on data from 2 sites in CH & DE
- lubricating oil: 0 kg; pedigree (1,1,1,1,1)
  EcoSpold01Location=RER
  Based on data from 2 sites in CH & DE
  Uncertainty: based on data from 2 sites in CH & DE
  properties: wet mass 1 kg, carbon content, fossil 0.75, dry mass 1 kg
  note on carbon content, fossil: Lubricating oil is produced from diesel. C-content/dry mass of fats and oils considered 75%, from: ecoinvent v2.2 report, n 15a, pg 40
- waste aluminium: 0 kg; pedigree (1,1,1,1,1)
  (same comment as for waste plastic, mixture)
  production volume 0 kg; = Ref('03f56a18-4644-4b61-a450-e8847dea8abb')* Ref('995351f5-53d0-45db-9433-b86b693aba6b', 'ProductionVolume')/ABS( Ref('995351f5-53d0-45db-9433-b86b693aba6b'))
    (same comment as for waste plastic, mixture)
  properties: dry mass 1 kg, wet mass 1 kg
- wastewater from glass production: 0 m3; pedigree (1,1,1,1,1)
  (same comment as for waste plastic, mixture)
  production volume 0 m3; = Ref('47cb3e02-a236-4d30-b389-02fc03f41c42')* Ref('995351f5-53d0-45db-9433-b86b693aba6b', 'ProductionVolume')/ABS( Ref('995351f5-53d0-45db-9433-b86b693aba6b'))
    (same comment as for waste plastic, mixture)
  properties: wet mass 1000 kg, dry mass 1.09356 kg, carbon content, fossil 0.0455242, water content 913.443
  note on carbon content, fossil: COD= 0.115 kg/m3 (Tab A.18, ecoinvent v2.2 report 13_I). COD was converted to TOC, using conversion factors in Tab 4.10 (ecoinvent v2.2 report 13_IV). TOC was considered as Total Carbon.
- municipal solid waste: 0 kg; pedigree (1,1,1,1,1)
  (same comment as for inert waste, for final disposal)
  production volume 0 kg; = Ref('5a6ce032-0b5e-4999-99e5-4aa79119eef8')* Ref('995351f5-53d0-45db-9433-b86b693aba6b', 'ProductionVolume')/ABS( Ref('995351f5-53d0-45db-9433-b86b693aba6b'))
    (same comment as for waste plastic, mixture)
  properties: carbon content, non-fossil 0.261655, wet mass 1 kg, carbon content, fossil 0.171549, water content 0.297017, dry mass 0.771 kg
  note on carbon content, non-fossil: MSW composition in tab 4.1, ecoinvent v2.2 report 13_I. C content referred to 1 kg DM
- waste graphical paper: 0 kg; pedigree (1,1,1,1,1)
  (same comment as for waste plastic, mixture)
  production volume 0 kg; = Ref('130e8328-2432-4e2d-abe8-233e9cee48d7')* Ref('995351f5-53d0-45db-9433-b86b693aba6b', 'ProductionVolume')/ABS( Ref('995351f5-53d0-45db-9433-b86b693aba6b'))
    (same comment as for waste plastic, mixture)
  properties: carbon content, non-fossil 0.454955, wet mass 1 kg, dry mass 0.888 kg, water content 0.126126
- waste plastic, mixture: 0, 0, 0, 0, 0, 0, 0 kg (7 entries); pedigree (1,1,1,1,1)
  (same comment as for waste plastic, mixture)
- waste glass: 0, 0, 0, 0, 0, 0, 0 kg (7 entries); pedigree (1,1,1,1,1)
  (same comment as for inert waste, for final disposal)
- electricity, medium voltage: 0.000146262, 2.66135e-5, 0.000614316, 0.000451324, 0.00654372, 0.00306846 kWh (6 entries); lognormal variance with pedigree 0.0532, pedigree (2,3,5,5,1)
  (same comment as for electricity, medium voltage)
- municipal solid waste: 0, 0, 0, 0 kg (4 entries); pedigree (1,1,1,1,1)
  (same comment as for inert waste, for final disposal)
- waste graphical paper: 0, 0, 0, 0, 0, 0, 0 kg (7 entries); pedigree (1,1,1,1,1)
  (same comment as for waste plastic, mixture)
- waste polyethylene, for recycling, unsorted: -0.000695227 kg; source Avadí, A. 2018
  Waste PET from barrels and packaging
  production volume 696857 kg
- sheet rolling, aluminium: 0.00378056 kg; source Angel Avadí 2014
  Aluminium cans
- scrap aluminium: -0.00189026 kg; source Avadí, A. 2018
  Waste aluminium cans
  production volume 1.89469e6 kg
- sodium chloride, powder: 0.0909608 kg; source Angel Avadí 2014; triangular min 0.0909608, mostLikely 0.0909608, max 0.0909608, pedigree (2,3,3,1,1)
  Salt for brine and fish salting
  Uncertainty: Data from 1 plant, assumptions for larger plants
- waste packaging glass, unsorted: -0.00994884 kg; source Avadí, A. 2018
  Waste packaging glass
  production volume 4.98603e6 kg
- heat, district or industrial, natural gas: 0.0254877 MJ; source Angel Avadí 2014; triangular min 0.0254877, mostLikely 0.0254877, max 0.0254877, pedigree (2,3,3,1,1)
  Industrial heat, for sterilisation
  Uncertainty: Data from 1 plant, assumptions for larger plants
- fish curing plant: 1.29253e-9 unit; source Angel Avadí 2014
  One unit of plant represents the installed capacity required to process 1 t of raw material;activityLink introduced to establish a direct link to the corresponding regional supply of this product
- wastewater from vegetable oil refinery: -0.000377791 m3; source Avadí, A. 2018
  Proxy for wastewater from fish processing plant. Asumed 20% of the water is either incorporated into the product or lost
  production volume 189336 m3
- thermoforming of plastic sheets: 0.00134499 kg; source Angel Avadí 2014
  Plastic barrels
- aluminium, cast alloy: 0.00378056 kg; source Angel Avadí 2014; triangular min 0.00378056, mostLikely 0.00378056, max 0.00378056, pedigree (2,3,3,1,1)
  Aluminium cans
  Uncertainty: Data from 1 plant, assumptions for larger plants
- nitrogen, liquid: 6.63249e-6 kg; source Angel Avadí 2014; triangular min 6.63249e-6, mostLikely 6.63249e-6, max 6.63249e-6, pedigree (2,3,3,1,1)
  Nitrogen for process
  Uncertainty: Data from 1 plant, assumptions for larger plants
- vegetable oil, refined: 0.0345841 kg; source Angel Avadí 2014; triangular min 0.0345841, mostLikely 0.0345841, max 0.0345841, pedigree (2,3,3,1,1)
  Oil for canned fish
  Uncertainty: Data from 1 plant, assumptions for larger plants
- polyethylene terephthalate, granulate, amorphous: 0.00134499 kg; source Angel Avadí 2014; triangular min 0.00134499, mostLikely 0.00134499, max 0.00134499, pedigree (2,3,3,1,1)
  Plastic barrels
  Uncertainty: Data from 1 plant, assumptions for larger plants
- water, completely softened: 0.236117 kg; source Angel Avadí 2014; triangular min 0.236117, mostLikely 0.236117, max 0.236117, pedigree (2,3,3,1,1)
  Soft water for process
  Uncertainty: Data from 1 plant, assumptions for larger plants
- extrusion, plastic film: 4.54804e-5 kg; source Angel Avadí 2014
  Packaging plastic
- scrap tin sheet: -0.0108566 kg; source Avadí, A. 2018
  Waste tinplate cans, area of sheets times weight of a sheet
  production volume 1.08821e7 kg
- polyethylene, high density, granulate: 4.54804e-5 kg; source Angel Avadí 2014; triangular min 4.54804e-5, mostLikely 4.54804e-5, max 4.54804e-5, pedigree (2,3,3,1,1)
  Packaging plastic
  Uncertainty: Data from 1 plant, assumptions for larger plants
- electricity, medium voltage: 0.0138809 kWh; source Angel Avadí 2014; triangular min 0.0138809, mostLikely 0.0138809, max 0.0138809, pedigree (2,3,3,1,1)
  Electricity use along the whole process, including processing, maturing and cold storage
  Uncertainty: Data from 1 plant, assumptions for larger plants
- packaging film, low density polyethylene: 0.000205136 kg; source Angel Avadí 2014; triangular min 0.000205136, mostLikely 0.000205136, max 0.000205136, pedigree (2,3,3,1,1)
  Plastic bags
  Uncertainty: Data from 1 plant, assumptions for larger plants
- packaging glass, white: 0.00994884 kg; source Angel Avadí 2014; triangular min 0.00994884, mostLikely 0.00994884, max 0.00994884, pedigree (2,3,3,1,1)
  Glass containers
  Uncertainty: Data from 1 plant, assumptions for larger plants
- metal working, average for chromium steel product manufacturing: 0.00139189 kg; source Angel Avadí 2014
  Tinplate can
- tin plated chromium steel sheet, 2 mm: 0.00139189 m2; source Angel Avadí 2014; triangular min 0.00139189, mostLikely 0.00139189, max 0.00139189, pedigree (2,3,3,1,1)
  Tinplate can
  Uncertainty: Data from 1 plant, assumptions for larger plants
- nitrogen, liquid: 6.63262e-6 kg; source Angel Avadí 2014; triangular min 6.63262e-6, mostLikely 6.63262e-6, max 6.63262e-6, pedigree (2,3,3,5,1)
  Nitrogen for process
  Uncertainty: Data from 1 plant, assumptions for larger plants
- scrap tin sheet: -0.0108568 kg; source Avadí, A. 2018
  Waste tinplate cans, area of sheets times weight of a sheet
  production volume 9.79387e7 kg
- fish curing plant: 1.29256e-9 unit; source Angel Avadí 2014
  One unit of plant represents the installed capacity required to process 1 t of raw material
- scrap aluminium: -8.47139e-5, -0.00180558 kg (2 entries); source Avadí, A. 2018
  Waste aluminium cans
  production volume 1.70522e7 kg
- water, completely softened: 0.0987418 kg; source Angel Avadí 2014; triangular min 0.0987418, mostLikely 0.0987418, max 0.0987418, pedigree (2,3,3,5,1)
  Soft water for process
  Uncertainty: Data from 1 plant, assumptions for larger plants
- water, completely softened: 0.13738 kg; source Angel Avadí 2014; triangular min 0.13738, mostLikely 0.13738, max 0.13738, pedigree (2,3,3,5,1)
  Soft water for process
  Uncertainty: Data from 1 plant, assumptions for larger plants
- electricity, medium voltage: 8.72424e-5 kWh; source Angel Avadí 2014; triangular min 8.72424e-5, mostLikely 8.72424e-5, max 8.72424e-5, pedigree (2,3,3,5,1)
  (same comment as for electricity, medium voltage)
- electricity, medium voltage: 4.32383e-5 kWh; source Angel Avadí 2014; triangular min 4.32383e-5, mostLikely 4.32383e-5, max 4.32383e-5, pedigree (2,3,3,5,1)
  (same comment as for electricity, medium voltage)
- electricity, medium voltage: 0.000409367 kWh; source Angel Avadí 2014; triangular min 0.000409367, mostLikely 0.000409367, max 0.000409367, pedigree (2,3,3,5,1)
  (same comment as for electricity, medium voltage)
- electricity, medium voltage: 5.51577e-6 kWh; source Angel Avadí 2014; triangular min 5.51577e-6, mostLikely 5.51577e-6, max 5.51577e-6, pedigree (2,3,3,5,1)
  (same comment as for electricity, medium voltage)
- electricity, medium voltage: 4.52784e-5 kWh; source Angel Avadí 2014; triangular min 4.52784e-5, mostLikely 4.52784e-5, max 4.52784e-5, pedigree (2,3,3,5,1)
  (same comment as for electricity, medium voltage)
- electricity, medium voltage: 6.91488e-6 kWh; source Angel Avadí 2014; triangular min 6.91488e-6, mostLikely 6.91488e-6, max 6.91488e-6, pedigree (2,3,3,5,1)
  (same comment as for electricity, medium voltage)
- electricity, medium voltage: 1.14675e-5 kWh; source Angel Avadí 2014; triangular min 1.14675e-5, mostLikely 1.14675e-5, max 1.14675e-5, pedigree (2,3,3,5,1)
  (same comment as for electricity, medium voltage)
- electricity, medium voltage: 2.30359e-7 kWh; source Angel Avadí 2014; triangular min 2.30359e-7, mostLikely 2.30359e-7, max 2.30359e-7, pedigree (2,3,3,5,1)
  (same comment as for electricity, medium voltage)
- electricity, medium voltage: 9.35043e-6 kWh; source Angel Avadí 2014; triangular min 9.35043e-6, mostLikely 9.35043e-6, max 9.35043e-6, pedigree (2,3,3,5,1)
  (same comment as for electricity, medium voltage)
- electricity, medium voltage: 1.33187e-5 kWh; source Angel Avadí 2014; triangular min 1.33187e-5, mostLikely 1.33187e-5, max 1.33187e-5, pedigree (2,3,3,5,1)
  (same comment as for electricity, medium voltage)
- electricity, medium voltage: 6.56196e-6 kWh; source Angel Avadí 2014; triangular min 6.56196e-6, mostLikely 6.56196e-6, max 6.56196e-6, pedigree (2,3,3,5,1)
  (same comment as for electricity, medium voltage)
- electricity, medium voltage: 4.45161e-6 kWh; source Angel Avadí 2014; triangular min 4.45161e-6, mostLikely 4.45161e-6, max 4.45161e-6, pedigree (2,3,3,5,1)
  (same comment as for electricity, medium voltage)
- electricity, medium voltage: 4.00771e-7 kWh; source Angel Avadí 2014; triangular min 4.00771e-7, mostLikely 4.00771e-7, max 4.00771e-7, pedigree (2,3,3,5,1)
  (same comment as for electricity, medium voltage)
- electricity, medium voltage: 1.35137e-6 kWh; source Angel Avadí 2014; triangular min 1.35137e-6, mostLikely 1.35137e-6, max 1.35137e-6, pedigree (2,3,3,5,1)
  (same comment as for electricity, medium voltage)
- electricity, medium voltage: 0.000164934 kWh; source Angel Avadí 2014; triangular min 0.000164934, mostLikely 0.000164934, max 0.000164934, pedigree (2,3,3,5,1)
  (same comment as for electricity, medium voltage)
- electricity, medium voltage: 2.42015e-6 kWh; source Angel Avadí 2014; triangular min 2.42015e-6, mostLikely 2.42015e-6, max 2.42015e-6, pedigree (2,3,3,5,1)
  (same comment as for electricity, medium voltage)
- electricity, medium voltage: 6.40858e-6 kWh; source Angel Avadí 2014; triangular min 6.40858e-6, mostLikely 6.40858e-6, max 6.40858e-6, pedigree (2,3,3,5,1)
  (same comment as for electricity, medium voltage)
- electricity, medium voltage: 8.7936e-6 kWh; source Angel Avadí 2014; triangular min 8.7936e-6, mostLikely 8.7936e-6, max 8.7936e-6, pedigree (2,3,3,5,1)
  (same comment as for electricity, medium voltage)
- electricity, medium voltage: 3.79983e-6 kWh; source Angel Avadí 2014; triangular min 3.79983e-6, mostLikely 3.79983e-6, max 3.79983e-6, pedigree (2,3,3,5,1)
  (same comment as for electricity, medium voltage)
- electricity, medium voltage: 6.70892e-6 kWh; source Angel Avadí 2014; triangular min 6.70892e-6, mostLikely 6.70892e-6, max 6.70892e-6, pedigree (2,3,3,5,1)
  (same comment as for electricity, medium voltage)
- electricity, medium voltage: 6.76262e-6 kWh; source Angel Avadí 2014; triangular min 6.76262e-6, mostLikely 6.76262e-6, max 6.76262e-6, pedigree (2,3,3,5,1)
  (same comment as for electricity, medium voltage)
- electricity, medium voltage: 6.11494e-5 kWh; source Angel Avadí 2014; triangular min 6.11494e-5, mostLikely 6.11494e-5, max 6.11494e-5, pedigree (2,3,3,5,1)
  (same comment as for electricity, medium voltage)
- electricity, medium voltage: 0.00212477 kWh; source Angel Avadí 2014; triangular min 0.00212477, mostLikely 0.00212477, max 0.00212477, pedigree (2,3,3,5,1)
  (same comment as for electricity, medium voltage)
- heat, district or industrial, natural gas: 0.00107075 MJ; source Angel Avadí 2014; triangular min 0.00107075, mostLikely 0.00107075, max 0.00107075, pedigree (2,3,3,5,1)
  (same comment as for heat, district or industrial, natural gas)
- heat, district or industrial, natural gas: 0.0244175 MJ; source Angel Avadí 2014; triangular min 0.0244175, mostLikely 0.0244175, max 0.0244175, pedigree (2,3,3,5,1)
  (same comment as for heat, district or industrial, natural gas)
- waste polyethylene, for recycling, unsorted: -1.60194e-6, -0.000532287, -0.000161352 kg (3 entries); source Avadí, A. 2018
  Waste PET from barrels and packaging
  production volume 6.27171e6 kg

## Inputs from nature
- Water, unspecified natural origin [natural resource, in water]: 0 m3; name water_UNO_input; pedigree (1,1,1,1,1)
  Based on data from 1 DE site
  Uncertainty: based on data from 1 DE site
- Water, cooling, unspecified natural origin [natural resource, in water]: 0 m3; name water_cooling_UNO_input; pedigree (1,1,1,1,1)
  Based on data from 1 DE site
  Uncertainty: based on data from 1 DE site

## Emissions to nature
- Water [air, unspecified]: 0 m3; name water_to_air_unspecified; pedigree (1,1,1,1,1)
  Calculated value based on literature values and expert opinion. See comments in the parametres' comment field.
  property fraction, origin: salt water 0; name fraction_origin_salt_water
  property fraction, origin: unspecified 1; name fraction_origin_unspecified
  property fraction, origin: fresh water 0; name fraction_origin_fresh_water
- Water [water, unspecified]: 0 m3; name water_to_water_unspecified; pedigree (1,1,1,1,1)
  (same comment as for Water)
  property carbon content, fossil 0; name C_content_fossil
  property water in wet mass 1000 kg; name WWM
  property carbon content, non-fossil 0; name C_content_non_fossil
  property fraction, origin: salt water 0; name fraction_origin_salt_water_Ww
  property fraction, origin: unspecified 1; name fraction_origin_unspecified_Ww
  property dry mass 0 kg; name DM
  property fraction, origin: fresh water 0; name fraction_origin_fresh_water_Ww
  property wet mass 1000 kg; name WM
- Nitrogen [water, unspecified]: 0.0007509 kg; source Avadí, A. 2018; triangular min 0.0007509, mostLikely 0.0007509, max 0.0007509, pedigree (2,3,3,1,1)
  Emissions to water from process waters
  Uncertainty: Data from 1 plant, assumptions for larger plants
- Phosphorus [water, unspecified]: 0.000155865 kg; source Angel Avadí 2014; triangular min 0.000155865, mostLikely 0.000155865, max 0.000155865, pedigree (2,3,3,1,1)
  (same comment as for Nitrogen)

## Extrapolations
This dataset has been copied from an original dataset covering the geography RER. The uncertainty has been adjusted accordingly.

## Review by Emilia Moreno Ruiz 2015-11-04
PV adjusted to 4

## Review by Hans-Jörg Althaus 2003-08-20
passed
