# treatment of shredder fraction from manual dismantling, shredding

Dataset: EcoSpold 2, unit process
Geography: GLO
Time period: 2005-01-01 to 2019-12-31
Technology level: current
Classification: ISIC rev.4 ecoinvent: 3830:Materials recovery
Classification: EcoSpold01Categories: waste management/recycling
Tags: Treatment; ConvertedDataset
Scenario: Business-as-Usual
System model: Allocation at the point of substitution
Generated by: Roland Hischier
Published in: Hischier R. 2007
Database: ecoinvent
isCopyrightProtected: true
accessRestrictedTo: 1

## General comment
shredding/separation procedure, based on common transfer coefficients. Data from literature and from own experiences in Switzerland.
[This dataset was already contained in the ecoinvent database version 2. It was not individually updated during the transfer to ecoinvent version 3. Life Cycle Impact Assessment results may still have changed, as they are affected by changes in the supply chain, i.e. in other datasets. This dataset was generated following the ecoinvent quality guidelines for version 2. It may have been subject to central changes described in the ecoinvent version 3 change report (http://www.ecoinvent.org/database/ecoinvent-version-3/reports-of-changes/), and the results of the central updates were reviewed extensively. The changes added e.g. consistent water flows and other information throughout the database. The documentation of this dataset can be found in the ecoinvent reports of version 2, which are still available via the ecoinvent website. The change report linked above covers all central changes that were made during the conversion process.]

## Included activities end
This dataset represents the mechanical treatment (shredder) of material from manual dismantling that cannot be further dismantled manually.

## Geography
European data, used as average for global situation

## Technology
4-step-procedure (shredder - separation - shredder - separation) as used currently often in Europe

## Reference product
- shredder fraction after manual dismantling of used electronic product: 0 kg; By-product classification Waste; CPC 39990: Other wastes n.e.c.
  EcoSpold01Location=GLO
  production volume 0 kg
    Unkonwn
    Dummy value to be replaced by value to be calculated from the demand for this treatment activity
  property carbon content, fossil 0.287536
    C content calculated out of (input) shredder fraction composition in Tab 4.47 (ecoinvent v2.2 report 18_V). Carbon content in plastic was calculated using data in Tab A.2, ecoinvent v2.2 report 13_I. Others was also considered plastic, and calculated the same way (from pg 70, ecoinvent v2.2 report 18_V). Ferro was assumed to have a C content of 0.012 kg C/ kg (C content of steel, calculated out of emission factors published in Commission Decision of 18 July 2007 establishing guidelines for the monitoring and reporting of greenhouse gas emissions pursuant to Directive 2003/87/EC of the European Parliament and of the Council (notified under document number C(2007) 3416)). The other component of the fraction were considered to content no C.
  property price 0 EUR2005
    Waste products are assigned a price of zero as they are assumed to require further treatment.
  property carbon content 0.287536
    carbon content on a dry matter basis (reserved; not for manual entry)
  properties: wet mass 1 kg, water in wet mass 0 kg, dry mass 1 kg, water content 0, carbon content, non-fossil 0, carbon allocation 0.287536 kg
- iron scrap, sorted, pressed: 1 kg; By-product classification Recyclable; CPC 39310: Slag, dross, scalings and other waste from the manufacture of iron or steel; pedigree (1,1,1,1,1)
  replaces the original flow "Fe fraction of shredder output after manual dismantling of used electronic product"
  production volume 0.358205 kg

## By-products
- iron scrap, sorted, pressed: 0 kg; By-product classification Recyclable; CPC 39310: Slag, dross, scalings and other waste from the manufacture of iron or steel; pedigree (1,1,1,1,1)
  (same comment as for iron scrap, sorted, pressed)
  production volume 0 kg
    Unkonwn
    Calculated from the production volume of shredder fraction after manual dismantling of used electronic product in proportion to the respective output amounts.
  property price 0.175 EUR2005
    Temporary price data. Calculated as 90% of purchasers price based on: 2005 import and export prices (total trades (USD) divided by total weight (kg) in biggest economies of the world: EU27, USA, Brasil, China, India, Japan and Russia) from UN Commodity Trade Statistics Database (http://data.un.org/Explorer.aspxDatabase [Accessed 2011.06.20]). Commodity: Waste or scrap, of cast iron
  property carbon content 0
    carbon content on a dry matter basis (reserved; not for manual entry)
  properties: water content 0, wet mass 1 kg, water in wet mass 0 kg, dry mass 1 kg, carbon content, fossil 0, carbon content, non-fossil 0, carbon allocation 0 kg
- iron scrap, unsorted: 0 kg; source European Aluminium Association 2008; CPC 39310: Slag, dross, scalings and other waste from the manufacture of iron or steel; By-product classification Recyclable; pedigree (1,1,1,1,1)
  property price 0.149 EUR2005; name ironScrapAmount_price_EUR2005
    Temporary price data. Calculated as 90% of purchasers price based on: estimated at 85% of sorted scrap
  property carbon content 0
    carbon content on a dry matter basis (reserved; not for manual entry)
  properties: water in wet mass 0 kg, water content 0, carbon content, fossil 0, carbon content, non-fossil 0, dry mass 1 kg, wet mass 1 kg, carbon allocation 0 kg
- aluminium oxide, non-metallurgical: 0 kg; source European Aluminium Association 2008; CPC 41432: Alumina (aluminium oxide), except artificial corundum; By-product classification allocatable product; CAS 1344-28-1; pedigree (1,1,1,1,1)
  property carbon content, non-fossil 0; name C_content_non_fossil
  property price 0.28 EUR2005; name Al2O3Amount_price_EUR2005
    From UN trade database. http://data.un.org/ Import data from the largest economies of the world are used (Brazil, India, USA, China, Japan and EU-27).
  property dry mass 1 kg; name DM
  property water content 0; name water_content
  property wet mass 1 kg; name WM
  property water in wet mass 0 kg; name WWM
  property carbon content, fossil 0; name C_content_fossil
  property carbon content 0
    carbon content on a dry matter basis (reserved; not for manual entry)
  properties: carbon allocation 0 kg
- aluminium, cast alloy: 0 kg; source European Aluminium Association 2008; By-product classification allocatable product; CPC 41431: Unwrought aluminium; pedigree (1,1,1,1,1)
  EcoSpold01Location=RER
  property price 1.3 EUR2005; name castAlloyAmount_price_EUR2005
    Temporary price data. Calculated as 90% of purchasers price based on: Source: London Metal Exchange, Aluminium alloy price for 2005
  property carbon content 0
    carbon content on a dry matter basis (reserved; not for manual entry)
  properties: water in wet mass 0 kg, carbon content, non-fossil 0, water content 0, dry mass 1 kg, carbon content, fossil 0, wet mass 1 kg, carbon allocation 0 kg
- heat, for reuse in municipal waste incineration only: 0 MJ; CPC 17300: Steam and hot water; By-product classification allocatable product; pedigree (1,1,1,1,1)
  Net electricity generated from this waste and used in internal MSWI plant energy redistribution.
  Uncertainty: uncertainty is calculated from uncertainties in waste composition and uncertainties in energy efficiency and the uncertainty in internal energy demand
  property exergy 0.1842 MJ; name E_th_prod_MSWI_exergy
    This exergy property is based on the exergy content of the product.
  property true value relation 0.1842; name E_th_prod_MSWI_true_value_relation
    property to calculate "true value" from
  property price 0.0106 EUR2005; name E_th_prod_MSWI_price_EUR2005
    Average European district heat price from Ecoheatcool and Euroheat 2005-2006, Ecoheat Work package 1: The European heat market. Final report. 10.6 EUR/GJ i s the price of district heat. http://www.solarthermalworld.org/files/Ecoheatcool%20WP1%20Web.pdf?download
- electricity, for reuse in municipal waste incineration only: 0 kWh; CPC 17100: Electrical energy; By-product classification allocatable product; pedigree (1,1,1,1,1)
  (same comment as for heat, for reuse in municipal waste incineration only)
  property exergy 3.6 MJ; name E_el_prod_MSWI_exergy
    This exergy property is based on the exergy content of the product.
  property true value relation 3.6; name E_el_prod_MSWI_true_value_relation
    property to calculate "true value" from
  property price 0.1 EUR2005; name E_el_prod_MSWI_price_EUR2005
    Estimated to be the same price as in case of electricity, medium voltage.
- aluminium, wrought alloy: 0 kg; source European Aluminium Association 2008; By-product classification allocatable product; CPC 4153: Semi-finished products of aluminium or aluminium alloys; pedigree (1,1,1,1,1)
  property price 1.44 EUR2005; name secondaryAluminiumOutput_price_EUR2005
    Estimated based on literature values and expert judgement. Aluminium ccast alloys are about 90% of the price of aluminium wrought alloys.
  property carbon content 0
    carbon content on a dry matter basis (reserved; not for manual entry)
  properties: wet mass 1 kg, water content 0, carbon content, fossil 0, water in wet mass 0 kg, carbon content, non-fossil 0, dry mass 1 kg, carbon allocation 0 kg
- lead: 0 kg; CPC 41441: Lead, unwrought; By-product classification allocatable product
  EcoSpold01Location=SE
  property price 0.744 EUR2005
    Temporary price data. Calculated as 90% of purchasers price based on: Source: ecoinvent v2 report 10-part IX, Tab 5.10 & 2.5
  property carbon content 0
    carbon content on a dry matter basis (reserved; not for manual entry)
  properties: wet mass 1 kg, water content 0, carbon content, non-fossil 0, carbon content, fossil 0, dry mass 1 kg, water in wet mass 0 kg, carbon allocation 0 kg
- copper: 0 kg; By-product classification allocatable product; CPC 41413: Refined copper and copper alloys, unwrought; master alloys of copper
  EcoSpold01Location=SE
  property price 5.52 EUR2005
    Literature value (http://www.economist.com/news/business/21576714-mining-industry-has-enriched-chile-its-future-precarious-copper-solution). Average price between 20015 and 2013.
  property carbon content 0
    carbon content on a dry matter basis (reserved; not for manual entry)
  properties: water content 0, water in wet mass 0 kg, carbon content, fossil 0, carbon content, non-fossil 0, dry mass 1 kg, wet mass 1 kg, carbon allocation 0 kg
- nickel, 99.5%: 0 kg; CPC 41422: Unwrought nickel; By-product classification allocatable product
  EcoSpold01Location=SE
  property price 10.4 EUR2005
    Temporary price data. Calculated as 90% of purchasers price based on: 2004 nickel price from USGS (2007) Mineral commodity summaries 2007. <http://minerals.usgs.gov/minerals/pubs/mcs/2007/mcs2007.pdf> [Accessed 25 May 2010]
  property carbon content 0
    carbon content on a dry matter basis (reserved; not for manual entry)
  properties: water in wet mass 0 kg, wet mass 1 kg, carbon content, non-fossil 0, dry mass 1 kg, water content 0, carbon content, fossil 0, carbon allocation 0 kg
- silver: 0 kg; CPC 41310: Silver (including silver plated with gold or platinum), unwrought or in semi-manufactured forms, or in powder […]; By-product classification allocatable product; CAS 7440-22-4
  EcoSpold01Location=SE
  property price 178 EUR2005
    (same comment as for lead)
  property carbon content 0
    carbon content on a dry matter basis (reserved; not for manual entry)
  properties: wet mass 1 kg, carbon content, non-fossil 0, dry mass 1 kg, water content 0, carbon content, fossil 0, water in wet mass 0 kg, carbon allocation 0 kg
- palladium: 0 kg; CPC 4160: Other non-ferrous metals and articles thereof (including waste and scrap of some metals); cermets and articles […]; By-product classification allocatable product
  EcoSpold01Location=SE
  property price 5640 EUR2005
    Temporary price data. Calculated as 90% of purchasers price based on: 2004 price from USGS (2007) Mineral commodity summaries 2007. <http://minerals.usgs.gov/minerals/pubs/mcs/2007/mcs2007.pdf> [Accessed 25 May 2010]
  property carbon content 0
    carbon content on a dry matter basis (reserved; not for manual entry)
  properties: wet mass 1 kg, carbon content, fossil 0, water in wet mass 0 kg, water content 0, carbon content, non-fossil 0, dry mass 1 kg, carbon allocation 0 kg
- gold: 0 kg; CPC 41320: Gold (including gold plated with platinum), unwrought or in semi-manufactured forms, or in powder form; By-product classification allocatable product; CAS 7440-57-5
  EcoSpold01Location=SE
  property price 10600 EUR2005
    Temporary price data. Calculated as 90% of purchasers price based on: Source: ecoinvent v2 report 10-part IX, Tab 2.5
  property carbon content 0
    carbon content on a dry matter basis (reserved; not for manual entry)
  properties: wet mass 1 kg, carbon content, fossil 0, dry mass 1 kg, carbon content, non-fossil 0, water content 0, water in wet mass 0 kg, carbon allocation 0 kg
- zinc concentrate: 0 kg; CPC 14290: Other non-ferrous metal ores and concentrates (other than uranium or thorium ores and concentrates); By-product classification allocatable product
  Calculated value from the knowledge of the properties of both products.
  property price 0.38 EUR2005; name ByP_price_EUR2005
    Temporary price data. Calculated as 90% of purchasers price based on: Zinc content in concentrate 53%. Concentrate price per kg Zn 86.5% of refined Zn price (13.5% treatment charges according to CHR Metals Limited 2005: Dynamic cost curves. http://www.minecost.com/dynamic.pdf). 2004 zinc price from USGS (2007) Mineral commodity summaries 2007. <http://minerals.usgs.gov/minerals/pubs/mcs/2007/mcs2007.pdf> [Accessed 25 May 2010]
  property zinc content 0.53; name zinc_C_zinc_concentrate
    Zinc content on a dry matter basis. Value taken from teh "zinc mine operation" /GLO dataset.
  property dry mass 1 kg; name DM_zinc_concentrate
  property carbon content 0
    carbon content on a dry matter basis (reserved; not for manual entry)
  properties: wet mass 1 kg, water content 0, carbon content, non-fossil 0, carbon content, fossil 0, water in wet mass 0 kg, carbon allocation 0 kg

## Inputs from technosphere
- aluminium scrap, post-consumer, prepared for melting: 0 kg; pedigree (1,1,1,1,1)
  replaces the original flow "Al fraction of shredder output after manual dismantling of used electronic product"
  production volume 0 kg
    (same comment as for iron scrap, sorted, pressed)
  property water content 0; name water_content
  property wet mass 1 kg; name WM
  property carbon content, fossil 0; name C_content_fossil
  property carbon content, non-fossil 0; name C_content_non_fossil
  property dry mass 1 kg; name DM
  property water in wet mass 0 kg; name WWM
  properties: price 0.806 EUR2005
- residue from shredder fraction from manual dismantling: 0 kg; pedigree (1,1,1,1,1)
  Calculated - based on composition data
  EcoSpold01Location=CH
  Uncertainty: calculated - based on composition data
  production volume 0 kg
    Calculated from the production volume of shredder fraction after manual dismantling of used electronic product in proportion to the respective output amounts.
  properties: dry mass 1 kg, wet mass 1 kg, carbon content, fossil 0.664925
  note on carbon content, fossil: Tab 4.47, ecoinvent v2.2 report 18_V, for details in fraction composition. Carbon content in plastic was calculated using data in Tab A.2, ecoinvent v2.2 report 13_I. Others was also considered plastic, and calculated the same way (from pg 70, ecoinvent v2.2 report 18_V). Ferro was assumed to have a C content of 0.012 kg C/ kg (C content of steel, calculated out of emission factors published in Commission Decision of 18 July 2007 establishing guidelines for the monitoring and reporting of greenhouse gas emissions pursuant to Directive 2003/87/EC of the European Parliament and of the Council (notified under document number C(2007) 3416)). The other component of the fraction were considered to content no C.
- electronics scrap: 0 kg; pedigree (1,1,1,1,1)
  replaces the original flow "Cul fraction of shredder output after manual dismantling of used electronic product"
  production volume 0 kg
    (same comment as for iron scrap, sorted, pressed)
  properties: price 16.1 EUR2005, wet mass 1 kg, dry mass 1 kg
- waste electric and electronic equipment: 0 kg; pedigree (1,1,1,1,1)
  Rough estimation
  EcoSpold01Location=GLO
  Uncertainty: rough estimation
  production volume 0 kg
    (same comment as for residue from shredder fraction from manual dismantling)
  properties: dry mass 1 kg, carbon content, non-fossil 0.000485011, wet mass 1 kg, carbon content, fossil 0.0877555
- residue from shredder fraction from manual dismantling: 0, 0 kg (2 entries); pedigree (1,1,1,1,1)
  (same comment as for residue from shredder fraction from manual dismantling)
- printed wiring board, mounted mainboard, desktop computer, Pb containing: 2.05504e-5 kg; lognormal variance with pedigree 0.0701, pedigree (1,4,5,3,3)
  EcoSpold01Location=GLO
  Measured Value.
- steel, chromium steel 18/8, hot rolled: 6.96704e-5 kg; lognormal variance with pedigree 0.0701, pedigree (1,4,5,3,3)
  Measured Value.
  EcoSpold01Location=RER
- printed wiring board, surface mounted, unspecified, Pb free: 3.57132e-5 kg; lognormal variance with pedigree 0.0701, pedigree (1,4,5,3,3)
  Measured Value. This original value from production mix has been replaced by 2 flows. Pb-containing has a share of 0.3, Pb-free has a share of 0.7.
- printed wiring board, for surface mounting, Pb containing surface: 5.31545e-7 m2; lognormal variance with pedigree 0.0701, pedigree (1,4,5,3,3)
  Measured Value.
  This original value from production mix has been replaced by 2 flows. Each has 50% share in the production mix.
- disk drive, CD/DVD, ROM, for desktop computer: 0.000136294 unit; lognormal variance with pedigree 0.0701, pedigree (1,4,5,3,3)
  EcoSpold01Location=GLO
  Measured Value.
- cable, network cable, category 5, without plugs: 0.000427251 m; lognormal variance with pedigree 0.0701, pedigree (1,4,5,3,3)
  EcoSpold01Location=GLO
  Measured Value.
- sheet rolling, steel: 0.000912006 kg; lognormal variance with pedigree 0.0701, pedigree (1,4,5,3,3)
  EcoSpold01Location=RER
  Measured Value.
- acrylonitrile-butadiene-styrene copolymer: 4.34777e-6 kg; lognormal variance with pedigree 0.0701, pedigree (1,4,5,3,3)
  Measured Value.
  EcoSpold01Location=RER
- powder coat, steel: 5.4204e-5 m2; lognormal variance with pedigree 0.0701, pedigree (1,4,5,3,3)
  Measured Value.
  EcoSpold01Location=RER
- steel, low-alloyed, hot rolled: 0.000846697 kg; lognormal variance with pedigree 0.0701, pedigree (1,4,5,3,3)
  EcoSpold01Location=RER
  Measured Value.
- plug, inlet and outlet, for network cable: 0.000254052 unit; lognormal variance with pedigree 0.0701, pedigree (1,4,5,3,3)
  EcoSpold01Location=GLO
  Measured Value.
- electricity, medium voltage: 0.000567178 kWh; source Stachura 2006; lognormal variance with pedigree 0.0701, pedigree (1,4,5,3,3)
  EcoSpold01Location=UCTE
  Estimation, based on literature, OGIP basic datasheet and own calculations.
- battery, Li-ion, rechargeable, prismatic: 3.25434e-5 kg; lognormal variance with pedigree 0.0701, pedigree (1,4,5,3,3)
  EcoSpold01Location=GLO
  Measured Value.
- polymer foaming: 2.1807e-5 kg; source Atlantic Consulting 1998; lognormal variance with pedigree 0.0701, pedigree (1,4,5,3,3)
  Literature Value.
  EcoSpold01Location=RER
- aluminium, cast alloy: 7.55318e-6 kg; lognormal variance with pedigree 0.0701, pedigree (1,4,5,3,3)
  Measured Value.
  EcoSpold01Location=RER
- printed wiring board, surface mounted, unspecified, Pb containing: 1.53057e-5 kg; lognormal variance with pedigree 0.0701, pedigree (1,4,5,3,3)
  (same comment as for printed wiring board, surface mounted, unspecified, Pb free)
- hot rolling, steel: 4.3614e-6 kg; lognormal variance with pedigree 0.0701, pedigree (1,4,5,3,3)
  Measured Value.
  EcoSpold01Location=RER
- power supply unit, for desktop computer: 0.000136294 unit; lognormal variance with pedigree 0.0701, pedigree (1,4,5,3,3)
  EcoSpold01Location=CN
  Measured Value.
- integrated circuit, memory type: 2.0444e-6 kg; lognormal variance with pedigree 0.0701, pedigree (1,4,5,3,3)
  EcoSpold01Location=GLO
  Measured Value.
- copper: 1.01047e-5 kg; lognormal variance with pedigree 0.0701, pedigree (1,4,5,3,3)
  EcoSpold01Location=RER
  Measured Value.
- section bar extrusion, aluminium: 7.3651e-5 kg; lognormal variance with pedigree 0.0701, pedigree (1,4,5,3,3)
  Measured Value.
  EcoSpold01Location=RER
- aluminium, wrought alloy: 6.60975e-5 kg; lognormal variance with pedigree 0.0701, pedigree (1,4,5,3,3)
  Measured Value.
  EcoSpold01Location=RER
- polypropylene, granulate: 2.78857e-5 kg; source Atlantic Consulting 1998; lognormal variance with pedigree 0.0701, pedigree (1,4,5,3,3)
  EcoSpold01Location=RER
  Measured and literature Value.
  Further references:
  Hewlett Packard (2002) Environmental Profile: Embedded & Personal Systems. Download of 070213 from <http://www.hp.com/hpinfo/globalcitizenship/environment/productdata/edsembedded--.html>.
- hard disk drive, for desktop computer: 0.000136294 unit; lognormal variance with pedigree 0.0701, pedigree (1,4,5,3,3)
  Measured Value.
  EcoSpold01Location=GLO
- plug, inlet and outlet, for computer cable: 0.000136294 unit; lognormal variance with pedigree 0.0701, pedigree (1,4,5,3,3)
  Measured Value.
  EcoSpold01Location=GLO
- cable, ribbon cable, 20-pin, with plugs: 6.89646e-6 kg; lognormal variance with pedigree 0.0701, pedigree (1,4,5,3,3)
  Measured Value.
  EcoSpold01Location=GLO
- printed wiring board, for surface mounting, Pb free surface: 5.31545e-7 m2; lognormal variance with pedigree 0.0701, pedigree (1,4,5,3,3)
  (same comment as for printed wiring board, for surface mounting, Pb containing surface)
- photovoltaic cell factory: 5.39471e-12 unit; lognormal variance with pedigree 0.3701, pedigree (1,4,5,3,3)
  EcoSpold01Location=DE
  Proxy, due to a lack of data of the infrastructure for the computer production the photovoltaic cell factory was used. It was assumed a life-time of 25 years, and a annual production volume of 3’000’000 pieces.
- cable, connector for computer, without plugs: 0.000340734 m; lognormal variance with pedigree 0.0701, pedigree (1,4,5,3,3)
  EcoSpold01Location=GLO
  Measured Value.
- stretch blow moulding: 1.38324e-5 kg; lognormal variance with pedigree 0.0701, pedigree (1,4,5,3,3)
  Measured Value.
  EcoSpold01Location=RER
- tap water: 0.411565 kg; source Fujitsu L. 2003; lognormal variance with pedigree 0.0701, pedigree (1,4,5,3,3)
  Estimation, based on literature.
  EcoSpold01Location=RER
- polyethylene, high density, granulate: 3.40598e-6 kg; lognormal variance with pedigree 0.0701, pedigree (1,4,5,3,3)
  Measured Value.
  EcoSpold01Location=RER
- wire drawing, copper: 8.51495e-6 kg; lognormal variance with pedigree 0.0701, pedigree (1,4,5,3,3)
  EcoSpold01Location=RER
  Measured Value.
- used desktop computer: -0.00154012 kg; lognormal variance with pedigree 0.0701, pedigree (1,4,5,3,3)
  Measured Value.
  EcoSpold01Location=CH
  production volume 11.3 kg
- corrugated board box: 8.19829e-5, 3.66552e-6, 0.000311399 kg (3 entries); source Atlantic Consulting 1998; lognormal variance with pedigree 0.0701, pedigree (1,4,5,3,3)
  Literature Value.
  EcoSpold01Location=RER
- waste polypropylene: -2.09902e-6, -1.61822e-7, -6.68385e-8, -6.34694e-8, -2.42191e-6, -2.7002e-8, -1.22384e-8, -1.69547e-5 kg (8 entries); source Atlantic Consulting 1998; lognormal variance with pedigree 0.0701, pedigree (1,4,5,3,3)
  Literature Value. Disposed of via a municipal incineration plant.
  EcoSpold01Location=CH
  production volume 0.16 kg
- wastewater, unpolluted: -3.29252e-6, -0.000408272 m3 (2 entries); source Fujitsu L. 2003; lognormal variance with pedigree 0.0701, pedigree (1,4,5,3,3)
  EcoSpold01Location=CH
  Estimation, based on literature.
  production volume 1.62 m3
- power adapter, for laptop: 0.000117759 unit; source von Geibler J. 2003; lognormal variance with pedigree 0.0701, pedigree (1,4,5,3,3)
  Literature Value.
  EcoSpold01Location=GLO
- hard disk drive, for laptop computer: 0.000117759 unit; source von Geibler J. 2003; lognormal variance with pedigree 0.0701, pedigree (1,4,5,3,3)
  Literature Value.
  EcoSpold01Location=GLO
- magnesium-alloy, AZ91, diecast: 3.33493e-5 kg; source von Geibler J. 2003; lognormal variance with pedigree 0.0701, pedigree (1,4,5,3,3)
  EcoSpold01Location=RER
  Literature Value.
- magnesium-alloy, AZ91: 3.33493e-5 kg; source von Geibler J. 2003; lognormal variance with pedigree 0.0707, pedigree (2,4,5,3,3)
  EcoSpold01Location=RER
  Literature Value.
- printed wiring board, mounted mainboard, laptop computer, Pb containing: 5.04479e-6 kg; source von Geibler J. 2003; lognormal variance with pedigree 0.0701, pedigree (1,4,5,3,3)
  Literature Value.
  EcoSpold01Location=GLO
- polystyrene foam slab: 1.04805e-5 kg; source von Geibler J. 2003; lognormal variance with pedigree 0.0701, pedigree (1,4,5,3,3)
  EcoSpold01Location=RER
  Literature Value.
- liquid crystal display, unmounted: 3.86249e-5 kg; source von Geibler J. 2003; lognormal variance with pedigree 0.0701, pedigree (1,4,5,3,3)
  Literature Value.
  EcoSpold01Location=GLO
- packaging film, low density polyethylene: 6.0057e-6 kg; source von Geibler J. 2003; lognormal variance with pedigree 0.0701, pedigree (1,4,5,3,3)
  Literature Value.
  EcoSpold01Location=RER
- extrusion, plastic pipes: 4.99238e-5 kg; source von Geibler J. 2003; lognormal variance with pedigree 0.0701, pedigree (1,4,5,3,3)
  Literature Value.
  EcoSpold01Location=RER
- disk drive, CD/DVD, ROM, for laptop computer: 0.000117759 unit; source von Geibler J. 2003; lognormal variance with pedigree 0.0701, pedigree (1,4,5,3,3)
  EcoSpold01Location=GLO
  Literature Value.
- used laptop computer: -0.000367407 kg; lognormal variance with pedigree 0.0701, pedigree (1,4,5,3,3)
  EcoSpold01Location=CH
  Measured Value.
  production volume 3.12 kg
- polystyrene, high impact: 4.99238e-5 kg; source von Geibler J. 2003; lognormal variance with pedigree 0.0701, pedigree (1,4,5,3,3)
  EcoSpold01Location=RER
  Literature Value.
- battery, NiMH, rechargeable, prismatic: 9.4207e-7 kg; source von Geibler J. 2003; lognormal variance with pedigree 0.0701, pedigree (1,4,5,3,3)
  Literature Value.
  EcoSpold01Location=GLO
- sheet rolling, copper: 1.58974e-6 kg; source von Geibler J. 2003; lognormal variance with pedigree 0.0701, pedigree (1,4,5,3,3)
  Literature Value.
  EcoSpold01Location=RER
- sheet rolling, aluminium: 3.33493e-5 kg; source von Geibler J. 2003; lognormal variance with pedigree 0.0701, pedigree (1,4,5,3,3)
  EcoSpold01Location=RER
  Literature Value.
- waste polystyrene: -1.0088e-6, -7.77726e-8, -3.21229e-8, -3.05037e-8, -1.16398e-6, -1.29773e-8, -5.88181e-9, -8.14849e-6 kg (8 entries); source von Geibler J. 2003; lognormal variance with pedigree 0.0701, pedigree (1,4,5,3,3)
  Literature Value.
  EcoSpold01Location=CH
  production volume 0.089 kg
- waste polyethylene: -5.78077e-7, -4.45663e-8, -1.84075e-8, -1.74796e-8, -6.66999e-7, -7.43641e-9, -3.37048e-9, -4.66936e-6 kg (8 entries); source von Geibler J. 2003; lognormal variance with pedigree 0.0701, pedigree (1,4,5,3,3)
  EcoSpold01Location=CH
  Literature Value.
  production volume 0.051 kg

## Emissions to nature
- Water [air, unspecified]: 2.51055e-5 m3; lognormal variance with pedigree 0.0807, pedigree (2,2,5,1,1)
  Calculated value based on literature values and expert opinion. See comments in the parametres' comment field.

## Sampling procedure
literature and own experiences

## Review by Jürgen Sutter 2007-08-31
passed.

## Review by Bo Weidema 2012-05-31
Passed. This dataset is based on an earlier ecoinvent dataset. The outputs are now specified in terms of materials that can be treated by existing treatment activities.
