# toluene oxidation

Dataset: EcoSpold 2, unit process
Geography: RER
Time period: 2010-01-01 to 2020-12-31
Technology level: current
Classification: ISIC rev.4 ecoinvent: 2011:Manufacture of basic chemicals
Synonyms: Carboxybenzene; Benzeneformic acid; Dracylic acid; Benzenecarboxylic acid
Scenario: Business-as-Usual
System model: Allocation at the point of substitution
Generated by: Jürgen Sutter
Database: ecoinvent
isCopyrightProtected: true
accessRestrictedTo: 1

## General comment
This dataset represents the production of benzoic acid by oxidation of toluene. Benzoic acid is a white crystalline solid. The majority of benzoic acid is used to produce phenol. Benzoic acid is also used to produce sodium and potassium benzoate which are consumed in the food and beverage industry. Other major applications include benzoate plasticizers, alkyd resins and benzyl chloride.
This dataset is based on estimations using stoichiometry and expert judgement, as well as data from a large chemical plant (Gendorf 2016).
References:
Frischknecht R., Jungbluth N., Althaus H.-J., Doka G., Dones R., Heck T., Hellweg S., Hischier R., Nemecek T., Rebitzer G. and Spielmann M. (2007) Overview and Methodology. Final report ecoinvent v2.0 No. 1. Swiss Centre for Life Cycle Inventories, Dübendorf, CH, retrieved from: www.ecoinvent.org.
CAMEO Chemicals. Chemical Datasheet, Benzoic acid, https://cameochemicals.noaa.gov/chemical/2585 (last accessed, 2017-01-06).
Gendorf (2016) Umwelterklärung 2015, Werk Gendorf Industriepark, www.gendorf.de.

## Included activities start
The activity starts when the raw materials enter the process.

## Included activities end
This activity ends with the production of benzoic acid. It includes the oxidation of toluene, input materials, energy uses, infrastructure and emissions.

## Geography
The inventory is modelled for Europe. Some values are based on data from a large chemical factory located in Germany. These are assumed to be valid for this geography.

## Technology
Oxidation of toluene is the most important method for the manufacture of benzoic acid:
C7H8 + O2 → C7H6O2 + H2
Benzoic acid (C7H6O2; CAS 65-85-0, benzenecarboxlic acid) forms white monoclinic crystals that begin to sublime at about 100 °C. It is volatile in steam and forms azeotropes with biphenyl, butyl benzoate, catechol, diphenyl ether, diphenylmethane, and naphthalene. At 89.7 °C, a mixture of excess benzoic acid and water forms two stable liquid phases. The water content of the benzoic acid phase is 26.5 wt %. The two phases become homogeneous at 117.2 °C. The mixture then contains 32.34 % benzoic acid and 67.66 % water (Maki T. and Takeda K., 2000).
Reference:
Takao Maki and Kazuo Takeda: Benzoic Acid and Derivatives. Published online: 2000. In: Ullmann's Encyclopedia of Industrial Chemistry, Seventh Edition, 2004 Electronic Release (ed. Fiedler E., Grossmann G., Kersebohm D., Weiss G. and Witte C.). 7 th Electronic Release Edition. Wiley InterScience, New York, Online-Version under: DOI: 10.1002/14356007.a03_555

## Time period
Time of publications. Some values are based on data published by the Gendorf factory that were collected between 2011 and 2015. The time period has been adjusted accordingly. For more details, see the comments of the exchanges.

## Reference product
- benzoic acid: 1 kg; name RP; By-product classification allocatable product; CPC 34120: Industrial monocarboxylic fatty acids; acid oils from refining
  Benzoic acid is a white crystalline solid. The majority of benzoic acid is used to produce phenol. Benzoic acid is also used to produce sodium and potassium benzoate which are consumed in the food and beverage industry. Other major applications include benzoate plasticizers, alkyd resins and benzyl chloride.
  production volume 6.05e8 kg; name RP_PV
    Estimated value. According to the European Chemical Agency, the consumption of Benzoic acid for the year of 2016 is estimated to be 550000000 kg. The aforementioned value is the average of the range given in the literature. According to the European Chemical Industry Council (Cefic, 2016a), the total sales of chemicals of the European Union in 2016 amounted to 519 billion euros. Chemical imports were valued at 91 billion euros for the first 11 months of 2016. Based on this, the value for the total imports for the year 2016 was extrapolated, yielding a value of 99.3 billion euros. Furthermore, Cefic (2016b) reports a trade surplus (exports-imports) of 46.4 billion euros (once again extrapolated for the whole year using the value of 42 billion euros for the first 11 months of 2016). Considering all the aforementioned information, the total chemical consumption in the EU is calculated to be 472.6 billion euros (total sales-exports+imports). It is therefore calculated that production is 110% of consumption. This value is used to scale the information on chemical consumption to production. The European production volume is therefore 605000000 kg.
    References:
    European Chemical Agency, Brief profile of Benzoic acid, Accessible at: https://echa.europa.eu/brief-profile/-/briefprofile/100.000.562
    Cefic 2016a. Facts and figures 2016 of the European chemical industry. Accessible at: http://www.cefic.org/Facts-and-Figures/Chemicals-Industry-Profile/
    Cefic 2016b. 2016: EU chemicals output posts positive growth for third year running. Accessible at: http://www.cefic.org/Documents/RESOURCES/Chemical%20Trends%20Report/March-2017-Cefic-Chemicals-Trends-Report.pdf
  property price 1.95 EUR2005
    Average 2005 prices for EU27, USA, China, Japan and India from Import/Export data (US$ and tonnes) in UN Commodity Trade Statistics Database;
  property carbon content, fossil 0.688459
    Calculated based on molecular structure. See tab 'chemicals'.
  property carbon content 0.688459
    carbon content on a dry matter basis (reserved; not for manual entry)
  property true value 2.77758; name RP_true_value
    allocation property applied in "true value" allocation // value calculated from revenue
  properties: wet mass 1 kg, water in wet mass 0 kg, dry mass 1 kg, water content 0, carbon content, non-fossil 0, carbon allocation 0.688459 kg

## By-products
- heat, for reuse in municipal waste incineration only: 0 MJ; CPC 17300: Steam and hot water; By-product classification allocatable product; pedigree (1,1,1,1,1)
  Net electricity generated from this waste and used in internal MSWI plant energy redistribution.
  Uncertainty: uncertainty is calculated from uncertainties in waste composition and uncertainties in energy efficiency and the uncertainty in internal energy demand
  production volume 375.134 MJ
  property exergy 0.1842 MJ; name E_th_prod_MSWI_exergy
    This exergy property is based on the exergy content of the product.
  property price 0.0106 EUR2005; name E_th_prod_MSWI_price_EUR2005
    Average European district heat price from Ecoheatcool and Euroheat 2005-2006, Ecoheat Work package 1: The European heat market. Final report. 10.6 EUR/GJ i s the price of district heat. http://www.solarthermalworld.org/files/Ecoheatcool%20WP1%20Web.pdf?download
  property true value relation 0.1842; name E_th_prod_MSWI_true_value_relation
    property to calculate "true value" from
  property true value 1.69114e-9
    allocation property applied in "true value" allocation // value calculated from true value relation
- electricity, for reuse in municipal waste incineration only: 0 kWh; CPC 17100: Electrical energy; By-product classification allocatable product; pedigree (1,1,1,1,1)
  (same comment as for heat, for reuse in municipal waste incineration only)
  production volume 52.7466 kWh
  property true value relation 3.6; name E_el_prod_MSWI_true_value_relation
    property to calculate "true value" from
  property price 0.1 EUR2005; name E_el_prod_MSWI_price_EUR2005
    Estimated to be the same price as in case of electricity, medium voltage.
  property exergy 3.6 MJ; name E_el_prod_MSWI_exergy
    This exergy property is based on the exergy content of the product.
  property true value 4.5959e-9
    (same comment as for heat, for reuse in municipal waste incineration only)
- zinc concentrate: 0 kg; CPC 14290: Other non-ferrous metal ores and concentrates (other than uranium or thorium ores and concentrates); By-product classification allocatable product
  Calculated value from the knowledge of the properties of both products.
  production volume 0.00713597 kg
  property price 0.38 EUR2005; name ByP_price_EUR2005
    Temporary price data. Calculated as 90% of purchasers price based on: Zinc content in concentrate 53%. Concentrate price per kg Zn 86.5% of refined Zn price (13.5% treatment charges according to CHR Metals Limited 2005: Dynamic cost curves. http://www.minecost.com/dynamic.pdf). 2004 zinc price from USGS (2007) Mineral commodity summaries 2007. <http://minerals.usgs.gov/minerals/pubs/mcs/2007/mcs2007.pdf> [Accessed 25 May 2010]
  property zinc content 0.53; name zinc_C_zinc_concentrate
    Zinc content on a dry matter basis. Value taken from teh "zinc mine operation" /GLO dataset.
  property dry mass 1 kg; name DM_zinc_concentrate
  property carbon content 0
    carbon content on a dry matter basis (reserved; not for manual entry)
  property true value 6.23239e-13
    allocation property applied in "true value" allocation // value calculated from revenue
  properties: wet mass 1 kg, water content 0, carbon content, non-fossil 0, carbon content, fossil 0, water in wet mass 0 kg, carbon allocation 0 kg

## Inputs from technosphere
- heat, district or industrial, natural gas: 2.18524 MJ; lognormal variance with pedigree 0.009825, pedigree (2,3,1,2,3)
  Calculated based on literature data published by the industry. This value is a 5-year average of data (2011 - 2015) published by the Gendorf factory (Gendorf, 2016, Umwelterklärung, www.gendorf.de), (Gendorf, 2015, Umwelterklärung, www.gendorf.de), (Gendorf, 2014, Umwelterklärung, www.gendorf.de). The amount of heat used per kg of chemical substance produced is calculated using literature data published by the Gendorf factory based in Germany, which produces a wide range of chemical substances. The factory produced 1657400 tonnes of chemical substances in the year 2015 (Gendorf, 2016, Umwelterklärung, www.gendorf.de) and 740000 tonnes of intermediate products. The amount of heat in the year 2015 was 523500 GJ (Gendorf, 2016, Umwelterklärung, www.gendorf.de) of which 90% was obtained from natural gas and 10% from steam. The resulting amount of heat from natural gas is 2.02 MJ/kg of chemical product produced. The 5-year average (2011 - 2015, weighted by production volume) is 2.15 MJ/kg. Cross-reference: the amount of chemicals produced (excluding intermediate products) in the EU-28 in the year 2011 was 327 million tonnes (Eurostat, http://ec.europa.eu/eurostat/statistics-explained/index.php/Chemicals_production_statistics, accessed 20170126). The chemical and petrochemical industry sector consumed 2.33 EJ of energy in 2011 (European Commission - Joint Research Centre, 2014, BAT on Common Waste water and Waste Gas Treatment/Management Systems in the Chemical Sector). The resulting energy (both heat and electricity) consumed per kg of chemicals produced in 2011 is thus 7.13 MJ/kg. This is higher than the value calculated using data published by Gendorf – 3.85 MJ/kg, but that is to be expected as the intermediate products are not accounted for.
- nitrogen, liquid: 0.0193115 kg; lognormal variance with pedigree 0.009825, pedigree (2,3,1,2,3)
  Calculated based on literature data published by the industry. This value is a 5-year average of data (2011 - 2015) published by the Gendorf factory (Gendorf, 2016, Umwelterklärung, www.gendorf.de), (Gendorf, 2015, Umwelterklärung, www.gendorf.de), (Gendorf, 2014, Umwelterklärung, www.gendorf.de). The amount of nitrogen used per kg of chemical substance produced is calculated using literature data published by the Gendorf factory based in Germany, which produces a wide range of chemical substances. The factory produced 1657400 tonnes of chemical substances in the year 2015 (Gendorf, 2016, Umwelterklärung, www.gendorf.de) and 740000 tonnes of intermediate products. The reported amount of nitrogen used in 2015 was 33512400 Nm3 (Gendorf, 2016, Umwelterklärung, www.gendorf.de). One Nm3 of nitrogen is equal to 1.2506 kg. The resulting amount of nitrogen - the 5-year average (2011 - 2015, weighted by production volume) is 0.019 kg/kg. Nitrogen is mainly used during the production of chemicals for 'blanketing', which is the process of applying gas to the vapour space of a container or vessel in order to control its composition.
  properties: wet mass 1 kg, dry mass 1 kg
- tap water: 0.0264262 kg; lognormal variance with pedigree 0.009825, pedigree (2,3,1,2,3)
  Calculated based on literature data published by the industry. This value is a 5-year average of data (2011 - 2015) published by the Gendorf factory (Gendorf, 2016, Umwelterklärung, www.gendorf.de), (Gendorf, 2015, Umwelterklärung, www.gendorf.de), (Gendorf, 2014, Umwelterklärung, www.gendorf.de). The amount of tap water per kg of chemical substance produced is calculated using literature data published by the Gendorf factory based in Germany, which produces a wide range of chemical substances. The factory produced 1657400 tonnes of chemical substances in the year 2015 (Gendorf, 2016, Umwelterklärung, www.gendorf.de) and 740000 tonnes of intermediate products. The amount of tap water consumed in the year 2015 was 55100 tonnes (Gendorf, 2016, Umwelterklärung, www.gendorf.de). The resulting amount of tap water is 0.023 kg/kg of chemical product produced. The 5-year average (2011 - 2015, weighted by production volume) is 0.026 kg/kg.
  properties: dry mass 0.000337476 kg, wet mass 1 kg, water content 2962.17, carbon content, fossil 0.00178991
  note on carbon content, fossil: Bicarbonate content is 2.93 mol/m3. CO2 content is 0.1 mol/m3 (ecoinvent v2.2 report 8, Tab 93.1).
- chemical factory, organics: 4.06557e-10 unit; lognormal variance with pedigree 0.309225, pedigree (2,3,1,2,3)
  Calculated based on literature data published by the industry. For this activity, no information was readily available concerning infrastructure and land-use. Therefore, the infrastructure is estimated based on data from two chemical factories, the BASF site of Ludwigshafen and the chemical factory in Gendorf (which are both located in Germany), which produce a wide range of chemical substances. Based on this data, the following assumptions are made: the built area amounts to about 4.2 ha, the plant has an average output of 50'000 t/a and a lifespan of fifty years. The estimated infrastructure amount is therefore 4.00 E-10 units per kg of produced chemical.
  References:
  Althaus H.-J., Chudacoff M., Hischier R., Jungbluth N., Osses M. and Primas A. (2007) Life Cycle Inventories of Chemicals. ecoinvent report No. 8, v2.0. EMPA Dübendorf, Swiss Centre for Life Cycle Inventories, Dübendorf, CH.
  Gendorf (2000) Umwelterklärung 2000, Werk Gendorf. Werk Gendorf, Burgkirchen.
- heat, from steam, in chemical industry: 0.203279 MJ; lognormal variance with pedigree 0.009825, pedigree (2,3,1,2,3)
  Calculated based on literature data published by the industry. This value is a 5-year average of data (2011 - 2015) published by the Gendorf factory (Gendorf, 2016, Umwelterklärung, www.gendorf.de), (Gendorf, 2015, Umwelterklärung, www.gendorf.de), (Gendorf, 2014, Umwelterklärung, www.gendorf.de). The amount of heat used per kg of chemical substance produced is calculated using literature data published by the Gendorf factory based in Germany, which produces a wide range of chemical substances. The factory produced 1657400 tonnes of chemical substances in the year 2015 (Gendorf, 2016, Umwelterklärung, www.gendorf.de) and 740000 tonnes of intermediate products. The amount of heat in the year 2015 was 523500 GJ (Gendorf, 2016, Umwelterklärung, www.gendorf.de) of which 90% was obtained from natural gas and 10% from steam. The resulting amount of heat from steam is 0.22 MJ/kg of chemical product produced. The 5-year average (2011 - 2015, weighted by production volume) is 0.20 MJ/kg. Cross-reference: the amount of chemicals produced (excluding intermediate products) in the EU-28 in the year 2011 was 327 million tonnes (Eurostat, http://ec.europa.eu/eurostat/statistics-explained/index.php/Chemicals_production_statistics, accessed 20170126). The chemical and petrochemical industry sector consumed 2.33 EJ of energy in 2011 (European Commission - Joint Research Centre, 2014, BAT on Common Waste water and Waste Gas Treatment/Management Systems in the Chemical Sector). The resulting energy (both heat and electricity) consumed per kg of chemicals produced in 2011 is thus 7.13 MJ/kg. This is higher than the value calculated using data published by Gendorf – 3.85 MJ/kg, but that is to be expected as the intermediate products are not accounted for.
- sodium hydroxide, without water, in 50% solution state: 0.04 kg; lognormal variance with pedigree 0.1786, pedigree (4,5,5,5,5)
  Estimated value based on expert judgement. 0.04 kg of sodium hydroxide is needed per kg of benzoic acid.
  properties: dry mass 1 kg, wet mass 1 kg
- wastewater, average: 0 m3; name BP_wastewater_average; pedigree (1,1,1,1,1)
  Calculated based on literature data published by the industry. This value is a 5-year average of data (2011 - 2015) published by the Gendorf factory (Gendorf, 2016, Umwelterklärung, www.gendorf.de), (Gendorf, 2015, Umwelterklärung, www.gendorf.de), (Gendorf, 2014, Umwelterklärung, www.gendorf.de). The amount of wastewater (which is later on treated in the municipal WWTP) per kg of chemical substance produced is calculated using literature data published by the Gendorf factory based in Germany, which produces a wide range of chemical substances. The factory produced 1657400 tonnes of chemical substances in the year 2015 (Gendorf, 2016, Umwelterklärung, www.gendorf.de) and 740000 tonnes of intermediate products. The amount of wastewater which is later on treated in the municipal WWTP in the year 2015 was 1200 tonnes (Gendorf, 2016, Umwelterklärung, www.gendorf.de). The resulting amount of wastewater is 2.7E-06 m3/kg of chemical product produced.
  production volume 0 m3
    Calculated from the production volume of benzoic acid in proportion to the respective output amounts.
  property price 0 EUR2005; name BP_wastewater_average_price_EUR2005
  properties: carbon content, non-fossil 0.194039, water content 2882.2, dry mass 0.346837 kg, wet mass 1000 kg
  note on carbon content, non-fossil: 0.0673 kg TOC/m3 (Tab A.17, ecoinvent v2.2 report 13_I). TOC was considered as Total Carbon.
- electricity, medium voltage: 0.422819 kWh; lognormal variance with pedigree 0.009825, pedigree (2,3,1,2,3)
  Calculated based on literature data published by the industry. This value is a 5-year average of data (2011 - 2015) published by the Gendorf factory (Gendorf, 2016, Umwelterklärung, www.gendorf.de), (Gendorf, 2015, Umwelterklärung, www.gendorf.de), (Gendorf, 2014, Umwelterklärung, www.gendorf.de). The amount of electricity per kg of chemical substance produced is calculated using literature data published by the Gendorf factory based in Germany, which produces a wide range of chemical substances. The factory produced 1657400 tonnes of chemical substances in the year 2015 (Gendorf, 2016, Umwelterklärung, www.gendorf.de) and 740000 tonnes of intermediate products. The amount of electricity consumed in the year 2015 was 3498800 GJ (Gendorf, 2016, Umwelterklärung, www.gendorf.de). The resulting amount of electricity is 0.406 kWh/kg (year 2015) of chemical substance produced. The 5-year average (2011 - 2015, weighted by production volume) is 0.416 kWh/kg (1.5 MJ/kg). Cross-reference: the amount of chemicals produced (excluding intermediate products) in the EU-28 in the year 2011 was 327 million tonnes (Eurostat, http://ec.europa.eu/eurostat/statistics-explained/index.php/Chemicals_production_statistics, accessed 20170126). The chemical and petrochemical industry sector consumed 2.33 EJ of energy in 2011 (European Commission - Joint Research Centre, 2014, BAT on Common Waste water and Waste Gas Treatment/Management Systems in the Chemical Sector). The resulting energy (both heat and electricity) consumed per kg of chemicals produced in 2011 is thus 7.13 MJ/kg. This is higher than the value calculated using data published by Gendorf – 3.85 MJ/kg, but that is to be expected as the intermediate products are not accounted for.
- oxygen, liquid: 0.231676 kg; lognormal variance with pedigree 0.0807, pedigree (1,3,5,3,1)
  Stoichiometric calculation.
  properties: wet mass 1 kg, dry mass 1 kg
- toluene, liquid: 0.86 kg; lognormal variance with pedigree 0.1786, pedigree (4,5,5,5,5)
  Estimated value based on expert judgement. 0.86 kg of toluene is needed per kg of benzoic acid.
  properties: carbon content, fossil 0.913043, wet mass 1 kg, dry mass 1 kg
- wastewater, average: -2.47636e-6, -2.67896e-7 m3 (2 entries); lognormal variance with pedigree 0.009825, pedigree (2,3,1,2,3)
  (same comment as for wastewater, average)
  production volume 1660.28 m3

## Inputs from nature
- Water, well, in ground [natural resource, in water]: 0.000843606 m3; lognormal variance with pedigree 0.009825, pedigree (2,3,1,2,3)
  Calculated based on literature data published by the industry. This value is a 5-year average of data (2011 - 2015) published by the Gendorf factory (Gendorf, 2016, Umwelterklärung, www.gendorf.de), (Gendorf, 2015, Umwelterklärung, www.gendorf.de), (Gendorf, 2014, Umwelterklärung, www.gendorf.de). The amount of groundwater and surface water (river) extracted per kg of chemical substance produced is calculated using literature data published by the Gendorf factory based in Germany, which produces a wide range of chemical substances. The factory produced 1657400 tonnes of chemical substances in the year 2015 (Gendorf, 2016, Umwelterklärung, www.gendorf.de) and 740000 tonnes of intermediate products. The amount of groundwater and surface water (river) extracted in the year 2015 was 19950000 tonnes and 21488100 tonnes respectively (Gendorf, 2016, Umwelterklärung, www.gendorf.de).
- Water, river [natural resource, in water]: 0.000874098 m3; lognormal variance with pedigree 0.009825, pedigree (2,3,1,2,3)
  (same comment as for Water, well, in ground)
- Water, cooling, unspecified natural origin [natural resource, in water]: 0.0166688 m3; lognormal variance with pedigree 0.009825, pedigree (2,3,1,2,3)
  Calculated based on literature data published by the industry. This value is a 5-year average of data (2011 - 2015) published by the Gendorf factory (Gendorf, 2016, Umwelterklärung, www.gendorf.de), (Gendorf, 2015, Umwelterklärung, www.gendorf.de), (Gendorf, 2014, Umwelterklärung, www.gendorf.de). The amount of water for cooling extracted per kg of chemical substance produced is calculated using literature data published by the Gendorf factory based in Germany, which produces a wide range of chemical substances. The factory produced 1657400 tonnes of chemical substances in the year 2015 (Gendorf, 2016, Umwelterklärung, www.gendorf.de) and 740000 tonnes of intermediate products. The reported amounts of water extracted as groundwater and surface water (river) are assumed to be used entirely for cooling purposes.

## Emissions to nature
- Water [water, unspecified]: 0.0272939 m3; lognormal variance with pedigree 0.009825, pedigree (2,3,1,2,3)
  Calculated based on literature data published by the industry (Gendorf, 2016, Umwelterklärung, www.gendorf.de). The amount of water released back to the environment consists of the amount of process water treated in the internal WWTP and then released back to the environment and the amount of cooling water released back to the environment.
  property fraction, origin: unspecified 1; name fraction_origin_unspecified_Ww
  property fraction, origin: salt water 0; name fraction_origin_salt_water_Ww
  property fraction, origin: fresh water 0; name fraction_origin_fresh_water_Ww
- Water [air, unspecified]: 0.00795201 m3; lognormal variance with pedigree 0.009825, pedigree (2,3,1,2,3)
  Calculated to ensure the water balance. In general, in the case of recirculating cooling systems, 77% of the water input evaporates to air. In case of once-through cooling systems, 4% of the water input evaporates to air. The process water has in the chemical industry an average evaporation rate of 20.5%. In the specific case of the Gendorf factory, the calculated evaporation rate based on the data published is 6.3%. This matches the qualitative information, that the majority of the cooling systems in Gendorf are once-through and that the amount of cooling water used is significantly higher than the amount of process water used (Gendorf, 2016, Umwelterklärung, www.gendorf.de).
  property fraction, origin: salt water 0; name fraction_origin_salt_water
  property fraction, origin: fresh water 0; name fraction_origin_fresh_water
  property fraction, origin: unspecified 1; name fraction_origin_unspecified
- Toluene [water, surface water]: 0.000541807 kg; lognormal variance with pedigree 0.478, pedigree (4,5,5,5,5)
  Estimation
  Uncertainty: E
- Toluene [air, urban air close to ground]: 0.00135449 kg; lognormal variance with pedigree 0.298, pedigree (4,5,5,5,5)
  Estimation
  Uncertainty: E
- BOD5, Biological Oxygen Demand [water, unspecified]: 0.00162576 kg; lognormal variance with pedigree 0.218, pedigree (4,5,5,5,5)
  Calculated value. The BOD, COD, TOC and BOD5 are calculated based on the amount and type of emissions released to water in the same activity.
- Nitrogen [air, unspecified]: 0.0193115 kg; lognormal variance with pedigree 0.009825, pedigree (2,3,1,2,3)
  Calculated value. The amount of nitrogen released to air is equal to the amount of nitrogen entering the activity.
- DOC, Dissolved Organic Carbon [water, unspecified]: 0.000493939 kg; lognormal variance with pedigree 0.218, pedigree (4,5,5,5,5)
  (same comment as for BOD5, Biological Oxygen Demand)
- Carbon dioxide, fossil [air, urban air close to ground]: 0.012481 kg; lognormal variance with pedigree 0.1786, pedigree (4,5,5,5,5)
  From water treatment
  Uncertainty: E
- COD, Chemical Oxygen Demand [water, unspecified]: 0.00162576 kg; lognormal variance with pedigree 0.218, pedigree (4,5,5,5,5)
  (same comment as for BOD5, Biological Oxygen Demand)
- TOC, Total Organic Carbon [water, unspecified]: 0.000493939 kg; lognormal variance with pedigree 0.218, pedigree (4,5,5,5,5)
  (same comment as for BOD5, Biological Oxygen Demand)

## Sampling procedure
The data is based on literature and estimations. Some values are calculated based on data from a large chemical factory located in Germany. For more details, see the comments of the exchanges.

## Review by Emilia Moreno Ruiz 2017-08-08
This dataset was additionally reviewed in a separate review process by Eric Johnson of Atlantic Consulting as well as Emilia Moreno Ruiz and Gregor Wernet of ecoinvent.
