# hazardous waste incineration facility construction

Dataset: EcoSpold 2, unit process
Geography: RoW
Time period: 1997-01-01 to 2019-12-31
Technology level: current
Classification: ISIC rev.4 ecoinvent: 4290:Construction of other civil engineering projects
Classification: EcoSpold01Categories: waste management/hazardous waste incineration
Synonyms: HWI; SAVA
Tags: ConvertedDataset
Scenario: Business-as-Usual
System model: Allocation at the point of substitution
Share of production covered: 39 %
Generated by: Gabor Doka (obsolete)
Published in: Doka G. 2007
Database: ecoinvent
isCopyrightProtected: true
accessRestrictedTo: 1

## General comment
adapted from municipal waste incineration plant with a factor of 0.36. 20000 tons of waste per year. Operation time 40 years.
[This dataset was already contained in the ecoinvent database version 2. It was not individually updated during the transfer to ecoinvent version 3. Life Cycle Impact Assessment results may still have changed, as they are affected by changes in the supply chain, i.e. in other datasets. This dataset was generated following the ecoinvent quality guidelines for version 2. It may have been subject to central changes described in the ecoinvent version 3 change report (http://www.ecoinvent.org/database/ecoinvent-version-3/reports-of-changes/), and the results of the central updates were reviewed extensively. The changes added e.g. consistent water flows and other information throughout the database. The documentation of this dataset can be found in the ecoinvent reports of version 2, which are still available via the ecoinvent website. The change report linked above covers all central changes that were made during the conversion process.]

## Included activities end
plant building infrastructure and demolition, land occupations and transformations

## Geography
Based on technology encountered in Switzerland in 2000. Well applicable to modern incineration practices in Europe or North America or Japan.

## Technology
Swiss HWI plant in 2000 with wet flue gas scrubber and low-dust SCR DeNOx facility.

## Reference product
- hazardous waste incineration facility: 1 unit; CPC 53290: Other civil engineering works; By-product classification allocatable product
  EcoSpold01Location=CH
  production volume 3.96633 unit
    This is a placeholder value that does not reflect real-world production volumes. This dataset does not currently require a real-world production volume to work in the database framework, and no actual data were collected yet. This has no negative effect on the results of the ecoinvent database.
  property price 1.01311e6 EUR2005
    Calculated based on inputs: The price of the product has been calculated as a sum of the values of the material and energy inputs for this product. This value is therefore a rough estimation. It may underestimate the real price since there are additional expenses when producing any product. These expences can include for example labour costs, treatment of waste materials and profit for the producer. Please consider carefully whether this level of data quality is acceptable for your application.
  property true value 1.01311e6
    allocation property applied in "true value" allocation // value calculated from revenue

## By-products
- heat, for reuse in municipal waste incineration only: 0 MJ; CPC 17300: Steam and hot water; By-product classification allocatable product; pedigree (1,1,1,1,1)
  Net electricity generated from this waste and used in internal MSWI plant energy redistribution.
  Uncertainty: uncertainty is calculated from uncertainties in waste composition and uncertainties in energy efficiency and the uncertainty in internal energy demand
  production volume 6.49975e6 MJ
  property exergy 0.1842 MJ; name E_th_prod_MSWI_exergy
    This exergy property is based on the exergy content of the product.
  property price 0.0106 EUR2005; name E_th_prod_MSWI_price_EUR2005
    Average European district heat price from Ecoheatcool and Euroheat 2005-2006, Ecoheat Work package 1: The European heat market. Final report. 10.6 EUR/GJ i s the price of district heat. http://www.solarthermalworld.org/files/Ecoheatcool%20WP1%20Web.pdf?download
  property true value relation 0.1842; name E_th_prod_MSWI_true_value_relation
    property to calculate "true value" from
  property true value 14217.3
    allocation property applied in "true value" allocation // value calculated from true value relation
- electricity, for reuse in municipal waste incineration only: 0 kWh; CPC 17100: Electrical energy; By-product classification allocatable product; pedigree (1,1,1,1,1)
  (same comment as for heat, for reuse in municipal waste incineration only)
  production volume 929066 kWh
  property exergy 3.6 MJ; name E_el_prod_MSWI_exergy
    This exergy property is based on the exergy content of the product.
  property true value relation 3.6; name E_el_prod_MSWI_true_value_relation
    property to calculate "true value" from
  property price 0.1 EUR2005; name E_el_prod_MSWI_price_EUR2005
    Estimated to be the same price as in case of electricity, medium voltage.
  property true value 39717.3
    (same comment as for heat, for reuse in municipal waste incineration only)
- iron scrap, sorted, pressed: 0 kg; By-product classification Recyclable; CPC 39310: Slag, dross, scalings and other waste from the manufacture of iron or steel; pedigree (1,1,1,1,1)
  Iron scrap recovered from this waste.
  production volume 1140.59 kg
  property price 0.175 EUR2005
    Temporary price data. Calculated as 90% of purchasers price based on: 2005 import and export prices (total trades (USD) divided by total weight (kg) in biggest economies of the world: EU27, USA, Brasil, China, India, Japan and Russia) from UN Commodity Trade Statistics Database (http://data.un.org/Explorer.aspxDatabase [Accessed 2011.06.20]). Commodity: Waste or scrap, of cast iron
  property carbon content 0
    carbon content on a dry matter basis (reserved; not for manual entry)
  property true value 4.3567
    allocation property applied in "true value" allocation // value calculated from revenue
  properties: water content 0, water in wet mass 0 kg, carbon content, fossil 0, dry mass 1 kg, carbon content, non-fossil 0, wet mass 1 kg, carbon allocation 0 kg

## Inputs from technosphere
- waste bitumen sheet: -273442 kg; lognormal variance with pedigree 0.4332, pedigree (2,3,5,5,4)
  EcoSpold01Location=CH
  Adapted from figures for MSWI
  Uncertainty: & basic uncertainty of 3; adapted from figures for MSWI
  production volume 864000 kg
    Calculated from the production volume of hazardous waste incineration facility in proportion to the respective output amounts.
  properties: water content 0.0152284, carbon content, fossil 0.643207, wet mass 1 kg, dry mass 0.985 kg
  note on carbon content, fossil: The bitumen sheet is made of 63% bitumen, 24% surface spread and filler (assumed to be pure SiO2), 6% carrier fleece (assumed to be PE) and 7% elastomer (assumed to be PS) (ecoinvent v2.2 report 13_I, pg 40). C content of bitumen, PE and PS from Tab A.6 and A.1 (ecoinvent v2.2 report 13_I, pg 40), respectively. C content of waste also given in the dataset
- waste reinforced concrete: 0 kg; pedigree (1,1,1,1,1)
  Adapted from figures for MSWI
  EcoSpold01Location=CH
  Uncertainty: & basic uncertainty of 3; adapted from figures for MSWI
  production volume 0 kg
    (same comment as for waste bitumen sheet)
  properties: dry mass 0.99418 kg, water content 0.00585407, wet mass 1 kg
- steel, chromium steel 18/8, hot rolled: 27344.2 kg; lognormal variance with pedigree 0.4332, pedigree (2,3,5,5,4)
  Adapted from figures for MSWI
  EcoSpold01Location=RER
  Uncertainty: & basic uncertainty of 3; adapted from figures for MSWI
  properties: carbon content, fossil 0.0008, wet mass 1 kg, dry mass 1 kg
  note on carbon content, fossil: Stainless steel model is the grade 304 steel (18/8 stainless, 18% chromium 8% nickel; max. 0.08% C)
- pitch: 0 kg; pedigree (1,1,1,1,1)
  (same comment as for waste bitumen sheet)
  properties: carbon content, fossil 0.83, wet mass 1 kg, dry mass 1 kg
- gravel, round: 1.19631e7 kg; lognormal variance with pedigree 0.4332, pedigree (2,3,5,5,4)
  (same comment as for waste bitumen sheet)
  properties: wet mass 1 kg, dry mass 1 kg
- waste concrete, not reinforced: 0 kg; pedigree (1,1,1,1,1)
  (same comment as for waste reinforced concrete)
  production volume 0 kg
    (same comment as for waste bitumen sheet)
  properties: wet mass 1 kg, dry mass 1 kg
- reinforcing steel: 1.33873e6 kg; lognormal variance with pedigree 0.4332, pedigree (2,3,5,5,4)
  EcoSpold01Location=RER
  Adapted from figures for MSWI
  Uncertainty: & basic uncertainty of 3; adapted from figures for MSWI
  properties: carbon content, fossil 0.004, dry mass 1 kg, wet mass 1 kg
- sand: 0 kg; pedigree (1,1,1,1,1)
  (same comment as for waste reinforced concrete)
  properties: wet mass 1 kg, dry mass 1 kg
- cement, unspecified: 0 kg; pedigree (1,1,1,1,1)
  (same comment as for waste reinforced concrete)
  properties: dry mass 1 kg, wet mass 1 kg
- waste reinforced concrete: -920122, -1.31317e7 kg (2 entries); lognormal variance with pedigree 0.4332, pedigree (2,3,5,5,4)
  (same comment as for waste reinforced concrete)
  production volume 4.44e7 kg
- pitch: 12535.9, 714.443, 41541, 32335.6, 1449.41, 2069.17, 182796 kg (7 entries); lognormal variance with pedigree 0.4332, pedigree (2,3,5,5,4)
  (same comment as for waste bitumen sheet)
- waste concrete, not reinforced: -223813, -3.19421e6 kg (2 entries); lognormal variance with pedigree 0.4332, pedigree (2,3,5,5,4)
  (same comment as for waste reinforced concrete)
  production volume 1.08e7 kg
- sand: 268.531, 51724.7, 3.36603e6 kg (3 entries); lognormal variance with pedigree 0.4332, pedigree (2,3,5,5,4)
  (same comment as for waste reinforced concrete)
- cement, unspecified: 51346.3, 3760.76, 10719.4, 246774, 242423, 7135.22, 78365.8, 9481.39, 1.059e6 kg (9 entries); lognormal variance with pedigree 0.4332, pedigree (2,3,5,5,4)
  (same comment as for waste reinforced concrete)

## Inputs from nature
- Transformation, from unspecified [natural resource, land]: 1025.41 m2; lognormal variance with pedigree 0.278, pedigree (4,5,5,5,4)
  Adapted from figures for MSWI. estimate on land area and production volume
  Uncertainty: & basic uncertainty of 2; adapted from figures for MSWI. estimate on land area and production volume
- Occupation, industrial area [natural resource, land]: 41016.3 m2*year; lognormal variance with pedigree 0.188, pedigree (4,5,5,5,4)
  Adapted from figures for MSWI. estimate on land area, production volume and building, operation and demolition time
  Uncertainty: & basic uncertainty of 1.5; adapted from figures for MSWI. estimate on land area, production volume and building, operation and demolition time
- Transformation, to industrial area [natural resource, land]: 1025.41 m2; lognormal variance with pedigree 0.278, pedigree (4,5,5,5,4)
  (same comment as for Transformation, from unspecified)
- Occupation, construction site [natural resource, land]: 5127.03 m2*year; lognormal variance with pedigree 0.188, pedigree (4,5,5,5,4)
  (same comment as for Occupation, industrial area)

## Sampling procedure
The 2 Swiss HWI plants, used as the inventory reference technology mix, have a total annual capacity of 53'000 tons of hazardous waste. This corresonds to 39% of the Swiss total installed capacity in 2000. Swiss average plants size is 20'000 t/a.

## Extrapolations
adapted from municipal waste incineration plant with a factor of 0.36 This dataset has been copied from an original dataset covering the geography CH. The uncertainty has been adjusted accordingly.

## Review by Niels Jungbluth 2003-07-07
Passed. Calculation for standard deviation 95 of infrastructure, land occupation, transport services and other services can differ from standard Pedigree approach used in this project and figures obtained by this procedure.
