# potato production

Dataset: EcoSpold 2, unit process
Geography: US
Time period: 2001-01-01 to 2019-12-31
Technology level: current
Classification: ISIC rev.4 ecoinvent: 0113:Growing of vegetables and melons, roots and tubers
Scenario: Business-as-Usual
System model: Allocation at the point of substitution
Share of production covered: 100 %
Generated by: Thomas Kägi
Published in: Nemecek, T. 2007
Database: ecoinvent
isCopyrightProtected: true
accessRestrictedTo: 1

## General comment
This dataset represents the production of 1 kg of potatoes (fresh matter). The yield is 41001 kg/ha at a moisture content at storage of 78%.

## Included activities start
This activity starts after the harvest of the previous crop. The inputs of seeds, mineral fertilisers, pesticides and irrigation water are considered. It is assumed that no organic fertilisers are applied.

## Included activities end
The dataset includes all machine operations and corresponding machine infrastructure and sheds. Machine operations are: soil cultivation, sowing, fertilisation, irrigation, weed control, pest and pathogen control, harvest, transport from field to farm (1 km) and grading of potatoes. Further, direct field emissions are included. This activity ends after harvest and drying of grains at the farm gate.

## Geography
Refers to an average production in the USA

## Technology
Conventional production typical for the country. Water for irrigation is pumped from 48 meter depth by electric pumps.

## Time period
The yield data have been collected for the years 2001-2006.

## Parameters
- fraction, irrigation water, to ground water: 0.8; name fraction_IW_to_ground_water; lognormal variance with pedigree 0.0886, pedigree (4,3,1,1,4)
  Literature value (Döll, 2011) cross referenced with expert opinion.
- fraction, irrigation water, to air: 0.6949; name fraction_IW_to_air; lognormal variance with pedigree 0.0409, pedigree (2,2,2,1,1)
  Literature value (Siebert, 2010) (Vionnet, S., Quantis Water Database - Technical Report, 2012).
- fraction, irrigation water to surface water: 0.2; name fraction_IW_to_surface_water; lognormal variance with pedigree 0.0886, pedigree (4,3,1,1,4)
  Literature value (Döll, 2011) cross referenced with expert opinion.

## Reference product
- potato: 1 kg; name REF_PRODUCT; By-product classification allocatable product; CPC 01510: Potatoes
  EcoSpold01Location=US
  production volume 1.91659e10 kg
    FAOSTAT - US production 2012
  property carbon content, non-fossil 0.413567; name REF_PRODUCT_C_content_non_fossil
    biogene carbon content on a dry matter basis
  property water content 3.54545; name REF_PRODUCT_water_content; = (1-REF_PRODUCT_DM)/REF_PRODUCT_DM
  property energy content 3.8698 MJ; name REF_PRODUCT_energy_content
    See chapter 'Product Properties' in "01_crop production - yields & inputs CH & Europe_v1.0.pdf", section "AGRICULTURAL PRODUCTION IN SWITZERLAND" - pdf-document on the dedicated talk page of ecoinvent (www.ecoinvent.org/documentation)
  property water in wet mass 0.78 kg; name REF_PRODUCT_WWM; = 1-REF_PRODUCT_DM
  property wet mass 1 kg; name REF_PRODUCT_WM
  property carbon content, fossil 0; name REF_PRODUCT_C_content_fossil
    fossil carbon content on a dry matter basis
  property dry mass 0.22 kg; name REF_PRODUCT_DM
  property price 0.28 EUR2005; name REF_PRODUCT_price_EUR2005
    Calculated value based on data from United Nations Commodity Trade Statistics Database (comtrade.un.org). UN comtrade category: 1701 Potatoes, fresh or chilled. Using exchange rate of 1EURO = 1.209 USD. Average of price of import into 5 main markets (EU, US, JP, IN and CN).
  property carbon content 0.413567
    carbon content on a dry matter basis (reserved; not for manual entry)
  properties: carbon allocation 0.0909847 kg

## Inputs from technosphere
- potato planting: 2.439e-5 ha; lognormal variance with pedigree 0.0421, pedigree (3,1,5,3,1)
  EcoSpold01Location=CH
  See chapter 'Yields and Inputs of Arable Crop Production' in "01_crop production - yields & inputs US_v1.0.pdf" - pdf-document on the dedicated talk page of ecoinvent (www.ecoinvent.org/documentation)
- potato haulm cutting: 2.439e-5 ha; lognormal variance with pedigree 0.0421, pedigree (3,1,5,3,1)
  See chapter 'Yields and Inputs of Arable Crop Production' in "01_crop production - yields & inputs US_v1.0.pdf" - pdf-document on the dedicated talk page of ecoinvent (www.ecoinvent.org/documentation)
  EcoSpold01Location=CH
- application of plant protection product, by field sprayer: 9.7559e-5 ha; lognormal variance with pedigree 0.0421, pedigree (3,1,5,3,1)
  (same comment as for potato planting)
- bipyridylium-compound: 3.3423e-6 kg; lognormal variance with pedigree 0.0406, pedigree (2,1,5,1,1)
  (same comment as for potato haulm cutting)
  properties: dry mass 1 kg, carbon content, fossil 0.418929, wet mass 1 kg
  note on carbon content, fossil: C content was calculated after C content of Diquat (C12H12Br2N2). The herbicide Diquat is classified as a bipyridylium-compound in Tab 10.3 in ecoinvent v2.2 report 15a
- dithiocarbamate-compound: 6.17987e-5 kg; lognormal variance with pedigree 0.0406, pedigree (2,1,5,1,1)
  (same comment as for potato planting)
  properties: carbon content, fossil 0.179339, dry mass 1 kg, wet mass 1 kg
  note on carbon content, fossil: Approximated as an unweighted average of the C-content of the dithiocarbamate-compounds (Tab 2.25 Sutter, 2010) Maneb and Mancozeb
- potato seed, for setting: 0.057408 kg; name SEED; lognormal variance with pedigree 0.0407, pedigree (2,2,5,1,1)
  See chapter 'Yields and Inputs of Arable Crop Production' in "01_crop production - yields & inputs US_v1.0.pdf" - pdf-document on the dedicated talk page of ecoinvent (www.ecoinvent.org/documentation)
  property energy content 3.518 MJ; name SEED_energy_content
  property dry mass 0.2 kg; name SEED_DM
  property wet mass 1 kg; name potato_seed_setting_WM
  property water content 4; name potato_seed_setting_water_content
  property carbon content, non-fossil 0.413567; name SEED_C_content_non_fossil
  property water in wet mass 0.8 kg; name potato_seed_setting_WWM
  note on energy content: See chapter 'Product Properties' in "01_crop production - yields & inputs CH & Europe_v1.0.pdf", section "AGRICULTURAL PRODUCTION IN SWITZERLAND" - pdf-document on the dedicated talk page of ecoinvent (www.ecoinvent.org/documentation)
  note on carbon content, non-fossil: biogene carbon content on a dry matter basis; Composition data obtained from Potatoes, raw, skin, in (http://www.nal.usda.gov/fnic/foodcomp/search/). First, composition data were refered to 1 kg dry mass. Then, C-contents were calculated considering a C-content/dry mass of 44% in carbohydrates (including fibres), 53% in proteins and 75% in fats. All data from ecoinvent report, n 15a, pg 40, except C-content in protein, that comes from Determination of protein concentration by total organic carbon analysis, Rouwenhorst et al., 1991, J Biochem and Biophys Methods, 22:119-128.
- irrigation: 0.113162 m3; name water_irrigation_input; source Siebert, S. 2010; lognormal variance with pedigree 0.0427, pedigree (2,2,5,1,1)
  See chapter 'Yields and Inputs of Arable Crop Production' in "01_crop production - yields & inputs US_v1.0.pdf" - pdf-document on the dedicated talk page of ecoinvent (www.ecoinvent.org/documentation)
  Calculated based on literature values (Döll, 2010) and partially modelled at ETH (Pfister, S.).
  See chapter 'Yields and Inputs of Arable Crop Production' in "01_crop production - yields & inputs US_v1.0.pdf" - pdf-document on the dedicated talk page of ecoinvent (www.ecoinvent.org/documentation)
  Calculated based on literature values (Döll, 2010) and partially modelled at ETH (Pfister, S.).
  EcoSpold01Location=US
  properties: water content 9089.91, wet mass 1000 kg, dry mass 0.11 kg
- acetamide-anillide-compound, unspecified: 5.0592e-6 kg; lognormal variance with pedigree 0.0406, pedigree (2,1,5,1,1)
  (same comment as for potato planting)
  properties: wet mass 1 kg, dry mass 1 kg, carbon content, fossil 0.659175
  note on carbon content, fossil: Approximated as an unweighted average of the C-content of the acetamide-anillide-compound (Tab 2.25 Sutter, 2010) alachor, metolachlor, propachlor and teflubenzuron
- pesticide, unspecified: 0.0010174 kg; lognormal variance with pedigree 0.0406, pedigree (2,1,5,1,1)
  (same comment as for potato planting)
  properties: carbon content, fossil 0.486978, wet mass 1 kg, dry mass 1 kg
  note on carbon content, fossil: Mean of C content in all pesticides whose formula has been documented in Sutter 2010
- potato grading: 1 kg; lognormal variance with pedigree 0.0421, pedigree (3,1,5,3,1)
  (same comment as for potato planting)
- organophosphorus-compound, unspecified: 2.9817e-5 kg; lognormal variance with pedigree 0.0406, pedigree (2,1,5,1,1)
  (same comment as for potato planting)
  properties: dry mass 1 kg, carbon content, fossil 0.260898, wet mass 1 kg
  note on carbon content, fossil: C content was calculated as an unweighted average of glyphosate, parathion, and fosetyl-Al. Those substances are classified as organo-phosphorous compounds in Tab 2.25, Sutter 2010
- fertilising, by broadcaster: 4.878e-5 ha; lognormal variance with pedigree 0.0421, pedigree (3,1,5,3,1)
  (same comment as for potato planting)
- ammonia, liquid: 0.0023786 kg; lognormal variance with pedigree 0.0407, pedigree (2,2,5,1,1)
  See chapter 'Yields and Inputs of Arable Crop Production' in "01_crop production - yields & inputs US_v1.0.pdf" - pdf-document on the dedicated talk page of ecoinvent (www.ecoinvent.org/documentation)
  EcoSpold01Location=RER
  properties: wet mass 1 kg, dry mass 1 kg
- phenoxy-compound: 2.4083e-6 kg; lognormal variance with pedigree 0.0406, pedigree (2,1,5,1,1)
  (same comment as for potato planting)
  properties: dry mass 1 kg, wet mass 1 kg, carbon content, fossil 0.532559
  note on carbon content, fossil: An unweighted average of the C content in mCPA, mCPB, mecoprop, fluazifop-P-butyl, and 2,4-D. Those substances are classified as phenoxy-compounds in Tab 2.25, Sutter 2010
- dinitroaniline-compound: 4.624e-6 kg; lognormal variance with pedigree 0.0406, pedigree (2,1,5,1,1)
  (same comment as for potato planting)
  properties: carbon content, fossil 0.55516, wet mass 1 kg, dry mass 1 kg
  note on carbon content, fossil: C content of dinitroaniline-compound was calculated after the C content of the herbicide pendimethalin, classified as dinitroaniline-compound in Tab 2.25 of Sutter 2010
- phosphate fertiliser, as P2O5: 0.0043273 kg; lognormal variance with pedigree 0.0407, pedigree (2,2,5,1,1)
  EcoSpold01Location=RER
  See chapter 'Yields and Inputs of Arable Crop Production' in "01_crop production - yields & inputs US_v1.0.pdf" - pdf-document on the dedicated talk page of ecoinvent (www.ecoinvent.org/documentation)
  properties: wet mass 1 kg, dry mass 1 kg
- urea, as N: 0.00082272 kg; lognormal variance with pedigree 0.0407, pedigree (2,2,5,1,1)
  (same comment as for phosphate fertiliser, as P2O5)
  properties: wet mass 1 kg, dry mass 1 kg, carbon content, fossil 0.2
- packaging, for fertilisers: 0.0289728 kg; lognormal variance with pedigree 0.0912, pedigree (4,3,5,5,4)
  Total amount of active substance/s of fertilisers needed for the production of 'potato' is calculated to be circa 1.45E-02 kg. Fertiliser/s used in this dataset is/are: 'ammonia, liquid', 'ammonium nitrate, as N', 'nitrogen fertiliser, as N', 'phosphate fertiliser, as P2O5', 'potassium chloride, as K2O', 'urea, as N'. The total amount of active substance/s is doubled in order to account for the packaging of the dilluted product of fertiliser/s that is/are applied. Therefore, 2.90E-02 kg of packaging for fertilisers is justified with this exchange.
  properties: dry mass 1 kg, price 0.0642 EUR2005, carbon content, fossil 0.825301, wet mass 1 kg
  note on carbon content, fossil: Considering a chemical formula (C2H4)n for polyethylene, carbon content-fossil is calculated to be 0.856286 kg of Carbon per kg of dry mass.
- glyphosate: 2.4371e-7 kg; lognormal variance with pedigree 0.0406, pedigree (2,1,5,1,1)
  (same comment as for potato planting)
  properties: dry mass 1 kg, carbon content, fossil 0.214286, wet mass 1 kg
- pyridazine-compound: 4.1127e-6 kg; lognormal variance with pedigree 0.0406, pedigree (2,1,5,1,1)
  (same comment as for potato haulm cutting)
  properties: wet mass 1 kg, dry mass 1 kg, carbon content, fossil 0.541901
  note on carbon content, fossil: The herbicide Chloridazon was used as a significative example to calculate C content of pyridazine compounds. This substance is identified as a pyridazine in Tab 1.5, Sutter 2010
- nitrogen fertiliser, as N: 0.0016933 kg; lognormal variance with pedigree 0.0407, pedigree (2,2,5,1,1)
  (same comment as for ammonia, liquid)
  properties: wet mass 1 kg, dry mass 1 kg
- potassium chloride, as K2O: 0.0041284 kg; lognormal variance with pedigree 0.0407, pedigree (2,2,5,1,1)
  (same comment as for ammonia, liquid)
  properties: dry mass 1 kg, wet mass 1 kg
- packaging, for pesticides: 0.00361381 kg; lognormal variance with pedigree 0.0912, pedigree (4,3,5,5,4)
  Total amount of active substance/s of pesticides needed for the production of potato is calculated to be circa 1.81E-03 kg. Pesticide/s used in this dataset is/are: '[sulfonyl]urea-compound', '[thio]carbamate-compound', 'acetamide-anillide-compound, unspecified', 'bipyridylium-compound', 'dinitroaniline-compound', 'dithiocarbamate-compound', 'glyphosate', 'organophosphorus-compound, unspecified', 'pesticide, unspecified', 'phenoxy-compound', 'pyridazine-compound', 'triazine-compound, unspecified'. The total amount of active substance/s is doubled in order to account for the packaging of the dilluted product of pesticide/s that is/are applied. Therefore, 3.61E-03 kg of packaging for pesticides is justified with this exchange.
  properties: dry mass 1 kg, price 0.0642 EUR2005, wet mass 1 kg, carbon content, fossil 0.85714
- [sulfonyl]urea-compound: 9.7486e-7 kg; lognormal variance with pedigree 0.0406, pedigree (2,1,5,1,1)
  (same comment as for potato haulm cutting)
  properties: wet mass 1 kg, dry mass 1 kg, carbon content, fossil 0.540853
  note on carbon content, fossil: Approximated as an unweighted average of the C-content of the [sulfonyl]urea-compounds (Tab 2.25 Sutter, 2010) chlorotoluron, Diuron, Linuron and Isoproturon.
- tillage, hoeing and earthing-up, potatoes: 4.878e-5 ha; lognormal variance with pedigree 0.0421, pedigree (3,1,5,3,1)
  (same comment as for potato planting)
- ammonium nitrate, as N: 0.0011361 kg; lognormal variance with pedigree 0.0407, pedigree (2,2,5,1,1)
  (same comment as for phosphate fertiliser, as P2O5)
  properties: dry mass 1 kg, wet mass 1 kg
- triazine-compound, unspecified: 6.6651e-6 kg; lognormal variance with pedigree 0.0406, pedigree (2,1,5,1,1)
  (same comment as for potato planting)
  properties: wet mass 1 kg, carbon content, fossil 0.475616, dry mass 1 kg
  note on carbon content, fossil: An unweighted average of the C content in Atrazine, Cyanazine, metamitron, simazine, and terbuthylazine. Those substances are classified as triazine-compounds in Tab 2.25, Sutter 2010
- [thio]carbamate-compound: 0.00067046 kg; lognormal variance with pedigree 0.0406, pedigree (2,1,5,1,1)
  (same comment as for potato planting)
  properties: wet mass 1 kg, carbon content, fossil 0.626349, dry mass 1 kg
  note on carbon content, fossil: Approximated as an unweighted average of the C-content of the [thio]carbamate-compounds (Tab 2.25 Sutter, 2010) carbofuran,orbencarb, prosulfocarb
- harvesting, by complete harvester, ground crops: 2.3881e-5 ha; lognormal variance with pedigree 0.0421, pedigree (3,1,5,3,1)
  (same comment as for potato planting)
- tillage, ploughing: 2.439e-5 ha; lognormal variance with pedigree 0.0421, pedigree (3,1,5,3,1)
  (same comment as for potato planting)
- tillage, harrowing, by spring tine harrow: 4.878e-5 ha; lognormal variance with pedigree 0.0421, pedigree (3,1,5,3,1)
  (same comment as for potato planting)
- tillage, cultivating, chiselling: 2.439e-5 ha; lognormal variance with pedigree 0.0421, pedigree (3,1,5,3,1)
  (same comment as for potato planting)

## Inputs from nature
- Energy, gross calorific value, in biomass [natural resource, biotic]: 3.6476 MJ; lognormal variance with pedigree 0.0411891, pedigree (2,1,5,1,1)
- Transformation, from annual crop [natural resource, land]: 0.2439 m2; lognormal variance with pedigree 0.1606, pedigree (2,1,5,1,1)
  Modelled, see chapter 'Land use' in "01_crop production_direct field emissions and natural resources_v1.0.pdf" - pdf-document on the dedicated talk page of ecoinvent (www.ecoinvent.org/documentation)
- Carbon dioxide, in air [natural resource, in air]: 0.3162 kg; = 44/12 * (REF_PRODUCT_C_content_non_fossil * REF_PRODUCT * REF_PRODUCT_DM - SEED_C_content_non_fossil * SEED * SEED_DM); lognormal variance with pedigree 0.0406, pedigree (2,1,5,1,1)
  Modelled,see chapter 'CO2 binding' in "01_crop production_direct field emissions and natural resources_v1.0.pdf" - pdf-document on the dedicated talk page of ecoinvent (www.ecoinvent.org/documentation)
- Occupation, annual crop [natural resource, land]: 0.2439 m2*year; lognormal variance with pedigree 0.1606, pedigree (2,1,5,1,1)
  (same comment as for Transformation, from annual crop)
- Transformation, to annual crop [natural resource, land]: 0.2439 m2; lognormal variance with pedigree 0.1606, pedigree (2,1,5,1,1)
  (same comment as for Transformation, from annual crop)

## Emissions to nature
- Metiram [soil, agricultural]: 2.794e-6 kg; lognormal variance with pedigree 0.0506, pedigree (2,1,5,1,1)
  Modelled, see chapter 'Emissions of pesticides to agricultural soil' in "01_crop production_direct field emissions and natural resources_v1.0.pdf" - pdf-document on the dedicated talk page of ecoinvent (www.ecoinvent.org/documentation)
- Glufosinate [soil, agricultural]: 3.2205e-7 kg; lognormal variance with pedigree 0.0506, pedigree (2,1,5,1,1)
  (same comment as for Metiram)
- Pendimethalin [soil, agricultural]: 4.1344e-6 kg; lognormal variance with pedigree 0.0506, pedigree (2,1,5,1,1)
  (same comment as for Metiram)
- Cadmium, ion [water, ground-]: 1.15584e-9 kg; lognormal variance with pedigree 0.1327, pedigree (2,2,5,5,1)
  Modelled, see chapter 'Emissions of heavy metals to agricultural soil, surface water and ground water' in "01_crop production_direct field emissions and natural resources_v1.0.pdf" - pdf-document on the dedicated talk page of ecoinvent (www.ecoinvent.org/documentation)
- Sulfur [soil, agricultural]: 1.1359e-5 kg; lognormal variance with pedigree 0.0506, pedigree (2,1,5,1,1)
  (same comment as for Metiram)
- Phorate [soil, agricultural]: 6.7979e-6 kg; lognormal variance with pedigree 0.0506, pedigree (2,1,5,1,1)
  (same comment as for Metiram)
- Oxamyl [soil, agricultural]: 3.1509e-6 kg; lognormal variance with pedigree 0.0506, pedigree (2,1,5,1,1)
  (same comment as for Metiram)
- Cymoxanil [soil, agricultural]: 1.8278e-7 kg; lognormal variance with pedigree 0.0506, pedigree (2,1,5,1,1)
  (same comment as for Metiram)
- Phosmet [soil, agricultural]: 7.4855e-7 kg; lognormal variance with pedigree 0.0506, pedigree (2,1,5,1,1)
  (same comment as for Metiram)
- Dichlorprop-P [soil, agricultural]: 0.00010134 kg; lognormal variance with pedigree 0.0506, pedigree (2,1,5,1,1)
  (same comment as for Metiram)
- Rimsulfuron [soil, agricultural]: 1.001e-7 kg; lognormal variance with pedigree 0.0506, pedigree (2,1,5,1,1)
  (same comment as for Metiram)
- Dinitrogen monoxide [air, non-urban air or from high stacks]: 0.000123247 kg; name N2O; lognormal variance with pedigree 0.0707, pedigree (2,2,5,1,1)
  Modelled, see chapter 'Emissions of N2O to the air' in "01_crop production_direct field emissions and natural resources_v1.0.pdf" - pdf-document on the dedicated talk page of ecoinvent (www.ecoinvent.org/documentation)
- Clethodim [soil, agricultural]: 4.896e-9 kg; lognormal variance with pedigree 0.0506, pedigree (2,1,5,1,1)
  (same comment as for Metiram)
- Mercury [soil, agricultural]: -7.43954e-9 kg
  (same comment as for Cadmium, ion)
- Paraquat [soil, agricultural]: 2.089e-7 kg; lognormal variance with pedigree 0.0506, pedigree (2,1,5,1,1)
  (same comment as for Metiram)
- Endothall [soil, agricultural]: 1.2512e-8 kg; lognormal variance with pedigree 0.0506, pedigree (2,1,5,1,1)
  (same comment as for Metiram)
- Maleic hydrazide [soil, agricultural]: 4.1127e-6 kg; lognormal variance with pedigree 0.0506, pedigree (2,1,5,1,1)
  (same comment as for Metiram)
- Sulfuric acid [soil, agricultural]: 0.00076712 kg; lognormal variance with pedigree 0.0506, pedigree (2,1,5,1,1)
  (same comment as for Metiram)
- Diquat [soil, agricultural]: 3.1335e-6 kg; lognormal variance with pedigree 0.0506, pedigree (2,1,5,1,1)
  (same comment as for Metiram)
- Dimethomorph [soil, agricultural]: 3.9168e-8 kg; lognormal variance with pedigree 0.0506, pedigree (2,1,5,1,1)
  (same comment as for Metiram)
- Phosphate [water, surface water]: 0.0002029 kg; lognormal variance with pedigree 0.0827, pedigree (2,2,5,5,1)
  Modelled, see chapter 'Emissions of phosphorous to the water' in "01_crop production_direct field emissions and natural resources_v1.0.pdf" - pdf-document on the dedicated talk page of ecoinvent (www.ecoinvent.org/documentation)
- Linuron [soil, agricultural]: 8.7476e-7 kg; lognormal variance with pedigree 0.0506, pedigree (2,1,5,1,1)
  (same comment as for Metiram)
- Metribuzin [soil, agricultural]: 6.4562e-6 kg; lognormal variance with pedigree 0.0506, pedigree (2,1,5,1,1)
  (same comment as for Metiram)
- Thiamethoxam [soil, agricultural]: 1.9149e-7 kg; lognormal variance with pedigree 0.0506, pedigree (2,1,5,1,1)
  (same comment as for Metiram)
- Endosulfan [soil, agricultural]: 1.3578e-6 kg; lognormal variance with pedigree 0.0506, pedigree (2,1,5,1,1)
  (same comment as for Metiram)
- EPTC [soil, agricultural]: 1.6229e-5 kg; lognormal variance with pedigree 0.0506, pedigree (2,1,5,1,1)
  (same comment as for Metiram)
- Phosphorus [water, surface water]: 0.00015016 kg; lognormal variance with pedigree 0.0807, pedigree (2,2,5,1,1)
  (same comment as for Phosphate)
- Mercury [water, ground-]: 1.26417e-10 kg; lognormal variance with pedigree 0.1327, pedigree (2,2,5,5,1)
  (same comment as for Cadmium, ion)
- Maneb [soil, agricultural]: 9.5744e-8 kg; lognormal variance with pedigree 0.0506, pedigree (2,1,5,1,1)
  (same comment as for Metiram)
- Nitrogen oxides [air, non-urban air or from high stacks]: 2.58819e-5 kg; = 0.21 * N2O; lognormal variance with pedigree 0.0707, pedigree (2,2,5,1,1)
  Modelled, see chapter 'Emissions of NOx to the air' in "01_crop production_direct field emissions and natural resources_v1.0.pdf" - pdf-document on the dedicated talk page of ecoinvent (www.ecoinvent.org/documentation)
- Zinc [soil, agricultural]: 3.78956e-6 kg; lognormal variance with pedigree 0.0827, pedigree (2,2,5,5,1)
  (same comment as for Cadmium, ion)
- Zinc, ion [water, surface water]: 1.003e-7 kg; lognormal variance with pedigree 0.1327, pedigree (2,2,5,5,1)
  (same comment as for Cadmium, ion)
- Lead [soil, agricultural]: 2.69953e-7 kg; lognormal variance with pedigree 0.0827, pedigree (2,2,5,5,1)
  (same comment as for Cadmium, ion)
- Cadmium, ion [water, surface water]: 6.11997e-10 kg; lognormal variance with pedigree 0.1327, pedigree (2,2,5,5,1)
  (same comment as for Cadmium, ion)
- Ammonia [air, non-urban air or from high stacks]: 0.000331389 kg; lognormal variance with pedigree 0.0507, pedigree (2,2,5,1,1)
  Modelled with the 'AGRAMMON model' described in "01_crop production_direct field emissions and natural resources_v1.0.pdf" - pdf-document on the dedicated talk page of ecoinvent (www.ecoinvent.org/documentation)
- Imidacloprid [soil, agricultural]: 1.0706e-6 kg; lognormal variance with pedigree 0.0506, pedigree (2,1,5,1,1)
  (same comment as for Metiram)
- Metalaxil [soil, agricultural]: 2.1151e-6 kg; lognormal variance with pedigree 0.0506, pedigree (2,1,5,1,1)
  (same comment as for Metiram)
- Zinc, ion [water, ground-]: 6.04955e-7 kg; lognormal variance with pedigree 0.1327, pedigree (2,2,5,5,1)
  (same comment as for Cadmium, ion)
- Diazinon [soil, agricultural]: 1.5014e-6 kg; lognormal variance with pedigree 0.0506, pedigree (2,1,5,1,1)
  (same comment as for Metiram)
- Piperonyl butoxide [soil, agricultural]: 2.2304e-8 kg; lognormal variance with pedigree 0.0506, pedigree (2,1,5,1,1)
  (same comment as for Metiram)
- Glyphosate [soil, agricultural]: 2.4371e-7 kg; lognormal variance with pedigree 0.0506, pedigree (2,1,5,1,1)
  (same comment as for Metiram)
- Water [water, ground-]: 0.0276206 m3; name water_to_water_ground; = water_irrigation_input*(1-fraction_IW_to_air)*fraction_IW_to_ground_water; lognormal variance with pedigree 0.1286, pedigree (4,3,5,1,4)
  Calculated value. See the parameters and their comments to understand the calculation.
  property fraction, origin: salt water 0; name fraction_origin_salt_water_Wgw
  property fraction, origin: fresh water 1; name fraction_origin_fresh_water_Wgw
  property fraction, origin: unspecified 0; name fraction_origin_unspecified_Wgw
  property dry mass 0 kg; name DM
  property carbon content, fossil 0; name C_content_fossil
  property carbon content, non-fossil 0; name C_content_non_fossil
  property water in wet mass 1000 kg; name WWM
  property wet mass 1000 kg; name WM
- 2,4-D [soil, agricultural]: 5.984e-9 kg; lognormal variance with pedigree 0.0506, pedigree (2,1,5,1,1)
  (same comment as for Metiram)
- Copper [soil, agricultural]: 6.45258e-7 kg; lognormal variance with pedigree 0.0827, pedigree (2,2,5,5,1)
  (same comment as for Cadmium, ion)
- Water [air, unspecified]: 0.0786364 m3; name water_to_air_unspecified; = (water_irrigation_input*fraction_IW_to_air); lognormal variance with pedigree 0.0807, pedigree (2,2,5,1,1)
  Calculated value based on literature values and expert opinion. See comments in the parametres' comment field.
  property fraction, origin: salt water 0; name fraction_origin_salt_water
  property fraction, origin: fresh water 1; name fraction_origin_fresh_water
  property fraction, origin: unspecified 0; name fraction_origin_unspecified
- Nickel [soil, agricultural]: 5.26007e-7 kg; lognormal variance with pedigree 0.0827, pedigree (2,2,5,5,1)
  (same comment as for Cadmium, ion)
- Water [water, surface water]: 0.00690516 m3; name water_to_water_surface; = water_irrigation_input*(1-fraction_IW_to_air)*fraction_IW_to_surface_water; lognormal variance with pedigree 0.1286, pedigree (4,3,5,1,4)
  Calculated value. See the parameters and their comments to understand the calculation.
  property fraction, origin: fresh water 1; name fraction_origin_fresh_water_Wsw
  property fraction, origin: salt water 0; name fraction_origin_salt_water_Wsw
- Spinosad [soil, agricultural]: 4.352e-9 kg; lognormal variance with pedigree 0.0506, pedigree (2,1,5,1,1)
  (same comment as for Metiram)
- Metolachlor [soil, agricultural]: 4.5304e-6 kg; lognormal variance with pedigree 0.0506, pedigree (2,1,5,1,1)
  (same comment as for Metiram)
- Phosphate [water, ground-]: 1.7073e-6 kg; lognormal variance with pedigree 0.0827, pedigree (2,2,5,5,1)
  (same comment as for Phosphate)
- Copper, ion [water, surface water]: 5.25217e-8 kg; lognormal variance with pedigree 0.1327, pedigree (2,2,5,5,1)
  (same comment as for Cadmium, ion)
- Pymetrozine [soil, agricultural]: 2.089e-7 kg; lognormal variance with pedigree 0.0506, pedigree (2,1,5,1,1)
  (same comment as for Metiram)
- Esfenvalerate [soil, agricultural]: 2.2195e-7 kg; lognormal variance with pedigree 0.0506, pedigree (2,1,5,1,1)
  (same comment as for Metiram)
- Trichlorfon [soil, agricultural]: 3.264e-9 kg; lognormal variance with pedigree 0.0506, pedigree (2,1,5,1,1)
  (same comment as for Metiram)
- Flutolanil [soil, agricultural]: 7.3984e-7 kg; lognormal variance with pedigree 0.0506, pedigree (2,1,5,1,1)
  (same comment as for Metiram)
- Lead [water, surface water]: 2.26459e-8 kg; lognormal variance with pedigree 0.1327, pedigree (2,2,5,5,1)
  (same comment as for Cadmium, ion)
- Lead [water, ground-]: 6.31679e-9 kg; lognormal variance with pedigree 0.1327, pedigree (2,2,5,5,1)
  (same comment as for Cadmium, ion)
- Quintozene [soil, agricultural]: 4.0822e-6 kg; lognormal variance with pedigree 0.0506, pedigree (2,1,5,1,1)
  (same comment as for Metiram)
- Trifluralin [soil, agricultural]: 4.896e-7 kg; lognormal variance with pedigree 0.0506, pedigree (2,1,5,1,1)
  (same comment as for Metiram)
- Iprodion [soil, agricultural]: 1.3252e-6 kg; lognormal variance with pedigree 0.0506, pedigree (2,1,5,1,1)
  (same comment as for Metiram)
- Malathion [soil, agricultural]: 5.9296e-8 kg; lognormal variance with pedigree 0.0506, pedigree (2,1,5,1,1)
  (same comment as for Metiram)
- Chromium [soil, agricultural]: 2.89873e-6 kg; lognormal variance with pedigree 0.0827, pedigree (2,2,5,5,1)
  (same comment as for Cadmium, ion)
- Azinphos-methyl [soil, agricultural]: 3.9603e-7 kg; lognormal variance with pedigree 0.0506, pedigree (2,1,5,1,1)
  (same comment as for Metiram)
- Permethrin [soil, agricultural]: 1.3056e-7 kg; lognormal variance with pedigree 0.0506, pedigree (2,1,5,1,1)
  (same comment as for Metiram)
- Dimethoate [soil, agricultural]: 1.038e-6 kg; lognormal variance with pedigree 0.0506, pedigree (2,1,5,1,1)
  (same comment as for Metiram)
- Nickel, ion [water, surface water]: 5.10795e-8 kg; lognormal variance with pedigree 0.1327, pedigree (2,2,5,5,1)
  (same comment as for Cadmium, ion)
- Metam-sodium [soil, agricultural]: 0.00066972 kg; lognormal variance with pedigree 0.0506, pedigree (2,1,5,1,1)
  (same comment as for Metiram)
- TCMTB [soil, agricultural]: 6.3383e-5 kg; lognormal variance with pedigree 0.0506, pedigree (2,1,5,1,1)
  (same comment as for Metiram)
- Chromium, ion [water, surface water]: 6.32647e-8 kg; lognormal variance with pedigree 0.1327, pedigree (2,2,5,5,1)
  (same comment as for Cadmium, ion)
- Propargite [soil, agricultural]: 2.1804e-6 kg; lognormal variance with pedigree 0.0506, pedigree (2,1,5,1,1)
  (same comment as for Metiram)
- Azoxystrobin [soil, agricultural]: 1.9584e-6 kg; lognormal variance with pedigree 0.0506, pedigree (2,1,5,1,1)
  (same comment as for Metiram)
- Propamocarb HCl [soil, agricultural]: 3.264e-8 kg; lognormal variance with pedigree 0.0506, pedigree (2,1,5,1,1)
  (same comment as for Metiram)
- Mancozeb [soil, agricultural]: 5.8909e-5 kg; lognormal variance with pedigree 0.0506, pedigree (2,1,5,1,1)
  (same comment as for Metiram)
- Fentin hydroxide [soil, agricultural]: 6.5063e-7 kg; lognormal variance with pedigree 0.0506, pedigree (2,1,5,1,1)
  (same comment as for Metiram)
- Mercury [water, surface water]: 9.00863e-11 kg; lognormal variance with pedigree 0.1327, pedigree (2,2,5,5,1)
  (same comment as for Cadmium, ion)
- Sethoxydim [soil, agricultural]: 8.704e-8 kg; lognormal variance with pedigree 0.0506, pedigree (2,1,5,1,1)
  (same comment as for Metiram)
- Carbaryl [soil, agricultural]: 6.0928e-8 kg; lognormal variance with pedigree 0.0506, pedigree (2,1,5,1,1)
  (same comment as for Metiram)
- Carbon dioxide, fossil [air, non-urban air or from high stacks]: 0.0012917 kg; lognormal variance with pedigree 0.0407, pedigree (2,2,5,1,1)
  Modelled, see chapter 'Release of fossil CO2 after urea applications' in "01_crop production_assessment methods of direct field emissions_v1.0.pdf" - pdf-document on the dedicated talk page of ecoinvent (www.ecoinvent.org/documentation)
- Ethoprop [soil, agricultural]: 3.7601e-6 kg; lognormal variance with pedigree 0.0506, pedigree (2,1,5,1,1)
  (same comment as for Metiram)
- Nitrate [water, ground-]: 0.00893411 kg; lognormal variance with pedigree 0.0807, pedigree (2,2,5,1,1)
  Modelled with the 'SQCB-NO3 model' described in "01_crop production_direct field emissions and natural resources_v1.0.pdf" - pdf-document on the dedicated talk page of ecoinvent (www.ecoinvent.org/documentation)
- Cyfluthrin [soil, agricultural]: 2.6983e-7 kg; lognormal variance with pedigree 0.0506, pedigree (2,1,5,1,1)
  (same comment as for Metiram)
- Chlorothalonil [soil, agricultural]: 5.0327e-5 kg; lognormal variance with pedigree 0.0506, pedigree (2,1,5,1,1)
  (same comment as for Metiram)
- Chromium, ion [water, ground-]: 5.04511e-7 kg; lognormal variance with pedigree 0.1327, pedigree (2,2,5,5,1)
  (same comment as for Cadmium, ion)
- Copper, ion [water, ground-]: 8.52777e-8 kg; lognormal variance with pedigree 0.1327, pedigree (2,2,5,5,1)
  (same comment as for Cadmium, ion)
- Cadmium [soil, agricultural]: 3.00685e-7 kg; lognormal variance with pedigree 0.0827, pedigree (2,2,5,5,1)
  (same comment as for Cadmium, ion)
- Aldicarb [soil, agricultural]: 4.1431e-6 kg; lognormal variance with pedigree 0.0506, pedigree (2,1,5,1,1)
  (same comment as for Metiram)
- Carbofuran [soil, agricultural]: 6.7891e-7 kg; lognormal variance with pedigree 0.0506, pedigree (2,1,5,1,1)
  (same comment as for Metiram)

## Sampling procedure
Data come from the NREL database and from varoius U.S database. Data were compiled from statistics, literature, farm survey reports, documents from extension services, and expert knowledge.

## Extrapolations
This dataset has been extrapolated from year 2006 to the year of the calculation (2019). The uncertainty has been adjusted accordingly.

## Review by Roberto Dones 2009-01-22
automatic validation in Excel
none
