# treatment of waste polypropylene, unsanitary landfill, wet infiltration class (500mm)

Dataset: EcoSpold 2, unit process
Geography: GLO
Time period: 2006-01-01 to 2019-12-31
Technology level: current
Classification: ISIC rev.4 ecoinvent: 3821:Treatment and disposal of non-hazardous waste
Synonyms: municipal waste landfill
Scenario: Business-as-Usual
System model: Allocation at the point of substitution
Share of production covered: 1 %
Generated by: Avraam Symeonidis
Database: ecoinvent
isCopyrightProtected: true
accessRestrictedTo: 1

## General comment
This dataset represents the activity of waste disposal of waste polypropylene in a unsanitary landfill. Recommended use of this dataset: For PP, which goes to disposal as part of managed communal waste mixture. // Waste composition (wet, in ppm): upper heating value 36.16 MJ/kg; lower heating value 32.78 MJ/kg; H2O 159000; O 32454; H 103430; C 694120; S 360.46; N 1095.3; P n.a.; B n.a.; Cl 1234.1; Br 8.0972; F 12.146; I n.a.; Ag n.a.; As 1.5385; Ba 202.43; Cd 28.663; Co 1.417; Cr 10.526; Cu 34.93; Hg 0.040486; Mn 25.371; Mo n.a.; Ni 0.80972; Pb 19.079; Sb 8.5021; Se 1.7004; Sn 3.2205; V 1862.4; Zn 288.78; Be 0.40486; Sc n.a.; Sr 71.661; Ti 809.72; Tl 0.32389; W n.a.; Si n.a.; Fe 1295.6; Ca 2186.3; Al 161.94; K n.a.; Mg 80.972; Na 1186.6; . // Share of carbon in waste that is biogenic 0%. Share of metals in waste not oxidised and bulk-recyclable (exclude very small or thin parts) Iron: 0%; Alu: 0%; Copper: 0%. Overall degradability of waste during 100 years: 1%.

## Included activities start
from final waste deposition (without transports to the site)

## Included activities end
Waste-specific short-term emissions to air via landfill gas and landfill leachate. Waste-specific long-term emissions from landfill.

## Geography
Given name of landfill location is 'infiltration class 4 wet (2018)'. Landfill site with mean annual temperature (MAT) of 8 degC, mean annual precipitation (MAP) of 1100 mm/year, and net infiltration of 500 mm/year.
Climate adjustments result in an alpha t (temperature) for permafrost areas of 0.999. Total climate adjustments with alpha pt of 0.999.

## Technology
This is an inventory for an unsanitary, sub-controlled landfill for municipal solid waste. Ultimate average landfill height is 15 meters. Operation phase duration is 25 years.Percentage of landfill gas directly emitted is 100w%.
Leachate of the landfill is not treated. Based on average waste composition and climate data the end of carbonate phase is estimated to be reached 3382 years after waste deposition.

## Reference product
- waste polypropylene: -1 kg; CPC 39270: Waste, parings and scrap of plastics; By-product classification Waste; CAS 9003-07-0; pedigree (1,1,1,1,1)
  main reference product of this activity (supply of disposal service).
  Uncertainty: Uncertainty is not adjusted, as this is the refence product
  production volume 1 kg
    The amount of the annual production volume is a placeholder value. The contribution of this technology to the different local markets can be found in the markets themselves.
  property price 0 EUR2005
    Waste products are assigned a price of zero as they are assumed to require further treatment.
  property carbon content 0.82535
    carbon content on a dry matter basis (reserved; not for manual entry)
  properties: strontium content 8.5209e-5, water in wet mass 0.159 kg, carbon content, fossil 0.82535, antimony content 1.011e-5, wet mass 1 kg, iron content 0.0015405, dry mass 0.841 kg, aluminium content 0.00019256, calcium content 0.0025996, titanium content 0.00096281, zinc content 0.00034338, mercury content 4.8141e-8, vanadium content 0.0022145, tin content 3.8294e-6, manganese content 3.0168e-5, thallium content 3.8512e-7, cobalt content 1.6849e-6, cadmium content 3.4082e-5, beryllium content 4.8141e-7, magnesium content 9.6281e-5, selenium content 2.0219e-6, water content 0.18906, lead content 2.2687e-5, barium content 0.0002407, nickel content 9.6281e-7, sodium content 0.001411, copper content 4.1533e-5, chromium content 1.2517e-5, fluorine content 1.4442e-5, sulfur content 0.00042861, heating value, net 32.783 MJ, heating value, gross 36.159 MJ, hydrogen content 0.12298, nitrogen content 0.0013024, oxygen content 0.03859, arsenic content 1.8293e-6, bromine content 9.6281e-6, chlorine content 0.0014674, carbon allocation 0.694119 kg

## Inputs from technosphere
- diesel, burned in building machine: 0.046738 MJ; lognormal variance with pedigree 0.082256, pedigree (1,1,3,1,1)
  for waste distribution and compaction.
  Uncertainty: Uncertainty calculated from uncertainty in base parameters.
- excavation, skid-steer loader: 0.00031708 m3; lognormal variance with pedigree 0.082256, pedigree (1,1,3,1,1)
  application of daily cover.
  Uncertainty: Uncertainty calculated from uncertainty in base parameters.

## Emissions to nature
- Tin, ion [water, ground-]: 1.8955e-10 kg; lognormal variance with pedigree 0.61269, pedigree (1,1,3,1,1)
  burden from short-term leachate to groundwater in uncontrolled landfill in moist cimate.
  Uncertainty: Uncertainty calculated from unertainty of the waste composition of this waste, uncertainty in waste decomposition and short-term leaching in landfill
- Copper, ion [water, ground-, long-term]: 3.4928e-5 kg; lognormal variance with pedigree 0.27751, pedigree (1,1,3,1,1)
  Emissions from long-term leachate (>100a) directly from MSW landfill and indirectly via incineration of treatement sludge from leachate treatement.
  Uncertainty: Uncertainty calculated depending on waste input and uncertainty of long-term transfer coefficents in landfill.
- Vanadium [air, non-urban air or from high stacks]: 4.904e-10 kg; lognormal variance with pedigree 0.57896, pedigree (1,1,3,1,1)
  burden from direct release or incineration of landfill biogas; or windblown leachate evaporite in arid climates.
  Uncertainty: Uncertainty calculated from unertainty of the waste composition of this waste, uncertainty in waste decomposition and short-term leaching in landfill
- Vanadium, ion [water, ground-]: 1.9616e-6 kg; lognormal variance with pedigree 0.30779, pedigree (1,1,3,1,1)
  (same comment as for Tin, ion)
- Cobalt [water, ground-, long-term]: 1.4125e-6 kg; lognormal variance with pedigree 0.38305, pedigree (1,1,3,1,1)
  (same comment as for Copper, ion)
- Tin [air, non-urban air or from high stacks]: 4.7387e-14 kg; lognormal variance with pedigree 0.879, pedigree (1,1,3,1,1)
  (same comment as for Vanadium)
- Selenium [water, ground-]: 1.791e-9 kg; lognormal variance with pedigree 0.53864, pedigree (1,1,3,1,1)
  (same comment as for Tin, ion)
- Chromium VI [water, ground-, long-term]: 3.6162e-8 kg; lognormal variance with pedigree 2.3291, pedigree (1,1,3,1,1)
  (same comment as for Copper, ion)
- Antimony [air, non-urban air or from high stacks]: 2.2388e-12 kg; lognormal variance with pedigree 0.75703, pedigree (1,1,3,1,1)
  (same comment as for Vanadium)
- Antimony [water, ground-]: 8.9552e-9 kg; lognormal variance with pedigree 0.48586, pedigree (1,1,3,1,1)
  (same comment as for Tin, ion)
- Cadmium, ion [water, ground-, long-term]: 2.8612e-5 kg; lognormal variance with pedigree 0.28408, pedigree (1,1,3,1,1)
  (same comment as for Copper, ion)
- Nickel [air, non-urban air or from high stacks]: 1.1755e-13 kg; lognormal variance with pedigree 0.85273, pedigree (1,1,3,1,1)
  (same comment as for Vanadium)
- Lead [water, ground-]: 1.1229e-9 kg; lognormal variance with pedigree 0.55403, pedigree (1,1,3,1,1)
  (same comment as for Tin, ion)
- Barium [water, ground-, long-term]: 0.00020011 kg; lognormal variance with pedigree 0.21906, pedigree (1,1,3,1,1)
  (same comment as for Copper, ion)
- Lead [air, non-urban air or from high stacks]: 3.7428e-13 kg; lognormal variance with pedigree 0.8115, pedigree (1,1,3,1,1)
  (same comment as for Vanadium)
- Nickel, ion [water, ground-]: 4.7019e-10 kg; lognormal variance with pedigree 0.58209, pedigree (1,1,3,1,1)
  (same comment as for Tin, ion)
- Arsenic, ion [water, ground-, long-term]: 1.5357e-6 kg; lognormal variance with pedigree 0.38037, pedigree (1,1,3,1,1)
  (same comment as for Copper, ion)
- Mercury [air, non-urban air or from high stacks]: 1.108e-11 kg; lognormal variance with pedigree 0.68807, pedigree (1,1,3,1,1)
  (same comment as for Vanadium)
- Manganese [water, ground-]: 2.9023e-7 kg; lognormal variance with pedigree 0.37527, pedigree (1,1,3,1,1)
  (same comment as for Tin, ion)
- Nitrate [water, ground-, long-term]: 4.5796e-5 kg; lognormal variance with pedigree 0.16345, pedigree (1,1,3,1,1)
  (same comment as for Copper, ion)
- Manganese [air, non-urban air or from high stacks]: 7.2558e-11 kg; lognormal variance with pedigree 0.64407, pedigree (1,1,3,1,1)
  (same comment as for Vanadium)
- Mercury [water, ground-]: 2.77e-11 kg; lognormal variance with pedigree 0.65801, pedigree (1,1,3,1,1)
  (same comment as for Tin, ion)
- Bromine [water, ground-, long-term]: 7.8907e-6 kg; lognormal variance with pedigree 0.32596, pedigree (1,1,3,1,1)
  (same comment as for Copper, ion)
- Copper [air, non-urban air or from high stacks]: 4.8812e-13 kg; lognormal variance with pedigree 0.80183, pedigree (1,1,3,1,1)
  (same comment as for Vanadium)
- Cobalt [water, ground-]: 4.5492e-9 kg; lognormal variance with pedigree 0.50898, pedigree (1,1,3,1,1)
  (same comment as for Tin, ion)
- Chloride [water, ground-, long-term]: 0.0012026 kg; lognormal variance with pedigree 0.15957, pedigree (1,1,3,1,1)
  (same comment as for Copper, ion)
- Chromium [air, non-urban air or from high stacks]: 2.9961e-13 kg; lognormal variance with pedigree 0.81972, pedigree (1,1,3,1,1)
  (same comment as for Vanadium)
- Copper, ion [water, ground-]: 1.7084e-9 kg; lognormal variance with pedigree 0.54007, pedigree (1,1,3,1,1)
  (same comment as for Tin, ion)
- Fluoride [water, ground-, long-term]: 1.2091e-5 kg; lognormal variance with pedigree 0.31255, pedigree (1,1,3,1,1)
  (same comment as for Copper, ion)
- Cobalt [air, non-urban air or from high stacks]: 1.1373e-12 kg; lognormal variance with pedigree 0.78012, pedigree (1,1,3,1,1)
  (same comment as for Vanadium)
- Chromium VI [water, ground-]: 1.1984e-9 kg; lognormal variance with pedigree 0.55187, pedigree (1,1,3,1,1)
  (same comment as for Tin, ion)
- Nitrogen, organic bound [water, ground-, long-term]: 0.00071174 kg; lognormal variance with pedigree 0.16345, pedigree (1,1,3,1,1)
  (same comment as for Copper, ion)
- Cadmium [air, non-urban air or from high stacks]: 3.3584e-10 kg; lognormal variance with pedigree 0.59383, pedigree (1,1,3,1,1)
  (same comment as for Vanadium)
- Arsenic, ion [water, ground-]: 2.76e-9 kg; lognormal variance with pedigree 0.52476, pedigree (1,1,3,1,1)
  (same comment as for Tin, ion)
- Nitrite [water, ground-, long-term]: 2.3701e-5 kg; lognormal variance with pedigree 0.16345, pedigree (1,1,3,1,1)
  (same comment as for Copper, ion)
- Arsenic [air, non-urban air or from high stacks]: 3.8692e-11 kg; lognormal variance with pedigree 0.66493, pedigree (1,1,3,1,1)
  (same comment as for Vanadium)
- Cadmium, ion [water, ground-]: 5.0375e-8 kg; lognormal variance with pedigree 0.42912, pedigree (1,1,3,1,1)
  (same comment as for Tin, ion)
- Ammonium, ion [water, ground-, long-term]: 0.00043547 kg; lognormal variance with pedigree 0.16345, pedigree (1,1,3,1,1)
  (same comment as for Copper, ion)
- Hydrogen fluoride [air, non-urban air or from high stacks]: 4.8357e-8 kg; lognormal variance with pedigree 0.43334, pedigree (1,1,3,1,1)
  (same comment as for Vanadium)
- Barium [water, ground-]: 2.3157e-6 kg; lognormal variance with pedigree 0.3062, pedigree (1,1,3,1,1)
  (same comment as for Tin, ion)
- Sulfate [water, ground-, long-term]: 0.0010028 kg; lognormal variance with pedigree 0.19994, pedigree (1,1,3,1,1)
  (same comment as for Copper, ion)
- Bromine [air, non-urban air or from high stacks]: 2.8551e-9 kg; lognormal variance with pedigree 0.52322, pedigree (1,1,3,1,1)
  (same comment as for Vanadium)
- Bromine [water, ground-]: 2.0367e-7 kg; lognormal variance with pedigree 0.3906, pedigree (1,1,3,1,1)
  (same comment as for Tin, ion)
- Hydrogen sulfide [water, ground-, long-term]: 2.6142e-5 kg; lognormal variance with pedigree 0.19994, pedigree (1,1,3,1,1)
  (same comment as for Copper, ion)
- Barium [air, non-urban air or from high stacks]: 5.7892e-10 kg; lognormal variance with pedigree 0.575, pedigree (1,1,3,1,1)
  (same comment as for Vanadium)
- Fluoride [water, ground-]: 8.9122e-9 kg; lognormal variance with pedigree 0.48582, pedigree (1,1,3,1,1)
  (same comment as for Tin, ion)
- DOC, Dissolved Organic Carbon [water, ground-, long-term]: 0.68719 kg; lognormal variance with pedigree 0.0030264, pedigree (1,1,3,1,1)
  (same comment as for Copper, ion)
- Nitrogen oxides [air, non-urban air or from high stacks]: 1.5005e-8 kg; lognormal variance with pedigree 0.32239, pedigree (1,1,3,1,1)
  burden from direct release or incineration of landfill biogas.
  Uncertainty: Uncertainty calculated from unertainty of the waste composition of this waste, uncertainty in waste decomposition and short-term leaching in landfill
- Nitrate [water, ground-]: 1.0963e-6 kg; lognormal variance with pedigree 0.23016, pedigree (1,1,3,1,1)
  (same comment as for Tin, ion)
- COD, Chemical Oxygen Demand [water, ground-, long-term]: 0.75161 kg; lognormal variance with pedigree 0.0030264, pedigree (1,1,3,1,1)
  (same comment as for Copper, ion)
- Hydrogen chloride [air, non-urban air or from high stacks]: 4.4742e-7 kg; lognormal variance with pedigree 0.35683, pedigree (1,1,3,1,1)
  (same comment as for Vanadium)
- Chloride [water, ground-]: 3.104e-5 kg; lognormal variance with pedigree 0.22422, pedigree (1,1,3,1,1)
  (same comment as for Tin, ion)
- TOC, Total Organic Carbon [water, ground-, long-term]: 0.68719 kg; lognormal variance with pedigree 0.0030264, pedigree (1,1,3,1,1)
  (same comment as for Copper, ion)
- Methane, fossil [air, non-urban air or from high stacks]: 0.0050214 kg; lognormal variance with pedigree 0.10608, pedigree (1,1,3,1,1)
  (same comment as for Nitrogen oxides)
- Nitrogen, organic bound [water, ground-]: 1.7038e-5 kg; lognormal variance with pedigree 0.23016, pedigree (1,1,3,1,1)
  (same comment as for Tin, ion)
- BOD5, Biological Oxygen Demand [water, ground-, long-term]: 0.17793 kg; lognormal variance with pedigree 0.0030264, pedigree (1,1,3,1,1)
  (same comment as for Copper, ion)
- Carbon dioxide, fossil [air, non-urban air or from high stacks]: 0.010872 kg; lognormal variance with pedigree 0.09595, pedigree (1,1,3,1,1)
  (same comment as for Nitrogen oxides)
- Nitrite [water, ground-]: 5.6736e-7 kg; lognormal variance with pedigree 0.23016, pedigree (1,1,3,1,1)
  (same comment as for Tin, ion)
- Sulfur dioxide [air, non-urban air or from high stacks]: 4.6985e-7 kg; lognormal variance with pedigree 0.37708, pedigree (1,1,3,1,1)
  (same comment as for Nitrogen oxides)
- Sulfate [water, ground-]: 3.7465e-6 kg; lognormal variance with pedigree 0.32125, pedigree (1,1,3,1,1)
  (same comment as for Tin, ion)
- Sodium, ion [water, ground-, long-term]: 0.0011376 kg; lognormal variance with pedigree 0.16087, pedigree (1,1,3,1,1)
  (same comment as for Copper, ion)
- Ammonium, ion [water, ground-]: 1.0424e-5 kg; lognormal variance with pedigree 0.23016, pedigree (1,1,3,1,1)
  (same comment as for Tin, ion)
- Occupation, dump site [natural resource, land]: 0.0023333 m2*year; lognormal variance with pedigree 0.082256, pedigree (1,1,3,1,1)
  for landfill operation phase and spontaneous renaturation.
  Uncertainty: Uncertainty calculated from uncertainty in base parameters.
- Hydrogen sulfide [water, ground-]: 9.7662e-8 kg; lognormal variance with pedigree 0.32125, pedigree (1,1,3,1,1)
  (same comment as for Tin, ion)
- Magnesium [water, ground-, long-term]: 8.0473e-5 kg; lognormal variance with pedigree 0.24953, pedigree (1,1,3,1,1)
  (same comment as for Copper, ion)
- COD, Chemical Oxygen Demand [water, ground-]: 0.00022086 kg; lognormal variance with pedigree 0.20663, pedigree (1,1,3,1,1)
  (same comment as for Tin, ion)
- Calcium, ion [water, ground-, long-term]: 0.0021834 kg; lognormal variance with pedigree 0.14111, pedigree (1,1,3,1,1)
  (same comment as for Copper, ion)
- DOC, Dissolved Organic Carbon [water, ground-]: 0.00020193 kg; lognormal variance with pedigree 0.20663, pedigree (1,1,3,1,1)
  (same comment as for Tin, ion)
- Iron, ion [water, ground-, long-term]: 0.0012954 kg; lognormal variance with pedigree 0.15798, pedigree (1,1,3,1,1)
  (same comment as for Copper, ion)
- BOD5, Biological Oxygen Demand [water, ground-]: 5.2286e-5 kg; lognormal variance with pedigree 0.20663, pedigree (1,1,3,1,1)
  (same comment as for Tin, ion)
- Aluminium [water, ground-, long-term]: 0.00016186 kg; lognormal variance with pedigree 0.22647, pedigree (1,1,3,1,1)
  (same comment as for Copper, ion)
- TOC, Total Organic Carbon [water, ground-]: 0.00020193 kg; lognormal variance with pedigree 0.20663, pedigree (1,1,3,1,1)
  (same comment as for Tin, ion)
- Titanium, ion [water, ground-, long-term]: 0.00080932 kg; lognormal variance with pedigree 0.1733, pedigree (1,1,3,1,1)
  (same comment as for Copper, ion)
- Heat, waste [water, ground-, long-term]: 35.798 MJ; lognormal variance with pedigree 0.014651, pedigree (1,1,3,1,1)
  burden from long-term decomposition of waste (>100a).
  Uncertainty: Uncertainty calculated from unertainty of the waste composition of this waste, uncertainty in waste decomposition and short-term leaching in landfill
- Thallium [water, ground-, long-term]: 3.237e-7 kg; lognormal variance with pedigree 0.43064, pedigree (1,1,3,1,1)
  (same comment as for Copper, ion)
- Heat, waste [soil, industrial]: 0.24878 MJ; lognormal variance with pedigree 0.071031, pedigree (1,1,3,1,1)
  burden from short-term decomposition of waste (0-100a).
  Uncertainty: Uncertainty calculated from unertainty of the waste composition of this waste, uncertainty in waste decomposition and short-term leaching in landfill
- Strontium [water, ground-, long-term]: 7.1619e-5 kg; lognormal variance with pedigree 0.2536, pedigree (1,1,3,1,1)
  (same comment as for Copper, ion)
- Magnesium [air, non-urban air or from high stacks]: 1.2477e-10 kg; lognormal variance with pedigree 0.62555, pedigree (1,1,3,1,1)
  (same comment as for Vanadium)
- Sodium, ion [water, ground-]: 4.9049e-5 kg; lognormal variance with pedigree 0.2122, pedigree (1,1,3,1,1)
  (same comment as for Tin, ion)
- Beryllium [water, ground-, long-term]: 4.0463e-7 kg; lognormal variance with pedigree 0.42349, pedigree (1,1,3,1,1)
  (same comment as for Copper, ion)
- Sodium [air, non-urban air or from high stacks]: 1.2262e-8 kg; lognormal variance with pedigree 0.47472, pedigree (1,1,3,1,1)
  (same comment as for Vanadium)
- Magnesium [water, ground-]: 4.9907e-7 kg; lognormal variance with pedigree 0.35524, pedigree (1,1,3,1,1)
  (same comment as for Tin, ion)
- Zinc, ion [water, ground-, long-term]: 0.00028865 kg; lognormal variance with pedigree 0.20727, pedigree (1,1,3,1,1)
  (same comment as for Copper, ion)
- Iron [air, non-urban air or from high stacks]: 4.4435e-11 kg; lognormal variance with pedigree 0.65465, pedigree (1,1,3,1,1)
  (same comment as for Vanadium)
- Iron, ion [water, ground-]: 1.7774e-7 kg; lognormal variance with pedigree 0.3864, pedigree (1,1,3,1,1)
  (same comment as for Tin, ion)
- Vanadium, ion [water, ground-, long-term]: 0.00042733 kg; lognormal variance with pedigree 0.28165, pedigree (1,1,3,1,1)
  (same comment as for Copper, ion)
- Aluminium [air, non-urban air or from high stacks]: 2.0214e-11 kg; lognormal variance with pedigree 0.68278, pedigree (1,1,3,1,1)
  (same comment as for Vanadium)
- Calcium, ion [water, ground-]: 2.8433e-6 kg; lognormal variance with pedigree 0.29583, pedigree (1,1,3,1,1)
  (same comment as for Tin, ion)
- Antimony [water, ground-, long-term]: 6.5395e-7 kg; lognormal variance with pedigree 0.73548, pedigree (1,1,3,1,1)
  (same comment as for Copper, ion)
- Calcium [air, non-urban air or from high stacks]: 7.1083e-10 kg; lognormal variance with pedigree 0.56711, pedigree (1,1,3,1,1)
  (same comment as for Vanadium)
- Aluminium [water, ground-]: 8.0856e-8 kg; lognormal variance with pedigree 0.41233, pedigree (1,1,3,1,1)
  (same comment as for Tin, ion)
- Tin, ion [water, ground-, long-term]: 3.2203e-6 kg; lognormal variance with pedigree 0.35626, pedigree (1,1,3,1,1)
  (same comment as for Copper, ion)
- Titanium [air, non-urban air or from high stacks]: 1.0107e-10 kg; lognormal variance with pedigree 0.62961, pedigree (1,1,3,1,1)
  (same comment as for Vanadium)
- Titanium, ion [water, ground-]: 4.0428e-7 kg; lognormal variance with pedigree 0.35916, pedigree (1,1,3,1,1)
  (same comment as for Tin, ion)
- Selenium [water, ground-, long-term]: 3.7718e-7 kg; lognormal variance with pedigree 0.51881, pedigree (1,1,3,1,1)
  (same comment as for Copper, ion)
- Thallium [air, non-urban air or from high stacks]: 4.7019e-14 kg; lognormal variance with pedigree 0.88219, pedigree (1,1,3,1,1)
  (same comment as for Vanadium)
- Thallium [water, ground-]: 1.8808e-10 kg; lognormal variance with pedigree 0.61155, pedigree (1,1,3,1,1)
  (same comment as for Tin, ion)
- Lead [water, ground-, long-term]: 1.9078e-5 kg; lognormal variance with pedigree 0.29759, pedigree (1,1,3,1,1)
  (same comment as for Copper, ion)
- Strontium [air, non-urban air or from high stacks]: 1.0403e-11 kg; lognormal variance with pedigree 0.70515, pedigree (1,1,3,1,1)
  (same comment as for Vanadium)
- Strontium [water, ground-]: 4.1612e-8 kg; lognormal variance with pedigree 0.43451, pedigree (1,1,3,1,1)
  (same comment as for Tin, ion)
- Nickel, ion [water, ground-, long-term]: 8.0925e-7 kg; lognormal variance with pedigree 0.40118, pedigree (1,1,3,1,1)
  (same comment as for Copper, ion)
- Zinc [air, non-urban air or from high stacks]: 3.0365e-11 kg; lognormal variance with pedigree 0.66898, pedigree (1,1,3,1,1)
  (same comment as for Vanadium)
- Beryllium [water, ground-]: 2.351e-10 kg; lognormal variance with pedigree 0.60441, pedigree (1,1,3,1,1)
  (same comment as for Tin, ion)
- Manganese [water, ground-, long-term]: 2.5081e-5 kg; lognormal variance with pedigree 0.28813, pedigree (1,1,3,1,1)
  (same comment as for Copper, ion)
- Beryllium [air, non-urban air or from high stacks]: 5.8774e-14 kg; lognormal variance with pedigree 0.87505, pedigree (1,1,3,1,1)
  (same comment as for Vanadium)
- Zinc, ion [water, ground-]: 1.3664e-7 kg; lognormal variance with pedigree 0.39489, pedigree (1,1,3,1,1)
  (same comment as for Tin, ion)
- Mercury [water, ground-, long-term]: 4.0447e-8 kg; lognormal variance with pedigree 0.48245, pedigree (1,1,3,1,1)
  (same comment as for Copper, ion)
- Selenium [air, non-urban air or from high stacks]: 4.4776e-13 kg; lognormal variance with pedigree 0.80981, pedigree (1,1,3,1,1)
  (same comment as for Vanadium)

## Extrapolations
This dataset has been extrapolated from year 2012 to the year of the calculation (2019). The uncertainty has been adjusted accordingly.
