# treatment of waste packaging paper, municipal incineration

Dataset: EcoSpold 2, unit process
Geography: RoW
Time period: 2006-01-01 to 2019-12-31
Technology level: current
Classification: ISIC rev.4 ecoinvent: 3821:Treatment and disposal of non-hazardous waste
Synonyms: municipal waste incineration; Siedlungsabfallverbrennung; Kehrichtverbrennung
Scenario: Business-as-Usual
System model: Allocation at the point of substitution
Share of production covered: 1.8 %
Generated by: Gabor Doka
Published in: Doka G. 2013
Database: ecoinvent
isCopyrightProtected: true
accessRestrictedTo: 1

## General comment
This dataset represents the activity of waste disposal of waste packaging paper in a municipal solid waste incinerator (MSWI) // Recommended use of this dataset: For packaging paper, which goes to disposal as part of communal waste mixture. Larger amounts of separated packaging paper will likely not be disposed in incinerators or landfills, but rather go to recycling. // // Waste composition (wet, in ppm): upper heating value 16.77 MJ/kg; lower heating value 14.12 MJ/kg; H2O 110980; O 377790; H 53851; C 403520; S 1381.8; N 4098.6; P 124.15; B 19.101; Cl 1892.4; Br n.a.; F 21.631; I n.a.; Ag n.a.; As 2.2761; Ba 125.43; Cd 1.8323; Co 0.71627; Cr 14.922; Cu 64.327; Hg 0.14537; Mn 39.49; Mo 4.7751; Ni 10.235; Pb 79.273; Sb 0.7879; Se 2.8651; Sn n.a.; V n.a.; Zn 132.49; Be 1.0824; Sc n.a.; Sr 64.751; Ti 191.01; Tl 1.9101; W n.a.; Si 21297; Fe 1305; Ca 3820.1; Al 12415; K 955.03; Mg 4775.1; Na 1020.9; // Share of carbon in waste that is biogenic 100%. // Share of metals in waste not oxidised and bulk-recyclable (exclude very small or thin parts) Iron: 0%; Alu: 0%; Copper: 0%. // One kg of this waste produces 0.09872 kg of slag and 0.01674 kg of residues, which are landfilled. Additional solidification with 0.006697 kg of cement. // Net energy production: 1.74MJ/kg electric energy and 3.49MJ/kg thermal energy. // Recovery of metal scrap to recycling: 0g iron scrap, 0g aluminium scrap, 0g copper scrap.

## Included activities start
waste incineration from waste reception gate and delivery into waste bunker at incinerator plant site (without transports to the incinerator)

## Included activities end
Waste-specific short-term emissions to water from leachate. Long-term emissions from landfill to ground water.

## Geography
Specific to the technology mix encountered in Switzerland in 2010. Well applicable to modern incineration practices in Europe, North America or Japan.

## Technology
average Swiss MSWI plants in 2010 (grate incinerators) with electrostatic precipitator for fly ash (ESP), wet flue gas scrubber and 25% SNCR , 42.77% SCR-high dust , 32.68% SCR-low dust -DeNOx facilities and 0% without Denox (weighted according to mass of burnt waste, representing Swiss average). Efficiency of iron scrap separation from slag : 58%. Efficiency of non-ferrous scrap separation from slag : 31%. Gross electric efficiency technology mix 15.84% and Gross thermal efficiency technology mix 28.51%

## Time period
Waste composition as given in literature reference, theoretical data or other source. Transfer coefficients for modern MSWI.

## Reference product
- waste packaging paper: 0 kg; CPC 39240: Waste and scrap of paper or paperboard; By-product classification Recyclable
  Main reference product of this activity (supply of disposal service).
  production volume 0 kg
    based on estimate on MSW in WTE globally and share of sum paper+cardboard in MSW in top WTE countries (UNSD 2011) and assumed share of packaging paper in sum paper+cardboard in Swiss MSW
  property price 0.1 EUR2005
    For paper and board waste the price, in 2005, according to [http://ec.europa.eu/eurostat] is about 1 EUR/kg corresponding to a purchase price of 0.099 similar to the price of UN comodittie: Waste, scrap of paper, board, nes (including unsorted).
- heat, for reuse in municipal waste incineration only: 1 MJ; CPC 17300: Steam and hot water; By-product classification allocatable product; pedigree (1,1,1,1,1)
  Net electricity generated from this waste and used in internal MSWI plant energy redistribution.
  Uncertainty: uncertainty is calculated from uncertainties in waste composition and uncertainties in energy efficiency and the uncertainty in internal energy demand
  production volume 5.1346e10 MJ

## By-products
- heat, for reuse in municipal waste incineration only: 0 MJ; name E_th_prod_MSWI; CPC 17300: Steam and hot water; By-product classification allocatable product; pedigree (1,1,1,1,1)
  (same comment as for heat, for reuse in municipal waste incineration only)
  production volume 0 MJ
    calculated in proportion to reference product waste input to incinerator
  property price 0.0106 EUR2005; name E_th_prod_MSWI_price_EUR2005
    Average European district heat price from Ecoheatcool and Euroheat 2005-2006, Ecoheat Work package 1: The European heat market. Final report. 10.6 EUR/GJ i s the price of district heat. http://www.solarthermalworld.org/files/Ecoheatcool%20WP1%20Web.pdf?download
  property true value relation 0.1842; name E_th_prod_MSWI_true_value_relation
    property to calculate "true value" from
  property exergy 0.1842 MJ; name E_th_prod_MSWI_exergy
    This exergy property is based on the exergy content of the product.
- electricity, for reuse in municipal waste incineration only: 0 kWh; name E_el_prod_MSWI; CPC 17100: Electrical energy; By-product classification allocatable product; pedigree (1,1,1,1,1)
  (same comment as for heat, for reuse in municipal waste incineration only)
  production volume 0 kWh
    calculated in proportion to reference product waste input to incinerator
  property true value relation 3.6; name E_el_prod_MSWI_true_value_relation
    property to calculate "true value" from
  property exergy 3.6 MJ; name E_el_prod_MSWI_exergy
    This exergy property is based on the exergy content of the product.
  property price 0.1 EUR2005; name E_el_prod_MSWI_price_EUR2005
    Estimated to be the same price as in case of electricity, medium voltage.

## Inputs from technosphere
- chromium oxide, flakes: 0 kg; pedigree (1,1,1,1,1)
  Input to DeNOx stage.
  Uncertainty: uncertainty calculated from uncertainty in average DeNOx input, uncertainty in the share of thermal NOx, uncertainty of nitrogen content in average municipal waste and the uncertainty in nitrogen content in *this* waste.
  properties: dry mass 1 kg, wet mass 1 kg
- municipal waste incineration facility: 0 unit
  Demands per kilogram waste.
- titanium dioxide: 0 kg; pedigree (1,1,1,1,1)
  Input to DeNOx stage (TiO2 catalyst carrier)
  Uncertainty: uncertainty calculated from uncertainty in average DeNOx input, uncertainty in the share of thermal NOx, uncertainty of nitrogen content in average municipal waste and the uncertainty in nitrogen content in *this* waste.
  properties: wet mass 1 kg, dry mass 1 kg
- water, decarbonised: 0, 0, 0, 0, 0, 0, 0, 0, 0, 0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 kg (14 entries); pedigree (1,1,1,1,1)
  Incinerator process water used in flue gas scrubber stage.
  Uncertainty: uncertainty calculated from uncertainty in average water input, and the uncertainty of the waste composition of this waste
  properties: wet mass 1 kg
- process-specific burdens, residual material landfill: 0, 0, 0, 0 kg (4 entries); pedigree (1,1,1,1,1)
  Mass-specific expenditures required for landfilling of incineration residues.
  Uncertainty: uncertainty is calculated from uncertainties in waste composition and transfer coefficients in incinerator
- chemical, organic: 1.53159e-6 kg; lognormal variance with pedigree 1.5776, pedigree (1,1,3,1,1)
  Auxilliary inputs for the wastewater treatment stage of the incinerator plant. Proxy for (pure) Trisodium-trimercapto-s-triazine (CAS 17766-26-6), used as 15% diluted solution, aka TMT15.
  Uncertainty: uncertainty calculated from uncertainty in average TMT15 input, of transfer coefficients in the incinerator, and the uncertainty of the waste composition of this waste
  properties: dry mass 1 kg, carbon content, fossil 0.628, wet mass 1 kg
- waste cement, hydrated: 0 kg; pedigree (1,1,1,1,1)
  Hydrated cement output for solidification of landfilled residual material.
  Uncertainty: Uncertainty calculated from uncertainty of the waste composition of this waste and transfer coefficients in the incinerator and of the solidification recipe.
  production volume 0 kg
    calculated in proportion to reference product waste input to incinerator
  properties: dry mass 1 kg, wet mass 1 kg
- cement, unspecified: 0, 0, 0, 0, 0, 0, 0, 0, 0, 0 kg (10 entries); pedigree (1,1,1,1,1)
  Cement required for solidification of landfilled residual material.
  Uncertainty: Uncertainty calculated from uncertainty of the waste composition of this waste, of transfer coefficients in the incinerator and of the solidification recipe.
  properties: wet mass 1 kg, dry mass 1 kg
- quicklime, milled, packed: 0 kg; pedigree (1,1,1,1,1)
  Auxilliary inputs for the flue gas treatment stage of the incinerator plant.
  Uncertainty: uncertainty calculated from uncertainty in average CaO input, of transfer coefficients in the incinerator, and the uncertainty of the waste composition of this waste
  properties: dry mass 0.99 kg, wet mass 1 kg, water content 0.010101
- transport, freight, lorry, unspecified: 0, 0, 0, 0 metric ton*km (4 entries); pedigree (1,1,1,1,1)
  Transport services to transport incineration residues to landfills.
  Uncertainty: uncertainty calculated from uncertainty of the waste composition of this waste, uncertainty of transfer coefficients and the uncertainty in generic transportation distances
- heat, district or industrial, natural gas: 0, 0 MJ (2 entries); pedigree (1,1,1,1,1)
  Input to DeNOx stage, to heat up flue gas in low-dust SCR.
  Uncertainty: uncertainty calculated from uncertainty in average DeNOx input, uncertainty in the share of thermal NOx, uncertainty of nitrogen content in average municipal waste and the uncertainty in nitrogen content in *this* waste.
- ammonia, liquid: 0 kg; pedigree (1,1,1,1,1)
  Input to DeNOx stage (100% NH3).
  Uncertainty: uncertainty calculated from uncertainty in average DeNOx input, uncertainty in the share of thermal NOx, uncertainty of nitrogen content in average municipal waste and the uncertainty in nitrogen content in *this* waste.
  properties: wet mass 1 kg, dry mass 1 kg
- residual material landfill: 0 unit; pedigree (1,1,1,1,1)
  Landfill infrastructure required for landfilling of incineration residues.
  Uncertainty: uncertainty is calculated from uncertainties in waste composition and transfer coefficients in incinerator
- chemical, inorganic: 0.000176179 kg; lognormal variance with pedigree 0.23503, pedigree (1,1,3,1,1)
  Auxilliary inputs for the wastewater treatment stage of the incinerator plant. Proxy for Polyelectrolyte.
  Uncertainty: uncertainty calculated from uncertainty in average Polyelectrolyte input, of transfer coefficients in the incinerator, and the uncertainty of the waste composition of this waste
  properties: wet mass 1 kg, carbon content, fossil 0.003, dry mass 1 kg
- process-specific burdens, slag landfill: 0, 0, 0, 0 kg (4 entries); pedigree (1,1,1,1,1)
  Mass-specific expenditures required for landfilling of bottom ash.
  Uncertainty: uncertainty is calculated from uncertainties in waste composition and transfer coefficients in incinerator
- hydrochloric acid, without water, in 30% solution state: 2.59916e-8 kg; lognormal variance with pedigree 0.23503, pedigree (1,1,3,1,1)
  Auxilliary inputs for the wastewater treatment stage of the incinerator plant.
  Uncertainty: uncertainty calculated from uncertainty in average HCl input, of transfer coefficients in the incinerator, and the uncertainty of the waste composition of this waste
  properties: dry mass 1 kg, wet mass 1 kg
- slag landfill: 0 unit; pedigree (1,1,1,1,1)
  Landfill infrastructure required for landfilling of bottom ash.
  Uncertainty: uncertainty is calculated from uncertainties in waste composition and transfer coefficients in incinerator
- iron (III) chloride, without water, in 40% solution state: 0 kg; pedigree (1,1,1,1,1)
  Auxilliary inputs for the wastewater treatment stage of the incinerator plant.
  Uncertainty: uncertainty calculated from uncertainty in average FeCl3 input, of transfer coefficients in the incinerator, and the uncertainty of the waste composition of this waste
  properties: wet mass 1 kg, dry mass 1 kg
- sodium hydroxide, without water, in 50% solution state: 2.08934e-5 kg; lognormal variance with pedigree 0.25052, pedigree (1,1,3,1,1)
  Auxilliary inputs for the flue gas treatment stage of the incinerator plant.
  Uncertainty: uncertainty calculated from uncertainty in average NaOH input, of transfer coefficients in the incinerator, and the uncertainty of the waste composition of this waste
  properties: dry mass 1 kg, wet mass 1 kg
- waste cement, hydrated: 0, 0, 0 kg (3 entries); pedigree (1,1,1,1,1)
  (same comment as for waste cement, hydrated)
- heat, district or industrial, natural gas: 0.000438698, 0.0248018 MJ (2 entries); lognormal variance with pedigree 0.69527, pedigree (1,1,3,1,1)
  (same comment as for heat, district or industrial, natural gas)
- residue from cooling tower: -1.95322e-10 kg; lognormal variance with pedigree 0.0007, pedigree (1,2,1,1,1)
  Data provided by industry (EPIS) 2017. Representing waste water cooling towers filling.
  production volume 180000 kg
- calcium carbonate, precipitated: 1.50033e-6 kg; lognormal variance with pedigree 0.0007, pedigree (1,2,1,1,1)
  Data provided by industry (EPIS) 2017
- quicklime, milled, loose: 5.98827e-6 kg; lognormal variance with pedigree 0.0007, pedigree (1,2,1,1,1)
  Data provided by industry (EPIS) 2017. Calcium oxide (CaO)
  EcoSpold01Location=CH
- digester sludge: -9.5961e-7 kg; lognormal variance with pedigree 0.0007, pedigree (1,2,1,1,1)
  Data provided by industry (EPIS) 2017
  production volume 7.532e7 kg
- magnesium sulfate: 1.54973e-6 kg; lognormal variance with pedigree 0.0007, pedigree (1,2,1,1,1)
  Data provided by industry (EPIS) 2017
  EcoSpold01Location=RER
- pulp factory: 4.04513e-14 unit; lognormal variance with pedigree 0.3021, pedigree (3,2,1,1,1)
  Own estimation with yearly production volume and a lifetime of a factory of 50 years
  EcoSpold01Location=RER
- sodium sulfate, anhydrite: 2.63702e-7 kg; lognormal variance with pedigree 0.0007, pedigree (1,2,1,1,1)
  Data provided by industry (EPIS) 2017
- limestone residue: -7.33479e-6 kg; lognormal variance with pedigree 0.0007, pedigree (1,2,1,1,1)
  EcoSpold01Location=CH
  Data provided by industry (EPIS) 2017; including lime kiln ash, lime mud and lime sludge
  production volume 3.9404e8 kg
- sodium hypochlorite, without water, in 15% solution state: 1.24383e-7 kg; lognormal variance with pedigree 0.0007, pedigree (1,2,1,1,1)
  Data provided by industry (EPIS) 2017
- sludge from pulp and paper production: -1.61715e-6 kg; lognormal variance with pedigree 0.0007, pedigree (1,2,1,1,1)
  Data provided by industry (EPIS) 2017
  production volume 9.23e7 kg
- oxygen, liquid: 1.64688e-5 kg; lognormal variance with pedigree 0.0007, pedigree (1,2,1,1,1)
  Data provided by industry (EPIS) 2017
  EcoSpold01Location=RER
- ozone, liquid: 2.2293e-8 kg; lognormal variance with pedigree 0.0007, pedigree (1,2,1,1,1)
  Data provided by industry (EPIS) 2017
- hydrogen peroxide, without water, in 50% solution state: 7.15592e-6 kg; lognormal variance with pedigree 0.0007, pedigree (1,2,1,1,1)
  EcoSpold01Location=RER
  Data provided by industry (EPIS) 2017
- sulfur: 3.55426e-8 kg; lognormal variance with pedigree 0.0007, pedigree (1,2,1,1,1)
  Data provided by industry (EPIS) 2017
- hazardous waste, for incineration: -9.1405e-5 kg; lognormal variance with pedigree 0.0007, pedigree (1,2,1,1,1)
  Data provided by industry (EPIS) 2017
  production volume 220000 kg
- aluminium sulfate, powder: 5.07151e-8 kg; lognormal variance with pedigree 0.0007, pedigree (1,2,1,1,1)
  Data provided by industry (EPIS) 2017
- waste mineral oil: -9.18388e-8 kg; lognormal variance with pedigree 0.0007, pedigree (1,2,1,1,1)
  Data provided by industry (EPIS) 2017. Represents lubricants residues, oil, fats and lubricants wastes: The running of the equipment and conveyors and their maintenance require lubrication. lubricants are oils and greases
  production volume 7.012e7 kg
- transport, freight, lorry >32 metric ton, EURO5: 5.80095e-6 metric ton*km; lognormal variance with pedigree 0.0061, pedigree (1,2,1,1,1)
  Data provided by industry (EPIS) 2017
- municipal solid waste: -8.99979e-6 kg; lognormal variance with pedigree 0.0007, pedigree (1,2,1,1,1)
  EcoSpold01Location=CH
  Data provided by industry (EPIS) 2017. Represents genaral trash and domestic waste
  production volume 2.16e6 kg
- transport, freight, sea, bulk carrier for dry goods: 5.72011e-7 metric ton*km; lognormal variance with pedigree 0.0061, pedigree (1,2,1,1,1)
  Data provided by industry (EPIS) 2017
- sodium chlorate, powder: 1.0257e-5 kg; lognormal variance with pedigree 0.0007, pedigree (1,2,1,1,1)
  Data provided by industry (EPIS) 2017
  EcoSpold01Location=RER
- chlorine dioxide: 2.31955e-7 kg; lognormal variance with pedigree 0.0007, pedigree (1,2,1,1,1)
  Data provided by industry (EPIS) 2017
- magnesium oxide: 4.93847e-7 kg; lognormal variance with pedigree 0.0007, pedigree (1,2,1,1,1)
  Data provided by industry (EPIS) 2017
- roundwood, eucalyptus ssp. from sustainable forest management, under bark: 7.6501e-8 m3; lognormal variance with pedigree 0.0007, pedigree (1,2,1,1,1)
  Data provided by industry (EPIS) 2017. Approximates her eucalyptus from Latin America. The following information are important to justify this decision: The age at which eucalyptus is harvested is some 6-7 years while mixed hardwood is 40-70 years. Therefore Latin America hardwood is not a good proxy. The growing practices are similar in South Asia and Latin America.
- transport, freight train: 5.84446e-8 metric ton*km; lognormal variance with pedigree 0.0061, pedigree (1,2,1,1,1)
  Data provided by industry (EPIS) 2017
- sulfuric acid: 1.92592e-5 kg; lognormal variance with pedigree 0.0007, pedigree (1,2,1,1,1)
  Data provided by industry (EPIS) 2017
  EcoSpold01Location=RER
- transport, freight, inland waterways, barge: 6.14916e-7 metric ton*km; lognormal variance with pedigree 0.0007, pedigree (1,2,1,1,1)
  Data provided by industry (EPIS) 2017
- natural gas, high pressure: 4.69012e-6 m3; lognormal variance with pedigree 0.0007, pedigree (1,2,1,1,1)
  EcoSpold01Location=RER
  Data provided by industry (EPIS) 2017, indicated in energy content. Calculation into mass/volume was done by using the following conversion factor: Natural gas: MJ/m3 39. Source: Ecoinvent, during technical review.
- malusil: 9.24697e-7 kg; lognormal variance with pedigree 0.0061, pedigree (1,2,1,1,1)
  Data provided by industry (EPIS) 2017. Represents Talc or talcum (H2Mg3(SiO3)4 or Mg3Si4O10(OH)2)
- electricity, high voltage: 2.31463e-6 kWh; lognormal variance with pedigree 0.0007, pedigree (1,2,1,1,1)
  Data provided by industry (EPIS) 2017
- green liquor dregs: -8.46833e-6 kg; lognormal variance with pedigree 0.0007, pedigree (1,2,1,1,1)
  EcoSpold01Location=CH
  Data provided by industry (EPIS) 2017
  production volume 2.2494e8 kg
- waste packaging paper: -3.42439e-7, -2.2425e-6, -1.20655e-7 kg (3 entries); lognormal variance with pedigree 0.0007, pedigree (1,2,1,1,1)
  Data provided by industry (EPIS) 2017. Represents waste packaging such as corrugated containers, cartonboard etc. Can be also plastic or anything that is recyclable is separated and recycled, glass, metal, paper. Is produced in small side tasks of the overall pulp process in order to "keep the pulp site funktioning".
  production volume 3.3e6 kg
- waste wood, untreated: -1.26145e-7, -1.01595e-6, -5.35268e-8 kg (3 entries); lognormal variance with pedigree 0.0007, pedigree (1,2,1,1,1)
  Data provided by industry (EPIS) 2017. Represents bark and wood wastes
  production volume 2.2888e8 kg
- light fuel oil: 1.84206e-8, 1.27729e-7, 1.71065e-8 kg (3 entries); lognormal variance with pedigree 0.0007, pedigree (1,2,1,1,1)
  Data provided by industry (EPIS) 2017, indicated in energy content. Calculation into mass/volume was done by using the following conversion factor: Light fuel oil: MJ/kg 43.5. Source: http://www.fao.org/docrep/T0269e/t0269e0c.htm
- diesel: 2.1578e-10, 4.48848e-9, 6.34531e-10 kg (3 entries); lognormal variance with pedigree 0.0007, pedigree (1,2,1,1,1)
  Data provided by industry (EPIS) 2017, indicated in energy content. Calculation into mass/volume was done by using the following conversion factor: Diesel oil: MJ/kg 45.6. Source: http://www.fao.org/docrep/T0269e/t0269e0c.htm
- heavy fuel oil: 5.01153e-7, 1.92371e-6, 2.91828e-7 kg (3 entries); lognormal variance with pedigree 0.0007, pedigree (1,2,1,1,1)
  EcoSpold01Location=RER
  Data provided by industry (EPIS) 2017, indicated in energy content. Calculation into mass/volume was done by using the following conversion factor: Heavy fuel oil: MJ/kg 42.6. Source: http://www.fao.org/docrep/T0269e/t0269e0c.htm
- polyvinylchloride, bulk polymerised: 3.0937e-7 kg; lognormal variance with pedigree 0.003425, pedigree (1,4,2,2,2)
  Data from Yuan et al. 2016.
- aluminium, cast alloy: 1.73007e-6 kg; lognormal variance with pedigree 0.003425, pedigree (1,4,2,2,2)
  Data from Yuan et al. 2016.
- polypropylene, granulate: 2.24368e-6 kg; lognormal variance with pedigree 0.003425, pedigree (1,4,2,2,2)
  Data from Yuan et al. 2016.
- acrylonitrile-butadiene-styrene copolymer: 6.38263e-6 kg; lognormal variance with pedigree 0.003425, pedigree (1,4,2,2,2)
  Data from Yuan et al. 2016. In terms of outputs, assumed to have gone to 'waste plastic, mixture'.
- copper: 5.4365e-7 kg; lognormal variance with pedigree 0.003425, pedigree (1,4,2,2,2)
  Data from Yuan et al. 2016.
- seal, natural rubber based: 3.00359e-9 kg; lognormal variance with pedigree 0.003425, pedigree (1,4,2,2,2)
  Data from Yuan et al. 2016.
- used cable: -1.89226e-7 kg; lognormal variance with pedigree 0.003425, pedigree (1,4,2,2,2)
  Data from Yuan et al. 2016. The amount is set equal to the input amount for the respective material.
  production volume 4.02381e7 kg
- cable, unspecified: 1.89226e-7 kg; lognormal variance with pedigree 0.003425, pedigree (1,4,2,2,2)
  This product represents average, unspecified cable. Data from Yuan et al. 2016.
- synthetic rubber: 2.64316e-7 kg; lognormal variance with pedigree 0.003425, pedigree (1,4,2,2,2)
  Data from Yuan et al. 2016.
- printed paper: 4.50539e-8 kg; lognormal variance with pedigree 0.003425, pedigree (1,4,2,2,2)
  Data from Yuan et al. 2016.
- cast iron: 2.7633e-7 kg; lognormal variance with pedigree 0.003425, pedigree (1,4,2,2,2)
  Used here in place of iron. Data from Yuan et al. 2016.
- kraft paper, bleached: 3.90467e-7 kg; lognormal variance with pedigree 0.003425, pedigree (1,4,2,2,2)
  Data from Yuan et al. 2016.
- polyethylene, low density, granulate: 6.00718e-8 kg; lognormal variance with pedigree 0.003425, pedigree (1,4,2,2,2)
  Data from Yuan et al. 2016.
- heat, district or industrial, other than natural gas: 5.78492e-6 MJ; lognormal variance with pedigree 0.003425, pedigree (1,4,2,2,2)
  Data from Yuan et al. 2016. Converted from kg of oil used for heating (0.46) to MJ of heat (19.26) using 'heat production, heavy fuel oil, at industrial furnace 1MW, GLO' [accessed 20 January 2018].
- steel, low-alloyed, hot rolled: 9.34087e-6 kg; lognormal variance with pedigree 0.003425, pedigree (1,4,2,2,2)
  Data from Yuan et al. 2016.
- electricity, high voltage: 4.03713e-5 kWh; lognormal variance with pedigree 0.003425, pedigree (1,4,2,2,2)
  Data from Yuan et al. 2016.
- metal working factory: 1.03173e-14 unit; lognormal variance with pedigree 0.302825, pedigree (1,4,2,2,2)
  Estimated value.The input of infrastructure is approximated with the exchange 'metal working factory', this was chosen as metal is the main material constituting the final product. The general comment for the activity 'metal working faculty, GLO' [accessed 19.01.2018] specifies: '4.58E-10 units of this process are needed to produce 1 kg of final product. Additionally, the dataset for 'metal working factory' needs to be used together with the 'energy and auxilliary inputs, metal working factory', 1 kg of this exchange is required per 1 kg of final product.
- tap water: 3.45413e-6 kg; lognormal variance with pedigree 0.003425, pedigree (1,4,2,2,2)
  Data from Yuan et al. 2016.
- polystyrene, general purpose: 1.5018e-7 kg; lognormal variance with pedigree 0.003425, pedigree (1,4,2,2,2)
  Data from Yuan et al. 2016.
- trisodium phosphate: 1.56307e-7 kg; lognormal variance with pedigree 0.003425, pedigree (1,4,2,2,2)
  Used herein place of phosphating agent, degreaser and surface conditioning agent. In terms of outputs assumed to have gone to wastewater. Data from Yuan et al. 2016.
- waste polyvinylchloride: -3.46064e-8, -2.66795e-9, -1.10196e-9, -1.04641e-9, -3.99298e-8, -4.45179e-10, -2.01773e-10, -2.7953e-7 kg (8 entries); lognormal variance with pedigree 0.003425, pedigree (1,4,2,2,2)
  (same comment as for used cable)
  production volume 7.64524e7 kg
- scrap copper: -1.7245e-7, -8.09098e-9, -3.63109e-7 kg (3 entries); lognormal variance with pedigree 0.003425, pedigree (1,4,2,2,2)
  (same comment as for used cable)
  production volume 1.15605e8 kg
- waste glass: -8.23023e-8, -3.99342e-9, -3.72581e-10, -1.66716e-9, -4.33277e-8, -5.65785e-10, -9.05974e-11, -4.08327e-7 kg (8 entries); lognormal variance with pedigree 0.003425, pedigree (1,4,2,2,2)
  (same comment as for used cable)
  production volume 1.14966e8 kg
- waste rubber, unspecified: -1.30912e-7, -5.49566e-9, -1.30912e-7 kg (3 entries); lognormal variance with pedigree 0.003425, pedigree (1,4,2,2,2)
  This includes scrap synthetic, natural rubber (seal) and epoxy resin. Data from Yuan et al. 2016. The amount is set equal to the input amount for the respective material.
  production volume 5.68443e7 kg
- flat glass, uncoated: 9.23218e-8, 4.48325e-7 kg (2 entries); lognormal variance with pedigree 0.003425, pedigree (1,4,2,2,2)
  Data from Yuan et al. 2016.
- waste polyethylene: -8.67329e-9, -6.6866e-10, -2.7618e-10, -2.62259e-10, -1.00075e-8, -1.11574e-10, -5.05696e-11, -7.00577e-8 kg (8 entries); lognormal variance with pedigree 0.003425, pedigree (1,4,2,2,2)
  Data from Yuan et al. 2016. The amount is set equal to the input amount for the respective material. Also includes waste nylon.
  production volume 1.9161e7 kg
- waste packaging paper: -5.03873e-8, -1.23657e-6, -2.23198e-7, -2.99236e-8, -4.16308e-5 kg (5 entries); lognormal variance with pedigree 0.003425, pedigree (1,4,2,2,2)
  Used here in place of kraft liner and paper. Data from Yuan et al. 2016. The amount is set equal to the input amount for the respective material.
  production volume 9.26115e7 kg
- wastewater, average: -1.07928e-9, -1.16758e-10, -2.25809e-9 m3 (3 entries); lognormal variance with pedigree 0.003425, pedigree (1,4,2,2,2)
  Converted from kg (1000 kg of water = 1 m3 of water). The amount is set equal to the input amount for the respective material. Data from Yuan et al. 2016.
  production volume 734505 m3
- concrete block: 4.62553e-10, 1.02122e-9, 5.8588e-8 kg (3 entries); lognormal variance with pedigree 0.003425, pedigree (1,4,2,2,2)
  Data from Yuan et al. 2016. In terms of outputs assumed to have gone to inert waste.
- waste polystyrene: -1.44555e-8, -1.11443e-9, -4.60301e-10, -4.37099e-10, -1.66791e-8, -1.85956e-10, -8.42827e-11, -1.16763e-7 kg (8 entries); lognormal variance with pedigree 0.003425, pedigree (1,4,2,2,2)
  (same comment as for used cable)
  production volume 3.1935e7 kg
- epoxy resin, liquid: 8.72783e-9, 4.14321e-8 kg (2 entries); lognormal variance with pedigree 0.003425, pedigree (1,4,2,2,2)
  Data from Yuan et al. 2016. In terms of outputs assumed to have gone to waste PVC.
- waste plastic, mixture: -6.14358e-7, -4.73634e-8, -1.95628e-8, -1.85767e-8, -7.08862e-7, -7.90314e-9, -3.58202e-9, -4.96242e-6 kg (8 entries); lognormal variance with pedigree 0.003425, pedigree (1,4,2,2,2)
  Data from Yuan et al. 2016. Represents here waste ABS.
  production volume 1.35724e9 kg
- compressed air, 1000 kPa gauge: 3.21427e-7, 7.89902e-7 m3 (2 entries); lognormal variance with pedigree 0.003425, pedigree (1,4,2,2,2)
  Data from Yuan et al. 2016.
- energy and auxilliary inputs, metal working factory: 1.88123e-15, 8.4361e-15 kg (2 entries); lognormal variance with pedigree 0.003425, pedigree (1,4,2,2,2)
  (same comment as for metal working factory)
- steam, in chemical industry: 6.16768e-8, 3.49815e-7 kg (2 entries); lognormal variance with pedigree 0.003425, pedigree (1,4,2,2,2)
  Data from Yuan et al. 2016.
- scrap steel: -2.27446e-6, -2.87548e-9, -7.06353e-6 kg (3 entries); lognormal variance with pedigree 0.003425, pedigree (1,4,2,2,2)
  (same comment as for used cable)
  production volume 1.98629e9 kg
- nylon 6: 9.92964e-9, 2.01063e-8 kg (2 entries); lognormal variance with pedigree 0.003425, pedigree (1,4,2,2,2)
  Data from Yuan et al. 2016. In terms of outputs assumed to have gone to waste PE.
- inert waste: -1.32507e-8, -1.14124e-10, -2.18024e-7 kg (3 entries); lognormal variance with pedigree 0.004025, pedigree (2,4,2,2,2)
  Data from Yuan et al. 2016. The amount is set equal to the input amount for the respective material, concrete block.
  production volume 1.2774e7 kg
- waste polypropylene: -2.15965e-7, -1.66496e-8, -6.87689e-9, -6.53025e-9, -2.49186e-7, -2.77819e-9, -1.25918e-9, -1.74444e-6 kg (8 entries); lognormal variance with pedigree 0.003425, pedigree (1,4,2,2,2)
  (same comment as for used cable)
  production volume 4.77109e8 kg
- scrap aluminium: -5.48791e-7, -2.5748e-8, -1.15553e-6 kg (3 entries); lognormal variance with pedigree 0.003425, pedigree (1,4,2,2,2)
  (same comment as for used cable)
  production volume 3.67891e8 kg
- hydrochloric acid, without water, in 30% solution state: 2.29091e-7 kg; lognormal variance with pedigree 0.0027, pedigree (1,2,1,5,1)
  Data provided by industry (EPIS) 2017
- calcium carbonate, precipitated: 6.36716e-7 kg; lognormal variance with pedigree 0.0027, pedigree (1,2,1,5,1)
  Data provided by industry (EPIS) 2017
- sodium hypochlorite, without water, in 15% solution state: 3.69311e-8 kg; lognormal variance with pedigree 0.0027, pedigree (1,2,1,5,1)
  Data provided by industry (EPIS) 2017
- sodium chlorate, powder: 7.29538e-7 kg; lognormal variance with pedigree 0.0027, pedigree (1,2,1,5,1)
  Data provided by industry (EPIS) 2017
  EcoSpold01Location=RER
- ozone, liquid: 5.4508e-8 kg; lognormal variance with pedigree 0.0027, pedigree (1,2,1,5,1)
  Data provided by industry (EPIS) 2017
- sodium sulfate, anhydrite: 3.43637e-8 kg; lognormal variance with pedigree 0.0027, pedigree (1,2,1,5,1)
  Data provided by industry (EPIS) 2017
- limestone residue: -3.891e-6 kg; lognormal variance with pedigree 0.0027, pedigree (1,2,1,5,1)
  Data provided by industry (EPIS) 2017; including lime kiln ash, lime mud and lime sludge
  EcoSpold01Location=CH
  production volume 1.9702e8 kg
- quicklime, milled, loose: 3.65559e-7 kg; lognormal variance with pedigree 0.0027, pedigree (1,2,1,5,1)
  Data provided by industry (EPIS) 2017. Calcium oxide (CaO)
  EcoSpold01Location=CH
- roundwood, eucalyptus ssp. from sustainable forest management, under bark: 6.96162e-7 m3; lognormal variance with pedigree 0.0027, pedigree (1,2,1,5,1)
  (same comment as for roundwood, eucalyptus ssp. from sustainable forest management, under b)
- residue from cooling tower: -1.77743e-9 kg; lognormal variance with pedigree 0.0027, pedigree (1,2,1,5,1)
  Data provided by industry (EPIS) 2017. Representing waste water cooling towers filling.
  production volume 90000 kg
- hydrogen peroxide, without water, in 50% solution state: 1.18831e-6 kg; lognormal variance with pedigree 0.0027, pedigree (1,2,1,5,1)
  EcoSpold01Location=RER
  Data provided by industry (EPIS) 2017
- sulfuric acid: 2.65193e-6 kg; lognormal variance with pedigree 0.0027, pedigree (1,2,1,5,1)
  Data provided by industry (EPIS) 2017
  EcoSpold01Location=RER
- chlorine dioxide: 2.1108e-6 kg; lognormal variance with pedigree 0.0027, pedigree (1,2,1,5,1)
  Data provided by industry (EPIS) 2017
- aluminium sulfate, powder: 9.14391e-8 kg; lognormal variance with pedigree 0.0027, pedigree (1,2,1,5,1)
  Data provided by industry (EPIS) 2017
- oxygen, liquid: 3.4028e-6 kg; lognormal variance with pedigree 0.0027, pedigree (1,2,1,5,1)
  Data provided by industry (EPIS) 2017
  EcoSpold01Location=RER
- electricity, high voltage: 3.11825e-7, 5.67846e-8, 1.13082e-6, 9.69935e-7, 1.39637e-5, 3.74724e-7, 5.605e-6 kWh (7 entries); lognormal variance with pedigree 0.0027, pedigree (1,2,1,5,1)
  Data provided by industry (EPIS) 2017
- diesel: 3.71848e-9, 3.7647e-10, 7.77013e-9, 3.67181e-8 kg (4 entries); lognormal variance with pedigree 0.0027, pedigree (1,2,1,5,1)
  (same comment as for diesel)
- light fuel oil: 2.14572e-7, 2.06314e-8, 7.1154e-8, 2.10338e-6 kg (4 entries); lognormal variance with pedigree 0.0027, pedigree (1,2,1,5,1)
  (same comment as for light fuel oil)
- waste wood, untreated: -8.64903e-9, -3.32268e-7, -7.93583e-8, -2.33337e-7, -1.26402e-5 kg (5 entries); lognormal variance with pedigree 0.0027, pedigree (1,2,1,5,1)
  Data provided by industry (EPIS) 2017. Represents bark and wood wastes
  production volume 1.1444e8 kg
- natural gas, high pressure: 9.88659e-9, 2.75931e-7, 4.59348e-7, 2.07484e-6, 3.7505e-6, 5.07328e-7, 1.53124e-6 m3 (7 entries); lognormal variance with pedigree 0.0027, pedigree (1,2,1,5,1)
  Data provided by industry (EPIS) 2017, indicated in energy content. Calculation into mass/volume was done by using the following conversion factor: Natural gas: MJ/m3 39. Source: Ecoinvent, during technical review.
  EcoSpold01Location=RER
- sludge from pulp and paper production: -6.73517e-10, -9.10755e-7 kg (2 entries); lognormal variance with pedigree 0.0027, pedigree (1,2,1,5,1)
  Data provided by industry (EPIS) 2017
  production volume 4.615e7 kg
- municipal solid waste: -1.30297e-8, -3.29464e-9, -2.07596e-8, -4.70824e-9 kg (4 entries); lognormal variance with pedigree 0.0027, pedigree (1,2,1,5,1)
  Data provided by industry (EPIS) 2017. Represents genaral trash and domestic waste
  EcoSpold01Location=CH
  production volume 1.08e6 kg
- heavy fuel oil: 1.40407e-6, 3.54303e-7, 4.99362e-7, 5.27279e-6 kg (4 entries); lognormal variance with pedigree 0.0027, pedigree (1,2,1,5,1)
  Data provided by industry (EPIS) 2017, indicated in energy content. Calculation into mass/volume was done by using the following conversion factor: Heavy fuel oil: MJ/kg 42.6. Source: http://www.fao.org/docrep/T0269e/t0269e0c.htm
  EcoSpold01Location=RER
- hazardous waste, for incineration: -5.53392e-11, -2.11708e-9 kg (2 entries); lognormal variance with pedigree 0.0027, pedigree (1,2,1,5,1)
  Data provided by industry (EPIS) 2017
  production volume 110000 kg
- waste mineral oil: -1.56593e-8, -6.7675e-7 kg (2 entries); lognormal variance with pedigree 0.0027, pedigree (1,2,1,5,1)
  (same comment as for waste mineral oil)
  production volume 3.506e7 kg
- urea, as N: 0.000145577 kg; lognormal variance with pedigree 0.0026, pedigree (1,1,1,5,1)
  Calculated as the production-volume weighted average of the exchange amounts of the corresponding regional datasets.
- dithiocarbamate-compound: 2.86294e-9 kg; lognormal variance with pedigree 0.0032, pedigree (2,1,1,5,1)
  (same comment as for urea, as N)
- triazine-compound, unspecified: 2.86294e-9 kg; lognormal variance with pedigree 0.0032, pedigree (2,1,1,5,1)
  (same comment as for urea, as N)
- wood chips, dry, measured as dry mass: 0.000274381 kg; lognormal variance with pedigree 0.0027, pedigree (1,2,1,5,1)
  (same comment as for urea, as N)
- ethylene glycol: 3.1528e-11 kg; lognormal variance with pedigree 0.0032, pedigree (2,1,1,5,1)
  (same comment as for urea, as N)
- methanol, from biomass: 1.12412e-6 kg; lognormal variance with pedigree 0.0027, pedigree (1,2,1,5,1)
  (same comment as for urea, as N)
- phosphoric acid, industrial grade, without water, in 85% solution state: 1.03581e-8 kg; lognormal variance with pedigree 0.0026, pedigree (1,1,1,5,1)
  (same comment as for urea, as N)
- hydrazine: 3.57277e-10 kg; lognormal variance with pedigree 0.0026, pedigree (1,1,1,5,1)
  (same comment as for urea, as N)
- fatty alcohol: 3.20209e-8 kg; lognormal variance with pedigree 0.0032, pedigree (2,1,1,5,1)
  (same comment as for urea, as N)
- lubricating oil: 7.4231e-10 kg; lognormal variance with pedigree 0.0026, pedigree (1,1,1,5,1)
  (same comment as for urea, as N)
- propane, burned in building machine: 2.89748e-7 MJ; lognormal variance with pedigree 0.002, pedigree (1,1,1,5,1)
  (same comment as for urea, as N)
- retention aid, for paper production: 1.52609e-10 kg; lognormal variance with pedigree 0.0032, pedigree (2,1,1,5,1)
  (same comment as for urea, as N)
- lime: 2.85354e-7 kg; lognormal variance with pedigree 0.0052, pedigree (1,3,3,5,1)
  (same comment as for urea, as N)
- manganese: 5.2915e-10 kg; lognormal variance with pedigree 0.0032, pedigree (2,1,1,5,1)
  (same comment as for urea, as N)
- methanol: 3.27077e-7 kg; lognormal variance with pedigree 0.0032, pedigree (2,1,1,5,1)
  (same comment as for urea, as N)
- spent solvent mixture: -1.22111e-11 kg; lognormal variance with pedigree 0.0026, pedigree (1,1,1,5,1)
  (same comment as for urea, as N)
  production volume 387.777 kg
- wood ash mixture, pure: -1.49642e-6 kg; lognormal variance with pedigree 0.0026, pedigree (1,1,1,5,1)
  (same comment as for urea, as N)
  production volume 1.75356e7 kg
- residual softwood, wet: 1.21466e-8 m3; lognormal variance with pedigree 0.0027, pedigree (1,2,1,5,1)
  (same comment as for urea, as N)
- sodium formate: 4.32348e-7 kg; lognormal variance with pedigree 0.0027, pedigree (1,2,1,5,1)
  (same comment as for urea, as N)
- EDTA, ethylenediaminetetraacetic acid: 2.88641e-7 kg; lognormal variance with pedigree 0.0027, pedigree (1,2,1,5,1)
  (same comment as for urea, as N)
- adipic acid: 2.42356e-11 kg; lognormal variance with pedigree 0.0032, pedigree (2,1,1,5,1)
  (same comment as for urea, as N)
- waste textile, soiled: -4.219e-10 kg; lognormal variance with pedigree 0.0026, pedigree (1,1,1,5,1)
  (same comment as for urea, as N)
  production volume 13397.9 kg
- waste paper, unsorted: -5.62812e-8 kg; lognormal variance with pedigree 0.0027, pedigree (1,2,1,5,1)
  (same comment as for urea, as N)
  production volume 1.34146e6 kg
- bark chips, wet, measured as dry mass: 1.07914e-5 kg; lognormal variance with pedigree 0.0052, pedigree (1,3,3,5,1)
  (same comment as for urea, as N)
- diesel, burned in building machine: 2.99731e-6 MJ; lognormal variance with pedigree 0.002, pedigree (1,1,1,5,1)
  (same comment as for urea, as N)
- pulpwood, hardwood, measured as solid wood under bark: 4.65909e-7 m3; lognormal variance with pedigree 0.0052, pedigree (1,3,3,5,1)
  (same comment as for urea, as N)
- sawlog and veneer log, softwood, measured as solid wood under bark: 5.42014e-10 m3; lognormal variance with pedigree 0.0026, pedigree (1,1,1,5,1)
  (same comment as for urea, as N)
- sodium chloride, powder: 6.24839e-8 kg; lognormal variance with pedigree 0.0032, pedigree (2,1,1,5,1)
  (same comment as for urea, as N)
- spent antifreezer liquid: -1.66882e-11 kg; lognormal variance with pedigree 0.0026, pedigree (1,1,1,5,1)
  (same comment as for urea, as N)
  production volume 529.951 kg
- sugar, from sugar beet: 2.53388e-9 kg; lognormal variance with pedigree 0.0026, pedigree (1,1,1,5,1)
  (same comment as for urea, as N)
- sulfur dioxide, liquid: 2.13682e-7 kg; lognormal variance with pedigree 0.0027, pedigree (1,2,1,5,1)
  (same comment as for urea, as N)
- solvent, organic: 2.79834e-11 kg; lognormal variance with pedigree 0.0032, pedigree (2,1,1,5,1)
  (same comment as for urea, as N)
- wood chips, wet, measured as dry mass: 7.4482e-5 kg; lognormal variance with pedigree 0.0052, pedigree (1,3,3,5,1)
  (same comment as for urea, as N)
- electricity, medium voltage: 2.31345e-5, 4.2095e-6, 3.11684e-8, 7.13867e-5, 0.00103503, 0.000148133, 3.94812e-7 kWh (7 entries); lognormal variance with pedigree 0.0026, pedigree (1,1,1,5,1)
  (same comment as for urea, as N)
- natural gas, high pressure: 1.19481e-7 m3; lognormal variance with pedigree 0.0027, pedigree (1,2,1,5,1)
  (same comment as for urea, as N)
- sand: 3.10005e-12, 5.97136e-10, 3.88591e-8 kg (3 entries); lognormal variance with pedigree 0.0027, pedigree (1,2,1,5,1)
  (same comment as for urea, as N)
- tap water: 4.43294e-5, 8.81873e-6, 0.000222374, 5.78499e-6, 1.64553e-5, 0.00254473 kg (6 entries); lognormal variance with pedigree 0.0026, pedigree (1,1,1,5,1)
  (same comment as for urea, as N)
- bark: -9.54274e-6 kg; lognormal variance with pedigree 0.0027, pedigree (1,2,1,5,1)
  Data provided by industry (EPIS) 2017
  production volume 3.62438e8 kg
- wood pellet, measured as dry mass: 4.28564e-6 kg; lognormal variance with pedigree 0.0027, pedigree (1,2,1,5,1)
  Data provided by industry (EPIS) 2017, indicated in energy content. Calculation into mass/volume was done by using the following conversion factor: Wood pallets: MJ/kg 16.75. Source: http://www.fao.org/docrep/T0269e/t0269e0c.htm
- sodium sulfite: 1.81145e-8 kg; lognormal variance with pedigree 0.0027, pedigree (1,2,1,5,1)
  Data provided by industry (EPIS) 2017
- pulpwood, softwood, measured as solid wood under bark: 1.65193e-10, 1.87767e-8, 1.90211e-6 m3 (3 entries); lognormal variance with pedigree 0.0027, pedigree (1,2,1,5,1)
  EcoSpold01Location=RER
  Data provided by industry (EPIS) 2017; Represents wood sources explicitly: pine wood certified (major part) and pinus contorta certified
- kraft paper, unbleached: 0.00288463 kg; lognormal variance with pedigree 0.0296, pedigree (1,3,3,5,1)
  Amount was scaled to the amount of reference product.
- heat, district or industrial, other than natural gas: 0.0242342 MJ
  heat from wood chips
- melamine formaldehyde resin: 0.00316135 kg; lognormal variance with pedigree 0.0296, pedigree (1,3,3,5,1)
  Amount was scaled to the amount of reference product.
- urea formaldehyde resin: 0.00182805 kg; lognormal variance with pedigree 0.0296, pedigree (1,3,3,5,1)
  Amount was scaled to the amount of reference product.
- formaldehyde: 0.00325443 kg; lognormal variance with pedigree 0.0296, pedigree (1,3,3,5,1)
  Amount was scaled to the amount of reference product.
- electricity, medium voltage: 0.0004849 kWh; lognormal variance with pedigree 0.0296, pedigree (1,3,3,5,1)
  MJ converted to kWh
  Amount was scaled to the amount of reference product.
- tap water: 5.31074e-6 kg; lognormal variance with pedigree 0.0296, pedigree (1,3,3,5,1)
  Amount was scaled to the amount of reference product.

## Inputs from nature
- Oxygen [natural resource, in air]: 0 kg; pedigree (1,1,1,1,1)
  Oxygen from ambient air needed to combust and oxidise this waste. Net demand, i.e. without O2 leaving the plant in flue gas uncombusted.
  Uncertainty: uncertainty is calculated from uncertainties in waste composition and transfer coefficients to flue gas and soild residues in incinerator
- Water, unspecified natural origin [natural resource, in water]: 5.33431e-5 m3; lognormal variance with pedigree 0.0007, pedigree (1,2,1,1,1)
  Key emission provided by industry (EPIS) 2017

## Emissions to nature
- Nickel, ion [water, surface water]: 0 kg; pedigree (1,1,1,1,1)
  Emissions to water from waste composition and transfer coefficients in incinerator and landfills.
  Uncertainty: uncertainty is calculated from uncertainties in waste composition and transfer coefficients in incinerator and landfills
- Benzene [air, urban air close to ground]: 1.48969e-9 kg; lognormal variance with pedigree 0.095504, pedigree (1,1,3,1,1)
  Incomplete combustion product emitted to air.
  Uncertainty: uncertainty calculated from uncertainty in average operation emissions, and the uncertainty of the flue gas volume from this waste.
- Barium [water, ground-, long-term]: 0 kg; pedigree (1,1,1,1,1)
  Long-term emissions from landfilling of incineration residues.
  Uncertainty: uncertainty is calculated from uncertainties in waste composition and transfer coefficients in incinerator and landfills.
- Chloride [water, ground-, long-term]: 0 kg; pedigree (1,1,1,1,1)
  (same comment as for Barium)
- Aluminium [water, ground-, long-term]: 0 kg; pedigree (1,1,1,1,1)
  (same comment as for Barium)
- Calcium, ion [water, ground-, long-term]: 0 kg; pedigree (1,1,1,1,1)
  (same comment as for Barium)
- Sodium, ion [water, surface water]: 0 kg; pedigree (1,1,1,1,1)
  (same comment as for Nickel, ion)
- Benzo(a)pyrene [air, urban air close to ground]: 6.58673e-13 kg; lognormal variance with pedigree 0.42757, pedigree (1,1,3,1,1)
  (same comment as for Benzene)
- DOC, Dissolved Organic Carbon [water, surface water]: 3.83935e-6 kg; lognormal variance with pedigree 0.047219, pedigree (1,1,3,1,1)
  (same comment as for Nickel, ion)
- Copper [air, urban air close to ground]: 1.11745e-10 kg; lognormal variance with pedigree 1.0548, pedigree (1,1,3,1,1)
  Emission to air from waste composition and transfer coefficients.
  Uncertainty: uncertainty is calculated from uncertainties in waste composition and transfer coefficients in incinerator
- Thallium [water, ground-, long-term]: 0 kg; pedigree (1,1,1,1,1)
  (same comment as for Barium)
- Sodium [air, urban air close to ground]: 1.90289e-9 kg; lognormal variance with pedigree 0.66682, pedigree (1,1,3,1,1)
  (same comment as for Copper)
- Water [air, urban air close to ground]: 0 m3; pedigree (1,1,1,1,1)
  Water vapour from waste humidity, hydrogen oxidation and part of the process water.
  Uncertainty: Uncertainty calculated from uncertainty in waste composition, process water input and the uncertainty of fraction to air.
- BOD5, Biological Oxygen Demand [water, ground-, long-term]: 0 kg; pedigree (1,1,1,1,1)
  (same comment as for Barium)
- Benzene, hexachloro- [air, urban air close to ground]: 0 kg; pedigree (1,1,1,1,1)
  (same comment as for Benzene)
- Particulates, > 2.5 um, and < 10um [air, urban air close to ground]: 0 kg; pedigree (1,1,1,1,1)
  (same comment as for Benzene)
- Mercury [water, ground-, long-term]: 0 kg; pedigree (1,1,1,1,1)
  (same comment as for Barium)
- Cobalt [water, ground-, long-term]: 0 kg; pedigree (1,1,1,1,1)
  (same comment as for Barium)
- Iron, ion [water, surface water]: 0 kg; pedigree (1,1,1,1,1)
  (same comment as for Nickel, ion)
- Ammonia [air, urban air close to ground]: 2.22855e-9 kg; lognormal variance with pedigree 0.74902, pedigree (1,1,3,1,1)
  Nitrogen species emitted to air after DeNOx stage.
  Uncertainty: uncertainty calculated from uncertainty in average N-emissions and uncertainty in the share of thermal NOx and the uncertainty in nitrogen content in *this* waste.
- Antimony [water, ground-, long-term]: 0 kg; pedigree (1,1,1,1,1)
  (same comment as for Barium)
- Water [water, surface water]: 2.68174e-6 m3; lognormal variance with pedigree 1.722, pedigree (1,1,3,1,1)
  Process water released to surface water.
  Uncertainty: uncertainty calculated from uncertainty in process water input and the uncertainty of fraction to surface water.
- BOD5, Biological Oxygen Demand [water, surface water]: 4.75014e-7 kg; lognormal variance with pedigree 0.048293, pedigree (1,1,3,1,1)
  (same comment as for Nickel, ion)
- Arsenic [air, urban air close to ground]: 5.49398e-12 kg; lognormal variance with pedigree 1.478, pedigree (1,1,3,1,1)
  (same comment as for Copper)
- Phosphate [water, surface water]: 0 kg; pedigree (1,1,1,1,1)
  (same comment as for Nickel, ion)
- Mercury [water, surface water]: 0 kg; pedigree (1,1,1,1,1)
  (same comment as for Nickel, ion)
- Antimony [water, surface water]: 0 kg; pedigree (1,1,1,1,1)
  (same comment as for Nickel, ion)
- Heat, waste [water, surface water]: 0 MJ; pedigree (1,1,1,1,1)
  Waste heat generated from heating value of this waste plus any electricity required to process it.
  Uncertainty: uncertainty is calculated from uncertainties in waste composition and uncertainties in energy efficiency and the uncertainty in internal energy demand
- Beryllium [water, surface water]: 0 kg; pedigree (1,1,1,1,1)
  (same comment as for Nickel, ion)
- Strontium [air, urban air close to ground]: 0 kg; pedigree (1,1,1,1,1)
  (same comment as for Copper)
- Selenium [water, surface water]: 0 kg; pedigree (1,1,1,1,1)
  (same comment as for Nickel, ion)
- Thallium [water, surface water]: 0 kg; pedigree (1,1,1,1,1)
  (same comment as for Nickel, ion)
- Molybdenum [air, urban air close to ground]: 2.59531e-12 kg; lognormal variance with pedigree 1.384, pedigree (1,1,3,1,1)
  (same comment as for Copper)
- Arsenic, ion [water, ground-, long-term]: 0 kg; pedigree (1,1,1,1,1)
  (same comment as for Barium)
- Toluene [air, urban air close to ground]: 5.59224e-10 kg; lognormal variance with pedigree 0.095504, pedigree (1,1,3,1,1)
  (same comment as for Benzene)
- Particulates, < 2.5 um [air, urban air close to ground]: 0 kg; pedigree (1,1,1,1,1)
  (same comment as for Benzene)
- Fluoride [water, surface water]: 0 kg; pedigree (1,1,1,1,1)
  (same comment as for Nickel, ion)
- Titanium [air, urban air close to ground]: 0 kg; pedigree (1,1,1,1,1)
  (same comment as for Copper)
- Thallium [air, urban air close to ground]: 0 kg; pedigree (1,1,1,1,1)
  (same comment as for Copper)
- Manganese [water, ground-, long-term]: 0 kg; pedigree (1,1,1,1,1)
  (same comment as for Barium)
- Molybdenum [water, surface water]: 0 kg; pedigree (1,1,1,1,1)
  (same comment as for Nickel, ion)
- Chromium, ion [water, surface water]: 0 kg; pedigree (1,1,1,1,1)
  (same comment as for Nickel, ion)
- COD, Chemical Oxygen Demand [water, ground-, long-term]: 0 kg; pedigree (1,1,1,1,1)
  (same comment as for Barium)
- Cadmium, ion [water, surface water]: 0 kg; pedigree (1,1,1,1,1)
  (same comment as for Nickel, ion)
- Zinc, ion [water, surface water]: 1.77678e-10 kg; lognormal variance with pedigree 0.76652, pedigree (1,1,3,1,1)
  (same comment as for Nickel, ion)
- DOC, Dissolved Organic Carbon [water, ground-, long-term]: 0 kg; pedigree (1,1,1,1,1)
  (same comment as for Barium)
- Phosphate [water, ground-, long-term]: 0 kg; pedigree (1,1,1,1,1)
  (same comment as for Barium)
- Lead [air, urban air close to ground]: 7.89548e-11 kg; lognormal variance with pedigree 1.0327, pedigree (1,1,3,1,1)
  (same comment as for Copper)
- Methane, non-fossil [air, urban air close to ground]: 5.88814e-9 kg; lognormal variance with pedigree 0.095504, pedigree (1,1,3,1,1)
  (same comment as for Benzene)
- Magnesium [water, surface water]: 1.24376e-9 kg; lognormal variance with pedigree 0.65808, pedigree (1,1,3,1,1)
  (same comment as for Nickel, ion)
- Phosphorus [air, urban air close to ground]: 3.82979e-10 kg; lognormal variance with pedigree 0.95177, pedigree (1,1,3,1,1)
  (same comment as for Copper)
- Dioxins, measured as 2,3,7,8-tetrachlorodibenzo-p-dioxin [air, urban air close to ground]: 0 kg; pedigree (1,1,1,1,1)
  (same comment as for Benzene)
- Manganese [water, surface water]: 0 kg; pedigree (1,1,1,1,1)
  (same comment as for Nickel, ion)
- Cyanide [air, urban air close to ground]: 0 kg; pedigree (1,1,1,1,1)
  (same comment as for Ammonia)
- Arsenic, ion [water, surface water]: 0 kg; pedigree (1,1,1,1,1)
  (same comment as for Nickel, ion)
- Zinc, ion [water, ground-, long-term]: 0 kg; pedigree (1,1,1,1,1)
  (same comment as for Barium)
- Strontium [water, ground-, long-term]: 0 kg; pedigree (1,1,1,1,1)
  (same comment as for Barium)
- Sodium, ion [water, ground-, long-term]: 0 kg; pedigree (1,1,1,1,1)
  (same comment as for Barium)
- Carbon dioxide, non-fossil [air, urban air close to ground]: 0.00190559 kg; lognormal variance with pedigree 0.025121, pedigree (1,1,3,1,1)
  (same comment as for Copper)
- NMVOC, non-methane volatile organic compounds, unspecified origin [air, urban air close to ground]: 1.34042e-8 kg; lognormal variance with pedigree 0.095504, pedigree (1,1,3,1,1)
  (same comment as for Benzene)
- Aluminium [air, urban air close to ground]: 0 kg; pedigree (1,1,1,1,1)
  (same comment as for Copper)
- COD, Chemical Oxygen Demand [water, surface water]: 1.06881e-5 kg; lognormal variance with pedigree 0.047063, pedigree (1,1,3,1,1)
  (same comment as for Nickel, ion)
- Chromium [air, urban air close to ground]: 6.66116e-12 kg; lognormal variance with pedigree 1.2382, pedigree (1,1,3,1,1)
  (same comment as for Copper)
- Antimony [air, urban air close to ground]: 0 kg; pedigree (1,1,1,1,1)
  (same comment as for Copper)
- TOC, Total Organic Carbon [water, ground-, long-term]: 0 kg; pedigree (1,1,1,1,1)
  (same comment as for Barium)
- Nitrate [water, ground-, long-term]: 0 kg; pedigree (1,1,1,1,1)
  (same comment as for Barium)
- Sulfate [water, ground-, long-term]: 0 kg; pedigree (1,1,1,1,1)
  (same comment as for Barium)
- Mercury [air, urban air close to ground]: 5.12088e-13 kg; lognormal variance with pedigree 1.8263, pedigree (1,1,3,1,1)
  (same comment as for Copper)
- Copper, ion [water, ground-, long-term]: 0 kg; pedigree (1,1,1,1,1)
  (same comment as for Barium)
- Potassium, ion [water, ground-, long-term]: 0 kg; pedigree (1,1,1,1,1)
  (same comment as for Barium)
- Nickel, ion [water, ground-, long-term]: 0 kg; pedigree (1,1,1,1,1)
  (same comment as for Barium)
- Boron [water, ground-, long-term]: 0 kg; pedigree (1,1,1,1,1)
  (same comment as for Barium)
- Beryllium [water, ground-, long-term]: 0 kg; pedigree (1,1,1,1,1)
  (same comment as for Barium)
- Chloride [water, surface water]: 0 kg; pedigree (1,1,1,1,1)
  (same comment as for Nickel, ion)
- Copper, ion [water, surface water]: 0 kg; pedigree (1,1,1,1,1)
  (same comment as for Nickel, ion)
- Magnesium [water, ground-, long-term]: 0 kg; pedigree (1,1,1,1,1)
  (same comment as for Barium)
- Cadmium, ion [water, ground-, long-term]: 0 kg; pedigree (1,1,1,1,1)
  (same comment as for Barium)
- Barium [air, urban air close to ground]: 0 kg; pedigree (1,1,1,1,1)
  (same comment as for Copper)
- Calcium, ion [water, surface water]: 0 kg; pedigree (1,1,1,1,1)
  (same comment as for Nickel, ion)
- Silicon [water, surface water]: 0 kg; pedigree (1,1,1,1,1)
  (same comment as for Nickel, ion)
- Nitrate [water, surface water]: 0 kg; pedigree (1,1,1,1,1)
  (same comment as for Nickel, ion)
- Molybdenum [water, ground-, long-term]: 0 kg; pedigree (1,1,1,1,1)
  (same comment as for Barium)
- TOC, Total Organic Carbon [water, surface water]: 3.83935e-6 kg; lognormal variance with pedigree 0.047219, pedigree (1,1,3,1,1)
  (same comment as for Nickel, ion)
- Chromium VI [water, surface water]: 0 kg; pedigree (1,1,1,1,1)
  (same comment as for Nickel, ion)
- Lead [water, ground-, long-term]: 0 kg; pedigree (1,1,1,1,1)
  (same comment as for Barium)
- Titanium, ion [water, surface water]: 0 kg; pedigree (1,1,1,1,1)
  (same comment as for Nickel, ion)
- Manganese [air, urban air close to ground]: 2.17021e-10 kg; lognormal variance with pedigree 1.1209, pedigree (1,1,3,1,1)
  (same comment as for Copper)
- Fluoride [water, ground-, long-term]: 0 kg; pedigree (1,1,1,1,1)
  (same comment as for Barium)
- Carbon monoxide, non-fossil [air, urban air close to ground]: 7.66252e-7 kg; lognormal variance with pedigree 0.82605, pedigree (1,1,3,1,1)
  (same comment as for Benzene)
- Cobalt [air, urban air close to ground]: 1.07057e-11 kg; lognormal variance with pedigree 1.6286, pedigree (1,1,3,1,1)
  (same comment as for Copper)
- Nitrogen oxides [air, urban air close to ground]: 1.19917e-6 kg; lognormal variance with pedigree 0.74902, pedigree (1,1,3,1,1)
  Sum of fuel-Nox and thermal-NOx emitted to air after DeNOx stage.
  Uncertainty: uncertainty calculated from uncertainty in average N-emissions and uncertainty in the share of thermal NOx and the uncertainty in nitrogen content in *this* waste.
- Selenium [water, ground-, long-term]: 0 kg; pedigree (1,1,1,1,1)
  (same comment as for Barium)
- Hydrogen fluoride [air, urban air close to ground]: 1.65794e-11 kg; lognormal variance with pedigree 1.1788, pedigree (1,1,3,1,1)
  (same comment as for Copper)
- Iron [air, urban air close to ground]: 2.6602e-10 kg; lognormal variance with pedigree 0.6885, pedigree (1,1,3,1,1)
  (same comment as for Copper)
- Chromium VI [water, ground-, long-term]: 0 kg; pedigree (1,1,1,1,1)
  (same comment as for Barium)
- Heat, waste [air, urban air close to ground]: 0 MJ; pedigree (1,1,1,1,1)
  (same comment as for Heat, waste)
- Cadmium [air, urban air close to ground]: 8.93614e-13 kg; lognormal variance with pedigree 1.514, pedigree (1,1,3,1,1)
  (same comment as for Copper)
- Hydrogen chloride [air, urban air close to ground]: 4.77679e-10 kg; lognormal variance with pedigree 0.60028, pedigree (1,1,3,1,1)
  (same comment as for Copper)
- Titanium, ion [water, ground-, long-term]: 0 kg; pedigree (1,1,1,1,1)
  (same comment as for Barium)
- Silicon [air, urban air close to ground]: 0 kg; pedigree (1,1,1,1,1)
  (same comment as for Copper)
- Magnesium [air, urban air close to ground]: 4.59574e-10 kg; lognormal variance with pedigree 0.48245, pedigree (1,1,3,1,1)
  (same comment as for Copper)
- Nickel [air, urban air close to ground]: 1.66622e-10 kg; lognormal variance with pedigree 1.2821, pedigree (1,1,3,1,1)
  (same comment as for Copper)
- Selenium [air, urban air close to ground]: 3.89297e-12 kg; lognormal variance with pedigree 1.4419, pedigree (1,1,3,1,1)
  (same comment as for Copper)
- Silicon [water, ground-, long-term]: 0 kg; pedigree (1,1,1,1,1)
  (same comment as for Barium)
- Potassium, ion [water, surface water]: 0 kg; pedigree (1,1,1,1,1)
  (same comment as for Nickel, ion)
- Potassium [air, urban air close to ground]: 2.98723e-8 kg; lognormal variance with pedigree 0.68127, pedigree (1,1,3,1,1)
  (same comment as for Copper)
- Strontium [water, surface water]: 0 kg; pedigree (1,1,1,1,1)
  (same comment as for Nickel, ion)
- Cobalt [water, surface water]: 0 kg; pedigree (1,1,1,1,1)
  (same comment as for Nickel, ion)
- Dinitrogen monoxide [air, urban air close to ground]: 3.59977e-9 kg; lognormal variance with pedigree 1.2528, pedigree (1,1,3,1,1)
  (same comment as for Ammonia)
- Lead [water, surface water]: 1.77654e-12 kg; lognormal variance with pedigree 0.8346, pedigree (1,1,3,1,1)
  (same comment as for Nickel, ion)
- Zinc [air, urban air close to ground]: 4.79184e-10 kg; lognormal variance with pedigree 0.95177, pedigree (1,1,3,1,1)
  (same comment as for Copper)
- Aluminium [water, surface water]: 0 kg; pedigree (1,1,1,1,1)
  (same comment as for Nickel, ion)
- Benzene, pentachloro- [air, urban air close to ground]: 0 kg; pedigree (1,1,1,1,1)
  (same comment as for Benzene)
- Sulfate [water, surface water]: 0 kg; pedigree (1,1,1,1,1)
  (same comment as for Nickel, ion)
- Iron, ion [water, ground-, long-term]: 0 kg; pedigree (1,1,1,1,1)
  (same comment as for Barium)
- Sulfur dioxide [air, urban air close to ground]: 1.99438e-7 kg; lognormal variance with pedigree 0.62946, pedigree (1,1,3,1,1)
  (same comment as for Copper)
- Barium [water, surface water]: 0 kg; pedigree (1,1,1,1,1)
  (same comment as for Nickel, ion)
- Calcium [air, urban air close to ground]: 7.50378e-9 kg; lognormal variance with pedigree 0.49635, pedigree (1,1,3,1,1)
  (same comment as for Copper)
- Phenol, pentachloro- [air, urban air close to ground]: 1.03404e-14 kg; lognormal variance with pedigree 0.095504, pedigree (1,1,3,1,1)
  (same comment as for Benzene)
- Boron [water, surface water]: 0 kg; pedigree (1,1,1,1,1)
  (same comment as for Nickel, ion)
- Chlorine [air, urban air close to ground]: 2.29787e-10 kg; lognormal variance with pedigree 0.3988, pedigree (2,5,2,1,4)
  Estimation based on fuel input data and emission factors from corresponding ecoinvent fuel combustion datasets (see "Extrapolations" comment). Apart from external fuel inputs, internal fuels such as bark, black liquor, sludge, tall oil pitch, wood pellets are generated during the process and supply considerable amounts of process energy. Emissions from some internal biofuels (bark, wood pellets) are approximated with the combustion of wood chips. black liquor, sludge and tall oil pitch were not included in the emissions calculations because no specific emission profiles, e.g. for the black liquor recovery process, were available. Emissions from these internal energy generation processes are therefore only reflected in the key emission factors provided by the industry, other emissions constitute a data gap. Biogas and methanol are approximated with the combustion of natural gas, whereby CO2, CO and CH4 emissions stemming from biogas were modeled as non-fossil.
  Uncertainty: estimation, based on industrial heating modules of energy carriers used
- Ethanol [air, urban air close to ground]: 9.73242e-11 kg; lognormal variance with pedigree 0.1388, pedigree (2,5,2,1,4)
  (same comment as for Chlorine)
- Phosphorus [water, surface water]: 2.33908e-8 kg; lognormal variance with pedigree 0.0401, pedigree (1,2,1,1,1)
  Data provided by industry (EPIS) 2017
- Hydrogen sulfide [air, urban air close to ground]: 3.33118e-8 kg; lognormal variance with pedigree 0.0401, pedigree (1,2,1,1,1)
  Key emission provided by industry (EPIS) 2017. Hydrogen sulfide is expressing the total of theTRS (Total Reduced Sulphur Compounds), namely H2S, CS2, COS, C2H6S, CH4S, C2H6S2,
- Methanol [air, urban air close to ground]: 1.65451e-10 kg; lognormal variance with pedigree 0.1388, pedigree (2,5,2,1,4)
  (same comment as for Chlorine)
- Nitrogen [water, surface water]: 1.09823e-7 kg; lognormal variance with pedigree 0.0401, pedigree (1,2,1,1,1)
  Data provided by industry (EPIS) 2017
- Acetone [air, urban air close to ground]: 4.86621e-11 kg; lognormal variance with pedigree 0.1388, pedigree (2,5,2,1,4)
  (same comment as for Chlorine)
- Acetic acid [air, urban air close to ground]: 3.17014e-10 kg; lognormal variance with pedigree 0.1388, pedigree (2,5,2,1,4)
  (same comment as for Chlorine)
- Propionic acid [air, urban air close to ground]: 1.63155e-11 kg; lognormal variance with pedigree 0.1388, pedigree (2,5,2,1,4)
  (same comment as for Chlorine)
- PAH, polycyclic aromatic hydrocarbons [air, urban air close to ground]: 2.2581e-11 kg; lognormal variance with pedigree 0.1388, pedigree (2,5,2,1,4)
  (same comment as for Chlorine)
- Carbon dioxide, fossil [air, urban air close to ground]: 7.55852e-5 kg; lognormal variance with pedigree 0.0007, pedigree (1,2,1,1,1)
  Key emission provided by industry (EPIS) 2017
- Methane, fossil [air, urban air close to ground]: 2.16054e-9 kg; lognormal variance with pedigree 0.1388, pedigree (2,5,2,1,4)
  (same comment as for Chlorine)
- Fluorine [air, urban air close to ground]: 6.38298e-11 kg; lognormal variance with pedigree 0.1388, pedigree (2,5,2,1,4)
  (same comment as for Chlorine)
- Pentane [air, urban air close to ground]: 1.00244e-9 kg; lognormal variance with pedigree 0.1388, pedigree (2,5,2,1,4)
  (same comment as for Chlorine)
- Propane [air, urban air close to ground]: 1.75137e-10 kg; lognormal variance with pedigree 0.1388, pedigree (2,5,2,1,4)
  (same comment as for Chlorine)
- Water [air, unspecified]: 3.50701e-5 m3; lognormal variance with pedigree 0.0401, pedigree (1,2,1,1,1)
  Data provided by industry (EPIS) 2017. Mainly cooling water and assumed to evaporate
- Benzene, ethyl- [air, urban air close to ground]: 3.82979e-11 kg; lognormal variance with pedigree 0.1388, pedigree (2,5,2,1,4)
  (same comment as for Chlorine)
- Bromine [air, urban air close to ground]: 7.65958e-11 kg; lognormal variance with pedigree 0.1388, pedigree (2,5,2,1,4)
  (same comment as for Chlorine)
- Vanadium [air, urban air close to ground]: 3.24414e-10 kg; lognormal variance with pedigree 0.7388, pedigree (2,5,2,1,4)
  (same comment as for Chlorine)
- Suspended solids, unspecified [water, surface water]: 8.68154e-7 kg; lognormal variance with pedigree 0.0401, pedigree (1,2,1,1,1)
  Data provided by industry (EPIS) 2017
- Water [water, unspecified]: 2.12744e-5 m3; lognormal variance with pedigree 0.0401, pedigree (1,2,1,1,1)
  Data provided by industry (EPIS) 2017
- Hydrocarbons, aliphatic, alkanes, unspecified [air, urban air close to ground]: 1.41008e-9 kg; lognormal variance with pedigree 0.1388, pedigree (2,5,2,1,4)
  (same comment as for Chlorine)
- Hydrocarbons, aliphatic, unsaturated [air, urban air close to ground]: 3.96718e-9 kg; lognormal variance with pedigree 0.1388, pedigree (2,5,2,1,4)
  (same comment as for Chlorine)
- Chromium VI [air, urban air close to ground]: 6.72846e-14 kg; lognormal variance with pedigree 0.7388, pedigree (2,5,2,1,4)
  (same comment as for Chlorine)
- Acetaldehyde [air, urban air close to ground]: 1.2735e-10 kg; lognormal variance with pedigree 0.1388, pedigree (2,5,2,1,4)
  (same comment as for Chlorine)
- Sulfur oxides [air, unspecified]: 2.19195e-10 kg; lognormal variance with pedigree 0.0007, pedigree (1,2,1,1,1)
  Data provided by industry (EPIS) 2017
- Particulates, < 2.5 um [air, unspecified]: 2.72201e-7 kg; lognormal variance with pedigree 0.0007, pedigree (1,2,1,1,1)
  Key emission provided by industry (EPIS) 2017: Represents dust (unspecified) and Particulate Matter
- Formaldehyde [air, urban air close to ground]: 4.94273e-10 kg; lognormal variance with pedigree 0.1388, pedigree (2,5,2,1,4)
  (same comment as for Chlorine)
- Particulates, > 2.5 um, and < 10um [air, unspecified]: 6.77228e-9 kg; lognormal variance with pedigree 0.0007, pedigree (1,2,1,1,1)
  Estimation based on fuel input data and emission factors from corresponding ecoinvent fuel combustion datasets (see "Extrapolations" comment). Apart from external fuel inputs, internal fuels such as bark, black liquor, sludge, tall oil pitch, wood pellets are generated during the process and supply considerable amounts of process energy. Emissions from some internal biofuels (bark, wood pellets) are approximated with the combustion of wood chips. black liquor, sludge and tall oil pitch were not included in the emissions calculations because no specific emission profiles, e.g. for the black liquor recovery process, were available. Emissions from these internal energy generation processes are therefore only reflected in the key emission factors provided by the industry, other emissions constitute a data gap. Biogas and methanol are approximated with the combustion of natural gas, whereby CO2, CO and CH4 emissions stemming from biogas were modeled as non-fossil.
- Butane [air, urban air close to ground]: 6.06304e-10 kg; lognormal variance with pedigree 0.3988, pedigree (2,5,2,1,4)
  (same comment as for Chlorine)
- Particulates, > 10 um [air, urban air close to ground]: 7.78593e-10 kg; lognormal variance with pedigree 0.0507, pedigree (1,3,1,3,1)
  Estimation based on fuel input data and emission factors from corresponding ecoinvent fuel combustion datasets (see "Extrapolations" comment). Apart from external fuel inputs, internal fuels such as bark, black liquor, sludge, tall oil pitch, wood pellets are generated during the process and supply considerable amounts of process energy. Emissions from some internal biofuels (bark, wood pellets) are approximated with the combustion of wood chips. black liquor, sludge and tall oil pitch were not included in the emissions calculations because no specific emission profiles, e.g. for the black liquor recovery process, were available. Emissions from these internal energy generation processes are therefore only reflected in the key emission factors provided by the industry, other emissions constitute a data gap. Biogas and methanol are approximated with the combustion of natural gas, whereby CO2, CO and CH4 emissions stemming from biogas were modeled as non-fossil.
  Uncertainty: average from CER of European producers
- AOX, Adsorbable Organic Halogen as Cl [water, surface water]: 6.93257e-8 kg; lognormal variance with pedigree 0.0401, pedigree (1,2,1,1,1)
  Data provided by industry (EPIS) 2017
- Carbon monoxide, fossil [air, urban air close to ground]: 4.28118e-9 kg; lognormal variance with pedigree 0.7388, pedigree (2,5,2,1,4)
  (same comment as for Chlorine)
- m-Xylene [air, urban air close to ground]: 1.53192e-10 kg; lognormal variance with pedigree 0.1388, pedigree (2,5,2,1,4)
  (same comment as for Chlorine)
- Hydrocarbons, aromatic [air, urban air close to ground]: 5.20205e-11 kg; lognormal variance with pedigree 0.1388, pedigree (2,5,2,1,4)
  (same comment as for Chlorine)
- Formaldehyde [water, surface water]: 1.38589e-10 kg; lognormal variance with pedigree 0.3026, pedigree (2,1,1,5,1)
  (same comment as for urea, as N)
- Hydrocarbons, aliphatic, alkanes, unspecified [air, non-urban air or from high stacks]: 3.63622e-10 kg; lognormal variance with pedigree 0.1306, pedigree (2,5,5,5,4)
  (same comment as for urea, as N)
- Sulfur dioxide [air, non-urban air or from high stacks]: 8.38315e-9 kg; lognormal variance with pedigree 0.0032, pedigree (2,1,1,5,1)
  (same comment as for urea, as N)
- Selenium [air, non-urban air or from high stacks]: 4.69409e-13 kg; lognormal variance with pedigree 0.6526, pedigree (2,1,1,5,1)
  (same comment as for urea, as N)
- Hydrocarbons, aliphatic, unsaturated [air, non-urban air or from high stacks]: 1.05941e-9 kg; lognormal variance with pedigree 0.1306, pedigree (2,5,5,5,4)
  (same comment as for urea, as N)
- Hydrogen chloride [air, non-urban air or from high stacks]: 4.40209e-10 kg; lognormal variance with pedigree 0.0426, pedigree (2,1,1,5,1)
  (same comment as for urea, as N)
- Hydrogen sulfide [water, surface water]: 6.57393e-10 kg; lognormal variance with pedigree 0.0426, pedigree (2,1,1,5,1)
  (same comment as for urea, as N)
- Sulfuric acid [air, non-urban air or from high stacks]: 7.42941e-10 kg; lognormal variance with pedigree 0.0426, pedigree (2,1,1,5,1)
  (same comment as for urea, as N)
- Hydrocarbons, aromatic [air, non-urban air or from high stacks]: 1.33377e-11 kg; lognormal variance with pedigree 0.1306, pedigree (2,5,5,5,4)
  (same comment as for urea, as N)
- Toluene [water, surface water]: 4.41077e-14 kg; lognormal variance with pedigree 0.3026, pedigree (2,1,1,5,1)
  (same comment as for urea, as N)
- Hydrogen fluoride [air, non-urban air or from high stacks]: 4.26832e-12 kg; lognormal variance with pedigree 0.1306, pedigree (2,5,5,5,4)
  (same comment as for urea, as N)
- Toluene [air, non-urban air or from high stacks]: 6.65285e-11 kg; lognormal variance with pedigree 0.1306, pedigree (2,5,5,5,4)
  (same comment as for urea, as N)
- Iron [air, non-urban air or from high stacks]: 7.28854e-11 kg; lognormal variance with pedigree 0.6526, pedigree (2,1,1,5,1)
  (same comment as for urea, as N)
- Hydrogen sulfide [air, non-urban air or from high stacks]: 5.25836e-11 kg; lognormal variance with pedigree 0.0426, pedigree (2,1,1,5,1)
  (same comment as for urea, as N)
- Water [air, non-urban air or from high stacks]: 2.75821e-7 m3; lognormal variance with pedigree 0.0026, pedigree (1,1,1,5,1)
  (same comment as for urea, as N)
- Vanadium [air, non-urban air or from high stacks]: 8.88823e-11 kg; lognormal variance with pedigree 0.6526, pedigree (2,1,1,5,1)
  (same comment as for urea, as N)
- Lead [air, non-urban air or from high stacks]: 4.02249e-12 kg; lognormal variance with pedigree 0.6526, pedigree (2,1,1,5,1)
  (same comment as for urea, as N)
- Zinc [air, non-urban air or from high stacks]: 1.39753e-11 kg; lognormal variance with pedigree 0.6526, pedigree (2,1,1,5,1)
  (same comment as for urea, as N)
- Magnesium [air, non-urban air or from high stacks]: 5.71766e-11 kg; lognormal variance with pedigree 0.1306, pedigree (2,5,5,5,4)
  (same comment as for urea, as N)
- m-Xylene [air, non-urban air or from high stacks]: 9.05198e-11 kg; lognormal variance with pedigree 0.1306, pedigree (2,5,5,5,4)
  (same comment as for urea, as N)
- Mercury [air, non-urban air or from high stacks]: 8.89809e-14 kg; lognormal variance with pedigree 0.6526, pedigree (2,1,1,5,1)
  (same comment as for urea, as N)
- 2-Propanol [air, non-urban air or from high stacks]: 3.07831e-10 kg; lognormal variance with pedigree 0.0426, pedigree (2,1,1,5,1)
  (same comment as for urea, as N)
- Manganese [air, non-urban air or from high stacks]: 5.795e-11 kg; lognormal variance with pedigree 0.1306, pedigree (2,5,5,5,4)
  (same comment as for urea, as N)
- 4-Methyl-2-pentanone [air, non-urban air or from high stacks]: 6.72743e-12 kg; lognormal variance with pedigree 0.0426, pedigree (2,1,1,5,1)
  (same comment as for urea, as N)
- 4-Methyl-2-pentanol [water, surface water]: 0 kg; pedigree (1,1,1,1,1)
  (same comment as for urea, as N)
- Acetaldehyde [air, non-urban air or from high stacks]: 1.72745e-10 kg; lognormal variance with pedigree 0.0426, pedigree (2,1,1,5,1)
  (same comment as for urea, as N)
- Methane, non-fossil [air, non-urban air or from high stacks]: 2.01448e-8 kg; lognormal variance with pedigree 0.0426, pedigree (2,1,1,5,1)
  (same comment as for urea, as N)
- Methane, fossil [air, non-urban air or from high stacks]: 3.15494e-10 kg; lognormal variance with pedigree 0.0426, pedigree (2,1,1,5,1)
  (same comment as for urea, as N)
- Molybdenum [air, non-urban air or from high stacks]: 7.11098e-13 kg; lognormal variance with pedigree 0.6526, pedigree (2,1,1,5,1)
  (same comment as for urea, as N)
- Acetic acid [air, non-urban air or from high stacks]: 5.57798e-11 kg; lognormal variance with pedigree 0.1306, pedigree (2,5,5,5,4)
  (same comment as for urea, as N)
- Methyl ethyl ketone [air, non-urban air or from high stacks]: 8.06195e-11 kg; lognormal variance with pedigree 0.0426, pedigree (2,1,1,5,1)
  (same comment as for urea, as N)
- Acrolein [air, non-urban air or from high stacks]: 7.48939e-11 kg; lognormal variance with pedigree 0.0426, pedigree (2,1,1,5,1)
  (same comment as for urea, as N)
- Methanol [air, non-urban air or from high stacks]: 8.68659e-9 kg; lognormal variance with pedigree 0.0426, pedigree (2,1,1,5,1)
  (same comment as for urea, as N)
- Acetone [air, non-urban air or from high stacks]: 1.33321e-11 kg; lognormal variance with pedigree 0.0426, pedigree (2,1,1,5,1)
  (same comment as for urea, as N)
- Methanol [water, surface water]: 4.04538e-10 kg; lognormal variance with pedigree 0.3026, pedigree (2,1,1,5,1)
  (same comment as for urea, as N)
- Ammonia [air, non-urban air or from high stacks]: 5.72713e-9 kg; lognormal variance with pedigree 0.0426, pedigree (2,1,1,5,1)
  (same comment as for urea, as N)
- PAH, polycyclic aromatic hydrocarbons [air, non-urban air or from high stacks]: 2.78279e-11 kg; lognormal variance with pedigree 0.3906, pedigree (2,5,5,5,4)
  (same comment as for urea, as N)
- Arsenic [air, non-urban air or from high stacks]: 1.3709e-12 kg; lognormal variance with pedigree 0.6526, pedigree (2,1,1,5,1)
  (same comment as for urea, as N)
- NMVOC, non-methane volatile organic compounds, unspecified origin [air, non-urban air or from high stacks]: 3.65856e-9 kg; lognormal variance with pedigree 0.0426, pedigree (2,1,1,5,1)
  (same comment as for urea, as N)
- Benzene [air, non-urban air or from high stacks]: 2.17993e-10 kg; lognormal variance with pedigree 0.1306, pedigree (2,5,5,5,4)
  (same comment as for urea, as N)
- Benzene, ethyl- [air, non-urban air or from high stacks]: 1.02263e-11 kg; lognormal variance with pedigree 0.1306, pedigree (2,5,5,5,4)
  (same comment as for urea, as N)
- Benzene, hexachloro- [air, non-urban air or from high stacks]: 0 kg; pedigree (1,1,1,1,1)
  (same comment as for urea, as N)
- Benzene [water, surface water]: 7.97711e-14 kg; lognormal variance with pedigree 0.3026, pedigree (2,1,1,5,1)
  (same comment as for urea, as N)
- Benzo(a)pyrene [air, non-urban air or from high stacks]: 6.91131e-14 kg; lognormal variance with pedigree 0.1306, pedigree (2,5,5,5,4)
  (same comment as for urea, as N)
- Bromine [air, non-urban air or from high stacks]: 2.0453e-11 kg; lognormal variance with pedigree 0.1306, pedigree (2,5,5,5,4)
  (same comment as for urea, as N)
- Butane [air, non-urban air or from high stacks]: 1.14937e-11 kg; lognormal variance with pedigree 0.1306, pedigree (2,5,5,5,4)
  (same comment as for urea, as N)
- Calcium [air, non-urban air or from high stacks]: 2.00394e-9 kg; lognormal variance with pedigree 0.1306, pedigree (2,5,5,5,4)
  (same comment as for urea, as N)
- Cadmium [air, non-urban air or from high stacks]: 5.12459e-13 kg; lognormal variance with pedigree 0.6526, pedigree (2,1,1,5,1)
  (same comment as for urea, as N)
- Carbon dioxide, fossil [air, non-urban air or from high stacks]: 8.17519e-6 kg; lognormal variance with pedigree 0.0032, pedigree (2,1,1,5,1)
  (same comment as for urea, as N)
- Nickel [air, non-urban air or from high stacks]: 4.88862e-12 kg; lognormal variance with pedigree 0.6526, pedigree (2,1,1,5,1)
  (same comment as for urea, as N)
- Carbon monoxide, fossil [air, non-urban air or from high stacks]: 4.42379e-8 kg; lognormal variance with pedigree 0.6526, pedigree (2,1,1,5,1)
  (same comment as for urea, as N)
- Carbon dioxide, non-fossil [air, non-urban air or from high stacks]: 0.000113126 kg; lognormal variance with pedigree 0.0032, pedigree (2,1,1,5,1)
  (same comment as for urea, as N)
- Particulates, < 2.5 um [air, non-urban air or from high stacks]: 3.72497e-8 kg; lognormal variance with pedigree 0.3026, pedigree (2,1,1,5,1)
  (same comment as for urea, as N)
- Carbon monoxide, non-fossil [air, non-urban air or from high stacks]: 2.05978e-6 kg; lognormal variance with pedigree 0.7406, pedigree (2,5,5,5,4)
  (same comment as for urea, as N)
- Nitrogen oxides [air, non-urban air or from high stacks]: 1.02156e-7 kg; lognormal variance with pedigree 0.0426, pedigree (2,1,1,5,1)
  (same comment as for urea, as N)
- Chromium VI [air, non-urban air or from high stacks]: 1.22884e-13 kg; lognormal variance with pedigree 0.6526, pedigree (2,1,1,5,1)
  (same comment as for urea, as N)
- Particulates, > 10 um [air, non-urban air or from high stacks]: 1.05088e-9 kg; lognormal variance with pedigree 0.0426, pedigree (2,1,1,5,1)
  (same comment as for urea, as N)
- Chlorine [air, non-urban air or from high stacks]: 6.13593e-11 kg; lognormal variance with pedigree 0.1306, pedigree (2,5,5,5,4)
  (same comment as for urea, as N)
- Pentane [air, non-urban air or from high stacks]: 1.96417e-11 kg; lognormal variance with pedigree 0.1306, pedigree (2,5,5,5,4)
  (same comment as for urea, as N)
- Particulates, > 2.5 um, and < 10um [air, non-urban air or from high stacks]: 5.92167e-10 kg; lognormal variance with pedigree 0.1226, pedigree (2,1,1,5,1)
  (same comment as for urea, as N)
- Chromium [air, non-urban air or from high stacks]: 3.25938e-12 kg; lognormal variance with pedigree 0.6526, pedigree (2,1,1,5,1)
  (same comment as for urea, as N)
- Phenol, pentachloro- [air, non-urban air or from high stacks]: 2.76117e-15 kg; lognormal variance with pedigree 0.1306, pedigree (2,5,5,5,4)
  (same comment as for urea, as N)
- Cobalt [air, non-urban air or from high stacks]: 2.93321e-12 kg; lognormal variance with pedigree 0.6526, pedigree (2,1,1,5,1)
  (same comment as for urea, as N)
- Phosphorus [air, non-urban air or from high stacks]: 6.23853e-11 kg; lognormal variance with pedigree 0.1306, pedigree (2,5,5,5,4)
  (same comment as for urea, as N)
- Dinitrogen monoxide [air, non-urban air or from high stacks]: 4.76827e-10 kg; lognormal variance with pedigree 0.0426, pedigree (2,1,1,5,1)
  (same comment as for urea, as N)
- Phenol [air, non-urban air or from high stacks]: 1.2835e-10 kg; lognormal variance with pedigree 0.0426, pedigree (2,1,1,5,1)
  (same comment as for urea, as N)
- Dioxins, measured as 2,3,7,8-tetrachlorodibenzo-p-dioxin [air, non-urban air or from high stacks]: 0 kg; pedigree (1,1,1,1,1)
  (same comment as for urea, as N)
- Potassium [air, non-urban air or from high stacks]: 7.97671e-9 kg; lognormal variance with pedigree 0.1306, pedigree (2,5,5,5,4)
  (same comment as for urea, as N)
- Fluorine [air, non-urban air or from high stacks]: 1.70441e-11 kg; lognormal variance with pedigree 0.1306, pedigree (2,5,5,5,4)
  (same comment as for urea, as N)
- Propanal [air, non-urban air or from high stacks]: 8.1677e-11 kg; lognormal variance with pedigree 0.1786, pedigree (2,5,4,5,5)
  (same comment as for urea, as N)
- Ethanol [air, non-urban air or from high stacks]: 2.66659e-11 kg; lognormal variance with pedigree 0.0426, pedigree (2,1,1,5,1)
  (same comment as for urea, as N)
- Formaldehyde [air, non-urban air or from high stacks]: 7.55253e-10 kg; lognormal variance with pedigree 0.0426, pedigree (2,1,1,5,1)
  (same comment as for urea, as N)
- Propanol [air, non-urban air or from high stacks]: 1.94262e-14 kg; lognormal variance with pedigree 0.0426, pedigree (2,1,1,5,1)
  (same comment as for urea, as N)
- Propane [air, non-urban air or from high stacks]: 5.93745e-12 kg; lognormal variance with pedigree 0.1306, pedigree (2,5,5,5,4)
  (same comment as for urea, as N)
- Sodium [air, non-urban air or from high stacks]: 5.09815e-10 kg; lognormal variance with pedigree 0.1306, pedigree (2,5,5,5,4)
  (same comment as for urea, as N)
- Propionic acid [air, non-urban air or from high stacks]: 3.26692e-13 kg; lognormal variance with pedigree 0.1306, pedigree (2,5,5,5,4)
  (same comment as for urea, as N)
