# inverter production, 0.5kW

Dataset: EcoSpold 2, unit process
Geography: RER
Time period: 2004-01-01 to 2019-12-31
Technology level: current
Classification: EcoSpold01Categories: photovoltaic/production of components
Classification: ISIC rev.4 ecoinvent: 2790:Manufacture of other electrical equipment
Synonyms: inverse rectifier
Tags: ConvertedDataset
Scenario: Business-as-Usual
System model: Allocation at the point of substitution
Generated by: Matthias Tuchschmid (obsolete)
Published in: Jungbluth, N. 2007
Database: ecoinvent
isCopyrightProtected: true
accessRestrictedTo: 1

## General comment
Production of an inverter (500W) with an efficiency of 93.5% (total efficiency factor which includes MPP-Tracking) for photovoltaic plant. Total weight about 1.6 kg.
[This dataset was already contained in the ecoinvent database version 2. It was not individually updated during the transfer to ecoinvent version 3. Life Cycle Impact Assessment results may still have changed, as they are affected by changes in the supply chain, i.e. in other datasets. This dataset was generated following the ecoinvent quality guidelines for version 2. It may have been subject to central changes described in the ecoinvent version 3 change report (http://www.ecoinvent.org/database/ecoinvent-version-3/reports-of-changes/), and the results of the central updates were reviewed extensively. The changes added e.g. consistent water flows and other information throughout the database. The documentation of this dataset can be found in the ecoinvent reports of version 2, which are still available via the ecoinvent website. The change report linked above covers all central changes that were made during the conversion process.]

## Included activities end
Materials, packaging and electricity use for the production of an inverse rectifier. Disposal of the product after use.

## Geography
Production in RER.

## Technology
Inverter for a photovoltaic grid-connected system with a capacity of 500Wp.

## Reference product
- inverter, 0.5kW: 1 unit; CPC 4717: Parts for the goods of classes 4711, 4712 and 4714 to 4716; By-product classification allocatable product
  EcoSpold01Location=RER
  production volume 1.32237 unit
    This is a placeholder value that does not reflect real-world production volumes. This dataset does not currently require a real-world production volume to work in the database framework, and no actual data were collected yet. This has no negative effect on the results of the ecoinvent database. The placeholder value of this activity was scaled according to the nominal GDP of 2005 (source: United Nations, http://data.un.org/Glossary.aspx?q=GDP+%28current+US%24%29, accessed 20130726) to reflect an appropriate share of the global production volume, which is also a placeholder value.
  property price 22.2996 EUR2005
    Calculated based on inputs: The price of the product has been calculated as a sum of the values of the material and energy inputs for this product. This value is therefore a rough estimation. It may underestimate the real price since there are additional expenses when producing any product. These expences can include for example labour costs, treatment of waste materials and profit for the producer. Please consider carefully whether this level of data quality is acceptable for your application.
  property true value 22.2996
    allocation property applied in "true value" allocation // value calculated from revenue

## By-products
- electricity, for reuse in municipal waste incineration only: 0 kWh; CPC 17100: Electrical energy; By-product classification allocatable product; pedigree (1,1,1,1,1)
  Net electricity generated from this waste and used in internal MSWI plant energy redistribution.
  Uncertainty: uncertainty is calculated from uncertainties in waste composition and uncertainties in energy efficiency and the uncertainty in internal energy demand
  production volume 0.296385 kWh
  property true value relation 3.6; name E_el_prod_MSWI_true_value_relation
    property to calculate "true value" from
  property exergy 3.6 MJ; name E_el_prod_MSWI_exergy
    This exergy property is based on the exergy content of the product.
  property price 0.1 EUR2005; name E_el_prod_MSWI_price_EUR2005
    Estimated to be the same price as in case of electricity, medium voltage.
  property true value 0.0379839
    allocation property applied in "true value" allocation // value calculated from true value relation
- heat, for reuse in municipal waste incineration only: 0 MJ; CPC 17300: Steam and hot water; By-product classification allocatable product; pedigree (1,1,1,1,1)
  Net useful heat generated from this waste and used in internal MSWI plant energy redistribution.
  Uncertainty: uncertainty is calculated from uncertainties in waste composition and uncertainties in energy efficiency and the uncertainty in internal energy demand
  production volume 2.06438 MJ
  property true value relation 0.1842; name E_th_prod_MSWI_true_value_relation
    property to calculate "true value" from
  property exergy 0.1842 MJ; name E_th_prod_MSWI_exergy
    This exergy property is based on the exergy content of the product.
  property price 0.0106 EUR2005; name E_th_prod_MSWI_price_EUR2005
    Average European district heat price from Ecoheatcool and Euroheat 2005-2006, Ecoheat Work package 1: The European heat market. Final report. 10.6 EUR/GJ i s the price of district heat. http://www.solarthermalworld.org/files/Ecoheatcool%20WP1%20Web.pdf?download
  property true value 0.0135369
    (same comment as for electricity, for reuse in municipal waste incineration only)
- zinc concentrate: 0 kg; CPC 14290: Other non-ferrous metal ores and concentrates (other than uranium or thorium ores and concentrates); By-product classification allocatable product
  Calculated value from the knowledge of the properties of both products.
  production volume 4.83491e-5 kg
  property price 0.38 EUR2005; name ByP_price_EUR2005
    Temporary price data. Calculated as 90% of purchasers price based on: Zinc content in concentrate 53%. Concentrate price per kg Zn 86.5% of refined Zn price (13.5% treatment charges according to CHR Metals Limited 2005: Dynamic cost curves. http://www.minecost.com/dynamic.pdf). 2004 zinc price from USGS (2007) Mineral commodity summaries 2007. <http://minerals.usgs.gov/minerals/pubs/mcs/2007/mcs2007.pdf> [Accessed 25 May 2010]
  property zinc content 0.53; name zinc_C_zinc_concentrate
    Zinc content on a dry matter basis. Value taken from teh "zinc mine operation" /GLO dataset.
  property dry mass 1 kg; name DM_zinc_concentrate
  property carbon content 0
    carbon content on a dry matter basis (reserved; not for manual entry)
  property true value 1.83727e-5
    allocation property applied in "true value" allocation // value calculated from revenue
  properties: wet mass 1 kg, water content 0, carbon content, non-fossil 0, carbon content, fossil 0, water in wet mass 0 kg, carbon allocation 0 kg
- waste paperboard, sorted: 0 kg; CPC 39240: Waste and scrap of paper or paperboard; By-product classification Recyclable; pedigree (1,1,1,1,1)
  It is assumed that 86.3% (wet weight) of waste paperboard, unsorted is segregated to waste paperboard, sorted. Waste paper, sorted is later used in recycling industry where maximum 79% of it, is transformed into new paperboard.
  production volume 0.96656 kg
  property price 0.0436 EUR2005; name ByP_waste_paperboard_sorted_price_EUR200
    Estimated value; three different sources were used to determine the price for waste paperboard, sorted. 35 AUD/tonne (http://larimer.org/solidwaste/charts/Current.htm, accessed 20130328), 70 GBP/tonne (http://www.letsrecycle.com/prices/waste%20paper, accessed 20130328) and 20 USD/tonne (http://www.oxpaperboard.com/1/post/2013/03/ox-paperboard-announces-price-adjustment-to-uncoated-recycled-paperboard.html, accessed 20130328).
  property water content 0.243781; = WWM_waste_paperboard_sorted/ DM_waste_paperboard_sorted
  property water in wet mass 0.196 kg; name WWM_waste_paperboard_sorted; = WM_waste_paperboard_sorted- DM_waste_paperboard_sorted
  property dry mass 0.804 kg; name DM_waste_paperboard_sorted
  property wet mass 1 kg; name WM_waste_paperboard_sorted
  property carbon content 0.483259
    carbon content on a dry matter basis (reserved; not for manual entry)
  property true value 0.042142
    allocation property applied in "true value" allocation // value calculated from revenue
  properties: carbon content, non-fossil 0.483259, carbon content, fossil 0, carbon allocation 0.38854 kg
- lead: 0 kg; CPC 41441: Lead, unwrought; By-product classification allocatable product
  EcoSpold01Location=SE
  production volume 0.0110385 kg
  property price 0.744 EUR2005
    Temporary price data. Calculated as 90% of purchasers price based on: Source: ecoinvent v2 report 10-part IX, Tab 5.10 & 2.5
  property carbon content 0
    carbon content on a dry matter basis (reserved; not for manual entry)
  property true value 0.00821262
    allocation property applied in "true value" allocation // value calculated from revenue
  properties: wet mass 1 kg, water content 0, carbon content, non-fossil 0, carbon content, fossil 0, dry mass 1 kg, water in wet mass 0 kg, carbon allocation 0 kg
- copper: 0 kg; By-product classification allocatable product; CPC 41413: Refined copper and copper alloys, unwrought; master alloys of copper
  EcoSpold01Location=SE
  production volume 0.163522 kg
  properties: water content 0, water in wet mass 0 kg, carbon content, fossil 0, carbon content, non-fossil 0, dry mass 1 kg, wet mass 1 kg, price 5.52 EUR2005, carbon content 0, carbon allocation 0 kg, true value 0.902639
- nickel, 99.5%: 0 kg; CPC 41422: Unwrought nickel; By-product classification allocatable product
  EcoSpold01Location=SE
  production volume 0.0230425 kg
  property price 10.4 EUR2005
    Temporary price data. Calculated as 90% of purchasers price based on: 2004 nickel price from USGS (2007) Mineral commodity summaries 2007. <http://minerals.usgs.gov/minerals/pubs/mcs/2007/mcs2007.pdf> [Accessed 25 May 2010]
  property carbon content 0
    carbon content on a dry matter basis (reserved; not for manual entry)
  property true value 0.239642
    allocation property applied in "true value" allocation // value calculated from revenue
  properties: water in wet mass 0 kg, wet mass 1 kg, carbon content, non-fossil 0, dry mass 1 kg, water content 0, carbon content, fossil 0, carbon allocation 0 kg
- silver: 0 kg; CPC 41310: Silver (including silver plated with gold or platinum), unwrought or in semi-manufactured forms, or in powder […]; By-product classification allocatable product; CAS 7440-22-4
  EcoSpold01Location=SE
  production volume 0.00380524 kg
  property price 178 EUR2005
    (same comment as for lead)
  property carbon content 0
    carbon content on a dry matter basis (reserved; not for manual entry)
  property true value 0.677333
    allocation property applied in "true value" allocation // value calculated from revenue
  properties: wet mass 1 kg, carbon content, non-fossil 0, dry mass 1 kg, water content 0, carbon content, fossil 0, water in wet mass 0 kg, carbon allocation 0 kg
- palladium: 0 kg; CPC 4160: Other non-ferrous metals and articles thereof (including waste and scrap of some metals); cermets and articles […]; By-product classification allocatable product
  EcoSpold01Location=SE
  production volume 0.000210645 kg
  property price 5640 EUR2005
    Temporary price data. Calculated as 90% of purchasers price based on: 2004 price from USGS (2007) Mineral commodity summaries 2007. <http://minerals.usgs.gov/minerals/pubs/mcs/2007/mcs2007.pdf> [Accessed 25 May 2010]
  property carbon content 0
    carbon content on a dry matter basis (reserved; not for manual entry)
  property true value 1.18804
    allocation property applied in "true value" allocation // value calculated from revenue
  properties: wet mass 1 kg, carbon content, fossil 0, water in wet mass 0 kg, water content 0, carbon content, non-fossil 0, dry mass 1 kg, carbon allocation 0 kg
- gold: 0 kg; CPC 41320: Gold (including gold plated with platinum), unwrought or in semi-manufactured forms, or in powder form; By-product classification allocatable product; CAS 7440-57-5
  EcoSpold01Location=SE
  production volume 0.000115517 kg
  property price 10600 EUR2005
    Temporary price data. Calculated as 90% of purchasers price based on: Source: ecoinvent v2 report 10-part IX, Tab 2.5
  property carbon content 0
    carbon content on a dry matter basis (reserved; not for manual entry)
  property true value 1.22448
    allocation property applied in "true value" allocation // value calculated from revenue
  properties: wet mass 1 kg, carbon content, fossil 0, dry mass 1 kg, carbon content, non-fossil 0, water content 0, water in wet mass 0 kg, carbon allocation 0 kg

## Inputs from technosphere
- fleece, polyethylene: 0.0251182 kg; lognormal variance with pedigree 0.0612, pedigree (2,3,5,1,1)
  Literature (Schwarz 1992)
  EcoSpold01Location=RER
  Uncertainty: Literature (Schwarz 1992)
  properties: wet mass 1 kg, carbon content, fossil 0.857143, dry mass 1 kg
  note on carbon content, fossil: Polyethylene is formed out of a huge amount of ethylene monomers (C2H4) (ecoinvent v2.2 report 11_II). MW=28 g/mol
- styrene-acrylonitrile copolymer: 0.00167455 kg; lognormal variance with pedigree 0.0512, pedigree (2,3,5,1,1)
  Literature (de Wild 2006)
  EcoSpold01Location=RER
  Uncertainty: Literature (de Wild 2006)
  properties: carbon content, fossil 0.856023, dry mass 1 kg, wet mass 1 kg
  note on carbon content, fossil: SAN is the abbreviation originating from its monomers styrene (C8H8) and acrylonitrile (C3H3N). The acrylonitrile content in SAN goes from 20 to 35 wt% (ecoinvent v2.2 report 11_II), an average content of 27.5% was considered. MW styrene =104 g/mol, MW acrylonitrile=53 g/mol
- capacitor, tantalum-, for through-hole mounting: 0.00401891 kg; lognormal variance with pedigree 0.0512, pedigree (2,3,5,1,1)
  EcoSpold01Location=GLO
  Literature (de Wild 2006), Assumption for Ceramic Multilayer Chip Capacitors
  Uncertainty: Literature (de Wild 2006), Assumption for Ceramic Multilayer Chip Capacitors
  properties: dry mass 1 kg, wet mass 1 kg, carbon content, fossil 0.181224
  note on carbon content, fossil: Calculated as the addition of C contents in the product composition, and referred to 1 kg capacitors, and then to 1 kg DM
- sheet rolling, steel: 0.0653073 kg; lognormal variance with pedigree 0.0512, pedigree (2,3,5,1,1)
  EcoSpold01Location=RER
  Literature (de Wild 2006)
  Uncertainty: Literature (de Wild 2006)
- waste polystyrene: -0.11052 kg; lognormal variance with pedigree 0.0532, pedigree (2,3,5,5,1)
  EcoSpold01Location=CH
  Calculation, different geographical location
  Uncertainty: Calculation, different geographical location
  production volume 0.132 kg
    Calculated from the production volume of inverter, 0.5kW in proportion to the respective output amounts.
  properties: water content 0.00200401, dry mass 0.998 kg, carbon content, fossil 0.922579, wet mass 1 kg
- polyvinylchloride, suspension polymerised: 0.000186482 kg; lognormal variance with pedigree 0.0512, pedigree (2,3,5,1,1)
  EcoSpold01Location=RER
  Literature (de Wild 2006)
  Uncertainty: Literature (de Wild 2006)
  properties: wet mass 1 kg, carbon content, fossil 0.387097, dry mass 1 kg
  note on carbon content, fossil: Monomer is vynyl chloride, C2H3Cl (ecoinvent v2.2 report 11_II). MW=62 g/mol
- printed wiring board, for through-hole mounting, Pb containing surface: 0.0249507 m2; = 0.0596*0.5; lognormal variance with pedigree 0.0512, pedigree (2,3,5,1,1)
  Literature (de Wild 2006), Calculation
  This original value from production mix has been replaced by 2 flows. Each has 50% share in the production mix.
  Uncertainty: Literature (de Wild 2006), Calculation
  property carbon content, fossil 0.203154; name C_content_fossil
  property carbon content, non-fossil 0; name C_content_non_fossil
  property water in wet mass 0 kg; name WWM
  property water content 0; name water_content
  property dry mass 3.08 kg; name DM
  property wet mass 3.08 kg; name WM
- aluminium, cast alloy: 0.57102 kg; lognormal variance with pedigree 0.0512, pedigree (2,3,5,1,1)
  Literature (de Wild 2006), recycled after use
  EcoSpold01Location=RER
  Uncertainty: Literature (de Wild 2006), recycled after use
  properties: dry mass 1 kg, wet mass 1 kg
- wire drawing, copper: 0.00167455 kg; lognormal variance with pedigree 0.0512, pedigree (2,3,5,1,1)
  EcoSpold01Location=RER
  Literature (de Wild 2006)
  Uncertainty: Literature (de Wild 2006)
- printed wiring board, for through-hole mounting, Pb free surface: 0.0249507 m2; = 0.0596*0.5; lognormal variance with pedigree 0.0512, pedigree (2,3,5,1,1)
  (same comment as for printed wiring board, for through-hole mounting, Pb containing surface)
  properties: wet mass 3.08 kg, dry mass 3.08 kg, carbon content, fossil 0.210221
- corrugated board box: 0.937745 kg; lognormal variance with pedigree 0.0526, pedigree (2,4,5,1,1)
  Calculation, based on estimated dimension of inverse rectifier
  EcoSpold01Location=RER
  Uncertainty: Calculation, based on estimated dimension of inverse rectifier
  properties: carbon content, non-fossil 0.432275, water content 0.0582011, wet mass 1 kg, dry mass 0.945 kg, carbon content, fossil 0.000656085
  note on carbon content, non-fossil: Biogenic C content was calculated after biogenic C contents of chemicals used in the production of board (Tab 10.15 & 10.16, ecoinvent v2.2 report 11_III, part 10).
  note on carbon content, fossil: Fossil C content was calculated after fossil C contents of chemicals used in the production of board (Tab 10-15 & 10.16 ecoinvent v2.2 report 11_III, part 10)
- section bar extrusion, aluminium: 0.57102 kg; lognormal variance with pedigree 0.0512, pedigree (2,3,5,1,1)
  Literature (de Wild 2006)
  EcoSpold01Location=RER
  Uncertainty: Literature (de Wild 2006)
- resistor, metal film type, through-hole mounting: 0.000837273 kg; lognormal variance with pedigree 0.0512, pedigree (2,3,5,1,1)
  Literature (de Wild 2006), Calculation
  EcoSpold01Location=GLO
  Uncertainty: Literature (de Wild 2006), Calculation
  properties: dry mass 1 kg, wet mass 1 kg, carbon content, fossil 0.029003
  note on carbon content, fossil: Calculated as the addition of C contents in the product composition, and referred to 1 kg DM resistor.
- steel, low-alloyed, hot rolled: 0.0653073 kg; lognormal variance with pedigree 0.0512, pedigree (2,3,5,1,1)
  (same comment as for aluminium, cast alloy)
  properties: dry mass 1 kg, wet mass 1 kg, carbon content, fossil 0.005
  note on carbon content, fossil: Low alloyed steel composition given in Tab. 3.2 ecoinvent v2.2 report 10_partII. Steel assumed to have a C content of 0.5%
- inductor, ring core choke type: 0.0619582 kg; lognormal variance with pedigree 0.0512, pedigree (2,3,5,1,1)
  (same comment as for resistor, metal film type, through-hole mounting)
  properties: carbon content, fossil 0.445934, wet mass 1 kg, dry mass 1 kg
  note on carbon content, fossil: Calculated as the addition of C contents in the product composition, and referred to 1 kg DM inductor
- capacitor, film type, for through-hole mounting: 0.0602836 kg; lognormal variance with pedigree 0.0512, pedigree (2,3,5,1,1)
  EcoSpold01Location=GLO
  Literature (de Wild 2006), Calculation
  Uncertainty: Literature (de Wild 2006), Calculation
  properties: carbon content, fossil 0.278876, dry mass 1 kg, wet mass 1 kg
- diode, glass-, for through-hole mounting: 0.00837273 kg; lognormal variance with pedigree 0.0512, pedigree (2,3,5,1,1)
  (same comment as for resistor, metal film type, through-hole mounting)
  properties: dry mass 1 kg, carbon content, fossil 0.0203273, wet mass 1 kg
  note on carbon content, fossil: Calculated as the addition of C contents in the product composition
- transformer, high voltage use: 0.259555 kg; lognormal variance with pedigree 0.0512, pedigree (2,3,5,1,1)
  EcoSpold01Location=GLO
  Literature (de Wild 2006)
  Uncertainty: Literature (de Wild 2006)
  properties: dry mass 1 kg, wet mass 1 kg, carbon content, fossil 0.262798
- acrylonitrile-butadiene-styrene copolymer: 0.123916 kg; lognormal variance with pedigree 0.0512, pedigree (2,3,5,1,1)
  Literature (de Wild 2006)
  EcoSpold01Location=RER
  Uncertainty: Literature (de Wild 2006)
  properties: carbon content, fossil 0.853081, dry mass 1 kg, wet mass 1 kg
  note on carbon content, fossil: ABS is the abbreviation originating from its monomers acrylonitrile, butadiene and styrene. It was assumed that every monomer was present in the same proportion, so the basic ABS monomer was considered (C8H8·C4H6·C3H3N), and the MW=104+54+53=211 g/mol
- capacitor, electrolyte type, > 2cm height: 0.0452127 kg; lognormal variance with pedigree 0.0512, pedigree (2,3,5,1,1)
  (same comment as for capacitor, film type, for through-hole mounting)
  properties: dry mass 1 kg, wet mass 1 kg, carbon content, non-fossil 0.0349727, carbon content, fossil 0.16971
- polyethylene, high density, granulate: 0.0117218 kg; lognormal variance with pedigree 0.0512, pedigree (2,3,5,1,1)
  Literature (de Wild 2006)
  EcoSpold01Location=RER
  Uncertainty: Literature (de Wild 2006)
  properties: carbon content, fossil 0.857143, dry mass 1 kg, wet mass 1 kg
- polycarbonate: 0.0569345 kg; lognormal variance with pedigree 0.0512, pedigree (2,3,5,1,1)
  EcoSpold01Location=RER
  Literature (de Wild 2006)
  Uncertainty: Literature (de Wild 2006)
  properties: wet mass 1 kg, carbon content, fossil 0.755906, dry mass 1 kg
  note on carbon content, fossil: Polycarbonate means here 2,2-bis(4-hydroxyphenyl)propane polycarbonate – also called bisphenol A polycarbonate ( -(O-C6H4-C(CH3)2-C6H4-O-CO)n- (ecoinvent v2.2 report 11_II), C16H14O3, MW=254 g/mol.
- electricity, medium voltage: 3.55004 kWh; lognormal variance with pedigree 0.0612, pedigree (2,3,5,1,1)
  EcoSpold01Location=UCTE
  Literature (Schwarz 1992)
  Uncertainty: Literature (Schwarz 1992)
- waste plastic, industrial electronics: -0.192573 kg; lognormal variance with pedigree 0.0532, pedigree (2,3,5,5,1)
  Calculation, different geographical location
  EcoSpold01Location=CH
  Uncertainty: Calculation, different geographical location
  production volume 0.23 kg
    (same comment as for waste polystyrene)
  properties: dry mass 0.847 kg, water content 0.180638, carbon content, fossil 0.81386, wet mass 1 kg
  note on carbon content, fossil: C content in 1 kg DM was calculated using data in Tab A.2, ecoinvent v2.2 report 13_I
- waste polyethylene: -0.0251182 kg; lognormal variance with pedigree 0.0532, pedigree (2,3,5,5,1)
  (same comment as for waste polystyrene)
  production volume 0.03 kg
    (same comment as for waste polystyrene)
  properties: dry mass 0.996 kg, wet mass 1 kg, carbon content, fossil 0.825301, water content 0.00401606
  note on carbon content, fossil: C content in 1 kg DM was calculated using data in Tab A.1, ecoinvent v2.2 report 13_I
- electric connector, wire clamp: 0.0418636 kg; lognormal variance with pedigree 0.0512, pedigree (2,3,5,1,1)
  (same comment as for capacitor, film type, for through-hole mounting)
  properties: dry mass 1 kg, carbon content, fossil 0.19653, wet mass 1 kg
- integrated circuit, logic type: 0.00502364 kg; lognormal variance with pedigree 0.0512, pedigree (2,3,5,1,1)
  (same comment as for capacitor, film type, for through-hole mounting)
  properties: wet mass 1 kg, dry mass 1 kg, carbon content, fossil 0.221701
- transistor, wired, small size, through-hole mounting: 0.00669818 kg; lognormal variance with pedigree 0.0512, pedigree (2,3,5,1,1)
  (same comment as for capacitor, film type, for through-hole mounting)
  properties: wet mass 1 kg, dry mass 1 kg, carbon content, fossil 0.080338
  note on carbon content, fossil: Calculated as the addition of C contents in the product composition, and referred to 1 kg DM transistor.
- copper: 0.00167455 kg; lognormal variance with pedigree 0.0512, pedigree (2,3,5,1,1)
  EcoSpold01Location=RER
  Literature (de Wild 2006), recycled after use
  Uncertainty: Literature (de Wild 2006), recycled after use
  properties: wet mass 1 kg, dry mass 1 kg
- polystyrene foam slab: 0.108845 kg; lognormal variance with pedigree 0.0612, pedigree (2,3,5,1,1)
  Literature (Schwarz 1992)
  EcoSpold01Location=RER
  Uncertainty: Literature (Schwarz 1992)
  properties: dry mass 1 kg, wet mass 1 kg, carbon content, fossil 0.859091
  note on carbon content, fossil: XPS consists in 91% of polystyrene, 7% of blowing agent and the re-maining 2% are flame retardants (bromine compounds) and other additives (ecoinvent v2.2 report 7, part XIV, pg69). The chemical formula of polystyrene is (C8H8)n. Here, the blowing agent is CO2.
- metal working factory: 8.72773e-10 unit; lognormal variance with pedigree 0.3526, pedigree (2,4,5,1,1)
  Calculation, based on annual production of electronic component production plant
  EcoSpold01Location=RER
  Uncertainty: Calculation, based on annual production of electronic component production plant
- waste paperboard, unsorted: -0.937745 kg; lognormal variance with pedigree 0.0532, pedigree (2,3,5,5,1)
  (same comment as for waste polystyrene)
  production volume 1.12 kg
    (same comment as for waste polystyrene)
  properties: water content 0.243781, wet mass 1 kg, dry mass 0.804 kg, price 0.03924 EUR2005, carbon content, non-fossil 0.483259
  note on carbon content, non-fossil: C content was calculated for 1 kg DM, using data in Tab A.3, ecoinvent v2.2 report 13_I.
- used printed wiring boards: -0.577551 kg; lognormal variance with pedigree 0.0532, pedigree (2,3,5,5,1)
  Calculation, different geographical location
  EcoSpold01Location=GLO
  Uncertainty: Calculation, different geographical location
  production volume 0.6898 kg
    (same comment as for waste polystyrene)
  properties: dry mass 1 kg, carbon content, fossil 0.193742, carbon content, non-fossil 0.000960142, wet mass 1 kg
  note on carbon content, fossil: Composition of printed wiring boards used to calculate C content

## Sampling procedure
Detailed analysis of materials for one product

## Extrapolations
Packaging materials and energy consumption during production has been scaled down from 2500 W-Inverter.

## Review by Christian Bauer 2009-02-15
passed
none
