# road construction

Dataset: EcoSpold 2, unit process
Geography: CH
Time period: 1990-01-01 to 2019-12-31
Technology level: current
Classification: EcoSpold01Categories: transport systems/road
Classification: ISIC rev.4 ecoinvent: 4210:Construction of roads and railways
Scenario: Business-as-Usual
System model: Allocation at the point of substitution
Generated by: Michael Spielmann (obsolete)
Published in: Spielmann M. 2007
Database: ecoinvent
isCopyrightProtected: true
accessRestrictedTo: 1

## General comment
The dataset represents the expenditures and interventions due to the provision of road, tunnel and bridge infrastructures, the renewal of different road layers and eventual road disposal. All environmental exchanges refer to one meter and year (m*a). Road provision is therefore modelled as a constant renewal rather than as a one-time expenditure and end-of-life, and is assumed directly related to gross vehicle weight (vehicle plus load). In the transport datasets the value of 5.37E-04 m*y per gross ton vehicle km should be applied. The dataset is based on a modeling of Swiss motorways and Class 1, 2 & 3 roads as described in the following sources:

Bundesamt für Statistik (2000) Mobilität in der Schweiz. Ergebnisse des Mikrozensus 2000 zum Verkehrsverhalten. Bundesamt für Statistik, Bern.

Maibach et al. (1999) Ökoinventar Transporte: Grundlagen für den ökologischen Vergleich von Transportsystemen und den Einbezug von Transportsystemen in Ökobilanzen. Technischer Schlussbericht. In: Schweizerischer Nationalfonds zur Förderung der wissenschaftlichen Forschung (ed. SPP Umwelt M.). 2nd Edition. INFRAS, Zürich.

The operation and maintenance of roads then refers to aspects of lighting, weed control, line marking, etc. rather than the replacement and repair of road sections and is therefore directly related to km use. Operation and maintenance are not considered in this road construction dataset.

## Included activities start
The dataset starts with land trransformation for the construction/replacement of roads.

## Included activities end
The dataset ends with the replacement of road, tunnel and bridge infrastructures.

The dataset includes the land, material and energy uses and the construction processes (excavation). It also includes the NMVOC and particulate matter emissions, and the eventual disposal of the road infrastructures as a continous process of renewal.

The dataset does not include road operation and maintenance.

## Geography
Data refers to average conditions in Switzerland. For de icing activities, a recent Austrian has been applied.

## Technology
In order to account for the environmental interventions due to road construction (road, tunnel and bridge) generic data for the Swiss road infrastructure is employed. The figures presented are based on inventories generated by Maibach et al. (1999). Due to the fact that different layers of a road are characterised by various life spans, the data is presented for 1 meter of road and 1 year. Different road types have been distinguished; namely motorway (Nationalstrassen) and three different classes (1st class road, 2nd class road and 3rd class road) of the Swiss Road network. For all categories, layers and materials are recorded, according to their life span. For the calculation of material expenditures per m bitumen road, recycling rates have been estimated. For the road foundation, a recycling rate of 50% has been assumed. For the surfacing and for the subgrade no recycling has been assumed. The subgrade will be removed after 100 years and the street must be completely re-constructed. For concrete roads, no recycling is as-sumed. VOC emissions in road construction originate from the use of bitumen. Significant emissions of VOC emissions result from paving works in particular from the use of bitumen solvents for road surface treatments. Bitumen emulsions are characterised by a small solvent content less than 5g/kg. The yearly mass load in Switzerland is estimated with 3.6%. Hot spray bituminous binders contribute approximately 1.6% of the yearly bitumen consumption for road construction in Switzerland and are characterised by a fairly high solvent content: 90-140 g/kg bitumen Stolz (2001). Moreover, during thermic processes of solvent free bitumen VOC emissions occur. These emissions significantly change with the processing temperature and the bitumen type used. In this study, we employ an emission factor of 12kg NMVOC/t bitumen available from BUWAL (1995). Data of particulate emissions from mechanical processes and activities on road construction sites are available from Stolz (2001). The size distribution has been adjusted to comply with the size distribution used in this project.
References:
Maibach M., Peter D. and Seiler B. (1999) Ökoinventar Transporte: Grundlagen für den ökologischen Vergleich von Transportsystemen und den Einbezug von Transportsystemen in Ökobilanzen. Technischer Schlussbericht. In: Schweizerischer Nationalfonds zur Förderung der wissenschaftlichen Forschung (ed. SPP Umwelt M.). 2nd Edition.
Stolz J. (2001) Luftschadstoff-Emissionen von Strassenbaustellen. Teil I: PAH und VOC. Nr. 126. Bundesamt für Umwelt, Wald und Landschaft (BUWAL), Bern
BUWAL (1995) Handbuch: Emissionsfaktoren für stationäre Quellen. Bundesamt fuer Umwelt, Wald und Landschaft, Bern
Wresowar M. and Sieghardt M. (2000) Studie über die Auswirkung stickstoffhältiger Auftaumittel. Auswirkungen auf Boden und Bewuchs. Vergleich mit herkömmlichen Auftaumitteln. pdf-file from http://www.magwien.gv.at/ma22/pool/doc/auftaumittel.pdf.
Hüsler W., Willi E., Meier E., Bachmann P. and Brodkowski L. (1989) Verkehrsflächen der Schweiz: Groberhebung. zur Raumplanung. Bundesamt für Raumplanung (BRP), Bern as pdf-File under: N
BfS (2000) Mobilität in der Schweiz. Ergebnisse des Mikrozensus 2000 zum Verkehrsverhalten. Bundesamt für Statistik, Bern
BFE (2003) Gesamte Erzeugung und Abgabe Elektrischer Enegie in der Schweiz. 1991. Bundesamt für Energie, Bern, Online-Version under: http://www.energie-schweiz.ch/.

## Time period
Road lenght is based on Swiss statistical data (2000). The material consumption represents a situation in the early 1990ties.The road and embakement area are based on a study from 1995 and have been modufied with current road infrastructure data. Road lenght is based on the same statistical data (2000).

## Parameters
- road network, Switzerland: 71150 km; name road_network_CH
  The length of the Swiss road network considering motorways and Class 1, 2 & 3 roads.
  Data from:
  Bundesamt für Statistik (2000) Mobilität in der Schweiz. Ergebnisse des Mikrozensus 2000 zum Verkehrsverhalten. Bundesamt für Statistik, Bern.
  Maibach et al. (1999) Ökoinventar Transporte: Grundlagen für den ökologischen Vergleich von Transportsystemen und den Einbezug von Transportsystemen in Ökobilanzen. Technischer Schlussbericht. In: Schweizerischer Nationalfonds zur Förderung der wissenschaftlichen Forschung (ed. SPP Umwelt M.). 2nd Edition. INFRAS, Zürich.

## Reference product
- road: 1 m*year; CPC 53211: Highways (except elevated highways), streets and roads; By-product classification allocatable product
  EcoSpold01Location=CH
  production volume 7.115e7 m*year; name annual_road; = road_network_CH*1000
    1 m*y refers to the provision of 1m road as a function of the relative lifetime of its parts. The annual production volume is therefor the length of the road network which it is representing.
  property price 4.70928 EUR2005
    Calculated based on inputs: The price of the product has been calculated as a sum of the values of the material and energy inputs for this product. This value is therefore a rough estimation. It may underestimate the real price since there are additional expenses when producing any product. These expences can include for example labour costs, treatment of waste materials and profit for the producer. Please consider carefully whether this level of data quality is acceptable for your application.
  property true value 4.70928
    allocation property applied in "true value" allocation // value calculated from revenue

## By-products
- iron scrap, sorted, pressed: 0 kg; By-product classification Recyclable; CPC 39310: Slag, dross, scalings and other waste from the manufacture of iron or steel; pedigree (1,1,1,1,1)
  Iron scrap recovered from this waste.
  Uncertainty: uncertainty calculated from uncertainty in waste composition, uncertainty of share of recyclable metal, uncertainty of transfer coefficient to bottom ash, uncertainty of the efficiency of scrap removal in MSWI plant.
  production volume 2.70436e6 kg
  property price 0.175 EUR2005
    Temporary price data. Calculated as 90% of purchasers price based on: 2005 import and export prices (total trades (USD) divided by total weight (kg) in biggest economies of the world: EU27, USA, Brasil, China, India, Japan and Russia) from UN Commodity Trade Statistics Database (http://data.un.org/Explorer.aspxDatabase [Accessed 2011.06.20]). Commodity: Waste or scrap, of cast iron
  property carbon content 0
    carbon content on a dry matter basis (reserved; not for manual entry)
  property true value 0.00665163
    allocation property applied in "true value" allocation // value calculated from revenue
  properties: wet mass 1 kg, water in wet mass 0 kg, carbon content, non-fossil 0, carbon content, fossil 0, dry mass 1 kg, water content 0, carbon allocation 0 kg

## Inputs from technosphere
- scrap steel: -0.351174 kg; name scrap_steel; = (steel1+steel2)*-1; lognormal variance with pedigree 0.0526, pedigree (3,3,5,1,1)
  Calculated value.
  Uncertainty: literature studies and own calculations
  production volume 2.50213e7 kg; = annual_road*scrap_steel
    Calculated from production volume of reference product using the relative outputs.
  property water in wet mass 0 kg; name WWM
  property dry mass 1 kg; name DM
  property carbon content, non-fossil 0; name C_content_non_fossil
  property wet mass 1 kg; name WM
  property carbon content, fossil 0; name C_content_fossil
  property water content 0; name water_content
  property price 0 EUR2005; name scrap_steel_price_EUR2005
- steel, low-alloyed, hot rolled: 0.00765918 kg; name steel2; source Maibach M. 1999; lognormal variance with pedigree 0.0526, pedigree (3,3,5,1,1)
  Calculated value. Literature studies and own calculations.
  EcoSpold01Location=RER
  Uncertainty: literature studies and own calculations
  properties: wet mass 1 kg, dry mass 1 kg, carbon content, fossil 0.005
  note on carbon content, fossil: Low alloyed steel composition given in Tab. 3.2 ecoinvent v2.2 report 10_partII. Steel assumed to have a C content of 0.5%
- diesel, burned in building machine: 36.2488 MJ; source Frischknecht R. 1996; lognormal variance with pedigree 0.0526, pedigree (3,3,5,1,1)
  Calculated value. The figures are derived from Frischknecht et al. (1996).
  EcoSpold01Location=GLO
  Uncertainty: literature studies and own calculations
- electricity, medium voltage: 3.94443 kWh; source Maibach M. 1999; lognormal variance with pedigree 0.0526, pedigree (3,3,5,1,1)
  EcoSpold01Location=CH
  Calculated value. Data of particulate emissions from mechanical processes and activities on road construction sites are available from Stolz (2001). The size distribution has been adjusted to comply with the size distribution used in this project.
  Uncertainty: literature studies and own calculations. Pedigree matrix set according to expert judgment.
- bitumen adhesive compound, hot: 3.23543 kg; name bitumen; source Maibach M. 1999; lognormal variance with pedigree 0.0526, pedigree (3,3,5,1,1)
  Calculated value. Data of particulate emissions from mechanical processes and activities on road construction sites are available from Stolz (2001). The size distribution has been adjusted to comply with the size distribution used in this project.
  Uncertainty: literature studies and own calculations
  properties: wet mass 1 kg, carbon content, fossil 0.83, dry mass 1 kg
- gravel, crushed: 105.85 kg; name gravel; source Wresowar M. 2000; lognormal variance with pedigree 0.0526, pedigree (3,3,5,1,1)
  EcoSpold01Location=CH
  106 kg gravel is used during the construction of road. Calculated value. Literature studies and own calculations.
  2.11 kg gravel is used during the maintenance of road. Calculated value. For the determination of the use of salt and gravel for icy roads on highways and 1.class roads, data from a recent Austrian study Wresowar & Sieghardt (2000) have been used.
  Uncertainty: literature studies and own calculations. Pedigree matrix set according to expert judgment.
  properties: wet mass 1 kg, dry mass 1 kg
- inert waste, for final disposal: -109.089 kg; name waste_aggregates; = (gravel+concrete+bitumen)*-1; lognormal variance with pedigree 0.0676099, pedigree (1,1,5,1,1)
  EcoSpold01Location=CH
  Calculated value.
  production volume 7.77267e9 kg; = annual_road*waste_aggregates
    Calculated from the production volume of road in proportion to the respective output amounts.
  property price 0 EUR2005; name waste_aggregates_price_EUR2005
  properties: water content 0.00502513, dry mass 0.995 kg, wet mass 1 kg
- excavation, skid-steer loader: 0.241659 m3; = 0.18+0.062; source Stiller H. 1993; lognormal variance with pedigree 0.1826, pedigree (3,3,5,1,1)
  Calculated value. The figures are derived from Stiller (1993).;activityLink introduced to establish a direct link to the corresponding regional supply of this product
  EcoSpold01Location=RER
  Uncertainty: literature studies and own calculations
- concrete, for de-icing salt contact: 0.00341383 m3; name concrete; = 7.88/concrete_DM; source Maibach M. 1999; lognormal variance with pedigree 0.0526, pedigree (3,3,5,1,1)
  EcoSpold01Location=CH
  Calculated value. For the calculation of material expenditures per m bitumen road, recycling rates have been estimated. For the road foundation, a recycling rate of 50% has been assumed. For the surfacing and for the subgrade no recycling has been assumed. The subgrade will be removed after 100 years and the street must be completely re-constructed. For concrete roads, no recycling is assumed.
  Uncertainty: literature studies and own calculations
  property dry mass 2305 kg; name concrete_DM
  properties: wet mass 2455 kg, water content 0.0650759
- reinforcing steel: 0.343515 kg; name steel1; source Maibach M. 1999; lognormal variance with pedigree 0.0526, pedigree (3,3,5,1,1)
  EcoSpold01Location=RER
  Calculated value. Literature studies and own calculations.
  Uncertainty: literature studies and own calculations
  properties: dry mass 1 kg, wet mass 1 kg, carbon content, fossil 0.004

## Inputs from nature
All rows: source Bundesamt für Statistik (BfS) 2000
- Occupation, traffic area, road network [natural resource, land]: 6.42093 m2*year; lognormal variance with pedigree 0.1707, pedigree (2,2,5,1,5)
  Calculated value. The data employed for the road traffic area is based on a comprehensive assessment of land occupation due to Swiss traffic infrastructure in Hüsler et al. (1989). These data has been modified according to recent changes in the Swiss Road network Bundesamt für Statistik (BfS) (2000). Maintenance and land use
  Additional References:
  Hüsler W., Willi E., Meier E., Bachmann P. and Brodkowski L. (1989) Verkehrsflächen der Schweiz: Groberhebung. zur Raumplanung. Bundesamt für Raumplanung (BRP), Bern.
  Uncertainty: literature studies and own calculations
- Transformation, to traffic area, rail/road embankment [natural resource, land]: 0.00336525 m2; lognormal variance with pedigree 0.04, pedigree (1,1,5,1,1)
  Calculated value. Maintenance and land use
- Transformation, to traffic area, road network [natural resource, land]: 0.00762922 m2; lognormal variance with pedigree 0.04, pedigree (1,1,5,1,1)
  Calculated value. Maintenance and land use
- Occupation, traffic area, rail/road embankment [natural resource, land]: 1.35808 m2*year; lognormal variance with pedigree 0.1707, pedigree (2,2,5,1,5)
  (same comment as for Occupation, traffic area, road network)
- Transformation, from unspecified [natural resource, land]: 0.0109845 m2; lognormal variance with pedigree 0.04, pedigree (1,1,5,1,1)
  Calculated value. Maintenance and land use

## Emissions to nature
- NMVOC, non-methane volatile organic compounds, unspecified origin [air, unspecified]: 0.038945 kg; source BUWAL 1995; lognormal variance with pedigree 0.1086, pedigree (4,3,5,1,1)
  0.0389 kg NMVOC is used during the construction of road. Literature value. In this study, is employed an emission factor of 12kg NMVOC/t bitumen available from BUWAL (1995).
  Uncertainty: literature studies and own calculations. Pedigree matrix set according to expert judgment.
- Particulates, > 2.5 um, and < 10um [air, unspecified]: 0.023367 kg; source Stolz J. 2001; lognormal variance with pedigree 0.1746, pedigree (3,3,5,5,1)
  (same comment as for bitumen adhesive compound, hot)
- Particulates, > 10 um [air, unspecified]: 0.081385 kg; source Stolz J. 2001; lognormal variance with pedigree 0.04, pedigree (1,1,5,1,1)
  Calculated value. Data of particulate emissions from mechanical processes and activities on road construction sites are available from Stolz (2001). The size distribution has been adjusted to comply with the size distribution used in this project.

## Sampling procedure
national statistics and literature

## Review by Emilia Moreno Ruiz 2012-03-19
trainee DS, ok, Liliane Klemann

## Review by Christian Bauer 2012-09-28
passed

## Review by Niels Jungbluth 2003-08-29
passed
self validation
