# treatment of scrap steel, inert material landfill

Dataset: EcoSpold 2, unit process
Geography: Europe without Switzerland
Time period: 1995-01-01 to 2019-12-31
Technology level: current
Classification: EcoSpold01Categories: waste management/inert material landfill
Classification: ISIC rev.4 ecoinvent: 3821:Treatment and disposal of non-hazardous waste
Tags: Treatment
Scenario: Business-as-Usual
System model: Allocation at the point of substitution
Generated by: [System]
Database: ecoinvent
isCopyrightProtected: true
accessRestrictedTo: 1

## General comment
This dataset represent scrap steel deposition on inert material landfill.

## Included activities end
No direct emissions from inert material landfill (leachate) are inventoried as deemed negligible. Module contains only exchanges to process-specific burdens (energy, land use) and infrastructure.

## Geography
Specific to the technology encountered in Switzerland in 2000. It is assumed, that this technology is valid for other European countries as well.

## Technology
landfill with renaturation after closure. 50% of the sites feature a base seal and leachate collection system.

## Reference product
- scrap steel: -1 kg; CPC 39310: Slag, dross, scalings and other waste from the manufacture of iron or steel; By-product classification Waste; CAS 7439-89-6
  production volume 1.6472e11 kg; = 511551656000*0.322
    Calculated. Scaled down from the global production volume using GDP.
    The GDP of Europe without Switzerland in 2005 was 32.2% of the global GDP.
    The global production volume is an estimated value. 585billion kg of scrap steel is produced in the World (Statista 2014 & World steel association 2012). 88% of this is recycled (Bureau of international recycling 2015). 3.2E+09 is sent to incineration and 4.8344E+07 is sent to incineration with fly ash extraction (Switzerland). The remaining is assumed to be landfilled.
    Bureau of international recycling (2015) World steel recycling in figures 2010-2014
    Statista (2014) http://www.statista.com/statistics/270835/world-steel-production-and-scrap-consumption/, accessed 6th of May 2016
    World steel association (2012) Steel confirmed as most recycled packaging material in two regions of the world. Retrieved from: <https://www.worldsteel.org/media-centre/Steel-news/Steel-confirmed-as-most-recycled-packaging-material-in-two-regions-of-the-world.html>, accessed 6th of May 2016
  property price 0 EUR2005
    Waste products are assigned a price of zero as they are assumed to require further treatment.
  property carbon content 0
    carbon content on a dry matter basis (reserved; not for manual entry)
  properties: dry mass 1 kg, water in wet mass 0 kg, carbon content, non-fossil 0, water content 0, wet mass 1 kg, carbon content, fossil 0, carbon allocation 0 kg

## Inputs from technosphere
- process-specific burdens, inert material landfill: 1 kg; lognormal variance with pedigree 0.042, pedigree (1,1,5,5,1)
  process-specific burdens per kg waste, uncerteinty heeded in module.
- inert material landfill: 1.48e-9 unit; lognormal variance with pedigree 0.042, pedigree (1,1,5,5,1)
  landfill infrastructure per kg waste, uncerteinty heeded in module.

## Extrapolations
This dataset has been extrapolated from year 1995 to the year of the calculation (2019). The uncertainty has been adjusted accordingly.
