# electricity production, natural gas, conventional power plant

Dataset: EcoSpold 2, unit process
Geography: CN-YN
Time period: 1990-01-01 to 2019-12-31
Technology level: current
Classification: EcoSpold01Categories: natural gas/power plants
Classification: ISIC rev.4 ecoinvent: 3510:Electric power generation, transmission and distribution
Tags: China; natural gas power; fossil fuels
Scenario: Business-as-Usual
System model: Allocation at the point of substitution
Generated by: Karin Treyer
Published in: Faist Emmenegger, M. 2007
Database: ecoinvent
isCopyrightProtected: true
accessRestrictedTo: 1

## General comment
This dataset represents the production of high voltage electricity in a conventional steam boiler natural gas power plant without CHP (combined heat and power) in China - Yunnan in 2012.
For electricity production with natural gas, four different datasets relying to different power plant types exist:
- conventional power plant with / without CHP
- combined cycle power plant with / without CHP
The total amount of electricity produced with natural gas has therefore been allocated to these four types and is modelled in four different datasets (see parameter gross electricity production for information). The resulting shares in China amount to 9% (conventional w/o CHP), 0% (conventional with CHP), 91% (combined cycle w/o CHP), 0% (combined cycle with CHP) and are used for split in the individual provinces.
At the moment, these different types are mainly modelled based on different electrical and thermal efficiency values.
The efficiency calculations are based on IEA/OECD statistics (fuel input vs. electricity/heat produced) and own calculation assumptions. Reducing factors such as contaminations of important plant parts, cooling conditions or part load have been taken into account. Even if efficiencies vary with different surrounding temperatures, temperature adjustments would be related to high uncertainties.
Water is used for wet cooling and as feed water in the steam circuit. In this dataset, 100% wet cooling and no once-through cooling is assumed.
EMISSIONS:
Different sources served as basis for assumption of average emissions. Where possible, the most recent sources were taken into account, whereas older sources were taken in order to determine the remaining data gaps. The emissions have been calculated for the former UCTE region* and have been taken over as such for all countries (uncertainty adjusted accordingly). See ecoinvent report 'Erdgas' given as main source for details (Tab. 11.15). In the following a short overview:
- Emissions of NOx, CO, CO2, SO2, particles, N2O and CH4 are mainly taken from CORINAIR 2001, EPA, and a variety of other data sources
- NOx emissions are a major challenge in natural gas power plants. With rising temperature, emissions also rise; band widths of NOx emissions in literature are correspondingly large. There are several methods to diminish these emissions.
- CO is a result of incomplete burning. For economic and technical reasons, plant combustion is optimized and CO emissions are low.
- CO2 and SO2 emissions are dependent on the composition of the used fuel. Due to the low sulfur content of the used natural gas, no desulfurization has to take place.
- Organic compound emissions are estimated on the basis of EPA 1998.
- Particles are assumed to be smaller than 2.5 micro-m
*former UCTE: Union for the Coordination of the Transmission of Electricity, since 2009 replaced by ENTSO-E European Network of Transmission System Operators for Electricity.
Sources:
- CORINAIR 2001. EMEP/CORINAIR 2001: Joint EMEP/CORINAIR Atmospheric Emission Inventory Guidebook, Third Edition. Copenhagen: European Environment Agency, 2001. http://reports.eea.eu.int/technical_report_2001_3/en.
- EPA 1998. US Environmental Protection Agency (1998). Compilation of Air Pollutant Emission Factors, AP-42, Fifth Edition, Volume I: Chapter 1: External Combustion Sources, Natural Gas Combustion - Final Section - Supplement D , July 1998. CHIEF (Clearinghouse for Inventories and Emission Factors). Research Triangle Park, North Carolina. http://www.epa.gov/ttn/chief/ap42/.
- Rentz O., Karl U., Peter H. (2002). Ermittlung und Evaluierung von Emissionsfaktoren für Feuerungsanlagen in Deutschland für die Jahre 1995, 2000 und 2010. Deutsch- Französisches Institut für Umweltforschung, Uni Karsruhe. Endbericht. Im Auftrag des Umweltbundesamtes. Forschungsbericht 299 43 142. Umweltbundesamt. Berlin.
[This dataset is meant to replace the following datasets:]

## Included activities start
From the constructed natural gas power plant ready to produce electricity.

From reception of natural gas and operating materials at power plant/factory gate

## Included activities end
This activity ends with 1kWh of high voltage electricity produced at the power plant and arrived at the busbar.

This dataset includes:
- all operation and maintenance activities and materials of the power plants.
- Cooling: It is a assumed that all plants use wet cooling with a cooling tower.No cooling tower is included in this dataset (will be implemented in future versions)
- decarbonised water use for reduction of NOx emissions

This dataset doesn't include
- raw materials extraction, decommissioning and waste treatment as these activities are already included in the infrastructure datasets.
- transformation of the electricity produced.

## Technology
Conventional natural gas power plant of 100MWe. The plant is used for middle load with 5000 hours of operation at full capacity per year. The plant is assumed to operate 180000 hours during its lifetime.

## Time period
The Annual Production Volume is valid for the year 2012.

## Parameters
- losses from gross electricity production: 0.08 dimensionless; name losses_gross_net; lognormal variance with pedigree 0.003525, pedigree (3,2,2,2,2)
  Calculated value. Own use of electricity plants in this country in 2012. For the non-OECD countries, the losses were first calculated for the total electricity sector based on the IEA electricity information 2014, table 1.1 (net electricity = gross electricity minus own use). However, this value can be very low if the share of electricity from fossiles is low in a specific country. Therefore, the default loss as described by the IEA in the electricity statistic is applied, which is 0.07 (IEA electricity information 2014: The difference between gross and net electricity production is generally observed to be about 7% for conventional thermal stations, 1% for hydro stations and 6% for nuclear.)
  IEA. 2014. Electricity Information 2014. ISBN 978-92-64-21692-1. International Energy Agency (IEA), Paris Cedex (FR).
  nan
  Uncertainty: generic IEA value used
- efficiency: 0.23 dimensionless; lognormal variance with pedigree 0.017225, pedigree (4,3,1,2,3)
  For China, the efficiencies of thermal power plants are calculated based on SONG et al, Getting Every Ton of Emissions Right: An Analysis of Emission Factors for Purchased Electricity in China, World Resources Institute, June, 2013
  http://www.wri.org/publication/getting-every-ton-emissions-right.'
  , using the total fuel input (kWh) estimated by lower heating value and the amount of net electricity supplied. Note that although fuel input data is available by type of fuel, electricity output is only available for the total thermal power sector. Thus it is not possible to calculate the efficiency by individual fuel, but the same value is applied in all electricity production datasets in China with hard coal, natural gas and oil.
  output relative to input (requires additional specification)
- factor: input of MJ for the production of 1 kWh: 15.6522 MJ/kWh; name factor_MJ_kWh; = 1*3.6/efficiency; lognormal variance with pedigree 0.0532, pedigree (4,4,3,4,4)
  Calculated value. 3.6 MJ = 1kWh.
  nan
- gross electricity production: 9.10293e7 kWh; name gross_electricity; lognormal variance with pedigree 0.0095, pedigree (4,2,2,1,2)
  Literature value/calculated value. Data from the China Electric Power Yearbook 2013 (Chinese National Bureau of Statistics) for 2012, which provides data on gross electricity production in each CN Province with various energy sources. Data were given for the electricity production with total 'thermal power' . This total production is split to production with coal, natural gas and oil fuels based on the information on China in the IEA electricity information 2014 and the Energy balances of non-OECD countries. There, data are provided for electricity production with natural gas in electricity/CHP plants with a simple or combined cycle. The necessary split (see general comment) for modelling in ecoinvent is made based on information for total CN (not specific to this province) in the Energy baalnces (amount of electricity produced in electricity only and CHP plants) and information on installed electrical capacity with natural gas in the WEPP database.
  China Electric Power Yearbook 2013. China Electric Power Yearbook Editorial Department and National Bureau of Statistics (in Chinese)
  IEA. 2014. Electricity Information 2014. ISBN 978-92-64-21692-1. International Energy Agency (IEA), Paris Cedex (FR).
  IEA/OECD. 2014. Energy balances of non-OECD countries 2014. International Energy Agency (IEA), Paris Cedex (FR).
  WEPP 2014. World Electric Power Plants Database. PLATTS McGraw Hill Financial. http://www.platts.com/products/world-electric-power-plants-database
  nan
- fraction, cooling water, to air: 0.0159178; name fraction_CW_to_air; = (WConsumption_EP_NG_recirculatingCS*recirculating_CS_fraction_from_allCS+WConsumption_EP_NG_onceT_andCP_CS*once_through_andCP_CS_fractio_from_allCS)/(WWithdrawal_EP_NG_recirculating_CS*recirculating_CS_fraction_from_allCS+WWithdrawal_EP_NG_onceT_andCP_CS*once_through_andCP_CS_fractio_from_allCS); lognormal variance with pedigree 0.092025, pedigree (4,4,3,2,4)
  Calculated
  nan
- recirculating cooling system as a fraction of all cooling systems: 0.375 dimensionless; name recirculating_CS_fraction_from_allCS; lognormal variance with pedigree 0.092025, pedigree (4,4,3,2,4)
  Calculated as an average of data available for Europe (Floerke, 2008, Future changes of freshwater needs in the electricity production sector) and USA (NERL, 2011, Estimating freshwater needs to meet future thermoelectric generation requirements).
  nan
- fraction, water, decarbonised, to air: 0.0159178; name fraction_WDC_to_air; = fraction_CW_to_air; lognormal variance with pedigree 0.092025, pedigree (4,4,3,2,4)
  Calculated value. See comments in the other parametres present in this dataset. Decarbonised water is considered to be always used as cooling water, thus cooling water fractions to air are applied to all carbonised water input flows to calculate the amount of water consumed in the processes.
  nan
- water withdrawal, electricity production from NG, once-T and coolingP CS: 0.098 m3/kWh; name WWithdrawal_EP_NG_onceT_andCP_CS; lognormal variance with pedigree 0.092025, pedigree (4,4,3,2,4)
  Estimated based on literature (Scown, 2011, Water Footprint of U.S. Transportation Fuels, SI).
  nan
- fraction, process water, to air: 0.15 dimensionless; name fraction_PW_to_air; lognormal variance with pedigree 0.092025, pedigree (4,4,3,2,4)
  Literature value. In case when no industry/process specific data are available, default evaporation fraction value is used. This value is 15% and is based on literature (Statistics Canada, 2007 & Shaffer, K.H., 2008, Consumptive water use in the Great Lakes Basin, USGS & Shiklomanov, 2003, World Water Resources at the Beginning of the 21st Century) and has been approved by an expert.
  nan
- fraction, water, completely softened, to air: 0.15; name fraction_WCS_to_air; = fraction_PW_to_air; lognormal variance with pedigree 0.092025, pedigree (4,4,3,2,4)
  Calculated value. See comment in the other parametres present in this dataset. Water, completely softened is considered to be always used as process water, thus process water fractions to air are applied to all water, completely softened input flows to calculate the amount of water consumed in the processes.
  nan
- water withdrawal, electricity production from NG, recirculating CS: 0.0021 m3/kWh; name WWithdrawal_EP_NG_recirculating_CS; lognormal variance with pedigree 0.092025, pedigree (4,4,3,2,4)
  (same comment as for water withdrawal, electricity production from NG, once-T and coolingP )
- once-through and cooling pond cooling systems as a fraction of all cooling syste: 0.625 dimensionless; name once_through_andCP_CS_fractio_from_allCS; lognormal variance with pedigree 0.092025, pedigree (4,4,3,2,4)
  (same comment as for recirculating cooling system as a fraction of all cooling systems)
- water consumption, electricity production from NG, recirculating CS: 0.0018 m3/kWh; name WConsumption_EP_NG_recirculatingCS; lognormal variance with pedigree 0.092025, pedigree (4,4,3,2,4)
  (same comment as for water withdrawal, electricity production from NG, once-T and coolingP )
- water consumption, electricity production from NG, once-T and coolingP CS: 0.0005 m3/kWh; name WConsumption_EP_NG_onceT_andCP_CS; lognormal variance with pedigree 0.092025, pedigree (4,4,3,2,4)
  (same comment as for water withdrawal, electricity production from NG, once-T and coolingP )

## Reference product
- electricity, high voltage: 1 kWh; name electricity; CPC 17100: Electrical energy; By-product classification allocatable product
  production volume 8.37469e7 kWh; name electricity_apv; = gross_electricity* (1-losses_gross_net)
    Calculated value
  property price 0.0977 EUR2005
    Temporary price data. Calculated as 90% of purchasers price based on: 94% of the average price (to account for a 6% loss in transformation and transmission) for electricity for industrial consumersin 2005 (excluded taxes). From IEA.
  property true value 0.0977; name electricity_true_value
    allocation property applied in "true value" allocation // value calculated from revenue

## By-products
- heat, for reuse in municipal waste incineration only: 0 MJ; CPC 17300: Steam and hot water; By-product classification allocatable product; pedigree (1,1,1,1,1)
  Net electricity generated from this waste and used in internal MSWI plant energy redistribution.
  Uncertainty: uncertainty is calculated from uncertainties in waste composition and uncertainties in energy efficiency and the uncertainty in internal energy demand
  production volume 0.0510111 MJ
  property exergy 0.1842 MJ; name E_th_prod_MSWI_exergy
    This exergy property is based on the exergy content of the product.
  property price 0.0106 EUR2005; name E_th_prod_MSWI_price_EUR2005
    Average European district heat price from Ecoheatcool and Euroheat 2005-2006, Ecoheat Work package 1: The European heat market. Final report. 10.6 EUR/GJ i s the price of district heat. http://www.solarthermalworld.org/files/Ecoheatcool%20WP1%20Web.pdf?download
  property true value relation 0.1842; name E_th_prod_MSWI_true_value_relation
    property to calculate "true value" from
  property true value 4.00667e-12
    allocation property applied in "true value" allocation // value calculated from true value relation
- electricity, for reuse in municipal waste incineration only: 0 kWh; CPC 17100: Electrical energy; By-product classification allocatable product; pedigree (1,1,1,1,1)
  (same comment as for heat, for reuse in municipal waste incineration only)
  production volume 0.0071843 kWh
  property true value relation 3.6; name E_el_prod_MSWI_true_value_relation
    property to calculate "true value" from
  property price 0.1 EUR2005; name E_el_prod_MSWI_price_EUR2005
    Estimated to be the same price as in case of electricity, medium voltage.
  property exergy 3.6 MJ; name E_el_prod_MSWI_exergy
    This exergy property is based on the exergy content of the product.
  property true value 1.10285e-11
    (same comment as for heat, for reuse in municipal waste incineration only)

## Inputs from technosphere
- gas power plant, 100MW electrical: 8.70261e-10 unit; name gas_power_plant; = factor_MJ_kWh*0.0000000000556; lognormal variance with pedigree 0.1387, pedigree (3,3,4,3,3)
  Literature value/calculated value. Amount of power plant needed for producing 1kWh of electricity, based on the burning of 1MJ of natural gas. Tab. 11.25, p. 143
- natural gas, high pressure: 0.401338 m3; name natural_gas; = factor_MJ_kWh/ natural_gas_Net_Heat_Value; lognormal variance with pedigree 0.002, pedigree (1,1,3,1,1)
  Calculated value
  property heating value, net 39 MJ; name natural_gas_Net_Heat_Value
  properties: wet mass 0.84 kg, dry mass 0.84 kg, carbon content, fossil 0.602381
  note on carbon content, fossil: An average C content of 0.506 kg C/ m3 has been assumed (this average has been calculated using data in Tab 3.5, ecoinvent v2.2 report 6_V
  note on heating value, net: Net (lower) heating (calorific) value at norm conditions (0°C, 101.325 kPa). Literature value.
- water, decarbonised: 3.13043 kg; name water_decarbonised_user; = factor_MJ_kWh*0.2; lognormal variance with pedigree 0.2266, pedigree (4,3,4,1,1)
  Literature value/calculated value. Cooling water, decarbonised, for the cooling water circuit lost when producing 1kWh of electricity, based on the burning of 1MJ of natural gas. Röder et al. 2007, Tab. 9.65 and Tab. 9.66, p. 160f.
  properties: wet mass 1 kg
- residue from cooling tower: -1.56522e-5 kg; name cooling_tower_residue; = (factor_MJ_kWh*0.000001)*-1; lognormal variance with pedigree 1.1067, pedigree (4,3,5,3,3)
  Literature value/calculated value. Mass share of cooling tower needed for producing 1kWh of electricity, based on the burning of 1MJ of natural gas. Weighted average with electricity production data (Itten&Frischknecht 2012) and values of 11 countries
  (AT, BE, DE, ES, FR, GB, IT, JP, LU, NL, US) (Faist Emmenegger et al. 2007)
  Source:
  Itten R. and Frischknecht R. (2012) Life Cycle Inventories of Electricity Mixes and Grid. ESU-services Ltd., Uster, Switzerland.
  production volume 1310.82 kg; = cooling_tower_residue/electricity* electricity_apv
    Calculated from the production volume of electricity produced.
  property price 0 EUR2005; name cooling_tower_residue_price_EUR2005
  properties: wet mass 1 kg, water content 0.428571, carbon content, fossil 0.0544233, dry mass 0.7 kg
- water, completely softened: 0.093913 kg; name water_completely_softened; = factor_MJ_kWh*0.006; lognormal variance with pedigree 0.2266, pedigree (4,3,4,1,1)
  Literature value/calculated value. Feed water for the steam circuit lost when producing 1kWh of electricity, based on the burning of 1MJ of natural gas. Röder et al. 2007, Tab. 9.65 and Tab. 9.66, p. 160f.
  properties: wet mass 1 kg

## Inputs from nature
- Water, cooling, unspecified natural origin [natural resource, in water]: 0.0924783 m3; name water_cooling_UNO_input; = ((recirculating_CS_fraction_from_allCS*WWithdrawal_EP_NG_recirculating_CS)+(once_through_andCP_CS_fractio_from_allCS*WWithdrawal_EP_NG_onceT_andCP_CS))/10.5*factor_MJ_kWh; lognormal variance with pedigree 0.098025, pedigree (4,4,4,2,4)
  Calculated based on literature data.

## Emissions to nature
- PAH, polycyclic aromatic hydrocarbons [air, non-urban air or from high stacks]: 1.25217e-7 kg; name pah; = factor_MJ_kWh*0.000000008; lognormal variance with pedigree 1.1067, pedigree (4,3,5,3,3)
  Literature value/calculated value. Emissions when producing 1kWh of electricity, based on the burning of 1MJ of natural gas. Weighted average with electricity production data (Itten&Frischknecht 2012) and emission values of 11 countries
  (AT, BE, DE, ES, FR, GB, IT, JP, LU, NL, US) (Faist Emmenegger et al. 2007)
  Country emissions values estimate from range of values from different references. See Tab. 11.19, p. 138 in Faist Emmenegger et al. 2007.
  Source:
  Itten R. and Frischknecht R. (2012) Life Cycle Inventories of Electricity Mixes and Grid. ESU-services Ltd., Uster, Switzerland.
- Nitrogen oxides [air, non-urban air or from high stacks]: 0.000574435 kg; name nitrogen_oxides; = factor_MJ_kWh*0.0000367; lognormal variance with pedigree 0.3087, pedigree (3,3,4,3,3)
  Literature value/calculated value. Emissions when producing 1kWh of electricity, based on the burning of 1MJ of natural gas. Weighted average with electricity production data (Itten&Frischknecht 2012) and emission values of 11 countries
  (AT, BE, DE, ES, FR, GB, IT, JP, LU, NL, US) (Faist Emmenegger et al. 2007)
  Country emissions values estimate from range of values from different references. See Tab. 11.15, p. 133f in Faist Emmenegger et al. 2007.
  Source:
  Itten R. and Frischknecht R. (2012) Life Cycle Inventories of Electricity Mixes and Grid. ESU-services Ltd., Uster, Switzerland.
- Lead [air, non-urban air or from high stacks]: 1.61217e-9 kg; name lead; = factor_MJ_kWh*0.000000000103; lognormal variance with pedigree 0.034, pedigree (3,5,4,5,3)
  (same comment as for PAH, polycyclic aromatic hydrocarbons)
- Arsenic [air, non-urban air or from high stacks]: 6.43304e-10 kg; name arsenic; = factor_MJ_kWh*0.0000000000411; lognormal variance with pedigree 0.034, pedigree (3,5,4,5,3)
  (same comment as for PAH, polycyclic aromatic hydrocarbons)
- Selenium [air, non-urban air or from high stacks]: 7.68522e-11 kg; name selenium; = factor_MJ_kWh*0.00000000000491; lognormal variance with pedigree 0.6807, pedigree (3,3,5,3,3)
  (same comment as for PAH, polycyclic aromatic hydrocarbons)
- Chromium [air, non-urban air or from high stacks]: 4.49217e-9 kg; name chromium; = factor_MJ_kWh*0.000000000287; lognormal variance with pedigree 0.034, pedigree (3,5,4,5,3)
  (same comment as for PAH, polycyclic aromatic hydrocarbons)
- Particulates, < 2.5 um [air, non-urban air or from high stacks]: 7.68522e-6 kg; name particulates_lt2_5; = factor_MJ_kWh*0.000000491; lognormal variance with pedigree 0.3087, pedigree (3,3,4,3,3)
  Literature value/calculated value. Emissions when producing 1kWh of electricity, based on the burning of 1MJ of natural gas. Weighted average with electricity production data (Itten&Frischknecht 2012) and emission values of 11 countries
  (AT, BE, DE, ES, FR, GB, IT, JP, LU, NL, US) (Faist Emmenegger et al. 2007)
  Country emissions values estimate from range of values from different references. See Tab. 11.15, p. 133f in Faist Emmenegger et al. 2007. CO is a product of an incomplete combustion.
  Source:
  Itten R. and Frischknecht R. (2012) Life Cycle Inventories of Electricity Mixes and Grid. ESU-services Ltd., Uster, Switzerland.
- Acenaphthene [air, non-urban air or from high stacks]: 1.24122e-11 kg; name acenaphthene; = factor_MJ_kWh*0.000000000000793; lognormal variance with pedigree 0.6807, pedigree (3,3,5,3,3)
  (same comment as for PAH, polycyclic aromatic hydrocarbons)
- Mercury [air, non-urban air or from high stacks]: 1.07687e-9 kg; name mercury; = factor_MJ_kWh*0.0000000000688; lognormal variance with pedigree 0.6807, pedigree (3,3,5,3,3)
  (same comment as for PAH, polycyclic aromatic hydrocarbons)
- Propionic acid [air, non-urban air or from high stacks]: 2.50435e-7 kg; name propionic_acid; = factor_MJ_kWh*0.000000016; lognormal variance with pedigree 1.1067, pedigree (4,3,5,3,3)
  (same comment as for PAH, polycyclic aromatic hydrocarbons)
- Methane, fossil [air, non-urban air or from high stacks]: 1.51983e-5 kg; name methane_fossil; = factor_MJ_kWh*0.000000971; lognormal variance with pedigree 0.6807, pedigree (3,3,5,3,3)
  (same comment as for Nitrogen oxides)
- Benzene [air, non-urban air or from high stacks]: 1.41183e-8 kg; name benzene; = factor_MJ_kWh*0.000000000902; lognormal variance with pedigree 0.6807, pedigree (3,3,5,3,3)
  (same comment as for PAH, polycyclic aromatic hydrocarbons)
- Pentane [air, non-urban air or from high stacks]: 1.8e-5 kg; name pentane; = factor_MJ_kWh*0.00000115; lognormal variance with pedigree 0.6807, pedigree (3,3,5,3,3)
  (same comment as for PAH, polycyclic aromatic hydrocarbons)
- Cobalt [air, non-urban air or from high stacks]: 2.69217e-10 kg; name cobalt; = factor_MJ_kWh*0.0000000000172; lognormal variance with pedigree 0.034, pedigree (3,5,4,5,3)
  (same comment as for PAH, polycyclic aromatic hydrocarbons)
- Dioxins, measured as 2,3,7,8-tetrachlorodibenzo-p-dioxin [air, non-urban air or from high stacks]: 0 kg; name dioxins; = factor_MJ_kWh*2.9E-17; pedigree (1,1,1,1,1)
  (same comment as for PAH, polycyclic aromatic hydrocarbons)
- Manganese [air, non-urban air or from high stacks]: 1.22243e-9 kg; name manganese; = factor_MJ_kWh*0.0000000000781; lognormal variance with pedigree 0.034, pedigree (3,5,4,5,3)
  (same comment as for PAH, polycyclic aromatic hydrocarbons)
- Benzo(a)pyrene [air, non-urban air or from high stacks]: 8.28e-12 kg; name benzo_a_pyrene; = factor_MJ_kWh*0.000000000000529; lognormal variance with pedigree 0.6807, pedigree (3,3,5,3,3)
  (same comment as for PAH, polycyclic aromatic hydrocarbons)
- Sulfur dioxide [air, non-urban air or from high stacks]: 8.95304e-6 kg; name sulfur_dioxide; = factor_MJ_kWh*0.000000572; lognormal variance with pedigree 0.0517, pedigree (3,3,5,3,3)
  (same comment as for PAH, polycyclic aromatic hydrocarbons)
- Ethane [air, non-urban air or from high stacks]: 2.14435e-5 kg; name ethane; = factor_MJ_kWh*0.00000137; lognormal variance with pedigree 0.6807, pedigree (3,3,5,3,3)
  (same comment as for PAH, polycyclic aromatic hydrocarbons)
- Toluene [air, non-urban air or from high stacks]: 2.34783e-8 kg; name toluene; = factor_MJ_kWh*0.0000000015; lognormal variance with pedigree 0.6807, pedigree (3,3,5,3,3)
  (same comment as for PAH, polycyclic aromatic hydrocarbons)
- Butane [air, non-urban air or from high stacks]: 1.44939e-5 kg; name butane; = factor_MJ_kWh*0.000000926; lognormal variance with pedigree 0.6807, pedigree (3,3,5,3,3)
  (same comment as for PAH, polycyclic aromatic hydrocarbons)
- Acetaldehyde [air, non-urban air or from high stacks]: 1.25217e-8 kg; name acetaldehyde; = factor_MJ_kWh*0.0000000008; lognormal variance with pedigree 1.1067, pedigree (4,3,5,3,3)
  (same comment as for PAH, polycyclic aromatic hydrocarbons)
- Hexane [air, non-urban air or from high stacks]: 1.24122e-5 kg; name hexane; = factor_MJ_kWh*0.000000793; lognormal variance with pedigree 0.6807, pedigree (3,3,5,3,3)
  (same comment as for PAH, polycyclic aromatic hydrocarbons)
- Propane [air, non-urban air or from high stacks]: 1.10348e-5 kg; name propane; = factor_MJ_kWh*0.000000705; lognormal variance with pedigree 0.6807, pedigree (3,3,5,3,3)
  (same comment as for PAH, polycyclic aromatic hydrocarbons)
- Water [water, unspecified]: 0.0941666 m3; name water_to_water_unspecified; = (water_completely_softened/1000)*(1-fraction_WCS_to_air)+(water_decarbonised_user/1000)*(1-fraction_WDC_to_air)+water_cooling_UNO_input*(1-fraction_CW_to_air); lognormal variance with pedigree 0.098025, pedigree (4,4,4,2,4)
  Calculated value based on literature values and expert opinion. See comments in the parametres' comment field.
  property fraction, origin: fresh water 0.0335624; name fraction_origin_fresh_water_Ww
  property fraction, origin: unspecified 0.966438; name fraction_origin_unspecified_Ww
  property fraction, origin: salt water 0; name fraction_origin_salt_water_Ww
- Acetic acid [air, non-urban air or from high stacks]: 1.89391e-6 kg; name acetic_acid; = factor_MJ_kWh*0.000000121; lognormal variance with pedigree 1.1007, pedigree (3,3,5,3,3)
  (same comment as for PAH, polycyclic aromatic hydrocarbons)
- Cadmium [air, non-urban air or from high stacks]: 3.53739e-9 kg; name cadmium; = factor_MJ_kWh*0.000000000226; lognormal variance with pedigree 0.034, pedigree (3,5,4,5,3)
  (same comment as for PAH, polycyclic aromatic hydrocarbons)
- Formaldehyde [air, non-urban air or from high stacks]: 5.05565e-7 kg; name formaldehyde; = factor_MJ_kWh*0.0000000323; lognormal variance with pedigree 0.6807, pedigree (3,3,5,3,3)
  (same comment as for PAH, polycyclic aromatic hydrocarbons)
- Water [air, unspecified]: 0.00153597 m3; name water_to_air_unspecified; = (water_completely_softened/1000)*fraction_WCS_to_air+(water_decarbonised_user/1000)*fraction_WDC_to_air+water_cooling_UNO_input*fraction_CW_to_air; lognormal variance with pedigree 0.098025, pedigree (4,4,4,2,4)
  (same comment as for Water)
  property fraction, origin: fresh water 0.0416136; name fraction_origin_fresh_water
  property fraction, origin: unspecified 0.958386; name fraction_origin_unspecified
  property fraction, origin: salt water 0; name fraction_origin_salt_water
- Dinitrogen monoxide [air, non-urban air or from high stacks]: 1.52922e-5 kg; name dinitrogen_monoxide; = factor_MJ_kWh*0.000000977; lognormal variance with pedigree 0.3407, pedigree (3,3,5,3,3)
  (same comment as for Nitrogen oxides)
- Nickel [air, non-urban air or from high stacks]: 6.74609e-9 kg; name nickel; = factor_MJ_kWh*0.000000000431; lognormal variance with pedigree 0.034, pedigree (3,5,4,5,3)
  (same comment as for PAH, polycyclic aromatic hydrocarbons)
- Beryllium [air, non-urban air or from high stacks]: 3.86609e-11 kg; name beryllium; = factor_MJ_kWh*0.00000000000247; lognormal variance with pedigree 0.034, pedigree (3,5,4,5,3)
  (same comment as for PAH, polycyclic aromatic hydrocarbons)
- Carbon monoxide, fossil [air, non-urban air or from high stacks]: 0.000313043 kg; name carbon_monoxide_fossil; = factor_MJ_kWh*0.00002; lognormal variance with pedigree 0.3087, pedigree (3,3,4,3,3)
  (same comment as for Particulates, < 2.5 um)
- Carbon dioxide, fossil [air, non-urban air or from high stacks]: 0.835826 kg; name carbon_dioxide_fossil; = factor_MJ_kWh*0.0534; lognormal variance with pedigree 0.0513, pedigree (3,3,5,3,3)
  (same comment as for Particulates, < 2.5 um)

## Sampling procedure
literature and statistics

## Extrapolations
Data have been taken over from a dataset valid for the time period 2000-2005, relying on sources of the 90th. No changes were made for the 2008 dataset, but uncertainty was adjusted.
All exchange data were extrapolated from datasets of the following 11 countries: AT, BE, DE, ES, FR, GB, IT, JP, LU, NL, US. The data of those countries basically rely on data of the former UCTE (see general comment).

The efficiency is based on IEA/OECD statistics and calculated with own assumptions.

The cooling and feed water use has been overtaken from datasets for electricity production with hard coal or lignite.

## Review by Carl Vadenbo 2015-07-01
The update of the whole electricity sector for the ecoinvent v3.2 database consist of hundreds of datasets. All these datasets have passed through a streamlined review processes where the underlying modelling of production volumes, technology shares and efficiencies was reviewed in detail prior to the datasets being submitted to the database.
