# treatment of municipal solid waste, incineration

Dataset: EcoSpold 2, unit process
Geography: SE
Time period: 2006-01-01 to 2019-12-31
Technology level: current
Classification: ISIC rev.4 ecoinvent: 3821:Treatment and disposal of non-hazardous waste
Synonyms: municipal waste incineration; Siedlungsabfallverbrennung; Kehrichtverbrennung
Scenario: Business-as-Usual
System model: Allocation at the point of substitution
Share of production covered: 1.8 %
Generated by: Karin Treyer
Published in: Doka G. 2013
Database: ecoinvent
isCopyrightProtected: true
accessRestrictedTo: 1

## General comment
This dataset represents the activity of waste disposal of municipal solid waste in a municipal solid waste incinerator (MSWI) // Recommended use of this dataset: For average municipal/communal waste mixture. Not suitable to represent any single specific waste material, like plastics, paper, cardboard. If your waste is a specific mixture of waste materials, inventory the respective waste materials individually. // Inventoried waste contains 92.8% average municipal solid waste, burnable part; 7.23% average municipal solid waste, unburnable (inert) part; . // Waste composition (wet, in ppm): upper heating value 13.05 MJ/kg; lower heating value 11.7 MJ/kg; H2O 225260; O 261060; H 43105; C 338960; S 1532.3; N 3206.1; P 757.42; B 7.3826; Cl 6670; Br 129.32; F 366.39; I 0.012418; Ag 0.73279; As 1.4061; Ba 152.96; Cd 8.0053; Co 1.3807; Cr 139.58; Cu 930.87; Hg 0.65684; Mn 266.19; Mo 2.0065; Ni 52.342; Pb 413.61; Sb 53.368; Se 0.3281; Sn 99.553; V 9.4572; Zn 1127.9; Be 470.85; Sc n.a.; Sr n.a.; Ti 2616.4; Tl n.a.; W n.a.; Si 49786; Fe 23628; Ca 18346; Al 11395; K 2132.7; Mg 2568.9; Na 4741.6; // Share of carbon in waste that is biogenic 61.1%. // Share of metals in waste not oxidised and bulk-recyclable (exclude very small or thin parts) Iron: 72.06%; Alu: 38.71%; Copper: 45.44%. // One kg of this waste produces 0.2221 kg of slag and 0.02224 kg of residues, which are landfilled. Additional solidification with 0.008896 kg of cement. // Net energy production: 1.39MJ/kg electric energy and 2.85MJ/kg thermal energy. // Recovery of metal scrap to recycling: 9.7909g iron scrap, 1.2162g aluminium scrap, 0.12319g copper scrap.

## Included activities start
waste incineration from waste reception gate and delivery into waste bunker at incinerator plant site (without transports to the incinerator)

## Included activities end
Waste-specific short-term emissions to water from leachate. Long-term emissions from landfill to ground water.

## Geography
Specific to the technology mix encountered in Switzerland in 2010. Well applicable to modern incineration practices in Europe, North America or Japan.

## Technology
average Swiss MSWI plants in 2010 (grate incinerators) with electrostatic precipitator for fly ash (ESP), wet flue gas scrubber and 25% SNCR , 42.77% SCR-high dust , 32.68% SCR-low dust -DeNOx facilities and 0% without Denox (weighted according to mass of burnt waste, representing Swiss average). Efficiency of iron scrap separation from slag : 58%. Efficiency of non-ferrous scrap separation from slag : 31%. Gross electric efficiency technology mix 15.84% and Gross thermal efficiency technology mix 28.51%

## Time period
Waste composition as given in literature reference, theoretical data or other source. Transfer coefficients for modern MSWI.

## Reference product
- municipal solid waste: 0 kg; CPC 39910: Municipal waste; By-product classification Waste
  Main reference product of this activity (supply of disposal service).
  production volume 0 kg; = Ref('fe3bf381-fa09-41c4-964f-abfa11000dc5')/ E_el_prod_MSWI* Ref('fe3bf381-fa09-41c4-964f-abfa11000db6', 'ProductionVolume')*(-1)
    Calculated value/estimation. The amount of electricity produced in municipal solid waste incineration plants and supplied to the public electricity grid is known from electricity statistics. The amount of waste treated is estimated based on this electricity amount.
  property price 0 EUR2005
    Waste products are assigned a price of zero as they are assumed to require further treatment.
  property carbon content 0.433204
    carbon content on a dry matter basis (reserved; not for manual entry)
  properties: wet mass 1 kg, carbon content, fossil 0.171549, carbon content, non-fossil 0.261655, dry mass 0.771 kg, water content 0.297017, water in wet mass 0.229 kg, carbon allocation 0.334 kg
- iron scrap, sorted, pressed: 1 kg; By-product classification Recyclable; CPC 39310: Slag, dross, scalings and other waste from the manufacture of iron or steel; pedigree (1,1,1,1,1)
  Iron scrap recovered from this waste.
  Uncertainty: uncertainty calculated from uncertainty in waste composition, uncertainty of share of recyclable metal, uncertainty of transfer coefficient to bottom ash, uncertainty of the efficiency of scrap removal in MSWI plant.
  production volume 5.22696e7 kg

## By-products
- electricity, for reuse in municipal waste incineration only: 0 kWh; name E_el_prod_MSWI; CPC 17100: Electrical energy; By-product classification allocatable product; pedigree (1,1,1,1,1)
  Net electricity generated from this waste and used in internal MSWI plant energy redistribution.
  Uncertainty: uncertainty is calculated from uncertainties in waste composition and uncertainties in energy efficiency and the uncertainty in internal energy demand
  production volume 0 kWh
    Literature value, valid for 2008. Value for electricity from municipal solid waste incineration which is supplied to the public grid.
  property exergy 3.6 MJ; name E_el_prod_MSWI_exergy
    This exergy property is based on the exergy content of the product.
  property true value relation 3.6; name E_el_prod_MSWI_true_value_relation
    property to calculate "true value" from
  property price 0.1 EUR2005; name E_el_prod_MSWI_price_EUR2005
    Estimated to be the same price as in case of electricity, medium voltage.
- iron scrap, sorted, pressed: 0 kg; By-product classification Recyclable; CPC 39310: Slag, dross, scalings and other waste from the manufacture of iron or steel; pedigree (1,1,1,1,1)
  (same comment as for iron scrap, sorted, pressed)
  production volume 0 kg; = Ref('fe3bf381-fa09-41c4-964f-abfa11000dbc')/ Ref('fe3bf381-fa09-41c4-964f-abfa11000dc5')* Ref('fe3bf381-fa09-41c4-964f-abfa11000dc5', 'ProductionVolume')*(-1)
    calculated in proportion to reference product waste input to incinerator
  property price 0.175 EUR2005
    Temporary price data. Calculated as 90% of purchasers price based on: 2005 import and export prices (total trades (USD) divided by total weight (kg) in biggest economies of the world: EU27, USA, Brasil, China, India, Japan and Russia) from UN Commodity Trade Statistics Database (http://data.un.org/Explorer.aspxDatabase [Accessed 2011.06.20]). Commodity: Waste or scrap, of cast iron
  property carbon content 0
    carbon content on a dry matter basis (reserved; not for manual entry)
  properties: dry mass 1 kg, water content 0, carbon content, non-fossil 0, water in wet mass 0 kg, carbon content, fossil 0, wet mass 1 kg, carbon allocation 0 kg
- heat, for reuse in municipal waste incineration only: 0 MJ; name E_th_prod_MSWI; CPC 17300: Steam and hot water; By-product classification allocatable product; pedigree (1,1,1,1,1)
  (same comment as for electricity, for reuse in municipal waste incineration only)
  production volume 0 MJ; = E_th_prod_MSWI/ Ref('fe3bf381-fa09-41c4-964f-abfa11000dc5')* Ref('fe3bf381-fa09-41c4-964f-abfa11000dc5', 'ProductionVolume')*(-1)
    calculated in proportion to reference product waste input to incinerator
  property exergy 0.1842 MJ; name E_th_prod_MSWI_exergy
    This exergy property is based on the exergy content of the product.
  property true value relation 0.1842; name E_th_prod_MSWI_true_value_relation
    property to calculate "true value" from
  property price 0.0106 EUR2005; name E_th_prod_MSWI_price_EUR2005
    Average European district heat price from Ecoheatcool and Euroheat 2005-2006, Ecoheat Work package 1: The European heat market. Final report. 10.6 EUR/GJ i s the price of district heat. http://www.solarthermalworld.org/files/Ecoheatcool%20WP1%20Web.pdf?download
- copper: 0 kg; source Rentz O. 1999; By-product classification allocatable product; CPC 41413: Refined copper and copper alloys, unwrought; master alloys of copper
  Literature value. Copper uses: Before end-use copper is manufactured into semi fabricated products, such as shapes and ingots (known as 'semis'). These manufacturing processes are subdivided into hot working, cold working and, if necessary, process annealing. Few of the semis are ready for use as such. They more typically travel to first-stage manufacturers, who make metal rods, wire, and casting, and then to component manufacturers who produce such things as motors, valves, and insulated cables The components in turn are incorporated by final-stage manufacturers into a variety of finished products - automobiles, commercial buildings, residential housing, and so forth. These uses account for about 79% of the world-wide consumption of copper.
  property price 5.52 EUR2005
    Literature value (http://www.economist.com/news/business/21576714-mining-industry-has-enriched-chile-its-future-precarious-copper-solution). Average price between 20015 and 2013.
  property carbon content 0
    carbon content on a dry matter basis (reserved; not for manual entry)
  properties: dry mass 1 kg, water in wet mass 0 kg, wet mass 1 kg, carbon content, non-fossil 0, water content 0, carbon content, fossil 0, carbon allocation 0 kg
- zinc concentrate: 0 kg; CPC 14290: Other non-ferrous metal ores and concentrates (other than uranium or thorium ores and concentrates); By-product classification allocatable product
  Calculated value from the knowledge of the properties of both products.
  property price 0.38 EUR2005; name ByP_price_EUR2005
    Temporary price data. Calculated as 90% of purchasers price based on: Zinc content in concentrate 53%. Concentrate price per kg Zn 86.5% of refined Zn price (13.5% treatment charges according to CHR Metals Limited 2005: Dynamic cost curves. http://www.minecost.com/dynamic.pdf). 2004 zinc price from USGS (2007) Mineral commodity summaries 2007. <http://minerals.usgs.gov/minerals/pubs/mcs/2007/mcs2007.pdf> [Accessed 25 May 2010]
  property zinc content 0.53; name zinc_C_zinc_concentrate
    Zinc content on a dry matter basis. Value taken from teh "zinc mine operation" /GLO dataset.
  property dry mass 1 kg; name DM_zinc_concentrate
  property carbon content 0
    carbon content on a dry matter basis (reserved; not for manual entry)
  properties: wet mass 1 kg, water content 0, carbon content, non-fossil 0, carbon content, fossil 0, water in wet mass 0 kg, carbon allocation 0 kg
- iron scrap, unsorted: 0 kg; source European Aluminium Association 2008; CPC 39310: Slag, dross, scalings and other waste from the manufacture of iron or steel; By-product classification Recyclable; pedigree (1,1,1,1,1)
  property price 0.149 EUR2005; name ironScrapAmount_price_EUR2005
    Temporary price data. Calculated as 90% of purchasers price based on: estimated at 85% of sorted scrap
  property carbon content 0
    carbon content on a dry matter basis (reserved; not for manual entry)
  properties: water in wet mass 0 kg, water content 0, carbon content, fossil 0, carbon content, non-fossil 0, dry mass 1 kg, wet mass 1 kg, carbon allocation 0 kg
- aluminium oxide, non-metallurgical: 0 kg; source European Aluminium Association 2008; CPC 41432: Alumina (aluminium oxide), except artificial corundum; By-product classification allocatable product; CAS 1344-28-1; pedigree (1,1,1,1,1)
  property carbon content, non-fossil 0; name C_content_non_fossil
  property price 0.28 EUR2005; name Al2O3Amount_price_EUR2005
    From UN trade database. http://data.un.org/ Import data from the largest economies of the world are used (Brazil, India, USA, China, Japan and EU-27).
  property dry mass 1 kg; name DM
  property water content 0; name water_content
  property wet mass 1 kg; name WM
  property water in wet mass 0 kg; name WWM
  property carbon content, fossil 0; name C_content_fossil
  property carbon content 0
    carbon content on a dry matter basis (reserved; not for manual entry)
  properties: carbon allocation 0 kg
- aluminium, cast alloy: 0 kg; source European Aluminium Association 2008; By-product classification allocatable product; CPC 41431: Unwrought aluminium; pedigree (1,1,1,1,1)
  EcoSpold01Location=RER
  property price 1.3 EUR2005; name castAlloyAmount_price_EUR2005
    Temporary price data. Calculated as 90% of purchasers price based on: Source: London Metal Exchange, Aluminium alloy price for 2005
  property carbon content 0
    carbon content on a dry matter basis (reserved; not for manual entry)
  properties: water in wet mass 0 kg, carbon content, non-fossil 0, water content 0, dry mass 1 kg, carbon content, fossil 0, wet mass 1 kg, carbon allocation 0 kg
- aluminium, wrought alloy: 0 kg; source European Aluminium Association 2008; By-product classification allocatable product; CPC 4153: Semi-finished products of aluminium or aluminium alloys; pedigree (1,1,1,1,1)
  property price 1.44 EUR2005; name secondaryAluminiumOutput_price_EUR2005
    Estimated based on literature values and expert judgement. Aluminium ccast alloys are about 90% of the price of aluminium wrought alloys.
  property carbon content 0
    carbon content on a dry matter basis (reserved; not for manual entry)
  properties: wet mass 1 kg, water content 0, carbon content, fossil 0, water in wet mass 0 kg, carbon content, non-fossil 0, dry mass 1 kg, carbon allocation 0 kg

## Inputs from technosphere
- process-specific burdens, slag landfill: 0 kg; pedigree (1,1,1,1,1)
  activityLink introduced to establish a direct link to the corresponding regional supply of this product
  Uncertainty: uncertainty is calculated from uncertainties in waste composition and transfer coefficients in incinerator
- copper scrap, sorted, pressed: 0 kg; pedigree (1,1,1,1,1)
  Copper scrap recovered from this waste.
  Uncertainty: uncertainty calculated from uncertainty in waste composition, uncertainty of share of recyclable metal, uncertainty of transfer coefficient to bottom ash, uncertainty of the efficiency of scrap removal in MSWI plant.
  production volume 0 kg; = Ref('fe3bf381-fa09-41c4-964f-abfa11000dc2')/ Ref('fe3bf381-fa09-41c4-964f-abfa11000dc5')* Ref('fe3bf381-fa09-41c4-964f-abfa11000dc5', 'ProductionVolume')*(-1)
    calculated in proportion to reference product waste input to incinerator
  properties: price 2.84 EUR2005, wet mass 1 kg, dry mass 1 kg
- aluminium scrap, post-consumer, prepared for melting: 0 kg; pedigree (1,1,1,1,1)
  Aluminium scrap recovered from this waste.
  Uncertainty: uncertainty calculated from uncertainty in waste composition, uncertainty of share of recyclable metal, uncertainty of transfer coefficient to bottom ash, uncertainty of the efficiency of scrap removal in MSWI plant.
  production volume 0 kg; = Ref('fe3bf381-fa09-41c4-964f-abfa11000dbf')/ Ref('fe3bf381-fa09-41c4-964f-abfa11000dc5')* Ref('fe3bf381-fa09-41c4-964f-abfa11000dc5', 'ProductionVolume')*(-1)
    calculated in proportion to reference product waste input to incinerator
  properties: dry mass 1 kg, price 0.806 EUR2005, wet mass 1 kg
- waste cement, hydrated: 0 kg; pedigree (1,1,1,1,1)
  Hydrated cement output for solidification of landfilled residual material.
  Uncertainty: Uncertainty calculated from uncertainty of the waste composition of this waste and transfer coefficients in the incinerator and of the solidification recipe.
  production volume 0 kg; = Ref('fe3bf381-fa09-41c4-964f-abfa11000d9b')/ Ref('fe3bf381-fa09-41c4-964f-abfa11000dc5')* Ref('fe3bf381-fa09-41c4-964f-abfa11000dc5', 'ProductionVolume')*(-1)
    calculated in proportion to reference product waste input to incinerator
  properties: dry mass 1 kg, wet mass 1 kg
- process-specific burdens, residual material landfill: 0 kg; pedigree (1,1,1,1,1)
  (same comment as for process-specific burdens, slag landfill)
- water, decarbonised: 0.290714 kg; lognormal variance with pedigree 0.23923, pedigree (1,1,3,1,1)
  Incinerator process water used in flue gas scrubber stage.
  Uncertainty: uncertainty calculated from uncertainty in average water input, and the uncertainty of the waste composition of this waste
  properties: wet mass 1 kg
- chemical, inorganic: 0.000256636 kg; lognormal variance with pedigree 0.27728, pedigree (1,1,3,1,1)
  Auxilliary inputs for the wastewater treatment stage of the incinerator plant. Proxy for Polyelectrolyte.
  Uncertainty: uncertainty calculated from uncertainty in average Polyelectrolyte input, of transfer coefficients in the incinerator, and the uncertainty of the waste composition of this waste
  properties: wet mass 1 kg, dry mass 1 kg, carbon content, fossil 0.003
- municipal waste incineration facility: 0 unit
  Demands per kilogram waste.
- slag landfill: 0 unit; pedigree (1,1,1,1,1)
  Landfill infrastructure required for landfilling of bottom ash.
  Uncertainty: uncertainty is calculated from uncertainties in waste composition and transfer coefficients in incinerator
- iron (III) chloride, without water, in 40% solution state: 0 kg; pedigree (1,1,1,1,1)
  Auxilliary inputs for the wastewater treatment stage of the incinerator plant.
  Uncertainty: uncertainty calculated from uncertainty in average FeCl3 input, of transfer coefficients in the incinerator, and the uncertainty of the waste composition of this waste
  properties: dry mass 1 kg, wet mass 1 kg
- ammonia, liquid: 0.00712879 kg; lognormal variance with pedigree 0.67077, pedigree (1,1,3,1,1)
  Input to DeNOx stage (100% NH3).
  Uncertainty: uncertainty calculated from uncertainty in average DeNOx input, uncertainty in the share of thermal NOx, uncertainty of nitrogen content in average municipal waste and the uncertainty in nitrogen content in *this* waste.
  properties: wet mass 1 kg, dry mass 1 kg
- chromium oxide, flakes: 0 kg; pedigree (1,1,1,1,1)
  Input to DeNOx stage.
  Uncertainty: uncertainty calculated from uncertainty in average DeNOx input, uncertainty in the share of thermal NOx, uncertainty of nitrogen content in average municipal waste and the uncertainty in nitrogen content in *this* waste.
  properties: dry mass 1 kg, wet mass 1 kg
- sodium hydroxide, without water, in 50% solution state: 0.000553315 kg; lognormal variance with pedigree 0.21504, pedigree (1,1,3,1,1)
  Auxilliary inputs for the flue gas treatment stage of the incinerator plant.
  Uncertainty: uncertainty calculated from uncertainty in average NaOH input, of transfer coefficients in the incinerator, and the uncertainty of the waste composition of this waste
  properties: dry mass 1 kg, wet mass 1 kg
- heat, district or industrial, natural gas: 0.00365843 MJ; lognormal variance with pedigree 0.67077, pedigree (1,1,3,1,1)
  Input to DeNOx stage, to heat up flue gas in low-dust SCR.
  Uncertainty: uncertainty calculated from uncertainty in average DeNOx input, uncertainty in the share of thermal NOx, uncertainty of nitrogen content in average municipal waste and the uncertainty in nitrogen content in *this* waste.
- hydrochloric acid, without water, in 30% solution state: 3.25708e-6 kg; lognormal variance with pedigree 0.27728, pedigree (1,1,3,1,1)
  Auxilliary inputs for the wastewater treatment stage of the incinerator plant.
  Uncertainty: uncertainty calculated from uncertainty in average HCl input, of transfer coefficients in the incinerator, and the uncertainty of the waste composition of this waste
  properties: wet mass 1 kg, dry mass 1 kg
- transport, freight, lorry, unspecified: 0 metric ton*km; pedigree (1,1,1,1,1)
  Transport services to transport incineration residues to landfills.
  Uncertainty: uncertainty calculated from uncertainty of the waste composition of this waste, uncertainty of transfer coefficients and the uncertainty in generic transportation distances
- chemical, organic: 5.32403e-5 kg; lognormal variance with pedigree 1.4029, pedigree (1,1,3,1,1)
  Auxilliary inputs for the wastewater treatment stage of the incinerator plant. Proxy for (pure) Trisodium-trimercapto-s-triazine (CAS 17766-26-6), used as 15% diluted solution, aka TMT15.
  Uncertainty: uncertainty calculated from uncertainty in average TMT15 input, of transfer coefficients in the incinerator, and the uncertainty of the waste composition of this waste
  properties: carbon content, fossil 0.628, dry mass 1 kg, wet mass 1 kg
- residual material landfill: 0 unit; pedigree (1,1,1,1,1)
  Landfill infrastructure required for landfilling of incineration residues.
  Uncertainty: uncertainty is calculated from uncertainties in waste composition and transfer coefficients in incinerator
- quicklime, milled, packed: 0 kg; pedigree (1,1,1,1,1)
  Auxilliary inputs for the flue gas treatment stage of the incinerator plant.
  Uncertainty: uncertainty calculated from uncertainty in average CaO input, of transfer coefficients in the incinerator, and the uncertainty of the waste composition of this waste
  properties: water content 0.010101, dry mass 0.99 kg, wet mass 1 kg
- cement, unspecified: 0 kg; pedigree (1,1,1,1,1)
  Cement required for solidification of landfilled residual material.
  Uncertainty: Uncertainty calculated from uncertainty of the waste composition of this waste, of transfer coefficients in the incinerator and of the solidification recipe.
  properties: dry mass 1 kg, wet mass 1 kg
- titanium dioxide: 0 kg; pedigree (1,1,1,1,1)
  Input to DeNOx stage (TiO2 catalyst carrier)
  Uncertainty: uncertainty calculated from uncertainty in average DeNOx input, uncertainty in the share of thermal NOx, uncertainty of nitrogen content in average municipal waste and the uncertainty in nitrogen content in *this* waste.
  properties: wet mass 1 kg, dry mass 1 kg
- water, completely softened: 0.0572466 kg; source Jungbluth, N. 2007, p. Tab. 12.10 p. 228; lognormal variance with pedigree 0.0027, pedigree (2,2,3,1,1)
  Literature data for this country
  Amount was scaled to the amount of reference product.
  Literature data for this country
  Amount was scaled to the amount of reference product.
- municipal solid waste: -0.000115285 kg; source Jungbluth, N. 2007; lognormal variance with pedigree 0.0039, pedigree (2,3,3,3,1)
  Average of literature data
  Amount was scaled to the amount of reference product.
  production volume 11495.9 kg
- heavy fuel oil: 0.139454 kg; source Jungbluth, N. 2007; lognormal variance with pedigree 0.0027, pedigree (2,2,3,1,1)
  Literature data for heating value
  Amount was scaled to the amount of reference product.
- waste mineral oil: -0.00028716 kg; source Jungbluth, N. 2007; lognormal variance with pedigree 0.0039, pedigree (2,3,3,3,1)
  Average of literature data
  Amount was scaled to the amount of reference product.
  production volume 34164.9 kg
- oil power plant, 500MW: 7.08529e-12 unit; source Jungbluth, N. 2007; lognormal variance with pedigree 0.3506, pedigree (2,5,5,5,1)
  Estimation based on case study
- lignite ash: -7.9922e-6 kg; source Jungbluth, N. 2007; lognormal variance with pedigree 0.0033, pedigree (2,3,3,3,1)
  Average of literature data
  Amount was scaled to the amount of reference product.
  production volume 1017.01 kg
- fly ash and scrubber sludge: -1.45406e-5 kg; source Jungbluth, N. 2007, p. Tab. 12.27, p. 238; lognormal variance with pedigree 0.0033, pedigree (2,3,3,3,1)
  Average of literature data
  Amount was scaled to the amount of reference product.
  production volume 1850.3 kg
- limestone, crushed, washed: 0.00787828 kg; source Jungbluth, N. 2007, p. Tab. 12.11 p. 228; lognormal variance with pedigree 0.0147, pedigree (2,4,3,3,1)
  IPPC 2001 for flue gas treatment
  Amount was scaled to the amount of reference product.
- bilge oil: -1.15237e-5 kg; source Jungbluth, N. 2007; lognormal variance with pedigree 0.0033, pedigree (2,3,3,3,1)
  Average of literature data
  Amount was scaled to the amount of reference product.
  production volume 1466.4 kg
- residue from cooling tower: -8.35686e-5 kg; source Jungbluth, N. 2007, p. Tab. 12.27, p. 238; lognormal variance with pedigree 0.0033, pedigree (2,3,3,3,1)
  Average of literature data
  Amount was scaled to the amount of reference product.
  production volume 10634.1 kg
- lubricating oil: 1.86738e-5 kg; lognormal variance with pedigree 0.07
  EcoSpold01Location=RER
  (4,4,2,1,1,5,BU:1.05); adapted from the dataset 'wood chips, in cogen 6400kWth, wood, emission control', according to actual water, carbon and energy content of the fuel (unconverted solids, mainly lignin)
  Uncertainty: adapted from the dataset 'wood chips, in cogen 6400kWth, wood, emission control', according to actual water, carbon and energy content of the fuel (unconverted solids, mainly lignin)
- quicklime, in pieces, loose: 0.00327458 kg; lognormal variance with pedigree 0.019225
  (2,3,1,2,1,5,BU:1.05); etha+ project Alcosuisse, SSCF technology from NREL
  EcoSpold01Location=CH
  Uncertainty: etha+ project Alcosuisse, SSCF technology from NREL
- heat and power co-generation unit, 6400kW thermal, common components for heat+electricity: 1.85139e-9 unit; lognormal variance with pedigree 0.37
  (4,4,2,1,1,5,BU:3); adapted from the dataset 'wood chips, in cogen 6400kWth, wood, emission control', according to actual water, carbon and energy content of the fuel (unconverted solids, mainly lignin)
  EcoSpold01Location=CH
  Uncertainty: adapted from the dataset 'wood chips, in cogen 6400kWth, wood, emission control', according to actual water, carbon and energy content of the fuel (unconverted solids, mainly lignin)
- magnesium sulfate: 5.54477e-5 kg; lognormal variance with pedigree 0.019225
  (2,3,1,2,1,5,BU:1.05); etha+ project Alcosuisse, SSCF technology from NREL
  EcoSpold01Location=RER
  Uncertainty: etha+ project Alcosuisse, SSCF technology from NREL
- nitrogen fertiliser, as N: 0.000170065 kg; lognormal variance with pedigree 0.019225
  EcoSpold01Location=RER
  (2,3,1,2,1,5,BU:1.05); etha+ project Alcosuisse, SSCF technology from NREL
  Uncertainty: etha+ project Alcosuisse, SSCF technology from NREL
- urea, as N: 5.12575e-5 kg; lognormal variance with pedigree 0.07
  (4,4,2,1,1,5,BU:1.05); adapted from the dataset 'wood chips, in cogen 6400kWth, wood, emission control', according to actual water, carbon and energy content of the fuel (unconverted solids, mainly lignin)
  EcoSpold01Location=RER
  Uncertainty: adapted from the dataset 'wood chips, in cogen 6400kWth, wood, emission control', according to actual water, carbon and energy content of the fuel (unconverted solids, mainly lignin)
- sulfuric acid: 0.00843277 kg; lognormal variance with pedigree 0.019225
  (same comment as for magnesium sulfate)
- transport, tractor and trailer, agricultural: 0.00353183 metric ton*km; lognormal variance with pedigree 0.139225
  (2,3,1,2,1,5,BU:2); etha+ project Alcosuisse, SSCF technology from NREL
  EcoSpold01Location=CH
  Uncertainty: etha+ project Alcosuisse, SSCF technology from NREL
- wood ash mixture, pure: -0.00301172 kg; lognormal variance with pedigree 0.07
  (4,4,2,1,1,5,BU:1.05); adapted from the dataset 'wood chips, in cogen 6400kWth, wood, emission control', according to actual water, carbon and energy content of the fuel (unconverted solids, mainly lignin)
  EcoSpold01Location=CH
  Uncertainty: adapted from the dataset 'wood chips, in cogen 6400kWth, wood, emission control', according to actual water, carbon and energy content of the fuel (unconverted solids, mainly lignin)
  production volume 109944 kg
- tap water: 0.819459 kg; lognormal variance with pedigree 0.019225
  (same comment as for magnesium sulfate)
- ammonium sulfate, as N: 0.000120556 kg; lognormal variance with pedigree 0.019225
  (same comment as for nitrogen fertiliser, as N)
- maize starch: 0.00269394 kg; lognormal variance with pedigree 0.019225
  EcoSpold01Location=DE
  (2,3,1,2,1,5,BU:1.05); etha+ project Alcosuisse, SSCF technology from NREL
  Uncertainty: etha+ project Alcosuisse, SSCF technology from NREL
- sodium chloride, powder: 2.3342e-5 kg; lognormal variance with pedigree 0.07
  (same comment as for lubricating oil)
- heat and power co-generation unit, 6400kW thermal, building: 4.62847e-10 unit; lognormal variance with pedigree 0.37
  (same comment as for heat and power co-generation unit, 6400kW thermal, common components f)
- calcium chloride: 0.000122343 kg; lognormal variance with pedigree 0.019225
  EcoSpold01Location=CH
  (2,3,1,2,1,5,BU:1.05); etha+ project Alcosuisse, SSCF technology from NREL
  Uncertainty: etha+ project Alcosuisse, SSCF technology from NREL
- wastewater, average: -4.48056e-6 m3; lognormal variance with pedigree 0.07
  EcoSpold01Location=CH
  (4,4,2,1,1,5,BU:1.05); adapted from the dataset 'wood chips, in cogen 6400kWth, wood, emission control', according to actual water, carbon and energy content of the fuel (unconverted solids, mainly lignin)
  Uncertainty: adapted from the dataset 'wood chips, in cogen 6400kWth, wood, emission control', according to actual water, carbon and energy content of the fuel (unconverted solids, mainly lignin)
  production volume 163.563 m3
- ethanol fermentation plant: 4.21101e-11 unit; lognormal variance with pedigree 0.319225
  EcoSpold01Location=CH
  (2,3,1,2,1,5,BU:3); etha+ project Alcosuisse, SSCF technology from NREL
  Uncertainty: etha+ project Alcosuisse, SSCF technology from NREL
- waste gypsum: -0.0110794 kg; lognormal variance with pedigree 0.019225
  (same comment as for quicklime, in pieces, loose)
  production volume 1.20394e6 kg
- heat and power co-generation unit, 6400kW thermal, components for electricity only: 1.85139e-9 unit; lognormal variance with pedigree 0.37
  (same comment as for heat and power co-generation unit, 6400kW thermal, common components f)
- wood chips, wet, measured as dry mass: 0.592463 kg; lognormal variance with pedigree 0.019225, pedigree (2,3,4,2,1)
  Etha+ project Alcosuisse, SSCF technology from NREL
  Uncertainty: etha+ project Alcosuisse, SSCF technology from NREL
- chlorine, liquid: 1.86738e-6 kg; lognormal variance with pedigree 0.07
  (same comment as for lubricating oil)
- heat and power co-generation unit, organic Rankine cycle, 1000kW electrical: 1.96898e-9 unit
  calculated value, assuming 4000h/a operation time, 20a lifetime, 6667kW (fuel input) capacity
- furnace, wood chips, with silo, 5000kW: 1.96898e-9 unit
  (same comment as for heat and power co-generation unit, organic Rankine cycle, 1000kW elect)
- dust collector, electrostatic precipitator, for industrial use: 1.96898e-9 unit
  (same comment as for heat and power co-generation unit, organic Rankine cycle, 1000kW elect)
- NOx retained, by selective catalytic reduction: 0.000302451 kg; source Thomas Nussbaumer 2014
  expert estimation (see source)
- packaging glass factory: 1.45695e-12 unit; lognormal variance with pedigree 0.4921, pedigree (5,4,5,3,4)
  EcoSpold01Location=RER
  Estimation: infrastructure represents an average packaging glass factory in Europe.
  Uncertainty: own estimation
- dolomite: 0.000527857 kg; source European Commission 2000; lognormal variance with pedigree 0.0581, pedigree (1,2,5,1,3)
  EcoSpold01Location=RER
  Literature value: average european value from literature source.
  Uncertainty: average value from DE & CH datasets
- wastewater from glass production: -2.0535e-5 m3; source European Commission 2000; lognormal variance with pedigree 0.0581, pedigree (1,2,5,1,3)
  EcoSpold01Location=CH
  average value from EU-IPPC report
  Uncertainty: average value from EU-IPPC report
  production volume 5.632e6 m3
- lime: 0.000391917 kg; source European Commission 2000; lognormal variance with pedigree 0.0581, pedigree (1,2,5,1,3)
  Literature value: average european value from literature source.
  EcoSpold01Location=CH
  Uncertainty: average value from DE & CH datasets
- refractory, fireclay, packed: 0.000166675 kg; source European Commission 2000; lognormal variance with pedigree 0.0581, pedigree (1,2,5,1,3)
  EcoSpold01Location=DE
  Estimation: it includes all minor raw materials. The total amount for european production is from literature source.
  Uncertainty: average value from EU-IPPC report
- glass cullet, sorted: 0.00774898 kg
- feldspar: 0.000172861 kg; source European Commission 2000; lognormal variance with pedigree 0.0581, pedigree (1,2,5,1,3)
  Literature value: average european value from literature source.
  EcoSpold01Location=RER
  Uncertainty: average value from DE & CH datasets
- soda ash, light, crystalline, heptahydrate: 0.000777657 kg; source European Commission 2000; lognormal variance with pedigree 0.0581, pedigree (1,2,5,1,3)
  (same comment as for feldspar)
- light fuel oil: 0.000488369 kg; source European Commission 2000; lognormal variance with pedigree 0.0581, pedigree (1,2,5,1,3)
  Estimation: reported total amount of energy required per glass melted from literature source. Average european mix of 50% fuel oil and 50% natural gas estimated based on literature source. Light fuel oil and heavy fuel oil at equal parts.
  EcoSpold01Location=RER
  Uncertainty: average value from EU-IPPC report
- polyethylene, high density, granulate: 0.000150357 kg; lognormal variance with pedigree 0.0521, pedigree (1,4,5,3,1)
  Literature value: average european value from literature source.
  EcoSpold01Location=RER
  Uncertainty: estimation from data of 1 European producer
- solid unbleached board: 0.000224953 kg; source European Commission 2000; lognormal variance with pedigree 0.0521, pedigree (1,4,5,3,1)
  (same comment as for polyethylene, high density, granulate)
- silica sand: 0.00259633 kg; source European Commission 2000; lognormal variance with pedigree 0.0581, pedigree (1,2,5,1,3)
  Literature value: average european value from literature source.
  EcoSpold01Location=DE
  Uncertainty: average value from DE & CH datasets
- EUR-flat pallet: 9.17405e-6 unit; source European Commission 2000; lognormal variance with pedigree 0.0521, pedigree (1,4,5,3,1)
  EcoSpold01Location=RER
  Literature value: average european value from literature value
  Uncertainty: estimation from data of 1 European producer
- natural gas, high pressure: 1.45465e-5, 3.02488e-5, 1.28821e-5, 1.80402e-5, 2.88326e-6, 4.17017e-5, 0.00029691, 8.0604e-5, 1.56066e-5, 9.25818e-6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 m3 (17 suppliers, which the file names only by identifier); sum of these 0.00108542 m3; source European Commission 2000; lognormal variance with pedigree 0.0581, pedigree (1,2,5,1,3)
  EcoSpold01Location=RER
  Estimation: reported total amount of energy required per glass melted from literature source. Average european mix of 50% fuel oil and 50% natural gas estimated based on literature source.
  Uncertainty: average value from EU-IPPC report
- municipal solid waste: -7.01276e-7, -7.21771e-7, -3.51622e-6, -8.39246e-7, -1.17183e-6, -1.2804e-6, -1.53033e-7, -8.02109e-6, -8.04966e-7, -1.13174e-5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 kg (33 suppliers, which the file names only by identifier); sum of these -6.70386e-5 kg; source European Commission 2000; lognormal variance with pedigree 0.0581, pedigree (1,2,5,1,3)
  (same comment as for wastewater from glass production)
  production volume 1.76e7 kg
- electricity, medium voltage: 2.79757e-5, 1.38907e-5, 0.000161615, 3.03286e-5, 7.5456e-5, 3.76545e-5, 0.0362505, 8.71289e-6, 0.000252608, 0.000142857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 kWh (38 suppliers, which the file names only by identifier); sum of these 0.0390922 kWh; source European Commission 2000; lognormal variance with pedigree 0.0581, pedigree (1,2,5,1,3)
  average value from EU-IPPC report
  EcoSpold01Location=UCTE
  Uncertainty: average value from EU-IPPC report
- sodium cyanide: 6.74641e-6 kg; lognormal variance with pedigree 0.0606, pedigree (1,3,5,5,3)
  Estimation: Cyanide consumption is estimated with the average of US data from Barrick and Newmont (scaled by production). Proxy: 'sodium cyanide' is used as a proxy for Cyanide. Further references: Newmont (2005b) Now & Beyond: Sustainability Reports. Newmont Mining Corporation. Retrieved from <http://www.newmont.com/en/social/reporting/index.asp> 27.96 kg is the amount of the exchange needed when producing 1 kg of gold. 0.47 kg is the amount of the exchange needed when producing 1 kg of silver.
  Uncertainty: C
- mine infrastructure, gold-silver-zinc-lead-copper: 7.55302e-13 unit; lognormal variance with pedigree 0.3427, pedigree (2,4,5,3,1)
  Literature value. 3.93E-07 kg is the amount of the exchange needed when producing 1 kg of gold. 6.72E-09 kg is the amount of the exchange needed when producing 1 kg of silver. 1.12E-10 kg is the amount of the exchange needed when producing 1 kg of copper. 3.08E-11 kg is the amount of the exchange needed when producing 1 kg of lead. 4.7E-11 kg is the amount of the exchange needed when producing 1 kg of zinc.
  Uncertainty: E
- diesel, burned in building machine: 0.007755 MJ; lognormal variance with pedigree 0.0433, pedigree (2,4,5,3,1)
  Calculated value: Share is calculated based on global energy consumption percentages of Boliden group. 3386.75 kg is the amount of the exchange needed when producing 1 kg of gold. 57.8 kg is the amount of the exchange needed when producing 1 kg of silver. 0.966 kg is the amount of the exchange needed when producing 1 kg of copper. 0.265 kg is the amount of the exchange needed when producing 1 kg of lead. 0.405 kg is the amount of the exchange needed when producing 1 kg of zinc.
  Uncertainty: E
- charcoal: 0.00130857 kg; source Boliden 2006; lognormal variance with pedigree 0.0421, pedigree (1,4,5,3,1)
  Estimation: No carbon is used for the gold/silver purification step. Proxy: 'charcoal' is used as a proxy for Carbon. 4.47E+07 kg is the amount of the exchange needed during rafinery operation. 16.8 kg is the amount of the exchange needed when producing 1 kg of gold. 0.28 kg is the amount of the exchange needed when producing 1 kg of silver.
  Uncertainty: E
- refinery sludge: -5.38553e-6 kg; source Boliden 2006; lognormal variance with pedigree 0.0421, pedigree (1,4,5,3,1)
  Proxy: Oil/waste is approximated with the exchange 'refinery sludge, 89.5% water'.
  Uncertainty: E
  production volume 162149 kg
- waste graphical paper: -1.67551e-7 kg; source Boliden 2006; lognormal variance with pedigree 0.0421, pedigree (1,4,5,3,1)
  Proxy: Paper waste is approximated with exchange 'waste paper, 11.2% water'.
  Uncertainty: E
  production volume 5044.7 kg
- blasting: 0.000779925 kg; lognormal variance with pedigree 0.0433, pedigree (2,4,5,3,1)
  Estimated value. 406.48 kg is the amount of the exchange needed when producing 1 kg of gold. 6.94 kg is the amount of the exchange needed when producing 1 kg of silver. 0.116 kg is the amount of the exchange needed when producing 1 kg of copper. 0.0318 kg is the amount of the exchange needed when producing 1 kg of lead. 0.048 kg is the amount of the exchange needed when producing 1 kg of zinc.
  Uncertainty: A
- sulfidic tailings, generic: -0.0275066 kg; source Boliden 2006; lognormal variance with pedigree 0.0427, pedigree (1,4,5,3,1)
  Calculated based on estimates and literature data. For the refinery landfill waste is approximated with the exchange 'sulfidic tailing, off-site'. For the mining estimation from dataset author: data are approximated with data from Papua New Guinea. 208630 kg is the amount of the exchange needed during rafinery operation. 14332.7 kg is the amount of the exchange needed during mining to produce 1 kg of gold. 244.7 kg is the amount of the exchange needed during mining to produce 1 kg of silver. 4.09 kg is the amount of the exchange needed during mining to produce 1 kg of copper. 1.12 kg is the amount of the exchange needed during mining to produce 1 kg of lead. 1.7kg is the amount of the exchange needed during mining to rpoduce 1 kg of copper.
  Uncertainty: E
  production volume 8.2818e8 kg
- oxygen, liquid: 0.00271436 kg; source Boliden 2006; lognormal variance with pedigree 0.0421, pedigree (1,4,5,3,1)
  Calculated value: Reported value is 6.90E07 Nm3. Value in this dataset results from recalculating the reported value with an average Oxygen density of 1.25 kg/m3.
  Uncertainty: E
- waste paperboard: -1.05318e-6 kg; source Boliden 2006; lognormal variance with pedigree 0.0421, pedigree (1,4,5,3,1)
  Proxy: Corrugated cardboad is approximated with exchange 'waste packaging cardboard, 19.6% water'.
  Uncertainty: E
  production volume 31709.5 kg
- anode refinery: 7.76896e-13 unit; lognormal variance with pedigree 0.508025, pedigree (5,5,5,2,4)
  Estimation from dataset author.
  Uncertainty: R
- waste wood, untreated: -1.13698e-5 kg; source Boliden 2006; lognormal variance with pedigree 0.0421, pedigree (1,4,5,3,1)
  Proxy: Wood waste is approximated with exchange 'waste wood, untreated, 20% water'.
  Uncertainty: E
  production volume 342320 kg
- zinc: 6.91163e-7 kg; lognormal variance with pedigree 0.0606, pedigree (1,3,5,5,3)
  Calculated value: Data was obtained from Australian mining, scaled by produced gold. Further references: Stewart M. (1999) Environmental Life Cycle Considerations for Design-Related Decision Making in Minerals Processing. PhD Thesis. University of Cape Town, Cape Town. 2.86 kg is the amount of the exchange needed when producing 1 kg of gold. 0.048 kg is the amount of the exchange needed when producing 1 kg of silver.
  Uncertainty: C
- lime, packed: 7.01471e-5 kg; source Boliden 2006; lognormal variance with pedigree 0.0606, pedigree (1,3,5,5,3)
  Estimation: No lime is used for the gold/silver purification step. In the mining step calculated value: data were obtained from Australian mining, scaled by produced gold and silver. Further references: Stewart M. (1999) Environmental Life Cycle Considerations for Design-Related Decision Making in Minerals Processing. PhD Thesis. University of Cape Town, Cape Town. 1.889E+06 kg is the amount of the exchange needed during rafinery operation. 62.56 kg is the amount of the exchange needed when producing 1 kg of gold. 1.053 kg is the amount of the exchange needed when producing 1 kg of silver.
  Uncertainty: C
- heat, district or industrial, other than natural gas: 0.0353967 MJ; source Boliden 2006; lognormal variance with pedigree 0.0427, pedigree (1,4,5,3,1)
  Calculated based on literature values and estimates. Estimation: Fossil fuels have a density of 40 MJ/kg. Further references: Boliden (2004) Energy and emissions for PGM production at Rönnskär. New Boliden. Calculated value: Share is calculated based on global energy consumption percentages of Boliden group.
  Uncertainty: E
- precious metal refinery: 2.19072e-12 unit; lognormal variance with pedigree 0.508025, pedigree (5,5,5,2,4)
  Estimation from dataset author.
  Uncertainty: R
- sodium percarbonate, powder: 3.21046e-10 kg; lognormal variance with pedigree 0.0059, pedigree (2,4,3,3,2)
  Estimated value. Measured/calculated value for Quebec is extrapolated for GLO.
- sulfuric acid: 1.45578e-8 kg; lognormal variance with pedigree 0.0059, pedigree (2,4,3,3,2)
  Estimated value. Measured/calculated value for Quebec is extrapolated for GLO.
- cast iron: 1.38382e-10 kg; lognormal variance with pedigree 0.0059, pedigree (2,4,3,3,2)
  Estimated value. Measured/calculated value for Quebec is extrapolated for GLO.
- scrap steel: -4.5686e-10 kg; lognormal variance with pedigree 0.21, pedigree (5,5,5,5,5)
  Estimated value. Same amount entering the dataset is estimated as by-product
  production volume 17009.5 kg
- waste paper, unsorted: -2.32482e-9 kg; lognormal variance with pedigree 0.0059, pedigree (2,4,3,3,2)
  Estimated value. Measured/calculated value for Quebec is extrapolated for GLO.
  production volume 86556.2 kg
- carbon dioxide, liquid: 9.0225e-11 kg; lognormal variance with pedigree 0.0053, pedigree (2,4,3,3,1)
  Estimated value. Measured/calculated value for Quebec is extrapolated for GLO.
- nuclear power plant, pressure water reactor, 650MW: 1.59624e-15 unit; lognormal variance with pedigree 0.0059, pedigree (2,4,3,3,2)
  Calculated generic value, not country specific.The amount of infrastructure input is calculated based on the assumption of an average lifetime of 30 years for this type of power plant. An average load factor for nuclear power plants of 73% was applied (PRIS database, 2018).
  Reference(s): International Atomic Energy Agency. 2018. Power Reactor Information System (PRIS), World Statistics, Load Factor, accessible online athttps://pris.iaea.org/PRIS/WorldStatistics/WorldTrendinAverageLoadFactor.aspx, last accessed February 2018
- aluminium sulfate, powder: 1.99824e-9 kg; lognormal variance with pedigree 0.0059, pedigree (2,4,3,3,2)
  Estimated value. Measured/calculated value for Quebec is extrapolated for GLO.
- nitrogen, liquid: 2.36448e-7 kg; lognormal variance with pedigree 0.0059, pedigree (2,4,3,3,2)
  Estimated value. Measured/calculated value for Quebec is extrapolated for GLO.
- waste reinforced concrete: -2.82853e-6 kg; lognormal variance with pedigree 0.21, pedigree (5,5,5,5,5)
  Estimated value. Same amount entering the dataset is estimated as by-product
  production volume 1.0531e8 kg
- chlorine, liquid: 5.02603e-10 kg; lognormal variance with pedigree 0.0059, pedigree (2,4,3,3,2)
  Estimated value. Measured/calculated value for Quebec is extrapolated for GLO.
- diesel, burned in diesel-electric generating set, 10MW: 0.000188757 MJ; lognormal variance with pedigree 0.0059, pedigree (2,4,3,3,2)
  Estimated value. Measured/calculated value for Quebec is extrapolated for GLO.
- uranium hexafluoride: 4.70499e-9 kg; lognormal variance with pedigree 0.0059, pedigree (2,4,3,3,2)
  Estimated value. Measured/calculated value for Quebec is extrapolated for GLO.
  As CANDU reactors use natural uranium (unenriched UO2) but no data were collected for UO2 production (impurities removal from yellowcake, refining to UO3 and conversion to UO2) uranium hexafluoride is used as proxy (UO3 is used to produce both UO2 and UF6).
- cationic resin: 8.03501e-14 kg; lognormal variance with pedigree 0.0059, pedigree (2,4,3,3,2)
  Estimated value. Measured/calculated value for Quebec is extrapolated for GLO.
- lubricating oil: 2.1119e-7 kg; lognormal variance with pedigree 0.0059, pedigree (2,4,3,3,2)
  Estimated value. Measured/calculated value for Quebec is extrapolated for GLO.
- transport, helicopter: 5.00874e-11 hour; lognormal variance with pedigree 0.1253, pedigree (2,4,3,3,2)
  Estimated value. Measured/calculated value for Quebec is extrapolated for GLO. This vehicle use corresponds to maintenance and operation services related to the operation of the whole company. Transports have been distributed among different activities (electricity production, transport and distribution) according to their respective use of these transports and, when the exact distribution was not available, according to the relative expenses of each activity.
- hydrogen, liquid: 2.56283e-10 kg; lognormal variance with pedigree 0.0059, pedigree (2,4,3,3,2)
  Estimated value. Measured/calculated value for Quebec is extrapolated for GLO.
- fly ash and scrubber sludge: -4.81569e-9 kg; lognormal variance with pedigree 0.0059, pedigree (2,4,3,3,2)
  Estimated value. Measured/calculated value for Quebec is extrapolated for GLO.
  production volume 179295 kg
- reinforcing steel: 1.38382e-10 kg; lognormal variance with pedigree 0.0059, pedigree (2,4,3,3,2)
  Estimated value. Measured/calculated value for Quebec is extrapolated for GLO.
- anionic resin: 2.01506e-13 kg; lognormal variance with pedigree 0.0059, pedigree (2,4,3,3,2)
  Estimated value. Measured/calculated value for Quebec is extrapolated for GLO.
- hydrazine: 6.80839e-11 kg; lognormal variance with pedigree 0.0059, pedigree (2,4,3,3,2)
  Estimated value. Measured/calculated value for Quebec is extrapolated for GLO.
- steel, low-alloyed, hot rolled: 3.18478e-10 kg; lognormal variance with pedigree 0.0059, pedigree (2,4,3,3,2)
  Estimated value. Measured/calculated value for Quebec is extrapolated for GLO.
- low level radioactive waste for final repository: -1.78236e-12 m3; lognormal variance with pedigree 0.0059, pedigree (2,4,3,3,2)
  Estimated value. Measured/calculated value for Quebec is extrapolated for GLO.
  production volume 66.3598 m3
- transport, passenger car: 4.93394e-5 km; lognormal variance with pedigree 0.0059, pedigree (2,4,3,3,2)
  (same comment as for transport, helicopter)
- hazardous waste, for incineration: -1.05344e-8 kg; lognormal variance with pedigree 0.0059, pedigree (2,4,3,3,2)
  Estimated value. Measured/calculated value for Quebec is extrapolated for GLO.
  production volume 17517.5 kg
- transport, freight, lorry, unspecified: 1.90267e-8 metric ton*km; lognormal variance with pedigree 0.1253, pedigree (2,4,3,3,2)
  (same comment as for transport, helicopter)
- low level radioactive waste: -7.45226e-11 m3; lognormal variance with pedigree 0.0059, pedigree (2,4,3,3,2)
  Estimated value. Measured/calculated value for Quebec is extrapolated for GLO.
  production volume 14.1579 m3
- sodium hypochlorite, without water, in 15% solution state: 1.10706e-11 kg; lognormal variance with pedigree 0.0059, pedigree (2,4,3,3,2)
  Estimated value. Measured/calculated value for Quebec is extrapolated for GLO.
- spent nuclear fuel: -4.49649e-9 kg; lognormal variance with pedigree 0.0059, pedigree (2,4,3,3,2)
  Estimated value. Measured/calculated value for Quebec is extrapolated for GLO.Amount of spent fuel produced per year plus concrete of storage modules
  production volume 167411 kg
- chlorodifluoromethane: 5.75669e-12 kg; lognormal variance with pedigree 0.0059, pedigree (2,4,3,3,2)
  Estimated value. Measured/calculated value for Quebec is extrapolated for GLO.
- waste mineral oil: -1.51064e-7 kg; lognormal variance with pedigree 0.0059, pedigree (2,4,3,3,2)
  Estimated value. Measured/calculated value for Quebec is extrapolated for GLO.
  production volume 19578.2 kg
- heavy water: 1.10706e-10 kg; lognormal variance with pedigree 0.0059, pedigree (2,4,3,3,2)
  Estimated value. Measured/calculated value for Quebec is extrapolated for GLO.
- helium: 9.74209e-11 kg; lognormal variance with pedigree 0.0059, pedigree (2,4,3,3,2)
  Estimated value. Measured/calculated value for Quebec is extrapolated for GLO.
- paper, woodfree, coated: 2.32482e-9 kg; lognormal variance with pedigree 0.002, pedigree (1,1,3,1,1)
  Estimated value. Measured/calculated value for Quebec is extrapolated for GLO.
  Uncertainty: Calculated variable. Uncertainty will be determined from propagation of uncertainty factors of underlying variables. Uncertainty of actual relation between variables not accounted at this time, although this could be included in a future update.
- tap water: 4.91251e-5, 4.39482e-6, 9.77277e-6, 6.41083e-6, 1.82355e-5 kg (5 suppliers, which the file names only by identifier); sum of these 8.7939e-5 kg; lognormal variance with pedigree 0.0059, pedigree (2,4,3,3,2)
  Estimated value. Measured/calculated value for Quebec is extrapolated for GLO.
- transport, freight, light commercial vehicle: 4.13994e-10, 9.67504e-9 metric ton*km (2 suppliers, which the file names only by identifier); sum of these 1.0089e-8 metric ton*km; lognormal variance with pedigree 0.0059, pedigree (2,4,3,3,2)
  (same comment as for transport, helicopter)
- concrete, normal: 2.32083e-11, 7.70345e-10, 8.0269e-11, 3.65531e-10, 5.22105e-11 m3 (5 suppliers, which the file names only by identifier); sum of these 1.29156e-9 m3; lognormal variance with pedigree 0.0059, pedigree (2,4,3,3,2)
  Estimated value. Measured/calculated value for Quebec is extrapolated for GLO.
- municipal solid waste: -2.111e-8, -2.22775e-7, -9.21019e-8 kg (3 suppliers, which the file names only by identifier); sum of these -3.35987e-7 kg; lognormal variance with pedigree 0.0059, pedigree (2,4,3,3,2)
  Estimated value. Measured/calculated value for Quebec is extrapolated for GLO.
  production volume 139307 kg
- ethylene glycol: 5.45443e-8 kg; lognormal variance with pedigree 0.0426, pedigree (1,3,5,5,1)
  Literature data.
  Reference:
  Süd-Chemie (1999) vereinfachte Umwelterklärung Bentonit 1999, Standort Moosburg. Süd-Chemie AG, München und Moosburg, D-80333 München.
- recultivation, bentonite mine: 1.98605e-8 m2; lognormal variance with pedigree 0.1626, pedigree (1,3,5,5,1)
  Literature data.
  Reference:
  Süd-Chemie (1997) Umwelterklärung Bentonit 1997, Standort Moosburg. Süd-Chemie AG, München und Moosburg, D-80333 München.
- wastewater, average: -3.72933e-10, -7.2125e-9 m3 (2 suppliers, which the file names only by identifier); sum of these -7.58543e-9 m3; lognormal variance with pedigree 0.0426, pedigree (1,3,5,5,1)
  (same comment as for ethylene glycol)
  production volume 93832 m3
- municipal solid waste: -8.31297e-8, -3.01438e-8, -4.77553e-6 kg (3 suppliers, which the file names only by identifier); sum of these -4.88881e-6 kg; lognormal variance with pedigree 0.0426, pedigree (1,3,5,5,1)
  (same comment as for ethylene glycol)
  production volume 6.13395e6 kg
- electricity, medium voltage: 1.67293e-5, 3.04402e-6, 5.99185e-5, 4.40207e-5, 0.000638255, 0.000107119, 0.000196693, 2.54781e-6 kWh (8 suppliers, which the file names only by identifier); sum of these 0.00106833 kWh; lognormal variance with pedigree 0.0426, pedigree (1,3,5,5,1)
  (same comment as for ethylene glycol)
- tap water: 3.90808e-6, 0.000236271, 0.00270376 kg (3 suppliers, which the file names only by identifier); sum of these 0.00294394 kg; lognormal variance with pedigree 0.0426, pedigree (1,3,5,5,1)
  (same comment as for ethylene glycol)
- heat, district or industrial, other than natural gas: 6.44638e-8, 1.64748e-8, 0.000143795 MJ (3 suppliers, which the file names only by identifier); sum of these 0.000143876 MJ; lognormal variance with pedigree 0.0426, pedigree (1,3,5,5,1)
- spent antifreezer liquid: -1.05675e-7 kg; lognormal variance with pedigree 0.0606, pedigree (2,1,5,5,3)
  Norwegian data
  EcoSpold01Location=CH
  Uncertainty: Norwegian data
  production volume 1.60525e-5 kg
- waste textile, soiled: -3.72871e-9 kg; lognormal variance with pedigree 0.0606, pedigree (2,1,5,5,3)
  EcoSpold01Location=CH
  Norwegian data
  Uncertainty: Norwegian data
  production volume 5.52302e-7 kg
- average incineration residue: -5.82108e-10 kg; lognormal variance with pedigree 0.0606, pedigree (2,1,5,5,3)
  Norwegian data
  EcoSpold01Location=CH
  Uncertainty: Norwegian data
  production volume 8.62226e-8 kg
- natural gas processing plant: 1.02852e-14 unit; lognormal variance with pedigree 0.06, pedigree (1,1,5,5,3)
  EcoSpold01Location=GLO
  Environmental report, standard module
  Uncertainty: environmental report, standard module
- spent solvent mixture: -6.50283e-10, -1.83688e-8 kg (2 suppliers, which the file names only by identifier); sum of these -1.90191e-8 kg; lognormal variance with pedigree 0.0606, pedigree (2,1,5,5,3)
  Norwegian data
  EcoSpold01Location=CH
  Uncertainty: Norwegian data
  production volume 2.81714e-6 kg
- electricity, medium voltage: 5.96384e-5 kWh; lognormal variance with pedigree 0.06, pedigree (1,1,5,5,3)
  EcoSpold01Location=NO
  Environmental report, standard module
  Uncertainty: environmental report, standard module
- diesel: 1.13167e-8, 5.44042e-10, 2.28397e-8, 1.59983e-9, 2.31237e-9, 2.00137e-10, 2.25531e-7 kg (7 suppliers, which the file names only by identifier); sum of these 2.64344e-7 kg; lognormal variance with pedigree 0.06, pedigree (1,1,5,5,3)
  EcoSpold01Location=RER
  Environmental report, aggregation of different processes
  Uncertainty: environmental report, aggregation of different processes
- natural gas, high pressure: 2.02624e-7, 5.97352e-6, 3.04108e-6, 5.06254e-6, 2.85367e-5, 4.13349e-5, 6.97764e-6, 9.69262e-5 m3 (8 suppliers, which the file names only by identifier); sum of these 0.000188055 m3; lognormal variance with pedigree 0.06, pedigree (1,1,5,5,3)
  EcoSpold01Location=NO
  Environmental report, aggregation of different processes
  Uncertainty: environmental report, aggregation of different processes
- waste emulsion paint: -5.81407e-10, -1.46866e-9 kg (2 suppliers, which the file names only by identifier); sum of these -2.05007e-9 kg; lognormal variance with pedigree 0.0606, pedigree (2,1,5,5,3)
  EcoSpold01Location=CH
  Norwegian data
  Uncertainty: Norwegian data
  production volume 1.65293e-7 kg
- waste wood, untreated: -5.85834e-9, -3.98165e-11, -1.30318e-10, -7.20948e-11, -1.21477e-10, -1.3922e-10, -7.27401e-10, -5.31812e-11, -2.65121e-11, -2.25214e-10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 kg (41 suppliers, which the file names only by identifier); sum of these -5.4028e-8 kg; lognormal variance with pedigree 0.0606, pedigree (2,1,5,5,3)
  Norwegian data
  EcoSpold01Location=CH
  Uncertainty: Norwegian data
  production volume 1.52976e-6 kg
- waste mineral oil: -1.45046e-7 kg; lognormal variance with pedigree 0.0606, pedigree (2,1,5,5,3)
  Norwegian data
  EcoSpold01Location=CH
  Uncertainty: Norwegian data
  production volume 1.74035e-5 kg
- anti-reflex-coating, etching, solar glass: 7.16344e-7 m2; lognormal variance with pedigree 0.0606, pedigree (2,5,5,5,1)
  EcoSpold01Location=DK
  Questionnaire
  Uncertainty: Questionnaire
- steel, chromium steel 18/8, hot rolled: 3.71225e-6 kg; lognormal variance with pedigree 0.0606, pedigree (2,5,5,5,1)
  EcoSpold01Location=RER
  Questionnaire
  Uncertainty: Questionnaire
- heat carrier liquid, 40% C3H8O2: -1.11033e-9 m3; lognormal variance with pedigree 0.062, pedigree (3,5,5,5,1)
  Estimation
  EcoSpold01Location=CH
  Uncertainty: Estimation
  production volume 0.00465 m3
- synthetic rubber: 9.41133e-5 kg; lognormal variance with pedigree 0.0606, pedigree (2,5,5,5,1)
  EcoSpold01Location=RER
  Questionnaire
  Uncertainty: Questionnaire
- sheet rolling, copper: 2.00576e-6 kg; lognormal variance with pedigree 0.0606, pedigree (2,5,5,5,1)
  EcoSpold01Location=RER
  Questionnaire
  Uncertainty: Questionnaire
- brazing solder, cadmium free: 7.16344e-8 kg; lognormal variance with pedigree 0.0606, pedigree (2,5,5,5,1)
  EcoSpold01Location=RER
  Questionnaire
  Uncertainty: Questionnaire
- stone wool, packed: 1.45418e-6 kg; lognormal variance with pedigree 0.0606, pedigree (2,5,5,5,1)
  EcoSpold01Location=CH
  Questionnaire
  Uncertainty: Questionnaire
- waste paperboard, unsorted: -2.38542e-6 kg; lognormal variance with pedigree 0.062, pedigree (3,5,5,5,1)
  Estimation
  EcoSpold01Location=CH
  Uncertainty: Estimation
  production volume 9.99 kg
- propylene glycol, liquid: 4.68489e-7 kg; lognormal variance with pedigree 0.0606, pedigree (2,5,5,5,1)
  Questionnaire, heat transfer fluid
  EcoSpold01Location=RER
  Uncertainty: Questionnaire, heat transfer fluid
- silicone product: 3.81811e-8 kg; lognormal variance with pedigree 0.0606, pedigree (2,5,5,5,1)
  EcoSpold01Location=RER
  Questionnaire
  Uncertainty: Questionnaire
- selective coat, copper sheet, physical vapour deposition: 7.16344e-7 m2; lognormal variance with pedigree 0.0606, pedigree (2,5,5,5,1)
  Questionnaire
  EcoSpold01Location=DE
  Uncertainty: Questionnaire
- glass tube, borosilicate: 4.4373e-5 kg; lognormal variance with pedigree 0.0606, pedigree (2,5,5,5,1)
  EcoSpold01Location=DE
  Questionnaire plus 5% losses
  Uncertainty: Questionnaire plus 5% losses
- hydrochloric acid, without water, in 30% solution state: 3.41525e-7 kg; lognormal variance with pedigree 0.1327, pedigree (2,2,5,5,4)
  EcoSpold01Location=RER
  Questionnaire, data for other type of collector
  Uncertainty: Questionnaire, data for other type of collector
- copper: 1.26279e-5 kg; lognormal variance with pedigree 0.0606, pedigree (2,5,5,5,1)
  Questionnaire
  EcoSpold01Location=RER
  Uncertainty: Questionnaire
- wastewater, from residence: -1.96055e-7 m3; lognormal variance with pedigree 0.1327, pedigree (2,2,5,5,4)
  EcoSpold01Location=CH
  Questionnaire, data for other type of collector
  Uncertainty: Questionnaire, data for other type of collector
  production volume 0.1326 m3
- solar collector factory: 1.43269e-13 unit; lognormal variance with pedigree 0.3686, pedigree (2,5,5,5,3)
  EcoSpold01Location=RER
  Estimation for flat plate collector
  Uncertainty: Estimation for flat plate collector
- corrugated board box: 3.52844e-8, 5.29597e-6 kg (2 suppliers, which the file names only by identifier); sum of these 5.33125e-6 kg; lognormal variance with pedigree 0.056, pedigree (3,4,5,5,1)
  Company information, packaging
  EcoSpold01Location=RER
  Uncertainty: Company information, packaging
- water, completely softened: 2.75999e-7, 3.6871e-7 kg (2 suppliers, which the file names only by identifier); sum of these 6.44709e-7 kg; lognormal variance with pedigree 0.0606, pedigree (2,5,5,5,1)
  (same comment as for propylene glycol, liquid)
- waste glass sheet: -6.67679e-8, -1.01053e-5 kg (2 suppliers, which the file names only by identifier); sum of these -1.01721e-5 kg; lognormal variance with pedigree 0.062, pedigree (3,5,5,5,1)
  EcoSpold01Location=CH
  Estimation
  Uncertainty: Estimation
  production volume 42.6 kg
- hazardous waste, for incineration: -1.60037e-6 kg; lognormal variance with pedigree 0.1327, pedigree (2,2,5,5,4)
  Questionnaire, data for other type of collector
  EcoSpold01Location=CH
  Uncertainty: Questionnaire, data for other type of collector
  production volume 0.681 kg
- waste plastic, mixture: -1.32868e-8, -4.17066e-9, -1.04133e-8, -5.69405e-9, -4.41718e-9, -1.16277e-8, -9.07848e-7, -6.06589e-8, -4.58753e-9, -1.55838e-9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 kg (42 suppliers, which the file names only by identifier); sum of these -7.9929e-6 kg; lognormal variance with pedigree 0.062, pedigree (3,5,5,5,1)
  EcoSpold01Location=CH
  Estimation
  Uncertainty: Estimation
  production volume 2.16 kg
- waste mineral wool: -6.77276e-9, -1.4474e-6 kg (2 suppliers, which the file names only by identifier); sum of these -1.45418e-6 kg; lognormal variance with pedigree 0.062, pedigree (3,5,5,5,1)
  Estimation
  EcoSpold01Location=CH
  Uncertainty: Estimation
  production volume 6.09 kg
- heat, district or industrial, natural gas: 0.000101811, 1.88039e-6, 0.00575587 MJ (3 suppliers, which the file names only by identifier); sum of these 0.00585956 MJ; lognormal variance with pedigree 0.1327, pedigree (2,2,5,5,4)
  (same comment as for hydrochloric acid, without water, in 30% solution state)
- waste glass: -3.23348e-9, -1.63453e-9, -5.14537e-9, -1.31258e-9, -1.91194e-9, -3.03426e-9, -1.71138e-7, -1.57734e-8, -3.57846e-10, -3.99998e-10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 kg (42 suppliers, which the file names only by identifier); sum of these -2.06849e-6 kg; lognormal variance with pedigree 0.1327, pedigree (2,2,5,5,4)
  (same comment as for wastewater, from residence)
  production volume 2.04 kg
- aluminium oxide, non-metallurgical: 1.94636e-6 kg; lognormal variance with pedigree 0.0541, pedigree (3,2,5,5,1)
  Estimation for 5% feldspar
  EcoSpold01Location=RER
  Uncertainty: Estimation for 5% feldspar
- glass tube factory: 3.89271e-13 unit; lognormal variance with pedigree 0.3527, pedigree (2,2,5,5,1)
  EcoSpold01Location=DE
  Questionnaire
  Uncertainty: Questionnaire
- boric acid, anhydrous, powder: 3.89271e-6 kg; lognormal variance with pedigree 0.0541, pedigree (3,2,5,5,1)
  EcoSpold01Location=RER
  Estimation for 10% boron trioxide
  Uncertainty: Estimation for 10% boron trioxide
- waste wood, untreated: -9.57677e-11 kg; lognormal variance with pedigree 0.0527, pedigree (2,2,5,5,1)
  Questionnaire, wood wastes
  EcoSpold01Location=CH
  Uncertainty: Questionnaire, wood wastes
  production volume 0.002217 kg
- waste glass: -1.93451e-8 kg; lognormal variance with pedigree 0.0527, pedigree (2,2,5,5,1)
  EcoSpold01Location=CH
  Glass used as sealing material
  Uncertainty: Glass used as sealing material
  production volume 0.002871 kg
- waste mineral wool, for final disposal: -1.16665e-10, -2.82223e-8 kg (2 suppliers, which the file names only by identifier); sum of these -2.83389e-8 kg; lognormal variance with pedigree 0.0707, pedigree (2,2,5,5,3)
  EcoSpold01Location=CH
  Questionnaire, asbestos
  Uncertainty: Questionnaire, asbestos
  production volume 0.002184 kg
- wastewater from concrete production: -1.38004e-7 m3; lognormal variance with pedigree 0.692, pedigree (1,1,5,5,1)
  EcoSpold01Location=CH
  estimated
  production volume 0.0002499 m3
- clay pit infrastructure: 2.8803e-13 unit; lognormal variance with pedigree 0.692, pedigree (1,1,5,5,1)
  EcoSpold01Location=CH
  estimated
- packing, clay product: 0.00222469 kg; lognormal variance with pedigree 0.692, pedigree (1,1,5,5,1)
  estimated
  EcoSpold01Location=CH
- pumice: 0.00222209 kg; lognormal variance with pedigree 0.102, pedigree (3,5,5,5,1)
  EcoSpold01Location=DE
- cement, Portland: 3.96281e-5, 1.27783e-6, 2.21463e-6, 1.81664e-6, 4.59696e-7, 4.43372e-5, 1.86624e-6, 0.00026076 kg (8 suppliers, which the file names only by identifier); sum of these 0.00035236 kg; lognormal variance with pedigree 0.102, pedigree (3,5,5,5,1)
  EcoSpold01Location=CH
- spoil from hard coal mining: -8.10978e-6 kg; lognormal variance with pedigree 0.042, pedigree (1,1,5,5,1)
  EcoSpold01Location=GLO
  production volume 0.213 kg
- average incineration residue: -6.09209e-6 kg; lognormal variance with pedigree 0.042, pedigree (1,1,5,5,1)
  EcoSpold01Location=CH
  production volume 0.0603 kg
- decommissioned chemical production facilities: -6.70557e-9 kg; lognormal variance with pedigree 0.042, pedigree (1,1,5,5,1)
  EcoSpold01Location=RER
  production volume 3.3e-5 kg
- waste plastic, mixture: -5.4393e-8 kg; lognormal variance with pedigree 0.042, pedigree (1,1,5,5,1)
  EcoSpold01Location=CH
  production volume 1.5e-6 kg
- onshore well, oil/gas: 3.33407e-8 m; lognormal variance with pedigree 0.0527, pedigree (2,2,5,5,1)
  EcoSpold01Location=GLO
  Data for Russia
  Uncertainty: data for Russia
- waste natural gas, sweet: -0.00259683 MJ; lognormal variance with pedigree 0.0527, pedigree (2,2,5,5,1)
  EcoSpold01Location=GLO
  Data from other countries
  Uncertainty: data from other countries
  production volume 7.71794e10 MJ
- water discharge from petroleum/natural gas extraction, onshore: -0.00110785 kg; lognormal variance with pedigree 0.0426, pedigree (2,1,5,5,1)
  EcoSpold01Location=GLO
  Data from other countries
  Uncertainty: data from other countries
  production volume 6.57056e8 kg
- sweet gas, burned in gas turbine: 0.00847016 MJ; lognormal variance with pedigree 0.0527, pedigree (2,2,5,5,1)
  EcoSpold01Location=NO
  Data from other countries
  Uncertainty: data from other countries
- onshore natural gas field infrastructure: 2.61813e-12 unit; lognormal variance with pedigree 0.3541, pedigree (3,2,5,5,1)
  EcoSpold01Location=GLO
  Data from other countries
  Uncertainty: data from other countries
- hazardous waste, for underground deposit: -3.57273e-7 kg; lognormal variance with pedigree 0.0606, pedigree (2,1,5,5,3)
  Norwegian environmental report
  EcoSpold01Location=DE
  Uncertainty: Norwegian environmental report
  production volume 5.41833e7 kg
- drying, natural gas: 0.00403836 m3; lognormal variance with pedigree 0.0527, pedigree (2,2,5,5,1)
  Data from other countries
  EcoSpold01Location=NO
  Uncertainty: data from other countries
- natural gas, unprocessed, at extraction: 0.00346431 m3; lognormal variance with pedigree 0.052, pedigree (1,1,5,5,1)
  NREL 2007
  EcoSpold01Location=RNA
- sour gas, burned in gas turbine: 0.000245451 MJ; lognormal variance with pedigree 0.0527, pedigree (2,2,5,5,1)
  Data from other countries
  EcoSpold01Location=NO
  Uncertainty: data from other countries
- methanol: 3.83482e-9 kg; lognormal variance with pedigree 0.0601, pedigree (1,2,5,5,3)
  EcoSpold01Location=CH
  Dutch environmental report
  Uncertainty: Dutch environmental report
- sweetening, natural gas: 0.000717091 m3; lognormal variance with pedigree 0.0527, pedigree (2,2,5,5,1)
  Data from other countries
  EcoSpold01Location=DE
  Uncertainty: data from other countries
- waste natural gas, sour: -0.000103441 MJ; lognormal variance with pedigree 0.0527, pedigree (2,2,5,5,1)
  EcoSpold01Location=GLO
  Data from other countries
  Uncertainty: data from other countries
  production volume 1.70729e10 MJ
- electricity, medium voltage: 5.89087e-7, 2.84149e-7, 1.44482e-7, 1.13001e-7, 1.06863e-7, 3.83632e-9, 2.06279e-9, 1.4393e-6, 1.53996e-8, 2.02952e-6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 kWh (12 suppliers, which the file names only by identifier); sum of these 5.00074e-6 kWh; lognormal variance with pedigree 0.0427, pedigree (2,2,5,5,1)
  EcoSpold01Location=DE
  Environmental report for 50% market share in Germany, standard energy type
  Uncertainty: environmental report for 50% market share in Germany, standard energy type
- magnesium oxide: 0.000185481 kg; lognormal variance with pedigree 0.0546, pedigree (2,4,5,5,1)
  EcoSpold01Location=RER
- lime, hydrated, packed: 8.51973e-6 kg; lognormal variance with pedigree 0.0546, pedigree (2,4,5,5,1)
  EcoSpold01Location=CH
- chromite ore concentrate: 1.95244e-5 kg; lognormal variance with pedigree 0.0546, pedigree (2,4,5,5,1)
  EcoSpold01Location=GLO
- industrial machine, heavy, unspecified: 9.4853e-8 kg; lognormal variance with pedigree 0.424, pedigree (5,4,5,5,1)
  EcoSpold01Location=RER
- clay: 0.000244054 kg; lognormal variance with pedigree 0.0546, pedigree (2,4,5,5,1)
  Proxy. Chamotte and clay are used as inputs. Chamotte is burned and milled clay, and clay is used as proxy.
  Estimation, based on personal communication from one company in Germany for the year 1999.
  EcoSpold01Location=CH
- bauxite: 0.000184595 kg; lognormal variance with pedigree 0.0546, pedigree (2,4,5,5,1)
  EcoSpold01Location=GLO
- quicklime, milled, packed: 5.94204e-6 kg; lognormal variance with pedigree 0.0606
  EcoSpold01Location=CH
  (1,3,2,3,3,2);
- sand: 3.36265e-7, 6.47718e-5, 7.75528e-7 kg (3 suppliers, which the file names only by identifier); sum of these 6.58836e-5 kg; lognormal variance with pedigree 0.0606
  EcoSpold01Location=CH
  (1,3,2,3,3,2);
- lime, packed: 2.90987e-8, 2.28517e-6 kg (2 suppliers, which the file names only by identifier); sum of these 2.31427e-6 kg; lognormal variance with pedigree 0.0606
  EcoSpold01Location=CH
  (1,3,2,3,3,2);
- oxygen, liquid: 1.18038e-7 kg; lognormal variance with pedigree 0.0421, pedigree (1,2,5,5,1)
  EcoSpold01Location=RER
  Questionnaire
  Uncertainty: Questionnaire
- argon, liquid: 4.25924e-7 kg; lognormal variance with pedigree 0.0421, pedigree (1,2,5,5,1)
  Questionnaire (plus helium)
  EcoSpold01Location=RER
  Uncertainty: Questionnaire (plus helium)
- chromium: 9.60926e-7 kg; lognormal variance with pedigree 0.0421, pedigree (1,2,5,5,1)
  Questionnaire
  EcoSpold01Location=RER
  Uncertainty: Questionnaire
- polyethylene, low density, granulate: 6.72648e-8 kg; lognormal variance with pedigree 0.0421, pedigree (1,2,5,5,1)
  EcoSpold01Location=RER
  Plastic packagings
  Uncertainty: Plastic packagings
- tin: 1.11935e-6 kg; lognormal variance with pedigree 0.0421, pedigree (1,2,5,5,1)
  Questionnaire
  EcoSpold01Location=RER
  Uncertainty: Questionnaire
- metal coating facility: 4.32417e-11 unit; lognormal variance with pedigree 0.3421, pedigree (1,2,5,5,1)
  Questionnaire
  EcoSpold01Location=RER
  Uncertainty: Questionnaire
- kraft paper, bleached: 7.20695e-8 kg; lognormal variance with pedigree 0.0421, pedigree (1,2,5,5,1)
  EcoSpold01Location=RER
  Questionnaire
  Uncertainty: Questionnaire
- electricity, medium voltage: 7.21189e-6, 9.13536e-5 kWh (2 suppliers, which the file names only by identifier); sum of these 9.85655e-5 kWh; lognormal variance with pedigree 0.0421, pedigree (1,2,5,5,1)
  EcoSpold01Location=DE
  Questionnaire, total electricity use in the factory
  Uncertainty: Questionnaire, total electricity use in the factory
- light fuel oil: 2.14096e-7, 3.0876e-8, 4.32096e-7, 2.86734e-8, 4.15467e-8, 5.78123e-8 kg (6 suppliers, which the file names only by identifier); sum of these 8.051e-7 kg; lognormal variance with pedigree 0.0421, pedigree (1,2,5,5,1)
  Questionnaire, including heating
  EcoSpold01Location=RER
  Uncertainty: Questionnaire, including heating
- aluminium, wrought alloy: 9.12024e-8 kg; lognormal variance with pedigree 0.0707, pedigree (2,2,5,5,3)
  EcoSpold01Location=RER
  Coating agents
  Uncertainty: Coating agents
- wastewater from tube collector production: -1.01625e-7 m3; lognormal variance with pedigree 0.0527, pedigree (2,2,5,5,1)
  EcoSpold01Location=CH
  Questionnaire
  Uncertainty: Questionnaire
  production volume 0.00936 m3
- xenon, gaseous: 1.26706e-7 kg; lognormal variance with pedigree 0.1221, pedigree (5,2,5,5,1)
  Xenon filling of the tube, 1bar, own calculation
  EcoSpold01Location=CH
  Uncertainty: Xenon filling of the tube, 1bar, own calculation
- polyvinylchloride, suspension polymerised: 6.58725e-6 kg; lognormal variance with pedigree 0.1021, pedigree (3,2,5,5,3)
  Therotical assumptions
  EcoSpold01Location=RER
  Uncertainty: Therotical assumptions
- polyvinylchloride, emulsion polymerised: 9.63992e-7 kg; lognormal variance with pedigree 0.1021, pedigree (3,2,5,5,3)
  Therotical assumptions
  EcoSpold01Location=RER
  Uncertainty: Therotical assumptions
- tube insulation factory: 4.02733e-13 unit; lognormal variance with pedigree 0.0821, pedigree (1,2,5,5,1)
  EcoSpold01Location=DE
  Environmental report
  Uncertainty: Environmental report
- polyurethane, rigid foam: 5.54765e-6 kg; lognormal variance with pedigree 0.0826, pedigree (1,3,5,5,1)
  EcoSpold01Location=RER
  Environmental report
  Uncertainty: Environmental report
- offshore platform, petroleum: 2.29333e-13 unit; lognormal variance with pedigree 0.4252, pedigree (2,3,3,5,5)
  EcoSpold01Location=OCE
  Questionnaire
  Uncertainty: Questionnaire. Uncertainty has been increased to reflect the extrapolation from a different region.
- natural gas, vented: 5.63874e-6 m3; lognormal variance with pedigree 0.502, pedigree (5,5,3,5,5)
  EcoSpold01Location=GLO
  Estimated to reflect global average conditions. Uncertainty has been adjusted to reflect that.
  Uncertainty: Based on an estimation of global average conditions, uncertainty is high to reflect that.
- onshore petroleum field infrastructure: 6.37611e-13 unit; lognormal variance with pedigree 0.4252, pedigree (2,3,3,5,5)
  EcoSpold01Location=GLO
  Questionnaire
  Uncertainty: Questionnaire. Uncertainty has been increased to reflect the extrapolation from a different region.
- pipeline, petroleum: 3.56542e-11 km; lognormal variance with pedigree 0.4252, pedigree (2,3,3,5,5)
  EcoSpold01Location=RER
  Environmental report
  Uncertainty: Environmental report. Uncertainty has been increased to reflect the extrapolation from a different region.
- offshore well, oil/gas: 1.6391e-9 m; lognormal variance with pedigree 0.06, pedigree (1,1,5,5,3)
  EcoSpold01Location=OCE
  environmental report for the total Norwegian production, standard module
  Uncertainty: environmental report for the total Norwegian production, standard module
- water discharge from petroleum extraction, offshore: -2.28573e-5 kg
  Environmental report
  production volume 2.42331e9 kg
    Calculated from the production volume of reference products
- offshore platform, natural gas: 1.33712e-14 unit; lognormal variance with pedigree 0.4246, pedigree (2,4,5,5,4)
  environmental report for the total Norwegian production, standard module
  EcoSpold01Location=OCE
  Uncertainty: environmental report for the total Norwegian production, standard module

## Inputs from nature
- Oxygen [natural resource, in air]: 0 kg; pedigree (1,1,1,1,1)
  Oxygen from ambient air needed to combust and oxidise this waste. Net demand, i.e. without O2 leaving the plant in flue gas uncombusted.
  Uncertainty: uncertainty is calculated from uncertainties in waste composition and transfer coefficients to flue gas and soild residues in incinerator
- Water, cooling, unspecified natural origin [natural resource, in water]: 0.0355397 m3; source Scown, C.D., et al. 2011, p. Tab. 12.10 p. 228; lognormal variance with pedigree 0.098025, pedigree (4,4,4,2,4)
  Estimation with literature data, basic uncertainty estimated = 3
  Amount was scaled to the amount of reference product.
  Calculated based on literature (Scown, C.D., et al., 2011, Water Footprint of U.S. Trasportation Fuels;Scown, C.D., et al., 2011, Water Footprint of U.S. Trasportation Fuels (SI); Stiegel, 2008, Estimating Freshwater Needs to Meet Future Thermoelectric Generation Requirements; Floerke, M., 2009, Future changes of freshwater needs in the electricity production sector), (Vionnet, S., Quantis Water Database - Technical Report, 2012). Water use in this process is modelled based on literature (see references). The process boundaries are given by the boundaries of the power plant. The process ends when the energy (MJ) is produced and ready to be used for electricity production (kWh).
  Calculated based on literature data. 9.7 MJ is calculated efficiency of the electricity production, average of all available regions.
- Water, unspecified natural origin [natural resource, in water]: 2.50711e-5 m3; source European Commission 2000; lognormal variance with pedigree 0.0581, pedigree (1,2,5,1,3)
  average value from EU-IPPC report
  Uncertainty: average value from EU-IPPC report
- Water, river [natural resource, in water]: 6.33702e-5 m3; lognormal variance with pedigree 0.0527, pedigree (2,4,5,3,1)
  Literature value; share is calculated based on global water consumption percentages of Boliden group. 31.1 kg is the amount of the exchange needed when producing 1 kg of gold. 0.53 kg is the amount of the exchange needed when producing 1 kg of silver. 0.0089 kg is the amount of the exchange needed when producing 1 kg of copper. 0.0024 kg is the amount of the exchange needed when producing 1 kg of lead. 0.0037 kg is the amount of the exchange needed when producing 1 kg of zinc.
  Uncertainty: E
- Zinc, in ground [natural resource, in ground]: 0.00093087 kg; lognormal variance with pedigree 0.0433, pedigree (2,4,5,3,1)
  0.63% Zn in ore; Calculated value. The recovery rate (proportion of valuable material physically recovered in the processing of ore) is taken into account in order to define the resource extraction. It is estimated to be 90% on the basis of global data. The average concentration (head grade, expressed in kg metal per kg ore) of metals in ore for Sweden is calculated with the quantity of ore milled and the corresponding production rate. 1.11 kg is the amount of Zinc, Zn 0.63%, Ag 9.7E-4%, Au 9.7E-4%, 0.63%, Cu 0.38%, Pb 0.014%, in ore, in ground needed to produce 1kg of zinc.
- Gold, in ground [natural resource, in ground]: 1.44766e-7 kg; lognormal variance with pedigree 0.0433, pedigree (2,4,5,3,1)
  9.7 ppm Au in ore; Calculated value. The recovery rate (proportion of valuable material physically recovered in the processing of ore) is taken into account in order to define the resource extraction. It is estimated to be 90% on the basis of global data. The average concentration (head grade, expressed in kg metal per kg ore) of metals in ore for Sweden is calculated with the quantity of ore milled and the corresponding production rate. 1.11 kg is the amount of Gold, Au 9.7E-4%, Ag 9.7E-4%, Zn 0.63%, Cu 0.38%, Pb 0.014%, in ore, in ground needed to produce 1kg of gold.
- Water, salt, ocean [natural resource, in water]: 0.000132841 m3; source Boliden 2004; lognormal variance with pedigree 0.188, pedigree (4,5,5,5,5)
  Calculated based on literature values; share is calculated based on global water consumption percentages of Boliden group. Sea water is approximated with the exchange 'water, salt, ocean'. 816.99 kg is the amount of the exchange needed during rafinery operation. 68.99 kg is the amount of the exchange needed when producing 1 kg of gold. 1.18 kg is the amount of the exchange needed when producing 1 kg of silver. 0.0197 kg is the amount of the exchange needed when producing 1 kg of copper. 0.0054 kg is the amount of the exchange needed when producing 1 kg of lead. 0.0082 kg is the amount of the exchange needed when producing 1 kg of zinc.
  Uncertainty: E
- Silver, in ground [natural resource, in ground]: 7.32136e-6 kg; lognormal variance with pedigree 0.0433, pedigree (2,4,5,3,1)
  9.7 ppm Ag in ore; Calculated value. The recovery rate (proportion of valuable material physically recovered in the processing of ore) is taken into account in order to define the resource extraction. It is estimated to be 90% on the basis of global data. The average concentration (head grade, expressed in kg metal per kg ore) of metals in ore for Sweden is calculated with the quantity of ore milled and the corresponding production rate. 1.11 kg is the amount of Silver, Ag 9.7E-4%, Au 9.7E-4%, Zn 0.63%, Cu 0.38%, Pb 0.014%, in ore, in ground needed to produce 1kg of silver.
- Water, well, in ground [natural resource, in water]: 1.04045e-5 m3; lognormal variance with pedigree 0.0527, pedigree (2,4,5,3,1)
  Calculated value: Share is calculated based on global water consumption percentages of Boliden group. 5.4 kg is the amount of the exchange needed during rafinery operation. 0.092 kg is the amount of the exchange needed when producing 1 kg of gold. 0.0015 kg is the amount of the exchange needed when producing 1 kg of silver. 0.0197 kg is the amount of the exchange needed when producing 1 kg of copper. 0.00042 kg is the amount of the exchange needed when producing 1 kg of lead. 0.000647 kg is the amount of the exchange needed when producing 1 kg of zinc.
  Uncertainty: E
- Copper, in ground [natural resource, in ground]: 0.00594151 kg; lognormal variance with pedigree 0.0433, pedigree (2,4,5,3,1)
  0.38 Cu in ore; Calculated value. The recovery rate (proportion of valuable material physically recovered in the processing of ore) is taken into account in order to define the resource extraction. It is estimated to be 90% on the basis of global data. The average concentration (head grade, expressed in kg metal per kg ore) of metals in ore for Sweden is calculated with the quantity of ore milled and the corresponding production rate. 1.11 kg is the amount of Copper, Cu 0.38%, Au 9.7E-4%, Ag 9.7E-4%, Zn 0.63%, Pb 0.014%, in ore, in ground needed to produce 1kg of copper.
- Lead, in ground [natural resource, in ground]: 0.000718096 kg; lognormal variance with pedigree 0.0433, pedigree (2,4,5,3,1)
  140 ppm Pb in ore; Calculated value. The recovery rate (proportion of valuable material physically recovered in the processing of ore) is taken into account in order to define the resource extraction. It is estimated to be 90% on the basis of global data. The average concentration (head grade, expressed in kg metal per kg ore) of metals in ore for Sweden is calculated with the quantity of ore milled and the corresponding production rate. 1.11 kg is the amount of Lead, Pb 0.014%, Au 9.7E-4%, Ag 9.7E-4%, Zn 0.63%, Cu 0.38%, in ore, in ground needed to produce 1kg of lead.
- Clay, bentonite, in ground [natural resource, in ground]: 0.00128133 kg; lognormal variance with pedigree 0.0426, pedigree (1,3,5,5,1)
  (same comment as for ethylene glycol)
- Transformation, to mineral extraction site [natural resource, land]: 2.80992e-7 m2; lognormal variance with pedigree 0.1626, pedigree (1,3,5,5,1)
  Calculated value based on literature data (Süd-Chemie 1997). The volume of material extracted (including the overburden material and the bentonite) is 2.75 mio m3 per year. The average thickness of the overburden layer and bentonite layer is 33 m in total. Based on an annual production volume of bentonite of 380000 tonnes, the transformed land per kg of bentonite produced is 2.19E-4 m2.
  Reference:
  Süd-Chemie (1997) Umwelterklärung Bentonit 1997, Standort Moosburg. Süd-Chemie AG, München und Moosburg, D-80333 München.
- Transformation, from unspecified [natural resource, land]: 2.80992e-7 m2; lognormal variance with pedigree 0.1626, pedigree (1,3,5,5,1)
  (same comment as for Transformation, to mineral extraction site)
- Occupation, mineral extraction site [natural resource, land]: 8.3286e-6 m2*year; lognormal variance with pedigree 0.0826, pedigree (1,3,5,5,1)
  Calculated value. Based on Süd-Chemie (1997), the area of the mine was 247 ha in 1997, of which 233.1 ha was being used for storage, while 13.9 ha was being mined. Assuming that the total surface of the mine (247 ha) stays constant over time (meaning that a portion of the surface used is restored every year) and based on an average annual production volume of bentonite of 380000 tonnes, the land occupation is 0.0065 m2*year/kg bentonite.
  Reference:
  Süd-Chemie (1997) Umwelterklärung Bentonit 1997, Standort Moosburg. Süd-Chemie AG, München und Moosburg, D-80333 München.
- Uranium, in ground [natural resource, in ground]: 2.38438e-9 kg; lognormal variance with pedigree 0.042, pedigree (1,1,5,5,1)
- Sand, unspecified, in ground [natural resource, in ground]: 1.31156e-5 kg; lognormal variance with pedigree 0.042, pedigree (1,1,5,5,1)
- Wood, unspecified, standing [natural resource, biotic]: 1.24665e-12 m3; lognormal variance with pedigree 0.042, pedigree (1,1,5,5,1)
- Coal, hard, unspecified, in ground [natural resource, in ground]: 6.71675e-5 kg; lognormal variance with pedigree 0.042, pedigree (1,1,5,5,1)
- Gas, natural, in ground [natural resource, in ground]: 0.0074694 m3; lognormal variance with pedigree 0.042, pedigree (1,1,5,5,1)
- Iron, in ground [natural resource, in ground]: 9.66417e-8 kg; lognormal variance with pedigree 0.042, pedigree (1,1,5,5,1)
  46% Fe in siderite; 25% Fe in ore
- Sodium chloride, in ground [natural resource, in ground]: 0.000331045 kg; lognormal variance with pedigree 0.042, pedigree (1,1,5,5,1)
- Sulfur, in ground [natural resource, in ground]: 6.61371e-7 kg; lognormal variance with pedigree 0.042, pedigree (1,1,5,5,1)
- Fluorspar, in ground [natural resource, in ground]: 5.91719e-10 kg; lognormal variance with pedigree 0.042, pedigree (1,1,5,5,1)
  92% CaF2 in ore
- Olivine, in ground [natural resource, in ground]: 9.54994e-10 kg; lognormal variance with pedigree 0.042, pedigree (1,1,5,5,1)
- Calcite, in ground [natural resource, in ground]: 7.699e-6 kg; lognormal variance with pedigree 0.042, pedigree (1,1,5,5,1)
- Barium, in ground [natural resource, in ground]: 7.42445e-9 kg; lognormal variance with pedigree 0.042, pedigree (1,1,5,5,1)
  15% BaSO4 in ore
- Dolomite, in ground [natural resource, in ground]: 1.25085e-9 kg; lognormal variance with pedigree 0.042, pedigree (1,1,5,5,1)
- Oil, crude, in ground [natural resource, in ground]: 0.00296525 kg; lognormal variance with pedigree 0.042, pedigree (1,1,5,5,1)
- Energy, potential (in hydropower reservoir), converted [natural resource, in water]: 6.96021e-5 MJ
- Coal, brown, in ground [natural resource, in ground]: 2.54628e-5 kg; lognormal variance with pedigree 0.042, pedigree (1,1,5,5,1)
- Aluminium, in ground [natural resource, in ground]: 1.5168e-8 kg; lognormal variance with pedigree 0.042, pedigree (1,1,5,5,1)
  24% Al in bauxite; 11% Al in ore
- Shale, in ground [natural resource, in ground]: 1.08982e-9 kg
  Uncertainty for LCI results cannot be determined
- Gravel, in ground [natural resource, in ground]: 1.81637e-10 kg
  Uncertainty for LCI results cannot be determined
- Clay, unspecified, in ground [natural resource, in ground]: 9.08187e-8 kg
  Uncertainty for LCI results cannot be determined
- Sylvite, in ground [natural resource, in ground]: 5.44912e-10 kg
  25% Sylvite in sylvinite; Uncertainty for LCI results cannot be determined
- Anhydrite, in ground [natural resource, in ground]: 3.63275e-10 kg
  Uncertainty for LCI results cannot be determined
- Water, salt, sole [natural resource, in water]: 2.24507e-7 m3; lognormal variance with pedigree 0.042, pedigree (1,1,5,5,1)
  environmental report for the total Norwegian production, partly with standard factors.
  Uncertainty: environmental report for the total Norwegian production, partly with standard factors.
## Emissions to nature
- Carbon monoxide, fossil [air, urban air close to ground]: 5.80983e-5 kg; lognormal variance with pedigree 0.84953, pedigree (1,1,3,1,1)
  Incomplete combustion product emitted to air.
  Uncertainty: uncertainty calculated from uncertainty in average operation emissions, and the uncertainty of the flue gas volume from this waste.
- Bromine [air, urban air close to ground]: 3.41594e-7 kg; lognormal variance with pedigree 0.95177, pedigree (1,1,3,1,1)
  Emission to air from waste composition and transfer coefficients.
  Uncertainty: uncertainty is calculated from uncertainties in waste composition and transfer coefficients in incinerator
- Beryllium [water, surface water]: 0 kg; pedigree (1,1,1,1,1)
  Emissions to water from waste composition and transfer coefficients in incinerator and landfills.
  Uncertainty: uncertainty is calculated from uncertainties in waste composition and transfer coefficients in incinerator and landfills
- Sodium [air, urban air close to ground]: 9.11856e-6 kg; lognormal variance with pedigree 0.47553, pedigree (1,1,3,1,1)
  (same comment as for Bromine)
- Nickel, ion [water, ground-, long-term]: 0 kg; pedigree (1,1,1,1,1)
  Long-term emissions from landfilling of incineration residues.
  Uncertainty: uncertainty is calculated from uncertainties in waste composition and transfer coefficients in incinerator and landfills.
- Aluminium [water, surface water]: 1.4793e-10 kg; lognormal variance with pedigree 0.74099, pedigree (1,1,3,1,1)
  (same comment as for Beryllium)
- Molybdenum [water, ground-, long-term]: 0 kg; pedigree (1,1,1,1,1)
  (same comment as for Nickel, ion)
- Phenol, pentachloro- [air, urban air close to ground]: 4.74015e-11 kg; lognormal variance with pedigree 0.10352, pedigree (1,1,3,1,1)
  (same comment as for Carbon monoxide, fossil)
- TOC, Total Organic Carbon [water, surface water]: 6.2251e-6 kg; lognormal variance with pedigree 0.054289, pedigree (1,1,3,1,1)
  (same comment as for Beryllium)
- Iron [air, urban air close to ground]: 4.00726e-7 kg; lognormal variance with pedigree 0.34749, pedigree (1,1,3,1,1)
  (same comment as for Bromine)
- Arsenic, ion [water, ground-, long-term]: 0 kg; pedigree (1,1,1,1,1)
  (same comment as for Nickel, ion)
- Hydrogen chloride [air, urban air close to ground]: 8.82574e-7 kg; lognormal variance with pedigree 0.44236, pedigree (1,1,3,1,1)
  (same comment as for Bromine)
- Methane, non-fossil [air, urban air close to ground]: 5.43568e-6 kg; lognormal variance with pedigree 0.10352, pedigree (1,1,3,1,1)
  (same comment as for Carbon monoxide, fossil)
- Tin, ion [water, surface water]: 6.83754e-10 kg; lognormal variance with pedigree 1.5178, pedigree (1,1,3,1,1)
  (same comment as for Beryllium)
- Arsenic [air, urban air close to ground]: 3.48159e-8 kg; lognormal variance with pedigree 1.5356, pedigree (1,1,3,1,1)
  (same comment as for Bromine)
- Lead [air, urban air close to ground]: 2.97265e-7 kg; lognormal variance with pedigree 0.81229, pedigree (1,1,3,1,1)
  (same comment as for Bromine)
- Boron [water, ground-, long-term]: 0 kg; pedigree (1,1,1,1,1)
  (same comment as for Nickel, ion)
- Nitrate [water, ground-, long-term]: 0 kg; pedigree (1,1,1,1,1)
  (same comment as for Nickel, ion)
- Sodium, ion [water, ground-, long-term]: 0 kg; pedigree (1,1,1,1,1)
  (same comment as for Nickel, ion)
- Cobalt [water, ground-, long-term]: 0 kg; pedigree (1,1,1,1,1)
  (same comment as for Nickel, ion)
- Calcium, ion [water, surface water]: 2.04552e-6 kg; lognormal variance with pedigree 0.30761, pedigree (1,1,3,1,1)
  (same comment as for Beryllium)
- Selenium [water, ground-, long-term]: 0 kg; pedigree (1,1,1,1,1)
  (same comment as for Nickel, ion)
- Carbon monoxide, non-fossil [air, urban air close to ground]: 0.000392563 kg; lognormal variance with pedigree 0.84953, pedigree (1,1,3,1,1)
  (same comment as for Carbon monoxide, fossil)
- Titanium, ion [water, ground-, long-term]: 0 kg; pedigree (1,1,1,1,1)
  (same comment as for Nickel, ion)
- Carbon dioxide, fossil [air, urban air close to ground]: 0.443049 kg; lognormal variance with pedigree 0.033966, pedigree (1,1,3,1,1)
  (same comment as for Bromine)
- Phosphorus [air, urban air close to ground]: 1.70796e-6 kg; lognormal variance with pedigree 0.71749, pedigree (1,1,3,1,1)
  (same comment as for Bromine)
- Silicon [water, surface water]: 0 kg; pedigree (1,1,1,1,1)
  (same comment as for Beryllium)
- Antimony [water, surface water]: 0 kg; pedigree (1,1,1,1,1)
  (same comment as for Beryllium)
- Antimony [water, ground-, long-term]: 0 kg; pedigree (1,1,1,1,1)
  (same comment as for Nickel, ion)
- Ammonia [air, urban air close to ground]: 0.000108234 kg; lognormal variance with pedigree 0.72328, pedigree (1,1,3,1,1)
  Nitrogen species emitted to air after DeNOx stage.
  Uncertainty: uncertainty calculated from uncertainty in average N-emissions and uncertainty in the share of thermal NOx and the uncertainty in nitrogen content in *this* waste.
- Methane, fossil [air, urban air close to ground]: 1.27634e-5 kg; lognormal variance with pedigree 0.10352, pedigree (1,1,3,1,1)
  (same comment as for Carbon monoxide, fossil)
- Silicon [air, urban air close to ground]: 0 kg; pedigree (1,1,1,1,1)
  (same comment as for Bromine)
- Chromium VI [water, ground-, long-term]: 0 kg; pedigree (1,1,1,1,1)
  (same comment as for Nickel, ion)
- Dioxins, measured as 2,3,7,8-tetrachlorodibenzo-p-dioxin [air, urban air close to ground]: 2.38658e-13 kg; lognormal variance with pedigree 0.44449, pedigree (1,1,3,1,1)
  (same comment as for Carbon monoxide, fossil)
- Zinc, ion [water, surface water]: 1.17994e-7 kg; lognormal variance with pedigree 0.59584, pedigree (1,1,3,1,1)
  (same comment as for Beryllium)
- Chromium [air, urban air close to ground]: 7.17837e-8 kg; lognormal variance with pedigree 0.95177, pedigree (1,1,3,1,1)
  (same comment as for Bromine)
- Iodide [water, ground-, long-term]: 0 kg; pedigree (1,1,1,1,1)
  (same comment as for Nickel, ion)
- Cadmium, ion [water, surface water]: 1.66387e-9 kg; lognormal variance with pedigree 1.1326, pedigree (1,1,3,1,1)
  (same comment as for Beryllium)
- BOD5, Biological Oxygen Demand [water, surface water]: 1.07468e-5 kg; lognormal variance with pedigree 0.05628, pedigree (1,1,3,1,1)
  (same comment as for Beryllium)
- Benzene, hexachloro- [air, urban air close to ground]: 4.21341e-14 kg; lognormal variance with pedigree 0.10352, pedigree (1,1,3,1,1)
  (same comment as for Carbon monoxide, fossil)
- Copper [air, urban air close to ground]: 3.27831e-7 kg; lognormal variance with pedigree 0.71024, pedigree (1,1,3,1,1)
  (same comment as for Bromine)
- Sulfur dioxide [air, urban air close to ground]: 0.0010318 kg; lognormal variance with pedigree 0.61636, pedigree (1,1,3,1,1)
  (same comment as for Bromine)
- Lead [water, surface water]: 3.36877e-8 kg; lognormal variance with pedigree 0.72269, pedigree (1,1,3,1,1)
  (same comment as for Beryllium)
- Chloride [water, ground-, long-term]: 0 kg; pedigree (1,1,1,1,1)
  (same comment as for Nickel, ion)
- Manganese [water, surface water]: 2.05132e-8 kg; lognormal variance with pedigree 1.4837, pedigree (1,1,3,1,1)
  (same comment as for Beryllium)
- Nickel [air, urban air close to ground]: 1.21995e-6 kg; lognormal variance with pedigree 1.0695, pedigree (1,1,3,1,1)
  (same comment as for Bromine)
- Arsenic, ion [water, surface water]: 6.83811e-10 kg; lognormal variance with pedigree 1.4106, pedigree (1,1,3,1,1)
  (same comment as for Beryllium)
- DOC, Dissolved Organic Carbon [water, surface water]: 6.2251e-6 kg; lognormal variance with pedigree 0.054289, pedigree (1,1,3,1,1)
  (same comment as for Beryllium)
- Cobalt [water, surface water]: 1.36756e-9 kg; lognormal variance with pedigree 2.0887, pedigree (1,1,3,1,1)
  (same comment as for Beryllium)
- Copper, ion [water, surface water]: 1.46668e-8 kg; lognormal variance with pedigree 0.81983, pedigree (1,1,3,1,1)
  (same comment as for Beryllium)
- Heat, waste [air, urban air close to ground]: 0 MJ; pedigree (1,1,1,1,1)
  Waste heat generated from heating value of this waste plus any electricity required to process it.
  Uncertainty: uncertainty is calculated from uncertainties in waste composition and uncertainties in energy efficiency and the uncertainty in internal energy demand
- Manganese [air, urban air close to ground]: 1.01777e-6 kg; lognormal variance with pedigree 0.87827, pedigree (1,1,3,1,1)
  (same comment as for Bromine)
- Chromium VI [water, surface water]: 0 kg; pedigree (1,1,1,1,1)
  (same comment as for Beryllium)
- Chromium, ion [water, surface water]: 1.75278e-8 kg; lognormal variance with pedigree 0.96817, pedigree (1,1,3,1,1)
  (same comment as for Beryllium)
- Sodium, ion [water, surface water]: 2.90411e-5 kg; lognormal variance with pedigree 0.22579, pedigree (1,1,3,1,1)
  (same comment as for Beryllium)
- Iodine [air, urban air close to ground]: 0 kg; pedigree (1,1,1,1,1)
  (same comment as for Bromine)
- Water [air, urban air close to ground]: 0 m3; pedigree (1,1,1,1,1)
  Water vapour from waste humidity, hydrogen oxidation and part of the process water.
  Uncertainty: Uncertainty calculated from uncertainty in waste composition, process water input and the uncertainty of fraction to air.
- Iron, ion [water, surface water]: 7.58213e-7 kg; lognormal variance with pedigree 0.93606, pedigree (1,1,3,1,1)
  (same comment as for Beryllium)
- Hydrogen fluoride [air, urban air close to ground]: 3.83821e-7 kg; lognormal variance with pedigree 0.80268, pedigree (1,1,3,1,1)
  (same comment as for Bromine)
- Tin [air, urban air close to ground]: 0 kg; pedigree (1,1,1,1,1)
  (same comment as for Bromine)
- Sulfate [water, surface water]: 0.00114392 kg; lognormal variance with pedigree 0.28332, pedigree (1,1,3,1,1)
  (same comment as for Beryllium)
- Potassium [air, urban air close to ground]: 0.000133222 kg; lognormal variance with pedigree 0.57372, pedigree (1,1,3,1,1)
  (same comment as for Bromine)
- Copper, ion [water, ground-, long-term]: 0 kg; pedigree (1,1,1,1,1)
  (same comment as for Nickel, ion)
- Bromine [water, surface water]: 0 kg; pedigree (1,1,1,1,1)
  (same comment as for Beryllium)
- BOD5, Biological Oxygen Demand [water, ground-, long-term]: 0 kg; pedigree (1,1,1,1,1)
  (same comment as for Nickel, ion)
- Benzene [air, urban air close to ground]: 5.41659e-6 kg; lognormal variance with pedigree 0.10352, pedigree (1,1,3,1,1)
  (same comment as for Carbon monoxide, fossil)
- Antimony [air, urban air close to ground]: 7.85587e-10 kg; lognormal variance with pedigree 1.1209, pedigree (1,1,3,1,1)
  (same comment as for Bromine)
- Vanadium, ion [water, surface water]: 2.06826e-7 kg; lognormal variance with pedigree 1.4796, pedigree (1,1,3,1,1)
  (same comment as for Beryllium)
- Barium [water, surface water]: 0 kg; pedigree (1,1,1,1,1)
  (same comment as for Beryllium)
- Tin, ion [water, ground-, long-term]: 0 kg; pedigree (1,1,1,1,1)
  (same comment as for Nickel, ion)
- Selenium [air, urban air close to ground]: 1.06903e-7 kg; lognormal variance with pedigree 1.7208, pedigree (1,1,3,1,1)
  (same comment as for Bromine)
- Zinc, ion [water, ground-, long-term]: 0 kg; pedigree (1,1,1,1,1)
  (same comment as for Nickel, ion)
- Magnesium [air, urban air close to ground]: 2.05148e-6 kg; lognormal variance with pedigree 0.55954, pedigree (1,1,3,1,1)
  (same comment as for Bromine)
- Fluoride [water, ground-, long-term]: 0 kg; pedigree (1,1,1,1,1)
  (same comment as for Nickel, ion)
- DOC, Dissolved Organic Carbon [water, ground-, long-term]: 0 kg; pedigree (1,1,1,1,1)
  (same comment as for Nickel, ion)
- Iodide [water, surface water]: 0 kg; pedigree (1,1,1,1,1)
  (same comment as for Beryllium)
- COD, Chemical Oxygen Demand [water, surface water]: 1.17482e-5 kg; lognormal variance with pedigree 0.054054, pedigree (1,1,3,1,1)
  (same comment as for Beryllium)
- Silver, ion [water, surface water]: 0 kg; pedigree (1,1,1,1,1)
  (same comment as for Beryllium)
- Magnesium [water, surface water]: 2.32007e-9 kg; lognormal variance with pedigree 0.78749, pedigree (1,1,3,1,1)
  (same comment as for Beryllium)
- Benzo(a)pyrene [air, urban air close to ground]: 3.01179e-9 kg; lognormal variance with pedigree 0.44449, pedigree (1,1,3,1,1)
  (same comment as for Carbon monoxide, fossil)
- Benzene, pentachloro- [air, urban air close to ground]: 0 kg; pedigree (1,1,1,1,1)
  (same comment as for Carbon monoxide, fossil)
- Mercury [air, urban air close to ground]: 2.71459e-9 kg; lognormal variance with pedigree 1.6286, pedigree (1,1,3,1,1)
  (same comment as for Bromine)
- Phosphate [water, ground-, long-term]: 0 kg; pedigree (1,1,1,1,1)
  (same comment as for Nickel, ion)
- Vanadium [air, urban air close to ground]: 4.2935e-6 kg; lognormal variance with pedigree 1.2894, pedigree (1,1,3,1,1)
  (same comment as for Bromine)
- Calcium [air, urban air close to ground]: 3.34773e-5 kg; lognormal variance with pedigree 0.30879, pedigree (1,1,3,1,1)
  (same comment as for Bromine)
- COD, Chemical Oxygen Demand [water, ground-, long-term]: 0 kg; pedigree (1,1,1,1,1)
  (same comment as for Nickel, ion)
- Molybdenum [water, surface water]: 0 kg; pedigree (1,1,1,1,1)
  (same comment as for Beryllium)
- Cadmium [air, urban air close to ground]: 1.83383e-8 kg; lognormal variance with pedigree 1.3258, pedigree (1,1,3,1,1)
  (same comment as for Bromine)
- Toluene [air, urban air close to ground]: 1.75559e-6 kg; lognormal variance with pedigree 0.10352, pedigree (1,1,3,1,1)
  (same comment as for Carbon monoxide, fossil)
- Lead [water, ground-, long-term]: 0 kg; pedigree (1,1,1,1,1)
  (same comment as for Nickel, ion)
- Carbon dioxide, non-fossil [air, urban air close to ground]: 0.887454 kg; lognormal variance with pedigree 0.033966, pedigree (1,1,3,1,1)
  (same comment as for Bromine)
- Boron [water, surface water]: 0 kg; pedigree (1,1,1,1,1)
  (same comment as for Beryllium)
- Beryllium [water, ground-, long-term]: 0 kg; pedigree (1,1,1,1,1)
  (same comment as for Nickel, ion)
- Titanium, ion [water, surface water]: 0 kg; pedigree (1,1,1,1,1)
  (same comment as for Beryllium)
- Particulates, > 2.5 um, and < 10um [air, urban air close to ground]: 2.64868e-5 kg; lognormal variance with pedigree 0.21588, pedigree (1,1,3,1,1)
  (same comment as for Carbon monoxide, fossil)
- Aluminium [water, ground-, long-term]: 0 kg; pedigree (1,1,1,1,1)
  (same comment as for Nickel, ion)
- Water [water, surface water]: 2.93627e-5 m3; lognormal variance with pedigree 1.0483, pedigree (1,1,3,1,1)
  Process water released to surface water.
  Uncertainty: uncertainty calculated from uncertainty in process water input and the uncertainty of fraction to surface water.
- Molybdenum [air, urban air close to ground]: 3.26306e-8 kg; lognormal variance with pedigree 1.4996, pedigree (1,1,3,1,1)
  (same comment as for Bromine)
- Barium [air, urban air close to ground]: 0 kg; pedigree (1,1,1,1,1)
  (same comment as for Bromine)
- Mercury [water, surface water]: 8.65917e-10 kg; lognormal variance with pedigree 1.2467, pedigree (1,1,3,1,1)
  (same comment as for Beryllium)
- Potassium, ion [water, surface water]: 1.4793e-10 kg; lognormal variance with pedigree 0.33145, pedigree (1,1,3,1,1)
  (same comment as for Beryllium)
- Cobalt [air, urban air close to ground]: 1.51058e-7 kg; lognormal variance with pedigree 1.5499, pedigree (1,1,3,1,1)
  (same comment as for Bromine)
- Sulfate [water, ground-, long-term]: 0 kg; pedigree (1,1,1,1,1)
  (same comment as for Nickel, ion)
- Nickel, ion [water, surface water]: 1.01308e-7 kg; lognormal variance with pedigree 1.681, pedigree (1,1,3,1,1)
  (same comment as for Beryllium)
- Titanium [air, urban air close to ground]: 0 kg; pedigree (1,1,1,1,1)
  (same comment as for Bromine)
- Zinc [air, urban air close to ground]: 1.81101e-6 kg; lognormal variance with pedigree 0.66682, pedigree (1,1,3,1,1)
  (same comment as for Bromine)
- Iron, ion [water, ground-, long-term]: 0 kg; pedigree (1,1,1,1,1)
  (same comment as for Nickel, ion)
- Calcium, ion [water, ground-, long-term]: 0 kg; pedigree (1,1,1,1,1)
  (same comment as for Nickel, ion)
- Vanadium, ion [water, ground-, long-term]: 0 kg; pedigree (1,1,1,1,1)
  (same comment as for Nickel, ion)
- Silicon [water, ground-, long-term]: 0 kg; pedigree (1,1,1,1,1)
  (same comment as for Nickel, ion)
- Aluminium [air, urban air close to ground]: 0 kg; pedigree (1,1,1,1,1)
  (same comment as for Bromine)
- Cadmium, ion [water, ground-, long-term]: 0 kg; pedigree (1,1,1,1,1)
  (same comment as for Nickel, ion)
- Heat, waste [water, surface water]: 0 MJ; pedigree (1,1,1,1,1)
  (same comment as for Heat, waste)
- Barium [water, ground-, long-term]: 0 kg; pedigree (1,1,1,1,1)
  (same comment as for Nickel, ion)
- Potassium, ion [water, ground-, long-term]: 0 kg; pedigree (1,1,1,1,1)
  (same comment as for Nickel, ion)
- Fluoride [water, surface water]: 1.1626e-6 kg; lognormal variance with pedigree 0.48196, pedigree (1,1,3,1,1)
  (same comment as for Beryllium)
- Magnesium [water, ground-, long-term]: 0 kg; pedigree (1,1,1,1,1)
  (same comment as for Nickel, ion)
- Nitrogen oxides [air, urban air close to ground]: 0.00127315 kg; lognormal variance with pedigree 0.72328, pedigree (1,1,3,1,1)
  Sum of fuel-Nox and thermal-NOx emitted to air after DeNOx stage.
  Uncertainty: uncertainty calculated from uncertainty in average N-emissions and uncertainty in the share of thermal NOx and the uncertainty in nitrogen content in *this* waste.
- Cyanide [air, urban air close to ground]: 0 kg; pedigree (1,1,1,1,1)
  (same comment as for Ammonia)
- Bromine [water, ground-, long-term]: 0 kg; pedigree (1,1,1,1,1)
  (same comment as for Nickel, ion)
- Mercury [water, ground-, long-term]: 0 kg; pedigree (1,1,1,1,1)
  (same comment as for Nickel, ion)
- Selenium [water, surface water]: 0 kg; pedigree (1,1,1,1,1)
  (same comment as for Beryllium)
- Chloride [water, surface water]: 0.000190685 kg; lognormal variance with pedigree 0.27995, pedigree (1,1,3,1,1)
  (same comment as for Beryllium)
- Nitrate [water, surface water]: 1.4793e-10 kg; lognormal variance with pedigree 0.35622, pedigree (1,1,3,1,1)
  (same comment as for Beryllium)
- TOC, Total Organic Carbon [water, ground-, long-term]: 0 kg; pedigree (1,1,1,1,1)
  (same comment as for Nickel, ion)
- Dinitrogen monoxide [air, urban air close to ground]: 7.93958e-5 kg; lognormal variance with pedigree 1.2838, pedigree (1,1,3,1,1)
  (same comment as for Ammonia)
- Silver, ion [water, ground-, long-term]: 0 kg; pedigree (1,1,1,1,1)
  (same comment as for Nickel, ion)
- NMVOC, non-methane volatile organic compounds, unspecified origin [air, urban air close to ground]: 1.23883e-5 kg; lognormal variance with pedigree 0.10352, pedigree (1,1,3,1,1)
  (same comment as for Carbon monoxide, fossil)
- Manganese [water, ground-, long-term]: 0 kg; pedigree (1,1,1,1,1)
  (same comment as for Nickel, ion)
- Particulates, < 2.5 um [air, urban air close to ground]: 7.11772e-5 kg; lognormal variance with pedigree 0.44449, pedigree (1,1,3,1,1)
  (same comment as for Carbon monoxide, fossil)
- Phosphate [water, surface water]: 0 kg; pedigree (1,1,1,1,1)
  (same comment as for Beryllium)
- Beryllium [air, urban air close to ground]: 3.19276e-10 kg; source Jungbluth, N. 2007; lognormal variance with pedigree 0.6607, pedigree (3,3,4,3,1)
  Literature
  Amount was scaled to the amount of reference product.
- Chromium VI [air, urban air close to ground]: 2.0093e-9 kg; source Jungbluth, N. 2007, p. Tab. 12.23, Tab. 12.24; lognormal variance with pedigree 2.2607, pedigree (3,3,4,3,1)
  Literature, basic uncertainity = 20
  Amount was scaled to the amount of reference product.
- Sulfide [water, surface water]: 3.12663e-7 kg; source Jungbluth, N. 2007, p. Tab. 12.26, p. 238; lognormal variance with pedigree 0.272, pedigree (1,1,3,1,1)
  Mean of values for Europe, range of concentrations
  Amount was scaled to the amount of reference product.
- Propane [air, urban air close to ground]: 9.13484e-8 kg; source Jungbluth, N. 2007, p. Tab. 12.19, Tab. 12.20; lognormal variance with pedigree 0.092, pedigree (1,1,3,1,1)
  Calculation based on VOC emission. Deviation calculated from ranges
  Amount was scaled to the amount of reference product.
- Water [water, unspecified]: 0.0189456 m3; lognormal variance with pedigree 0.0427, pedigree (2,2,3,1,1)
  Calculated value based on literature values and expert opinion. See comments in the parametres' comment field.
- Water [air, unspecified]: 0.00103702 m3; lognormal variance with pedigree 0.0427, pedigree (2,2,3,1,1)
  (same comment as for Water)
- Formaldehyde [air, urban air close to ground]: 2.13101e-6 kg; source Jungbluth, N. 2007, p. Tab. 12.19, Tab. 12.20; lognormal variance with pedigree 0.092, pedigree (1,1,3,1,1)
  (same comment as for Propane)
- Hydrocarbons, aliphatic, alkanes, unspecified [air, urban air close to ground]: 7.15227e-6 kg; source Jungbluth, N. 2007; lognormal variance with pedigree 0.092, pedigree (1,1,3,1,1)
  (same comment as for Propane)
- Ethanol [air, urban air close to ground]: 9.13484e-7 kg; source Jungbluth, N. 2007; lognormal variance with pedigree 0.092, pedigree (1,1,3,1,1)
  (same comment as for Propane)
- Acetaldehyde [air, urban air close to ground]: 7.94723e-7 kg; source Jungbluth, N. 2007; lognormal variance with pedigree 0.092, pedigree (1,1,3,1,1)
  (same comment as for Propane)
- Hypochlorite [water, surface water]: 1.88914e-6 kg; source Jungbluth, N. 2007; lognormal variance with pedigree 0.0701, pedigree (3,4,4,3,3)
  Literature
  Amount was scaled to the amount of reference product.
- Hypochlorite [water, ocean]: 2.11812e-6 kg; source Jungbluth, N. 2007; lognormal variance with pedigree 0.0701, pedigree (3,4,4,3,3)
  Literature
  Amount was scaled to the amount of reference product.
- Hydrocarbons, aliphatic, unsaturated [air, urban air close to ground]: 1.82325e-5 kg; source Jungbluth, N. 2007; lognormal variance with pedigree 0.092, pedigree (1,1,3,1,1)
  (same comment as for Propane)
- AOX, Adsorbable Organic Halogen as Cl [water, surface water]: 2.44257e-8 kg; source Jungbluth, N. 2007, p. Tab. 12.26, p. 238; lognormal variance with pedigree 0.002, pedigree (1,1,3,1,1)
  (same comment as for Sulfide)
- Acetone [air, urban air close to ground]: 4.47434e-7 kg; source Jungbluth, N. 2007; lognormal variance with pedigree 0.092, pedigree (1,1,3,1,1)
  (same comment as for Propane)
- Phosphorus [water, surface water]: 1.06247e-7 kg; source Jungbluth, N. 2007, p. Tab. 12.26, p. 238; lognormal variance with pedigree 0.002, pedigree (1,1,3,1,1)
  (same comment as for Sulfide)
- Acetic acid [air, urban air close to ground]: 1.82703e-6 kg; source Jungbluth, N. 2007; lognormal variance with pedigree 0.092, pedigree (1,1,3,1,1)
  (same comment as for Propane)
- Nitrogen [water, surface water]: 4.67483e-5 kg; source Jungbluth, N. 2007, p. Tab. 12.26, p. 238; lognormal variance with pedigree 0.032, pedigree (1,1,3,1,1)
  (same comment as for Sulfide)
- Particulates, > 10 um [air, urban air close to ground]: 2.20852e-5 kg; source Jungbluth, N. 2007, p. Tab. 12.17 / Tab. 12.18; lognormal variance with pedigree 0.0427, pedigree (2,2,3,1,1)
  Literature data for this country
  Amount was scaled to the amount of reference product.
- Suspended solids, unspecified [water, surface water]: 8.98751e-6 kg; source Jungbluth, N. 2007, p. Tab. 12.26, p. 238; lognormal variance with pedigree 0.052, pedigree (1,1,3,1,1)
  (same comment as for Sulfide)
- PAH, polycyclic aromatic hydrocarbons [air, urban air close to ground]: 7.5054e-8 kg; source Jungbluth, N. 2007, p. Tab. 12.21, p. 235; lognormal variance with pedigree 0.3147, pedigree (2,4,3,3,1)
  Literature
  Amount was scaled to the amount of reference product.
- Hydrocarbons, unspecified [water, surface water]: 2.30789e-7 kg; source Jungbluth, N. 2007, p. Tab. 12.26, p. 238; lognormal variance with pedigree 0.042, pedigree (1,1,3,1,1)
  (same comment as for Sulfide)
- Thallium [water, surface water]: 2.11973e-8 kg; source Jungbluth, N. 2007, p. Tab. 12.26, p. 238; lognormal variance with pedigree 0.002, pedigree (1,1,3,1,1)
  (same comment as for Sulfide)
- Hydrocarbons, aromatic [air, urban air close to ground]: 1.86906e-8 kg; source Jungbluth, N. 2007; lognormal variance with pedigree 0.092, pedigree (1,1,3,1,1)
  (same comment as for Propane)
- Oils, unspecified [water, surface water]: 6.57497e-7 kg; source Jungbluth, N. 2007, p. Tab. 12.26, p. 238; lognormal variance with pedigree 0.032, pedigree (1,1,3,1,1)
  (same comment as for Sulfide)
- Methanol [air, urban air close to ground]: 9.13484e-7 kg; source Jungbluth, N. 2007; lognormal variance with pedigree 0.092, pedigree (1,1,3,1,1)
  (same comment as for Propane)
- Carbon dioxide, fossil [air, unspecified]: 0.00353733 kg; source Jungbluth, N. 2007, p. Tab. 12.29, Tab. 12.30; lognormal variance with pedigree 0.0206, pedigree (2,5,3,1,1)
  Calculation for limestone use
  Amount was scaled to the amount of reference product.
- Sulfite [water, surface water]: 1.0325e-5 kg; source Jungbluth, N. 2007, p. Tab. 12.26, p. 238; lognormal variance with pedigree 0.032, pedigree (1,1,3,1,1)
  (same comment as for Sulfide)
- Chlorine [air, urban air close to ground]: 1.0252e-6 kg; lognormal variance with pedigree 0.11
  (4,4,2,1,1,5,BU:1.5); adapted from the dataset 'wood chips, in cogen 6400kWth, wood, emission control', according to actual water, carbon and energy content of the fuel (unconverted solids, mainly lignin)
  Uncertainty: adapted from the dataset 'wood chips, in cogen 6400kWth, wood, emission control', according to actual water, carbon and energy content of the fuel (unconverted solids, mainly lignin)
- Benzene, ethyl- [air, urban air close to ground]: 1.75559e-7 kg; lognormal variance with pedigree 0.11
  (same comment as for Chlorine)
- Fluorine [air, urban air close to ground]: 2.84808e-7 kg; lognormal variance with pedigree 0.11
  (same comment as for Chlorine)
- m-Xylene [air, urban air close to ground]: 7.02232e-7 kg; lognormal variance with pedigree 0.11
  (same comment as for Chlorine)
- Water [air, non-urban air or from high stacks]: 0.000227373 m3
  calculation based on water balance
- Particulates, > 10 um [air, non-urban air or from high stacks]: 6.12774e-8 kg; source Boliden 2006; lognormal variance with pedigree 0.0821, pedigree (1,4,5,3,1)
  Calculated value: Based on standard data for non-rerrous metal industry, particulates fractions are determined to be 82% PM2.5 and 92% PM10. This percentages apply to the total dust emissions reported, which result from weight averaging the dust emissions amounts of the following processes, given their shares: Copper-zinc-lead refining: 2.63E04 kg (99.75%) Gold silver refining: 6.45E01 kg (0.25%) Further references: <http://www.iiasa.ac.at/~rains/cgi-bin/rains_pm>, retrieved 6.4.2004). Boliden (2004) Energy and emissions for PGM production at Rönnskär. New Boliden.
  Uncertainty: C
- Zinc, ion [water, ocean]: 5.74756e-8 kg; source Boliden 2006; lognormal variance with pedigree 0.6921, pedigree (1,4,5,3,1)
  Literature value.
  Uncertainty: E
- Zinc [air, non-urban air or from high stacks]: 1.22267e-7 kg; source Boliden 2006; lognormal variance with pedigree 0.6921, pedigree (1,4,5,3,1)
  Calculated based on literature value. Total emissions were obtained by scaling emission values for Atik Mine by total milled ore. 4189.1 kg is the amount of the exchange needed during rafinery operation. 0.0001 kg is the amount of the exchange needed when producing 1 kg of gold. 0.0000017 kg is the amount of the exchange needed when producing 1 kg of silver. 2.87E-08 kg is the amount of the exchange needed when producing 1 kg of copper. 7.87E-09 kg is the amount of the exchange needed when producing 1 kg of lead. 1.2E-08 kg is the amount of the exchange needed when producing 1 kg of zinc.
  Uncertainty: E
- Mercury [water, ocean]: 3.35092e-9 kg; source Boliden 2006; lognormal variance with pedigree 0.6921, pedigree (1,4,5,3,1)
  Literature value.
  Uncertainty: E
- Carbon dioxide, fossil [air, non-urban air or from high stacks]: 0.000563014 kg; lognormal variance with pedigree 0.0433, pedigree (2,4,5,3,1)
  Calculated value: CO2 emissions from explosives are calculated with the factor of the mines of Newmont (0.16 kg CO2 per kg explosive). 65.03 kg is the amount of the exchange needed when producing 1 kg of gold. 1.11 kg is the amount of the exchange needed when producing 1 kg of silver. 0.018 kg is the amount of the exchange needed when producing 1 kg of copper. 0.0050 kg is the amount of the exchange needed when producing 1 kg of lead. 0.008 kg is the amount of the exchange needed when producing 1 kg of zinc.
- Copper, ion [water, ocean]: 2.08053e-8 kg; source Boliden 2006; lognormal variance with pedigree 0.3421, pedigree (1,4,5,3,1)
  Literature value. 386.05 kg is the amount of the exchange needed during rafinery operation. 0.00498 kg is the amount of the exchange needed when producing 1 kg of gold. 0.000085 kg is the amount of the exchange needed when producing 1 kg of silver. 0.00000142 kg is the amount of the exchange needed when producing 1 kg of copper. 3.89E-07 kg is the amount of the exchange needed when producing 1 kg of lead. 5.96E-07* kg is the amount of the exchange needed when producing 1 kg of zinc.
  Uncertainty: E
- Lead [air, non-urban air or from high stacks]: 8.14045e-7 kg; source Boliden 2006; lognormal variance with pedigree 0.6921, pedigree (1,4,5,3,1)
  Calculated value based on literature. Total emissions were obtained by scaling emission values for Atik Mine by total milled ore. 27927 kg is the amount of the exchange needed during rafinery operation. 0.000118 kg is the amount of the exchange needed when producing 1 kg of gold. 0.000002 kg is the amount of the exchange needed when producing 1 kg of silver. 3.38E-08 kg is the amount of the exchange needed when producing 1 kg of copper. 9.27E-09 kg is the amount of the exchange needed when producing 1 kg of lead. 1.42E-08* kg is the amount of the exchange needed when producing 1 kg of zinc.
  Uncertainty: E
- Particulates, > 2.5 um, and < 10um [air, non-urban air or from high stacks]: 7.65968e-8 kg; source Boliden 2006; lognormal variance with pedigree 0.1621, pedigree (1,4,5,3,1)
  (same comment as for Particulates, > 10 um)
- Mercury [air, non-urban air or from high stacks]: 3.11432e-9 kg; source Boliden 2006; lognormal variance with pedigree 0.6921, pedigree (1,4,5,3,1)
  LIterature value.
  Uncertainty: E
- Arsenic, ion [water, ocean]: 2.87256e-8 kg; source Boliden 2006; lognormal variance with pedigree 0.6921, pedigree (1,4,5,3,1)
  Literature value.
  Uncertainty: E
- Cadmium, ion [water, ocean]: 1.43646e-9 kg; source Boliden 2006; lognormal variance with pedigree 0.3421, pedigree (1,4,5,3,1)
  Literature value.
  Uncertainty: E
- Copper [air, non-urban air or from high stacks]: 3.42088e-8 kg; source Boliden 2006; lognormal variance with pedigree 0.6921, pedigree (1,4,5,3,1)
  Literature value. Total emissions were obtained by scaling emission values for Atik Mine by total milled ore. 1149.9 kg is the amount of the exchange needed during rafinery operation. 0.00036 kg is the amount of the exchange needed when producing 1 kg of gold. 0.0000062 kg is the amount of the exchange needed when producing 1 kg of silver. 1.04E-07 kg is the amount of the exchange needed when producing 1 kg of copper. 2.8E-08 kg is the amount of the exchange needed when producing 1 kg of lead. 4.36E-08 kg is the amount of the exchange needed when producing 1 kg of zinc.
  Uncertainty: E
- Cadmium [air, non-urban air or from high stacks]: 1.67551e-9 kg; source Boliden 2006; lognormal variance with pedigree 0.6921, pedigree (1,4,5,3,1)
  Literature value.
  Uncertainty: E
- Arsenic [air, non-urban air or from high stacks]: 5.5053e-9 kg; source Boliden 2006; lognormal variance with pedigree 0.6921, pedigree (1,4,5,3,1)
  Literature value.
  Uncertainty: E
- Selenium [air, non-urban air or from high stacks]: 4.69897e-10 kg; source Boliden 2006; lognormal variance with pedigree 0.6921, pedigree (1,4,5,3,1)
  Calculated value: Data for PGM plant was allocated to gold/silver production. Further references: Boliden (2004) Energy and emissions for PGM production at Rönnskär. New Boliden.
  Uncertainty: E
- Nickel, ion [water, ocean]: 4.54929e-9 kg; source Boliden 2006; lognormal variance with pedigree 0.6921, pedigree (1,4,5,3,1)
  Literature value.
  Uncertainty: E
- Particulates, < 2.5 um [air, non-urban air or from high stacks]: 6.28073e-7 kg; source Boliden 2006; lognormal variance with pedigree 0.3421, pedigree (1,4,5,3,1)
  (same comment as for Particulates, > 10 um)
- Lead [water, ocean]: 1.22085e-8 kg; source Boliden 2006; lognormal variance with pedigree 0.6921, pedigree (1,4,5,3,1)
  Literature value.
  Uncertainty: E
- Dioxins, measured as 2,3,7,8-tetrachlorodibenzo-p-dioxin [air, non-urban air or from high stacks]: 5.26605e-14 kg; source Boliden 2006; lognormal variance with pedigree 0.3421, pedigree (1,4,5,3,1)
  Literature value.
  Uncertainty: E
- Barium-140 [air, non-urban air or from high stacks]: 6.30984e-14 kBq; lognormal variance with pedigree 0.4706, pedigree (2,5,5,5,5)
  Estimated value. Value extrapolated from a different PWR technology.
- Antimony-124 [air, non-urban air or from high stacks]: 9.45481e-14 kBq; lognormal variance with pedigree 0.4706, pedigree (2,5,5,5,5)
  Estimated value. Value extrapolated from a different PWR technology.
- Iodine-131 [air, non-urban air or from high stacks]: 7.19586e-11 kBq; lognormal variance with pedigree 0.0059, pedigree (2,4,3,3,2)
  Estimated value. Measured/calculated value for Quebec is extrapolated for GLO.
- Tellurium-132 [water, surface water]: 1.67599e-11 kBq; lognormal variance with pedigree 0.4706, pedigree (2,5,5,5,5)
  Estimated value. Value extrapolated from a different PWR technology.
- Chromium-51 [water, surface water]: 1.50481e-9 kBq; lognormal variance with pedigree 0.4706, pedigree (2,5,5,5,5)
  Estimated value. Value extrapolated from a different PWR technology.
- Cesium-134 [water, surface water]: 2.92263e-8 kBq; lognormal variance with pedigree 0.0059, pedigree (2,4,3,3,2)
  Estimated value. Measured/calculated value for Quebec is extrapolated for GLO.
- Niobium-95 [water, surface water]: 6.11079e-10 kBq; lognormal variance with pedigree 0.4706, pedigree (2,5,5,5,5)
  Estimated value. Value extrapolated from a different PWR technology.
- Antimony-124 [water, surface water]: 5.1146e-6 kBq; lognormal variance with pedigree 0.3053, pedigree (2,4,3,3,2)
  Estimated value. Measured/calculated value for Quebec is extrapolated for GLO.
- Cobalt-60 [air, non-urban air or from high stacks]: 1.5068e-11 kBq; lognormal variance with pedigree 0.4706, pedigree (2,5,5,5,5)
  Estimated value. Value extrapolated from a different PWR technology.
- Iodine-131 [water, surface water]: 9.9635e-7 kBq; lognormal variance with pedigree 0.0059, pedigree (2,4,3,3,2)
  Estimated value. Measured/calculated value for Quebec is extrapolated for GLO.
- Noble gases, radioactive, unspecified [air, non-urban air or from high stacks]: 5.15536e-5 kBq; lognormal variance with pedigree 0.4706, pedigree (2,5,5,5,5)
  Estimated value. Value extrapolated from a different PWR technology.
- Technetium-99m [water, surface water]: 5.59327e-10 kBq; lognormal variance with pedigree 0.4706, pedigree (2,5,5,5,5)
  Estimated value. Value extrapolated from a different PWR technology.
- Xenon-133 [air, non-urban air or from high stacks]: 0.000120225 kBq; lognormal variance with pedigree 0.4706, pedigree (2,5,5,5,5)
  Estimated value. Value extrapolated from a different PWR technology.
- Zirconium-95 [air, non-urban air or from high stacks]: 1.1505e-11 kBq; lognormal variance with pedigree 0.4706, pedigree (2,5,5,5,5)
  Estimated value. Value extrapolated from a different PWR technology.
- Antimony-122 [water, surface water]: 1.7994e-10 kBq; lognormal variance with pedigree 0.4706, pedigree (2,5,5,5,5)
  Estimated value. Value extrapolated from a different PWR technology.
- Molybdenum-99 [water, surface water]: 1.19429e-12 kBq; lognormal variance with pedigree 0.3433, pedigree (2,2,5,5,2)
  Estimated value. Value extrapolated from a different PWR technology.
- Cobalt-58 [air, non-urban air or from high stacks]: 3.2644e-12 kBq; lognormal variance with pedigree 0.4706, pedigree (2,5,5,5,5)
  Estimated value. Value extrapolated from a different PWR technology.
- Iodine-133 [air, non-urban air or from high stacks]: 3.62268e-10 kBq; lognormal variance with pedigree 0.4706, pedigree (2,5,5,5,5)
  Estimated value. Value extrapolated from a different PWR technology.
- Radioactive species, other beta emitters [air, non-urban air or from high stacks]: 1.72575e-11 kBq; lognormal variance with pedigree 0.4706, pedigree (2,5,5,5,5)
  Estimated value. Value extrapolated from a different PWR technology.
- Carbon-14 [water, surface water]: 5.70134e-7 kBq; lognormal variance with pedigree 0.0059, pedigree (2,4,3,3,2)
  Estimated value. Measured/calculated value for Quebec is extrapolated for GLO.
- Ruthenium-103 [water, surface water]: 5.67288e-11 kBq; lognormal variance with pedigree 0.4706, pedigree (2,5,5,5,5)
  Estimated value. Value extrapolated from a different PWR technology.
- Krypton-85m [air, non-urban air or from high stacks]: 1.96461e-6 kBq; lognormal variance with pedigree 0.4706, pedigree (2,5,5,5,5)
  Estimated value. Value extrapolated from a different PWR technology.
- Zinc-65 [water, surface water]: 3.65328e-7 kBq; lognormal variance with pedigree 0.0059, pedigree (2,4,3,3,2)
  Estimated value. Measured/calculated value for Quebec is extrapolated for GLO.
- Radioactive species, alpha emitters [water, surface water]: 6.01127e-12 kBq; lognormal variance with pedigree 0.4706, pedigree (2,5,5,5,5)
  Estimated value. Value extrapolated from a different PWR technology.
- Tellurium-123m [water, surface water]: 3.12506e-10 kBq; lognormal variance with pedigree 0.4706, pedigree (2,5,5,5,5)
  Estimated value. Value extrapolated from a different PWR technology.
- Carbon-14 [air, non-urban air or from high stacks]: 4.89319e-9 kBq; lognormal variance with pedigree 0.3053, pedigree (2,4,3,3,2)
  Estimated value. Measured/calculated value for Quebec is extrapolated for GLO.
- Cobalt-58 [water, surface water]: 2.26915e-7 kBq; lognormal variance with pedigree 0.4706, pedigree (2,5,5,5,5)
  Estimated value. Value extrapolated from a different PWR technology.
- Cerium-141 [water, surface water]: 3.50325e-11 kBq; lognormal variance with pedigree 0.4706, pedigree (2,5,5,5,5)
  Estimated value. Value extrapolated from a different PWR technology.
- Cesium-136 [water, surface water]: 5.59327e-11 kBq; lognormal variance with pedigree 0.4706, pedigree (2,5,5,5,5)
  Estimated value. Value extrapolated from a different PWR technology.
- Silver-110 [water, surface water]: 8.81785e-10 kBq; lognormal variance with pedigree 0.4706, pedigree (2,5,5,5,5)
  Estimated value. Value extrapolated from a different PWR technology.
- Xenon-135 [air, non-urban air or from high stacks]: 3.30421e-5 kBq; lognormal variance with pedigree 0.4706, pedigree (2,5,5,5,5)
  Estimated value. Value extrapolated from a different PWR technology.
- Zirconium-95 [water, surface water]: 2.32482e-6 kBq; lognormal variance with pedigree 0.3053, pedigree (2,4,3,3,2)
  Estimated value. Measured/calculated value for Quebec is extrapolated for GLO.
- Manganese-54 [water, surface water]: 2.60754e-9 kBq; lognormal variance with pedigree 0.4706, pedigree (2,5,5,5,5)
  Estimated value. Value extrapolated from a different PWR technology.
- Sodium-24 [water, surface water]: 1.9865e-9 kBq; lognormal variance with pedigree 0.4706, pedigree (2,5,5,5,5)
  Estimated value. Value extrapolated from a different PWR technology.
- Niobium-95 [air, non-urban air or from high stacks]: 5.70134e-6 kBq; lognormal variance with pedigree 0.0059, pedigree (2,4,3,3,2)
  Estimated value. Measured/calculated value for Quebec is extrapolated for GLO.
- Cerium-144 [water, surface water]: 9.59414e-11 kBq; lognormal variance with pedigree 0.4706, pedigree (2,5,5,5,5)
  Estimated value. Value extrapolated from a different PWR technology.
- Cesium-137 [air, non-urban air or from high stacks]: 1.44907e-12 kBq; lognormal variance with pedigree 0.4706, pedigree (2,5,5,5,5)
  Estimated value. Value extrapolated from a different PWR technology.
- Aerosols, radioactive, unspecified [air, non-urban air or from high stacks]: 2.66247e-10 kBq; lognormal variance with pedigree 0.0059, pedigree (2,4,3,3,2)
  Estimated value. Measured/calculated value for Quebec is extrapolated for GLO.
- Antimony-125 [air, non-urban air or from high stacks]: 4.65774e-12 kBq; lognormal variance with pedigree 0.4706, pedigree (2,5,5,5,5)
  Estimated value. Value extrapolated from a different PWR technology.
- Cobalt-60 [water, surface water]: 1.39489e-7 kBq; lognormal variance with pedigree 0.0059, pedigree (2,4,3,3,2)
  Estimated value. Measured/calculated value for Quebec is extrapolated for GLO.
- Strontium-90 [water, surface water]: 2.58763e-10 kBq; lognormal variance with pedigree 0.4706, pedigree (2,5,5,5,5)
  Estimated value. Value extrapolated from a different PWR technology.
- Silver-110 [air, non-urban air or from high stacks]: 6.23022e-13 kBq; lognormal variance with pedigree 0.4706, pedigree (2,5,5,5,5)
  Estimated value. Value extrapolated from a different PWR technology.
- Iodine-133 [water, surface water]: 8.28042e-11 kBq; lognormal variance with pedigree 0.4706, pedigree (2,5,5,5,5)
  Estimated value. Value extrapolated from a different PWR technology.
- Cesium-137 [water, surface water]: 4.11825e-8 kBq; lognormal variance with pedigree 0.0059, pedigree (2,4,3,3,2)
  Estimated value. Measured/calculated value for Quebec is extrapolated for GLO.
- Cobalt-57 [water, surface water]: 1.77551e-9 kBq; lognormal variance with pedigree 0.4706, pedigree (2,5,5,5,5)
  Estimated value. Value extrapolated from a different PWR technology.
- Antimony-125 [water, surface water]: 8.30033e-9 kBq; lognormal variance with pedigree 0.4706, pedigree (2,5,5,5,5)
  Estimated value. Value extrapolated from a different PWR technology.
- Iron-59 [water, surface water]: 4.64963e-6 kBq; lognormal variance with pedigree 0.0059, pedigree (2,4,3,3,2)
  Estimated value. Measured/calculated value for Quebec is extrapolated for GLO.
- Strontium-89 [water, surface water]: 7.26527e-10 kBq; lognormal variance with pedigree 0.4706, pedigree (2,5,5,5,5)
  Estimated value. Value extrapolated from a different PWR technology.
- Lanthanum-140 [water, surface water]: 9.8529e-11 kBq; lognormal variance with pedigree 0.4706, pedigree (2,5,5,5,5)
  Estimated value. Value extrapolated from a different PWR technology.
- Hydrogen-3, Tritium [water, surface water]: 0.0265693 kBq; lognormal variance with pedigree 0.0059, pedigree (2,4,3,3,2)
  Estimated value. Measured/calculated value for Quebec is extrapolated for GLO.
- Sulfur [water, ocean]: 6.26512e-13 kg; lognormal variance with pedigree 0.092, pedigree (3,5,5,5,1)
  Extrapolation for sum parameter
  Uncertainty: Extrapolation for sum parameter
- AOX, Adsorbable Organic Halogen as Cl [water, ocean]: 2.41207e-15 kg; lognormal variance with pedigree 0.092, pedigree (3,5,5,5,1)
  Extrapolation for sum parameter
  Uncertainty: Extrapolation for sum parameter
- Methane, fossil [air, non-urban air or from high stacks]: 1.13927e-5 kg; lognormal variance with pedigree 0.1, pedigree (1,1,5,5,3)
  Environmental report, aggregation of different processes
  Uncertainty: environmental report, aggregation of different processes
- TOC, Total Organic Carbon [water, ocean]: 1.74118e-8 kg; lognormal variance with pedigree 0.1, pedigree (1,1,5,5,3)
  (same comment as for Methane, fossil)
- Triethylene glycol [water, ocean]: 3.15866e-9 kg; lognormal variance with pedigree 0.36, pedigree (1,1,5,5,3)
  (same comment as for Methane, fossil)
- Nitrogen oxides [air, non-urban air or from high stacks]: 4.04171e-7 kg; lognormal variance with pedigree 0.1, pedigree (1,1,5,5,3)
  (same comment as for Methane, fossil)
- Methanol [water, ocean]: 1.04941e-9 kg; lognormal variance with pedigree 0.36, pedigree (1,1,5,5,3)
  (same comment as for Methane, fossil)
- Ammonium, ion [water, ocean]: 2.47211e-11 kg; lognormal variance with pedigree 0.1, pedigree (1,1,5,5,3)
  (same comment as for Methane, fossil)
- Sulfur dioxide [air, non-urban air or from high stacks]: 1.19765e-8 kg; lognormal variance with pedigree 0.06, pedigree (1,1,5,5,3)
  (same comment as for Methane, fossil)
- NMVOC, non-methane volatile organic compounds, unspecified origin [air, non-urban air or from high stacks]: 2.80105e-6 kg; lognormal variance with pedigree 0.18, pedigree (1,1,5,5,3)
  (same comment as for Methane, fossil)
- Phenol [water, ocean]: 1.30931e-9 kg; lognormal variance with pedigree 0.36, pedigree (1,1,5,5,3)
  (same comment as for Methane, fossil)
- Oils, unspecified [water, ocean]: 6.69312e-9 kg; lognormal variance with pedigree 0.36, pedigree (1,1,5,5,3)
  (same comment as for Methane, fossil)
- DOC, Dissolved Organic Carbon [water, ocean]: 1.74118e-8 kg; lognormal variance with pedigree 0.092, pedigree (3,5,5,5,1)
  Extrapolation for sum parameter
  Uncertainty: Extrapolation for sum parameter
- Nitrogen [water, ocean]: 1.80905e-13 kg; lognormal variance with pedigree 0.092, pedigree (3,5,5,5,1)
  Extrapolation for sum parameter
  Uncertainty: Extrapolation for sum parameter
- COD, Chemical Oxygen Demand [water, ocean]: 7.10047e-9 kg; lognormal variance with pedigree 0.092, pedigree (3,5,5,5,1)
  Extrapolation for sum parameter
  Uncertainty: Extrapolation for sum parameter
- BOD5, Biological Oxygen Demand [water, ocean]: 7.10047e-9 kg; lognormal variance with pedigree 0.092, pedigree (3,5,5,5,1)
  Extrapolation for sum parameter
  Uncertainty: Extrapolation for sum parameter
- Methane, dichlorodifluoro-, CFC-12 [air, urban air close to ground]: 2.86163e-8 kg; lognormal variance with pedigree 0.042, pedigree (1,1,5,5,1)
- Ethane, 1,2-dichloro- [water, surface water]: 2.78167e-9 kg; lognormal variance with pedigree 0.042, pedigree (1,1,5,5,1)
- Acidity, unspecified [water, surface water]: 9.03682e-9 kg; lognormal variance with pedigree 0.042, pedigree (1,1,5,5,1)
- Ethene, chloro- [air, urban air close to ground]: 5.0927e-7 kg; lognormal variance with pedigree 0.042, pedigree (1,1,5,5,1)
- Ethene, chloro- [water, surface water]: 5.71111e-11 kg; lognormal variance with pedigree 0.042, pedigree (1,1,5,5,1)
- Ethane, 1,2-dichloro- [air, urban air close to ground]: 9.99691e-7 kg; lognormal variance with pedigree 0.042, pedigree (1,1,5,5,1)
- Bromate [water, surface water]: 1.4793e-10 kg; lognormal variance with pedigree 0.042, pedigree (1,1,5,5,1)
- Chlorate [water, surface water]: 1.4793e-10 kg; lognormal variance with pedigree 0.042, pedigree (1,1,5,5,1)
- Dissolved solids [water, surface water]: 1.80925e-8 kg; lognormal variance with pedigree 0.042, pedigree (1,1,5,5,1)
- Carbonate [water, surface water]: 3.49792e-9 kg; lognormal variance with pedigree 0.042, pedigree (1,1,5,5,1)
- Chlorine [water, surface water]: 7.14097e-9 kg; lognormal variance with pedigree 0.042, pedigree (1,1,5,5,1)
- Chlorinated solvents, unspecified [water, surface water]: 9.60234e-9 kg; lognormal variance with pedigree 0.042, pedigree (1,1,5,5,1)
- Ammonium, ion [water, surface water]: 4.77497e-10 kg; lognormal variance with pedigree 0.042, pedigree (1,1,5,5,1)
- Sulfate [air, urban air close to ground]: 6.48691e-10 kg; lognormal variance with pedigree 0.042, pedigree (1,1,5,5,1)
- Hydrogen [air, urban air close to ground]: 3.53006e-7 kg; lognormal variance with pedigree 0.042, pedigree (1,1,5,5,1)
- Hydrocarbons, chlorinated [air, urban air close to ground]: 5.25023e-7 kg; lognormal variance with pedigree 0.042, pedigree (1,1,5,5,1)
- Cyanide [water, surface water]: 1.4793e-10 kg; lognormal variance with pedigree 0.042, pedigree (1,1,5,5,1)
- Hydrogen sulfide [air, urban air close to ground]: 1.4793e-10 kg; lognormal variance with pedigree 0.042, pedigree (1,1,5,5,1)
- Phenol [water, surface water]: 6.02024e-10 kg; lognormal variance with pedigree 0.042, pedigree (1,1,5,5,1)
- Aldehydes, unspecified [air, urban air close to ground]: 1.4793e-10 kg; lognormal variance with pedigree 0.042, pedigree (1,1,5,5,1)
- Propane [air, non-urban air or from high stacks]: 2.79604e-7 kg; lognormal variance with pedigree 0.0827, pedigree (2,2,5,5,1)
  Leakage rate specific for RU, data 2000
  Uncertainty: leakage rate specific for RU, data 2000
- Radon-222 [air, non-urban air or from high stacks]: 5.21737e-6 kBq; lognormal variance with pedigree 0.3427, pedigree (2,2,5,5,1)
  (same comment as for Propane)
- Butane [air, non-urban air or from high stacks]: 1.00802e-8 kg; lognormal variance with pedigree 0.0827, pedigree (2,2,5,5,1)
  (same comment as for Propane)
- Sulfur dioxide [air, unspecified]: 3.10074e-6 kg; lognormal variance with pedigree 0.342, pedigree (1,1,5,5,1)
  This exchange accounts for the sulfur dioxide emissions of natural gas production in Canada and the US, where sweetening (which is the major source of SO2 emissions) is included in the natural gas production datasets. Therefore, the amount is the weighted average of the respective amounts in the natural gas production datasets in the US and CA-AB. A separate flow of sulfur dioxide emissions represents the average emissions in geographies where sweetening is not necessary or covered in a separate process.
- Hydrogen sulfide [air, non-urban air or from high stacks]: 2.26878e-7 kg; lognormal variance with pedigree 0.0827, pedigree (2,2,5,5,1)
  (same comment as for Propane)
- Methane, fossil [air, unspecified]: 4.68507e-6 kg; lognormal variance with pedigree 0.342, pedigree (1,1,5,5,1)
  NREL 2007
- NMVOC, non-methane volatile organic compounds, unspecified origin [air, unspecified]: 1.91692e-6 kg; lognormal variance with pedigree 0.342, pedigree (1,1,5,5,1)
  NREL 2007
- Hydrocarbons, aromatic [air, unspecified]: 8.57829e-7 kg; lognormal variance with pedigree 0.342, pedigree (1,1,5,5,1)
  NREL 2007
- Benzene [water, surface water]: 1.35662e-12 kg; lognormal variance with pedigree 0.3827, pedigree (2,2,5,5,1)
  Data from other countries, assumptions
  Uncertainty: data from other countries, assumptions
- Ethane [air, non-urban air or from high stacks]: 7.96881e-7 kg; lognormal variance with pedigree 0.0827, pedigree (2,2,5,5,1)
  (same comment as for Propane)
- Carbon monoxide, fossil [air, non-urban air or from high stacks]: 8.59343e-9 kg; lognormal variance with pedigree 0.6921, pedigree (1,2,5,5,1)
  Environmental report for 50% market share in Germany
  Uncertainty: environmental report for 50% market share in Germany
- Methane, bromotrifluoro-, Halon 1301 [air, non-urban air or from high stacks]: 2.98419e-10 kg; lognormal variance with pedigree 0.7747, pedigree (2,2,3,5,5)
  Environmental report
  Uncertainty: Environmental report. Uncertainty has been increased to reflect the extrapolation from a different region.
- Sulfur [water, surface water]: 8.97808e-10 kg; lognormal variance with pedigree 0.212, pedigree (3,5,5,5,5)
  Extrapolation for sum parameter
  Uncertainty: Extrapolation for sum parameter. Uncertainty has been increased to reflect the extrapolation from a different region.
- Xylene [water, ocean]: 6.83668e-10 kg; lognormal variance with pedigree 0.342, pedigree (1,1,5,5,1)
  (same comment as for Water, salt, sole)
- Chromium, ion [water, ocean]: 1.04483e-12 kg; lognormal variance with pedigree 0.082, pedigree (1,1,5,5,1)
  (same comment as for Water, salt, sole)
- Toluene [water, ocean]: 6.83668e-10 kg; lognormal variance with pedigree 0.342, pedigree (1,1,5,5,1)
  (same comment as for Water, salt, sole)
- Methane, bromochlorodifluoro-, Halon 1211 [air, non-urban air or from high stacks]: 4.61118e-13 kg; lognormal variance with pedigree 0.0826, pedigree (2,1,5,5,1)
  environmental report for the total Norwegian production, assumption for type of halon
  Uncertainty: environmental report for the total Norwegian production, assumption for type of halon
- Benzene [water, ocean]: 6.83668e-10 kg; lognormal variance with pedigree 0.342, pedigree (1,1,5,5,1)
  environmental report for the total Norwegian production, assumption for the break down of BTX.
  Uncertainty: environmental report for the total Norwegian production, assumption for the break down of BTX.
- Carboxylic acids, unspecified [water, ocean]: 5.68857e-8 kg; lognormal variance with pedigree 0.342, pedigree (1,1,5,5,1)
  (same comment as for Water, salt, sole)
- PAH, polycyclic aromatic hydrocarbons [water, ocean]: 9.04861e-11 kg; lognormal variance with pedigree 0.342, pedigree (1,1,5,5,1)
  (same comment as for Benzene)
