# activated bentonite production

Dataset: EcoSpold 2, unit process
Geography: DE
Time period: 1997-01-01 to 2019-12-31
Technology level: current
Classification: ISIC rev.4 ecoinvent: 2011:Manufacture of basic chemicals
Scenario: Business-as-Usual
System model: Allocation at the point of substitution
Generated by: Daniel Kellenberger (obsolete)
Published in: Kellenberger D. 2004
Database: ecoinvent
isCopyrightProtected: true
accessRestrictedTo: 1

## General comment
This dataset represents the production of 1 kg of activated bentonite, which represents a mix of products, put together from the production processes of alkaline activated bentonite (38%), acid activated bentonite (61%) and catalytic converter (1%). Bentonite is an industrial mineral with a high content of swellable threelayer clay minerals, which originate mostly from the transformation of volcanic ashes and tuffs. Alkaline activated bentonite is used for the production of casting moulds, for various applications in the construction sector, for wine clarification and for paper recycling. Acid activated bentonite is mostly used for the production of bleaching earth and self-copying paper. This dataset is based on an environmental report of a German company (Süd-Chemie AG).
References:
Kellenberger D., Althaus H.-J., Jungbluth N., Künniger T., Lehmann M. and Thalmann P. (2007) Life Cycle Inventories of Building Products. Final report ecoinvent Data v2.0 No. 7. EMPA Dübendorf, Swiss Centre for Life Cycle Inventories, Dübendorf, CH.

## Included activities start
The activity starts when the raw materials enter the process.

## Included activities end
This activity ends with the production of acid and alkaline activated bentonite (using two separate production processes). The production process of acid activated bentonite includes milling, activation, filtration/washing, milling, drying and storage. The production process of alkaline activated bentonite includes mixing, activation, grinding-drying, mixing/milling/granulation and storage. The dataset includes emissions to water, which is released into a river after treatment, as well as emissions to air.

## Geography
This dataset is based on data from a German company.

## Technology
Mix of different production processes for different products in one German plant: 61% acid activated bentonite, 38% alkaline activated bentonite and 1% catalytic converter.
References:
Kellenberger D., Althaus H.-J., Jungbluth N., Künniger T., Lehmann M. and Thalmann P. (2007) Life Cycle Inventories of Building Products. Final report ecoinvent Data v2.0 No. 7. EMPA Dübendorf, Swiss Centre for Life Cycle Inventories, Dübendorf, CH.

## Parameters
- fraction, tap water, to air: 0.15; name fraction_TW_to_air; = fraction_PW_to_air; lognormal variance with pedigree 0.092025, pedigree (4,4,3,2,4)
  Calculated value. See comment in the other parametres present in this dataset. Tap water is considered to be always used as process water, thus process water fractions to air are applied to all tap water input flows to calculate the amount of water consumed in the processes.
- fraction, process water, to air: 0.15 dimensionless; name fraction_PW_to_air; lognormal variance with pedigree 0.092025, pedigree (4,4,3,2,4)
  Literature value. In case when no industry/process specific data are available, default evaporation fraction value is used. This value is 15% and is based on literature (Statistics Canada, 2007 & Shaffer, K.H., 2008, Consumptive water use in the Great Lakes Basin, USGS & Shiklomanov, 2003, World Water Resources at the Beginning of the 21st Century) and has been approved by an expert.

## Reference product
- activated bentonite: 1 kg; name RP; By-product classification allocatable product; CPC 15400: Clays
  Bentonite is an industrial mineral with a high content of swellable threelayer clay minerals, which originate mostly from the transformation of volcanic ashes and tuffs. Alkaline activated bentonite is used for the production of casting moulds, for various applications in the construction sector, for wine clarification and for paper recycling. Acid activated bentonite is mostly used for the production of bleaching earth and self-copying paper.
  production volume 2.16e7 kg; name RP_PV; = 0.06*360000000
    Estimated based on the production volume of bentonite, which was 360 thousand tonnes in 2016 in Germany (USGS 2017). According to the Industrial Minerals Magazine (2016), about 6% of the bentonite consumed in China is used for the production of activated clays. This share is assumed to be the same in Germany. Therefore, the amount of activated bentonite produced in Germany in 2016 is estimated to be 21.6 thousand tonnes.
    References:
    U.S. Geological Survey (USGS) (2017) Mineral Commodity Summaries, Clays, January 2017, https://minerals.usgs.gov/minerals/pubs/commodity/clays/mcs-2017-clays.pdf (accessed on the 2017-08-08).
    Industrial Minerals Magazine (2016) Soaking it up: Bentonite’s global reach, June issue, pages 37-42.
  property carbon content, non-fossil 0
    Bentonite is an absorbent aluminium phyllosilicate, generally impure clay consisting mostly of montmorillonite, whose chemical formula is (Na,Ca)0.33(Al,Mg)2(Si4O10)(OH)2·nH2O (ecoinvent v2.2 report 7_part XIX)
  property carbon content, fossil 0
    (same comment as for activated bentonite)
  property price 0.096 EUR2005
    Literature data; http://data.un.org/Data.aspx?q=bentonite&d=ComTrade&f=_l1Code%3a26%3bcmdCode%3a250810.
  property carbon content 0
    carbon content on a dry matter basis (reserved; not for manual entry)
  property true value 0.096; name RP_true_value
    allocation property applied in "true value" allocation // value calculated from revenue
  properties: water in wet mass 0 kg, water content 0, dry mass 1 kg, wet mass 1 kg, carbon allocation 0 kg

## By-products
- heat, for reuse in municipal waste incineration only: 0 MJ; CPC 17300: Steam and hot water; By-product classification allocatable product; pedigree (1,1,1,1,1)
  Net electricity generated from this waste and used in internal MSWI plant energy redistribution.
  Uncertainty: uncertainty is calculated from uncertainties in waste composition and uncertainties in energy efficiency and the uncertainty in internal energy demand
  production volume 70.6947 MJ
  property exergy 0.1842 MJ; name E_th_prod_MSWI_exergy
    This exergy property is based on the exergy content of the product.
  property price 0.0106 EUR2005; name E_th_prod_MSWI_price_EUR2005
    Average European district heat price from Ecoheatcool and Euroheat 2005-2006, Ecoheat Work package 1: The European heat market. Final report. 10.6 EUR/GJ i s the price of district heat. http://www.solarthermalworld.org/files/Ecoheatcool%20WP1%20Web.pdf?download
  property true value relation 0.1842; name E_th_prod_MSWI_true_value_relation
    property to calculate "true value" from
  property true value 2.15779e-8
    allocation property applied in "true value" allocation // value calculated from true value relation
- electricity, for reuse in municipal waste incineration only: 0 kWh; CPC 17100: Electrical energy; By-product classification allocatable product; pedigree (1,1,1,1,1)
  (same comment as for heat, for reuse in municipal waste incineration only)
  production volume 9.81869 kWh
  property price 0.1 EUR2005; name E_el_prod_MSWI_price_EUR2005
    Estimated to be the same price as in case of electricity, medium voltage.
  property exergy 3.6 MJ; name E_el_prod_MSWI_exergy
    This exergy property is based on the exergy content of the product.
  property true value relation 3.6; name E_el_prod_MSWI_true_value_relation
    property to calculate "true value" from
  property true value 5.85718e-8
    (same comment as for heat, for reuse in municipal waste incineration only)

## Inputs from technosphere
- bentonite: 0.999999 kg; lognormal variance with pedigree 0.0406, pedigree (1,3,5,1,1)
  Literature data.
  Reference:
  Süd-Chemie (1999) vereinfachte Umwelterklärung Bentonit 1999, Standort Moosburg. Süd-Chemie AG, München und Moosburg, D-80333 München.
  properties: dry mass 1 kg, wet mass 1 kg
- heat, district or industrial, natural gas: 0.2277 MJ; lognormal variance with pedigree 0.0406, pedigree (1,3,5,1,1)
- wastewater, from residence: -5.1e-5 m3; name BP_wastewater_from_residence; lognormal variance with pedigree 0.0406, pedigree (1,3,5,1,1)
  (same comment as for bentonite)
  production volume 1101.6 m3; = RP_PV*BP_wastewater_from_residence/ABS(RP)
    Calculated from the production volume of activated bentonite in proportion to the respective output amounts.
  property price 0 EUR2005; name BP_wastewater_from_residen_price_EUR2005
  properties: dry mass 0.337476 kg, carbon content, non-fossil 0.199421, water content 2962.17, wet mass 1000 kg
  note on carbon content, non-fossil: 0.0673 kg TOC/m3 (Tab A.17, ecoinvent v2.2 report 13_I). TOC was considered as Total Carbon.
- hydrochloric acid, without water, in 30% solution state: 0.164 kg; lognormal variance with pedigree 0.1106, pedigree (5,3,5,1,1)
  (same comment as for bentonite)
  properties: dry mass 1 kg, wet mass 1 kg
- inert waste, for final disposal: -0.0717999 kg; name BP_inert_waste_for_final_disposal; lognormal variance with pedigree 0.0406, pedigree (1,3,5,1,1)
  (same comment as for bentonite)
  production volume 1.55088e6 kg; = RP_PV*BP_inert_waste_for_final_disposal/ABS(RP)
    (same comment as for wastewater, from residence)
  property price 0 EUR2005; name BP_inert_waste_for_final_d_price_EUR2005
  properties: dry mass 0.995 kg, water content 0.00502513, wet mass 1 kg
- hard coal: 0.0282 kg; lognormal variance with pedigree 0.0406, pedigree (1,3,5,1,1)
  (same comment as for bentonite)
  properties: water content 0.0638298, carbon content, fossil 0.845, dry mass 0.94 kg, wet mass 1 kg
  note on carbon content, fossil: C content 75-94% (specified in Tab 1.1, report 6, part VI). A mean content of 0.845 kg C/ kg dry hard coal was considered
- hazardous waste, for underground deposit: -0.0113 kg; name BP_hazardous_waste_for_underground; lognormal variance with pedigree 0.0406, pedigree (1,3,5,1,1)
  (same comment as for bentonite)
  production volume 244080 kg; = RP_PV*BP_hazardous_waste_for_underground/ABS(RP)
    (same comment as for wastewater, from residence)
  property price 0 EUR2005; name BP_hazardous_waste_for_und_price_EUR2005
  properties: wet mass 1 kg, dry mass 1 kg, carbon content, fossil 0.554667
  note on carbon content, fossil: Tab A.6, ecoinvent v2.2 report 13_I, average hazardous waste composition was used, and referred to 0% water mass. No waste-specific emission are currently inventoried for underground deposits. Accordingly, no waste composition must be specified. For generic, average waste to underground deposit deposition in a 200 liter steel drum without cement solidification is assumed (ecoinvent v2.2 report 13_I).
- electricity, medium voltage: 0.126 kWh; lognormal variance with pedigree 0.0406, pedigree (1,3,5,1,1)
  (same comment as for bentonite)
- tap water: 0.0306 kg; name tap_water_input; lognormal variance with pedigree 0.0406, pedigree (1,3,5,1,1)
  (same comment as for bentonite)
  properties: wet mass 1 kg, carbon content, fossil 0.00178991, water content 2962.17, dry mass 0.000337476 kg
  note on carbon content, fossil: Bicarbonate content is 2.93 mol/m3. CO2 content is 0.1 mol/m3 (ecoinvent v2.2 report 8, Tab 93.1).
- diesel, burned in building machine: 0.00933999 MJ; lognormal variance with pedigree 0.0406, pedigree (1,3,5,1,1)
  (same comment as for bentonite)
- sulfuric acid: 0.164 kg; lognormal variance with pedigree 0.1106, pedigree (5,3,5,1,1)
  (same comment as for bentonite)
  properties: wet mass 1 kg, dry mass 1 kg
- bentonite quarry infrastructure: 5.78e-11 unit; lognormal variance with pedigree 0.3406, pedigree (1,3,5,1,1)
  (same comment as for bentonite)
- sodium hydroxide, without water, in 50% solution state: 0.00328 kg; lognormal variance with pedigree 0.0406, pedigree (1,3,5,1,1)
  (same comment as for bentonite)
  properties: wet mass 1 kg, dry mass 1 kg
- chemical, organic: 0.0917999 kg; lognormal variance with pedigree 0.0406, pedigree (1,3,5,1,1)
  (same comment as for bentonite)
  properties: dry mass 1 kg, wet mass 1 kg, carbon content, fossil 0.628
  note on carbon content, fossil: This dataset is an unweighted average of 20 organic substances (listed in Tab 88.1, ecoinvent v2.2 report 8, part II), being part of the top100 chemicals included in this database. The C-content has also been calculated as an unweighted average of the C content of the substances composing this dataset.
- soda ash, light, crystalline, heptahydrate: 0.0331 kg; lognormal variance with pedigree 0.0406, pedigree (1,3,5,1,1)
  (same comment as for bentonite)
  properties: wet mass 1 kg, dry mass 1 kg, carbon content, fossil 0.0517241

## Inputs from nature
- Water, well, in ground [natural resource, in water]: 0.00748999 m3; name water_well_in_ground_input; lognormal variance with pedigree 0.0406, pedigree (1,3,5,1,1)
  (same comment as for bentonite)

## Emissions to nature
- Arsenic, ion [water, surface water]: 3.18e-8 kg; lognormal variance with pedigree 0.6906, pedigree (1,3,5,1,1)
  (same comment as for bentonite)
- Particulates, > 10 um [air, unspecified]: 4.21e-5 kg; lognormal variance with pedigree 0.2506, pedigree (1,3,5,1,1)
  (same comment as for bentonite)
- AOX, Adsorbable Organic Halogen as Cl [water, surface water]: 8.67999e-9 kg; lognormal variance with pedigree 0.0806, pedigree (1,3,5,1,1)
  (same comment as for bentonite)
- Particulates, < 2.5 um [air, unspecified]: 2.83e-5 kg; lognormal variance with pedigree 0.2506, pedigree (1,3,5,1,1)
  (same comment as for bentonite)
- Ammonium, ion [water, surface water]: 2.89e-7 kg; lognormal variance with pedigree 0.0806, pedigree (1,3,5,1,1)
  (same comment as for bentonite)
- NMVOC, non-methane volatile organic compounds, unspecified origin [air, unspecified]: 3.18e-6 kg; lognormal variance with pedigree 0.0806, pedigree (1,3,5,1,1)
  (same comment as for bentonite)
- Ammonia [air, unspecified]: 2.89e-6 kg; lognormal variance with pedigree 0.0806, pedigree (1,3,5,1,1)
  (same comment as for bentonite)
- Nitrate [water, surface water]: 2.14e-5 kg; lognormal variance with pedigree 0.0806, pedigree (1,3,5,1,1)
  (same comment as for bentonite)
- Aluminium [water, surface water]: 4.74e-7 kg; lognormal variance with pedigree 0.6906, pedigree (1,3,5,1,1)
  (same comment as for bentonite)
- Nickel, ion [water, surface water]: 1.45e-8 kg; lognormal variance with pedigree 0.6906, pedigree (1,3,5,1,1)
  (same comment as for bentonite)
- Mercury [water, surface water]: 8.67999e-9 kg; lognormal variance with pedigree 0.6906, pedigree (1,3,5,1,1)
  (same comment as for bentonite)
- Lead [water, surface water]: 5.78e-9 kg; lognormal variance with pedigree 0.6906, pedigree (1,3,5,1,1)
  (same comment as for bentonite)
- Iron, ion [water, surface water]: 3.88e-7 kg; lognormal variance with pedigree 0.6906, pedigree (1,3,5,1,1)
  (same comment as for bentonite)
- Zinc, ion [water, surface water]: 1.16e-8 kg; lognormal variance with pedigree 0.6906, pedigree (1,3,5,1,1)
  (same comment as for bentonite)
- Hydrogen chloride [air, unspecified]: 2.89e-8 kg; lognormal variance with pedigree 0.0806, pedigree (1,3,5,1,1)
  (same comment as for bentonite)
- Water [water, unspecified]: 0.0063925 m3; = (tap_water_input/1000)*(1-fraction_TW_to_air)+water_well_in_ground_input*(1-fraction_PW_to_air); lognormal variance with pedigree 0.0807, pedigree (2,2,5,1,1)
  Calculated as a fraction of the input of water. For more details, refer to the mathematical relation and the parameters.
  property fraction, origin: unspecified 0; name fraction_origin_unspecified_Ww
  property water in wet mass 1000 kg; name WWM
  property carbon content, non-fossil 0; name C_content_non_fossil
  property carbon content, fossil 0; name C_content_fossil
  property dry mass 0 kg; name DM
  property fraction, origin: fresh water 1; name fraction_origin_fresh_water_Ww
  property fraction, origin: salt water 0; name fraction_origin_salt_water_Ww
  property wet mass 1000 kg; name WM
- Hydrocarbons, unspecified [water, surface water]: 1.45e-8 kg; lognormal variance with pedigree 0.3406, pedigree (1,3,5,1,1)
  (same comment as for bentonite)
- Water [air, unspecified]: 0.00112809 m3; = (tap_water_input/1000*fraction_TW_to_air)+(water_well_in_ground_input*fraction_PW_to_air); lognormal variance with pedigree 0.0807, pedigree (2,2,5,1,1)
  (same comment as for Water)
  property fraction, origin: salt water 0; name fraction_origin_salt_water
  property fraction, origin: fresh water 1; name fraction_origin_fresh_water
  property fraction, origin: unspecified 0; name fraction_origin_unspecified
- DOC, Dissolved Organic Carbon [water, surface water]: 1.31852e-5 kg; lognormal variance with pedigree 0.0806, pedigree (1,3,5,1,1)
  Calculated as equal to TOC.
- TOC, Total Organic Carbon [water, surface water]: 1.31852e-5 kg; lognormal variance with pedigree 0.0806, pedigree (1,3,5,1,1)
  Calculated by default as TOC (gC) = COD/2.7 (COD measured in g O2). Should more correctly be calculated from the carbon content of the specified emissions to water.
- COD, Chemical Oxygen Demand [water, surface water]: 3.56e-5 kg; lognormal variance with pedigree 0.0806, pedigree (1,3,5,1,1)
  (same comment as for bentonite)
- Suspended solids, unspecified [water, surface water]: 0.0182 kg; lognormal variance with pedigree 0.0806, pedigree (1,3,5,1,1)
  (same comment as for bentonite)
- Copper, ion [water, surface water]: 8.67999e-9 kg; lognormal variance with pedigree 0.6906, pedigree (1,3,5,1,1)
  (same comment as for bentonite)
- Sulfur dioxide [air, unspecified]: 1.97e-6 kg; lognormal variance with pedigree 0.0406, pedigree (1,3,5,1,1)
  (same comment as for bentonite)
- Chromium, ion [water, surface water]: 5.78e-9 kg; lognormal variance with pedigree 0.6906, pedigree (1,3,5,1,1)
  (same comment as for bentonite)
- Sulfate [water, surface water]: 0.00188 kg; lognormal variance with pedigree 0.1506, pedigree (5,3,5,1,1)
  (same comment as for bentonite)
- Chloride [water, surface water]: 0.00166 kg; lognormal variance with pedigree 0.1506, pedigree (5,3,5,1,1)
  (same comment as for bentonite)
- Sodium, ion [water, surface water]: 0.00199 kg; lognormal variance with pedigree 0.1506, pedigree (5,3,5,1,1)
  (same comment as for bentonite)
- Cadmium, ion [water, surface water]: 5.78e-9 kg; lognormal variance with pedigree 0.6906, pedigree (1,3,5,1,1)
  (same comment as for bentonite)
- Phosphorus [water, surface water]: 6.93999e-5 kg; lognormal variance with pedigree 0.0806, pedigree (1,3,5,1,1)
  (same comment as for bentonite)
- BOD5, Biological Oxygen Demand [water, surface water]: 7.11999e-5 kg; lognormal variance with pedigree 0.0806, pedigree (1,3,5,1,1)
  Calculated as 0.5*COD.
- Particulates, > 2.5 um, and < 10um [air, unspecified]: 9.14999e-5 kg; lognormal variance with pedigree 0.2506, pedigree (1,3,5,1,1)
  (same comment as for bentonite)

## Sampling procedure
Environmental report of a German company (Süd-Chemie AG).

## Review by Emilia Moreno Ruiz 2017-08-10
This dataset was additionally reviewed in a separate review process by Eric Johnson of Atlantic Consulting as well as Emilia Moreno Ruiz and Gregor Wernet of ecoinvent.
