# heat production, biogas, at diffusion absorption heat pump 4kW, future

Dataset: EcoSpold 2, unit process
Geography: CH
Time period: 2000-01-01 to 2019-12-31
Technology level: current
Classification: ISIC rev.4 ecoinvent: 3821:Treatment and disposal of non-hazardous waste
Classification: EcoSpold01Categories: heat pumps/heating systems
Synonyms: DAHP; DAWP
Tags: ConvertedDataset
Scenario: Business-as-Usual
System model: Allocation at the point of substitution
Generated by: Alex Primas
Published in: Primas A. 2007
Database: ecoinvent
isCopyrightProtected: true
accessRestrictedTo: 1

## General comment
NOx and CO emissions derived from measurements of gas boilers operated with natural gas under controlled conditions; no adjustment to real operation of the heat pump system is made due to lack of information. Other emission approximised with data for gas boilers from different references.
[This dataset was already contained in the ecoinvent database version 2. It was not individually updated during the transfer to ecoinvent version 3. Life Cycle Impact Assessment results may still have changed, as they are affected by changes in the supply chain, i.e. in other datasets. This dataset was generated following the ecoinvent quality guidelines for version 2. It may have been subject to central changes described in the ecoinvent version 3 change report (http://www.ecoinvent.org/database/ecoinvent-version-3/reports-of-changes/), and the results of the central updates were reviewed extensively. The changes added e.g. consistent water flows and other information throughout the database. The documentation of this dataset can be found in the ecoinvent reports of version 2, which are still available via the ecoinvent website. The change report linked above covers all central changes that were made during the conversion process.]

## Included activities end
The module includes input biogas input from low pressure gas network (CH), infrastructure (heat pump with peak boiler and borehole heat exchanger), emissions to air and water, and electricity needed for operation.

## Geography
Natural gas input modelled for Switzerland. Process applicable in central European conditions.

## Technology
Diffusion absorption heat pump with 4 kWth nominal thermal power connected to a short borehole heat exchanger. The unit includes a peak load boiler which allows a maximal output power of 11 kWth. Operation with connection to low pressure gas network. Seasonal performance factor (SPF) of 1.32. Supply temperature of the heating system 50°C.

## Reference product
- heat, diffusion absorption heat pump: 1 MJ; By-product classification allocatable product; CPC 17300: Steam and hot water
  production volume 0 MJ
    Unknown
    future
  property price 0.0106 EUR2005
    Average European district heat price from Ecoheatcool and Euroheat 2005-2006, Ecoheat Work package 1: The European heat market. Final report. 10.6 EUR/GJ i s the price of district heat. http://www.solarthermalworld.org/files/Ecoheatcool%20WP1%20Web.pdf?download

## Inputs from technosphere
- borehole heat exchanger, 150m: 6.41e-8 unit; lognormal variance with pedigree 0.370025, pedigree (4,4,5,2,1)
  Uncertainty of life time
  This exchange has an activity link directly to the producing activity because the product is primarily consumed in the same geographical area where it is produced.
- heat pump, diffusion absorption, 4kW, future: 6.01e-7 unit; lognormal variance with pedigree 0.370025, pedigree (4,4,5,2,1)
  Uncertainty of life time
  Uncertainty of life time
- electricity, low voltage: 0.0055556 kWh; lognormal variance with pedigree 0.146025, pedigree (4,5,5,2,4)
  Estimate based on gas boiler data
  Estimate based on gas boiler data
- methane, 96% by volume, from biogas, low pressure, at user: 0.75758 MJ; lognormal variance with pedigree 0.054025, pedigree (3,4,5,2,1)
  Uncertainty of operation temperatures of source and supply
  Uncertainty of operation temperatures of source and supply
  properties: wet mass 0.0218341 kg, dry mass 0.0218341 kg, carbon content, non-fossil 0.695496
  note on carbon content, non-fossil: C content is 0.7 kg C/kg methane 96%vol (tab 19.1, ecoinvent v2.2 report 17, part 19). This can be obtained from the composition of the gas, 96% (in vol) methane, 2% (in vol) CO2. The composition in %vol was converted in % weight using density data of the different gases from tab 19.1, ecoinvent v2.2 report 17, part 19.

## Inputs from nature
- Energy, geothermal, converted [natural resource, in ground]: 0.24242 MJ; lognormal variance with pedigree 0.0534941, pedigree (3,4,5,2,1)
  Uncertainty of operation supply energy and heating value

## Emissions to nature
- Propionic acid [air, urban air close to ground]: 1.5152e-8 kg; lognormal variance with pedigree 1.12, pedigree (1,1,5,1,1)
  rough estimate based on gas boiler data
- Mercury [air, urban air close to ground]: 2.2727e-11 kg; lognormal variance with pedigree 0.69, pedigree (1,1,5,1,1)
  rough estimate based on gas boiler data
- Carbon dioxide, non-fossil [air, urban air close to ground]: 0.042285 kg; lognormal variance with pedigree 0.04, pedigree (1,1,5,1,1)
  based on composition of refined biogas
- Carbon monoxide, non-fossil [air, urban air close to ground]: 4.4697e-6 kg; lognormal variance with pedigree 1.04, pedigree (1,1,5,1,1)
  rough estimate based on calculation for gas boiler
- Sulfur dioxide [air, urban air close to ground]: 3.7879e-7 kg; lognormal variance with pedigree 0.04, pedigree (1,1,5,1,1)
  based on composition of refined biogas
- Dinitrogen monoxide [air, urban air close to ground]: 3.7879e-7 kg; lognormal variance with pedigree 1.12, pedigree (1,1,5,1,1)
  rough estimate based on gas boiler data
- Nitrogen oxides [air, urban air close to ground]: 7.5e-6 kg; lognormal variance with pedigree 0.45, pedigree (1,1,5,1,1)
  rough estimate based on calculation for gas boiler
- Dioxins, measured as 2,3,7,8-tetrachlorodibenzo-p-dioxin [air, urban air close to ground]: 0 kg; pedigree (1,1,1,1,1)
  based on composition of refined biogas
- Benzo(a)pyrene [air, urban air close to ground]: 7.5758e-12 kg; lognormal variance with pedigree 1.12, pedigree (1,1,5,1,1)
  rough estimate based on gas boiler data
- PAH, polycyclic aromatic hydrocarbons [air, urban air close to ground]: 7.5758e-9 kg; lognormal variance with pedigree 1.12, pedigree (1,1,5,1,1)
  rough estimate based on gas boiler data
- Toluene [air, urban air close to ground]: 1.5152e-7 kg; lognormal variance with pedigree 1.12, pedigree (1,1,5,1,1)
  rough estimate based on gas boiler data
- Sulfite [water, surface water]: 3.7879e-8 kg; lognormal variance with pedigree 0.34, pedigree (1,1,5,1,1)
  rough estimate based on gas boiler data
- Sulfate [water, surface water]: 3.7879e-8 kg; lognormal variance with pedigree 0.34, pedigree (1,1,5,1,1)
  rough estimate based on gas boiler data
- Acetic acid [air, urban air close to ground]: 1.1364e-7 kg; lognormal variance with pedigree 1.12, pedigree (1,1,5,1,1)
  rough estimate based on gas boiler data
- Methane, non-fossil [air, urban air close to ground]: 1.5152e-6 kg; lognormal variance with pedigree 1.12, pedigree (1,1,5,1,1)
  rough estimate based on gas boiler data
- Particulates, < 2.5 um [air, urban air close to ground]: 7.5758e-8 kg; lognormal variance with pedigree 0.16, pedigree (1,1,5,1,1)
  rough estimate based on gas boiler data
- Benzene [air, urban air close to ground]: 3.0303e-7 kg; lognormal variance with pedigree 1.12, pedigree (1,1,5,1,1)
  rough estimate based on gas boiler data
- Propane [air, urban air close to ground]: 1.5152e-7 kg; lognormal variance with pedigree 1.12, pedigree (1,1,5,1,1)
  rough estimate based on gas boiler data
- Acetaldehyde [air, urban air close to ground]: 7.5758e-10 kg; lognormal variance with pedigree 1.12, pedigree (1,1,5,1,1)
  rough estimate based on gas boiler data
- Nitrite [water, surface water]: 2.2727e-9 kg; lognormal variance with pedigree 0.34, pedigree (1,1,5,1,1)
  rough estimate based on gas boiler data
- Butane [air, urban air close to ground]: 5.303e-7 kg; lognormal variance with pedigree 1.12, pedigree (1,1,5,1,1)
  rough estimate based on gas boiler data
- Nitrate [water, surface water]: 9.8485e-8 kg; lognormal variance with pedigree 0.34, pedigree (1,1,5,1,1)
  rough estimate based on gas boiler data
- Pentane [air, urban air close to ground]: 9.0909e-7 kg; lognormal variance with pedigree 1.12, pedigree (1,1,5,1,1)
  rough estimate based on gas boiler data
- Formaldehyde [air, urban air close to ground]: 7.5758e-8 kg; lognormal variance with pedigree 1.12, pedigree (1,1,5,1,1)
  rough estimate based on gas boiler data

## Sampling procedure
Literature data and manufacturer information, emissions values from ecoinvent process natural gas, burned in boiler condensing modulating under 100kW

## Extrapolations
This dataset has been extrapolated from year 2005 to the year of the calculation (2019). The uncertainty has been adjusted accordingly.

## Review by Rolf Frischknecht 2007-08-13
passed
none
