# suction, shavings, hardwood

Dataset: EcoSpold 2, unit process
Geography: CH
Time period: 2012-01-01 to 2019-12-31
Technology level: current
Classification: ISIC rev.4 ecoinvent: 1610:Sawmilling and planing of wood
Scenario: Business-as-Usual
System model: Allocation at the point of substitution
Generated by: Frank Werner
Database: ecoinvent
isCopyrightProtected: true
accessRestrictedTo: 1

## General comment
This data represents the service of collecting shavings from the planing of hardwood, expressed per kg dry mass and transporting it to its silo via aspiration.
The data was provided by and approved by the Swiss forest industry (Holzindustrie Schweiz HIS).

## Included activities start
The activity starts with the shavings at the planing machine.

## Included activities end
This activity ends with the shavings collected at a silo at the sawmill site. The dataset does not include direct wood dust emissions. The infrasturcture for the pipes and pumps as well as for the silo are assumed be part of the infrastructure DS for the sawmill.

## Reference product
- shavings, hardwood, loose, measured as dry mass: 0 kg; source BFS 2013; CPC 39283: Non-agglomerated wood waste and scrap; By-product classification allocatable product
  production volume 0 kg; name p_shavings; = 54570+52570+190020+183020+255540+1320000
    sum of all production volumes of all planing processes for the geographical reference, quantified within the planing datasets
  property carbon content 0.494
    carbon content on a dry matter basis (reserved; not for manual entry)
  properties: carbon content, non-fossil 0.494, carbon content, fossil 0, wet mass 1.1 kg, water content 0.1, water in wet mass 0.1 kg, dry mass 1 kg, price 0.113 EUR2005, carbon allocation 0.494 kg
- shavings, hardwood, measured as dry mass: 1 kg; source BFS 2013; CPC 39283: Non-agglomerated wood waste and scrap; By-product classification allocatable product; pedigree (1,1,1,1,1)
  shavings recollected from the planing process where they are generated as loose shavings.
  production volume 2.05572e6 kg
    Calculated from production volume of reference product using the relative outputs.

## By-products
- shavings, hardwood, measured as dry mass: 0 kg; source BFS 2013; CPC 39283: Non-agglomerated wood waste and scrap; By-product classification allocatable product; pedigree (1,1,1,1,1)
  shavings recollected from the planing process where they are generated as loose shavings.
  production volume 0 kg; = p_shavings
    Calculated from production volume of reference product using the relative outputs.
  property price 0.113 EUR2005
    Temporary price data. Calculated as 90% of purchasers price based on: 2004 prices for World Import/Export (USD/cubicmeter) from FaoStat (http://faostat.fao.org/site/626/default.aspx#ancor, [accessed 10th June 2010]) Commodity: 'Chips and Particles' assuming this is for air-dry chips (10% water on a dry matter basis at 650 kg/m3) and no price difference for water content (i.e. assuming air-drying).
  property carbon content 0.494
    carbon content on a dry matter basis (reserved; not for manual entry)
  properties: dry mass 1 kg, carbon content, fossil 0, water in wet mass 0.1 kg, carbon content, non-fossil 0.494, water content 0.1, wet mass 1.1 kg, carbon allocation 0.494 kg

## Inputs from technosphere
All rows: source BFS 2013
- electricity, medium voltage: 0.00694358 kWh; lognormal variance with pedigree 0.008, pedigree (1,1,3,1,1)
  electricity needed for the suction of shavings from the planing process and their transport to a bunker/silo.
- planing mill: 2.9834e-10 unit; lognormal variance with pedigree 0.4326, pedigree (2,1,3,1,1)
  data taken from ecoinvent 2.2 dataset
- sawnwood, board, hardwood, raw, dried (u=10%): 7.67321e-5 m3; lognormal variance with pedigree 0.008, pedigree (1,1,3,1,1)
  input of raw sawn wood to be planed; usually processes within the sawmill that produces the raw sawn wood
- shavings, hardwood, loose, measured as dry mass: -0.0269134 kg
  calculated as dry mass
  production volume 366071 kg
    Calculated from production volume of reference product using the relative outputs.
- sawnwood, beam, hardwood, raw, dried (u=20%): 5.95304e-5, 1.48826e-5 m3 (2 suppliers, which the file names only by identifier); sum of these 7.4413e-5 m3; lognormal variance with pedigree 0.008, pedigree (1,1,3,1,1)
  (same comment as for sawnwood, board, hardwood, raw, dried (u=10%))
- sawnwood, lath, hardwood, raw, dried (u=20%): 1.5747e-5 m3; lognormal variance with pedigree 0.008, pedigree (1,1,3,1,1)
  (same comment as for sawnwood, board, hardwood, raw, dried (u=10%))
- sawnwood, lath, hardwood, raw, dried (u=20%): 6.29879e-5 m3; lognormal variance with pedigree 0.216, pedigree (5,5,5,5,5)
  (same comment as for sawnwood, board, hardwood, raw, dried (u=10%))
- sawnwood, lath, hardwood, raw, dried (u=10%): 7.86113e-5 m3; lognormal variance with pedigree 0.008, pedigree (1,1,3,1,1)
  (same comment as for sawnwood, board, hardwood, raw, dried (u=10%))
- sawnwood, beam, hardwood, raw, dried (u=10%): 7.4362e-5 m3; lognormal variance with pedigree 0.008, pedigree (1,1,3,1,1)
  (same comment as for sawnwood, board, hardwood, raw, dried (u=10%))
- sawnwood, board, hardwood, raw, dried (u=20%): 6.14581e-5, 1.53645e-5 m3 (2 suppliers, which the file names only by identifier); sum of these 7.68226e-5 m3; lognormal variance with pedigree 0.008, pedigree (1,1,3,1,1)
  (same comment as for sawnwood, board, hardwood, raw, dried (u=10%))

## Sampling procedure
complementary literature and sampling from sawmills
